folder Simulations: version=19
  memo Jo notes
    3 scenarios:
    baseline, +/- 120 cows, 500ha cropping
  folder Shared
    siloinput Met Data from Silo
      station_number = 35264
    tclmanager Farm Manager
      rule Empty rule
      rule Animal Management
        on init:
```
###############Animal management stuff~~~~~~~~~~~~

proc setupAnimals {} {
   global config animals simName 
   set animals(reportFP) [open "${simName}.Livestock Schedule.csv" w]
   set animals(mobs) {}
   for {set mob 1} {$mob <= 5} {incr mob} {
      lappend animals(mobs) $mob
      set animals($mob,number) 0
      set animals($mob,state) "off"
      set animals($mob,where)  {}
      set animals($mob,what)   {}
      set animals($mob,supplemented) 0
      set animals($mob,id) ".masterpm.a${mob}"
      apsimSet $animals($mob,id).stocking_rate 0.0
      apsimSet $animals($mob,id).alw 0.0
      apsimSet $animals($mob,id).pasture_source ".masterpm.farm manager"
      apsimSet $animals($mob,id).allow_supplements 0
   }
}

proc closeAnimals {} {
   global animals 
   catch {close $animals(reportFP)}
}

# Bring some animals into the system
proc animalsIn { number class initialWeight } {
   global config animals

   foreach mob $animals(mobs) {
      if {$animals(${mob},state) == "off"} {break}
   } 
   if {$animals(${mob},state) != "off"} {parray animals; error "Already too many mobs to make $class"}
   
   set animals($mob,state)        on
   set animals($mob,class)        $class
   set animals($mob,alw)          $initialWeight
   set animals($mob,number)       $number
   set animals($mob,age)          0
   set animals($mob,where)        {}
   set animals($mob,what)         {}
   set animals($mob,supplemented) 0
   apsimSet $animals($mob,id).allow_supplements 0

   reportCSV livestock buy "livestock_number=$number,livestock_class=$class,livestock_weight=$initialWeight"

   apsimSendMessage economics expenditure {paddock livestock}\
             "cost [expr $number * $initialWeight * $animals($class,price)]" \
             [list comment "purchase of $number $class at $initialWeight kg"]

   apsimSendMessage economics expenditure {paddock livestock}\
             "cost [expr $number * $animals(inCost)]" \
             [list comment "in costs of $number $class"]

   puts "[apsimGet dd/mm/yyyy]: animals:In: mob $mob is class $class, weight=$initialWeight"
   # initial stocking rate isn't set until we have a paddock with an area
   return $mob
}

# Take animals out the system
proc animalsOut { mob number } {
   global animals

   if {$number == "all"} { set number $animals(${mob},number) }

   set animals(${mob},number) [expr $animals(${mob},number) - $number]
   
   reportCSV livestock sell "livestock_number=$number,livestock_class=$animals($mob,class),livestock_weight=$animals($mob,alw)"

   apsimSendMessage economics expenditure {paddock livestock}\
             "cost [expr $number * $animals(outCost)]" \
             [list comment "out costs of $number $animals($mob,class)"]

   apsimSendMessage economics income \
       {paddock livestock} "name $animals(${mob},class)" \
       "amount [expr $number * $animals(${mob},alw) * $animals($animals(${mob},class),price)]" \
       [list comment "sale of $number $animals(${mob},class) at $animals(${mob},alw) kg"]

   puts "[apsimGet dd/mm/yyyy]: animals:Out: removing $number of mob $mob ($animals(${mob},class))  at $animals(${mob},alw) kg"

   if {$animals(${mob},number) <= 0} {
      set animals(${mob},state)  off
      set animals(${mob},alw)    0.0
      set animals(${mob},age)    0
      set animals(${mob},where)  {}
      set animals(${mob},what)   {}
      set animals($mob,supplemented) 0
      apsimSet $animals($mob,id).pasture_source ".masterpm.farm manager"
      apsimSet $animals($mob,id).stocking_rate  0.0
      apsimSet $animals($mob,id).alw            0.0
      apsimSet $animals($mob,id).allow_supplements 0
      puts "[apsimGet dd/mm/yyyy]: animals:Out: mob $mob is gone"
   } else {
      error "Adjust stocking rate here.."
   }
}

# Keep track of alw and age
proc doPostAnimals {} {
   global animals

   foreach mob $animals(mobs) {
      if {$animals(${mob},state) != "off"} {

          # keep track of ALW
          if {$animals(${mob},what) == "sorghum"} {
             set animals($mob,alw) [expr $animals($mob,alw) + 1.4]      ;# 1.4 kg/hd/day
          } elseif {$animals(${mob},what) == "feedlot"} {
             set animals($mob,alw) [expr $animals($mob,alw) + 2.0]      ;# 2.0 kg/hd/day
          } else {
             set animals($mob,alw) [apsimGet $animals($mob,id).alw]
          }

          incr animals(${mob},age)
      }
   }
}


#Move stock somewhere. 
# mob = name of the animal group
# paddock = the paddock they're going to
# crop = The name of the crop they'll eat
proc moveStockTo {mob paddock crop} {
   global config animals

   if {$crop == "leucaena"} {
      apsimSet $animals($mob,id).pasture_source ".masterpm.farm manager"
   } elseif {$crop == "feedlot"} {
      apsimSet $animals($mob,id).pasture_source ".masterpm.farm manager"
   } elseif {$crop == "sorghum"} {
      apsimSet $animals($mob,id).pasture_source ".masterpm.farm manager"
   } else {
      apsimSet $animals($mob,id).pasture_source ".masterpm.$paddock.$crop"
      set newSr [expr $animals($mob,number) / $config($paddock,area)]

      ##?? need to convert animal equivalents here

      apsimSet $animals($mob,id).stocking_rate $newSr
      apsimSet $animals($mob,id).alw $animals($mob,alw)

      foreach season {summer_lwg winter_lwg autumn_lwg spring_lwg} {
         apsimSet $animals($mob,id).${season} $config($crop,$season)
      }
   }
   set animals($mob,where)  $paddock
   set animals($mob,what)   $crop
   set animals($mob,state)  "$paddock.$crop"
   set animals($mob,age)    0
   set animals($mob,age)    0
   set animals($mob,supplemented) 0
   apsimSet $animals($mob,id).allow_supplements 0
   puts "[apsimGet dd/mm/yyyy]: animals:moveStockTo $animals($mob,class) $paddock $crop wt=$animals($mob,alw) sr=[apsimGet $animals($mob,id).stocking_rate]"
}

# Split a mob.  
proc splitMob { mob num paddock crop } {
   global config animals

   puts "[apsimGet dd/mm/yyyy]: animals:split $animals($mob,class) old =$animals($mob,number), new =[expr $animals($mob,number) - $num]"

   foreach newmob $animals(mobs) {
      if {$animals(${newmob},state) == "off"} {break}
   } 
   if {$animals(${newmob},state) != "off"} {parray animals; error "Too many mobs to split"}
   
   foreach what {state class alw number age where what} {
      set animals($newmob,$what) $animals($mob,$what)  
   }
   set animals($mob,number) [expr $animals($mob,number) - $num]
   if {$animals($mob,number) < 0} {parray animals; error "mob $mob has negative size"}
   moveStockTo $mob $animals($mob,where) $animals($mob,what)

   set animals($newmob,number)  $num
   if {$animals($newmob,number) < 0} {parray animals; error "mob $newmob has negative size"}
   moveStockTo $newmob $paddock $crop
   return $newmob
}

proc setSupplementsOn {mob} {
   global animals
   set animals($mob,supplemented) 1
   apsimSet $animals($mob,id).allow_supplements 1
}

proc setSupplementsOff {mob} {
   global animals
   set animals($mob,supplemented) 0
   apsimSet $animals($mob,id).allow_supplements 0
}

proc changeMob { mob number } {
   global config animals
????   
   foreach what {state class alw number age where what} {
      set animals($newmob,$what) $animals($mob,$what)  
   }
   return $newmob
}

proc animalWeight {mob} {
   global animals
   return $animals($mob,alw)
}

proc animalNumber {mob} {
   global animals
   if {![info exists animals($mob,number)]} {parray animals; error "Missing number for mob $mob"}
   return $animals($mob,number)
}

proc animalDaysIn {mob where} {
   global animals
   if {$animals($mob,what) == "$where"} {
     return $animals($mob,age)
   } 
   return 0  
}

proc animalWhat {mob} {
   global animals
   return $animals($mob,what)
}

# Potential growth rates for each pasture by season
set config(buffel,summer_lwg)  80
set config(buffel,autumn_lwg)  40
set config(buffel,winter_lwg)  10
set config(buffel,spring_lwg)  40

set config(sorghum,summer_lwg)  100
set config(sorghum,autumn_lwg)  60
set config(sorghum,winter_lwg)  10
set config(sorghum,spring_lwg)  60

set config(oats,summer_lwg)  40
set config(oats,autumn_lwg)  60
set config(oats,winter_lwg)  80
set config(oats,spring_lwg)  60

set config(leucaena,summer_lwg)  85
set config(leucaena,autumn_lwg)  85
set config(leucaena,winter_lwg)  30
set config(leucaena,spring_lwg)  30

proc doPrepareAnimals {} {
   global animals
   
#####Culls   
   if {[dateIs 15-aug]} {
     set animals(culls) [animalsIn 100 culls 500]    ;# 100 head @ 500kg
     moveStockTo $animals(culls) p11 buffel          ;# move onto p11 buffel
   }
   
   if {[dateIs 15-dec] && 
       $animals(culls) != {} && 
       [animalWeight $animals(culls)] > 550} {
     animalsOut $animals(culls) all
     set animals(culls) {}
   }

   if {[dateIs 15-jun] && $animals(culls) != {}} {
     animalsOut $animals(culls) all
     set animals(culls) {}
   }
   
##### Weaners on oats for 6 mths
   if {[dateIs 15-aug] } {

     set animals(steers1) [animalsIn 275 steers 200]   ;# 275 head @ 200Kg
     if {[OatsIsPlanted p10]} {
       moveStockTo $animals(steers1) p10 oats           ;# move onto oats in p10
     } else { 
       puts "Couldn't put weaners on oats in p10"
       moveStockTo $animals(steers1) p13 buffel         ;# move onto buffel in p13
       setSupplementsOn $animals(steers1)
     }

     set animals(heifers) [animalsIn 275 heifers 200]
     if { [OatsIsPlanted p20]} {
       moveStockTo $animals(heifers) p20 oats
     } else { 
       puts "Couldn't put weaners on oats in p20"
       moveStockTo $animals(heifers) p13 buffel         ;# move onto buffel in p13 (shared with steers)
       setSupplementsOn $animals(heifers)
     }
   }
   
   # Oats are flogged, but sorghum isn't ready 
   if {$animals(steers1) != {} &&
       [animalWhat $animals(steers1)] == "oats" && 
       ([apsimGet p10.oats.stage] > 8 || [apsimGet p10.oats.biomass] < 500) &&
       [apsimGet .masterpm.p16.SweetSorghum.biomass] < 1000} {
       moveStockTo $animals(steers1) p13 buffel
       setSupplementsOn $animals(steers1)
   }     
   if {$animals(heifers) != {} &&
       [animalWhat $animals(heifers)] == "oats" && 
       ([apsimGet p20.oats.stage] > 8 || [apsimGet p20.oats.biomass] < 500) &&
       [apsimGet .masterpm.p18.SweetSorghum.biomass] < 1000} {
       moveStockTo $animals(heifers) p13 buffel
       setSupplementsOn $animals(heifers)
   }     


### mid-jan - split weaners and sell if feed scarce
   if {$animals(steers1) != {} && $animals(steers2) == {} &&
       (([animalWhat $animals(steers1)] == "buffel" &&
         [apsimGet .masterpm.p16.SweetSorghum.biomass] > 1000) ||
        [dateIs 15-jan])} {

        moveStockTo $animals(steers1) p16 sorghum
        setSupplementsOff $animals(steers1)
        set animals(steers2) [splitMob $animals(steers1) 135 p19 sorghum]


        if {![ForageSorghumIsPlanted p16] || [apsimGet .masterpm.p16.SweetSorghum.biomass] < 800} {
           animalsOut $animals(steers1) all
           set animals(steers1) {}
        }

        if {![ForageSorghumIsPlanted p19] || [apsimGet .masterpm.p19.SweetSorghum.biomass] < 800} {
           animalsOut $animals(steers2) all
           set animals(steers2) {}
        }
   }
   
   if {$animals(heifers) != {} && $animals(breeders) == {} && 
       (([animalWhat $animals(heifers)] == "buffel" &&
         [apsimGet .masterpm.p18.SweetSorghum.biomass] > 1000) ||
        [dateIs 15-jan])} {

       moveStockTo $animals(heifers) p18 sorghum
       setSupplementsOff $animals(heifers)
       set animals(breeders) [splitMob $animals(heifers) 120 p12 buffel]

puts "[apsimGet dd/mm/yyyy]:animals:heifers sorgwt = [apsimGetOptional .masterpm.p18.SweetSorghum.biomass]"
       if {![ForageSorghumIsPlanted p18] || [apsimGet .masterpm.p18.SweetSorghum.biomass] < 800} {
           animalsOut $animals(heifers) all
           set animals(heifers) {}
       }
   }

   if {$animals(breeders) != {}} {
      if {[animalWhat $animals(breeders)] == "buffel" &&
          [apsimGet p12.buffel.tsdm] < 500} {
         animalsOut $animals(breeders) all
         set animals(breeders) {}
      }  
   }

   
   # Off to the feedlot
   if {$animals(steers1) != {} && 
       [animalWhat $animals(steers1)] == "sorghum" &&
       ([animalWeight $animals(steers1)] > 450 || [dateIs 1-apr])} {
       moveStockTo $animals(steers1) "" feedlot
   }

   if {$animals(steers2) != {} && 
       [animalWhat $animals(steers2)] == "sorghum" &&
       ([animalWeight $animals(steers2)] > 450 || [dateIs 1-apr])} {
       moveStockTo $animals(steers2) "" feedlot
   }

   if {$animals(heifers) != {} && 
       [animalWhat $animals(heifers)] == "sorghum" &&
       ([animalWeight $animals(heifers)] > 450 || [dateIs 1-apr])} {
       moveStockTo $animals(heifers) "" feedlot
   }
   
   # Off the farm after 
   foreach a {steers1 steers2 heifers} {
      if {$animals($a) != {} && 
          ([animalDaysIn $animals($a) "feedlot"] == 70 || [dateIs 1-aug])} {
        animalsOut $animals($a) all
        set animals($a) {}
      }
   }

   if {$animals(breeders) != {} && [dateIs 1-aug]} {
     animalsOut $animals(breeders) all
     set animals(breeders) {}
   }
   
   # Work out feedlot costs
   set nInFeedlot 0
   foreach a {steers1 steers2 heifers} {
      if {$animals($a) != {} && 
          [animalWhat $animals($a)] == "feedlot"} {
         set nInFeedlot [expr $nInFeedlot + [animalNumber $animals($a)]]
      }
   }

   if {$nInFeedlot > 0} {
      apsimSendMessage economics expenditure {paddock livestock}\
             "cost [expr $nInFeedlot * $animals(dailyFeedlotCost)]" \
             [list comment "feedlot costs for $nInFeedlot beasts"]
   }

   # Work out supplement costs
   set nSupplemented 0
   foreach a {steers1 steers2 heifers} {
      if {$animals($a) != {} && 
          $animals($animals($a),supplemented)} {
         set nSupplemented [expr $nSupplemented + [animalNumber $animals($a)]]
      }
   }

   if {$nSupplemented > 0} {
      apsimSendMessage economics expenditure {paddock livestock}\
             "cost [expr $nSupplemented * $animals(dailySupplementCost)]" \
             [list comment "supplement costs for $nSupplemented beasts"]
      puts "animals: Supplementary feeding for $nSupplemented beasts"
   }
   
}
```
      rule Initialisation logic
        on init:
```
# Delete any old logfile so we dont get confused..
catch {file delete -force $simName.log}

# The 10 day rainfall accumulator - should be the 10 days of rain prior to start of simulation
set rainList {0.2 1.0 0 0 0 0 15 12 0 0 0 0}

# A list of variables to report from each paddock on each "event"
set reportVariables [list esw no3() ]

# Crops to report at harvest
set crops {sorghum wheat chickpea}
```
      rule Rugplot stuff
        on init:
```
# Rug plotting facility

# 2 areas of interest:
# - logState - called when a graph is changing state, called just after the "actions" have been evaluated

# a logfile is used to generate the rugplots of farm activities. There are 2 parts:
# an xml of paddocks, states & times,
# a binary of decision rules on each evaluation cycle
proc log {msg} {
   #puts $msg
}

package require cdftcl
package require tdom

proc setupLogging {} {
   global simName config paddocks
   set config(paddocks) $paddocks

   # Find the number of graphs - 1 file for each. Delete each.
   set config(graphs) {}
   foreach paddock $config(paddocks) {
     foreach graph $config($paddock,graphNames) {
        if {[lsearch $config(graphs) $graph] < 0} {
           lappend config(graphs) $graph
        }
     }
  }
  foreach graph $config(graphs) {
    puts "deleting $simName.$graph.\[xml,nc\]"
    file delete -force $simName.$graph.xml
    file delete -force $simName.$graph.nc
    foreach paddock $config(paddocks) {
       set config(history,$paddock,$graph) {}
    }
  }
  set config(states) {}
  set config(rules) {}
  set config(historyDays) {}
}

# Log a set of rule evaluations
proc logRules {paddock graph rules values } {
   global config history

   set data {}
   for {set i 0} {$i < [llength $rules]} {incr i} {
      lappend data [lindex $rules $i] [lindex $values $i]
   }

   set today [apsimGet today]

   lappend history($paddock,$graph,$today) $data

   if {[lsearch $config(historyDays) $today] < 0} {
       lappend config(historyDays) $today
       set config($today,ddmmyyyy) [apsimGet clock.dd/mm/yyyy]
   }
}

# Log a state transition
proc logState {graph paddock state} {
   global config
   set today [apsimGet today]
   lappend config(history,$paddock,$graph) $today $state
   if {[lsearch $config(states) $state] < 0} {lappend config(states) $state}
}

# Write the files. 
proc closeLogging {} {
   global config history simName

   set config(xmldoc) [dom parse [apsimGetComponentXML]]
   set config(docroot) [$config(xmldoc) documentElement]

puts "graphs = $config(graphs)"

   foreach graph $config(graphs) {
puts "creating $simName.$graph.nc"
      set ncfp [ncdf create $simName.$graph.nc] 
      ncdfdim $ncfp create index [llength $config(historyDays)]
      ncdfdim $ncfp create time -1

      ncdfvar $ncfp create position long {index}
      ncdfvar $ncfp create daynum float {index}

      ncdfvar $ncfp create day     float {time}
      ncdfvar $ncfp create paddock short {time}
      ncdfvar $ncfp create rule    short {time}
      ncdfvar $ncfp create value   float {time}

      set day [lindex $config(historyDays) 0]
      ncdfatt $ncfp GLOBAL put startdate float $day
      ncdfatt $ncfp GLOBAL put startddmmyyyy char $config($day,ddmmyyyy)

      set day [lindex $config(historyDays) end]
      ncdfatt $ncfp GLOBAL put enddate float $day
      ncdfatt $ncfp GLOBAL put endddmmyyyy char $config($day,ddmmyyyy)

      ncdf enddef $ncfp
      set id 0
      foreach p $config(paddocks) {
         set pid($p) $id; incr id
      }   
	  puts "writing rules"

      set i 0
      foreach day $config(historyDays) {
         foreach paddock $config(paddocks) {
            if {[info exists history($paddock,$graph,$day)]} {
               set pos($paddock,$day) $i
               foreach data $history($paddock,$graph,$day) {
                  foreach {rule value} $data {
                     ncdfvar $ncfp put day     $i $day
                     ncdfvar $ncfp put paddock $i $pid($paddock)
                     ncdfvar $ncfp put rule    $i $rule
                     ncdfvar $ncfp put value   $i $value
                     incr i
                  } 
               }
            }
         }
      }

	  puts "writing positions"
      #Positions
      for {set i 0} {$i < [llength $config(historyDays)]} {incr i} {
         set day [lindex $config(historyDays) $i]
         set f 0
         foreach paddock $config(paddocks) {
            if {[info exists pos($paddock,$day)]} {
               ncdfvar $ncfp put position  $i $pos($paddock,$day)
               set f 1
               break
            } 
         }
         if {!$f} {
            ncdfvar $ncfp put position  $i -1
         }   
      }
      
      for {set j 0} {$j < [llength $config(historyDays)]} {incr j} {
         ncdfvar $ncfp put daynum $j [lindex $config(historyDays) $j]
      }   

      ncdf close $ncfp
puts "finished nc, opening $simName.$graph.xml"

      set fp [open $simName.$graph.xml w]
      puts $fp "<?xml version=\"1.0\" encoding=\"UTF-8\"?><simulation>"
      set id 0
      foreach paddock $config(paddocks) {
         puts $fp "<history id=\"$id\" name=\"$paddock\">"
         foreach {day state} $config(history,$paddock,$graph) {
            if {[info exists pos($paddock,$day)]} {
               puts $fp "<transition day=\"$day\" to=\"$state\" position=\"$pos($paddock,$day)\" />"
            } 
         }
         puts $fp "</history>"
         incr id
      }

      foreach paddock $config(paddocks) {
         puts $fp "<paddock id=\"$pid($paddock)\" name=\"$paddock\" />"
      }   
      set id 0
      foreach rule $config(rules) {
         set rule [string map {\< "&lt;"  \> "&gt;"     
                               \& "&amp;" \" "&quot;"  
                               \[ "&#91;" \] "&#93;"    } $rule]
         puts $fp "<rule id=\"$id\" name=\"$rule\" />"
         incr id
      }

      # Colours
      foreach node [$config(docroot) selectNodes //node] {
          set state [getValue $node "name"]
          set colour [getValue $node "fill"]
          puts $fp "<state name=\"$state\" colour=\"$colour\" />"
      }

      set day [lindex $config(historyDays) 0]
      puts $fp "<startdate ddmmyyyy=\"$config($day,ddmmyyyy)\" day=\"$day\" />"
      set day [lindex $config(historyDays) end]
      puts $fp "<enddate ddmmyyyy=\"$config($day,ddmmyyyy)\" day=\"$day\" />"

      puts $fp "</simulation>"
      close $fp
puts "finished $simName.$graph.xml"
   }  
   # $config(xmldoc) delete
}

# Override the "standard" decision routine to keep track of state info
proc checkRules {thisPaddock} {
  global config 
  uplevel #0 set paddock $thisPaddock
  set bestScore -1.0; set bestTarget {}; set bestArc {}; set bestGraph {}
  foreach graph $config($thisPaddock,graphNames) {
     foreach arc [$graph arcs -out [currentState $thisPaddock]] {
        set values {}; set rules {}
        set target [$graph arc target $arc]
        if {[$graph arc keyexists $arc window]} {set inWindow [uplevel #0 expr [$graph arc get $arc window]]} else {set inWindow 0}
        foreach rule [$graph arc get $arc rules] {
           set value [uplevel #0 expr $rule]
           lappend values $value
           lappend rules [enCodeRule $target $rule]
        }
        logRules $thisPaddock $graph $rules $values
        if {[llength $values] > 0} {
           set score [expr [join $values "*"]]
           if {$score > $bestScore} {
              set bestScore  $score
              set bestTarget $target
              set bestArc    $arc
              set bestGraph  $graph
           }
        }
     }
  }   
  return [list  $bestScore $bestGraph $bestTarget $bestArc]
}

proc enCodeRule {target ruleText} {
  global config
  regsub -all "\," $ruleText "\-" ruleText

  for {set i 0} {$i < [llength $config(rules)]} {incr i} {
     set rule [lindex $config(rules) $i]
     if {[string equal $rule "$target,$ruleText"]} {
        return $i
     }
  }
  lappend config(rules) "$target,$ruleText"
  return [expr [llength $config(rules)] - 1]
}


# Get the value of an objects 'thing'
proc getValue {id thing} {
   foreach node [$id childNodes] {
      if {[string equal -nocase [$node nodeName] $thing]} {
         return [$node text]
      }
   }
   return ""
}
```
        on start_simulation:
```
setupLogging
foreach paddock $paddocks {
   logState stateGraph $paddock [currentState $paddock]
}
```
        on end_simulation:
```
closeLogging
```
      rule Farm logic
        on init:
```
# Initial conditions
 
foreach paddock $paddocks {
   set config($paddock,watBal)   ".masterpm.$paddock.Soil Water"
   set config($paddock,nModule)   ".masterpm.$paddock.Soil Nitrogen"
}

source $apsuite/UserInterface/APSFarm/FarmManager.tcl

set accRain 0.0
foreach paddock $paddocks {
   foreach accumulator {runoff drain soil_loss es} {
      set $paddock.$accumulator 0.0
   }
}

# Extra bits (needed to fool animals)
set leafgreenwt 0.0
set stemgreenwt 0.0
set leafsenescedwt 0.0
set stemsenescedwt 0.0
set dlt_dm 0.0

set animals(culls) {}
set animals(steers1) {}
set animals(steers2) {}
set animals(steers3) {}
set animals(heifers) {}
set animals(breeders) {}
set animals(culls,price)       2.0   ;# $/kg live at gate
set animals(steers,price)      2.0   ;# $/kg live at gate
set animals(steers1,price)     2.0   ;# $/kg live at gate
set animals(steers2,price)     2.0   ;# $/kg live at gate
set animals(steers3,price)     2.0   ;# $/kg live at gate
set animals(heifers,price)     2.0   ;# $/kg live at gate
set animals(breeders,price)    2.0   ;# $/kg live at gate
set animals(weaners,price)     1.5   ;# $/kg live at gate
set animals(dailyFeedlotCost)  4.2   ;# $/head/day costs of feedlot
set animals(dailySupplementCost)  0.22   ;# $/head/day costs of supplement

set animals(inCost)            5.35  ;# $/head costs of landing from mt kelman
set animals(outCost)          36.75  ;# $/head costs of shipping to rocky



# Defaults for a lot of things.
# we use this table to build a list of "name/value" pairs that get fed into
# sow/fertiliser commands etc.
# ***Check the summary file for what it uses, search other files for "gatherArgs"
   set defaults(sow,sowing_depth)              30
   set defaults(fertiliser,calcMethod)         targetN
   set defaults(fertiliser,depth)              50
   set defaults(fertiliser,type)               urea

   set defaults(wheat,sow,cultivar)            hartog
   set defaults(wheat,sow,plants)              100       ;# plants per sq mt established
   set defaults(wheat,sow,seedrate)            60        ;# kg/ha seed used
   set defaults(wheat,fertiliser,amount)       75

   set defaults(pigeonp,sow,cultivar)          long_duration
   set defaults(pigeonp,sow,plants)            10        ;# plants per sq mt established
   set defaults(pigeonp,sow,seedrate)          10        ;# kg/ha seed used
   set defaults(pigeonp,fertiliser,amount)      0



   set defaults(wheat,sowingCosts)             {{category seedcost       name Wheat            rate 40  comment  "Wheat seed"} 
                                                {category fertilisercost name map              rate 20  comment  "Wheat MAP starter"} 
                                                {category herbicide      name "MCPA LVE"       rate 0.5 comment  "Wheat mcpa starter"}
                                                {category herbicide      name "Ally"           rate 5   comment  "Wheat metsulfuran starter"}}

   set defaults(wheat,harvestingCosts)         {{category contract   name generic          rate 0.16666  comment  "Wheat contract harvest"} 
                                                {category fuelcosts  name fuelcosts        rate 8.1      comment  "Wheat contract harvest fuel"}}
                                                
   set defaults(pigeonp,sowingCosts)           {{category seedcost       name pigeonp            rate 40  comment  "pigeonp seed"} 
                                                {category fertilisercost name map              rate 20  comment  "Wheat MAP starter"} 
                                                {category herbicide      name "MCPA LVE"       rate 0.5 comment  "Wheat mcpa starter"}
                                                {category herbicide      name "Ally"           rate 5   comment  "Wheat metsulfuran starter"}}

   set defaults(pigeonp,harvestingCosts)         {{category contract   name generic          rate 0.16666  comment  "pigeonp contract harvest"} 
                                                {category fuelcosts  name fuelcosts        rate 8.1      comment  "pigeonp contract harvest fuel"}}                                              

   set defaults(CoverCrop,fertiliser,amount)   0

   set defaults(sorghum,sow,cultivar)          medium
   set defaults(sorghum,sow,seedrate)          15
   set defaults(sorghum,sow,skip)              "solid"
   set defaults(sorghum,sow,region)            "CQ"
   set defaults(sorghum,sow,row_spacing)       1.0
   set defaults(sorghum,sow,plants)            4.5
   set defaults(sorghum,fertiliser,amount)     80

   set defaults(sorghum,sowingCosts)           {{category seedcost   name sorghum   rate 4 comment "Sorghum seed"}}
## NBNB needs atrazine @3.5lt/ha in wet seasons somehow
   set defaults(sorghum,harvestingCosts)       {{category contract   name generic         rate 0.16666 comment  "Sorghum contract harvest"} 
                                                {category herbicide  name Roundup         rate 1.5     comment  "Sorghum spray out"} 
                                                {category fuelcosts  name fuelcosts       rate 8.1     comment  "Sorghum contract harvest fuel"}}

  
   set defaults(earlySorghum,sow,cultivar)     late
   

   set defaults(chickpea,sow,cultivar)         amethyst
   set defaults(chickpea,sow,plants)           30
   set defaults(chickpea,sow,seedrate)         20
   set defaults(chickpea,fertiliser,amount)    0

   set defaults(chickpea,sowingCosts)          {{category seedcost    name Chickpea         rate 45   comment "Chickpea Seed"}              
                                                {category herbicide   name Roundup          rate 1.3  comment "Pre plant roundup"}
                                                {category herbicide   name Amicide625       rate 0.2  comment "Pre plant 2,4D"} 
                                                {category herbicide   name "simazine"     rate 1.1    comment "Post Simazine"}
                                                {category insecticide name "Larvin LV"    rate 0.75   comment "Insecticide"}}      
   set defaults(chickpea,harvestingCosts)      {{category contract    name generic        rate 0.1851 comment  "Chickpea contract harvest"} 
                                                {category fuelcosts   name fuelcosts      rate 9.0    comment  "Chickpea contract harvest fuel"}}

   set defaults(sow,tractor)                   'tractor_1'
   set defaults(sow,implement)                 'planter'
   set defaults(spray,tractor)                 'tractor_1'
   set defaults(spray,implement)               'spray_rig'  ;# this is spray rig
   set defaults(herbicide,spray,name)          "Roundup"


set config(Chickpea,alias)     "chickpea"
set config(Wheat,alias)        "wheat"
set config(Sorghum,alias)      "sorghum"
set config(earlySorghum,alias) "sorghum"
set config(Fallow,alias)       "zzz"

# A running list of daily rainfall, used to calculate n-day totals
set rainList {0.2 1.0 0 0 0 0 15 12 0 0 0 0}

# A list of variables to report from each paddock on each "event"
set reportVariables [list esw no3() ]

# Crops to report at harvest
set crops {sorghum wheat chickpea}


foreach paddock $paddocks {
  set state($paddock) $config($paddock,initialState) ;# Should get this from xml
  set weeds($paddock,Events)  0                 ;# number of weed germination events
  set weeds($paddock,GermDay) {}                ;# date of next weed spraying
  set history($paddock) $config($paddock,history)
  set daysSinceLastHarvest($paddock) 60
}

#####----------Support procedures
# Return our "reluctance" to plant sorghum in the current paddock
#  -> no more than 3 in a row.
proc sorghumHistory {paddock} {
   global history 
   if {"[lindex $history($paddock) end]" == "sorghum" &&
       "[lindex $history($paddock) end-1]" == "sorghum" &&
       "[lindex $history($paddock) end-2]" == "sorghum"} {
      return 0 ;# 3 in a row - no more.
   }
   return 1
}

# Last crop was a failed sorghum crop
## XXX WRONG - should be 1 only if the last sorghum crop failed
proc covercropHistory {paddock} {
   global history
   if {"[lindex $history($paddock) end]" == "sorghum"} {return 1}
   return 0
}


# Return our "reluctance" to plant wheat
proc wheatHistory {paddock} {
   global history
   if {"[lindex $history($paddock) end]" == "wheat" &&
       "[lindex $history($paddock) end-1]" == "wheat" &&
       "[lindex $history($paddock) end-2]" == "wheat"} {
       return 0   ;# 3 in a row - no more.
   }
   return 1
}

# Return our "reluctance" to plant chickpea
proc chickpeaHistory {paddock} {
   global history
   if {[lindex $history($paddock) end] == "chickpea" } {
      return 0   ;# no more than 1 crop
   }
   return 1
}

proc getEsw {paddock} {
   global config
   return [apsimGetOptional $config($paddock,watBal).esw]
}

proc getMSeek2 {paddock} {
   global config

   set ll2    [lindex [apsimGet $config($paddock,watBal).ll15] 1]
   set swat2  [lindex [apsimGet $config($paddock,watBal).sw]   1]
   set dul2   [lindex [apsimGet $config($paddock,watBal).dul]  1]
   
   set mseek2 [expr (($swat2-$ll2)/($dul2-$ll2))]

   return $mseek2
}

proc getCover {paddock} {
   global config
   #return [apsimGet ".masterpm.$paddock.surface organic matter.surfaceom_cover"]
   return [apsimGetOptional $config($paddock,watBal).cover_surface_runoff]
}
```
        on prepare:
```
   if {[apsimGet day] == 1} {
      set accRain 0.0
      foreach {accumulator} {runoff drain soil_loss es } {
         foreach paddock $paddocks {
            set $paddock.$accumulator 0.0
         }   
      }
   }

   accumRain

   doPrepareAnimals
```
        on process:
```
# Housekeeping
if {[catch {doProcess } msg]} {
   puts "$errorInfo"
   error "$msg\n$errorInfo"
}
```
        on post:
```
   doPostAnimals 

   set accRain [expr $accRain + [apsimGet rain]]
   
   foreach {accumulator} {runoff drain es } {
      foreach paddock $paddocks {
         if {$paddock != "toplevel"} {
            set $paddock.$accumulator [expr [set $paddock.$accumulator] + [apsimGet $config($paddock,watBal).$accumulator]]
         }
      }   
   }
   foreach {accumulator} {soil_loss} {
      foreach paddock $paddocks {
         if {$paddock != "toplevel"} {
            set $paddock.$accumulator [expr [set $paddock.$accumulator] + [apsimGet .masterpm.$paddock.erosion.$accumulator]]
         }
      }   
   }

   if {[apsimGet day] == 365} {
      reportEvent topLevel endYear
   }
```
        on end_simulation:
```
closeAnimals

closeReporting
```
        on start_simulation:
```
setupReport

setupAnimals
```
      rule Weeds
        on init:
```
# Newer version of weed germination - spray 2 weeks after a {germination event & swCrit & temp}.
proc checkWeeds {} {
   global daysSinceLastHarvest weeds paddocks config

   foreach paddock $paddocks {
      if {$paddock != "toplevel" &&
          ([currentState $paddock] == "Fallow" ) && 
          $daysSinceLastHarvest($paddock) > 30} {

         if {$weeds($paddock,GermDay) == {} && [sumLastRain 4] >= 25} {
            set weeds($paddock,GermDay) [apsimGet day]
            set weeds($paddock,tt) 0.0
            apsimWriteToSummaryFile "Weeds germinating in $paddock"

         } elseif {$weeds($paddock,GermDay) != {}} {
            # Thermal time calc
            set weeds($paddock,tt) [expr $weeds($paddock,tt) + ([apsimGet maxt] + [apsimGet mint])/2.0]
         
            # Surface SW calc
            set ll [lindex [apsimGet $config($paddock,watBal).ll15] 0];
            set sw [lindex [apsimGet $config($paddock,watBal).sw] 0]
            set dul [lindex [apsimGet $config($paddock,watBal).dul] 0]
            set swf [expr (($sw-$ll)/($dul-$ll))]
         
            if {$swf < 0.5} {
               # kill off weeds
               set weeds($paddock,GermDay) {}
               apsimWriteToSummaryFile "Weeds die in $paddock"
         
            } elseif {$weeds($paddock,tt) > 250.0} {
               # Weeds are mature - spray them
               incr weeds($paddock,Events)
               eval apsimSendMessage economics operate [mash [concat [gatherArgs spray herbicide] \
                      area $config($paddock,area)  paddock $paddock  costtype fallow_cost]]

               apsimSendMessage economics expenditure "category herbicide" "name Roundup" \
                         "rate 5" "area $config($paddock,area)"  \
                         "paddock $paddock" {fallow_cost {}} \
                         {comment "Roundup weeds"}
               apsimWriteToSummaryFile "Weeds mature in $paddock - sprayed out."
         
               set weeds($paddock,GermDay) {}
               set weeds($paddock,tt)      0.0
            }
         }
      }   
   }
}
```
        on process:
```
checkWeeds
```
      tclui Forage Sorghum Sowing Rule: uiscript=source $apsuite/UserInterface/APSFarm/GenericSowingUI.tcl; state=ForageSorghum; crop=SweetSorghum; date1=1-oct; date2=15-dec; raincrit=20; rainnumdays=4; esw_amount=60; must_sow=no; cultivar=sugargraze; plants=10; sowing_depth=50; row_spacing=500; sowing_costs=140.0; sow_tractor=tractor_1; sow_implement=planter; fert_type=urea; fert_cost=<unknown>; target_n=180; harv_tractor=none; harv_implement=none; skiprow=0; sow_machinery=tractor=tractor_1,implement=planter
        ruletemplate Sowing rule - initialisation:
          # Support procedures
          # Can we plant a crop today?
          proc canPlant_[state] {paddock} {
             global config rainList
             if {[info exists config($paddock,HarvestedForageSorghumDay)]} {
               if {$config($paddock,HarvestedForageSorghumDay) == [apsimGet day]} {return 0}
             }

             if {"[must_sow]" == "yes" && [dateIs [date2] ]} {return 1}

             set dateOK [dateWithin [date1] [date2] ]

             set rainOK [expr [sumLastRain [rainnumdays]] >= [raincrit]]

             set esw [expr [apsimGet $config($paddock,watBal).sw_dep()] - \
                           [apsimGet $config($paddock,watBal).ll15_dep()]]

             set eswOK [expr $esw >= [esw_amount]]

             if {"[sow_tractor]" != "none"} {
               set machOK [machineryAvailable tractor=[sow_tractor],implement=[sow_implement]]
             } else {
               set machOK 1
             }

             return [expr $dateOK && $rainOK && $eswOK]
          }

          # Plant a crop now
          proc sow_[state] {paddock} {
             global config

             apsimSendMessage .masterpm.$paddock.[crop] sow \
                     {plants [plants]} {sowing_depth [sowing_depth]} \
                     {cultivar [cultivar]} {row_spacing [row_spacing]} \
                     {skiprow [skiprow]}

             if {"[sow_tractor]" != "none"} {
               # machinery operation
               apsimSendMessage economics operate \
                             "area $config($paddock,area)" \
                             "tractor [sow_tractor]"\
                             "implement [sow_implement]"\
                             "paddock $paddock"\
                             "costtype incrop_cost"
             }

             # Sowing costs
             apsimSendMessage economics expenditure \
                             "cost [expr [sowing_costs] * $config($paddock,area)]" \
                             "paddock $paddock" \
                             "costtype incrop_cost" \
                             [list comment "Sowing costs for [state] in $paddock"]
          }

          proc [state]Finished {paddock} {
             if {[apsimGet .masterpm.$paddock.[crop].StageName] == "harvest_ripe" ||
                 [apsimGet .masterpm.$paddock.[crop].plant_status] == "dead"} {
                return 1
             }
             return 0
          }

          proc finish[state] {paddock} {
            apsimSendMessage .masterpm.$paddock.[crop] end_crop
          global config
          set config($paddock,HarvestedForageSorghumDay) [apsimGet day]

          }

          proc [state]IsPlanted {paddock} {
             set status [apsimGetOptional .masterpm.$paddock.[crop].plant_status]
             return [string match "$status" "alive"]
          }
        rule CQ baseline Forage Sorghum Sowing Rule.out - Sowing rule - initialisation
          on init:
```
# Support procedures
# Can we plant a crop today?
proc canPlant_ForageSorghum {paddock} {
   global config rainList
   if {[info exists config($paddock,HarvestedForageSorghumDay)]} {
     if {$config($paddock,HarvestedForageSorghumDay) == [apsimGet day]} {return 0}
   }
   
   if {"no" == "yes" && [dateIs 15-dec ]} {return 1}

   set dateOK [dateWithin 1-oct 15-dec ]

   set rainOK [expr [sumLastRain 4] >= 20]

   set esw [expr [apsimGet $config($paddock,watBal).sw_dep()] - \
                 [apsimGet $config($paddock,watBal).ll15_dep()]]

   set eswOK [expr $esw >= 60]

   if {"tractor_1" != "none"} {
     set machOK [machineryAvailable tractor=tractor_1,implement=planter]
   } else {
     set machOK 1
   }
 
   return [expr $dateOK && $rainOK && $eswOK]
}

# Plant a crop now
proc sow_ForageSorghum {paddock} {
   global config

   apsimSendMessage .masterpm.$paddock.SweetSorghum sow \
           {plants 10} {sowing_depth 50} \
           {cultivar sugargraze} {row_spacing 500} \
           {skiprow 0} 

   if {"tractor_1" != "none"} {
     # machinery operation
     apsimSendMessage economics operate \
                   "area $config($paddock,area)" \
                   "tractor tractor_1"\
                   "implement planter"\
                   "paddock $paddock"\
                   "costtype incrop_cost"
   }

   # Sowing costs
   apsimSendMessage economics expenditure \
                   "cost [expr 140.0 * $config($paddock,area)]" \
                   "paddock $paddock" \
                   "costtype incrop_cost" \
                   [list comment "Sowing costs for ForageSorghum in $paddock"]
}


proc ForageSorghumFinished {paddock} {
   if {[apsimGet .masterpm.$paddock.SweetSorghum.StageName] == "harvest_ripe" ||
       [apsimGet .masterpm.$paddock.SweetSorghum.plant_status] == "dead"} {
      return 1
   }
   return 0
}

proc finishForageSorghum {paddock} {
  apsimSendMessage .masterpm.$paddock.SweetSorghum end_crop
global config
set config($paddock,HarvestedForageSorghumDay) [apsimGet day]
  
}

proc ForageSorghumIsPlanted {paddock} {
   set status [apsimGetOptional .masterpm.$paddock.SweetSorghum.plant_status]
   return [string match "$status" "alive"]
}
```
      tclui Oats Sowing Rule: uiscript=source $apsuite/UserInterface/APSFarm/GenericSowingUI.tcl; state=Oats; crop=oats; date1=15-mar; date2=15-jun; raincrit=25; rainnumdays=3; esw_amount=60; must_sow=yes; cultivar=Coolibah; plants=100; sowing_depth=30; row_spacing=250; sowing_costs=190.0; sow_tractor=none; sow_implement=none; fert_type=urea; fert_cost=<unknown>; target_n=0; harv_tractor=none; harv_implement=none; skiprow=0; sow_machinery=tractor=tractor_1,implement=planter
        ruletemplate Sowing rule - initialisation:
          # Support procedures
          # Can we plant a crop today?
          proc canPlant_[state] {paddock} {
             global config rainList

             if {"[must_sow]" == "yes" && [dateIs [date2] ]} {return 1}

             set dateOK [dateWithin [date1] [date2] ]

             set rainOK [expr [sumLastRain [rainnumdays]] >= [raincrit]]

             set esw [expr [apsimGet $config($paddock,watBal).sw_dep()] - \
                           [apsimGet $config($paddock,watBal).ll15_dep()]]

             set eswOK [expr $esw >= [esw_amount]]

             if {"[sow_tractor]" != "none"} {
               set machOK [machineryAvailable tractor=[sow_tractor],implement=[sow_implement]]
             } else {
               set machOK 1
             }

             return [expr $dateOK && $rainOK && $eswOK]
          }

          # Plant a crop now
          proc sow_[state] {paddock} {
             global config

             apsimSendMessage .masterpm.$paddock.[crop] sow \
                     {plants [plants]} {sowing_depth [sowing_depth]} \
                     {cultivar [cultivar]} {row_spacing [row_spacing]} \
                     {skiprow [skiprow]}

             if {"[sow_tractor]" != "none"} {
               # machinery operation
               apsimSendMessage economics operate \
                             "area $config($paddock,area)" \
                             "tractor [sow_tractor]"\
                             "implement [sow_implement]"\
                             "paddock $paddock"\
                             "costtype incrop_cost"
             }

             # Sowing costs
             apsimSendMessage economics expenditure \
                             "cost [expr [sowing_costs] * $config($paddock,area)]" \
                             "paddock $paddock" \
                             "costtype incrop_cost" \
                             [list comment "Sowing costs for [state] in $paddock"]
          }

          proc [state]Finished {paddock} {
             if {[apsimGet .masterpm.$paddock.[crop].StageName] == "harvest_ripe" ||
                 [apsimGet .masterpm.$paddock.[crop].plant_status] == "dead"} {
                return 1
             }
             return 0
          }

          proc finish[state] {paddock} {

            apsimSendMessage .masterpm.$paddock.[crop] kill_crop
            apsimSendMessage .masterpm.$paddock.[crop] end_crop
          }

          proc [state]IsPlanted {paddock} {
             set status [apsimGetOptional .masterpm.$paddock.[crop].plant_status]
             return [string match "$status" "alive"]
          }
        rule CQ baseline Oats Sowing Rule.out - Sowing rule - initialisation
          on init:
```
# Support procedures
# Can we plant a crop today?
proc canPlant_Oats {paddock} {
   global config rainList
   
   if {"yes" == "yes" && [dateIs 15-jun ]} {return 1}

   set dateOK [dateWithin 15-mar 15-jun ]

   set rainOK [expr [sumLastRain 3] >= 25]

   set esw [expr [apsimGet $config($paddock,watBal).sw_dep()] - \
                 [apsimGet $config($paddock,watBal).ll15_dep()]]

   set eswOK [expr $esw >= 60]

   if {"none" != "none"} {
     set machOK [machineryAvailable tractor=none,implement=none]
   } else {
     set machOK 1
   }
 
   return [expr $dateOK && $rainOK && $eswOK]
}

# Plant a crop now
proc sow_Oats {paddock} {
   global config

   apsimSendMessage .masterpm.$paddock.oats sow \
           {plants 100} {sowing_depth 30} \
           {cultivar Coolibah} {row_spacing 250} \
           {skiprow 0} 

   if {"none" != "none"} {
     # machinery operation
     apsimSendMessage economics operate \
                   "area $config($paddock,area)" \
                   "tractor none"\
                   "implement none"\
                   "paddock $paddock"\
                   "costtype incrop_cost"
   }

   # Sowing costs
   apsimSendMessage economics expenditure \
                   "cost [expr 190.0 * $config($paddock,area)]" \
                   "paddock $paddock" \
                   "costtype incrop_cost" \
                   [list comment "Sowing costs for Oats in $paddock"]
}


proc OatsFinished {paddock} {
   if {[apsimGet .masterpm.$paddock.oats.StageName] == "harvest_ripe" ||
       [apsimGet .masterpm.$paddock.oats.plant_status] == "dead"} {
      return 1
   }
   return 0
}

proc finishOats {paddock} {

  apsimSendMessage .masterpm.$paddock.oats kill_crop
  apsimSendMessage .masterpm.$paddock.oats end_crop
}

proc OatsIsPlanted {paddock} {
   set status [apsimGetOptional .masterpm.$paddock.oats.plant_status]
   return [string match "$status" "alive"]
}
```
    soil Kilmore 90: Region=Central Queensland; LocalName=Open Downs; SoilType=Black Vertosol; NearestTown=Capella, Q 4702; Comment=Data provided by D. Lack (oc and ph not measured); NaturalVegetation=Qld. Bluegrass, Mountain Coolibah; site=Capella; Cona=3.5; DiffusConst=40; DiffusSlope=16; U=6; Salb=0.13; Cn2Bare=73; CnRed=20; CnCov=0.8; CnCanopyFact=1; RootCn=40; RootWt=200; SoilCn=12.5; EnrACoeff=7.4; EnrBCoeff=0.2
      profile
        layer:
          thickness  bd    ll15  airdry  dul   sat   sw        swcon  fbiom  finert  no3    nh4    oc     ph  ll Wheat  kl Wheat  xf Wheat  ll sorghum  kl sorghum  xf sorghum  ll maize  kl maize  xf maize  ll Chickpea  kl Chickpea  xf Chickpea  ll weed  kl weed  xf weed  ll pigeonp  kl pigeonp  xf pigeonp  ll SweetSorghum  kl SweetSorghum  xf SweetSorghum  ll oats  kl oats  xf oats
          150        1.36  0.2   0.125   0.4   0.45  9999.990  0.300  0.030  0.400   6.500  0.600  1.240  7   0.25      0.1       1         0.25        0.1         1           0.25      0.1       1         0.25         0.1          1            0.25     0.1      1        0.2         0.06        1           0.2              0.06             1                0.2      0.06     1
          150        1.41  0.24  0.15    0.38  0.43  9999.990  0.300  0.020  0.600   2.100  0.100  1.240  7   0.26      0.1       1         0.26        0.1         1           0.26      0.1       1         0.26         0.1          1            0.26     0.1      1        0.24        0.06        1           0.24             0.06             1                0.24     0.06     1
          300        1.39  0.24  0.17    0.39  0.47  9999.990  0.300  0.010  0.800   2.100  0.100  1.250  7   0.28      0.08      1         0.28        0.08        1           0.28      0.08      1         0.28         0.08         1            0.28     0.08     1        0.24        0.06        1           0.24             0.06             1                0.24     0.06     1
          300        1.35  0.24  0.2     0.41  0.46  9999.990  0.300  0.010  0.900   1.700  0.100  1.100  7   0.3       0.06      1         0.3         0.08        1           0.3       0.08      1         0.3          0.06         1            0.3      0.06     1        0.24        0.06        1           0.24             0.06             1                0.24     0.06     1
      InitWater
        PercentMethod: Percent=0.93; Distributed=Evenly distributed
      InitNitrogen
        profile
          layer:
            no3    nh4    thickness
            6.500  0.600  150
            2.100  0.100  150
            2.100  0.100  300
            1.700  0.100  300
            1.700  0.100  300
            1.700  0.100  300
    soil Kilmore 120: Region=Central Queensland; LocalName=Open Downs; SoilType=Black Vertosol; NearestTown=Capella, Q 4702; Comment=Data provided by D. Lack (oc and ph not measured); NaturalVegetation=Qld. Bluegrass, Mountain Coolibah; site=Capella; Cona=3.5; DiffusConst=40; DiffusSlope=16; U=6; Salb=0.13; Cn2Bare=73; CnRed=20; CnCov=0.8; CnCanopyFact=1; RootCn=40; RootWt=200; SoilCn=12.5; EnrACoeff=7.4; EnrBCoeff=0.2
      profile
        layer:
          thickness  bd     ll15   airdry  dul    sat    sw        swcon  fbiom  finert  no3    nh4    oc     ph  ll Wheat  kl Wheat  xf Wheat  ll sorghum  kl sorghum  xf sorghum  ll maize  kl maize  xf maize  ll Chickpea  kl Chickpea  xf Chickpea  ll weed  kl weed  xf weed  ll SweetSorghum  kl SweetSorghum  xf SweetSorghum  ll oats  kl oats  xf oats
          150        1.360  0.200  0.125   0.400  0.450  9999.990  0.300  0.030  0.400   6.500  0.600  1.240  7   0.25      0.1       1         0.25        0.1         1           0.25      0.1       1         0.25         0.1          1            0.25     0.1      1        0.2              0.06             1                0.2      0.06     1
          150        1.410  0.240  0.150   0.380  0.430  9999.990  0.300  0.020  0.600   2.100  0.100  1.240  7   0.28      0.1       1         0.28        0.1         1           0.28      0.1       1         0.28         0.1          1            0.28     0.1      1        0.24             0.06             1                0.24     0.06     1
          300        1.390  0.240  0.170   0.390  0.470  9999.990  0.300  0.010  0.800   2.100  0.100  1.250  7   0.3       0.08      1         0.3         0.08        1           0.3       0.08      1         0.3          0.08         1            0.3      0.08     1        0.24             0.06             1                0.24     0.06     1
          300        1.350  0.240  0.200   0.410  0.460  9999.990  0.300  0.010  0.900   1.700  0.100  1.100  7   0.33      0.06      1         0.33        0.08        1           0.33      0.08      1         0.33         0.06         1            0.33     0.06     1        0.24             0.06             1                0.24     0.06     1
          300        1.350  0.240  0.170   0.410  0.450  9999.990  0.300  0.010  0.950   1.700  0.100  0.710  7   0.35      0.04      1         0.35        0.06        1           0.35      0.06      1         0.35         0.04         1            0.35     0.04     1        0.24             0.06             1                0.24     0.06     1
          300        1.350  0.300  0.250   0.400  0.450  9999.990  0.300  0.010  0.950   1.700  0.100  0.340  7   0.35      0.02      1         0.35        0.04        1           0.35      0.04      1         0.35         0.02         1            0.35     0.02     1        0.3              0.06             1                0.3      0.06     1
      InitWater
        PercentMethod: Percent=0.93; Distributed=Evenly distributed
      InitNitrogen: same as Shared.Kilmore 90.InitNitrogen
    soil Kilmore 130: Region=Central Queensland; LocalName=Open Downs; SoilType=Black Vertosol; NearestTown=Capella, Q 4702; Comment=Data provided by D. Lack (oc and ph not measured); NaturalVegetation=Qld. Bluegrass, Mountain Coolibah; site=Capella; Cona=3.5; DiffusConst=40; DiffusSlope=16; U=6; Salb=0.13; Cn2Bare=73; CnRed=20; CnCov=0.8; CnCanopyFact=1; RootCn=40; RootWt=200; SoilCn=12.5; EnrACoeff=7.4; EnrBCoeff=0.2
      profile
        layer:
          thickness  bd     ll15   airdry  dul    sat    sw        swcon  fbiom  finert  no3    nh4    oc     ph  ll Wheat  kl Wheat  xf Wheat  ll sorghum  kl sorghum  xf sorghum  ll maize  kl maize  xf maize  ll Chickpea  kl Chickpea  xf Chickpea  ll weed  kl weed  xf weed  ll SweetSorghum  kl SweetSorghum  xf SweetSorghum  ll oats  kl oats  xf oats
          150        1.360  0.200  0.125   0.400  0.450  9999.990  0.300  0.030  0.400   6.500  0.600  1.240  7   0.25      0.1       1         0.25        0.1         1           0.25      0.1       1         0.25         0.1          1            0.25     0.1      1        0.2              0.06             1                0.2      0.06     1
          150        1.410  0.240  0.150   0.380  0.430  9999.990  0.300  0.020  0.600   2.100  0.100  1.240  7   0.26      0.1       1         0.26        0.1         1           0.26      0.1       1         0.26         0.1          1            0.26     0.1      1        0.24             0.06             1                0.24     0.06     1
          300        1.390  0.240  0.170   0.390  0.470  9999.990  0.300  0.010  0.800   2.100  0.100  1.250  7   0.28      0.08      1         0.28        0.08        1           0.28      0.08      1         0.28         0.08         1            0.28     0.08     1        0.24             0.06             1                0.24     0.06     1
          300        1.350  0.240  0.200   0.410  0.460  9999.990  0.300  0.010  0.900   1.700  0.100  1.100  7   0.33      0.06      1         0.33        0.08        1           0.33      0.08      1         0.33         0.06         1            0.33     0.06     1        0.24             0.06             1                0.24     0.06     1
          300        1.350  0.240  0.170   0.410  0.450  9999.990  0.300  0.010  0.950   1.700  0.100  0.710  7   0.35      0.04      1         0.35        0.06        1           0.35      0.06      1         0.35         0.04         1            0.35     0.04     1        0.24             0.06             1                0.24     0.06     1
          300        1.350  0.300  0.250   0.400  0.450  9999.990  0.300  0.010  0.950   1.700  0.100  0.340  7   0.35      0.02      1         0.35        0.04        1           0.35      0.04      1         0.35         0.02         1            0.35     0.02     1        0.3              0.06             1                0.3      0.06     1
      InitWater
        PercentMethod: Percent=0.93; Distributed=Evenly distributed
      InitNitrogen: same as Shared.Kilmore 90.InitNitrogen
    soil Kilmore 140: Region=Central Queensland; LocalName=Open Downs; SoilType=Black Vertosol; NearestTown=Capella, Q 4702; Comment=Data provided by D. Lack (oc and ph not measured); NaturalVegetation=Qld. Bluegrass, Mountain Coolibah; site=Capella; Cona=3.5; DiffusConst=40; DiffusSlope=16; U=6; Salb=0.13; Cn2Bare=73; CnRed=20; CnCov=0.8; CnCanopyFact=1; RootCn=40; RootWt=200; SoilCn=12.5; EnrACoeff=7.4; EnrBCoeff=0.2
      profile
        layer:
          thickness  bd     ll15   airdry  dul    sat    sw        swcon  fbiom  finert  no3    nh4    oc     ph  ll Wheat  kl Wheat  xf Wheat  ll sorghum  kl sorghum  xf sorghum  ll maize  kl maize  xf maize  ll Chickpea  kl Chickpea  xf Chickpea  ll weed  kl weed  xf weed  ll SweetSorghum  kl SweetSorghum  xf SweetSorghum  ll oats  kl oats  xf oats
          150        1.360  0.200  0.125   0.400  0.450  9999.990  0.300  0.030  0.400   6.500  0.600  1.240  7   0.25      0.1       1         0.25        0.1         1           0.25      0.1       1         0.25         0.1          1            0.25     0.1      1        0.2              0.06             1                0.2      0.06     1
          150        1.410  0.240  0.150   0.380  0.430  9999.990  0.300  0.020  0.600   2.100  0.100  1.240  7   0.26      0.1       1         0.26        0.1         1           0.26      0.1       1         0.26         0.1          1            0.26     0.1      1        0.24             0.06             1                0.24     0.06     1
          300        1.390  0.240  0.170   0.390  0.470  9999.990  0.300  0.010  0.800   2.100  0.100  1.250  7   0.28      0.08      1         0.28        0.08        1           0.28      0.08      1         0.28         0.08         1            0.28     0.08     1        0.24             0.06             1                0.24     0.06     1
          300        1.350  0.240  0.200   0.410  0.460  9999.990  0.300  0.010  0.900   1.700  0.100  1.100  7   0.3       0.06      1         0.3         0.08        1           0.3       0.08      1         0.3          0.06         1            0.3      0.06     1        0.24             0.06             1                0.24     0.06     1
          300        1.350  0.240  0.170   0.410  0.450  9999.990  0.300  0.010  0.950   1.700  0.100  0.710  7   0.34      0.04      1         0.34        0.06        1           0.34      0.06      1         0.34         0.04         1            0.34     0.04     1        0.24             0.06             1                0.24     0.06     1
          300        1.350  0.300  0.250   0.400  0.450  9999.990  0.300  0.010  0.950   1.700  0.100  0.340  7   0.35      0.02      1         0.35        0.04        1           0.35      0.04      1         0.35         0.02         1            0.35     0.02     1        0.3              0.06             1                0.3      0.06     1
      InitWater
        PercentMethod: Percent=0.93; Distributed=Evenly distributed
      InitNitrogen: same as Shared.Kilmore 90.InitNitrogen
    soil Kilmore 150: Region=Central Queensland; LocalName=Open Downs; SoilType=Black Vertosol; NearestTown=Capella, Q 4702; Comment=Data provided by D. Lack (oc and ph not measured); NaturalVegetation=Qld. Bluegrass, Mountain Coolibah; site=Capella; Cona=3.5; DiffusConst=40; DiffusSlope=16; U=6; Salb=0.13; Cn2Bare=73; CnRed=20; CnCov=0.8; CnCanopyFact=1; RootCn=40; RootWt=200; SoilCn=12.5; EnrACoeff=7.4; EnrBCoeff=0.2
      profile
        layer:
          thickness  bd     ll15   airdry  dul    sat    sw        swcon  fbiom  finert  no3    nh4    oc     ph  ll Wheat  kl Wheat  xf Wheat  ll sorghum  kl sorghum  xf sorghum  ll maize  kl maize  xf maize  ll Chickpea  kl Chickpea  xf Chickpea  ll weed  kl weed  xf weed  ll pigeonp  kl pigeonp  xf pigeonp  ll SweetSorghum  kl SweetSorghum  xf SweetSorghum  ll oats  kl oats  xf oats
          150        1.360  0.200  0.125   0.400  0.450  9999.990  0.300  0.030  0.400   6.500  0.600  1.240  7   0.25      0.1       1         0.25        0.1         1           0.25      0.1       1         0.25         0.1          1            0.25     0.1      1        0.2         0.06        1           0.2              0.06             1                0.2      0.06     1
          150        1.410  0.240  0.150   0.380  0.430  9999.990  0.300  0.020  0.600   2.100  0.100  1.240  7   0.26      0.1       1         0.26        0.1         1           0.26      0.1       1         0.26         0.1          1            0.26     0.1      1        0.24        0.06        1           0.24             0.06             1                0.24     0.06     1
          300        1.390  0.240  0.170   0.390  0.470  9999.990  0.300  0.010  0.800   2.100  0.100  1.250  7   0.28      0.08      1         0.28        0.08        1           0.28      0.08      1         0.28         0.08         1            0.28     0.08     1        0.24        0.06        1           0.24             0.06             1                0.24     0.06     1
          300        1.350  0.240  0.200   0.410  0.460  9999.990  0.300  0.010  0.900   1.700  0.100  1.100  7   0.3       0.06      1         0.3         0.08        1           0.3       0.08      1         0.3          0.06         1            0.3      0.06     1        0.24        0.06        1           0.24             0.06             1                0.24     0.06     1
          300        1.350  0.240  0.170   0.410  0.450  9999.990  0.300  0.010  0.950   1.700  0.100  0.710  7   0.33      0.04      1         0.33        0.06        1           0.33      0.06      1         0.33         0.04         1            0.33     0.04     1        0.24        0.06        1           0.24             0.06             1                0.24     0.06     1
          300        1.350  0.300  0.250   0.400  0.450  9999.990  0.300  0.010  0.950   1.700  0.100  0.340  7   0.33      0.02      1         0.33        0.04        1           0.33      0.04      1         0.33         0.02         1            0.33     0.02     1        0.3         0.06        1           0.3              0.06             1                0.3      0.06     1
      InitWater
        PercentMethod: Percent=0.93; Distributed=Evenly distributed
      InitNitrogen: same as Shared.Kilmore 90.InitNitrogen
    graz animal
      intake_util_intercept = 1  # Intercept in intake and utilization eqn (p142)
      intake_util_slope = -0.3  # Slope in intake and utilization eqn (p143)
      yld_eat_restr = 300  # Yield at which intake restriction no longer applies (p144)
      summer_lwg = 70  # Expected summer lwg @ low SR (p145)
      autumn_lwg = 35  # Expected autumn lwg @ low SR (p146)
      winter_lwg = 10  # Expected winter lwg @ low SR (p147)
      spring_lwg = 35  # Expected spring lwg @ low SR (p148)
      leaf_diet = 0.85  # Proportion of leaf in diet (p132/100)
      std_alw = 200
      metabol_expon = 0.75
      acc_eaten_reset = 335  # Day to reset eaten accumulator
      prop_can_eat = 1
      allow_supplements = 0
    wheat
    chickpea
    sorghum
    SweetSorghum
    oats
    surfaceom surface organic matter
      PoolName = wheat_stubble  # Organic Matter pool name
      type = wheat  # Organic Matter type
      mass = 1000  # Initial surface residue (kg/ha)
      cnr = 80  # C:N ration of initial residue
      standing_fraction = 0  # Fraction of residue standing
    fertiliser
  simulation CQ baseline
    tclmanager Farm Manager
      RotPlot GrainCrops Management
        rotnode Rotations: uiscript=source $apsuite/UserInterface/APSFarm/RotationsUI.tcl; canvas_height=325; rules_height=50; graph_name=GrainCrops
          node Chickpea: desc=New state
          node Wheat: desc=yyy
          node Sorghum: desc=New state
          node Fallow: desc=yyy
          node earlySorghum: desc=New state
          arc arc11: source=Wheat; target=Fallow; actions=harvestAndEndCrop $paddock Wheat; rules=[canHarvestCrop $paddock Wheat]
          arc arc2: source=Fallow; target=earlySorghum
            actions=sowCrop $paddock earlySorghum; lappend history($paddock) sorghum
            rules=[[dayWithin 320 365], [expr [sumLastRain 4] > 20 && [sumLastRain 1] == 0], $daysSinceLastHarvest($paddock) >60, [machineryAvailable tractor=tractor_1,implement=planter], [getEsw $paddock] >110, [areaPlanted sorghum] <0.1, [getEsw $paddock], [sorghumHistory $paddock]]
          arc arc12: source=Fallow; target=Chickpea
            actions=sowCrop $paddock Chickpea; lappend history($paddock) chickpea
            rules=[[dayWithin 105 189], [expr [sumLastRain 1] == 0], [getMSeek2 $paddock] > 0.7, $daysSinceLastHarvest($paddock) >60, [machineryAvailable tractor=tractor_1,implement=planter], [getEsw $paddock] >120, [areaPlanted chickpea] <0.3, [getCover $paddock] > 0.3, [getEsw $paddock], [chickpeaHistory $paddock]]
          arc arc3: source=earlySorghum; target=Fallow; actions=harvestAndEndCrop $paddock earlySorghum; rules=[canHarvestCrop $paddock earlySorghum]
          arc arc0: source=Fallow; target=earlySorghum
            actions=sowCrop $paddock earlySorghum; lappend history($paddock) sorghum
            rules=[[dayWithin 320 365], [expr [sumLastRain 4] > 20 && [sumLastRain 1] == 0], $daysSinceLastHarvest($paddock) >60, [machineryAvailable tractor=tractor_1,implement=planter], [getEsw $paddock] >110, [areaPlanted sorghum] <0.1, [getEsw $paddock]]
          arc arc13: source=Chickpea; target=Fallow; actions=harvestAndEndCrop $paddock Chickpea; rules=[canHarvestCrop $paddock Chickpea]
          arc arc4: source=Fallow; target=Sorghum; actions=sowCrop $paddock Sorghum; lappend history($paddock) sorghum
            rules=[[dayWithin 1 46], [expr [sumLastRain 4] > 20 && [sumLastRain 1] == 0], $daysSinceLastHarvest($paddock) >60, [machineryAvailable tractor=tractor_1,implement=planter], [getEsw $paddock] >100, [areaPlanted sorghum] <0.8, [getEsw $paddock], [sorghumHistory $paddock]]
          arc arc5: source=Sorghum; target=Fallow; actions=harvestAndEndCrop $paddock Sorghum; rules=[canHarvestCrop $paddock Sorghum]
          arc arc10: source=Fallow; target=Wheat; actions=sowCrop $paddock Wheat; lappend history($paddock) wheat
            rules=[[dayWithin 97 189], [expr [sumLastRain 4] >20 && [sumLastRain 1] == 0], $daysSinceLastHarvest($paddock) >60, [machineryAvailable tractor=tractor_1,implement=planter], [getEsw $paddock] > 110, [areaPlanted wheat] <0.8, [getEsw $paddock], [wheatHistory $paddock]]
          paddock toplevel: isManaged=0
          paddock p1: isManaged=1; initialState=Fallow
          paddock p2: isManaged=1; initialState=Fallow
          paddock p3: isManaged=1; initialState=Fallow
          paddock p4: isManaged=1; initialState=Fallow
          paddock p5: isManaged=1; initialState=Fallow
          paddock p6: isManaged=1; initialState=Fallow
          paddock p7: isManaged=1; initialState=Fallow
          paddock p8: isManaged=1; initialState=Fallow
          paddock p9: isManaged=1; initialState=Fallow
          paddock p10: isManaged=0
          paddock p11: isManaged=0
          paddock p12: isManaged=0
          paddock p20: isManaged=0
          paddock p13: isManaged=0
          paddock p14: isManaged=0
          paddock p17: isManaged=0
          paddock p15: isManaged=0
          paddock p16: isManaged=0
          paddock p18: isManaged=0
          paddock p19: isManaged=0
          rule Rotations Init rule
            on init:
```
package require struct
::struct::graph GrainCrops
GrainCrops node insert "Chickpea"
set colour(Chickpea) "pink"
GrainCrops node insert "Wheat"
set colour(Wheat) "green"
GrainCrops node insert "Sorghum"
set colour(Sorghum) "lightblue"
GrainCrops node insert "Fallow"
set colour(Fallow) "white"
GrainCrops node insert "earlySorghum"
set colour(earlySorghum) "lightblue"
GrainCrops arc insert "Wheat" "Fallow" "arc11"
GrainCrops arc lappend "arc11" actions {harvestAndEndCrop $paddock Wheat}
GrainCrops arc lappend "arc11" rules {[canHarvestCrop $paddock Wheat]}
GrainCrops arc lappend "arc11" actions {}
GrainCrops arc insert "Fallow" "earlySorghum" "arc2"
GrainCrops arc lappend "arc2" actions {sowCrop $paddock earlySorghum; lappend history($paddock) sorghum}
GrainCrops arc lappend "arc2" rules {[dayWithin 320 365]}
GrainCrops arc lappend "arc2" rules {[expr [sumLastRain 4] > 20 && [sumLastRain 1] == 0]}
GrainCrops arc lappend "arc2" rules {$daysSinceLastHarvest($paddock) >60}
GrainCrops arc lappend "arc2" rules {[machineryAvailable tractor=tractor_1,implement=planter]}
GrainCrops arc lappend "arc2" rules {[getEsw $paddock] >110}
GrainCrops arc lappend "arc2" rules {[areaPlanted sorghum] <0.1}
GrainCrops arc lappend "arc2" rules {[getEsw $paddock]}
GrainCrops arc lappend "arc2" rules {[sorghumHistory $paddock]}
GrainCrops arc lappend "arc2" actions {}
GrainCrops arc insert "Fallow" "Chickpea" "arc12"
GrainCrops arc lappend "arc12" actions {sowCrop $paddock Chickpea; lappend history($paddock) chickpea}
GrainCrops arc lappend "arc12" rules {[dayWithin 105 189]}
GrainCrops arc lappend "arc12" rules {[expr [sumLastRain 1] == 0]}
GrainCrops arc lappend "arc12" rules {[getMSeek2 $paddock] > 0.7}
GrainCrops arc lappend "arc12" rules {$daysSinceLastHarvest($paddock) >60}
GrainCrops arc lappend "arc12" rules {[machineryAvailable tractor=tractor_1,implement=planter]}
GrainCrops arc lappend "arc12" rules {[getEsw $paddock] >120}
GrainCrops arc lappend "arc12" rules {[areaPlanted chickpea] <0.3}
GrainCrops arc lappend "arc12" rules {[getCover $paddock] > 0.3}
GrainCrops arc lappend "arc12" rules {[getEsw $paddock]}
GrainCrops arc lappend "arc12" rules {[chickpeaHistory $paddock]}
GrainCrops arc lappend "arc12" actions {}
GrainCrops arc insert "earlySorghum" "Fallow" "arc3"
GrainCrops arc lappend "arc3" actions {harvestAndEndCrop $paddock earlySorghum}
GrainCrops arc lappend "arc3" rules {[canHarvestCrop $paddock earlySorghum]}
GrainCrops arc lappend "arc3" actions {}
GrainCrops arc insert "Fallow" "earlySorghum" "arc0"
GrainCrops arc lappend "arc0" actions {sowCrop $paddock earlySorghum; lappend history($paddock) sorghum}
GrainCrops arc lappend "arc0" rules {[dayWithin 320 365]}
GrainCrops arc lappend "arc0" rules {[expr [sumLastRain 4] > 20 && [sumLastRain 1] == 0]}
GrainCrops arc lappend "arc0" rules {$daysSinceLastHarvest($paddock) >60}
GrainCrops arc lappend "arc0" rules {[machineryAvailable tractor=tractor_1,implement=planter]}
GrainCrops arc lappend "arc0" rules {[getEsw $paddock] >110}
GrainCrops arc lappend "arc0" rules {[areaPlanted sorghum] <0.1}
GrainCrops arc lappend "arc0" rules {[getEsw $paddock]}
GrainCrops arc lappend "arc0" actions {}
GrainCrops arc insert "Chickpea" "Fallow" "arc13"
GrainCrops arc lappend "arc13" actions {harvestAndEndCrop $paddock Chickpea}
GrainCrops arc lappend "arc13" rules {[canHarvestCrop $paddock Chickpea]}
GrainCrops arc lappend "arc13" actions {}
GrainCrops arc insert "Fallow" "Sorghum" "arc4"
GrainCrops arc lappend "arc4" actions {sowCrop $paddock Sorghum; lappend history($paddock) sorghum}
GrainCrops arc lappend "arc4" rules {[dayWithin 1 46]}
GrainCrops arc lappend "arc4" rules {[expr [sumLastRain 4] > 20 && [sumLastRain 1] == 0]}
GrainCrops arc lappend "arc4" rules {$daysSinceLastHarvest($paddock) >60}
GrainCrops arc lappend "arc4" rules {[machineryAvailable tractor=tractor_1,implement=planter]}
GrainCrops arc lappend "arc4" rules {[getEsw $paddock] >100}
GrainCrops arc lappend "arc4" rules {[areaPlanted sorghum] <0.8}
GrainCrops arc lappend "arc4" rules {[getEsw $paddock]}
GrainCrops arc lappend "arc4" rules {[sorghumHistory $paddock]}
GrainCrops arc lappend "arc4" actions {}
GrainCrops arc insert "Sorghum" "Fallow" "arc5"
GrainCrops arc lappend "arc5" actions {harvestAndEndCrop $paddock Sorghum}
GrainCrops arc lappend "arc5" rules {[canHarvestCrop $paddock Sorghum]}
GrainCrops arc lappend "arc5" actions {}
GrainCrops arc insert "Fallow" "Wheat" "arc10"
GrainCrops arc lappend "arc10" actions {sowCrop $paddock Wheat; lappend history($paddock) wheat}
GrainCrops arc lappend "arc10" rules {[dayWithin 97 189]}
GrainCrops arc lappend "arc10" rules {[expr [sumLastRain 4] >20 && [sumLastRain 1] == 0]}
GrainCrops arc lappend "arc10" rules {$daysSinceLastHarvest($paddock) >60}
GrainCrops arc lappend "arc10" rules {[machineryAvailable tractor=tractor_1,implement=planter]}
GrainCrops arc lappend "arc10" rules {[getEsw $paddock] > 110}
GrainCrops arc lappend "arc10" rules {[areaPlanted wheat] <0.8}
GrainCrops arc lappend "arc10" rules {[getEsw $paddock]}
GrainCrops arc lappend "arc10" rules {[wheatHistory $paddock]}
GrainCrops arc lappend "arc10" actions {}
if {[info exists config(p1,graphNames)]} {lappend config(p1,graphNames) GrainCrops} else {set config(p1,graphNames) GrainCrops}
set config(p1,initialState) "Fallow"
if {[info exists config(p2,graphNames)]} {lappend config(p2,graphNames) GrainCrops} else {set config(p2,graphNames) GrainCrops}
set config(p2,initialState) "Fallow"
if {[info exists config(p3,graphNames)]} {lappend config(p3,graphNames) GrainCrops} else {set config(p3,graphNames) GrainCrops}
set config(p3,initialState) "Fallow"
if {[info exists config(p4,graphNames)]} {lappend config(p4,graphNames) GrainCrops} else {set config(p4,graphNames) GrainCrops}
set config(p4,initialState) "Fallow"
if {[info exists config(p5,graphNames)]} {lappend config(p5,graphNames) GrainCrops} else {set config(p5,graphNames) GrainCrops}
set config(p5,initialState) "Fallow"
if {[info exists config(p6,graphNames)]} {lappend config(p6,graphNames) GrainCrops} else {set config(p6,graphNames) GrainCrops}
set config(p6,initialState) "Fallow"
if {[info exists config(p7,graphNames)]} {lappend config(p7,graphNames) GrainCrops} else {set config(p7,graphNames) GrainCrops}
set config(p7,initialState) "Fallow"
if {[info exists config(p8,graphNames)]} {lappend config(p8,graphNames) GrainCrops} else {set config(p8,graphNames) GrainCrops}
set config(p8,initialState) "Fallow"
if {[info exists config(p9,graphNames)]} {lappend config(p9,graphNames) GrainCrops} else {set config(p9,graphNames) GrainCrops}
set config(p9,initialState) "Fallow"
```
      RotPlot Oats Management
        rotnode Rotations: uiscript=source $apsuite/UserInterface/APSFarm/RotationsUI.tcl; canvas_height=632; rules_height=40; graph_name=ForageOats
          node Fallow: desc=New state
          node Oats: desc=Weaners on oats
          arc arc0: source=Fallow; target=Oats; actions=sow_Oats $paddock; rules=[canPlant_Oats $paddock]
          arc arc1: source=Oats; target=Fallow; actions=finishOats $paddock; rules=[OatsFinished $paddock]
          paddock toplevel: isManaged=0
          paddock p1: isManaged=0
          paddock p2: isManaged=0
          paddock p3: isManaged=0
          paddock p4: isManaged=0
          paddock p5: isManaged=0
          paddock p6: isManaged=0
          paddock p7: isManaged=0
          paddock p8: isManaged=0
          paddock p9: isManaged=0
          paddock p10: isManaged=1; initialState=Fallow
          paddock p11: isManaged=0
          paddock p12: isManaged=0
          paddock p20: isManaged=1; initialState=Fallow
          paddock p13: isManaged=0
          paddock p14: isManaged=0
          paddock p17: isManaged=0
          paddock p15: isManaged=0
          paddock p16: isManaged=0
          paddock p18: isManaged=0
          paddock p19: isManaged=0
          rule Rotations Init rule
            on init:
```
package require struct
::struct::graph ForageOats
ForageOats node insert "Fallow"
set colour(Fallow) "white"
ForageOats node insert "Oats"
set colour(Oats) "brown"
ForageOats arc insert "Fallow" "Oats" "arc0"
ForageOats arc lappend "arc0" actions {sow_Oats $paddock}
ForageOats arc lappend "arc0" rules {[canPlant_Oats $paddock]}
ForageOats arc lappend "arc0" actions {}
ForageOats arc insert "Oats" "Fallow" "arc1"
ForageOats arc lappend "arc1" actions {finishOats $paddock}
ForageOats arc lappend "arc1" rules {[OatsFinished $paddock]}
ForageOats arc lappend "arc1" actions {}
if {[info exists config(p10,graphNames)]} {lappend config(p10,graphNames) ForageOats} else {set config(p10,graphNames) ForageOats}
set config(p10,initialState) "Fallow"
if {[info exists config(p20,graphNames)]} {lappend config(p20,graphNames) ForageOats} else {set config(p20,graphNames) ForageOats}
set config(p20,initialState) "Fallow"
```
      RotPlot Sorghum Management
        rotnode Rotations: uiscript=source $apsuite/UserInterface/APSFarm/RotationsUI.tcl; canvas_height=630; rules_height=40; graph_name=ForageSorghum
          node Fallow: desc=New state
          node Sorg: desc=No description
          arc arc0: source=Fallow; target=Sorg; actions=sow_ForageSorghum $paddock; rules=[canPlant_ForageSorghum $paddock]
          arc arc1: source=Sorg; target=Fallow; actions=finishForageSorghum $paddock; rules=[ForageSorghumFinished $paddock]
          paddock toplevel: isManaged=0
          paddock p1: isManaged=0
          paddock p2: isManaged=0
          paddock p3: isManaged=0
          paddock p4: isManaged=0
          paddock p5: isManaged=0
          paddock p6: isManaged=0
          paddock p7: isManaged=0
          paddock p8: isManaged=0
          paddock p9: isManaged=0
          paddock p10: isManaged=0
          paddock p11: isManaged=0
          paddock p12: isManaged=0
          paddock p20: isManaged=0
          paddock p13: isManaged=0
          paddock p14: isManaged=0
          paddock p17: isManaged=0
          paddock p15: isManaged=0
          paddock p16: isManaged=1; initialState=Fallow
          paddock p18: isManaged=1; initialState=Fallow
          paddock p19: isManaged=1; initialState=Fallow
          rule Rotations Init rule
            on init:
```
package require struct
::struct::graph ForageSorghum
ForageSorghum node insert "Fallow"
set colour(Fallow) "white"
ForageSorghum node insert "Sorg"
set colour(Sorg) "Green"
ForageSorghum arc insert "Fallow" "Sorg" "arc0"
ForageSorghum arc lappend "arc0" actions {sow_ForageSorghum $paddock}
ForageSorghum arc lappend "arc0" rules {[canPlant_ForageSorghum $paddock]}
ForageSorghum arc lappend "arc0" actions {}
ForageSorghum arc insert "Sorg" "Fallow" "arc1"
ForageSorghum arc lappend "arc1" actions {finishForageSorghum $paddock}
ForageSorghum arc lappend "arc1" rules {[ForageSorghumFinished $paddock]}
ForageSorghum arc lappend "arc1" actions {}
if {[info exists config(p16,graphNames)]} {lappend config(p16,graphNames) ForageSorghum} else {set config(p16,graphNames) ForageSorghum}
set config(p16,initialState) "Fallow"
if {[info exists config(p18,graphNames)]} {lappend config(p18,graphNames) ForageSorghum} else {set config(p18,graphNames) ForageSorghum}
set config(p18,initialState) "Fallow"
if {[info exists config(p19,graphNames)]} {lappend config(p19,graphNames) ForageSorghum} else {set config(p19,graphNames) ForageSorghum}
set config(p19,initialState) "Fallow"
```
      rule Animal Management: same as Shared.Farm Manager.Animal Management
      rule Structural
        on init:
```
# Initialisation for Kilmore
set simName "CQ baseline"

set paddocks [list toplevel p1 p2 p3 p4 p5 p6 p7 p8 p9 p10 p11 p20 p12 p13 p14 p17 p16 p18 p19]
set config(cropPaddocks)    [list p1 p2 p3 p4 p5 p6 p7 p8 p9 ]
set config(pasturePaddocks) [list p13 p14 p17 p11 p12 ]
set config(foragePaddocks)  [list p10 p20 p16 p18 p19 ]

set config(p1,graphNames)  GrainCrops
set config(p2,graphNames)  GrainCrops
set config(p3,graphNames)  GrainCrops
set config(p4,graphNames)  GrainCrops
set config(p5,graphNames)  GrainCrops
set config(p6,graphNames)  GrainCrops
set config(p7,graphNames)  GrainCrops
set config(p8,graphNames)  GrainCrops
set config(p9,graphNames)  GrainCrops
set config(p10,graphNames) ForageOats
set config(p11,graphNames) {} ;# buffel
set config(p12,graphNames) {} ;# bfp
set config(p13,graphNames) {} ;# buffel
set config(p14,graphNames) {} ;#  ppg
#                              p15 is the bull paddock
set config(p16,graphNames) ForageSorghum  
set config(p17,graphNames) {} ;# leucaena
set config(p18,graphNames) ForageSorghum
set config(p19,graphNames) ForageSorghum
set config(p20,graphNames) ForageOats
set config(toplevel,graphNames) {} ;# StockMgt

set config(p1,area)     238.0
set config(p1,initialState)  Fallow
set config(p1,history)  {sorghum sorghum}
set config(p1,daysSinceLastHarvest) 365              ;# A long time

set config(p2,area)     238.0
set config(p2,initialState)  Fallow
set config(p2,history)  {wheat sorghum}
set config(p2,daysSinceLastHarvest) 365

set config(p3,area)     238.0                          ;# Area
set config(p3,initialState)  Fallow
set config(p3,history)  {wheat wheat}
set config(p3,daysSinceLastHarvest) 365

set config(p4,area)     238.0                          ;# Area
set config(p4,initialState)  Fallow
set config(p4,history)  {wheat sorghum}
set config(p4,daysSinceLastHarvest) 365

set config(p5,area)     238.0                          ;# Area
set config(p5,initialState)  Fallow
set config(p5,history)  {sorghum sorghum}
set config(p5,daysSinceLastHarvest) 365

set config(p6,area)     238.0                          ;# Area
set config(p6,initialState)  Fallow
set config(p6,history)  {sorghum sorghum}
set config(p6,daysSinceLastHarvest) 365

set config(p7,area)     238.0                          ;# Area
set config(p7,initialState)  Fallow
set config(p7,history)  {wheat sorghum}
set config(p7,daysSinceLastHarvest) 365

set config(p8,area)     238.0                          ;# Area
set config(p8,initialState)  Fallow
set config(p8,history)  {wheat wheat}
set config(p8,daysSinceLastHarvest) 365

set config(p9,area)     238.0                          ;# Area
set config(p9,initialState)  Fallow
set config(p9,history)  {wheat sorghum}
set config(p9,daysSinceLastHarvest) 365

set config(p10,area)     65.0                          ;# Area
set config(p10,initialState)  Fallow
set config(p10,history)  {oats}
set config(p10,daysSinceLastHarvest) 365

set config(p20,area)     50.0                          ;# Area
set config(p20,initialState)  Fallow
set config(p20,history)  {oats}
set config(p20,daysSinceLastHarvest) 365

set config(p11,area)      187.0                          ;# Area
set config(p11,initialState)  {}
set config(p11,history)   {}
set config(p11,daysSinceLastHarvest) 365

set config(p12,area)      142.0                          ;# Area
set config(p12,initialState)  Fallow
set config(p12,history)   {}
set config(p12,daysSinceLastHarvest) 365

set config(p17,area)      121.0                          ;# Area
set config(p17,initialState)  {}
set config(p17,history)   {}
set config(p17,daysSinceLastHarvest) 365

set config(p13,area)      150.0                         ;# GUESSED
set config(p13,initialState)  {}
set config(p13,history)   {}
set config(p13,daysSinceLastHarvest) 365

set config(p14,area)      50.0                          ;# GUESSED
set config(p14,initialState)  {}
set config(p14,history)   {}
set config(p14,daysSinceLastHarvest) 365

set config(p16,area)      100.0                          ;# Area
set config(p16,initialState)  Fallow
set config(p16,history)   {}
set config(p16,daysSinceLastHarvest) 365

set config(p18,area)      200.0                          ;# Area
set config(p18,initialState)  Fallow
set config(p18,history)   {}
set config(p18,daysSinceLastHarvest) 365

set config(p19,area)      100.0                          ;# Area
set config(p19,initialState)  Fallow
set config(p19,history)   {}
set config(p19,daysSinceLastHarvest) 365

set config(toplevel,area) 0
set config(toplevel,initialState)  Off
set config(toplevel,history)  {}
set config(toplevel,daysSinceLastHarvest) 0
```
        on start_simulation:
```
apsimSendMessage .masterpm.p11.buffel establish {init_section establishment}
apsimSendMessage .masterpm.p12.buffel establish {init_section establishment}
apsimSendMessage .masterpm.p13.buffel establish {init_section establishment}
apsimSendMessage .masterpm.p17.leucaena establish {init_section establishment}
apsimSendMessage .masterpm.p14.PurplePGrass establish {init_section establishment}
```
      rule Farm logic -> /Simulations/Shared/Farm Manager/Farm logic
      rule Rugplot stuff -> /Simulations/Shared/Farm Manager/Rugplot stuff
      rule Weeds -> /Simulations/Shared/Farm Manager/Weeds
      tclui Forage Sorghum Sowing Rule -> /Simulations/Shared/Farm Manager/Forage Sorghum Sowing Rule
      tclui Oats Sowing Rule -> /Simulations/Shared/Farm Manager/Oats Sowing Rule
    clock
      start_date = 1/7/1975  # Select the start date of the simulation
      end_date = 1/7/1980  # Select the end date of the simulation
    summaryfile: filename=Kilmore.sum
    siloinput met -> /Simulations/Shared/Met Data from Silo
    tclmanager Economics
      rule Initialisation logic
        on init:
```
source $apsuite/UserInterface/APSFarm/Cashbook.tcl
source $apsuite/UserInterface/APSFarm/Machinery.tcl
```
      tclui Initial Capital Assets: uiscript=source $apsuite/UserInterface/APSFarm/CapitalUI.tcl; category=icapital
        icapital: ivalue=0; loanRate=0; loanDuration=0
      tclui Cash Journal: uiscript=source $apsuite/UserInterface/APSFarm/CashbookUI.tcl; balance=42000; outputfilename=CQ baseline.Cashbook.csv; summaryfilename=CQ baseline.Cashbook.Summary.csv
      tclui Machinery - 200kwFWA: uiscript=source $apsuite/UserInterface/APSFarm/MachineryUI.tcl; category=tractor
        tractor tractor_1: fuelrate (lts/hour)=[25.0, 60.0]; workrate (ha/hour)=[100.0, 500.0]; workrate=[20, 10, 15.0, 30.0]; fuelrate=[15, 10, 40.0, 30.0]; hoursperday=[8, 8, 16, 16]; image=$apsuite/UserInterface/APSFarm/choofer.gif; newPrice=150000.0; tradeInValue=15; lifeOfEquipment=3000; insuranceRate=6.2; repairs=30; oil=10; loanInterestRate=0.0; loanDuration=5; age=2
      tclui Machinery - Precision Planter: uiscript=source $apsuite/UserInterface/APSFarm/MachineryUI.tcl; category=implement
        implement planter: image=$apsuite/UserInterface/APSFarm/choofer.gif; newPrice=200000.0; tradeInValue=10; lifeOfEquipment=1500; insuranceRate=2.3; repairs=30; oil=0; loanInterestRate=0.0; loanDuration=4; age=200
      tclui Machinery - Plough: uiscript=source $apsuite/UserInterface/APSFarm/MachineryUI.tcl; category=implement
        implement spray_rig: image=$apsuite/UserInterface/APSFarm/choofer.gif; newPrice=200000.0; tradeInValue=10; lifeOfEquipment=1500; insuranceRate=2.3; repairs=30; oil=0; loanInterestRate=0.0; loanDuration=4; age=200
      tclui Prices: uiscript=source $apsuite/UserInterface/APSFarm/PricesUI.tcl; category=cropprice
        cropprice wheat: price=250.0; protein=12.0; units=$/tonne; updated=13/03/2008
        cropprice sorghum: price=188.0; units=$/tonne; updated=15/10/2007
        cropprice chickpea: price=457.0; units=$/tonne; updated=15/10/2007
        cropprice weed: price=0.0; units=$/tonne; updated=28/11/2006
        cropprice maize: price=66.666; units=$/tonne; updated=15/02/2008
        cropprice beef: price=1.5; units=$/kg; updated=06/06/2008
      tclui Costs - Farm Overheads: uiscript=source $apsuite/UserInterface/APSFarm/OverheadsUI.tcl; category=overhead
        overhead accountancy: value=5000.0; description=Accountant/Consultancy fees
        overhead administration: value=500.0; description=Administration
        overhead bankcharges: value=500.0; description=Bank Charges other than interest
        overhead electricity: value=2000.0; description=Electricity - Farm
        overhead freight: value=0.0; description=Freight & Cartage (sundry)
        overhead fuels: value=10000.0; description=Fuel & Oil (other than farming)
        overhead insurance: value=6000.0; description=Insurance - Farm
        overhead vehicleexpenses: value=5000.0; description=Motor Vehicle Expenses - Farm
        overhead rates: value=3500.0; description=Rates and Rents - Farm
        overhead repairs: value=20000.0; description=Repairs & Maintenance (extra)
        overhead subs: value=1000.0; description=Subscriptions
        overhead telephone: value=2500.0; description=Telephone - Farm
        overhead wages: value=30000.0; description=Wages (other than casual included in activity budgets)
        overhead other: value=0.0; description=Other Overhead Expenses
        overhead operator: value=50000.0; description=Operators labour and management
      tclui Costs - Fuel: uiscript=source $apsuite/UserInterface/APSFarm/TreatmentsUI.tcl; category=fuelcosts
        fuelcosts: desc=Cost of fuel (net); price=0.835; units=$/litre; updated=15/10/2007
      tclui Costs - Fertilisers: uiscript=source $apsuite/UserInterface/APSFarm/TreatmentsUI.tcl; category=fertilisercost
        fertilisercost map: desc=MAP (starterphos - 10n;21.9p;1.5s); price=0.56; units=$/kg; updated=15/10/2007
        fertilisercost starter_z: desc=starter z; price=0.62; units=$/kg; updated=30/03/2004
        fertilisercost urea: desc=Urea; price=0.6; updated=15/10/2007
      tclui Costs - Herbicides: uiscript=source $apsuite/UserInterface/APSFarm/TreatmentsUI.tcl; category=herbicide
        herbicide Ally: desc=Ally (metsulfuron); price=0.2; updated=15/10/2007
        herbicide Amicide625: desc=Amicide 625; price=5.5; updated=15/10/2007
        herbicide Gesagard 500SC: desc=Gesagard 500SC (prometryn); price=14.23; updated=30/03/2004
        herbicide Gesaprim: desc=Gesaprim (atrazine); price=6.23; updated=30/03/2004
        herbicide Glean: desc=Glean (chlorsulfuron); price=0.18
        herbicide Glyphosate 450 CT: desc=Glyphosate 450 CT (glyphosate IPA salt); price=10; updated=15/02/2008
        herbicide MCPA LVE: desc=MCPA LVE (MCPA ester); price=5.0; updated=15/10/2007
        herbicide Roundup: desc=Roundup POWERMAX (glyphosate MEA salt); price=7.64; updated=30/03/2004
        herbicide simazine: desc=Simazine 900DF; price=5.50; updated=15/10/2007
      tclui Costs - Insecticides: uiscript=source $apsuite/UserInterface/APSFarm/TreatmentsUI.tcl; category=insecticide
        insecticide Larvin LV: desc=Larvin LV; price=27.97; updated=15/10/2007
        insecticide Steward: desc=Steward (indoxacarb); price=85.36; updated=15/10/2007
      tclui Costs - Seed: uiscript=source $apsuite/UserInterface/APSFarm/TreatmentsUI.tcl; category=seedcost
        seedcost Barley: desc=Barley (Tallon); price=0.78; updated=30/03/2004
        seedcost Chickpea: desc=Chickpea (Amethyst); price=1.1; updated=15/10/2007
        seedcost Cotton: desc=Cotton; price=5.6; updated=30/03/2004
        seedcost Forage Sorghum: desc=Forage Sorghum (Jumbo); price=3.96; updated=30/03/2004
        seedcost Lucerne: desc=Lucerne (sequel); price=5.45; updated=30/03/2004
        seedcost Maize: desc=Maize; price=8.4; updated=15/10/2007
        seedcost Millet: desc=Millet (White frend); price=1; updated=30/03/2004
        seedcost weed: desc=Millet (weeds); price=1; updated=30/03/2004
        seedcost Mungbean: desc=Mungbean (Emerald); price=1.45; updated=30/03/2004
        seedcost NavyBean: desc=Navy Bean (Spearfeld); price=1.49; updated=30/03/2004
        seedcost PeanutC: desc=Peanut Streeton (20-23 weeks); price=2.91; updated=30/03/2004
        seedcost PeanutS: desc=Peanut Conder (17-19 weeks); price=2.7; updated=30/03/2004
        seedcost PeanutVB: desc=Peanut VB97 (20-23 weeks); price=2.7; updated=30/03/2004
        seedcost PeanutNC7: desc=Peanut NC7 (20-23 weeks); price=2.7; updated=30/03/2004
        seedcost Sorghum: desc=Sorghum (Buster); price=5.8; updated=15/10/2007
        seedcost Soybean: desc=Soybean (Soya791); price=1.31; updated=30/03/2004
        seedcost Sunflower: desc=Sunflower (Sunolei 04); price=11.82; updated=30/03/2004
        seedcost Wheat: desc=Wheat (Kennedy); price=0.9; updated=15/10/2007
        seedcost pigeonp: desc=Pigeon Pea; price=0.5; updated=19/06/2008
      tclui Costs - Defoliants: uiscript=source $apsuite/UserInterface/APSFarm/TreatmentsUI.tcl; category=defoliant
        defoliant dropp: desc=dropp (thidiazuron + diuron); price=147; units=kg
        defoliant salt defoliant: desc=Salt Defoliant; price=1.55; units=kg
      tclui Costs - Contractors: uiscript=source $apsuite/UserInterface/APSFarm/TreatmentsUI.tcl; category=contract
        contract aerial_spraying_cotton_ec: desc=aerial spraying-cotton ec; price=12.5; units=$/ha; updated=20/12/2002
        contract generic: desc=Harvesting; price=250; units=$/ha; updated=15/10/2007
        contract chickpea_scouting: desc=chickpea scouting; price=10; units=$/ha; updated=20/12/2002
    area p1
      wheat -> /Simulations/Shared/wheat
      chickpea -> /Simulations/Shared/chickpea
      sorghum -> /Simulations/Shared/sorghum
      surfaceom surface organic matter -> /Simulations/Shared/surface organic matter
      fertiliser -> /Simulations/Shared/fertiliser
      erosion
        model = freebairn  # Model Name
        slope = 6.5  # Slope of plot in percent (%)
        slope_length = 60  # Length of plot (m)
        k_factor = 0.4  # Soil erodibility factor (t/ha/EI 30 )
        p_factor = 1  # Supporting practise factor (unitless)
        bed_depth = 3500  # Depth to bedrock (mm)
        profile_reduction = off
        profile_layer_merge = 0.05  # Fraction of original size in which the lowest layer is merged into the layer above (0-1)
        minimum_depth = 100  # If the profile erodes to this depth, the simulation is stopped (mm)
      soil -> /Simulations/Shared/Kilmore 120
    area p2
      wheat -> /Simulations/Shared/wheat
      chickpea -> /Simulations/Shared/chickpea
      sorghum -> /Simulations/Shared/sorghum
      surfaceom surface organic matter -> /Simulations/Shared/surface organic matter
      fertiliser -> /Simulations/Shared/fertiliser
      erosion
        model = freebairn  # Model Name
        slope = 6.5  # Slope of plot in percent (%)
        slope_length = 60.0  # Length of plot (m)
        k_factor = 0.4  # Soil erodibility factor (t/ha/EI 30 )
        p_factor = 1.0  # Supporting practise factor (unitless)
        bed_depth = 3500  # Depth to bedrock (mm)
        profile_reduction = off
        profile_layer_merge = 0.05  # Fraction of original size in which the lowest layer is merged into the layer above (0-1)
        minimum_depth = 100.0  # If the profile erodes to this depth, the simulation is stopped (mm)
      soil -> /Simulations/Shared/Kilmore 130
    area p3: same as CQ baseline.p2
    area p4: same as CQ baseline.p2
    area p5
      wheat -> /Simulations/Shared/wheat
      chickpea -> /Simulations/Shared/chickpea
      sorghum -> /Simulations/Shared/sorghum
      surfaceom surface organic matter -> /Simulations/Shared/surface organic matter
      fertiliser -> /Simulations/Shared/fertiliser
      erosion: same as CQ baseline.p2.Erosion
      soil -> /Simulations/Shared/Kilmore 140
    area p6: same as CQ baseline.p5
    area p7: same as CQ baseline.p5
    area p8
      wheat -> /Simulations/Shared/wheat
      chickpea -> /Simulations/Shared/chickpea
      sorghum -> /Simulations/Shared/sorghum
      surfaceom surface organic matter -> /Simulations/Shared/surface organic matter
      fertiliser -> /Simulations/Shared/fertiliser
      erosion: same as CQ baseline.p1.Erosion
      soil -> /Simulations/Shared/Kilmore 150
    area p9
      wheat -> /Simulations/Shared/wheat
      chickpea -> /Simulations/Shared/chickpea
      sorghum -> /Simulations/Shared/sorghum
      surfaceom surface organic matter -> /Simulations/Shared/surface organic matter
      fertiliser -> /Simulations/Shared/fertiliser
      erosion: same as CQ baseline.p2.Erosion
      soil -> /Simulations/Shared/Kilmore 150
    area p10
      surfaceom surface organic matter
        PoolName = wheat_stubble  # Organic Matter pool name
        type = wheat  # Organic Matter type
        mass = 1000  # Initial surface residue (kg/ha)
        cnr = 80  # C:N ration of initial residue
        standing_fraction = 0  # Fraction of residue standing
      erosion: same as CQ baseline.p1.Erosion
      oats
      soil -> /Simulations/Shared/Kilmore 150
    area p20: same as CQ baseline.p10
    area p11
      surfaceom surface organic matter
        PoolName = wheat_stubble  # Organic Matter pool name
        type = wheat  # Organic Matter type
        mass = 1000  # Initial surface residue (kg/ha)
        cnr = 80  # C:N ration of initial residue
        standing_fraction = 0  # Fraction of residue standing
      fertiliser
      erosion: same as CQ baseline.p1.Erosion
      soil -> /Simulations/Shared/Kilmore 150
      grasp Buffel
        root_depth_init = 750  # Initial depth of roots (mm)
        dm_dead_leaf_init = 750  # Initial Dead Leaf weight (kg/ha)
        dm_dead_stem_init = 750  # Initial Dead Stem weight (kg/ha)
        dm_dead_root_init = 100  # Initial Dead Root weight (kg/ha)
        dm_green_leaf_init = 1000  # Initial Green Leaf weight (kg/ha)
        dm_green_stem_init = 1000  # Initial Green Stem weight (kg/ha)
        dm_green_root_init = 300  # Initial Green Root weight (kg/ha)
        basal_area_init = 2.5  # Initial Basal area of tussocks (%)
        acc_trans_for_n_init = 0  # Initial accumulated transpiration, used for N uptake (mm)
        acc_growth_for_n_init = 0  # Initial accumulated growth, used for N uptake (kg/ha)
        max_n_avail = 15  # Limit to total N (kg/year)
        max_n_avail_dist = 0.8 0.1 0.05  0.05  0.0 0.0  0.0  # Distribution of N in profile
        ll = 0.290  0.290  0.290  0.290  0.290  0.290  0.290  0.290  0.290  0.290  0.290  # Lower limit (ll) of water extraction (mm/mm)
        kl = 0.5      0.5      0.5    0.5  0.0  0.0  0.0  # Rate of water extraction (kl)
        kl2rlv = 1
        crop_type = grass
        uptake_source = calc
        height_max = 1200  # Maximum canopy height (mm)
        hgt_vpd_screen = 200  # Height at which surface effects on vpd are 0 (mm)
        height_1000kg = 100  # Sward Height per tonne (p096*10, mm)
        et_use_efficiency = 0  # Evapotranspiration use efficiency used in BA calc (kg/ha/mm) (p288)
        frac_leaf2total = 0.5  # Fraction of total dm produced that goes into leaf pool (0-1) (p123)
        yld_cover_slope = 0.693147  # Shape of exponential curve relating yield and cover
        yld_fpc50 = 1000  # yld_fpc50 (p046)
        yld_cov50 = 1000  # Yield transpiring at 50% of pan evap (p045)
        yld_tcov50 = 1000  # Tsdm yield at which cover for runoff is 50% (p271)
        swi_fullgreen = 0.1  # Min soil water for 100% green (p009)
        swi_nogrow = 0.4  # SWI when growth stops
        pot_regrow = 3  # Max rate regrowth from tussocks (kg/ha/unit grass ba) (p006)
        te_std = 10  # Transpiration efficiency at vpd=20mb (p007)
        rad_factor = 8.97
        residual_plant_N = 5  # Always this much n in plant (p097, kg/ha)
        litter_n = 0.3  # N conc of detached stems and roots ((p110-p111)/2)
        n_uptk_per100 = 5  # Nitrogen uptake per 100mm water (p098, kg/ha)
        frost_start = 2  # Minimum screen temp at which green cover=100% (oC,p125)
        frost_kill = 0  # Minimum screen temp at which frost kills all green (oC,p011)
        death_slope = 0.013  # Rate of green death per soil water(p051)
        death_intercept = 0.002  # Background death rate (p010)
        leaf_death_ratio = 1  # Proportion of leaf death to total death (p133)
        stem_death_ratio = 1  # Proportion of stem death to total death (p134)
        n_conc_dm_crit = 2.5  # Level of plant N at which no N stress occurs (p102)
        n_conc_dm_min = 0.4  # Level of soil N at which no N stress occurs (p101)
        n_conc_dm_max = 0.5  # Level of soil N at which soil N to high for growth (p100)
        stem_thresh = 0  # stem_thresh (p124)
        detach_dryseason = 0.0   0.002     0.002  # detach_dryseason: root, leaf, stem
        detach_wetseason = 0.0   0.002     0.002  # detach_wetseason: root, leaf, stem
        day_start_summer = 335
        day_end_summer = 59
        acc_et_reset = 273
        acc_growth_reset = 273
        trans_for_n_reset = 273
        growth_for_n_reset = 273
        day_start_wet = 274
        day_start_dry = 91
        enr_a_coeff = 7.4
        enr_b_coeff = 0.2
    area p12: same as CQ baseline.p11
    area p13
      surfaceom surface organic matter
        PoolName = wheat_stubble  # Organic Matter pool name
        type = wheat  # Organic Matter type
        mass = 1000  # Initial surface residue (kg/ha)
        cnr = 80  # C:N ration of initial residue
        standing_fraction = 0  # Fraction of residue standing
      fertiliser
      erosion: same as CQ baseline.p1.Erosion
      soil -> /Simulations/Shared/Kilmore 90
      grasp Buffel: same as CQ baseline.p11.Buffel
    area p14
      surfaceom surface organic matter
        PoolName = wheat_stubble  # Organic Matter pool name
        type = wheat  # Organic Matter type
        mass = 1000  # Initial surface residue (kg/ha)
        cnr = 80  # C:N ration of initial residue
        standing_fraction = 0  # Fraction of residue standing
      fertiliser
      erosion: same as CQ baseline.p1.Erosion
      soil -> /Simulations/Shared/Kilmore 90
      grasp PurplePGrass: same as CQ baseline.p11.Buffel
    area p17
      surfaceom surface organic matter
        PoolName = wheat_stubble  # Organic Matter pool name
        type = wheat  # Organic Matter type
        mass = 1000  # Initial surface residue (kg/ha)
        cnr = 80  # C:N ration of initial residue
        standing_fraction = 0  # Fraction of residue standing
      fertiliser
      erosion: same as CQ baseline.p1.Erosion
      soil -> /Simulations/Shared/Kilmore 150
      grasp Leucaena: same as CQ baseline.p11.Buffel
    area p15: same as CQ baseline.p11
    area p16
      surfaceom surface organic matter
        PoolName = wheat_stubble  # Organic Matter pool name
        type = wheat  # Organic Matter type
        mass = 1000  # Initial surface residue (kg/ha)
        cnr = 80  # C:N ration of initial residue
        standing_fraction = 0  # Fraction of residue standing
      fertiliser
      erosion: same as CQ baseline.p1.Erosion
      soil -> /Simulations/Shared/Kilmore 150
      SweetSorghum
    area p18
      surfaceom surface organic matter
        PoolName = wheat_stubble  # Organic Matter pool name
        type = wheat  # Organic Matter type
        mass = 1000  # Initial surface residue (kg/ha)
        cnr = 80  # C:N ration of initial residue
        standing_fraction = 0  # Fraction of residue standing
      fertiliser
      erosion: same as CQ baseline.p1.Erosion
      soil -> /Simulations/Shared/Kilmore 150
      SweetSorghum
      folder Manager folder
        manager
          on init:
```
cuts = 0
```
          on start_of_day:
```
! Harvesting sweet sorghum either at flowering or when height is more than 80cm. Cut to a height of 15mm. J.O.

if SweetSorghum.StageName = 'flowering' then
   SweetSorghum harvest height = 15 (mm)
endif

if SweetSorghum.height = 800  then
    SweetSorghum harvest height = 15 (mm)
 endif
```
    area p19
      surfaceom surface organic matter
        PoolName = wheat_stubble  # Organic Matter pool name
        type = wheat  # Organic Matter type
        mass = 1000  # Initial surface residue (kg/ha)
        cnr = 80  # C:N ration of initial residue
        standing_fraction = 0  # Fraction of residue standing
      fertiliser
      erosion: same as CQ baseline.p1.Erosion
      soil -> /Simulations/Shared/Kilmore 150
      SweetSorghum
      folder Manager folder
        manager
          on start_of_day:
          script: same as in CQ baseline.p18.Manager folder.Manager
    graz a1 -> /Simulations/Shared/animal
    graz a2 -> /Simulations/Shared/animal
    graz a3 -> /Simulations/Shared/animal
    graz a4 -> /Simulations/Shared/animal
    graz a5 -> /Simulations/Shared/animal
  simulation CQ scenario 1
    tclmanager Farm Manager
      RotPlot GrainCrops Management
        rotnode Rotations: uiscript=source $apsuite/UserInterface/APSFarm/RotationsUI.tcl; canvas_height=400; rules_height=40; graph_name=GrainCrops
          node Chickpea: desc=New state
          node Wheat: desc=yyy
          node Sorghum: desc=New state
          node Fallow: desc=yyy
          node earlySorghum: desc=New state
          arc arc11: source=Wheat; target=Fallow; actions=harvestAndEndCrop $paddock Wheat; rules=[canHarvestCrop $paddock Wheat]
          arc arc2: same as CQ baseline.Farm Manager.GrainCrops Management.Rotations.arc2
          arc arc12: same as CQ baseline.Farm Manager.GrainCrops Management.Rotations.arc12
          arc arc3: source=earlySorghum; target=Fallow; actions=harvestAndEndCrop $paddock earlySorghum; rules=[canHarvestCrop $paddock earlySorghum]
          arc arc0: same as CQ baseline.Farm Manager.GrainCrops Management.Rotations.arc0
          arc arc13: source=Chickpea; target=Fallow; actions=harvestAndEndCrop $paddock Chickpea; rules=[canHarvestCrop $paddock Chickpea]
          arc arc4: same as CQ baseline.Farm Manager.GrainCrops Management.Rotations.arc4
          arc arc5: source=Sorghum; target=Fallow; actions=harvestAndEndCrop $paddock Sorghum; rules=[canHarvestCrop $paddock Sorghum]
          arc arc10: same as CQ baseline.Farm Manager.GrainCrops Management.Rotations.arc10
          paddock toplevel: isManaged=0
          paddock p1: isManaged=1; initialState=Fallow
          paddock p2: isManaged=1; initialState=Fallow
          paddock p3: isManaged=1; initialState=Fallow
          paddock p4: isManaged=1; initialState=Fallow
          paddock p5: isManaged=1; initialState=Fallow
          paddock p6: isManaged=1; initialState=Fallow
          paddock p7: isManaged=1; initialState=Fallow
          paddock p8: isManaged=1; initialState=Fallow
          paddock p9: isManaged=1; initialState=Fallow
          paddock p10: isManaged=0
          paddock p11: isManaged=0
          paddock p12: isManaged=0
          paddock p20: isManaged=0
          paddock p13: isManaged=0
          paddock p14: isManaged=0
          paddock p17: isManaged=0
          paddock p15: isManaged=0
          paddock p16: isManaged=0
          paddock p18: isManaged=0
          paddock p19: isManaged=0
          rule Rotations Init rule: same as CQ baseline.Farm Manager.GrainCrops Management.Rotations.Rotations Init rule
      RotPlot Oats Management: same as CQ baseline.Farm Manager.Oats Management
      RotPlot Sorghum Management: same as CQ baseline.Farm Manager.Sorghum Management
      rule Animal Management
        on init:
```
###############Animal management stuff~~~~~~~~~~~~

proc setupAnimals {} {
   global config animals simName 
   set animals(reportFP) [open "${simName}.Livestock Schedule.csv" w]
   set animals(mobs) {}
   for {set mob 1} {$mob <= 6} {incr mob} {
      lappend animals(mobs) $mob
      set animals($mob,number) 0
      set animals($mob,state) "off"
      set animals($mob,where)  {}
      set animals($mob,what)   {}
      set animals($mob,supplemented) 0
      set animals($mob,id) ".masterpm.a${mob}"
      apsimSet $animals($mob,id).stocking_rate 0.0
      apsimSet $animals($mob,id).alw 0.0
      apsimSet $animals($mob,id).pasture_source ".masterpm.farm manager"
      apsimSet $animals($mob,id).allow_supplements 0
   }
}

proc closeAnimals {} {
   global animals 
   catch {close $animals(reportFP)}
}

# Bring some animals into the system
proc animalsIn { number class initialWeight } {
   global config animals

   foreach mob $animals(mobs) {
      if {$animals(${mob},state) == "off"} {break}
   } 
   if {$animals(${mob},state) != "off"} {parray animals; error "Already too many mobs to make $class"}
   
   set animals($mob,state)        on
   set animals($mob,class)        $class
   set animals($mob,alw)          $initialWeight
   set animals($mob,number)       $number
   set animals($mob,age)          0
   set animals($mob,where)        {}
   set animals($mob,what)         {}
   set animals($mob,supplemented) 0
   apsimSet $animals($mob,id).allow_supplements 0

   reportCSV livestock buy "livestock_number=$number,livestock_class=$class,livestock_weight=$initialWeight"

   apsimSendMessage economics expenditure {paddock livestock}\
             "cost [expr $number * $initialWeight * $animals($class,price)]" \
             [list comment "purchase of $number $class at $initialWeight kg"]

   apsimSendMessage economics expenditure {paddock livestock}\
             "cost [expr $number * $animals(inCost)]" \
             [list comment "in costs of $number $class"]

   puts "[apsimGet dd/mm/yyyy]: animals:In: mob $mob is class $class, weight=$initialWeight"
   # initial stocking rate isn't set until we have a paddock with an area
   return $mob
}

# Take animals out the system
proc animalsOut { mob number } {
   global animals

   if {$number == "all"} { set number $animals(${mob},number) }

   set animals(${mob},number) [expr $animals(${mob},number) - $number]
   
   reportCSV livestock sell "livestock_number=$number,livestock_class=$animals($mob,class),livestock_weight=$animals($mob,alw)"

   apsimSendMessage economics expenditure {paddock livestock}\
             "cost [expr $number * $animals(outCost)]" \
             [list comment "out costs of $number $animals($mob,class)"]

   apsimSendMessage economics income \
       {paddock livestock} "name $animals(${mob},class)" \
       "amount [expr $number * $animals(${mob},alw) * $animals($animals(${mob},class),price)]" \
       [list comment "sale of $number $animals(${mob},class) at $animals(${mob},alw) kg"]

   puts "[apsimGet dd/mm/yyyy]: animals:Out: removing $number of mob $mob ($animals(${mob},class))  at $animals(${mob},alw) kg"

   if {$animals(${mob},number) <= 0} {
      set animals(${mob},state)  off
      set animals(${mob},alw)    0.0
      set animals(${mob},age)    0
      set animals(${mob},where)  {}
      set animals(${mob},what)   {}
      set animals($mob,supplemented) 0
      apsimSet $animals($mob,id).pasture_source ".masterpm.farm manager"
      apsimSet $animals($mob,id).stocking_rate  0.0
      apsimSet $animals($mob,id).alw            0.0
      apsimSet $animals($mob,id).allow_supplements 0
      puts "[apsimGet dd/mm/yyyy]: animals:Out: mob $mob is gone"
   } else {
      error "Adjust stocking rate here.."
   }
}

# Keep track of alw and age
proc doPostAnimals {} {
   global animals

   foreach mob $animals(mobs) {
      if {$animals(${mob},state) != "off"} {

          # keep track of ALW
          if {$animals(${mob},what) == "sorghum"} {
             set animals($mob,alw) [expr $animals($mob,alw) + 1.4]      ;# 1.4 kg/hd/day
          } elseif {$animals(${mob},what) == "feedlot"} {
             set animals($mob,alw) [expr $animals($mob,alw) + 2.0]      ;# 2.0 kg/hd/day
          } else {
             set animals($mob,alw) [apsimGet $animals($mob,id).alw]
          }

          incr animals(${mob},age)
      }
   }
}


#Move stock somewhere. 
# mob = name of the animal group
# paddock = the paddock they're going to
# crop = The name of the crop they'll eat
proc moveStockTo {mob paddock crop} {
   global config animals

   if {$crop == "leucaena"} {
      apsimSet $animals($mob,id).pasture_source ".masterpm.farm manager"
   } elseif {$crop == "feedlot"} {
      apsimSet $animals($mob,id).pasture_source ".masterpm.farm manager"
   } elseif {$crop == "sorghum"} {
      apsimSet $animals($mob,id).pasture_source ".masterpm.farm manager"
   } else {
      apsimSet $animals($mob,id).pasture_source ".masterpm.$paddock.$crop"
      set newSr [expr $animals($mob,number) / $config($paddock,area)]

      ##?? need to convert animal equivalents here

      apsimSet $animals($mob,id).stocking_rate $newSr
      apsimSet $animals($mob,id).alw $animals($mob,alw)

      foreach season {summer_lwg winter_lwg autumn_lwg spring_lwg} {
         apsimSet $animals($mob,id).${season} $config($crop,$season)
      }
   }
   set animals($mob,where)  $paddock
   set animals($mob,what)   $crop
   set animals($mob,state)  "$paddock.$crop"
   set animals($mob,age)    0
   set animals($mob,age)    0
   set animals($mob,supplemented) 0
   apsimSet $animals($mob,id).allow_supplements 0
   puts "[apsimGet dd/mm/yyyy]: animals:moveStockTo $animals($mob,class) $paddock $crop wt=$animals($mob,alw) sr=[apsimGet $animals($mob,id).stocking_rate]"
}

# Split a mob.  
proc splitMob { mob num paddock crop } {
   global config animals

   puts "[apsimGet dd/mm/yyyy]: animals:split $animals($mob,class) old =$animals($mob,number), new =[expr $animals($mob,number) - $num]"

   foreach newmob $animals(mobs) {
      if {$animals(${newmob},state) == "off"} {break}
   } 
   if {$animals(${newmob},state) != "off"} {parray animals; error "Too many mobs to split"}
   
   foreach what {state class alw number age where what} {
      set animals($newmob,$what) $animals($mob,$what)  
   }
   set animals($mob,number) [expr $animals($mob,number) - $num]
   if {$animals($mob,number) < 0} {parray animals; error "mob $mob has negative size"}
   moveStockTo $mob $animals($mob,where) $animals($mob,what)

   set animals($newmob,number)  $num
   if {$animals($newmob,number) < 0} {parray animals; error "mob $newmob has negative size"}
   moveStockTo $newmob $paddock $crop
   return $newmob
}

proc setSupplementsOn {mob} {
   global animals
   set animals($mob,supplemented) 1
   apsimSet $animals($mob,id).allow_supplements 1
}

proc setSupplementsOff {mob} {
   global animals
   set animals($mob,supplemented) 0
   apsimSet $animals($mob,id).allow_supplements 0
}

proc changeMob { mob number } {
   global config animals
????   
   foreach what {state class alw number age where what} {
      set animals($newmob,$what) $animals($mob,$what)  
   }
   return $newmob
}

proc animalWeight {mob} {
   global animals
   return $animals($mob,alw)
}

proc animalNumber {mob} {
   global animals
   if {![info exists animals($mob,number)]} {parray animals; error "Missing number for mob $mob"}
   return $animals($mob,number)
}

proc animalDaysIn {mob where} {
   global animals
   if {$animals($mob,what) == "$where"} {
     return $animals($mob,age)
   } 
   return 0  
}

proc animalWhat {mob} {
   global animals
   return $animals($mob,what)
}

# Potential growth rates for each pasture by season
set config(buffel,summer_lwg)  80
set config(buffel,autumn_lwg)  40
set config(buffel,winter_lwg)  10
set config(buffel,spring_lwg)  40

set config(sorghum,summer_lwg)  100
set config(sorghum,autumn_lwg)  60
set config(sorghum,winter_lwg)  10
set config(sorghum,spring_lwg)  60

set config(oats,summer_lwg)  40
set config(oats,autumn_lwg)  60
set config(oats,winter_lwg)  80
set config(oats,spring_lwg)  60

set config(leucaena,summer_lwg)  85
set config(leucaena,autumn_lwg)  85
set config(leucaena,winter_lwg)  30
set config(leucaena,spring_lwg)  30

proc doPrepareAnimals {} {
   global animals
   
#####Culls   
   if {[dateIs 15-aug]} {
     set animals(culls) [animalsIn 100 culls 500]    ;# 100 head @ 500kg
     moveStockTo $animals(culls) p11 buffel          ;# move onto p11 buffel
   }
   
   if {[dateIs 15-dec] && 
       $animals(culls) != {} && 
       [animalWeight $animals(culls)] > 550} {
     animalsOut $animals(culls) all
     set animals(culls) {}
   }

   if {[dateIs 15-jun] && $animals(culls) != {}} {
     animalsOut $animals(culls) all
     set animals(culls) {}
   }
   
##### Weaners on oats for 6 mths
   if {[dateIs 15-aug] } {

     set animals(steers1) [animalsIn 275 steers 200]   ;# 275 head @ 200Kg
     if {[OatsIsPlanted p10]} {
       moveStockTo $animals(steers1) p10 oats           ;# move onto oats in p10
     } else { 
       puts "Couldn't put weaners on oats in p10"
       moveStockTo $animals(steers1) p13 buffel         ;# move onto buffel in p13
       setSupplementsOn $animals(steers1)
     }

	 set animals(steers3) [animalsIn 200 steers 200]   ;# 275 head @ 200Kg
     if {[OatsIsPlanted p1]} {
       moveStockTo $animals(steers3) p1 oats           ;# move onto oats in p10
     } else { 
       puts "Couldn't put weaners on oats in p1"
       moveStockTo $animals(steers3) p13 buffel         ;# move onto buffel in p13
       setSupplementsOn $animals(steers3)
     }

     set animals(heifers) [animalsIn 275 heifers 200]
     if { [OatsIsPlanted p20]} {
       moveStockTo $animals(heifers) p20 oats
     } else { 
       puts "Couldn't put weaners on oats in p20"
       moveStockTo $animals(heifers) p13 buffel         ;# move onto buffel in p13 (shared with steers)
       setSupplementsOn $animals(heifers)
     }
   }
   
   # Oats are flogged, but sorghum isn't ready 
   if {$animals(steers1) != {} &&
       [animalWhat $animals(steers1)] == "oats" && 
       ([apsimGet p10.oats.stage] > 8 || [apsimGet p10.oats.biomass] < 500) &&
       [apsimGet .masterpm.p16.SweetSorghum.biomass] < 1000} {
       moveStockTo $animals(steers1) p13 buffel
       setSupplementsOn $animals(steers1)
   }     
   if {$animals(steers3) != {} &&
       [animalWhat $animals(steers3)] == "oats" && 
       ([apsimGet p1.oats.stage] > 8 || [apsimGet p1.oats.biomass] < 500) &&
       [apsimGet .masterpm.p2.SweetSorghum.biomass] < 1000} {
       moveStockTo $animals(steers3) p13 buffel
       setSupplementsOn $animals(steers3)
   }     
   if {$animals(heifers) != {} &&
       [animalWhat $animals(heifers)] == "oats" && 
       ([apsimGet p20.oats.stage] > 8 || [apsimGet p20.oats.biomass] < 500) &&
       [apsimGet .masterpm.p18.SweetSorghum.biomass] < 1000} {
       moveStockTo $animals(heifers) p13 buffel
       setSupplementsOn $animals(heifers)
   }     


### mid-jan - split weaners and sell if feed scarce
   if {$animals(steers1) != {} && $animals(steers2) == {} &&
       (([animalWhat $animals(steers1)] == "buffel" &&
         [apsimGet .masterpm.p16.SweetSorghum.biomass] > 1000) ||
        [dateIs 15-jan])} {

        moveStockTo $animals(steers1) p16 sorghum
        setSupplementsOff $animals(steers1)
        set animals(steers2) [splitMob $animals(steers1) 135 p19 sorghum]


        if {![ForageSorghumIsPlanted p16] || [apsimGet .masterpm.p16.SweetSorghum.biomass] < 800} {
           animalsOut $animals(steers1) all
           set animals(steers1) {}
        }

        if {![ForageSorghumIsPlanted p19] || [apsimGet .masterpm.p19.SweetSorghum.biomass] < 800} {
           animalsOut $animals(steers2) all
           set animals(steers2) {}
        }
   }

   if {$animals(steers3) != {} &&
       (([animalWhat $animals(steers3)] == "buffel" &&
         [apsimGet .masterpm.p2.SweetSorghum.biomass] > 1000) ||
        [dateIs 15-jan])} {

        moveStockTo $animals(steers3) p2 sorghum
        setSupplementsOff $animals(steers3)

        if {![ForageSorghumIsPlanted p2] || [apsimGet .masterpm.p2.SweetSorghum.biomass] < 800} {
           animalsOut $animals(steers3) all
           set animals(steers3) {}
        }

   }
   
   if {$animals(heifers) != {} && $animals(breeders) == {} && 
       (([animalWhat $animals(heifers)] == "buffel" &&
         [apsimGet .masterpm.p18.SweetSorghum.biomass] > 1000) ||
        [dateIs 15-jan])} {

       moveStockTo $animals(heifers) p18 sorghum
       setSupplementsOff $animals(heifers)
       set animals(breeders) [splitMob $animals(heifers) 120 p12 buffel]

puts "[apsimGet dd/mm/yyyy]:animals:heifers sorgwt = [apsimGetOptional .masterpm.p18.SweetSorghum.biomass]"
       if {![ForageSorghumIsPlanted p18] || [apsimGet .masterpm.p18.SweetSorghum.biomass] < 800} {
           animalsOut $animals(heifers) all
           set animals(heifers) {}
       }
   }

   if {$animals(breeders) != {}} {
      if {[animalWhat $animals(breeders)] == "buffel" &&
          [apsimGet p12.buffel.tsdm] < 500} {
         animalsOut $animals(breeders) all
         set animals(breeders) {}
      }  
   }

   
   # Off to the feedlot
   if {$animals(steers1) != {} && 
       [animalWhat $animals(steers1)] == "sorghum" &&
       ([animalWeight $animals(steers1)] > 450 || [dateIs 1-apr])} {
       moveStockTo $animals(steers1) "" feedlot
   }

   if {$animals(steers2) != {} && 
       [animalWhat $animals(steers2)] == "sorghum" &&
       ([animalWeight $animals(steers2)] > 450 || [dateIs 1-apr])} {
       moveStockTo $animals(steers2) "" feedlot
   }

   if {$animals(steers3) != {} && 
       [animalWhat $animals(steers3)] == "sorghum" &&
       ([animalWeight $animals(steers3)] > 450 || [dateIs 1-apr])} {
       moveStockTo $animals(steers3) "" feedlot
   }
   
   if {$animals(heifers) != {} && 
       [animalWhat $animals(heifers)] == "sorghum" &&
       ([animalWeight $animals(heifers)] > 450 || [dateIs 1-apr])} {
       moveStockTo $animals(heifers) "" feedlot
   }
   
   # Off the farm after 
   foreach a {steers1 steers2 steers3 heifers} {
      if {$animals($a) != {} && 
          ([animalDaysIn $animals($a) "feedlot"] == 70 || [dateIs 1-aug])} {
        animalsOut $animals($a) all
        set animals($a) {}
      }
   }

   if {$animals(breeders) != {} && [dateIs 1-aug]} {
     animalsOut $animals(breeders) all
     set animals(breeders) {}
   }
   
   # Work out feedlot costs
   set nInFeedlot 0
   foreach a {steers1 steers2 steers3 heifers} {
      if {$animals($a) != {} && 
          [animalWhat $animals($a)] == "feedlot"} {
         set nInFeedlot [expr $nInFeedlot + [animalNumber $animals($a)]]
      }
   }

   if {$nInFeedlot > 0} {
      apsimSendMessage economics expenditure {paddock livestock}\
             "cost [expr $nInFeedlot * $animals(dailyFeedlotCost)]" \
             [list comment "feedlot costs for $nInFeedlot beasts"]
   }

   # Work out supplement costs
   set nSupplemented 0
   foreach a {steers1 steers2 steers3 heifers} {
      if {$animals($a) != {} && 
          $animals($animals($a),supplemented)} {
         set nSupplemented [expr $nSupplemented + [animalNumber $animals($a)]]
      }
   }

   if {$nSupplemented > 0} {
      apsimSendMessage economics expenditure {paddock livestock}\
             "cost [expr $nSupplemented * $animals(dailySupplementCost)]" \
             [list comment "supplement costs for $nSupplemented beasts"]
      puts "animals: Supplementary feeding for $nSupplemented beasts"
   }
   
}
```
      rule Structural
        on init:
```
# Initialisation for Kilmore
set simName "CQ scenario 1"

set paddocks [list toplevel p1 p2 p3 p4 p5 p6 p7 p8 p9 p10 p11 p20 p12 p13 p14 p17 p16 p18 p19]
set config(cropPaddocks)    [list p3 p4 p5 p6 p7 p8 p9 ]
set config(pasturePaddocks) [list p13 p14 p17 p11 p12 ]
set config(foragePaddocks)  [list p1 p2 p10 p20 p16 p18 p19 ]

set config(p1,graphNames)  ForageOats
set config(p2,graphNames)  ForageSorghum
set config(p3,graphNames)  GrainCrops
set config(p4,graphNames)  GrainCrops
set config(p5,graphNames)  GrainCrops
set config(p6,graphNames)  GrainCrops
set config(p7,graphNames)  GrainCrops
set config(p8,graphNames)  GrainCrops
set config(p9,graphNames)  GrainCrops
set config(p10,graphNames) ForageOats
set config(p11,graphNames) {} ;# buffel
set config(p12,graphNames) {} ;# bfp
set config(p13,graphNames) {} ;# buffel
set config(p14,graphNames) {} ;#  ppg
#                              p15 is the bull paddock
set config(p16,graphNames) ForageSorghum  
set config(p17,graphNames) {} ;# leucaena
set config(p18,graphNames) ForageSorghum
set config(p19,graphNames) ForageSorghum
set config(p20,graphNames) ForageOats
set config(toplevel,graphNames) {} ;# StockMgt

set config(p1,area)     100.0
set config(p1,initialState)  Fallow
set config(p1,history)  {sorghum sorghum}
set config(p1,daysSinceLastHarvest) 365              ;# A long time

set config(p2,area)     380.0
set config(p2,initialState)  Fallow
set config(p2,history)  {wheat sorghum}
set config(p2,daysSinceLastHarvest) 365

set config(p3,area)     238.0                          ;# Area
set config(p3,initialState)  Fallow
set config(p3,history)  {wheat wheat}
set config(p3,daysSinceLastHarvest) 365

set config(p4,area)     238.0                          ;# Area
set config(p4,initialState)  Fallow
set config(p4,history)  {wheat sorghum}
set config(p4,daysSinceLastHarvest) 365

set config(p5,area)     238.0                          ;# Area
set config(p5,initialState)  Fallow
set config(p5,history)  {sorghum sorghum}
set config(p5,daysSinceLastHarvest) 365

set config(p6,area)     238.0                          ;# Area
set config(p6,initialState)  Fallow
set config(p6,history)  {sorghum sorghum}
set config(p6,daysSinceLastHarvest) 365

set config(p7,area)     238.0                          ;# Area
set config(p7,initialState)  Fallow
set config(p7,history)  {wheat sorghum}
set config(p7,daysSinceLastHarvest) 365

set config(p8,area)     238.0                          ;# Area
set config(p8,initialState)  Fallow
set config(p8,history)  {wheat wheat}
set config(p8,daysSinceLastHarvest) 365

set config(p9,area)     238.0                          ;# Area
set config(p9,initialState)  Fallow
set config(p9,history)  {wheat sorghum}
set config(p9,daysSinceLastHarvest) 365

set config(p10,area)     65.0                          ;# Area
set config(p10,initialState)  Fallow
set config(p10,history)  {oats}
set config(p10,daysSinceLastHarvest) 365

set config(p20,area)     50.0                          ;# Area
set config(p20,initialState)  Fallow
set config(p20,history)  {oats}
set config(p20,daysSinceLastHarvest) 365

set config(p11,area)      187.0                          ;# Area
set config(p11,initialState)  {}
set config(p11,history)   {}
set config(p11,daysSinceLastHarvest) 365

set config(p12,area)      142.0                          ;# Area
set config(p12,initialState)  Fallow
set config(p12,history)   {}
set config(p12,daysSinceLastHarvest) 365

set config(p17,area)      121.0                          ;# Area
set config(p17,initialState)  {}
set config(p17,history)   {}
set config(p17,daysSinceLastHarvest) 365

set config(p13,area)      150.0                         ;# GUESSED
set config(p13,initialState)  {}
set config(p13,history)   {}
set config(p13,daysSinceLastHarvest) 365

set config(p14,area)      50.0                          ;# GUESSED
set config(p14,initialState)  {}
set config(p14,history)   {}
set config(p14,daysSinceLastHarvest) 365

set config(p16,area)      100.0                          ;# Area
set config(p16,initialState)  Fallow
set config(p16,history)   {}
set config(p16,daysSinceLastHarvest) 365

set config(p18,area)      200.0                          ;# Area
set config(p18,initialState)  Fallow
set config(p18,history)   {}
set config(p18,daysSinceLastHarvest) 365

set config(p19,area)      100.0                          ;# Area
set config(p19,initialState)  Fallow
set config(p19,history)   {}
set config(p19,daysSinceLastHarvest) 365

set config(toplevel,area) 0
set config(toplevel,initialState)  Off
set config(toplevel,history)  {}
set config(toplevel,daysSinceLastHarvest) 0
```
        on start_simulation:
        script: same as in CQ baseline.Farm Manager.Structural
      rule Farm logic -> /Simulations/Shared/Farm Manager/Farm logic
      rule Rugplot stuff -> /Simulations/Shared/Farm Manager/Rugplot stuff
      rule Weeds -> /Simulations/Shared/Farm Manager/Weeds
      tclui Forage Sorghum Sowing Rule -> /Simulations/Shared/Farm Manager/Forage Sorghum Sowing Rule
      tclui Oats Sowing Rule -> /Simulations/Shared/Farm Manager/Oats Sowing Rule
    clock
      start_date = 1/7/1975  # Select the start date of the simulation
      end_date = 1/7/1980  # Select the end date of the simulation
    summaryfile: filename=Kilmore.sum
    siloinput met -> /Simulations/Shared/Met Data from Silo
    tclmanager Economics
      rule Initialisation logic
        on init:
        script: same as in CQ baseline.Economics.Initialisation logic
      tclui Initial Capital Assets: uiscript=source $apsuite/UserInterface/APSFarm/CapitalUI.tcl; category=icapital
        icapital: ivalue=0; loanRate=0; loanDuration=0
      tclui Cash Journal: uiscript=source $apsuite/UserInterface/APSFarm/CashbookUI.tcl; balance=42000; outputfilename=CQ scenario 1.Cashbook.csv; summaryfilename=CQ scenario 1.Cashbook.Summary.csv
      tclui Machinery - 200kwFWA: same as CQ baseline.Economics.Machinery - 200kwFWA
      tclui Machinery - Precision Planter: same as CQ baseline.Economics.Machinery - Precision Planter
      tclui Machinery - Plough: same as CQ baseline.Economics.Machinery - Plough
      tclui Prices: same as CQ baseline.Economics.Prices
      tclui Costs - Farm Overheads: same as CQ baseline.Economics.Costs - Farm Overheads
      tclui Costs - Fuel: uiscript=source $apsuite/UserInterface/APSFarm/TreatmentsUI.tcl; category=fuelcosts
        fuelcosts: desc=Cost of fuel (net); price=0.835; units=$/litre; updated=15/10/2007
      tclui Costs - Fertilisers: same as CQ baseline.Economics.Costs - Fertilisers
      tclui Costs - Herbicides: same as CQ baseline.Economics.Costs - Herbicides
      tclui Costs - Insecticides: same as CQ baseline.Economics.Costs - Insecticides
      tclui Costs - Seed: same as CQ baseline.Economics.Costs - Seed
      tclui Costs - Defoliants: uiscript=source $apsuite/UserInterface/APSFarm/TreatmentsUI.tcl; category=defoliant
        defoliant dropp: desc=dropp (thidiazuron + diuron); price=147; units=kg
        defoliant salt defoliant: desc=Salt Defoliant; price=1.55; units=kg
      tclui Costs - Contractors: same as CQ baseline.Economics.Costs - Contractors
    area p1
      wheat -> /Simulations/Shared/wheat
      chickpea -> /Simulations/Shared/chickpea
      sorghum -> /Simulations/Shared/sorghum
      SweetSorghum -> /Simulations/Shared/SweetSorghum
      oats -> /Simulations/Shared/oats
      surfaceom surface organic matter -> /Simulations/Shared/surface organic matter
      fertiliser -> /Simulations/Shared/fertiliser
      erosion: same as CQ baseline.p1.Erosion
      soil -> /Simulations/Shared/Kilmore 120
    area p2
      wheat -> /Simulations/Shared/wheat
      chickpea -> /Simulations/Shared/chickpea
      sorghum -> /Simulations/Shared/sorghum
      SweetSorghum -> /Simulations/Shared/SweetSorghum
      oats -> /Simulations/Shared/oats
      surfaceom surface organic matter -> /Simulations/Shared/surface organic matter
      fertiliser -> /Simulations/Shared/fertiliser
      erosion: same as CQ baseline.p2.Erosion
      soil -> /Simulations/Shared/Kilmore 130
    area p3: same as CQ baseline.p2
    area p4: same as CQ baseline.p2
    area p5: same as CQ baseline.p5
    area p6: same as CQ baseline.p5
    area p7: same as CQ baseline.p5
    area p8: same as CQ baseline.p8
    area p9: same as CQ baseline.p9
    area p10
      surfaceom surface organic matter
        PoolName = wheat_stubble  # Organic Matter pool name
        type = wheat  # Organic Matter type
        mass = 1000  # Initial surface residue (kg/ha)
        cnr = 80  # C:N ration of initial residue
        standing_fraction = 0  # Fraction of residue standing
      erosion: same as CQ baseline.p1.Erosion
      oats -> /Simulations/Shared/oats
      soil -> /Simulations/Shared/Kilmore 150
    area p20: same as CQ scenario 1.p10
    area p11: same as CQ baseline.p11
    area p12: same as CQ baseline.p11
    area p13: same as CQ baseline.p13
    area p14: same as CQ baseline.p14
    area p17: same as CQ baseline.p17
    area p15: same as CQ baseline.p11
    area p16
      surfaceom surface organic matter
        PoolName = wheat_stubble  # Organic Matter pool name
        type = wheat  # Organic Matter type
        mass = 1000  # Initial surface residue (kg/ha)
        cnr = 80  # C:N ration of initial residue
        standing_fraction = 0  # Fraction of residue standing
      fertiliser
      erosion: same as CQ baseline.p1.Erosion
      soil -> /Simulations/Shared/Kilmore 150
      SweetSorghum -> /Simulations/Shared/SweetSorghum
    area p18
      surfaceom surface organic matter
        PoolName = wheat_stubble  # Organic Matter pool name
        type = wheat  # Organic Matter type
        mass = 1000  # Initial surface residue (kg/ha)
        cnr = 80  # C:N ration of initial residue
        standing_fraction = 0  # Fraction of residue standing
      fertiliser
      erosion: same as CQ baseline.p1.Erosion
      soil -> /Simulations/Shared/Kilmore 150
      SweetSorghum -> /Simulations/Shared/SweetSorghum
      folder Manager folder: same as CQ baseline.p18.Manager folder
    area p19
      surfaceom surface organic matter
        PoolName = wheat_stubble  # Organic Matter pool name
        type = wheat  # Organic Matter type
        mass = 1000  # Initial surface residue (kg/ha)
        cnr = 80  # C:N ration of initial residue
        standing_fraction = 0  # Fraction of residue standing
      fertiliser
      erosion: same as CQ baseline.p1.Erosion
      soil -> /Simulations/Shared/Kilmore 150
      SweetSorghum -> /Simulations/Shared/SweetSorghum
      folder Manager folder: same as CQ baseline.p19.Manager folder
    graz a1 -> /Simulations/Shared/animal
    graz a2 -> /Simulations/Shared/animal
    graz a3 -> /Simulations/Shared/animal
    graz a4 -> /Simulations/Shared/animal
    graz a5 -> /Simulations/Shared/animal
    graz a6 -> /Simulations/Shared/animal
  simulation CQ scenario 2
    tclmanager Farm Manager
      RotPlot GrainCrops Management: same as CQ scenario 1.Farm Manager.GrainCrops Management
      RotPlot Oats Management: same as CQ baseline.Farm Manager.Oats Management
      RotPlot Sorghum Management: same as CQ baseline.Farm Manager.Sorghum Management
      rule Animal Management
        on init:
```
###############Animal management stuff~~~~~~~~~~~~

proc setupAnimals {} {
   global config animals simName 
   set animals(reportFP) [open "${simName}.Livestock Schedule.csv" w]
   set animals(mobs) {}
   for {set mob 1} {$mob <= 5} {incr mob} {
      lappend animals(mobs) $mob
      set animals($mob,number) 0
      set animals($mob,state) "off"
      set animals($mob,where)  {}
      set animals($mob,what)   {}
      set animals($mob,supplemented) 0
      set animals($mob,id) ".masterpm.a${mob}"
      apsimSet $animals($mob,id).stocking_rate 0.0
      apsimSet $animals($mob,id).alw 0.0
      apsimSet $animals($mob,id).pasture_source ".masterpm.farm manager"
      apsimSet $animals($mob,id).allow_supplements 0
   }
}

proc closeAnimals {} {
   global animals 
   catch {close $animals(reportFP)}
}

# Bring some animals into the system
proc animalsIn { number class initialWeight } {
   global config animals

   foreach mob $animals(mobs) {
      if {$animals(${mob},state) == "off"} {break}
   } 
   if {$animals(${mob},state) != "off"} {parray animals; error "Already too many mobs to make $class"}
   
   set animals($mob,state)        on
   set animals($mob,class)        $class
   set animals($mob,alw)          $initialWeight
   set animals($mob,number)       $number
   set animals($mob,age)          0
   set animals($mob,where)        {}
   set animals($mob,what)         {}
   set animals($mob,supplemented) 0
   apsimSet $animals($mob,id).allow_supplements 0

   reportCSV livestock buy "livestock_number=$number,livestock_class=$class,livestock_weight=$initialWeight"

   apsimSendMessage economics expenditure {paddock livestock}\
             "cost [expr $number * $initialWeight * $animals($class,price)]" \
             [list comment "purchase of $number $class at $initialWeight kg"]

   apsimSendMessage economics expenditure {paddock livestock}\
             "cost [expr $number * $animals(inCost)]" \
             [list comment "in costs of $number $class"]

   puts "[apsimGet dd/mm/yyyy]: animals:In: mob $mob is class $class, weight=$initialWeight"
   # initial stocking rate isn't set until we have a paddock with an area
   return $mob
}

# Take animals out the system
proc animalsOut { mob number } {
   global animals

   if {$number == "all"} { set number $animals(${mob},number) }

   set animals(${mob},number) [expr $animals(${mob},number) - $number]
   
   reportCSV livestock sell "livestock_number=$number,livestock_class=$animals($mob,class),livestock_weight=$animals($mob,alw)"

   apsimSendMessage economics expenditure {paddock livestock}\
             "cost [expr $number * $animals(outCost)]" \
             [list comment "out costs of $number $animals($mob,class)"]

   apsimSendMessage economics income \
       {paddock livestock} "name $animals(${mob},class)" \
       "amount [expr $number * $animals(${mob},alw) * $animals($animals(${mob},class),price)]" \
       [list comment "sale of $number $animals(${mob},class) at $animals(${mob},alw) kg"]

   puts "[apsimGet dd/mm/yyyy]: animals:Out: removing $number of mob $mob ($animals(${mob},class))  at $animals(${mob},alw) kg"

   if {$animals(${mob},number) <= 0} {
      set animals(${mob},state)  off
      set animals(${mob},alw)    0.0
      set animals(${mob},age)    0
      set animals(${mob},where)  {}
      set animals(${mob},what)   {}
      set animals($mob,supplemented) 0
      apsimSet $animals($mob,id).pasture_source ".masterpm.farm manager"
      apsimSet $animals($mob,id).stocking_rate  0.0
      apsimSet $animals($mob,id).alw            0.0
      apsimSet $animals($mob,id).allow_supplements 0
      puts "[apsimGet dd/mm/yyyy]: animals:Out: mob $mob is gone"
   } else {
      error "Adjust stocking rate here.."
   }
}

# Keep track of alw and age
proc doPostAnimals {} {
   global animals

   foreach mob $animals(mobs) {
      if {$animals(${mob},state) != "off"} {

          # keep track of ALW
          if {$animals(${mob},what) == "sorghum"} {
             set animals($mob,alw) [expr $animals($mob,alw) + 1.4]      ;# 1.4 kg/hd/day
          } elseif {$animals(${mob},what) == "feedlot"} {
             set animals($mob,alw) [expr $animals($mob,alw) + 2.0]      ;# 2.0 kg/hd/day
          } else {
             set animals($mob,alw) [apsimGet $animals($mob,id).alw]
          }

          incr animals(${mob},age)
      }
   }
}


#Move stock somewhere. 
# mob = name of the animal group
# paddock = the paddock they're going to
# crop = The name of the crop they'll eat
proc moveStockTo {mob paddock crop} {
   global config animals

   if {$crop == "leucaena"} {
      apsimSet $animals($mob,id).pasture_source ".masterpm.farm manager"
   } elseif {$crop == "feedlot"} {
      apsimSet $animals($mob,id).pasture_source ".masterpm.farm manager"
   } elseif {$crop == "sorghum"} {
      apsimSet $animals($mob,id).pasture_source ".masterpm.farm manager"
   } else {
      apsimSet $animals($mob,id).pasture_source ".masterpm.$paddock.$crop"
      set newSr [expr $animals($mob,number) / $config($paddock,area)]

      ##?? need to convert animal equivalents here

      apsimSet $animals($mob,id).stocking_rate $newSr
      apsimSet $animals($mob,id).alw $animals($mob,alw)

      foreach season {summer_lwg winter_lwg autumn_lwg spring_lwg} {
         apsimSet $animals($mob,id).${season} $config($crop,$season)
      }
   }
   set animals($mob,where)  $paddock
   set animals($mob,what)   $crop
   set animals($mob,state)  "$paddock.$crop"
   set animals($mob,age)    0
   set animals($mob,age)    0
   set animals($mob,supplemented) 0
   apsimSet $animals($mob,id).allow_supplements 0
   puts "[apsimGet dd/mm/yyyy]: animals:moveStockTo $animals($mob,class) $paddock $crop wt=$animals($mob,alw) sr=[apsimGet $animals($mob,id).stocking_rate]"
}

# Split a mob.  
proc splitMob { mob num paddock crop } {
   global config animals

   puts "[apsimGet dd/mm/yyyy]: animals:split $animals($mob,class) old =$animals($mob,number), new =[expr $animals($mob,number) - $num]"

   foreach newmob $animals(mobs) {
      if {$animals(${newmob},state) == "off"} {break}
   } 
   if {$animals(${newmob},state) != "off"} {parray animals; error "Too many mobs to split"}
   
   foreach what {state class alw number age where what} {
      set animals($newmob,$what) $animals($mob,$what)  
   }
   set animals($mob,number) [expr $animals($mob,number) - $num]
   if {$animals($mob,number) < 0} {parray animals; error "mob $mob has negative size"}
   moveStockTo $mob $animals($mob,where) $animals($mob,what)

   set animals($newmob,number)  $num
   if {$animals($newmob,number) < 0} {parray animals; error "mob $newmob has negative size"}
   moveStockTo $newmob $paddock $crop
   return $newmob
}

proc setSupplementsOn {mob} {
   global animals
   set animals($mob,supplemented) 1
   apsimSet $animals($mob,id).allow_supplements 1
}

proc setSupplementsOff {mob} {
   global animals
   set animals($mob,supplemented) 0
   apsimSet $animals($mob,id).allow_supplements 0
}

proc changeMob { mob number } {
   global config animals
????   
   foreach what {state class alw number age where what} {
      set animals($newmob,$what) $animals($mob,$what)  
   }
   return $newmob
}

proc animalWeight {mob} {
   global animals
   return $animals($mob,alw)
}

proc animalNumber {mob} {
   global animals
   if {![info exists animals($mob,number)]} {parray animals; error "Missing number for mob $mob"}
   return $animals($mob,number)
}

proc animalDaysIn {mob where} {
   global animals
   if {$animals($mob,what) == "$where"} {
     return $animals($mob,age)
   } 
   return 0  
}

proc animalWhat {mob} {
   global animals
   return $animals($mob,what)
}

# Potential growth rates for each pasture by season
set config(buffel,summer_lwg)  80
set config(buffel,autumn_lwg)  40
set config(buffel,winter_lwg)  10
set config(buffel,spring_lwg)  40

set config(sorghum,summer_lwg)  100
set config(sorghum,autumn_lwg)  60
set config(sorghum,winter_lwg)  10
set config(sorghum,spring_lwg)  60

set config(oats,summer_lwg)  40
set config(oats,autumn_lwg)  60
set config(oats,winter_lwg)  80
set config(oats,spring_lwg)  60

set config(leucaena,summer_lwg)  85
set config(leucaena,autumn_lwg)  85
set config(leucaena,winter_lwg)  30
set config(leucaena,spring_lwg)  30

proc doPrepareAnimals {} {
   global animals
   

   
##### Weaners on oats for 6 mths
   if {[dateIs 15-aug] } {

     set animals(steers1) [animalsIn 275 steers 200]   ;# 275 head @ 200Kg
     if {[OatsIsPlanted p10]} {
       moveStockTo $animals(steers1) p10 oats           ;# move onto oats in p10
     } else { 
       puts "Couldn't put weaners on oats in p10"
       moveStockTo $animals(steers1) p13 buffel         ;# move onto buffel in p13
       setSupplementsOn $animals(steers1)
     }

     set animals(heifers) [animalsIn 120 heifers 200]
     if { [OatsIsPlanted p20]} {
       moveStockTo $animals(heifers) p20 oats
     } else { 
       puts "Couldn't put weaners on oats in p20"
       moveStockTo $animals(heifers) p13 buffel         ;# move onto buffel in p13 (shared with steers)
       setSupplementsOn $animals(heifers)
     }
   }
   
   # Oats are flogged, but sorghum isn't ready 
   if {$animals(steers1) != {} &&
       [animalWhat $animals(steers1)] == "oats" && 
       ([apsimGet p10.oats.stage] > 8 || [apsimGet p10.oats.biomass] < 500) &&
       [apsimGet .masterpm.p16.SweetSorghum.biomass] < 1000} {
       moveStockTo $animals(steers1) p13 buffel
       setSupplementsOn $animals(steers1)
   }     
   if {$animals(heifers) != {} &&
       [animalWhat $animals(heifers)] == "oats" && 
       ([apsimGet p20.oats.stage] > 8 || [apsimGet p20.oats.biomass] < 500) &&
       [apsimGet .masterpm.p18.SweetSorghum.biomass] < 1000} {
       moveStockTo $animals(heifers) p13 buffel
       setSupplementsOn $animals(heifers)
   }     


### mid-jan - split weaners and sell if feed scarce
   if {$animals(steers1) != {} && $animals(steers2) == {} &&
       (([animalWhat $animals(steers1)] == "buffel" &&
         [apsimGet .masterpm.p16.SweetSorghum.biomass] > 1000) ||
        [dateIs 15-jan])} {

        moveStockTo $animals(steers1) p16 sorghum
        setSupplementsOff $animals(steers1)
        set animals(steers2) [splitMob $animals(steers1) 135 p19 sorghum]


        if {![ForageSorghumIsPlanted p16] || [apsimGet .masterpm.p16.SweetSorghum.biomass] < 800} {
           animalsOut $animals(steers1) all
           set animals(steers1) {}
        }

        if {![ForageSorghumIsPlanted p19] || [apsimGet .masterpm.p19.SweetSorghum.biomass] < 800} {
           animalsOut $animals(steers2) all
           set animals(steers2) {}
        }
   }
   
   if {$animals(heifers) != {} && $animals(breeders) == {} && 
       (([animalWhat $animals(heifers)] == "buffel" &&
         [apsimGet .masterpm.p18.SweetSorghum.biomass] > 1000) ||
        [dateIs 15-jan])} {

       moveStockTo $animals(heifers) p18 sorghum
       setSupplementsOff $animals(heifers)

puts "[apsimGet dd/mm/yyyy]:animals:heifers sorgwt = [apsimGetOptional .masterpm.p18.SweetSorghum.biomass]"
       if {![ForageSorghumIsPlanted p18] || [apsimGet .masterpm.p18.SweetSorghum.biomass] < 800} {
           animalsOut $animals(heifers) all
           set animals(heifers) {}
       }
   }

 
   # Off to the feedlot
   if {$animals(steers1) != {} && 
       [animalWhat $animals(steers1)] == "sorghum" &&
       ([animalWeight $animals(steers1)] > 450 || [dateIs 1-apr])} {
       moveStockTo $animals(steers1) "" feedlot
   }

   if {$animals(steers2) != {} && 
       [animalWhat $animals(steers2)] == "sorghum" &&
       ([animalWeight $animals(steers2)] > 450 || [dateIs 1-apr])} {
       moveStockTo $animals(steers2) "" feedlot
   }

   if {$animals(heifers) != {} && 
       [animalWhat $animals(heifers)] == "sorghum" &&
       ([animalWeight $animals(heifers)] > 450 || [dateIs 1-apr])} {
       moveStockTo $animals(heifers) "" feedlot
   }
   
   # Off the farm after 
   foreach a {steers1 steers2 heifers} {
      if {$animals($a) != {} && 
          ([animalDaysIn $animals($a) "feedlot"] == 70 || [dateIs 1-aug])} {
        animalsOut $animals($a) all
        set animals($a) {}
      }
   }

  
   # Work out feedlot costs
   set nInFeedlot 0
   foreach a {steers1 steers2 heifers} {
      if {$animals($a) != {} && 
          [animalWhat $animals($a)] == "feedlot"} {
         set nInFeedlot [expr $nInFeedlot + [animalNumber $animals($a)]]
      }
   }

   if {$nInFeedlot > 0} {
      apsimSendMessage economics expenditure {paddock livestock}\
             "cost [expr $nInFeedlot * $animals(dailyFeedlotCost)]" \
             [list comment "feedlot costs for $nInFeedlot beasts"]
   }

   # Work out supplement costs
   set nSupplemented 0
   foreach a {steers1 steers2 heifers} {
      if {$animals($a) != {} && 
          $animals($animals($a),supplemented)} {
         set nSupplemented [expr $nSupplemented + [animalNumber $animals($a)]]
      }
   }

   if {$nSupplemented > 0} {
      apsimSendMessage economics expenditure {paddock livestock}\
             "cost [expr $nSupplemented * $animals(dailySupplementCost)]" \
             [list comment "supplement costs for $nSupplemented beasts"]
      puts "animals: Supplementary feeding for $nSupplemented beasts"
   }
   
}
```
      rule Structural
        on init:
```
# Initialisation for Kilmore
set simName "CQ scenario 2"

set paddocks [list toplevel p1 p2 p3 p4 p5 p6 p7 p8 p9 p10 p11 p20 p12 p13 p14 p17 p16 p18 p19]
set config(cropPaddocks)    [list p1 p2 p3 p4 p5 p6 p7 p8 p9 p11 p12]
set config(pasturePaddocks) [list p13 p14 p17  ]
set config(foragePaddocks)  [list p10 p20 p16 p18 p19 ]

set config(p1,graphNames)  GrainCrops
set config(p2,graphNames)  GrainCrops
set config(p3,graphNames)  GrainCrops
set config(p4,graphNames)  GrainCrops
set config(p5,graphNames)  GrainCrops
set config(p6,graphNames)  GrainCrops
set config(p7,graphNames)  GrainCrops
set config(p8,graphNames)  GrainCrops
set config(p9,graphNames)  GrainCrops
set config(p10,graphNames) ForageOats
set config(p11,graphNames) GrainCrops
set config(p12,graphNames) GrainCrops
set config(p13,graphNames) {} ;# buffel
set config(p14,graphNames) {} ;#  ppg
#                              p15 is the bull paddock
set config(p16,graphNames) ForageSorghum  
set config(p17,graphNames) {} ;# leucaena
set config(p18,graphNames) ForageSorghum
set config(p19,graphNames) ForageSorghum
set config(p20,graphNames) ForageOats
set config(toplevel,graphNames) {} ;# StockMgt

set config(p1,area)     238.0
set config(p1,initialState)  Fallow
set config(p1,history)  {sorghum sorghum}
set config(p1,daysSinceLastHarvest) 365              ;# A long time

set config(p2,area)     238.0
set config(p2,initialState)  Fallow
set config(p2,history)  {wheat sorghum}
set config(p2,daysSinceLastHarvest) 365

set config(p3,area)     238.0                          ;# Area
set config(p3,initialState)  Fallow
set config(p3,history)  {wheat wheat}
set config(p3,daysSinceLastHarvest) 365

set config(p4,area)     238.0                          ;# Area
set config(p4,initialState)  Fallow
set config(p4,history)  {wheat sorghum}
set config(p4,daysSinceLastHarvest) 365

set config(p5,area)     238.0                          ;# Area
set config(p5,initialState)  Fallow
set config(p5,history)  {sorghum sorghum}
set config(p5,daysSinceLastHarvest) 365

set config(p6,area)     238.0                          ;# Area
set config(p6,initialState)  Fallow
set config(p6,history)  {sorghum sorghum}
set config(p6,daysSinceLastHarvest) 365

set config(p7,area)     238.0                          ;# Area
set config(p7,initialState)  Fallow
set config(p7,history)  {wheat sorghum}
set config(p7,daysSinceLastHarvest) 365

set config(p8,area)     238.0                          ;# Area
set config(p8,initialState)  Fallow
set config(p8,history)  {wheat wheat}
set config(p8,daysSinceLastHarvest) 365

set config(p9,area)     238.0                          ;# Area
set config(p9,initialState)  Fallow
set config(p9,history)  {wheat sorghum}
set config(p9,daysSinceLastHarvest) 365

set config(p10,area)     65.0                          ;# Area
set config(p10,initialState)  Fallow
set config(p10,history)  {oats}
set config(p10,daysSinceLastHarvest) 365

set config(p20,area)     50.0                          ;# Area
set config(p20,initialState)  Fallow
set config(p20,history)  {oats}
set config(p20,daysSinceLastHarvest) 365

set config(p11,area)      187.0                          ;# Area
set config(p11,initialState)  Fallow
set config(p11,history)   {}
set config(p11,daysSinceLastHarvest) 365

set config(p12,area)      142.0                          ;# Area
set config(p12,initialState)  Fallow
set config(p12,history)   {}
set config(p12,daysSinceLastHarvest) 365

set config(p17,area)      121.0                          ;# Area
set config(p17,initialState)  {}
set config(p17,history)   {}
set config(p17,daysSinceLastHarvest) 365

set config(p13,area)      150.0                         ;# GUESSED
set config(p13,initialState)  {}
set config(p13,history)   {}
set config(p13,daysSinceLastHarvest) 365

set config(p14,area)      50.0                          ;# GUESSED
set config(p14,initialState)  {}
set config(p14,history)   {}
set config(p14,daysSinceLastHarvest) 365

set config(p16,area)      100.0                          ;# Area
set config(p16,initialState)  Fallow
set config(p16,history)   {}
set config(p16,daysSinceLastHarvest) 365

set config(p18,area)      200.0                          ;# Area
set config(p18,initialState)  Fallow
set config(p18,history)   {}
set config(p18,daysSinceLastHarvest) 365

set config(p19,area)      100.0                          ;# Area
set config(p19,initialState)  Fallow
set config(p19,history)   {}
set config(p19,daysSinceLastHarvest) 365

set config(toplevel,area) 0
set config(toplevel,initialState)  Off
set config(toplevel,history)  {}
set config(toplevel,daysSinceLastHarvest) 0
```
        on start_simulation:
```
apsimSendMessage .masterpm.p13.buffel establish {init_section establishment}
apsimSendMessage .masterpm.p17.leucaena establish {init_section establishment}
apsimSendMessage .masterpm.p14.PurplePGrass establish {init_section establishment}

set defaults(spray,tractor)                 'tractor_2'
```
      rule Farm logic -> /Simulations/Shared/Farm Manager/Farm logic
      rule Rugplot stuff -> /Simulations/Shared/Farm Manager/Rugplot stuff
      rule Weeds -> /Simulations/Shared/Farm Manager/Weeds
      tclui Forage Sorghum Sowing Rule -> /Simulations/Shared/Farm Manager/Forage Sorghum Sowing Rule
      tclui Oats Sowing Rule -> /Simulations/Shared/Farm Manager/Oats Sowing Rule
    clock
      start_date = 1/7/1975  # Select the start date of the simulation
      end_date = 1/7/1980  # Select the end date of the simulation
    summaryfile: filename=Kilmore.sum
    siloinput met -> /Simulations/Shared/Met Data from Silo
    tclmanager Economics
      rule Initialisation logic
        on init:
        script: same as in CQ baseline.Economics.Initialisation logic
      tclui Initial Capital Assets: uiscript=source $apsuite/UserInterface/APSFarm/CapitalUI.tcl; category=icapital
        icapital: ivalue=0; loanRate=0; loanDuration=0
      tclui Cash Journal: uiscript=source $apsuite/UserInterface/APSFarm/CashbookUI.tcl; balance=42000; outputfilename=CQ scenario 2.Cashbook.csv; summaryfilename=CQ scenario 2.Cashbook.Summary.csv
      tclui Machinery - 200kwFWA: uiscript=source $apsuite/UserInterface/APSFarm/MachineryUI.tcl; category=tractor
        tractor tractor_1: fuelrate (lts/hour)=[25.0, 60.0]; workrate (ha/hour)=[100.0, 500.0]; workrate=[20, 10, 50.0, 60.0]; fuelrate=[15, 10, 60.0, 35.0]; hoursperday=[8, 8, 20, 20]; image=./lib/choofer.gif; newPrice=150000.0; tradeInValue=15; lifeOfEquipment=3000; insuranceRate=6.2; repairs=30; oil=10; loanInterestRate=0.0; loanDuration=5; age=2
      tclui Machinery - 100kwFWA: uiscript=source $apsuite/UserInterface/APSFarm/MachineryUI.tcl; category=tractor
        tractor tractor_2: image=./lib/choofer.gif; newPrice=150000.0; tradeInValue=15; lifeOfEquipment=3000; insuranceRate=6.2; repairs=30; oil=10; loanInterestRate=0.0; loanDuration=5; age=2; workrate=[50.0, 60.0]; fuelrate=[60.0, 35.0]; hoursperday=[20, 20]
      tclui Machinery - Precision Planter: same as CQ baseline.Economics.Machinery - Precision Planter
      tclui Machinery - Plough: same as CQ baseline.Economics.Machinery - Plough
      tclui Prices: same as CQ baseline.Economics.Prices
      tclui Costs - Farm Overheads: same as CQ baseline.Economics.Costs - Farm Overheads
      tclui Costs - Fuel: uiscript=source $apsuite/UserInterface/APSFarm/TreatmentsUI.tcl; category=fuelcosts
        fuelcosts: desc=Cost of fuel (net); price=0.835; units=$/litre; updated=15/10/2007
      tclui Costs - Fertilisers: same as CQ baseline.Economics.Costs - Fertilisers
      tclui Costs - Herbicides: same as CQ baseline.Economics.Costs - Herbicides
      tclui Costs - Insecticides: same as CQ baseline.Economics.Costs - Insecticides
      tclui Costs - Seed: same as CQ baseline.Economics.Costs - Seed
      tclui Costs - Defoliants: uiscript=source $apsuite/UserInterface/APSFarm/TreatmentsUI.tcl; category=defoliant
        defoliant dropp: desc=dropp (thidiazuron + diuron); price=147; units=kg
        defoliant salt defoliant: desc=Salt Defoliant; price=1.55; units=kg
      tclui Costs - Contractors: same as CQ baseline.Economics.Costs - Contractors
    area p1
      wheat -> /Simulations/Shared/wheat
      chickpea -> /Simulations/Shared/chickpea
      sorghum -> /Simulations/Shared/sorghum
      surfaceom surface organic matter -> /Simulations/Shared/surface organic matter
      fertiliser -> /Simulations/Shared/fertiliser
      erosion: same as CQ baseline.p1.Erosion
      soil -> /Simulations/Shared/Kilmore 120
      SweetSorghum -> /Simulations/Shared/SweetSorghum
      oats -> /Simulations/Shared/oats
    area p2
      wheat -> /Simulations/Shared/wheat
      chickpea -> /Simulations/Shared/chickpea
      sorghum -> /Simulations/Shared/sorghum
      surfaceom surface organic matter -> /Simulations/Shared/surface organic matter
      fertiliser -> /Simulations/Shared/fertiliser
      erosion: same as CQ baseline.p2.Erosion
      soil -> /Simulations/Shared/Kilmore 130
      SweetSorghum -> /Simulations/Shared/SweetSorghum
      oats -> /Simulations/Shared/oats
    area p3: same as CQ baseline.p2
    area p4: same as CQ baseline.p2
    area p5: same as CQ baseline.p5
    area p6: same as CQ baseline.p5
    area p7: same as CQ baseline.p5
    area p8: same as CQ baseline.p8
    area p9: same as CQ baseline.p9
    area p10: same as CQ scenario 1.p10
    area p20: same as CQ scenario 1.p10
    area p11
      wheat -> /Simulations/Shared/wheat
      chickpea -> /Simulations/Shared/chickpea
      sorghum -> /Simulations/Shared/sorghum
      surfaceom surface organic matter
        PoolName = wheat_stubble  # Organic Matter pool name
        type = wheat  # Organic Matter type
        mass = 1000  # Initial surface residue (kg/ha)
        cnr = 80  # C:N ration of initial residue
        standing_fraction = 0  # Fraction of residue standing
      fertiliser
      erosion: same as CQ baseline.p1.Erosion
      soil -> /Simulations/Shared/Kilmore 150
    area p12: same as CQ scenario 2.p11
    area p13: same as CQ baseline.p13
    area p14: same as CQ baseline.p14
    area p17: same as CQ baseline.p17
    area p15: same as CQ baseline.p11
    area p16: same as CQ scenario 1.p16
    area p18: same as CQ scenario 1.p18
    area p19: same as CQ scenario 1.p19
    graz a1 -> /Simulations/Shared/animal
    graz a2 -> /Simulations/Shared/animal
    graz a3 -> /Simulations/Shared/animal
    graz a4 -> /Simulations/Shared/animal
    graz a5 -> /Simulations/Shared/animal
