folder simulations: version=29
  simulation 50 maize 50 intercrop
    metfile met: filename=%apsim%\Examples\MetFiles\Kakamega.met
    clock
    accum: variable=rain[10]  # variable
    summaryfile
    tclmanager Management
      rule Setup
        # Paddock Descriptions
        p1 = paddock1  # Paddock 1 name
        p1a = 0.5  # Paddock 1 Area (ha)
        p2 = paddock2  # Paddock 2 name
        p2a = 0.5  # Paddock 2 Area (ha)
        on init:
```
set config(paddocks) [list [p1] [p2]]
set config([p1],area) [p1a]
set config([p2],area) [p2a]

# A list of crops in each paddock
set config(crops) [list maize bean]

foreach paddock $config(paddocks) {
  set config($paddock,initialState) Fallow
  set config($paddock,history) {}
  set config($paddock,graphNames) graph
  set state($paddock) {}
}

set simName [apsimGet title]
```
      rule Sow LR maize
        # Sowing criteria
        date1 = 15-mar  # Enter sowing window START date (dd-mmm)
        date2 = 15-may  # Enter sowing window END date (dd-mmm)
        must_sow = no  # Must sow?
        raincrit = 20  # Amount of rainfall
        rainnumdays = 4  # Number of days of rainfall
        # Sowing parameters
        crop = maize  # Enter name of crop to sow
        density = 4.4  # Enter sowing density (plants/m2)
        depth = 30  # Enter sowing depth (mm)
        cultivar = makueni  # Enter cultivar
        class = plant  # Enter crop growth class
        row_spacing = 750  # Enter row spacing (mm)
        # Fertiliser parameters
        fert_amt = 0  # Amount of fertiliser
        fert_type = no3_n  # Type of fertiliser
        # Fertiliser parameters
        cost = 42  # Cost of sowing ($/ha)
        # Tillage parameters
        presowtill = yes  # Do Presow Tillage operations
        sowtill = yes  # Do Sowing Tillage operations
        on init:
```
# Sow this crop
proc sow_LR_[crop] {paddock} {
  global config

  if {"[presowtill]" == "yes"} {
     doPresowTillage $paddock
  }

  # The apsim crop module
  apsimSendMessage $paddock.[crop] sow {plants [density]} {sowing_depth [depth]} {cultivar  [cultivar]} {row_spacing [row_spacing]} {crop_class  [class]}

  if {[fert_amt] > 0} {
     apsimSendMessage $paddock.fertiliser apply {type [fert_type]} {amount [fert_amt]}
     apsimSendMessage economics expenditure {category fertilisercost} "name  [fert_type]" \
               "rate [fert_amt]" "area $config($paddock,area)"  "paddock $paddock" "fertiliser_type [fert_type]" \
               "fertiliser_rate [fert_amt]" {incrop_cost {}} "crop [crop]" \
               "comment Fertiliser" 
  }

  if {"[sowtill]" == "yes"} {
     doSowingTillage $paddock
  }

  apsimSendMessage economics expenditure \
                   "cost [expr [cost] * $config($paddock,area)]" \
                   "area $config($paddock,area)" \
                   "paddock $paddock" "costtype incrop_cost" {comment "sowing costs"} 
  set config(season) "LR"
}

# Can we sow a crop?
proc canSow_LR_[crop] {paddock} {
  if {[paddockIsFallow $paddock]} {
    if {[dateWithin [date1] [date2]] } {
      if {( [apsimGet rain\[[rainnumdays]\]] >= [raincrit] ) ||
          ( "[must_sow]" == "yes" && [dateIs '[date2]'] ) } {
          return 1
      }
    }
  }
  return 0 
}

# Return whether any crop in our paddock is not "out"
proc paddockIsFallow {paddock} {
   global config
   foreach crop $config(crops) {
      set status [apsimGet $paddock.$crop.plant_status]
      if {$status != "out"} {
         return 0
      }
   }
   return 1
}

##########Date functions (general)
proc dateWithin {t0 t1} {
   set year [apsimGet year]
   set d0 [date2day $t0 $year]
   set d1 [date2day $t1 $year]
   return [dayWithin $d0 $d1]
}

proc dateIs {t} {
   set d [date2day $t [apsimGet year]]
   return [dayIs $d]
}

proc dayWithin {t0 t1} {
   set t [apsimGet day]
   if {$t0 > $t1} {
      return [expr $t >= $t0 || $t <= $t1]
   } else {
      return [expr $t >= $t0 && $t <= $t1]
   }
   # notreached
}

proc dayIs {t} {
   return [expr $t == [apsimGet day]]
}

proc leapyr {y} {
   return [expr ($y%4 == 0) && ($y%100 != 0) || ($y%400 == 0)]
}

proc date2day {date year} {
   foreach {mday month} [split $date "-"] {break}
   if {[leapyr $year]} {
      array set daysin {jan 0  feb 31 mar 58 apr 89 may 119 jun 150 jul 180 aug 211 sep 242 oct 272 nov 303 dec 333}
   } else {
      array set daysin {jan 0  feb 31 mar 59 apr 90 may 120 jun 151 jul 181 aug 212 sep 243 oct 273 nov 304 dec 334}
   }   
   return [expr $mday + $daysin($month)]
}
```
      rule Sow SR maize
        # Sowing criteria
        date1 = 1-sep  # Enter sowing window START date (dd-mmm)
        date2 = 15-oct  # Enter sowing window END date (dd-mmm)
        must_sow = no  # Must sow?
        raincrit = 20  # Amount of rainfall
        rainnumdays = 4  # Number of days of rainfall
        # Sowing parameters
        crop = maize  # Enter name of crop to sow
        density = 4.4  # Enter sowing density (plants/m2)
        depth = 30  # Enter sowing depth (mm)
        cultivar = makueni  # Enter cultivar
        class = plant  # Enter crop growth class
        row_spacing = 750  # Enter row spacing (mm)
        # Fertiliser parameters
        fert_amt = 0  # Amount of fertiliser
        fert_type = no3_n  # Type of fertiliser
        # Economic parameters
        cost = 20  # Cost of sowing ($/ha)
        # Tillage parameters
        presowtill = yes  # Do Presow Tillage operations
        sowtill = yes  # Do Sowing Tillage operations
        on init:
```
proc sow_SR_[crop] {paddock} {
  global config

  if {"[presowtill]" == "yes"} {
     doPresowTillage $paddock
  }

  # The apsim crop module
  apsimSendMessage $paddock.[crop] sow {plants [density]} {sowing_depth [depth]} {cultivar  [cultivar]} {row_spacing [row_spacing]} {crop_class  [class]}

  if {[fert_amt] > 0} {
     apsimSendMessage $paddock.fertiliser apply {type [fert_type]} {amount [fert_amt]}
     apsimSendMessage economics expenditure {category fertilisercost} "name  [fert_type]" \
               "rate [fert_amt]" "area $config($paddock,area)"  "paddock $paddock" "fertiliser_type [fert_type]" \
               "fertiliser_rate [fert_amt]" {incrop_cost {}} "crop [crop]" \
               "comment Fertiliser" 
  }

  if {"[sowtill]" == "yes"} {
     doSowingTillage $paddock
  }

  apsimSendMessage economics expenditure \
                   "cost [expr [cost] * $config($paddock,area)]" \
                   "area $config($paddock,area)" \
                   "paddock $paddock" "costtype incrop_cost" {comment "sowing costs"} 

  set config(season) "SR"
}


# Can we sow a crop?
proc canSow_SR_[crop] {paddock} {
  if {[paddockIsFallow $paddock]} {
    if {[dateWithin [date1] [date2]] } {
      if {( [apsimGet rain\[[rainnumdays]\]] >= [raincrit] ) ||
          ( "[must_sow]" == "yes" && [dateIs '[date2]'] ) } {
          return 1
      }
    }
  }
  return 0 
}

# Return whether any crop in our paddock is not "out"
proc paddockIsFallow {paddock} {
   global config
   foreach crop $config(crops) {
      set status [apsimGet $paddock.$crop.plant_status]
      if {$status != "out"} {
         return 0
      }
   }
   return 1
}

##########Date functions (general)
proc dateWithin {t0 t1} {
   set year [apsimGet year]
   set d0 [date2day $t0 $year]
   set d1 [date2day $t1 $year]
   return [dayWithin $d0 $d1]
}

proc dateIs {t} {
   set d [date2day $t [apsimGet year]]
   return [dayIs $d]
}

proc dayWithin {t0 t1} {
   set t [apsimGet day]
   if {$t0 > $t1} {
      return [expr $t >= $t0 || $t <= $t1]
   } else {
      return [expr $t >= $t0 && $t <= $t1]
   }
   # notreached
}

proc dayIs {t} {
   return [expr $t == [apsimGet day]]
}

proc leapyr {y} {
   return [expr ($y%4 == 0) && ($y%100 != 0) || ($y%400 == 0)]
}

proc date2day {date year} {
   foreach {mday month} [split $date "-"] {break}
   if {[leapyr $year]} {
      array set daysin {jan 0  feb 31 mar 58 apr 89 may 119 jun 150 jul 180 aug 211 sep 242 oct 272 nov 303 dec 333}
   } else {
      array set daysin {jan 0  feb 31 mar 59 apr 90 may 120 jun 151 jul 181 aug 212 sep 243 oct 273 nov 304 dec 334}
   }   
   return [expr $mday + $daysin($month)]
}
```
      rule Sow maizebean
        # Sowing criteria
        date1 = 15-mar  # Enter sowing window START date (dd-mmm)
        date2 = 15-may  # Enter sowing window END date (dd-mmm)
        must_sow = no  # Must sow?
        raincrit = 20  # Amount of rainfall
        rainnumdays = 4  # Number of days of rainfall
        # Maize Sowing parameters
        crop = maize  # Enter name of crop to sow
        density = 4.4  # Enter sowing density (plants/m2)
        depth = 30  # Enter sowing depth (mm)
        cultivar = katumani  # Enter cultivar
        class = plant  # Enter crop growth class
        row_spacing = 750  # Enter row spacing (mm)
        # Bean sowing parameters
        crop2 = bean  # Enter name of crop to sow
        density2 = 8.8  # Enter sowing density (plants/m2)
        depth2 = 30  # Enter sowing depth (mm)
        cultivar2 = fiord  # Enter cultivar
        class2 = plant  # Enter crop growth class
        row_spacing2 = 750  # Enter row spacing (mm)
        # Fertiliser parameters
        fert_amt = 0  # Amount of fertiliser
        fert_type = no3_n  # Type of fertiliser
        # Economic parameters
        cost = 42  # Cost of Sowing ($/ha)
        # Tillage parameters
        presowtill = yes  # Do Presow Tillage operations
        sowtill = yes  # Do Sowing Tillage operations
        on init:
```
# Sow this crop
proc sow_maizebean {paddock} {
  global config
  
  if {"[presowtill]" == "yes"} {
     doPresowTillage $paddock
  }

  apsimSendMessage $paddock.[crop] sow {plants [density]} {sowing_depth [depth]} {cultivar  [cultivar]} {row_spacing [row_spacing]} {crop_class  [class]}

  apsimSendMessage $paddock.[crop2] sow {plants [density2]} {sowing_depth [depth2]} {cultivar  [cultivar2]} {row_spacing [row_spacing2]} {crop_class  [class2]}

  if {[fert_amt] > 0} {
     apsimSendMessage $paddock.fertiliser apply {type [fert_type]} {amount [fert_amt]}
     apsimSendMessage economics expenditure {category fertilisercost} "name  [fert_type]" \
               "rate [fert_amt]" "area $config($paddock,area)"  "paddock $paddock" "fertiliser_type [fert_type]" \
               "fertiliser_rate [fert_amt]" {incrop_cost {}} "crop [crop]" \
               "comment Fertiliser" 
  }
  
  apsimSendMessage economics expenditure \
                   "cost [expr [cost] * $config($paddock,area)]" \
                   "area $config($paddock,area)" \
                   "paddock $paddock" "costtype incrop_cost" {comment "sowing costs"} 

  if {"[sowtill]" == "yes"} {
     doSowingTillage $paddock
  }
  set config(season) "LR"
}

# Can we sow a crop?
proc canSow_maizebean {paddock} {
  if {[paddockIsFallow $paddock]} {
    if {[dateWithin [date1] [date2]] } {
      if {( [apsimGet rain\[[rainnumdays]\]] >= [raincrit] ) ||
          ( "[must_sow]" == "yes" && [dateIs '[date2]'] ) } {
          return 1
      }
    }
  }
  return 0 
}

# Return whether any crop in our paddock is not "out"
proc paddockIsFallow {paddock} {
   global config
   foreach crop $config(crops) {
      set status [apsimGet $paddock.$crop.plant_status]
      if {$status != "out"} {
         return 0
      }
   }
   return 1
}

##########Date functions (general)
proc dateWithin {t0 t1} {
   set year [apsimGet year]
   set d0 [date2day $t0 $year]
   set d1 [date2day $t1 $year]
   return [dayWithin $d0 $d1]
}

proc dateIs {t} {
   set d [date2day $t [apsimGet year]]
   return [dayIs $d]
}

proc dayWithin {t0 t1} {
   set t [apsimGet day]
   if {$t0 > $t1} {
      return [expr $t >= $t0 || $t <= $t1]
   } else {
      return [expr $t >= $t0 && $t <= $t1]
   }
   # notreached
}

proc dayIs {t} {
   return [expr $t == [apsimGet day]]
}

proc leapyr {y} {
   return [expr ($y%4 == 0) && ($y%100 != 0) || ($y%400 == 0)]
}

proc date2day {date year} {
   foreach {mday month} [split $date "-"] {break}
   if {[leapyr $year]} {
      array set daysin {jan 0  feb 31 mar 58 apr 89 may 119 jun 150 jul 180 aug 211 sep 242 oct 272 nov 303 dec 333}
   } else {
      array set daysin {jan 0  feb 31 mar 59 apr 90 may 120 jun 151 jul 181 aug 212 sep 243 oct 273 nov 304 dec 334}
   }   
   return [expr $mday + $daysin($month)]
}
```
      rule Harvest maize rule
        #
        crop = maize  # Enter name of crop to harvest when ripe
        remove = yes  # Sell Residues
        on init:
```
proc canHarvest_[crop] {paddock} {
  return [expr [string equal [apsimGet $paddock.[crop].StageName] "harvest_ripe"] || \
               [string equal [apsimGet $paddock.[crop].plant_status] "dead"]]
}

proc harvest_[crop] {paddock} {

   global config daysSinceLastHarvest harvest
   apsimSendMessage labour operate "operator operator1" "implement harvesting"\
                   "area $config($paddock,area)" \
                   "paddock $paddock" "costtype incrop_cost"    

   set yield [expr [apsimGet .masterpm.$paddock.[crop].yield]/1000.0]
   set biomass [apsimGet .masterpm.$paddock.[crop].biomass]

   apsimSendMessage economics income {category cropprice} "name [crop]"  \
                          "yield $yield" \
                          "area $config($paddock,area)" "paddock $paddock" "crop [crop]" \
                          "SW_state [apsimGet $config($paddock,watBal).esw]" \
                          "NO3_state [apsimGet $config($paddock,nModule).no3()]"                       

   apsimSendMessage $paddock.[crop]  harvest
   apsimSendMessage $paddock.[crop]  end_crop

   set daysSinceLastHarvest($paddock) 0
   
   if {[remove] == "yes"} {
      set somWt [expr [apsimGet "$paddock.Surface Organic Matter.surfaceom_wt"] / 1000.0]

      apsimSendMessage economics income {category cropprice} "name [crop]_residue"  \
                          "yield $somWt" \
                          "area $config($paddock,area)" "paddock $paddock" 


      apsimSendMessage "$paddock.Surface Organic Matter" tillage {type user_defined} {f_incorp 1.0} {tillage_depth 0.0}
   }
   
   global annual
   set year [apsimGet year]
   set wetYield [expr ($yield * 100.0) / (100.0 - 12.0)] ;# 12% grain moisture
   if {[info exists annual($year,[crop],harvest)]} {
     set annual($year,[crop],harvest) [expr $annual($year,[crop],harvest) + $wetYield * $config($paddock,area)]
   } else {
     set annual($year,[crop],harvest)  [expr $wetYield * $config($paddock,area)]
   }
   lappend harvest [list [apsimGet dd/mm/yyyy] $config(season) $paddock [crop] \
      [format %.0f [expr 1000.0 * $yield]] [format %.0f $biomass]]
}
```
      rule Harvest bean rule
        #
        crop = bean  # Enter name of crop to harvest when ripe
        on init:
```
proc canHarvest_[crop] {paddock} {
  return [expr [string equal [apsimGet $paddock.[crop].StageName] "harvest_ripe"] || \
               [string equal [apsimGet $paddock.[crop].plant_status] "dead"]]
}

proc harvest_[crop] {paddock} {

   global config daysSinceLastHarvest harvest
   apsimSendMessage labour operate "operator operator1" "implement harvesting"\
                   "area $config($paddock,area)" \
                   "paddock $paddock" "costtype incrop_cost"    

   set yield [expr [apsimGet .masterpm.$paddock.[crop].yield]/1000.0]
   set biomass [apsimGet .masterpm.$paddock.[crop].biomass]

   apsimSendMessage economics income {category cropprice} "name [crop]"  \
                          "yield $yield" \
                          "area $config($paddock,area)" "paddock $paddock" "crop [crop]" \
                          "SW_state [apsimGet $config($paddock,watBal).esw]" \
                          "NO3_state [apsimGet $config($paddock,nModule).no3()]"                       

   apsimSendMessage $paddock.[crop]  harvest
   apsimSendMessage $paddock.[crop]  end_crop

   set daysSinceLastHarvest($paddock) 0
   
   global annual
   set year [apsimGet year]
   set wetYield [expr ($yield * 100.0) / (100.0 - 12.0)] ;# 12% grain moisture
   if {[info exists annual($year,[crop],harvest)]} {
     set annual($year,[crop],harvest) [expr $annual($year,[crop],harvest) + $wetYield * $config($paddock,area)]
   } else {
     set annual($year,[crop],harvest)  [expr $wetYield * $config($paddock,area)]
   }
   lappend harvest [list [apsimGet dd/mm/yyyy] $config(season) $paddock [crop] \
      [format %.0f [expr 1000.0 * $yield]] [format %.0f $biomass]]

}
```
      rule Harvest maize bean
        #
        crop = maize  # Enter name of crop to harvest when ripe
        crop2 = bean  # Enter name of second crop
        on init:
```
# intercropping harvest rules 
proc canHarvest_[crop][crop2] {paddock} {
  # 2nd crop is harvested by default
  if { [canHarvest_[crop2] $paddock] } {
      harvest_[crop2] $paddock
  }

  return [canHarvest_[crop] $paddock]
}

proc harvest_[crop][crop2] {paddock} {

   # Make sure the intercrop is removed
   if {! [string equal [apsimGet $paddock.[crop2].plant_status] "out" ] } {
      harvest_[crop2] $paddock
   }
   harvest_[crop] $paddock
}
```
      rule Presow Tillage
        # Labour
        implement = presow_till  # The operator activity
        # Tillage
        tillage_type = user_defined
        tillage_depth = 100  # User_defined depth of seedbed preparation (mm)
        tillage_f_incorp = 0.9  # User_defined fraction of surface residues to incorporate (0-1)
        on init:
```
proc doPresowTillage {paddock} {
   global config

   if {[string equal "[tillage_type]" "user_defined"]} {
       apsimSendMessage "$paddock.Surface Organic Matter" tillage {type [tillage_type]} {f_incorp [tillage_f_incorp]} {tillage_depth [tillage_depth]}
   } else {
       apsimSendMessage "$paddock.Surface Organic Matter" tillage {type [tillage_type]}
   }

   apsimSendMessage labour operate "operator operator1" "implement [implement]"\
                   "area $config($paddock,area)" \
                   "paddock $paddock" "costtype incrop_cost" {comment "Pre sowing tillage"} 
}
```
      rule Sowing Tillage
        # Labour
        implement = sowing  # The operator activity
        # Tillage
        tillage_type = user_defined
        tillage_depth = 100  # User_defined depth of seedbed preparation (mm)
        tillage_f_incorp = 0.1  # User_defined fraction of surface residues to incorporate (0-1)
        on init:
```
proc doSowingTillage {paddock} {
   global config

   if {[string equal "[tillage_type]" "user_defined"]} {
       apsimSendMessage "$paddock.Surface Organic Matter" tillage {type [tillage_type]} {f_incorp [tillage_f_incorp]} {tillage_depth [tillage_depth]}
   } else {
       apsimSendMessage "$paddock.Surface Organic Matter" tillage {type [tillage_type]}
   }

   apsimSendMessage labour operate "operator operator1" "implement [implement]"\
                   "area $config($paddock,area)" \
                   "paddock $paddock" "costtype incrop_cost" {comment "Sowing tillage"} 
}
```
      rule Incrop Tillage
        # Labour
        implement = weeding  # The operator activity
        # Crop
        crop = maize  # Which crop is tilled
        das = 30  # Days after sowing
        # Tillage
        tillage_type = user_defined
        tillage_depth = 100  # User_defined depth of seedbed preparation (mm)
        tillage_f_incorp = 0.9  # User_defined fraction of surface residues to incorporate (0-1)
        on init:
```
proc doIncropTillage {paddock} {
   global config

   if {[string equal "[tillage_type]" "user_defined"]} {
       apsimSendMessage "$paddock.Surface Organic Matter" tillage {type [tillage_type]} {f_incorp [tillage_f_incorp]} {tillage_depth [tillage_depth]}
   } else {
       apsimSendMessage "$paddock.Surface Organic Matter" tillage {type [tillage_type]}
   }

   apsimSendMessage labour operate "operator operator1" "implement [implement]"\
                   "area $config($paddock,area)" \
                   "paddock $paddock" "costtype incrop_cost"  {comment "Incrop tillage"} 
}
```
        on post:
```
foreach paddock $config(paddocks) {
   if {[apsimGet $paddock.[crop].DaysAfterSowing] == [das]} {
      doIncropTillage $paddock
   }
}
```
      rule Fallow Tillage
        # Labour
        implement = weeding  # The operator activity
        # Crop
        dah = 40  # Days after harvest
        # Tillage
        tillage_type = user_defined
        tillage_depth = 100  # User_defined depth of seedbed preparation (mm)
        tillage_f_incorp = 0.9  # User_defined fraction of surface residues to incorporate (0-1)
        on init:
```
proc doFallowTillage {paddock} {
   global config

   if {[string equal "[tillage_type]" "user_defined"]} {
       apsimSendMessage "$paddock.Surface Organic Matter" tillage {type [tillage_type]} {f_incorp [tillage_f_incorp]} {tillage_depth [tillage_depth]}
   } else {
       apsimSendMessage "$paddock.Surface Organic Matter" tillage {type [tillage_type]}
   }

   apsimSendMessage labour operate "operator operator1" "implement [implement]"\
                   "area $config($paddock,area)" \
                   "paddock $paddock" "costtype incrop_cost" {comment "Fallow tillage"} 
}
```
        on prepare:
```
foreach paddock $config(paddocks) {
   if {$daysSinceLastHarvest($paddock) == [dah]} {
      doFallowTillage $paddock
   }
}
```
      rule Fallow Spraying (disabled)
        # Labour
        implement = spraying  # The operator activity
        # Crop
        dah = 30  # Days after harvest
        # Cost
        cost = 4.2  # Cost of spraying ($/ha)
        on init:
```
proc doFallowSpray {paddock} {
   global config

   apsimSendMessage labour operate "operator operator1" "implement [implement]"\
                   "area $config($paddock,area)" \
                   "paddock $paddock" "costtype incrop_cost" {comment "Fallow Spraying"} 

   apsimSendMessage economics expenditure \
                   "cost [expr [cost] * $config($paddock,area)]" \
                   "area $config($paddock,area)" \
                   "paddock $paddock" "costtype incrop_cost" {comment "Spraying costs"}                    
}
```
        on prepare:
```
foreach paddock $config(paddocks) {
   if {$daysSinceLastHarvest($paddock) == [dah]} {
      doFallowSpray $paddock
   }
}
```
      rule Farm logic
        # No editable parameters
        on init:
```
# Return area (ha) planted to a crop
proc areaOf {crop} {
   global config
   if {[info exists config($crop,alias)]} {set crop $config($crop,alias)}
   set sum 0.0
   foreach paddock $config(cropPaddocks) {
      set state [currentState $paddock]
      if {[info exists config($state,alias)]} {set state $config($state,alias)}
      if {"$state" == "$crop"} {
        set sum [expr $sum + $config($paddock,area)]
      }
   }
   return $sum
}

proc areaPlantedOk {crop} {
   global config
   if {[info exists config($crop,alias)]} {set crop $config($crop,alias)}
   set f [expr [areaOf $crop] / $config(allCropArea)]

   return [expr $f < $config(maxFract,$crop)]
}

proc historyOk {paddock crop} {
   global config
   if {[info exists config($crop,alias)]} {set crop $config($crop,alias)}
   set max $config(maxContinuous,$crop)
   set n [llength $config($paddock,history)]
   for {set i $n} {$i >= $n - $max} {decr i} {
      if {[lindex $config($paddock,history)] != $crop} {return 1}
   }
   return 0
}



########### Support procedures

proc max {a b} { return [expr {($a > $b) ? $a : $b}] }
proc min {a b} { return [expr {($a > $b) ? $b : $a}] }

# Return the current state of the system
proc currentState {paddock} {
   global state
   return $state($paddock)
}

# Gather arguments (eg sowing depth, fert rate etc} from defaults array
# $action: the operation (sow, fert ...
# $what: the module (wheat, sorghum ...
proc gatherArgs {action what} {
   global defaults config

   # 1. "sow,..."
   foreach {index value} [array get defaults $action,*] {
      set args([lindex [split $index ","] end]) $value
   }
   # 2. override above with any "wheat,sow,..."
   foreach {index value} [array get defaults $what,$action,*] {
      set args([lindex [split $index ","] end]) $value
   }
   # 3. override above with any "SpringWheat,sow,..."
   if {[info exists config($what,alias)]} {
      foreach {index value} [array get defaults $config($what,alias),$action,*] {
         set args([lindex [split $index ","] end]) $value
      }
   }
   return [array get args]
}

# Mash a list into name/value pairs to pass via the apsim message system
proc mash {list} {
   set result {}
   foreach {name value} $list {lappend result [list $name $value]}
   return $result
}

# Sum a list
proc lsum {list} {
   set result 0.0
   foreach value $list {set result [expr $result + $value]}
   return $result
}

# Linear interpolation
proc linint {x_coords y_coords value} {
   set y  0.0

   if {[llength $x_coords] <= 0 || [llength $y_coords] <= 0 || [llength $x_coords] != [llength $y_coords]} {
      error "bad coordinates in linear_interp_real"
   }

   for {set indx 0} {$indx < [llength $x_coords]} {incr indx} {
      if {$value <= [lindex $x_coords $indx]} {
         if {$indx == 0} {
            set y [lindex $y_coords $indx]
         } else {
            if {abs($value - [lindex $x_coords $indx]) < 1.0E-4} {
               set y [lindex $y_coords $indx]
            } else  {
               set y_part [expr [lindex $y_coords $indx] - [lindex $y_coords [expr $indx-1]] ]
               set x_part [expr [lindex $x_coords $indx] - [lindex $x_coords [expr $indx-1]] ]
               set y [expr ($y_part/$x_part) * ($value - [lindex $x_coords [expr $indx - 1]]) + [lindex $y_coords [expr $indx- 1]] ]
            }
         break;
         }
      } elseif {$indx == [lindex $x_coords $indx]-1} {
         set y  [lindex $y_coords $indx]
      } else {
         set y  0.0
      }
   }
   return $y
}

#############################
############### The decision routine(s).
#############################
# Return the score for planting "what"
proc checkRules {thisPaddock} {
  global config

  uplevel #0 set paddock \"$thisPaddock\"
  set bestScore -1.0; set bestTarget {}; set bestArc {}; set bestGraph {}
  foreach graph $config($thisPaddock,graphNames) {
     foreach arc [$graph arcs -out [currentState $thisPaddock]] {
        set expr {}
        set target [$graph arc target $arc]
        foreach rule [$graph arc get $arc rules] {
           set value [uplevel #0 expr $rule]
           lappend expr $value
           if {$value == 0} {break} ;# no need to continue evaluating subsequent rules
        }
        if {[llength $expr] > 0} {
           set score [expr [join $expr "*"]]
           if {$score > $bestScore} {
              set bestScore  $score
              set bestTarget $target
              set bestArc    $arc
              set bestGraph  $graph
           }
        }
     }
  }   
  return [list  $bestScore $bestGraph $bestTarget $bestArc]
}

# A place holder function to monitor state transitions
proc logState {graph paddock state} {puts "$graph $paddock $state"}

# Change state to another
proc changeState {paddock graph arc} {
   global state
   uplevel #0 set paddock \"$paddock\"
   foreach action [$graph arc get $arc actions] { uplevel #0 $action }
   set state($paddock) [$graph arc target $arc]
   logState $graph $paddock $state($paddock)
}

# Do daily process at top level
proc doProcess {} {
   global date config daysSinceLastHarvest
   
   set date "[apsimGet day],[apsimGet year]"

   set more 1
   while {$more} {
      set more 0
      # 1. Find out what's possible
      set bestPaddock {}; set bestScore -1.0
      foreach paddock $config(paddocks) {
         foreach {score graph target arc} [checkRules $paddock] {break}
         if {$score > $bestScore} {
            set bestPaddock $paddock; set bestScore $score; set bestGraph $graph; set bestTarget $target; set bestArc $arc
         }
      }
      if {$bestScore > 0.0} {
         changeState $bestPaddock $bestGraph $bestArc
         set more 1
      }
   }
   
   foreach paddock $config(paddocks) {
      incr daysSinceLastHarvest($paddock)
   }   
}

# pass events to various output files
proc reportEvent {from what} {
   foreach {event args} [split $what "-"] {break}
}

puts "Done farm"
```
        on process:
```
# Housekeeping
if {[catch {doProcess } msg]} {
   puts "$errorInfo"
   error "$msg\n$errorInfo"
}
```
        on start_simulation:
```
foreach paddock $config(paddocks) {
  set state($paddock)         $config($paddock,initialState) ;# Should get this from xml
  set history($paddock)       $config($paddock,history)
  set daysSinceLastHarvest($paddock) 60
}

# All our soils are called "Soil.." 
foreach paddock $config(paddocks) {
   set config($paddock,watBal)   ".masterpm.$paddock.Soil Water"
   set config($paddock,nModule)  ".masterpm.$paddock.Soil Nitrogen"
}

set config(states) {}
```
      rule Rugplot stuff (disabled)
        # No editable parameters
        on init:
```
# Rug plotting facility

# 2 areas of interest:
# - logState - called when a graph is changing state, called just after the "actions" have been evaluated

# a logfile is used to generate the rugplots of farm activities. There are 2 parts:
# an xml of paddocks, states & times,
# a binary of decision rules on each evaluation cycle
proc log {msg} {
   #puts $msg
}

package require cdftcl
package require tdom

proc setupLogging {} {
   global simName config 

   # Find the number of graphs - 1 file for each. Delete each.
   set config(graphs) {}
   foreach paddock $config(paddocks) {
     foreach graph $config($paddock,graphNames) {
        if {[lsearch $config(graphs) $graph] < 0} {
           lappend config(graphs) $graph
        }
     }
  }
  foreach graph $config(graphs) {
    puts "deleting $simName.$graph.\[xml,nc\]"
    file delete -force $simName.$graph.xml
    file delete -force $simName.$graph.nc
    foreach paddock $config(paddocks) {
       set config(history,$paddock,$graph) {}
    }
  }
  set config(states) {}
  set config(rules) {}
  set config(historyDays) {}
}

# Log a set of rule evaluations
proc logRules {paddock graph rules values } {
   global config history

   set data {}
   for {set i 0} {$i < [llength $rules]} {incr i} {
      lappend data [lindex $rules $i] [lindex $values $i]
   }

   set today [apsimGet today]

   lappend history($paddock,$graph,$today) $data

   if {[lsearch $config(historyDays) $today] < 0} {
       lappend config(historyDays) $today
       set config($today,ddmmyyyy) [apsimGet clock.dd/mm/yyyy]
   }
}

# Log a state transition
proc logState {graph paddock state} {
   global config
   set today [apsimGet today]
   lappend config(history,$paddock,$graph) $today $state
   if {[lsearch $config(states) $state] < 0} {lappend config(states) $state}
}

# Write the files. 
proc closeLogging {} {
   global config history simName

   set config(xmldoc) [dom parse [apsimGetComponentXML]]
   set config(docroot) [$config(xmldoc) documentElement]

puts "graphs = $config(graphs)"

   foreach graph $config(graphs) {
puts "creating $simName.$graph.nc - len = [llength $config(historyDays)]"
      set ncfp [ncdf create $simName.$graph.nc] 
      ncdfdim $ncfp create index [llength $config(historyDays)]
      ncdfdim $ncfp create time -1

      ncdfvar $ncfp create position long {index}
      ncdfvar $ncfp create daynum float {index}

      ncdfvar $ncfp create day     float {time}
      ncdfvar $ncfp create paddock short {time}
      ncdfvar $ncfp create rule    short {time}
      ncdfvar $ncfp create value   float {time}

      set day [lindex $config(historyDays) 0]
      ncdfatt $ncfp GLOBAL put startdate float $day
      ncdfatt $ncfp GLOBAL put startddmmyyyy char $config($day,ddmmyyyy)

      set day [lindex $config(historyDays) end]
      ncdfatt $ncfp GLOBAL put enddate float $day
      ncdfatt $ncfp GLOBAL put endddmmyyyy char $config($day,ddmmyyyy)

      ncdf enddef $ncfp
      set id 0
      foreach p $config(paddocks) {
         set pid($p) $id; incr id
      }   
	  puts "writing rules"
      catch {unset pos}
      set i 0
      foreach day $config(historyDays) {
         foreach paddock $config(paddocks) {
            if {[info exists history($paddock,$graph,$day)]} {
               set pos($paddock,$day) $i
               foreach data $history($paddock,$graph,$day) {
                  foreach {rule value} $data {
                     ncdfvar $ncfp put day     $i $day
                     ncdfvar $ncfp put paddock $i $pid($paddock)
                     ncdfvar $ncfp put rule    $i $rule
                     ncdfvar $ncfp put value   $i $value
                     incr i
                  } 
               }
            }
         }
      }

	  puts "writing positions"
      #Positions
      for {set i 0} {$i < [llength $config(historyDays)]} {incr i} {
         set day [lindex $config(historyDays) $i]
         set f 0
         foreach paddock $config(paddocks) {
            if {[info exists pos($paddock,$day)]} {
               ncdfvar $ncfp put position  $i $pos($paddock,$day)
               set f 1
               break
            } 
         }
         if {!$f} {
            ncdfvar $ncfp put position  $i -1
         }   
      }
      
      for {set j 0} {$j < [llength $config(historyDays)]} {incr j} {
         ncdfvar $ncfp put daynum $j [lindex $config(historyDays) $j]
      }   

      ncdf close $ncfp
puts "finished nc, opening $simName.$graph.xml"

      set fp [open $simName.$graph.xml w]
      puts $fp "<?xml version=\"1.0\" encoding=\"UTF-8\"?><simulation>"
      set id 0
      foreach paddock $config(paddocks) {
         puts $fp "<history id=\"$id\" name=\"$paddock\">"
         foreach {day state} $config(history,$paddock,$graph) {
            if {[info exists pos($paddock,$day)]} {
               puts $fp "<transition day=\"$day\" to=\"$state\" position=\"$pos($paddock,$day)\" />"
            } 
         }
         puts $fp "</history>"
         incr id
      }

      foreach paddock $config(paddocks) {
         puts $fp "<paddock id=\"$pid($paddock)\" name=\"$paddock\" />"
      }   
      set id 0
      foreach rule $config(rules) {
         set rule [string map {\< "&lt;"  \> "&gt;"     
                               \& "&amp;" \" "&quot;"  
                               \[ "&#91;" \] "&#93;"    } $rule]
         puts $fp "<rule id=\"$id\" name=\"$rule\" />"
         incr id
      }

      # Colours
      foreach node [$config(docroot) selectNodes //node] {
          set state [getValue $node "name"]
          set colour [getValue $node "fill"]
          puts $fp "<state name=\"$state\" colour=\"$colour\" />"
      }

      set day [lindex $config(historyDays) 0]
      puts $fp "<startdate ddmmyyyy=\"$config($day,ddmmyyyy)\" day=\"$day\" />"
      set day [lindex $config(historyDays) end]
      puts $fp "<enddate ddmmyyyy=\"$config($day,ddmmyyyy)\" day=\"$day\" />"

      puts $fp "</simulation>"
      close $fp
puts "finished $simName.$graph.xml"
   }  
   # $config(xmldoc) delete
}

# Override the "standard" decision routine to keep track of state info
proc checkRules {thisPaddock} {
  global config 
  uplevel #0 set paddock $thisPaddock
  set bestScore -1.0; set bestTarget {}; set bestArc {}; set bestGraph {}
  foreach graph $config($thisPaddock,graphNames) {
     foreach arc [$graph arcs -out [currentState $thisPaddock]] {
        set values {}; set rules {}
        set target [$graph arc target $arc]
        if {[$graph arc keyexists $arc window]} {set inWindow [uplevel #0 expr [$graph arc get $arc window]]} else {set inWindow 0}
        foreach rule [$graph arc get $arc rules] {
           set value [uplevel #0 expr $rule]
           lappend values $value
           lappend rules [enCodeRule $target $rule]
        }
        logRules $thisPaddock $graph $rules $values
        if {[llength $values] > 0} {
           set score [expr [join $values "*"]]
           if {$score > $bestScore} {
              set bestScore  $score
              set bestTarget $target
              set bestArc    $arc
              set bestGraph  $graph
           }
        }
     }
  }   
  return [list  $bestScore $bestGraph $bestTarget $bestArc]
}

proc enCodeRule {target ruleText} {
  global config
  regsub -all "\," $ruleText "\-" ruleText

  for {set i 0} {$i < [llength $config(rules)]} {incr i} {
     set rule [lindex $config(rules) $i]
     if {[string equal $rule "$target,$ruleText"]} {
        return $i
     }
  }
  lappend config(rules) "$target,$ruleText"
  return [expr [llength $config(rules)] - 1]
}


# Get the value of an objects 'thing'
proc getValue {id thing} {
   foreach node [$id childNodes] {
      if {[string equal -nocase [$node nodeName] $thing]} {
         return [$node text]
      }
   }
   return ""
}
```
        on start_simulation:
```
setupLogging

foreach paddock $config(paddocks) {
   logState stateGraph $paddock [currentState $paddock]
}
```
        on end_simulation:
```
closeLogging
```
      RotPlot Crop Management: canvas_height=439; rules_height=252; graph_name=graph
        node Fallow: desc=yyy
        node SRMaize: desc=New state
        node maizebean
        node LRMaize
        arc arc1: source=SRMaize; target=Fallow; actions=harvest_maize $paddock; rules=[canHarvest_maize $paddock ]
        arc arc3: source=Fallow; target=SRMaize; actions=sow_SR_maize $paddock; rules=[canSow_SR_maize $paddock]
        arc arc0: source=Fallow; target=maizebean; actions=sow_maizebean $paddock
          rules=[[canSow_maizebean $paddock], [string equal $paddock  "paddock1"]]
        arc arc2: source=maizebean; target=Fallow; actions=harvest_maizebean $paddock; rules=[canHarvest_maizebean $paddock ]
        arc arc4: source=LRMaize; target=Fallow; actions=harvest_maize $paddock; rules=[canHarvest_maize $paddock ]
        arc arc5: source=Fallow; target=LRMaize; actions=sow_LR_maize $paddock
          rules=[[canSow_LR_maize $paddock], ! [string equal $paddock  "paddock1"]]
        paddock p1: isManaged=1; initialState=Fallow
        paddock p2: isManaged=1; initialState=Fallow
        paddock p3: isManaged=1; initialState=Fallow
        paddock p4: isManaged=1; initialState=Fallow
        paddock p5: isManaged=1; initialState=Fallow
        rule graph Init rule
          on init:
```
package require struct
::struct::graph graph
graph node insert "Fallow"
set colour(Fallow) "-657956"
graph node insert "SRMaize"
set colour(SRMaize) "-32768"
graph node insert "maizebean"
set colour(maizebean) "-16744448"
graph node insert "LRMaize"
set colour(LRMaize) "-32576"
graph arc insert "SRMaize" "Fallow" "arc1"
graph arc lappend "arc1" actions {harvest_maize $paddock}
graph arc lappend "arc1" rules {[canHarvest_maize $paddock ]}
graph arc insert "Fallow" "SRMaize" "arc3"
graph arc lappend "arc3" actions {sow_SR_maize $paddock}
graph arc lappend "arc3" rules {[canSow_SR_maize $paddock]}
graph arc insert "Fallow" "maizebean" "arc0"
graph arc lappend "arc0" actions {sow_maizebean $paddock}
graph arc lappend "arc0" rules {[canSow_maizebean $paddock]}
graph arc lappend "arc0" rules {[string equal $paddock  "paddock1"]}
graph arc insert "maizebean" "Fallow" "arc2"
graph arc lappend "arc2" actions {harvest_maizebean $paddock}
graph arc lappend "arc2" rules {[canHarvest_maizebean $paddock ]}
graph arc insert "LRMaize" "Fallow" "arc4"
graph arc lappend "arc4" actions {harvest_maize $paddock}
graph arc lappend "arc4" rules {[canHarvest_maize $paddock ]}
graph arc insert "Fallow" "LRMaize" "arc5"
graph arc lappend "arc5" actions {sow_LR_maize $paddock}
graph arc lappend "arc5" rules {[canSow_LR_maize $paddock]}
graph arc lappend "arc5" rules {! [string equal $paddock  "paddock1"]}
if {[info exists config(p1,graphNames)]} {lappend config(p1,graphNames) graph} else {set config(p1,graphNames) graph}
set config(p1,initialState) "Fallow"
if {[info exists config(p2,graphNames)]} {lappend config(p2,graphNames) graph} else {set config(p2,graphNames) graph}
set config(p2,initialState) "Fallow"
if {[info exists config(p3,graphNames)]} {lappend config(p3,graphNames) graph} else {set config(p3,graphNames) graph}
set config(p3,initialState) "Fallow"
if {[info exists config(p4,graphNames)]} {lappend config(p4,graphNames) graph} else {set config(p4,graphNames) graph}
set config(p4,initialState) "Fallow"
if {[info exists config(p5,graphNames)]} {lappend config(p5,graphNames) graph} else {set config(p5,graphNames) graph}
set config(p5,initialState) "Fallow"
```
      rule Annual Reports
        # No editable paramters
        on init:
```
# Annual summary of whole farm averages

proc open_annual_stuff {} {
   global annual annualcrop config
   set year [expr [apsimGet year] - 1 ]
   set annual(years) $year
   set annual(accRain) 0.0
   set annual($year,balance) [apsimGetOptional balance] 
   foreach {accumulator} {runoff drain soil_loss es } {
     foreach paddock $config(paddocks) {
        set annual($paddock,$accumulator) 0.0
     }   
   }
}

proc do_end_year {} {
   global config annual annualcrop

   set year [apsimGet year]

   foreach {accumulator} {runoff drain soil_loss es} {
     foreach paddock $config(paddocks) {
        set annual($year,$paddock,$accumulator) $annual($paddock,$accumulator)
        set annual($paddock,$accumulator) 0.0
     }
   }
   set annual($year,accRain) $annual(accRain)
   set annual(accRain) 0.0
   set annual($year,balance) [apsimGetOptional balance]
   lappend annual(years) $year
}

proc close_annual_stuff {} {
   global simName config annual annualcrop
   puts "close_annual_stuff called"

   # Heading
   set fp [open $simName.annual.out w]
   puts $fp "Title = $simName"
   puts $fp ""
   puts -nonewline $fp "year "
   foreach {accumulator} {runoff drain soil_loss es rain } {
      puts -nonewline $fp " $accumulator"
   }
   foreach crop $config(crops) {
      puts -nonewline $fp " ${crop}_harvest"
   }
   puts $fp " profit"

   puts -nonewline $fp "() "
   foreach {accumulator} {runoff drain soil_loss es rain } {
      puts -nonewline $fp " (mm)"
   }
   foreach crop $config(crops) {
      puts -nonewline $fp " (tonnes-wet)"
   }
   puts $fp " ($)"

   # Area weighted averages of environmental stuff
   set tfa 0.0
   foreach paddock $config(paddocks) {set tfa [expr $tfa + $config($paddock,area)]}

   foreach year [lrange $annual(years) 1 end] {
      puts -nonewline $fp "$year "
      foreach {accumulator} {runoff drain soil_loss es} {
         set s 0.0
         foreach paddock $config(paddocks) {
            set s [expr $s + $annual($year,$paddock,$accumulator) * $config($paddock,area) / $tfa]
         }
         puts -nonewline $fp " [format %.2f $s]"
      }
      puts -nonewline $fp " [format %.2f $annual($year,accRain)]"
   
      foreach crop $config(crops) {
         if {[info exists annual($year,$crop,harvest)]} {
           puts -nonewline $fp " [format %.3f $annual($year,$crop,harvest)]"
         } else {
           puts -nonewline $fp " *"
         }  
      }

      # profit = change in bank balance each year
      catch {
         puts -nonewline $fp " [format %.2f [expr $annual($year,balance) - $annual([expr $year-1],balance)]]"
      }
      puts $fp ""
   }
   close $fp
}
```
        on start_simulation:
```
catch {file delete $simName.annual.csv}

open_annual_stuff
```
        on end_simulation:
```
close_annual_stuff
```
        on post:
```
   set annual(accRain) [expr $annual(accRain) + [apsimGet rain]]
   foreach {accumulator} {runoff drain es } {
      foreach paddock $config(paddocks) {
         if {$paddock != "toplevel"} {
            set annual($paddock,$accumulator) [expr $annual($paddock,$accumulator) + [apsimGet $config($paddock,watBal).$accumulator]]
         }
      }   
   }
   foreach {accumulator} {soil_loss} {
      foreach paddock $config(paddocks) {
         if {$paddock != "toplevel"} {
            set annual($paddock,$accumulator) [expr $annual($paddock,$accumulator) + [apsimGet .masterpm.$paddock.erosion.$accumulator]]
         }
      }   
   }
```
        on end_year:
```
do_end_year
```
      rule Harvest Reports
        # No editable paramters
        on init:
```
# Annual summary of whole farm averages

proc open_harvest_stuff {} {
   global harvest config
   set harvest {}
}


proc close_harvest_stuff {} {
   global simName config harvest
   puts "close_harvest_stuff called"

   # Heading
   set fp [open $simName.harvest.out w]
   puts $fp "Title = $simName"
   puts $fp ""
   puts $fp "Date         season paddock crop yield   biomass"
   puts $fp "(dd/mm/yyyy)     ()      ()   () (kg/ha) (kg/ha)"

   foreach line $harvest {
      puts $fp $line
   }
   close $fp
}
```
        on start_simulation:
```
catch {file delete $simName.harvest.out}

open_harvest_stuff
```
        on end_simulation:
```
close_harvest_stuff
```
    tclmanager Labour
      rule Initialisation logic
        # No editable Parameters
        on init:
```
# Apsim Machinery (sub)Module
# Contains Tractors, Implements & Labour.

# Operations: 
# bool available(<config>)    ; See if a configuration can be used today (read)
# operate <config> <area>     ; Operate a configuration over an area until finished (event)

########################## Apsim interface code here
source $apsuite/Model/TclLink/CIDataTypes.tcl

# A trace handler for status. This handler is called whenever another module 
# asks us whether machinery is available.
#    NB. Careful! Errors in trace routines are not caught!!!
proc machinery:maProc {name1 name2 op} {
   if {$op == "read" } {
      global config $name1
      foreach {junk operator implement} [split $name1 "_"] { break }

      # Check they are known to us
      if {[lsearch $config(operators) $operator] < 0} {
         set msg "operator \"$operator\" is unknown - I only know about $config(operators)"
         error $msg
      }
      if {[lsearch $config(implements) $implement] < 0} {
         set msg "implement \"$implement\" is unknown - I only know about $config(implements)"
         error $msg
      }
      
      # Now see if they are busy
      set avail 1
      catch {
         global machinery:jobs
         foreach job ${machinery:jobs} {
            foreach {tid iid area paddock costtype} [split $job ","] {break}
            if {"$operator" == "$tid" || "$implement" == "$iid"} {set avail 0}
         }
      } msg
      if {$msg != ""} {apsimWriteToSummaryFile $msg; error $msg}
           
      # Set the variable - this is what is returned to apsim.
      set $name1 $avail
   }  
}

# An event handler. 
proc machinery:operateHandler {args} {
  global incomingVariant
  foreach {name value} [unpack_Variant $incomingVariant] {
     regsub -all "'" $name {} name
     regsub -all "'" $value {} value
     set [string tolower $name] [string tolower $value]
  }
  if {![info exists operator] || ![info exists implement] || ![info exists area]} {
     error "Must specify a operator, implement, and area to operate over."
  }
  if { ![info exists paddock] } {set paddock {}}
  if { ![info exists costtype] } {set costtype unknown}
  machinery:operate $operator $implement $area $paddock $costtype
}

# Now register the event handlers. 
apsimSubscribeVariant operate            "machinery:operateHandler"
apsimSubscribeNull process            "machinery:process"
apsimSubscribeNull end_financial_year "machinery:end_year"
########################## End apsim interface code

########################## Machinery configuration code
# Read in our configuration
proc machinery:initialise {} {
   global config
   if {![info exists config(operators)]} {set config(operators) {}}
   if {![info exists config(implements)]} {set config(implements) {}}
} 


# return the work rate for this combo can cover per hour
proc getCombo {operator implement thing} {
   global config
   if {![info exists config(machinery,$operator,$implement,$thing)]} {
      error "No $thing specified for $operator and $implement"
   }
   return $config(machinery,$operator,$implement,$thing)
}

proc getRate {tid iid} {
   return [getCombo $tid $iid workrate]
}

proc getValue {id thing} {
   global config
   if {![info exists config(machinery,$id,$thing)]} {
      error "No $thing for $id specified (get)"
   }
   return $config(machinery,$id,$thing)
}

# Return the cost of labour per hour
proc labourCost {} {
   global config
   if {![info exists config(machinery,labourCost)]} {
      error "No labourCost specified"
   }
   return $config(machinery,labourCost)
}

# return the labour cost this combo uses per hour 
proc getLabourCost {tid iid} {
   return [expr [getCombo $tid $iid workrate] * [labourCost]]
}

# Return the number of hours worked per day
proc getHoursPerDay {tid iid} {
   return [getCombo $tid $iid hoursperday]
}

proc setValue {id thing value} {
   global config
   if {![info exists config(machinery,$id,$thing)]} {
      error "No $thing for $id specified (set)"
   }
   set config(machinery,$id,$thing) $value
}

##############
# Operate a configuration over an area. Just add it to the job queue 
# and let process look after it.
proc machinery:operate {operator implement area paddock costtype} {
   if {![string is double -strict $area]} {
      error "Area should be a number (not $area)"
   }
   global machinery:jobs
   lappend machinery:jobs $operator,$implement,$area,$paddock,$costtype
   apsimWriteToSummaryFile "Machinery job \"$operator + $implement\" is queued"
}

# The daily process routine. Manages the job queue
proc machinery:process {} {
   global machinery:jobs
   set tomorrowsJobs {}
   # Go through each job. If an item is in use in any prior job, we can't do it today. 
   for {set ijob 0} {$ijob < [llength ${machinery:jobs}]} {incr ijob} {
      set job [lindex ${machinery:jobs} $ijob]
      foreach {tid iid area paddock costtype} [split $job ","] {break}
      set inuse 0
      for {set j 0} {$j < $ijob} {incr j} {
         foreach {Ttid Tiid Tarea Tpaddock Tcosttype} [split [lindex ${machinery:jobs} $j] ","] {break}
         if {$tid == $Ttid || $iid == $Tiid} {set inuse 1}
      }
      if {!$inuse} {
        # The job is running today. Work out how many hours, and then the costs
        set maxHours [getHoursPerDay $tid $iid]
        set rate [getRate $tid $iid]

        if {$maxHours * $rate <= $area} {
           set hours $maxHours
           set areaToday [expr $maxHours * $rate]
        } else {   
           set hours [expr $area / $rate]
           set areaToday [expr $hours * $rate]
        }   
        set cost [expr $hours * [getLabourCost $tid $iid]]
        apsimSendMessage "" expenditure [list hours $hours] [list cost $cost] [list comment "operating costs of $tid + $iid"] [list paddock $paddock] [list area $areaToday] [list $costtype {}]

        set rate [expr $hours * [getRate $tid $iid]]
        set area [expr $area - $rate]

        if {$area > 0} {
           lappend tomorrowsJobs $tid,$iid,$area,$paddock,$costtype
        } else {
           apsimWriteToSummaryFile "Labour job '$tid + $iid' in $paddock has finished"
        }
      } else {
        lappend tomorrowsJobs $job
      } 
   }
   set machinery:jobs $tomorrowsJobs
}

# The "end_year" routine. Do loan payments and replacement
proc machinery:end_year {} {
   global config
}
```
        on start_simulation:
```
# Finally, load our configuration database and initialise states
machinery:initialise 
set machinery:jobs {}

# Now tell apsim we own it, set up the trace variable we use to trigger when the variable is read
foreach tid $config(operators) {
  foreach iid $config(implements) {
     set v available_${tid}_${iid}
     set $v 0
     apsimRegisterGetSet $v
     trace add variable $v read "machinery:maProc"
  }
}

apsimWriteToSummaryFile "Labour:\nOperators=$config(operators)\nImplements=$config(implements)"
```
      rule Operator 1
        # Operator
        apsimname = operator1
        # Implement 1
        implement1name = sowing  # Name
        implement1workrate = 0.5  # Work Rate (ha/hour)
        implement1hoursperday = 12  # Daily Hours (hours)
        # Implement 2
        implement2name = weeding  # Name
        implement2workrate = 0.8  # Work Rate (ha/hour)
        implement2hoursperday = 12  # Daily Hours (hours)
        # Implement 3
        implement3name = harvesting  # Name
        implement3workrate = 0.2  # Work Rate (ha/hour)
        implement3hoursperday = 8  # Daily Hours (hours)
        # Implement 4
        implement4name = presow_till  # Name
        implement4workrate = 0.1  # Work Rate (ha/hour)
        implement4hoursperday = 8  # Daily Hours (hours)
        # Implement 5
        implement5name = spraying  # Name
        implement5workrate = 0.1  # Work Rate (ha/hour)
        implement5hoursperday = 8  # Daily Hours (hours)
        on init:
```
lappend config(operators) "[apsimname]"
set config(machinery,[apsimname],age) "0"

set config(machinery,[apsimname],[implement1name],workrate) "[implement1workrate]"
set config(machinery,[apsimname],[implement1name],hoursperday) "[implement1hoursperday]"

set config(machinery,[apsimname],[implement2name],workrate) "[implement2workrate]"
set config(machinery,[apsimname],[implement2name],hoursperday) "[implement2hoursperday]"

set config(machinery,[apsimname],[implement3name],workrate) "[implement3workrate]"
set config(machinery,[apsimname],[implement3name],hoursperday) "[implement3hoursperday]"

set config(machinery,[apsimname],[implement4name],workrate) "[implement4workrate]"
set config(machinery,[apsimname],[implement4name],hoursperday) "[implement4hoursperday]"

set config(machinery,[apsimname],[implement5name],workrate) "[implement5workrate]"
set config(machinery,[apsimname],[implement5name],hoursperday) "[implement5hoursperday]"
```
      rule Costs - Wages
        # Costs
        labourCost = 1.0  # Cost of labour ($/hr)
        on init:
```
set config(machinery,labourCost) "[labourCost]"
```
    tclmanager Economics
      rule Cash Initialisation logic
        category =  # No editable parameters
        on init:
```
# Apsim/Economics Cashbook (sub)module

# accepts messages:
#  cashbook income {amount 64000.0} {comment "description here"}
#  cashbook income {category cropprice} {name wheat} {yield 4000} {protein 12.3} {comment "description here"}
#  cashbook income {category cropprice} {name sorghum} {yield 6000} {comment "description here"}
#  cashbook expenditure {cost 42.0} {comment "description here"}
#  cashbook expenditure {category seed} {name wheat} {rate 120} {comment "description here"}
# Keeps a balance, writes a log.

########################## Apsim interface code here
source $apsuite/Model/TclLink/CIDataTypes.tcl

set balance [expr 0.0]
apsimRegisterGetSet balance
apsimSubscribeVariant  income      "cashbook:incomeHandler"
apsimSubscribeVariant  expenditure "cashbook:expenditureHandler"
apsimSubscribeNull  process     "cashbook:processHandler"
apsimSubscribeNull  end_simulation "cashbook:exitHandler"

# An event handler. 
#  cashbook income {amount 64000.0}                                              {comment "description here"}
#  cashbook income {category cropprice} {name wheat} {yield 4000} {protein 12.3} {comment "description here"}
#  cashbook income {category cropprice} {name sorghum} {yield 6000}              {comment "description here"}
proc cashbook:incomeHandler {args} {
   global config incomingVariant balance

   set names {}
   foreach {_name _value} [unpack_Variant $incomingVariant] {
      set $_name [string tolower $_value]
      lappend names $_name
   }
   if {![info exists comment]} { set comment "" }
   if {![info exists paddock]} { set paddock "" }
   if {![info exists protein]} { set protein "" }
   
   if {[info exists amount] && [string is double -strict $amount]} {
      set balance [expr $balance + $amount]
      cashbook:log income amount $amount comment $comment paddock $paddock

   } elseif {[info exists category] && [info exists name] && 
             [info exists yield] && [info exists area]} {
      set amount "NA"
      set price  "NA"
      if {![info exists config(economics,$category,$name)] } {
         foreach {n v} [array get config economics*] {apsimWriteToSummaryFile "economics $n=$v"}
         error "No price information for crop $name in $category"
      }
      if {![info exists config(economics,$category,$name,grain_moisture)] } {
         apsimWriteToSummaryFile "Warning!!!!\nNo grain moisture found for $name. Using 12%."
         set config(economics,$category,$name,grain_moisture) 12.0
      }
      if {$name != "wheat"} {
         set price $config(economics,$category,$name)
      } else {
         # oddball wheat pricing system..
         set proteins $config(economics,$category,$name,protein)
         set prices $config(economics,$category,$name)
         set price [lindex $prices 0]
         for {set i 0} {($i < [llength $proteins]) && 
             ($protein > [lindex $proteins $i])} {incr i} {
               set price [lindex $prices $i]
         }
      }  
      set wetYield [expr ($yield * 100.0) / (100.0 - $config(economics,$category,$name,grain_moisture))]
      set amount [expr  $price * $wetYield * $area]

      set comment "$category ($name)"
      apsimWriteToSummaryFile "Priced $name $category (price='$price', yield='$wetYield' wet) over '$area' ha = '$amount'"
      set balance [expr $balance + $amount]
      cashbook:log income amount $amount comment $comment \
                          income $amount crop_income $amount \
                          paddock $paddock area $area \
                          yield $wetYield protein $protein crop $name
   } else {
      error "cashbook:income: Must specify a either an numeric amount, or <category, name, price and area>."
   }
}

proc cashbook:expenditureHandler {args} {
  global incomingVariant config
  set _names {}

  set comment ""
  foreach {_name _value} [unpack_Variant $incomingVariant] { 
     set $_name [string tolower $_value]
     lappend _names $_name
  }

  if {[lsearch ${_names} comment] < 0} {lappend _names comment}

  if {[info exists cost]} {
     # Simple 
     global balance
     set balance [expr $balance - $cost]
  } elseif {[info exists category] && [info exists name] && [info exists rate] && [info exists area]} {
     # lookup this expense in our table of costs

     if {![info exists config(economics,$category,$name)] } {
        foreach {n v} [array get config economics*] {apsimWriteToSummaryFile "economics $n=$v"}
        error "No price information for $name in $category"
     }

     set price $config(economics,$category,$name)
     set cost [expr $price * $rate * $area]

     if {[lsearch ${_names} price] < 0} {lappend _names price}

     set comment "$category ($name)"
     apsimWriteToSummaryFile "Costed $name $category (rate=$rate, price=$price) over $area ha = $cost"
     
     global balance
     set balance [expr $balance - $cost]
  } else {
     error "cashbook:expenditure: Must specify a either a cost or a (category + name + rate + area)."
  }
  if {[info exists fallow_cost] && ![string is double -strict $fallow_cost]} {set fallow_cost $cost}
  if {[info exists incrop_cost] && ![string is double -strict $incrop_cost]} {set incrop_cost $cost}
  set cmd "cashbook:log expenditure cost $cost" 
  foreach _name ${_names} { lappend cmd ${_name} [set ${_name}] }
  eval $cmd
}

# Add up the annual farm overheads
proc cashbook:doFarmOverheads {} {
   global balance config
   set sum $config(economics,overheads)
      
   set balance [expr $balance - $sum]
   cashbook:log expenditure cost $sum comment "Farm Overheads"
}

# Work our repayments on initial investment
proc cashbook:doInitialCapital {} {
   global config balance

   if {![info exists config(economics,icapital,ivalue)] ||
       ![info exists config(economics,icapital,loanRate)] ||
       ![info exists config(economics,icapital,loanDuration)]} {
      return   
   }
       
   if {![info exists config(economics,icapital,loanPeriod)]} {
      set config(economics,icapital,loanPeriod) 1
   }
   
   if {$config(economics,icapital,loanRate) > 0.0} {
      if {$config(economics,icapital,loanPeriod) <=  $config(economics,icapital,loanDuration)} {
         #A = P(i(1+i)^n)/((1+i)^n - 1)
         set P $config(economics,icapital,ivalue)
         set i [expr $config(economics,icapital,loanRate)/100.0]
         set n $config(economics,icapital,loanDuration)
         
         set A [expr $P * ($i*pow(1+$i,$n))/(pow(1.0+$i,$n) - 1.0) ]
      
         set balance [expr $balance - $A]
         cashbook:log expenditure cost $A \
                                  interest_paid $A \
                                  comment "Loan repayments for initial capital outlay"
         
         set config(economics,icapital,loanPeriod) [expr 1 + $config(economics,icapital,loanPeriod)]
         if { $config(economics,icapital,loanPeriod) >  $config(economics,icapital,loanDuration) } {
             apsimWriteToSummaryFile "Loan for initial capital outlay is finished"
         }    
      }
   }
}
     


# Send an "end financial year" message when needed
proc cashbook:processHandler {args} {
  if {[apsimGet day] == 181} {
     cashbook:doFarmOverheads
     cashbook:doInitialCapital
     apsimSendMessage "" end_financial_year
  }
}

proc cashbook:log {what args} {
   global balance config 
   set date [apsimGet dd/mmm/yyyy]

   set _names {}
   foreach {_name _value} $args { 
      set ${_name} ${_value} 
      lappend _names $_name
   }

   if { [info exists config(economics,outputfp)] } {
      if {$what == "income"} {
         puts $config(economics,outputfp) "$date,$amount,,$balance,$comment"
      } elseif {$what == "expenditure"} {
         puts $config(economics,outputfp) "$date,,$cost,$balance,$comment"
      } else {
         error "Unknown cashbook operation '$what'"
      }
   }

   if {$what == "income"} {
      set cmd "cashbook:summary date $date $what $amount"
   } elseif {$what == "expenditure"} {
      set cmd "cashbook:summary date $date $what $cost "
   } else {
      error "Unknown cashbook operation '$what'"
   }
   foreach _name ${_names} { lappend cmd ${_name} [set ${_name}] }
   eval $cmd
}

proc cashbook:summary {args} {
   global balance config
   
   if { [info exists config(economics,summaryfp)]} {
      
      foreach {_name _value} $args {set ${_name} ${_value} }

      foreach v {date paddock area crop yield protein "fertiliser_type" \
               "fertiliser_rate" "interim_rainfall" "interim_runoff" "interim_drainage" \
               "interim_soil_loss" "SW_state" "NO3_state" "fallow_cost" "incrop_cost" "crop_income" \
               "interest_paid" "expenditure" "income" "comment"} {
         if {[info exists $v]} {
            puts -nonewline $config(economics,summaryfp) "[set $v],"
         } else {
            puts -nonewline $config(economics,summaryfp) ","
         }     
      }
      puts $config(economics,summaryfp) ""
   }
}
# Annual summaries. Re-read the event file we have written into a single array and
# write a cash flow summary
proc cashbook:exitHandler {} {
   global config

   puts "Cashbook: Writing summaries"

   if { [info exists config(economics,outputfp)] } { close $config(economics,outputfp) }
   if { [info exists config(economics,summaryfp)] } { close $config(economics,summaryfp) }

   if { ![info exists config(economics,cashSummaryName)] } { return }

   #1. Read and store event data
   set fp [open $config(economics,cashSummaryName) r]
   gets $fp header
   set columns [split $header ","]
   
   set minyear 3000; set maxyear 0; 
   set years {}; set paddocks {}; catch {unset A}
   
   while {[gets $fp line] >= 0} {
      foreach what {incrop_cost fallow_cost crop_income income expenditure interest_paid interest_earned} {catch {unset $what}}
      foreach $columns [split $line ","] {break}
      regsub -all "/" $date "-" date
      set now [clock scan $date]
      set endYear [clock scan "30-june-[clock format $now -format %Y]"]
   
      if {$now > $endYear} {
         set year [expr [clock format $now -format %Y]+1]
      } else {
         set year [clock format $now -format %Y]
      }
   
      if {$year < $minyear} {set minyear $year}
      if {$year > $maxyear} {set maxyear $year}
      if {[lsearch $years $year] < 0} {lappend years $year}
      if {$paddock != {} && $paddock != "livestock" && [lsearch $paddocks $paddock] < 0} {lappend paddocks $paddock}
      foreach what {incrop_cost fallow_cost crop_income} {
         if {[string is double -strict [set $what]]} {
            if {![info exists A($year,$paddock,$what)]} {
               set A($year,$paddock,$what) [set $what]
            } else {
               set A($year,$paddock,$what) [expr $A($year,$paddock,$what) + [set $what]]
            }
         }
      }
      
      foreach what {income expenditure interest_paid interest_earned} {
         if {$paddock == {} && 
             [info exists $what] && 
             [string is double -strict [set $what]]} {
            if {![info exists A($year,farm_$what)]} {
               set A($year,farm_$what) [set $what]
            } else {
               set A($year,farm_$what) [expr $A($year,farm_$what) + [set $what]]
            }
         }

         if {$paddock == "livestock" && 
             [info exists $what] && 
             [string is double -strict [set $what]]} {
            if {![info exists A($year,livestock_$what)]} {
               set A($year,livestock_$what) [set $what]
            } else {
               set A($year,livestock_$what) [expr $A($year,livestock_$what) + [set $what]]
            }
         }

      }
   }
   close $fp
   
   set paddocks [lsort $paddocks]
   
   #2. Write annual cash flow summary
   set fp [open $config(economics,annualSummaryName) w]

   foreach year $years {puts -nonewline $fp ",Year $year"}
   puts $fp "\nCrop income"
   foreach paddock $paddocks {
      puts -nonewline $fp "Paddock $paddock"
      foreach year $years {
         if {[info exists A($year,$paddock,crop_income)]} {
            puts -nonewline $fp ",[format "%.0f" $A($year,$paddock,crop_income)]"
         } else {
            puts -nonewline $fp ","
         }
      }
      puts $fp ""
   }
   
   puts -nonewline $fp "Livestock income"
   foreach year $years {
      if {[info exists A($year,livestock_income)]} {
         puts -nonewline $fp ",[format "%.0f" $A($year,livestock_income)]"
      } else {
         puts -nonewline $fp ","
      }
   }
   puts $fp ""
   puts -nonewline $fp "Other farm income"
   foreach year $years {
      if {[info exists A($year,farm_income)]} {
         puts -nonewline $fp ",[format "%.0f" $A($year,farm_income)]"
      } else {
         puts -nonewline $fp ","
      }
   }
   puts $fp ""
   puts -nonewline $fp "Interest Earned"
   foreach year $years {
      if {[info exists A($year,farm_interest_earned)]} {
         puts -nonewline $fp ",[format "%.0f" $A($year,farm_interest_earned)]"
      } else {
         puts -nonewline $fp ","
      }
   }
   puts $fp ""
   
   puts -nonewline $fp "Total income"
   foreach year $years {
      set sum 0.0
      foreach {name value} [array get A $year,*income] {
         set sum [expr $sum + $value]
      }   
      puts -nonewline $fp ",[format %.0f $sum]"
      set A($year,total_income) $sum
   }
   puts $fp "\n"
   
   puts $fp "Variable expenses"
   foreach what {incrop_cost fallow_cost} {
      foreach paddock $paddocks {
         puts -nonewline $fp "Paddock $paddock $what"
         foreach year $years {
            if {[info exists A($year,$paddock,$what)]} {
               puts -nonewline $fp ",[format "%.0f" $A($year,$paddock,$what)]"
            } else {
               puts -nonewline $fp ","
            }
         }
         puts $fp ""
      }
   }
   puts -nonewline $fp "Livestock expenses"
   foreach year $years {
      if {[info exists A($year,livestock_expenditure)]} {
         puts -nonewline $fp ",[format "%.0f" $A($year,livestock_expenditure)]"
      } else {
         puts -nonewline $fp ","
      }
   }
   puts $fp ""
   puts -nonewline $fp "Other expenses"
   foreach year $years {
      if {[info exists A($year,farm_expenditure)]} {
         puts -nonewline $fp ",[format "%.0f" $A($year,farm_expenditure)]"
      } else {
         puts -nonewline $fp ","
      }
   }
   puts $fp ""
   
   puts -nonewline $fp "Interest Paid"
   foreach year $years {
      if {[info exists A($year,farm_interest_paid)]} {
         puts -nonewline $fp ",[format "%.0f" $A($year,farm_interest_paid)]"
      } else {
         puts -nonewline $fp ","
      }
   }
   puts $fp ""
   
   puts -nonewline $fp "Total expenses"
   foreach year $years {
      set sum 0.0
      foreach {name value} [array get A $year,farm_expenditure] {
         set sum [expr $sum + $value]
      }   
      foreach {name value} [array get A $year,*cost] {
         set sum [expr $sum + $value]
      }   
      puts -nonewline $fp ",[format %.0f $sum]"
      set A($year,total_expenses) $sum
   }
   puts $fp "\n"

   puts -nonewline $fp "Annual Surplus/Deficit"
   foreach year $years {
      set sum [expr $A($year,total_income) - $A($year,total_expenses)]
      set A($year,surplus) $sum
      puts -nonewline $fp ",[format %.0f $sum]"
   }
   puts $fp "\n"

   puts -nonewline $fp "Cumulative Cash Flow"
   set year [expr [lindex $years 0]-1]
   set A($year,balance) $config(initialBalance)
   foreach year $years {
      set A($year,balance) [expr $A([expr $year-1],balance) + $A($year,surplus)]
      puts -nonewline $fp ",[format %.0f $A($year,balance)]"
   }
   puts $fp "\n"

   close $fp
}

# apsim 'strings' are returned as arrays of strings and may need this
proc unlist {list} {
   if {[llength $list] == 1} {return [lindex $list 0]}
   return $list
}

########################## End apsim interface code

apsimWriteToSummaryFile "     Cashbook initialised."
apsimWriteToSummaryFile ""
```
      rule Initial Capital Assets
        # Initial Capital Assets
        ivalue = 0  # Loan Value of Initial Investment ($)
        loanRate = 0  # Loan repayment rate (% pa)
        loanDuration = 0  # Loan duration (years)
        on init:
```
set config(economics,icapital,ivalue) "[ivalue]"
set config(economics,icapital,loanRate) "[loanRate]"
set config(economics,icapital,loanDuration) "[loanDuration]"
```
      rule Cash Journal
        # Initial Value
        balance = 0  # Initial cash balance ($)
        # Cash Journal
        outputfile = yes  # Produce Cashbook
        summaryfile = yes  # Produce Cash Summaries
        on init:
```
set runTitle [unlist [apsimGet title]]

if {"[outputfile]" != "no"} {
   set config(economics,outputfp) [open $runTitle.cashBook.csv w]
   puts $config(economics,outputfp) "date,income,expenditure,balance,comment"
}

if {"summaryfile" != "no"} {
   set config(economics,cashSummaryName) "$runTitle.cashSummary.csv"
   set config(economics,summaryfp) [open $config(economics,cashSummaryName) w]
   puts $config(economics,summaryfp) "date,paddock,area,crop,yield,protein,fertiliser_type,fertiliser_rate,\
interim_rainfall,interim_runoff,interim_drainage,\
interim_soil_loss,SW_state,NO3_state,fallow_cost,incrop_cost,crop_income,interest_paid,expenditure,income,comment"

   set config(economics,annualSummaryName) "$runTitle.cashSummary.Annual.csv"
   file delete -force $config(economics,annualSummaryName)
}

set config(initialBalance) "[balance]"
```
        on start_simulation:
```
set balance "[balance]"
apsimWriteToSummaryFile "     Initial Balance = $balance"
```
      rule Prices
        # Prices
        maize = 285.0  # Maize price ($/tonne)
        bean = 420.0  # Bean Price ($/tonne)
        maize_residue = 20.0  # Maize Stubble ($/tonne)
        on init:
```
set config(economics,cropprice,maize) "[maize]"
set config(economics,cropprice,maize_residue) "[maize_residue]"
set config(economics,cropprice,bean) "[bean]"
```
      rule Costs - Farm Overheads
        # Overheads
        other = 100.0  # Other Overhead Expenses ($)
        mzreq = 1.26  # Maize requirement (tonnes)
        bnreq = 0.35  # Bean requitrement (tonnes)
        on init:
```
set config(economics,mzreq) [mzreq]
set config(economics,bnreq) [bnreq]
set config(economics,overheads) [expr $config(economics,cropprice,maize) * $config(economics,mzreq) + \
  $config(economics,cropprice,bean) * $config(economics,bnreq) + \
  [other] ]
```
      rule Costs - Fertilisers
        category =  # Fertiliser Costs
        map = 0.56  # MAP (starterphos - 10n;21.9p;1.5s) ($/kg)
        starter_z = 0.62  # starter z ($/kg)
        urea = 0.6  # Urea ($/kg)
        no3_n = 1.0  # NO3 N ($/kg)
        on init:
```
set config(economics,fertilisercost,map) "[map]"
set config(economics,fertilisercost,starter_z) "[starter_z]"
set config(economics,fertilisercost,urea) "[urea]"
set config(economics,fertilisercost,no3_n) "[no3_n]"
```
    area paddock1
      surfaceom Surface Organic Matter
        PoolName = maize_stubble  # Organic Matter pool name
        type = maize  # Organic Matter type
        mass = 100.  # Initial surface residue (kg/ha)
        cnr = 80.0  # C:N ratio of initial residue
        standing_fraction = 0.0  # Fraction of residue standing
      fertiliser
      maize
      fababean bean
      canopy
        intercrop = maize bean  # Enter crop names to intercrop
      erosion
        model = freebairn  # Model Name
        slope = 6.5  # Slope of plot in percent (%)
        slope_length = 60.0  # Length of plot (m)
        k_factor = 0.4  # Soil erodibility factor (t/ha/EI 30 )
        p_factor = 1.0  # Supporting practise factor (unitless)
        bed_depth = 1900  # Depth to bedrock (mm)
        profile_reduction = off
        profile_layer_merge = 0.05  # Fraction of original size in which the lowest layer is merged into the layer above (0-1)
        minimum_depth = 100.0  # If the profile erodes to this depth, the simulation is stopped (mm)
      soil
        DataSource = Dr. John P Dimes, ICRISAT, Bulawayo, Zimbabwe J.Dimes@cgiar.org
        Comment = 8 Mar 1999  # Comments
        Water
          Layer:
            Thickness (mm)  BD (g/cc)  AirDry (mm/mm)  LL15 (mm/mm)  DUL (mm/mm)  SAT (mm/mm)
            150             1.280      0.110           0.150         0.280        0.320
            150             1.270      0.120           0.150         0.280        0.320
            300             1.340      0.170           0.170         0.285        0.340
            300             1.330      0.170           0.170         0.270        0.330
            300             1.310      0.170           0.170         0.270        0.330
            300             1.310      0.170           0.170         0.270        0.330
          SoilCrop sorg
            Layer:
              Thickness (mm)  LL (mm/mm)  KL (/day)  XF (0-1)
              150             0.150       0.070      1
              150             0.150       0.070      1
              300             0.170       0.070      1
              300             0.170       0.070      1
              300             0.170       0.070      1
              300             0.170       0.070      1
          SoilCrop cowpea
            Layer:
              Thickness (mm)  LL (mm/mm)  KL (/day)  XF (0-1)
              150             0.150       0.080      1
              150             0.150       0.080      1
              300             0.170       0.080      1
              300             0.170       0.080      1
              300             0.170       0.060      1
              300             0.170       0.040      1
          SoilCrop maize: same as 50 maize 50 intercrop.paddock1.Soil.Water.cowpea
          SoilCrop mucuna: same as 50 maize 50 intercrop.paddock1.Soil.Water.cowpea
          SoilCrop peanut: same as 50 maize 50 intercrop.paddock1.Soil.Water.cowpea
          SoilCrop pigeonp: same as 50 maize 50 intercrop.paddock1.Soil.Water.cowpea
          SoilCrop soybean: same as 50 maize 50 intercrop.paddock1.Soil.Water.cowpea
          SoilCrop bean: same as 50 maize 50 intercrop.paddock1.Soil.Water.cowpea
        SoilWat: SummerCona=5; SummerU=5; SummerDate=1-Nov; WinterCona=5; WinterU=5; WinterDate=1-Apr; DiffusConst=88; DiffusSlope=32; Salb=0.13; CN2Bare=80; CNRed=20; CNCov=0.8
          Layer:
            Thickness (mm)  SWCON (0-1)
            150             0.500
            150             0.500
            300             0.500
            300             0.300
            300             0.300
            300             0.300
        SoilOrganicMatter: RootCN=45; RootWT=400; SoilCN=10; EnrACoeff=7.4; EnrBCoeff=0.2
          Layer:
            Thickness (mm)  OC (Total %)  FBiom (0-1)  FInert (0-1)  HumC (kg/ha)
            150             1.39          0.020        0.500         -
            150             1             0.015        0.750         3612.93
            300             0.8           0.010        0.900         2268.71
            300             0.46          0.010        0.990         181.723
            300             0.43          0.010        0.990         167.317
            300             0.29          0.010        0.990         112.842
        Analysis
          Layer:
            Thickness (mm)  PH (1:5 water)
            150             6
            150             6
            300             6.200
            300             6.400
            300             6.500
            300             6.500
        InitWater
          percentmethod: percent=1; distributed=filled from top
        Sample Initial nitrogen
          Layer:
            Thickness (mm)  no3 (kg/ha)  nh4 (kg/ha)
            200             3            0.5
            1800            2            0.1
    area paddock2 -> /simulations/50 maize 50 intercrop/paddock1
  simulation 75 intercrop 25 maize -> /simulations/50 maize 50 intercrop
    tclmanager Management -> /simulations/50 maize 50 intercrop/Management
      rule Setup
        # Paddock Descriptions
        p1 = paddock1  # Paddock 1 name
        p1a = 0.75  # Paddock 1 Area (ha)
        p2 = paddock2  # Paddock 2 name
        p2a = 0.25  # Paddock 2 Area (ha)
        on init:
        script: same as in 50 maize 50 intercrop.Management.Setup
  simulation 25 intercrop 75 maize -> /simulations/75 intercrop 25 maize
    tclmanager Management -> /simulations/75 intercrop 25 maize/Management
      rule Setup
        # Paddock Descriptions
        p1 = paddock1  # Paddock 1 name
        p1a = 0.25  # Paddock 1 Area (ha)
        p2 = paddock2  # Paddock 2 name
        p2a = 0.75  # Paddock 2 Area (ha)
        on init:
        script: same as in 50 maize 50 intercrop.Management.Setup
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