folder Simulations: version=32
  simulation Wheat Grazing
    metfile met: filename=%apsim%\Examples\MetFiles\dalby.met
    clock
      start_date = 14/06/1988  # Select the start date of the simulation
      end_date = 17/11/1988  # Select the end date of the simulation
    summaryfile
    area paddock
      folder Manager folder
        manager Wheat Managment
          on init:
```
ready_to_graze = 0
```
          on start_of_day:
```
! Graze paddock when wheat is ready
if (wheat.stage > 5) then
   ready_to_graze = 1
endif


if day = 169 and year = 1988 then
   wheat sow cultivar = hartog, plants = 120, sowing_depth = 30 (mm)
endif

if wheat.stagename = 'harvest_ripe' or wheat.plant_status = 'dead' then
   wheat harvest
   wheat end_crop
endif
```
        manager Grazing management
          on init:
```
annual_lwg = 0.0
paddockState = 'empty'
```
          on start_of_day:
```
if (ready_to_graze = 1 AND paddockState = 'empty') then
   graz set stocking_rate = 0.8
   graz set alw =  400.0                 ! p084
   annual_lwg = 0.0
   paddockState = 'stocked'
endif

! 'GRAZEON' stocking rate resets (%Use of TSDM for next year)
if (graz.stocking_rate > 0.0 AND today = date('1-jun') then                ! p081
   graz set alw = 400.0
   avgDailyIntake = (annual_lwg/365.25 + 1.058) / 0.304
   targetUtil = 30.0 / 100.0
   annualIntake = avgDailyIntake * 365.5
   stock_equiv_ratio = targetUtil * grasp.tsdm / annualIntake

   weight_ratio = graz.alw / 200
   factor = weight_ratio ** 0.75
   beasts_ha = stock_equiv_ratio / factor
   graz set stocking_rate = beasts_ha

   annual_lwg = 0.0
endif
```
          on end_of_day:
```
annual_lwg = annual_lwg + graz.lwg
```
      wheat
      soil: Site=Generic; Region=South East Queensland; State=Queensland; Longitude=999999
        Comment = estimated cotton LL  # Comments
        SoilType = Black Vertosol  # Soil description
        NearestTown = Generic
        Latitude = 999999  # Latitude (WGS84)
        LocationAccuracy = Regional Soil Type
        InitWater Initial water
          percentmethod: percent=1; distributed=filled from top
        Water
          Layer:
            Thickness (mm)  BD (g/cc)  AirDry (mm/mm)  LL15 (mm/mm)  DUL (mm/mm)  SAT (mm/mm)
            150             1.02       0.145           0.29          0.54         0.59
            150             1.03       0.232           0.29          0.53         0.58
            300             1.02       0.29            0.29          0.54         0.59
            300             1.02       0.29            0.29          0.54         0.58
            300             1.06       0.29            0.29          0.52         0.57
            300             1.11       0.29            0.29          0.5          0.55
            300             1.12       0.29            0.29          0.5          0.55
            300             1.15       0.29            0.29          0.48         0.53
            300             1.18       0.29            0.29          0.47         0.52
            300             1.2        0.29            0.29          0.46         0.51
            300             1.25       0.29            0.29          0.44         0.49
          SoilCrop wheat
            Layer:
              Thickness (mm)  LL (mm/mm)  KL (/day)  XF (0-1)
              150             0.29        0.06       1
              150             0.29        0.06       1
              300             0.32        0.06       1
              300             0.32        0.04       1
              300             0.35        0.04       1
              300             0.38        0.02       0.42
              300             0.41        0.02       0.37
              300             0.48        0          0
              300             0.47        0          0
              300             0.46        0          0
              300             0.44        0          0
          SoilCrop barley
            Layer:
              Thickness (mm)  LL (mm/mm)  KL (/day)  XF (0-1)
              150             0.29        0.07       1
              150             0.29        0.07       1
              300             0.32        0.07       1
              300             0.38        0.05       1
              300             0.39        0.05       1
              300             0.39        0.03       0.42
              300             0.41        0.02       0.37
              300             0.48        0          0
              300             0.47        0          0
              300             0.46        0          0
              300             0.44        0          0
          SoilCrop canola
            Layer:
              Thickness (mm)  LL (mm/mm)  KL (/day)  XF (0-1)
              150             0.29        0.06       1
              150             0.29        0.06       1
              300             0.32        0.06       1
              300             0.32        0.04       1
              300             0.35        0.04       1
              300             0.38        0.02       0.42
              300             0.41        0.01       0.37
              300             0.48        0          0
              300             0.47        0          0
              300             0.46        0          0
              300             0.44        0          0
          SoilCrop chickpea
            Layer:
              Thickness (mm)  LL (mm/mm)  KL (/day)  XF (0-1)
              150             0.29        0.06       1
              150             0.29        0.06       1
              300             0.36        0.06       1
              300             0.43        0.06       1
              300             0.51        0.06       1
              300             0.5         0.06       0.42
              300             0.5         0.06       0.37
              300             0.48        0          0
              300             0.47        0          0
              300             0.46        0          0
              300             0.44        0          0
          SoilCrop cotton
            Layer:
              Thickness (mm)  LL (mm/mm)  KL (/day)  XF (0-1)
              150             0.29        0.1        1
              150             0.29        0.1        1
              300             0.35        0.1        1
              300             0.36        0.1        1
              300             0.38        0.09       1
              300             0.39        0.07       0.42
              300             0.39        0.05       0.37
              300             0.48        0          0
              300             0.47        0          0
              300             0.46        0          0
              300             0.44        0          0
          SoilCrop sorghum
            Layer:
              Thickness (mm)  LL (mm/mm)  KL (/day)  XF (0-1)
              150             0.29        0.07       1
              150             0.29        0.07       1
              300             0.35        0.07       1
              300             0.38        0.05       1
              300             0.4         0.05       1
              300             0.4         0.04       0.42
              300             0.4         0.03       0.37
              300             0.48        0          0
              300             0.47        0          0
              300             0.46        0          0
              300             0.44        0          0
          SoilCrop mungbean
            Layer:
              Thickness (mm)  LL (mm/mm)  KL (/day)  XF (0-1)
              150             0.29        0.06       1
              150             0.29        0.06       1
              300             0.32        0.06       1
              300             0.32        0.04       1
              300             0.35        0.04       1
              300             0.38        0.01       0.42
              300             0.41        0.01       0.37
              300             0.48        0          0
              300             0.47        0          0
              300             0.46        0          0
              300             0.44        0          0
          SoilCrop sunflower
            Layer:
              Thickness (mm)  LL (mm/mm)  KL (/day)  XF (0-1)
              150             0.29        0.1        1
              150             0.29        0.1        1
              300             0.32        0.08       1
              300             0.32        0.06       1
              300             0.35        0.04       1
              300             0.38        0.02       0.42
              300             0.41        0.01       0.37
              300             0.48        0          0
              300             0.47        0          0
              300             0.46        0          0
              300             0.44        0          0
          SoilCrop fababean
            Layer:
              Thickness (mm)  LL (mm/mm)  KL (/day)  XF (0-1)
              150             0.29        0.08       1
              150             0.29        0.08       1
              300             0.32        0.08       1
              300             0.32        0.08       1
              300             0.35        0.06       1
              300             0.38        0.04       0.42
              300             0.41        0.03       0.37
              300             0.48        0          0
              300             0.47        0          0
              300             0.46        0          0
              300             0.44        0          0
          SoilCrop lucerne
            Layer:
              Thickness (mm)  LL (mm/mm)  KL (/day)  XF (0-1)
              150             0.29        0.1        1
              150             0.29        0.1        1
              300             0.29        0.1        1
              300             0.29        0.1        1
              300             0.3         0.09       1
              300             0.31        0.09       0.42
              300             0.32        0.09       0.37
              300             0.33        0.09       0.33
              300             0.34        0.09       0.31
              300             0.35        0.09       0.31
              300             0.36        0.09       0.33
          SoilCrop maize
            Layer:
              Thickness (mm)  LL (mm/mm)  KL (/day)  XF (0-1)
              150             0.29        0.06       1
              150             0.29        0.06       1
              300             0.34        0.06       1
              300             0.34        0.04       1
              300             0.37        0.04       1
              300             0.4         0.02       0.42
              300             0.42        0.01       0.37
              300             0.48        0          0
              300             0.47        0          0
              300             0.46        0          0
              300             0.44        0          0
          SoilCrop perennial grass
            Layer:
              Thickness (mm)  LL (mm/mm)  KL (/day)  XF (0-1)
              150             0.29        0.1        1
              150             0.29        0.1        1
              300             0.39        0.1        1
              300             0.41        0.1        1
              300             0.4         0.09       1
              300             0.4         0.07       0.42
              300             0.41        0.05       0.37
              300             0.41        0          0
              300             0.4         0          0
              300             0.4         0          0
              300             0.42        0          0
          SoilCrop cowpea: same as Wheat Grazing.paddock.Soil.Water.canola
          SoilCrop navybean: same as Wheat Grazing.paddock.Soil.Water.mungbean
          SoilCrop peanut: same as Wheat Grazing.paddock.Soil.Water.mungbean
          SoilCrop pigeonpea
            Layer:
              Thickness (mm)  LL (mm/mm)  KL (/day)  XF (0-1)
              150             0.29        0.06       1
              150             0.29        0.06       1
              300             0.32        0.06       1
              300             0.32        0.05       1
              300             0.35        0.04       1
              300             0.38        0.02       0.42
              300             0.41        0.01       0.37
              300             0.48        0          0
              300             0.47        0          0
              300             0.46        0          0
              300             0.44        0          0
          SoilCrop soybean: same as Wheat Grazing.paddock.Soil.Water.canola
          SoilCrop stylo: same as Wheat Grazing.paddock.Soil.Water.sunflower
          SoilCrop sugar: same as Wheat Grazing.paddock.Soil.Water.sunflower
          SoilCrop lablab: same as Wheat Grazing.paddock.Soil.Water.sunflower
        SoilWat: SummerCona=3.5; SummerU=6; SummerDate=1-Nov; WinterCona=2.5; WinterU=4; WinterDate=1-apr; DiffusConst=40; DiffusSlope=16; Salb=0.12; CN2Bare=73; CNRed=20; CNCov=0.8
          Layer:
            Thickness (mm)  SWCON (0-1)
            150             0.3
            150             0.3
            300             0.3
            300             0.3
            300             0.3
            300             0.3
            300             0.3
            300             0.3
            300             0.3
            300             0.3
            300             0.3
        SoilOrganicMatter: RootCN=40; RootWT=1000; SoilCN=12; EnrACoeff=7.4; EnrBCoeff=0.2
          Layer:
            Thickness (mm)  OC (Total %)  FBiom (0-1)  FInert (0-1)
            150             1.04          0.04         0.4
            150             0.89          0.02         0.6
            300             0.89          0.02         0.8
            300             0.89          0.02         1
            300             0.77          0.01         1
            300             0.45          0.01         1
            300             0.27          0.01         1
            300             0.22          0.01         1
            300             0.16          0.01         1
            300             0.13          0.01         1
            300             0.12          0.01         1
        Analysis
          Layer:
            Thickness (mm)  EC (1:5 dS/m)  PH (1:5 water)
            150             0.2            8.4
            150             0.3            8.8
            300             0.3            9
            300             0.4            9.2
            300             0.6            9.2
            300             0.8            9.1
            300             0.9            9
            300             1              9
            300             1.1            8.9
            300             1.1            8.9
            300             1              8.9
        Sample Initial nitrogen
          Layer:
            Thickness (mm)  NO3 (ppm)  NH4 (ppm)
            150             6.503      0.599004
            150             2.101      0.100001
            300             2.101      0.100001
            300             1.701      0.100001
            300             1.701      0.100001
            300             1.701      0.100001
            300             1.701      0.100001
            300             1.701      0.100001
            300             1.701      0.100001
            300             1.701      0.100001
            300             1.701      0.100001
      outputfile: filename=Wheat Grazing.out; title=Wheat Grazing
        variables
          variable:
            dd/mm/yyyy as Date  # Date (dd/mm/yyyy)
            LeafGreenWt
            StemGreenWt
            paddockState
            alw
            stocking_rate
            acc_eaten
        events Reporting Frequency: event=Daily  # End of daily simulation time step
      graz
        intake_util_intercept = 1  # Intercept in eqn reln between intake and utilization
        intake_util_slope = -0.3  # Slope in eqn reln between intake and utilization
        yld_eat_restr = 300  # Yield at which intake restriction no longer applies
        summer_lwg = 70  # Expected lwg @ low SR
        autumn_lwg = 35  # Expected lwg @ low SR
        winter_lwg = 10  # Expected lwg @ low SR
        spring_lwg = 35  # Expected lwg @ low SR
        leaf_diet = 0.85  # Proportion of leaf in diet
        std_alw = 200
        min_alw = 100  # Minimum ALW
        metabol_expon = 0.75
        acc_eaten_reset = 335  # Day to reset eaten accumulator
        prop_can_eat = 1
        allow_supplements = 0
  simulation Grass Grazing
    metfile met: filename=%apsim%\Examples\MetFiles\dalby.met
    clock
      start_date = 14/06/1988  # Select the start date of the simulation
      end_date = 17/11/1988  # Select the end date of the simulation
    summaryfile
    area paddock
      folder Manager folder
        manager Grasp Managment
          on init:
```
pasture_in = 0
ready_to_graze = 0
```
          on start_of_day:
```
if pasture_in = 0 then
   grasp establish init_section = establishment 
   pasture_in = 1
endif

if (day = 222) then
   ready_to_graze = 1
endif
```
        manager Grazing management: same as Wheat Grazing.paddock.Manager folder.Grazing management
      soil: same as Wheat Grazing.paddock.Soil
      outputfile: filename=Grass Grazing.out; title=Grass Grazing
        variables
          variable:
            dd/mm/yyyy as Date  # Date (dd/mm/yyyy)
            green_pool
            dead_pool
            paddockState
            alw
            stocking_rate
            acc_eaten
        events Reporting Frequency: event=Daily  # End of daily simulation time step
      graz: same as Wheat Grazing.paddock.graz
      grasp
        root_depth_init = 750  # Initial depth of roots (mm)
        dm_dead_leaf_init = 0  # Initial Dead Leaf weight (kg/ha)
        dm_dead_stem_init = 0  # Initial Dead Stem weight (kg/ha)
        dm_dead_root_init = 0  # Initial Dead Root weight (kg/ha)
        dm_green_leaf_init = 0  # Initial Green Leaf weight (kg/ha)
        dm_green_stem_init = 0  # Initial Green Stem weight (kg/ha)
        dm_green_root_init = 0  # Initial Green Root weight (kg/ha)
        basal_area_init = 0.5  # Initial Basal area of tussocks (%)
        acc_trans_for_n_init = 0  # Initial accumulated transpiration, used for N uptake (mm)
        acc_growth_for_n_init = 0  # Initial accumulated growth, used for N uptake (kg/ha)
        max_n_avail = 15  # Limit to total N (kg/year)
        max_n_avail_dist = 0.8 0.1 0.05  0.05  0.0 0.0  0.0  # Distribution of N in profile
        ll = 0.290  0.290  0.290  0.290  0.290  0.290  0.290  0.290  0.290  0.290  0.290  # Lower limit (ll) of water extraction (mm/mm)
        kl = 0.5      0.5      0.5    0.5  0.0  0.0  0.0  # Rate of water extraction (kl)
        kl2rlv = 1
        crop_type = grass
        uptake_source = calc
        height_max = 1200  # Maximum canopy height (mm)
        hgt_vpd_screen = 200  # Height at which surface effects on vpd are 0 (mm)
        height_1000kg = 100  # Sward Height per tonne (p096*10, mm)
        et_use_efficiency = 0  # Evapotranspiration use efficiency used in BA calc (kg/ha/mm) (p288)
        frac_leaf2total = 0.5  # Fraction of total dm produced that goes into leaf pool (0-1) (p123)
        yld_cover_slope = 0.693147  # Shape of exponential curve relating yield and cover
        yld_fpc50 = 1000  # yld_fpc50 (p046)
        yld_cov50 = 1000  # Yield transpiring at 50% of pan evap (p045)
        yld_tcov50 = 1000  # Tsdm yield at which cover for runoff is 50% (p271)
        swi_fullgreen = 0.1  # Min soil water for 100% green (p009)
        swi_nogrow = 0.4  # SWI when growth stops
        pot_regrow = 3  # Max rate regrowth from tussocks (kg/ha/unit grass ba) (p006)
        te_std = 10  # Transpiration efficiency at vpd=20mb (p007)
        rad_factor = 8.97
        residual_plant_N = 5  # Always this much n in plant (p097, kg/ha)
        litter_n = 0.3  # N conc of detached stems and roots ((p110-p111)/2)
        n_uptk_per100 = 5  # Nitrogen uptake per 100mm water (p098, kg/ha)
        frost_start = 2  # Minimum screen temp at which green cover=100% (oC,p125)
        frost_kill = 0  # Minimum screen temp at which frost kills all green (oC,p011)
        death_slope = 0.013  # Rate of green death per soil water(p051)
        death_intercept = 0.002  # Background death rate (p010)
        leaf_death_ratio = 1  # Proportion of leaf death to total death (p133)
        stem_death_ratio = 1  # Proportion of stem death to total death (p134)
        n_conc_dm_crit = 2.5  # Level of plant N at which no N stress occurs (p102)
        n_conc_dm_min = 0.4  # Level of soil N at which no N stress occurs (p101)
        n_conc_dm_max = 0.5  # Level of soil N at which soil N to high for growth (p100)
        stem_thresh = 0  # stem_thresh (p124)
        detach_dryseason = 0.0   0.002     0.002  # detach_dryseason: root, leaf, stem
        detach_wetseason = 0.0   0.002     0.002  # detach_wetseason: root, leaf, stem
        day_start_summer = 335
        day_end_summer = 59
        acc_et_reset = 273
        acc_growth_reset = 273
        trans_for_n_reset = 273
        growth_for_n_reset = 273
        day_start_wet = 274
        day_start_dry = 91
        enr_a_coeff = 7.4
        enr_b_coeff = 0.2
  simulation Wheat Lucerne Rotation
    clock
      start_date = 1/01/1940  # Select the start date of the simulation
      end_date = 1/01/1988  # Select the end date of the simulation
    summaryfile
    metfile met: filename=%apsim%\Examples\MetFiles\goond.met
    area Paddock
      wheat
      lucerne
      graz
        intake_util_intercept = 1  # Intercept in eqn reln between intake and utilization
        intake_util_slope = -0.3  # Slope in eqn reln between intake and utilization
        yld_eat_restr = 300  # Yield at which intake restriction no longer applies
        summer_lwg = 70  # Expected summer lwg @ low SR
        autumn_lwg = 35  # Expected autumn lwg @ low SR
        winter_lwg = 10  # Expected winter lwg @ low SR
        spring_lwg = 35  # Expected spring lwg @ low SR
        leaf_diet = 0.85  # Proportion of leaf in diet
        std_alw = 200
        min_alw = 100  # Minimum ALW
        metabol_expon = 0.75
        acc_eaten_reset = 335  # Day to reset eaten accumulator
        prop_can_eat = 1
        allow_supplements = 0
      surfaceom SurfaceOrganicMatter
        PoolName = wheat_stubble  # Organic Matter pool name
        type = wheat  # Organic Matter type
        mass = 1000.  # Initial surface residue (kg/ha)
        cnr = 80.0  # C:N ration of initial residue
        standing_fraction = 0.0  # Fraction of residue standing
      fertiliser
      tclmanager Manager
        rule Rotation Initialisation
          on init:
```
# Initial state of the system
set state "lucernePrepn"

# Support procedures for (single paddock) rotations

# Return the current state of the system
proc currentState {} {
   global state 
   return $state   
}

# Default log option is to do nothing. May be overridden later.
proc log {msg} { }

############### The decision routine. 
# Return the score for planting "what"
proc checkRules {} {
  log "State is [currentState]. (esw=[format %.0f [apsimGet esw]])"

  set bestScore -1.0; set bestTarget {}
  foreach arc [stateGraph arcs -out [currentState]] {
     set expr {}
     set target [stateGraph arc target $arc]
     foreach rule [stateGraph arc get $arc rules] {
        set value [uplevel #0 expr $rule]
        log "target=$target,rule=$rule, value=$value"
        lappend expr $value
     }  
     set score [expr [join $expr "*"]]
     if {$score > $bestScore} {
        set bestScore $score
        set bestTarget $target
     }
  }
  return [list $bestTarget $bestScore]
}

# Change state to another
proc changeState {newState} {
   global state
   set arcs {}
   foreach arc [stateGraph arcs -out [currentState]] {
      if {[stateGraph arc target $arc] == "$newState" } {
         lappend arcs $arc
      }
   }   
   if {[llength $arcs] == 0} {error "No paths from [currentState] to $newState!"}
   if {[llength $arcs] > 1} {
      # More than 1 path - evaluate best option
      set bestScore -1.0; set bestArc {}
      foreach arc $arcs {
         set expr {}
         foreach rule [stateGraph arc get $arc rules] {
            set value [uplevel #0 expr $rule]
            lappend expr $value
         }
         set score [expr [join $expr "*"]]
         if {$score > $bestScore} {
            set bestScore $score
            set bestArc $arc
         }
      }  
      if {$bestScore > 0.0} {
         apsimWriteToSummaryFile "Taking arc $bestArc from [currentState] to $newState"
         set arc $bestArc
      } else {
         error "No viable paths from [currentState] to $newState! (candidates are $arcs)"
      }
   } else {
      # Only 1 path - take it.
      set arc $arcs
   }
   foreach action [stateGraph arc get $arc actions] { uplevel #0 $action }
   set state $newState
   log "changeState $newState"
}

proc doProcess {} {
   log "[apsimGet day],[apsimGet year]"
   set more 1
   while {$more} {
      set more 0
      foreach  {target score} [checkRules] {break}
      if {$score > 0} {changeState $target; set more 1}
   }
}
```
          on start_simulation:
```
log "changeState [currentState]"
```
          on process:
```
doProcess
```
        tclui Wheat Lucerne Rotation: uiscript=source $apsuite/UserInterface/APSFarm/RotationsUI.tcl; graph_name=stateGraph
          node Wheat: desc=A wheat crop
          node Reestablish: desc=Lucerne has died - wait 5 days and re-plant
          node Lucerne: desc=A lucerne crop
          node wheatPrepn: desc=wheat seedbed preparation
          node lucernePrepn: desc=Lucerne seedbed preparation
          arc arc2: source=Lucerne; target=Reestablish; actions=[apsimSendMessage lucerne end_crop, set waiting 0]; rules=[string match [apsimGet lucerne.plant_status]  dead]
          arc arc11: source=wheatPrepn; target=Wheat; actions=sow_wheat; rules=[canPlant_wheat]
          arc arc3: source=Reestablish; target=Lucerne; actions=sow_lucerne; rules=[incr waiting] == 2
          arc arc12: source=Lucerne; target=wheatPrepn; actions=[apsimSendMessage lucerne end_crop, set nLucerneDays 0]; rules=[incr nLucerneDays] > 700
          arc arc8: source=lucernePrepn; target=Lucerne; actions=[sow_lucerne, set nLucerneDays 0]; rules=[canPlant_lucerne]
          arc arc0: source=Wheat; target=lucernePrepn; rules=[canHarvest_wheat]
            actions=[apsimSendMessage wheat harvest, apsimSendMessage wheat end_crop]
          paddock toplevel: isManaged=0
          paddock: isManaged=0
          paddock: isManaged=0
          paddock p1: isManaged=0
          paddock p2: isManaged=0
          paddock p3: isManaged=0
          paddock p4: isManaged=0
          paddock BCS: isManaged=0
          rule Wheat Lucerne Rotation Init rule
            on init:
```
package require struct
::struct::graph stateGraph
stateGraph node insert "Wheat"
set colour(Wheat) "green"
stateGraph node insert "Reestablish"
set colour(Reestablish) "purple"
stateGraph node insert "Lucerne"
set colour(Lucerne) "white"
stateGraph node insert "wheatPrepn"
set colour(wheatPrepn) "gray"
stateGraph node insert "lucernePrepn"
set colour(lucernePrepn) "gray"
stateGraph arc insert "Lucerne" "Reestablish" "arc2"
stateGraph arc lappend "arc2" actions {apsimSendMessage lucerne end_crop}
stateGraph arc lappend "arc2" actions {set waiting 0}
stateGraph arc lappend "arc2" rules {[string match [apsimGet lucerne.plant_status]  dead] }
stateGraph arc lappend "arc2" actions {}
stateGraph arc insert "wheatPrepn" "Wheat" "arc11"
stateGraph arc lappend "arc11" actions {sow_wheat}
stateGraph arc lappend "arc11" rules {[canPlant_wheat]}
stateGraph arc lappend "arc11" actions {}
stateGraph arc insert "Reestablish" "Lucerne" "arc3"
stateGraph arc lappend "arc3" actions {sow_lucerne}
stateGraph arc lappend "arc3" rules {[incr waiting] == 2}
stateGraph arc lappend "arc3" actions {}
stateGraph arc insert "Lucerne" "wheatPrepn" "arc12"
stateGraph arc lappend "arc12" actions {apsimSendMessage lucerne end_crop}
stateGraph arc lappend "arc12" actions {set nLucerneDays 0}
stateGraph arc lappend "arc12" rules {[incr nLucerneDays] > 700}
stateGraph arc lappend "arc12" actions {}
stateGraph arc insert "lucernePrepn" "Lucerne" "arc8"
stateGraph arc lappend "arc8" actions {sow_lucerne}
stateGraph arc lappend "arc8" actions {set nLucerneDays 0}
stateGraph arc lappend "arc8" rules {[canPlant_lucerne]}
stateGraph arc lappend "arc8" actions {}
stateGraph arc insert "Wheat" "lucernePrepn" "arc0"
stateGraph arc lappend "arc0" actions {apsimSendMessage wheat harvest}
stateGraph arc lappend "arc0" actions {apsimSendMessage wheat end_crop}
stateGraph arc lappend "arc0" rules {[canHarvest_wheat]}
stateGraph arc lappend "arc0" actions {}
```
        tclui Wheat Sowing Rule: uiscript=source $apsuite/UserInterface/APSFarm/GenericSowingUI.tcl; state=Wheat; crop=wheat; date1=15-may; date2=10-jul; raincrit=25; rainnumdays=3; esw_amount=50; must_sow=yes; cultivar=hartog; plants=100; sowing_depth=30; row_spacing=250; fert_cost=???; criteria=variable; skipplant=0; skiprow=0; class=plant; module=plant
          ruletemplate Sowing rule - initialisation:
            # Support procedures
            # Can we plant a crop today?
            proc canPlant_[crop] {} {
              if {"[criteria]" == "variable"} {
                 set year [apsimGet year]; set day [apsimGet day]
                 set d1 [clock format [clock scan "[date1]-$year"] -format %j]
                 set d2 [clock format [clock scan "[date2]-$year"] -format %j]

                 if {"[must_sow]" == "yes" && $day == $d2} {return 1}

                 if {$d1 > $d2} {
                    set dateOK [expr $day >= $d1 || $day <= $d2]
                 } else {
                    set dateOK [expr $day >= $d1 && $day <= $d2]
                 }
                 set rainOK [expr [apsimGet rain\[[rainnumdays]\]] >= [raincrit]]
                 set eswOK [expr [apsimGet esw] >= [esw_amount]]
                 return [expr $dateOK && $rainOK && $eswOK]
              } elseif {"[criteria]" == "fixed"} {
                 set year [apsimGet year]; set day [apsimGet day]
                 set d1 [clock format [clock scan "[date1]-$year"] -format %j]
                 return [expr $day == $d1]
              } else {
                 error "Unknown sowing criteria \"[criteria]\"."
              }
              return "notreached"
            }

            # Plant a crop now
            proc sow_[crop] {} {
              if {"[module]" == "plant"} {
                 apsimSendMessage [crop] sow {plants [plants]} {sowing_depth [sowing_depth]} \
                         {cultivar [cultivar]} {row_spacing [row_spacing]} \
                         {skipplant [skipplant]} {skiprow [skiprow]} {crop_class [class]}
              } elseif {"[module]" == "cropmod"} {
                 apsimSendMessage [crop] sow {plants [density]} {sowing_depth [depth]} \
                         {cultivar [cultivar]} {row_spacing [row_spacing]} {skiprow [skiprow]}
              } elseif {"[module]" == "growth"} {
                 apsimSendMessage [crop] ???
              } elseif {"[module]" == "ozcot"} {
                 apsimSendMessage [crop] sow {plants_pm [plants_pm]} {sowing_depth [sowing_depth]} \
                         {row_spacing [row_spacing]} {skiprow [skiprow]} {cultivar [cultivar]}
              } elseif {"[module]" == "oryza"} {
                 apsimSendMessage [crop] sow {cultivar [cultivar]}
              } elseif {"[module]" == "sorghum"} {
                 apsimSendMessage [crop] sow {plants [plants]} {sowing_depth [sowing_depth]} \
                         {cultivar [cultivar]} {row_spacing [row_spacing]} {skiprow [skiprow]} \
                         {tiller_no_fertile [tiller_no_fertile]}
              } elseif {"[module]" == "sugar"} {
                 apsimSendMessage [crop] sow {plants [plants]} {cultivar [cultivar]} {sowing_depth [sowing_depth]}
              } else {
                error "Unknown crop module \"[module]\"."
              }
            }

            proc canHarvest_[crop] {} {
               return [expr [string match [apsimGet [crop].stagename] "harvest_ripe"] &&\
                            [string match [apsimGet [crop].plant_status] "dead"]]
            }
          rule Wheat Lucerne Rotation Wheat Sowing Rule.out - Sowing rule - initialisation
            on init:
```
# Support procedures
# Can we plant a crop today?
proc canPlant_wheat {} {
  if {"variable" == "variable"} {
     set year [apsimGet year]; set day [apsimGet day]
     set d1 [clock format [clock scan "15-may-$year"] -format %j]
     set d2 [clock format [clock scan "10-jul-$year"] -format %j]

     if {"yes" == "yes" && $day == $d2} {return 1}

     if {$d1 > $d2} {
        set dateOK [expr $day >= $d1 || $day <= $d2]
     } else {   
        set dateOK [expr $day >= $d1 && $day <= $d2]
     }
     set rainOK [expr [apsimGet rain\[3\]] >= 25]
     set eswOK [expr [apsimGet esw] >= 50]
     return [expr $dateOK && $rainOK && $eswOK]
  } elseif {"variable" == "fixed"} {
     set year [apsimGet year]; set day [apsimGet day]
     set d1 [clock format [clock scan "15-may-$year"] -format %j]
     return [expr $day == $d1]
  } else {
     error "Unknown sowing criteria \"variable\"."
  }
  return "notreached"
}

# Plant a crop now
proc sow_wheat {} {
  if {"plant" == "plant"} {
     apsimSendMessage wheat sow {plants 100} {sowing_depth 30} \
             {cultivar hartog} {row_spacing 250} \
             {skipplant 0} {skiprow 0} {crop_class plant} 
  } elseif {"plant" == "cropmod"} {
     apsimSendMessage wheat sow {plants [density]} {sowing_depth [depth]} \
             {cultivar hartog} {row_spacing 250} {skiprow 0} 
  } elseif {"plant" == "growth"} {
     apsimSendMessage wheat ???
  } elseif {"plant" == "ozcot"} {
     apsimSendMessage wheat sow {plants_pm [plants_pm]} {sowing_depth 30} \
             {row_spacing 250} {skiprow 0} {cultivar hartog}
  } elseif {"plant" == "oryza"} {
     apsimSendMessage wheat sow {cultivar hartog} 
  } elseif {"plant" == "sorghum"} {
     apsimSendMessage wheat sow {plants 100} {sowing_depth 30} \
             {cultivar hartog} {row_spacing 250} {skiprow 0} \
             {tiller_no_fertile [tiller_no_fertile]}
  } elseif {"plant" == "sugar"} {
     apsimSendMessage wheat sow {plants 100} {cultivar hartog} {sowing_depth 30}
  } else {
    error "Unknown crop module \"plant\"."
  }
}


proc canHarvest_wheat {} {
   return [expr [string match [apsimGet wheat.stagename] "harvest_ripe"] &&\
                [string match [apsimGet wheat.plant_status] "dead"]]
}
```
        tclui Lucerne Sowing Rule: uiscript=source $apsuite/UserInterface/APSFarm/GenericSowingUI.tcl; state=Lucerne; crop=lucerne; date1=15-oct; date2=10-jul; raincrit=25; rainnumdays=3; esw_amount=50; must_sow=yes; cultivar=hunter_river; plants=200; sowing_depth=10; row_spacing=250; fert_cost=???; criteria=variable; skipplant=0; skiprow=0; class=plant; module=plant
          ruletemplate Sowing rule - initialisation:
            # Support procedures
            # Can we plant a crop today?
            proc canPlant_[crop] {} {
              if {"[criteria]" == "variable"} {
                 set year [apsimGet year]; set day [apsimGet day]
                 set d1 [clock format [clock scan "[date1]-$year"] -format %j]
                 set d2 [clock format [clock scan "[date2]-$year"] -format %j]

                 if {"[must_sow]" == "yes" && $day == $d2} {return 1}

                 if {$d1 > $d2} {
                    set dateOK [expr $day >= $d1 || $day <= $d2]
                 } else {
                    set dateOK [expr $day >= $d1 && $day <= $d2]
                 }
                 set rainOK [expr [apsimGet rain\[[rainnumdays]\]] >= [raincrit]]
                 set eswOK [expr [apsimGet esw] >= [esw_amount]]
                 return [expr $dateOK && $rainOK && $eswOK]
              } elseif {"[criteria]" == "fixed"} {
                 set year [apsimGet year]; set day [apsimGet day]
                 set d1 [clock format [clock scan "[date1]-$year"] -format %j]
                 return [expr $day == $d1]
              } else {
                 error "Unknown sowing criteria \"[criteria]\"."
              }
              return "notreached"
            }

            # Plant a crop now
            proc sow_[crop] {} {
              if {"[module]" == "plant"} {
                 apsimSendMessage [crop] sow {plants [plants]} {sowing_depth [sowing_depth]} \
                         {cultivar [cultivar]} {row_spacing [row_spacing]} \
                         {skipplant [skipplant]} {skiprow [skiprow]} {crop_class [class]}
              } elseif {"[module]" == "cropmod"} {
                 apsimSendMessage [crop] sow {plants [density]} {sowing_depth [depth]} \
                         {cultivar [cultivar]} {row_spacing [row_spacing]} {skiprow [skiprow]}
              } elseif {"[module]" == "growth"} {
                 apsimSendMessage [crop] ???
              } elseif {"[module]" == "ozcot"} {
                 apsimSendMessage [crop] sow {plants_pm [plants_pm]} {sowing_depth [sowing_depth]} \
                         {row_spacing [row_spacing]} {skiprow [skiprow]} {cultivar [cultivar]}
              } elseif {"[module]" == "oryza"} {
                 apsimSendMessage [crop] sow {cultivar [cultivar]}
              } elseif {"[module]" == "sorghum"} {
                 apsimSendMessage [crop] sow {plants [plants]} {sowing_depth [sowing_depth]} \
                         {cultivar [cultivar]} {row_spacing [row_spacing]} {skiprow [skiprow]} \
                         {tiller_no_fertile [tiller_no_fertile]}
              } elseif {"[module]" == "sugar"} {
                 apsimSendMessage [crop] sow {plants [plants]} {cultivar [cultivar]} {sowing_depth [sowing_depth]}
              } else {
                error "Unknown crop module \"[module]\"."
              }
            }
          rule Wheat Lucerne Rotation Lucerne Sowing Rule.out - Sowing rule - initialisation
            on init:
```
# Support procedures
# Can we plant a crop today?
proc canPlant_lucerne {} {
  if {"variable" == "variable"} {
     set year [apsimGet year]; set day [apsimGet day]
     set d1 [clock format [clock scan "15-oct-$year"] -format %j]
     set d2 [clock format [clock scan "10-jul-$year"] -format %j]

     if {"yes" == "yes" && $day == $d2} {return 1}

     if {$d1 > $d2} {
        set dateOK [expr $day >= $d1 || $day <= $d2]
     } else {   
        set dateOK [expr $day >= $d1 && $day <= $d2]
     }
     set rainOK [expr [apsimGet rain\[3\]] >= 25]
     set eswOK [expr [apsimGet esw] >= 50]
     return [expr $dateOK && $rainOK && $eswOK]
  } elseif {"variable" == "fixed"} {
     set year [apsimGet year]; set day [apsimGet day]
     set d1 [clock format [clock scan "15-oct-$year"] -format %j]
     return [expr $day == $d1]
  } else {
     error "Unknown sowing criteria \"variable\"."
  }
  return "notreached"
}

# Plant a crop now
proc sow_lucerne {} {
  if {"plant" == "plant"} {
     apsimSendMessage lucerne sow {plants 200} {sowing_depth 10} \
             {cultivar hunter_river} {row_spacing 250} \
             {skipplant 0} {skiprow 0} {crop_class plant} 
  } elseif {"plant" == "cropmod"} {
     apsimSendMessage lucerne sow {plants [density]} {sowing_depth [depth]} \
             {cultivar hunter_river} {row_spacing 250} {skiprow 0} 
  } elseif {"plant" == "growth"} {
     apsimSendMessage lucerne ???
  } elseif {"plant" == "ozcot"} {
     apsimSendMessage lucerne sow {plants_pm [plants_pm]} {sowing_depth 10} \
             {row_spacing 250} {skiprow 0} {cultivar hunter_river}
  } elseif {"plant" == "oryza"} {
     apsimSendMessage lucerne sow {cultivar hunter_river} 
  } elseif {"plant" == "sorghum"} {
     apsimSendMessage lucerne sow {plants 200} {sowing_depth 10} \
             {cultivar hunter_river} {row_spacing 250} {skiprow 0} \
             {tiller_no_fertile [tiller_no_fertile]}
  } elseif {"plant" == "sugar"} {
     apsimSendMessage lucerne sow {plants 200} {cultivar hunter_river} {sowing_depth 10}
  } else {
    error "Unknown crop module \"plant\"."
  }
}
```
        rule Grazing management
          on init:
```
# Initialisation
set nLucerneDays 0
set annual_lwg  0.0
set paddockState "empty"
set ready_to_graze 0
set growth 0.0

# Tell the grazing module we only graze lucerne. This is needed when there is more than one crop
# in the paddock - even though only one may be "alive".
apsimSet graz.pasture_source "lucerne"
```
          on prepare:
```
# Start grazing 90 days after sowing
if {$paddockState == "empty"  && $nLucerneDays > 90} {
   apsimSet graz.stocking_rate 0.4
   apsimSet graz.alw  200.0
   set annual_lwg 0.0
   set paddockState stocked
}

# Stop grazing when the crop comes off
if { $paddockState != "empty"  && $nLucerneDays == 0} {
   apsimSet graz.stocking_rate 0.0
   apsimSet graz.alw  0.0
   set annual_lwg 0.0
   set paddockState empty
}

# This is needed by graz (for some obscure reason).
if { $paddockState != "empty" } {
  set growth [apsimGet lucerne.dlt_dm]
}
```
          on post:
```
if  {[apsimGet day_of_month] == 1}  {
  apsimSendMessage outputfile do_output
}
```
      outputfile: filename=Wheat Lucerne Rotation.out; title=Wheat Lucerne Rotation
        variables
          variable:
            dd/mm/yyyy as Date  # Date (dd/mm/yyyy)
            wheat.yield as whtYield  # Yield
            lucerne.biomass as lucerneBiomass
            alw  # Weight of beast
            stocking_rate  # Stocking rate
        events Reporting Frequency: event=harvesting
      soil Black Vertosol-Bongeen (Tipton No116): Site=Tipton; Region=Darling Downs; State=Queensland
        Comment = Soil naming structure: \State\Region\Classification-Local Name (Site/district and locator number)  # Comments
        SoilType = Black Vertosol  # Soil description
        NearestTown = Pittsworth, Q 4356
        NaturalVegetation = Qld Bluegrass
        DataSource = CSIRO Sustainable Ecosystems, Toowoomba
        Water
          Layer:
            Thickness (mm)  BD (g/cc)  AirDry (mm/mm)  LL15 (mm/mm)  DUL (mm/mm)  SAT (mm/mm)
            150             0.970      0.140           0.270         0.550        0.600
            150             1          0.220           0.270         0.540        0.590
            300             1.020      0.270           0.270         0.540        0.590
            300             1.070      0.270           0.270         0.520        0.570
            300             1.110      0.270           0.270         0.500        0.550
            300             1.110      0.270           0.270         0.500        0.550
            300             1.110      0.270           0.270         0.500        0.550
          SoilCrop wheat
            Layer:
              Thickness (mm)  LL (mm/mm)  KL (/day)  XF (0-1)
              150             0.270       0.060      1
              150             0.270       0.060      1
              300             0.350       0.060      1
              300             0.330       0.040      1
              300             0.360       0.040      1
              300             0.410       0.020      1
              300             0.490       0.020      1
          SoilCrop Cotton
            Layer:
              Thickness (mm)  LL (mm/mm)  KL (/day)  XF (0-1)
              150             0.270       0.100      1
              150             0.270       0.100      1
              300             0.290       0.100      1
              300             0.310       0.100      1
              300             0.340       0.090      1
              300             0.370       0.070      1
              300             0.420       0.050      1
          SoilCrop Sorghum
            Layer:
              Thickness (mm)  LL (mm/mm)  KL (/day)  XF (0-1)
              150             0.270       0.070      1
              150             0.270       0.070      1
              300             0.350       0.070      1
              300             0.370       0.050      1
              300             0.380       0.050      1
              300             0.410       0.040      1
              300             0.420       0.030      1
          SoilCrop lucerne
            Layer:
              Thickness (mm)  LL (mm/mm)  KL (/day)  XF (0-1)
              150             0.270       0.070      1
              150             0.270       0.070      1
              300             0.290       0.070      1
              300             0.310       0.050      1
              300             0.340       0.050      1
              300             0.370       0.040      1
              300             0.420       0.030      1
        SoilWat: SummerCona=3.5; SummerU=6; SummerDate=1-Nov; WinterCona=3.5; WinterU=6; WinterDate=1-Apr; DiffusConst=40; DiffusSlope=16; Salb=0.12; CN2Bare=73; CNRed=20; CNCov=0.8
          Layer:
            Thickness (mm)  SWCON (0-1)
            150             0.300
            150             0.300
            300             0.300
            300             0.300
            300             0.300
            300             0.300
            300             0.300
        SoilOrganicMatter: RootCN=40; RootWT=1000; SoilCN=12; EnrACoeff=7.4; EnrBCoeff=0.2
          Layer:
            Thickness (mm)  OC (Total %)  FBiom (0-1)  FInert (0-1)
            150             1.900         0.040        0.400
            150             1.210         0.020        0.600
            300             0.450         0.020        0.800
            300             0.300         0.020        1
            300             0.200         0.010        1
            300             0.160         0.010        1
            300             0.170         0.010        1
        Analysis
          Layer:
            Thickness (mm)  PH (1:5 water)
            150             8.400
            150             8.600
            300             8.900
            300             8.900
            300             8.800
            300             8.600
            300             8.800
        Sample Initial nitrogen
          Layer:
            Thickness (mm)  NO3 (ppm)  NH4 (ppm)
            150             6          1
            150             5          1
            300             3          0.900
            300             2          0.700
            300             1          0.200
            300             1          0.100
            300             1          0.010
        Sample Initial water
          Layer:
            Thickness (mm)  SW (mm/mm)
            150             0.270
            150             0.270
            300             0.290
            300             0.310
            300             0.340
            300             0.370
            300             0.420
  simulation Kilmore_Buffel
    memo notes on Buffel_AVG
      parameters:

      Average buffel for qld (p1, p3)
       buffel3sortedfile.mrx Feb2009 by JO

      Native grass (p2, p4)
       average native C4 grass parameters for qld. checked by jo&pete feb2009

      BCS
       parameters from Site67.mrx - Feb2009 by JO

      P3 &P4 are grazed
    metfile met: filename=%apsim%\Examples\Metfiles\Goond.met
    clock
      start_date = 1/10/1957  # Enter the start date of the simulation
      end_date = 31/12/1987  # Enter the end date of the simulation
    summaryfile
    graz Cull_Cows
      intake_util_intercept = 1  # Intercept in intake and utilization eqn (p142)
      intake_util_slope = -0.3  # Slope in intake and utilization eqn (p143)
      yld_eat_restr = 300  # Yield at which intake restriction no longer applies (p144)
      summer_lwg = 80  # Expected summer lwg @ low SR (p145)
      autumn_lwg = 40  # Expected autumn lwg @ low SR (p146)
      winter_lwg = 10  # Expected winter lwg @ low SR (p147)
      spring_lwg = 40  # Expected spring lwg @ low SR (p148)
      leaf_diet = 0.85  # Proportion of leaf in diet (p132/100)
      std_alw = 200
      min_alw = 100  # Minimum ALW
      metabol_expon = 0.75
      acc_eaten_reset = 335  # Day to reset eaten accumulator
      prop_can_eat = 1
      allow_supplements = 0
    graz Bollocks: same as Kilmore_Buffel.Cull_Cows
    area p1
      grasp Buffel_AVG
        root_depth_init = 750  # Initial depth of roots (mm)
        dm_dead_leaf_init = 750  # Initial Dead Leaf weight (kg/ha)
        dm_dead_stem_init = 750  # Initial Dead Stem weight (kg/ha)
        dm_dead_root_init = 100  # Initial Dead Root weight (kg/ha)
        dm_green_leaf_init = 1000  # Initial Green Leaf weight (kg/ha)
        dm_green_stem_init = 1000  # Initial Green Stem weight (kg/ha)
        dm_green_root_init = 300  # Initial Green Root weight (kg/ha)
        basal_area_init = 2.5  # Initial Basal area of tussocks (%)
        acc_trans_for_n_init = 0  # Initial accumulated transpiration, used for N uptake (mm)
        acc_growth_for_n_init = 0  # Initial accumulated growth, used for N uptake (kg/ha)
        max_n_avail = 25  # Limit to total N (kg/year) (p99)
        max_n_avail_dist = 0.8 0.1 0.05  0.05  0.0 0.0  0.0  # Distribution of N in profile
        ll = 0.290  0.290  0.290  0.290  0.290  0.290  0.290  0.290  0.290  0.290  0.290  # Lower limit (ll) of water extraction (mm/mm)
        kl = 0.5      0.5      0.5    0.5  0.0  0.0  0.0  # Rate of water extraction (kl)
        kl2rlv = 1
        crop_type = grass
        uptake_source = calc
        hgt_vpd_screen = 200  # Height at which surface effects on vpd are 0 (mm) (p95)
        height_1000kg = 200  # Sward Height per tonne (p096*10, mm)
        et_use_efficiency = 6  # Evapotranspiration use efficiency used in BA calc (kg/ha/mm) (p288)
        frac_leaf2total = 0.5  # Fraction of total dm produced that goes into leaf pool (0-1) (p123)
        yld_cover_slope = 0.693147  # Shape of exponential curve relating yield and cover
        yld_fpc50 = 1000  # yld_fpc50 (p046)
        yld_cov50 = 1000  # Yield transpiring at 50% of pan evap (p045)
        yld_tcov50 = 1150  # Tsdm yield at which cover for runoff is 50% (p271)
        swi_fullgreen = 0.2  # Min soil water for 100% green (p009)
        swi_nogrow = 0.2  # SWI when growth stops (p149)
        pot_regrow = 5  # Max rate regrowth from tussocks (kg/ha/unit grass ba) (p006)
        te_std = 17  # Transpiration efficiency at vpd=20mb (p007)
        rad_factor = 8.97
        residual_plant_N = 7.5  # Always this much n in plant (p097, kg/ha)
        litter_n = 0.3  # N conc of detached stems and roots ((p110-p111)/2)
        n_uptk_per100 = 8  # Nitrogen uptake per 100mm water (p098, kg/ha)
        frost_start = 2  # Minimum screen temp at which green cover=100% (oC,p125)
        frost_kill = 0  # Minimum screen temp at which frost kills all green (oC,p011)
        death_slope = 0.013  # Rate of green death per soil water(p051)
        death_intercept = 0.002  # Background death rate (p010)
        leaf_death_ratio = 1  # Proportion of leaf death to total death (p133)
        stem_death_ratio = 1  # Proportion of stem death to total death (p134)
        n_conc_dm_crit = 2.5  # Level of plant N at which no N stress occurs (p100)
        n_conc_dm_min = 0.68  # Level of soil N at which no N stress occurs (p101)
        n_conc_dm_max = 0.78  # Level of soil N at which soil N to high for growth (p102)
        stem_thresh = 0  # stem_thresh (p124)
        detach_dryseason = 0.0   0.002     0.002  # detach_dryseason: root, leaf, stem (p130,131)
        detach_wetseason = 0.0   0.004     0.004  # detach_wetseason: root, leaf, stem (p128, 129)
        day_start_summer = 335
        day_end_summer = 59
        acc_et_reset = 273
        acc_growth_reset = 273
        trans_for_n_reset = 273
        growth_for_n_reset = 273
        day_start_wet = 274
        day_start_dry = 91
        enr_a_coeff = 7.4
        enr_b_coeff = 0.2
        basal_area_option = 2  # Dynamic Basal Area calculation (0=off,1,2=on) (p268)
      soil Kilmore 150: LocalName=Open Downs; Site=Capella; Region=Central Queensland
        Comment = Data provided by D. Lack (oc and ph not measured)  # Comments
        SoilType = Black Vertosol  # Soil description
        NearestTown = Capella, Q 4702
        NaturalVegetation = Qld. Bluegrass, Mountain Coolibah
        InitWater Initial water
          PercentMethod: Percent=1.00; Distributed=Evenly distributed
        Water
          Layer:
            Thickness (mm)  BD (g/cc)  AirDry (mm/mm)  LL15 (mm/mm)  DUL (mm/mm)  SAT (mm/mm)
            150             1.360      0.125           0.200         0.400        0.450
            150             1.410      0.150           0.240         0.380        0.430
            300             1.390      0.170           0.240         0.390        0.470
            300             1.350      0.200           0.240         0.410        0.460
            300             1.350      0.170           0.240         0.410        0.450
            300             1.350      0.250           0.300         0.400        0.450
          SoilCrop Wheat
            Layer:
              Thickness (mm)  LL (mm/mm)  KL (/day)  XF (0-1)
              150             0.25        0.1        1
              150             0.26        0.1        1
              300             0.28        0.08       1
              300             0.3         0.06       1
              300             0.33        0.04       1
              300             0.33        0.02       1
          SoilCrop sorghum
            Layer:
              Thickness (mm)  LL (mm/mm)  KL (/day)  XF (0-1)
              150             0.25        0.1        1
              150             0.26        0.1        1
              300             0.28        0.08       1
              300             0.3         0.08       1
              300             0.33        0.06       1
              300             0.33        0.04       1
          SoilCrop maize: same as Kilmore_Buffel.p1.Kilmore 150.Water.sorghum
          SoilCrop Chickpea: same as Kilmore_Buffel.p1.Kilmore 150.Water.Wheat
          SoilCrop weed: same as Kilmore_Buffel.p1.Kilmore 150.Water.Wheat
          SoilCrop pigeonp
            Layer:
              Thickness (mm)  LL (mm/mm)  KL (/day)  XF (0-1)
              150             0.2         0.06       1
              150             0.24        0.06       1
              300             0.24        0.06       1
              300             0.24        0.06       1
              300             0.24        0.06       1
              300             0.3         0.06       1
        SoilWat: SummerCona=3.5; SummerU=6; SummerDate=1-Nov; WinterCona=3.5; WinterU=6; WinterDate=1-Apr; DiffusConst=40; DiffusSlope=16; Salb=0.13; Cn2Bare=73; CnRed=20; CnCov=0.8
          Layer:
            Thickness (mm)  SWCON (0-1)
            150             0.300
            150             0.300
            300             0.300
            300             0.300
            300             0.300
            300             0.300
        SoilOrganicMatter: RootCn=40; RootWt=200; SoilCn=12.5; EnrACoeff=7.4; EnrBCoeff=0.2
          Layer:
            Thickness (mm)  OC (Total %)  FBiom (0-1)  FInert (0-1)
            150             1.240         0.030        0.400
            150             1.240         0.020        0.600
            300             1.250         0.010        0.800
            300             1.100         0.010        0.900
            300             0.710         0.010        0.950
            300             0.340         0.010        0.950
        Analysis
          Layer:
            Thickness (mm)  PH (1:5 water)
            150             7
            150             7
            300             7
            300             7
            300             7
            300             7
        Sample Initial nitrogen
          Layer:
            Thickness (mm)  NO3 (ppm)  NH4 (ppm)
            150             6.50007    0.600098
            150             2.10002    0.100016
            300             2.10002    0.100016
            300             1.70002    0.100016
            300             1.70002    0.100016
            300             1.70002    0.100016
      surfaceom SurfaceOrganicMatter
        PoolName = wheat_stubble  # Organic Matter pool name
        type = wheat  # Organic Matter type
        mass = 1000  # Initial surface residue (kg/ha)
        cnr = 80  # C:N ration of initial residue
        standing_fraction = 0  # Fraction of residue standing
    area p2
      grasp Native_grass
        root_depth_init = 750  # Initial depth of roots (mm)
        dm_dead_leaf_init = 750  # Initial Dead Leaf weight (kg/ha)
        dm_dead_stem_init = 750  # Initial Dead Stem weight (kg/ha)
        dm_dead_root_init = 100  # Initial Dead Root weight (kg/ha)
        dm_green_leaf_init = 1000  # Initial Green Leaf weight (kg/ha)
        dm_green_stem_init = 1000  # Initial Green Stem weight (kg/ha)
        dm_green_root_init = 300  # Initial Green Root weight (kg/ha)
        basal_area_init = 2.5  # Initial Basal area of tussocks (%)
        acc_trans_for_n_init = 0  # Initial accumulated transpiration, used for N uptake (mm)
        acc_growth_for_n_init = 0  # Initial accumulated growth, used for N uptake (kg/ha)
        max_n_avail = 15  # Limit to total N (kg/year)
        max_n_avail_dist = 0.8 0.1 0.05  0.05  0.0 0.0  0.0  # Distribution of N in profile
        ll = 0.290  0.290  0.290  0.290  0.290  0.290  0.290  0.290  0.290  0.290  0.290  # Lower limit (ll) of water extraction (mm/mm)
        kl = 0.5      0.5      0.5    0.5  0.0  0.0  0.0  # Rate of water extraction (kl)
        kl2rlv = 1
        crop_type = grass
        uptake_source = calc
        hgt_vpd_screen = 200  # Height at which surface effects on vpd are 0 (mm) (p95)
        height_1000kg = 100  # Sward Height per tonne (p096*10, mm)
        et_use_efficiency = 0  # Evapotranspiration use efficiency used in BA calc (kg/ha/mm) (p288)
        frac_leaf2total = 0.5  # Fraction of total dm produced that goes into leaf pool (0-1) (p123)
        yld_cover_slope = 0.693147  # Shape of exponential curve relating yield and cover
        yld_fpc50 = 1600  # yld_fpc50 (p046)
        yld_cov50 = 1600  # Yield transpiring at 50% of pan evap (p045)
        yld_tcov50 = 1150  # Tsdm yield at which cover for runoff is 50% (p271)
        swi_fullgreen = 0.2  # Min soil water for 100% green (p009)
        swi_nogrow = 0.2  # SWI when growth stops (p149)
        pot_regrow = 3.5  # Max rate regrowth from tussocks (kg/ha/unit grass ba) (p006)
        te_std = 13.5  # Transpiration efficiency at vpd=20mb (p007)
        rad_factor = 8.97
        residual_plant_N = 5  # Always this much n in plant (p097, kg/ha)
        litter_n = 0.3  # N conc of detached stems and roots ((p110-p111)/2)
        n_uptk_per100 = 6  # Nitrogen uptake per 100mm water (p098, kg/ha)
        frost_start = 2  # Minimum screen temp at which green cover=100% (oC,p125)
        frost_kill = 0  # Minimum screen temp at which frost kills all green (oC,p011)
        death_slope = 0.013  # Rate of green death per soil water(p051)
        death_intercept = 0.002  # Background death rate (p010)
        leaf_death_ratio = 1  # Proportion of leaf death to total death (p133)
        stem_death_ratio = 1  # Proportion of stem death to total death (p134)
        n_conc_dm_crit = 2.5  # Level of plant N at which no N stress occurs (p100)
        n_conc_dm_min = 0.68  # Level of soil N at which no N stress occurs (p101)
        n_conc_dm_max = 0.78  # Level of soil N at which soil N to high for growth (p102)
        stem_thresh = 0  # stem_thresh (p124)
        detach_dryseason = 0.0   0.004     0.004  # detach_dryseason: root, leaf, stem (p130,131)
        detach_wetseason = 0.0   0.002     0.002  # detach_wetseason: root, leaf, stem (p128, 129)
        day_start_summer = 335
        day_end_summer = 59
        acc_et_reset = 273
        acc_growth_reset = 273
        trans_for_n_reset = 273
        growth_for_n_reset = 273
        day_start_wet = 274
        day_start_dry = 91
        enr_a_coeff = 7.4
        enr_b_coeff = 0.2
      soil Kilmore 150 -> /Simulations/Kilmore_Buffel/p1/Kilmore 150
      surfaceom SurfaceOrganicMatter -> /Simulations/Kilmore_Buffel/p1/SurfaceOrganicMatter
    area p3
      grasp Buffel_AVG -> /Simulations/Kilmore_Buffel/p1/Buffel_AVG
      soil Kilmore 150 -> /Simulations/Kilmore_Buffel/p1/Kilmore 150
      surfaceom SurfaceOrganicMatter -> /Simulations/Kilmore_Buffel/p1/SurfaceOrganicMatter
    area p4
      grasp Native_grass -> /Simulations/Kilmore_Buffel/p2/Native_grass
      soil Kilmore 150 -> /Simulations/Kilmore_Buffel/p1/Kilmore 150
      surfaceom SurfaceOrganicMatter -> /Simulations/Kilmore_Buffel/p1/SurfaceOrganicMatter
    area BCS
      grasp Buffel_BCS
        root_depth_init = 750  # Initial depth of roots (mm)
        dm_dead_leaf_init = 750  # Initial Dead Leaf weight (kg/ha)
        dm_dead_stem_init = 750  # Initial Dead Stem weight (kg/ha)
        dm_dead_root_init = 100  # Initial Dead Root weight (kg/ha)
        dm_green_leaf_init = 1000  # Initial Green Leaf weight (kg/ha)
        dm_green_stem_init = 1000  # Initial Green Stem weight (kg/ha)
        dm_green_root_init = 300  # Initial Green Root weight (kg/ha)
        basal_area_init = 2.5  # Initial Basal area of tussocks (%)
        acc_trans_for_n_init = 0  # Initial accumulated transpiration, used for N uptake (mm)
        acc_growth_for_n_init = 0  # Initial accumulated growth, used for N uptake (kg/ha)
        max_n_avail = 50  # Limit to total N (kg/year) (p99)
        max_n_avail_dist = 0.8 0.1 0.05  0.05  0.0 0.0  0.0  # Distribution of N in profile
        ll = 0.290  0.290  0.290  0.290  0.290  0.290  0.290  0.290  0.290  0.290  0.290  # Lower limit (ll) of water extraction (mm/mm)
        kl = 0.5      0.5      0.5    0.5  0.0  0.0  0.0  # Rate of water extraction (kl)
        kl2rlv = 1
        crop_type = grass
        uptake_source = calc
        hgt_vpd_screen = 200  # Height at which surface effects on vpd are 0 (mm) (p95)
        height_1000kg = 100  # Sward Height per tonne (p096*10, mm)
        et_use_efficiency = 0  # Evapotranspiration use efficiency used in BA calc (kg/ha/mm) (p288)
        frac_leaf2total = 0.5  # Fraction of total dm produced that goes into leaf pool (0-1) (p123)
        yld_cover_slope = 0.693147  # Shape of exponential curve relating yield and cover
        yld_fpc50 = 1600  # yld_fpc50 (p046)
        yld_cov50 = 1600  # Yield transpiring at 50% of pan evap (p045)
        yld_tcov50 = 1150  # Tsdm yield at which cover for runoff is 50% (p271)
        swi_fullgreen = 0.8  # Min soil water for 100% green (p009)
        swi_nogrow = 0.01  # SWI when growth stops (p149)
        pot_regrow = 10  # Max rate regrowth from tussocks (kg/ha/unit grass ba) (p006)
        te_std = 25  # Transpiration efficiency at vpd=20mb (p007)
        rad_factor = 8.97
        residual_plant_N = 5  # Always this much n in plant (p097, kg/ha)
        litter_n = 0.3  # N conc of detached stems and roots ((p110-p111)/2)
        n_uptk_per100 = 50  # Nitrogen uptake per 100mm water (p098, kg/ha)
        frost_start = 2  # Minimum screen temp at which green cover=100% (oC,p125)
        frost_kill = 0  # Minimum screen temp at which frost kills all green (oC,p011)
        death_slope = 0.013  # Rate of green death per soil water(p051)
        death_intercept = 0.002  # Background death rate (p010)
        leaf_death_ratio = 1  # Proportion of leaf death to total death (p133)
        stem_death_ratio = 1  # Proportion of stem death to total death (p134)
        n_conc_dm_crit = 2.5  # Level of plant N at which no N stress occurs (p100)
        n_conc_dm_min = 0.4  # Level of soil N at which no N stress occurs (p101)
        n_conc_dm_max = 0.5  # Level of soil N at which soil N to high for growth (p102)
        stem_thresh = 0  # stem_thresh (p124)
        detach_dryseason = 0.0   0.005     0.005  # detach_dryseason: root, leaf, stem (p130,131)
        detach_wetseason = 0.0   0.000     0.000  # detach_wetseason: root, leaf, stem (p128, 129)
        day_start_summer = 335
        day_end_summer = 59
        acc_et_reset = 273
        acc_growth_reset = 273
        trans_for_n_reset = 273
        growth_for_n_reset = 273
        day_start_wet = 274
        day_start_dry = 91
        enr_a_coeff = 7.4
        enr_b_coeff = 0.2
        basal_area_option = 0  # Dynamic Basal Area calculation (0=off,1,2=on) (p268)
      soil Kilmore 150 -> /Simulations/Kilmore_Buffel/p1/Kilmore 150
      surfaceom SurfaceOrganicMatter -> /Simulations/Kilmore_Buffel/p1/SurfaceOrganicMatter
    tclmanager Farm Manager
      rule Farm logic
        on init:
```
## Grazing stuff here
set config(p1,state)  "off"
set config(p1,area)   100.0
set config(p2,state)  "off"
set config(p2,area)   100.0
set config(p3,state)  "off"
set config(p3,area)   100.0
set config(p4,state)  "off"
set config(p4,area)   100.0
set config(BCS,state) "off"
set config(BCS,area)  100.0      

set config(cull_cows,state) "off"
set config(bollocks,state) "off"

set config(paddocks) [list p1 p2 p3 p4 BCS]
set config(animals)  [list cull_cows bollocks]

set grass_in 0

#Move stock somewhere. 
# which   = name of the animal module
# paddock = the paddock they're going to
# crop    = The name of the crop they'll eat
proc moveStockTo {which paddock crop} {
   global config
   if {$crop == "feedlot"} {
      apsimSet .masterpm.$which.pasture_source ".masterpm.farm manager"
   } else {
      apsimSet .masterpm.$which.pasture_source ".masterpm.$paddock.$crop"
      set newSr [expr $config($which,number) / $config($paddock,area)]
      apsimSet .masterpm.$which.stocking_rate $newSr
      apsimSet .masterpm.$which.alw $config($which,alw)
      apsimSet .masterpm.$which.acc_eaten 0.0
      apsimSet .masterpm.$which.acc_growth 100.0
   }
   set config($which,state) "$paddock.$crop"
}

# This "dlt_dm" variable is accumulated by the grazing module - it uses 
# the ratio of (grass eaten / grass growth) internlly. Here's it's requested, but not used.
proc doPrepareAnimals {} {
   global config
   foreach animal $config(animals) {
      if {$config($animal,state) == "feedlot"} {
         uplevel #0 set dlt_dm 100.0
      } 
   } 
}

# Keep track of each animals alw. When on pasture, lwg is calculated,
# when in the feedlot, we provide a book value of lwg.
proc doProcessAnimals {} {
   global config
   foreach animal $config(animals) {
      if {$config($animal,state) == "feedlot"} {
         set config($animal,alw) [expr $config($animal,alw) + 2.0]      ;# 2.0 kg/hd/day
      } else {
         set config($animal,alw) [apsimGet .masterpm.$animal.alw]
      }
   } 
}

# Kick off the animals
proc animalsOn {which number liveWeight} {
   global config

   # initial live weight & stocking rate isn't set until we have a paddock with area
   apsimSet .masterpm.$which.stocking_rate 0.0
   apsimSet .masterpm.$which.alw 0.0

   set config($which,state)   on
   set config($which,alw)     $liveWeight
   set config($which,number)  $number
   set config($which,annLwg) 0.0
   # send an economics event here
}

# Kill off the animals (taking animals out the system)
proc animalsOff {which } {
   global config
   set config($which,state)  off
   set config($which,alw)    0.0
   set config($which,number) 0.0
   set config($which,annLwg) 0.0

   apsimSet .masterpm.$which.stocking_rate 0.0
   apsimSet .masterpm.$which.alw 0.0

   # send econ event here
}

# Extra bits (needed to fool animals talking to top level when in feedlot)
apsimRegisterGetSet dlt_dm
set dlt_dm         100.0
apsimRegisterGetSet leafgreenwt
set leafgreenwt    0.0
apsimRegisterGetSet stemgreenwt
set stemgreenwt    0.0
apsimRegisterGetSet leafsenescedwt
set leafsenescedwt 0.0
apsimRegisterGetSet stemsenescedwt
set stemsenescedwt 0.0


# Utility functions##############################
proc dateWithin {t0 t1} {
   set d0 [date2day $t0]
   set d1 [date2day $t1]
   return dayWithin $d0 $d1
}
proc dateIs {t} {
   set d [date2day $t]
   return [dayIs $d]
}

proc dayWithin {t0 t1} {
   set t [apsimGet day]
   if {$t0 > $t1} {
      return [expr $t >= $t0 || $t <= $t1]
   } else {
      return [expr $t >= $t0 && $t <= $t1]
   }
   # notreached
}

proc dayIs {t} {
   return [expr $t == [apsimGet day]]
}

proc date2day {d} {
   set year [apsimGet year]
   return [string trimleft [clock format [clock scan "$d-$year"] -format %j] "0"]
}
```
        on prepare:
```
# Establish grass if it isn't there.

if {!$grass_in} {
   apsimSendMessage .masterpm.p1.Buffel_AVG establish {init_section establishment}
   apsimSendMessage .masterpm.p2.Native_grass establish {init_section establishment}
   apsimSendMessage .masterpm.p3.Buffel_AVG establish {init_section establishment}
   apsimSendMessage .masterpm.p4.Native_grass establish {init_section establishment}
   apsimSendMessage .masterpm.BCS.Buffel_BCS establish {init_section establishment}

   set grass_in 1 ;# Do this once only. grass never dies.. :)

   foreach animal $config(animals) {
      apsimSet .masterpm.$animal.pasture_source ".masterpm.farm manager"
   
      set config($animal,state) off
      set config($animal,alw) 0.0
      set config($animal,number) 0.0
      set config($animal,annLwg) 0.0

      apsimSet .masterpm.$animal.stocking_rate 0.0
      apsimSet .masterpm.$animal.alw 0.0
   }
}

doPrepareAnimals
```
        on process:
```
doProcessAnimals

# Native grass
set animal "cull_cows"
set paddock "p4"
set pasture "native_grass"

if {[dateIs 1-jun]} {                            ;# p081
   if {$config($animal,state) == "off"} {
    animalsOn $animal 20 400              ;# p84
    moveStockTo $animal $paddock $pasture
   } else {
    set avgDailyIntake [expr ( $config($animal,annLwg) / 365.25 + 1.058) / 0.304 ]
    set targetUtil [expr 20.0 / 100.0]            ;# p083 = 20%
    set annualIntake [expr $avgDailyIntake * 365.5]

    set tsdm  [apsimGet .masterpm.$paddock.$pasture.tsdm] 
 
    set stock_equiv_ratio [expr $targetUtil * \
                              $tsdm/  \
                               $annualIntake]
    set alw [apsimGet .masterpm.$animal.alw]
    set weight_ratio [expr $alw / 200.0]
    set factor [expr pow($weight_ratio , 0.75)]
    set beasts_ha [expr $stock_equiv_ratio / $factor]
    set nBeasts [expr $beasts_ha * $config($paddock,area)]

    animalsOff $animal
    animalsOn $animal $nBeasts 400              ;# p84
    moveStockTo $animal $paddock $pasture
   }
   set config($animal,annLwg) 0.0
}

set animal "bollocks"
set paddock "p3"
set pasture "buffel_avg"

if {[dateIs 1-sep]} {                            ;# p081
   if {$config($animal,state) == "off"} {
    animalsOn $animal 20 400              ;# p84
    moveStockTo $animal $paddock $pasture
   } else {
    set avgDailyIntake [expr ( $config($animal,annLwg) / 365.25 + 1.058) / 0.304 ]
    set targetUtil [expr 20.0 / 100.0]            ;# p083 = 20%
    set annualIntake [expr $avgDailyIntake * 365.5]

    set tsdm  [apsimGet .masterpm.$paddock.$pasture.tsdm] 
 
    set stock_equiv_ratio [expr $targetUtil * \
                              $tsdm/  \
                               $annualIntake]
    set alw [apsimGet .masterpm.$animal.alw]
    set weight_ratio [expr $alw / 200.0]
    set factor [expr pow($weight_ratio , 0.75)]
    set beasts_ha [expr $stock_equiv_ratio / $factor]
    set nBeasts [expr $beasts_ha * $config($paddock,area)]

    animalsOff $animal
    animalsOn $animal $nBeasts 400              ;# p84
    moveStockTo $animal $paddock $pasture
   }
   set config($animal,annLwg) 0.0
}
```
    tracker
      variable:
        sum of .masterpm.p1.buffel_avg.dlt_dm on post from start_year to now as p1Growth
        sum of .masterpm.p2.native_grass.dlt_dm on post from start_year to now as p2Growth
        sum of .masterpm.p3.buffel_avg.dlt_dm on post from start_year to now as p3Growth
        sum of .masterpm.p4.native_grass.dlt_dm on post from start_year to now as p4Growth
        sum of cull_cows.lwg on post from start_year to now as cull_lwg
        sum of bollocks.lwg on post from start_year to now as bull_lwg
    outputfile: filename=Kilmore_Buffel.out; title=Kilmore_Buffel
      variables
        variable:
          dd/mm/yyyy as Date  # Date (dd/mm/yyyy)
          cull_lwg
          bull_lwg
          p1Growth
          p2Growth
          p3Growth
          p4Growth
      events Reporting Frequency: event=end_year  # End of daily simulation time step
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