folder simulations: version=36; creator=Apsim 7.5-r3197
  simulation LivsimSample
    metfile met: filename=%apsim%/Examples/MetFiles/Dalby.met
    clock
    accum: variable=rain[4]  # variable
    summaryfile
    manager2 Area
      plot1 = plot1  # Name of plot 1
      plot1_area = 1.5  # Area of plot 1
      plot2 = plot2  # Name of plot 2
      plot2_area = 1  # Area of plot 2
      plot3 = plot3  # Name of plot 3
      plot3_area = 1  # Area of plot 3
      verges = verges  # Name of plot 4
      verges_area = 25  # Area of plot 4
```csharp
using System;
using ModelFramework;

public class Script 
{      
   
   [Param, Output] string plot1;
   [Param, Output] double plot1_area;
   [Param, Output] string plot2;
   [Param, Output] double plot2_area;
   [Param, Output] string plot3;
   [Param, Output] double plot3_area;
   [Param, Output] string verges;
   [Param, Output] double verges_area;
   
}
```
    tclmanager Crop Management
      rule Setup
        # Paddock Descriptions
        paddocks = plot1 plot2 plot3
        pasturePaddocks = verges  # Paddocks
        on init:
```
set config(paddocks) [list [paddocks]]
set config(pasturePaddocks) [list [pasturePaddocks]]

for {set i 0} {$i < [llength $config(paddocks)]} {incr i} {
  set config([lindex $config(paddocks) $i],area) [apsimGet [lindex $config(paddocks) $i]_area]
}

for {set i 0} {$i < [llength $config(pasturePaddocks)]} {incr i} {
  set config([lindex $config(pasturePaddocks) $i],area) [apsimGet [lindex $config(pasturePaddocks) $i]_area]
}

# A list of crops in each paddock
set config(crops) [list maize peanut mucuna sorghum]

apsimRegisterGetSet config(paddocks)
foreach paddock $config(paddocks) {
  set config($paddock,initialState) F0
  set config($paddock,history) {}
  set config($paddock,graphNames) ${paddock}graph
  set state($paddock) {}
}

set simName [apsimGet title]
```
      rule Sow Maize
        # Sowing criteria
        date1 = 15-jan  # Enter sowing window START date (dd-mmm)
        date2 = 15-feb  # Enter sowing window END date (dd-mmm)
        must_sow = yes  # Must sow?
        raincrit = 20  # Amount of rainfall
        rainnumdays = 3  # Number of days of rainfall
        # Sowing parameters
        crop = maize  # Enter name of crop to sow
        density = 4.4  # Enter sowing density (plants/m2)
        depth = 30  # Enter sowing depth (mm)
        cultivar = sc501  # Enter cultivar
        class = plant  # Enter crop growth class
        row_spacing = 750  # Enter row spacing (mm)
        # Fertiliser parameters
        fert_amt = 0  # Amount of fertiliser
        fert_type = no3_n  # Type of fertiliser
        # Economic parameters
        cost = 0  # Cost of sowing (seed) ($/ha)
        # Labour
        operator = male  # The operator
        # Tillage parameters
        presow_days = 0  # Presow Tillage days before window
        presowtill = yes  # Presow Tillage operation
        sowtill = no  # Sowing Tillage operation
        on init:
```
# Sow this crop
proc sow_Maize_crop {paddock} {
  apsimSendMessage $paddock.[crop] sow {plants [density]} {sowing_depth [depth]} {cultivar  [cultivar]} {row_spacing [row_spacing]} {crop_class  [class]}
}

proc sow_Maize {paddock} {
  global config

  if {"[presowtill]" == "yes"} {
     doTillageNow $paddock doPresowTillage
  }

  sow_Maize_crop $paddock

  if {[fert_amt] > 0} {
     apsimSendMessage $paddock.fertiliser apply {type [fert_type]} {amount [fert_amt]}
     apsimSendMessage economics expenditure {category fertilisercost} "name  [fert_type]" \
               "rate [fert_amt]" "area $config($paddock,area)"  "paddock $paddock" "fertiliser_type [fert_type]" \
               "fertiliser_rate [fert_amt]" {incrop_cost {}} "crop [crop]" \
               "comment Fertiliser"
  }
  doManure Maize $paddock

  if {"[sowtill]" == "yes"} {
     doTillageNow $paddock doSowingTillage
  }

  apsimSendMessage economics expenditure \
                   "cost [expr [cost] * $config($paddock,area)]" \
                   "area $config($paddock,area)" \
                   "paddock $paddock" "costtype incrop_cost" {comment "sowing costs"}

  operateLabour "operator [operator]" "activity sowing"\
                   "area $config($paddock,area)" \
                   "paddock $paddock" "costtype incrop_cost"
  set config(season) "LR"
}

# Can we sow a crop?
proc canSow_Maize {paddock} {
  if {[paddockIsFallow $paddock]} {
    if {[dateWithin [date1] [date2]] } {
      if {( [apsimGet rain\[[rainnumdays]\]] >= [raincrit] ) ||
          ( "[must_sow]" == "yes" && [dateIs [date2]] ) } {
          return 1
      }
    }
  }
  return 0
}

# Return whether any crop in our paddock is not "out"
proc paddockIsFallow {paddock} {
   global config
   foreach crop $config(crops) {
      set status [apsimGetOptional $paddock.$crop.plant_status]
      if {$status != "" && $status != "out"} {
         return 0
      }
   }
   return 1
}

##########Date functions (general)
proc dateWithin {t0 t1} {
   set year [apsimGet year]
   set d0 [date2day $t0 $year]
   set d1 [date2day $t1 $year]
   return [dayWithin $d0 $d1]
}

proc dateIs {t} {
   set d [date2day $t [apsimGet year]]
   return [dayIs $d]
}

proc dayWithin {t0 t1} {
   set t [apsimGet day]
   if {$t0 > $t1} {
      return [expr $t >= $t0 || $t <= $t1]
   } else {
      return [expr $t >= $t0 && $t <= $t1]
   }
   # notreached
}

proc dayIs {t} {
   return [expr $t == [apsimGet day]]
}

proc leapyr {y} {
   return [expr ($y%4 == 0) && ($y%100 != 0) || ($y%400 == 0)]
}

proc date2day {date year} {
   foreach {mday month} [split $date "-"] {break}
   if {[leapyr $year]} {
      array set daysin {jan 0  feb 31 mar 58 apr 89 may 119 jun 150 jul 180 aug 211 sep 242 oct 272 nov 303 dec 333}
   } else {
      array set daysin {jan 0  feb 31 mar 59 apr 90 may 120 jun 151 jul 181 aug 212 sep 243 oct 273 nov 304 dec 334}
   }
   return [expr $mday + $daysin($month)]
}
```
      rule Sow Groundnut
        # Sowing criteria
        date1 = 15-jan  # Enter sowing window START date (dd-mmm)
        date2 = 15-feb  # Enter sowing window END date (dd-mmm)
        must_sow = yes  # Must sow?
        raincrit = 25  # Amount of rainfall
        rainnumdays = 4  # Number of days of rainfall
        # Peanut sowing parameters
        crop = peanut  # Enter name of crop to sow
        density = 2.8  # Enter sowing density (plants/m2)
        depth = 30  # Enter sowing depth (mm)
        cultivar = early_bunch  # Enter cultivar
        class = plant  # Enter crop growth class
        row_spacing = 750  # Enter row spacing (mm)
        # Fertiliser parameters
        fert_amt = 0  # Amount of fertiliser
        fert_type = no3_n  # Type of fertiliser
        # Economic parameters
        cost = 0  # Cost of Sowing ($/ha)
        # Labour
        operator = male  # The operator
        # Tillage parameters
        presow_days = 0  # Presow Tillage days before window
        presowtill = no  # Presow Tillage operation
        sowtill = no  # Sowing Tillage operation
        on init:
```
# Sow this crop
proc sow_Groundnut_crop {paddock} {
  apsimSendMessage $paddock.[crop] sow {plants [density]} {sowing_depth [depth]} {cultivar  [cultivar]} {row_spacing [row_spacing]} {crop_class  [class]}
}
proc sow_Groundnut {paddock} {
  global config

  if {"[presowtill]" == "yes"} {
     doTillageNow $paddock doPresowTillage
  }

  sow_Groundnut_crop $paddock

  if {[fert_amt] > 0} {
     apsimSendMessage $paddock.fertiliser apply {type [fert_type]} {amount [fert_amt]}
     apsimSendMessage economics expenditure {category fertilisercost} "name  [fert_type]" \
               "rate [fert_amt]" "area $config($paddock,area)"  "paddock $paddock" "fertiliser_type [fert_type]" \
               "fertiliser_rate [fert_amt]" {incrop_cost {}} "crop [crop]" \
               "comment Fertiliser"
  }

  apsimSendMessage economics expenditure \
                   "cost [expr [cost] * $config($paddock,area)]" \
                   "area $config($paddock,area)" \
                   "paddock $paddock" "costtype incrop_cost" {comment "sowing costs"}

  doManure Groundnuts $paddock

  if {"[sowtill]" == "yes"} {
     doTillageNow $paddock doSowingTillage
  }
  operateLabour "operator [operator]" "activity sowing"\
                   "area $config($paddock,area)" \
                   "paddock $paddock" "costtype incrop_cost"
  set config(season) "LR"
}

# Can we sow a crop?
proc canSow_Groundnut {paddock} {
  if {[paddockIsFallow $paddock]} {
    if {[dateWithin [date1] [date2]] } {
      if {( [apsimGet rain\[[rainnumdays]\]] >= [raincrit] ) ||
          ( "[must_sow]" == "yes" && [dateIs [date2]] ) } {
          return 1
      }
    }
  }
  return 0
}
```
      rule Sow Sorghum
        # Sowing criteria
        date1 = 10-feb  # Enter sowing window START date (dd-mmm)
        date2 = 10-feb  # Enter sowing window END date (dd-mmm)
        must_sow = yes  # Must sow?
        raincrit = 25  # Amount of rainfall
        rainnumdays = 3  # Number of days of rainfall
        # Peanut sowing parameters
        crop = sorghum  # Enter name of crop to sow
        density = 8  # Enter sowing density (plants/m2)
        depth = 30  # Enter sowing depth (mm)
        cultivar = Buster  # Enter cultivar
        row_spacing = 750  # Enter row spacing (mm)
        # Fertiliser parameters
        fert_amt = 0  # Amount of fertiliser
        fert_type = no3_n  # Type of fertiliser
        # Economic parameters
        cost = 0  # Cost of Sowing ($/ha)
        # Labour
        operator = male  # The operator
        # Tillage parameters
        presow_days = 0  # Presow Tillage days before window
        presowtill = no  # Presow Tillage operation
        sowtill = no  # Sowing Tillage operation
        on init:
```
# Sow this crop
proc sow_Sorghum_crop {paddock} {
  apsimSendMessage $paddock.[crop] sow {plants [density]} {sowing_depth [depth]} {cultivar  [cultivar]} {row_spacing [row_spacing]} {crop_class  [class]}
}
proc sow_Sorghum {paddock} {
  global config

  if {"[presowtill]" == "yes"} {
     doTillageNow $paddock doPresowTillage
  }

  sow_Sorghum_crop $paddock

  if {[fert_amt] > 0} {
     apsimSendMessage $paddock.fertiliser apply {type [fert_type]} {amount [fert_amt]}
     apsimSendMessage economics expenditure {category fertilisercost} "name  [fert_type]" \
               "rate [fert_amt]" "area $config($paddock,area)"  "paddock $paddock" "fertiliser_type [fert_type]" \
               "fertiliser_rate [fert_amt]" {incrop_cost {}} "crop [crop]" \
               "comment Fertiliser"
  }

  apsimSendMessage economics expenditure \
                   "cost [expr [cost] * $config($paddock,area)]" \
                   "area $config($paddock,area)" \
                   "paddock $paddock" "costtype incrop_cost" {comment "sowing costs"}

  doManure Sorghum $paddock

  if {"[sowtill]" == "yes"} {
     doTillageNow $paddock doSowingTillage
  }
  operateLabour "operator [operator]" "activity sowing"\
                   "area $config($paddock,area)" \
                   "paddock $paddock" "costtype incrop_cost"
  set config(season) "LR"
}

# Can we sow a crop?
proc canSow_Sorghum {paddock} {
  if {[paddockIsFallow $paddock]} {
    if {[dateWithin [date1] [date2]] } {
      if {( [apsimGet rain\[[rainnumdays]\]] >= [raincrit] ) ||
          ( "[must_sow]" == "yes" && [dateIs [date2]] ) } {
          return 1
      }
    }
  }
  return 0
}
```
      rule Sow Mucuna
        # Sowing criteria
        date1 = 10-feb  # Enter sowing window START date (dd-mmm)
        date2 = 10-feb  # Enter sowing window END date (dd-mmm)
        must_sow = yes  # Must sow?
        raincrit = 25  # Amount of rainfall
        rainnumdays = 4  # Number of days of rainfall
        # Peanut sowing parameters
        crop = mucuna  # Enter name of crop to sow
        density = 2.8  # Enter sowing density (plants/m2)
        depth = 30  # Enter sowing depth (mm)
        cultivar = mucuna_gen  # Enter cultivar
        class = plant  # Enter crop growth class
        row_spacing = 750  # Enter row spacing (mm)
        # Fertiliser parameters
        fert_amt = 0  # Amount of fertiliser
        fert_type = no3_n  # Type of fertiliser
        # Economic parameters
        cost = 0  # Cost of Sowing ($/ha)
        # Labour
        operator = male  # The operator
        # Tillage parameters
        presow_days = 0  # Presow Tillage days before window
        presowtill = no  # Presow Tillage operation
        sowtill = no  # Sowing Tillage operation
        on init:
```
# Sow this crop
proc sow_Mucuna_crop {paddock} {
  apsimSendMessage $paddock.[crop] sow {plants [density]} {sowing_depth [depth]} {cultivar  [cultivar]} {row_spacing [row_spacing]} {crop_class  [class]}
}
proc sow_Mucuna {paddock} {
  global config

  if {"[presowtill]" == "yes"} {
     doTillageNow $paddock doPresowTillage
  }

  sow_Mucuna_crop $paddock

  if {[fert_amt] > 0} {
     apsimSendMessage $paddock.fertiliser apply {type [fert_type]} {amount [fert_amt]}
     apsimSendMessage economics expenditure {category fertilisercost} "name  [fert_type]" \
               "rate [fert_amt]" "area $config($paddock,area)"  "paddock $paddock" "fertiliser_type [fert_type]" \
               "fertiliser_rate [fert_amt]" {incrop_cost {}} "crop [crop]" \
               "comment Fertiliser"
  }

  apsimSendMessage economics expenditure \
                   "cost [expr [cost] * $config($paddock,area)]" \
                   "area $config($paddock,area)" \
                   "paddock $paddock" "costtype incrop_cost" {comment "sowing costs"}

  doManure Groundnuts $paddock

  if {"[sowtill]" == "yes"} {
     doTillageNow $paddock doSowingTillage
  }
  operateLabour "operator [operator]" "activity sowing"\
                   "area $config($paddock,area)" \
                   "paddock $paddock" "costtype incrop_cost"
  set config(season) "LR"
}

# Can we sow a crop?
proc canSow_Mucuna {paddock} {
  if {[paddockIsFallow $paddock]} {
    if {[dateWithin [date1] [date2]] } {
      if {( [apsimGet rain\[[rainnumdays]\]] >= [raincrit] ) ||
          ( "[must_sow]" == "yes" && [dateIs [date2]] ) } {
          return 1
      }
    }
  }
  return 0
}
```
      rule Manure
        # Paddock Descriptions
        cropsToManure = Maize
        on init:
```
set config(manurecrops) [list [cropsToManure]]

proc doManure {crop paddock} {
   global config
   if {[lsearch $config(manurecrops) $crop] >= 0} {
     apsimSet cows.manurepaddock  $paddock
     apsimSendMessage "cows" ApplyStoredManure
   }
}
```
      rule Harvest Maize
        #
        cropname = Maize  # Enter friendly name of crop
        crop = maize  # Enter apsim name of crop to harvest when ripe
        cost = 0  # Cost of Harvesting ($/ha)
        removed = 0  # %age of residues removed (0-100)
        grazed = 0  # %age of residues grazed in situ (0-100)
        stored = 100  # %age of residues stored for feed (0-100)
        left = 0  # %age of residues left for fertility (0-100)
        # Labour
        operator = male  # The operator
        on init:
```
if {[expr [removed]+[grazed]+[stored]+[left]] != 100} {error "[crop] harvest residue fractions dont add to 100%"}

proc harvest_[cropname] {paddock} {
   global config daysSinceLastHarvest
   set somWtOld [apsimGet "$paddock.SurfaceOrganicMatter.surfaceom_wt"]

   operateLabour "operator [operator]" "activity harvesting"\
                   "area $config($paddock,area)" \
                   "paddock $paddock" "costtype incrop_cost"

   set yield [expr [apsimGet $paddock.[crop].yield]/1000.0]
   set biomass [apsimGet $paddock.[crop].biomass]
   if {"[crop]" == "sorghum" } {
     set grainWt [apsimGet $paddock.[crop].graingreenWt]
     if {$grainWt > 0} {
       set grainN [apsimGet $paddock.[crop].graingreenN]
       set grainProtein [expr $grainN / $grainWt * 100.0 * 5.71] ;# (%)
     } else {
       set grainProtein 0.0
     }
     set stover [expr ([apsimGet $paddock.[crop].LeafGreenWt] + \
                       [apsimGet $paddock.[crop].LeafSenescedWt] + \
                       [apsimGet $paddock.[crop].StemGreenWt] ) ]
     if {$stover > 0.0} {
       set stoverProtein [expr ([apsimGet $paddock.[crop].LeafGreenN] + \
                                [apsimGet $paddock.[crop].LeafSenescedN] + \
                                [apsimGet $paddock.[crop].StemGreenN]) / \
                               $stover * 100.0 * 5.71]
     } else {
       set stoverProtein 0.0
     }
     set stover [expr 10 * $stover]
   } elseif {"[crop]" == "maize"} {
     set grainProtein [apsimGet $paddock.[crop].grain_protein] ;# (%)
     set stover [expr [apsimGet $paddock.[crop].stover_wt] * 10.0 ]
     if {$stover > 0} {
        set stoverProtein [expr ([apsimGet $paddock.[crop].stover_n] * 10.0) / $stover * 100.0 * 5.71]
     } else {
        set stoverProtein 0.0
     }
   } else {
     set grainProtein [expr [apsimGet $paddock.[crop].grainN] / \
                            [apsimGet $paddock.[crop].grainWt] * 100.0 * 5.71] ;# (%)
     set stover [expr ($biomass - $yield) ]
     set stoverProtein [expr [apsimGet $paddock.[crop].vegetativeN] / \
                             [apsimGet $paddock.[crop].vegetativeWt]* 100.0 * 5.71]
   }

   apsimSendMessage economics expenditure \
                   "cost [expr [cost] * $config($paddock,area)]" \
                   "area $config($paddock,area)" \
                   "paddock $paddock" "costtype incrop_cost" {comment "harvesting costs"}

   apsimSendMessage economics income {category cropprice} "name [crop]"  \
                          "yield $yield" \
                          "area $config($paddock,area)" "paddock $paddock" "crop [crop]" \
                          "SW_state [apsimGet $config($paddock,watBal).esw]" \
                          "NO3_state [apsimGet $config($paddock,nModule).no3()]"

   apsimSendMessage $paddock.[crop]  harvest  "remove 0.0"
   apsimSendMessage $paddock.[crop]  end_crop

   set somWtNew [apsimGet "$paddock.SurfaceOrganicMatter.surfaceom_wt"]
   set somAdded [expr $somWtNew - $somWtOld]

   set daysSinceLastHarvest($paddock) 0

   set grazedFrac 0.0
   if {[grazed] > 0} {
      set grazedFrac [expr [grazed] / 100.0]
   }
   set storedFrac 0.0
   if {[stored] > 0} {
      set storedFrac [expr [stored] / 100.0]
      apsimSet [cropname]_residue_store.store [expr [apsimGet [cropname]_residue_store.store] + $storedFrac * $stover * $config($paddock,area)]
   }
   set removedFrac [expr ($storedFrac + [removed]) / 100.0]
   if {$removedFrac > 0} {
      apsimWriteToSummaryFile "Residues: removing [expr $removedFrac] of surface residues in paddock $paddock"
      apsimSendMessage "$paddock.SurfaceOrganicMatter" tillage {type user_defined} "f_incorp $removedFrac" {tillage_depth 0.0}
   }

   global annual
   set year [apsimGet year]
   set wetYield [expr ($yield * 100.0) / (100.0 - 12.0)] ;# 12% grain moisture
   if {[info exists annual($year,[crop],harvest)]} {
     set annual($year,[crop],harvest) [expr $annual($year,[crop],harvest) + $wetYield * $config($paddock,area)]
   } else {
     set annual($year,[crop],harvest)  [expr $wetYield * $config($paddock,area)]
   }
   global harvest iat
   lappend harvest [list [apsimGet dd/mm/yyyy] $config(season) $paddock [crop] \
      [format %.0f $biomass] [format %.0f [expr 1000.0 * $yield]] [format %.1f $grainProtein]]
   lappend harvest [list [apsimGet dd/mm/yyyy] $config(season) $paddock [crop]_residue \
      [format %.0f $biomass] [format %.0f $stover] [format %.1f $stoverProtein]]
   lappend iat [list [apsimGet dd/mm/yyyy],[crop],\
[format %.0f $biomass],[format %.0f [expr 1000.0 * $yield]],[format %.1f $grainProtein],\
[format %.0f $stover],[format %.1f $stoverProtein]]
}

proc canHarvest_[cropname] {paddock} {
  return [expr [string equal [apsimGet $paddock.[crop].StageName] "harvest_ripe"] || \
               [string equal [apsimGet $paddock.[crop].plant_status] "dead"]]
}
```
      rule Harvest Groundnut
        #
        cropname = Groundnut  # Enter friendly name of crop
        crop = peanut  # Enter apsim name of crop to harvest when ripe
        cost = 0  # Cost of Harvesting ($/ha)
        removed = 0  # %age of residues removed (0-100)
        grazed = 0  # %age of residues grazed in situ (0-100)
        stored = 100  # %age of residues stored for feed (0-100)
        left = 0  # %age of residues left for fertility (0-100)
        # Labour
        operator = male  # The operator
        on init:
```
if {[expr [removed]+[grazed]+[stored]+[left]] != 100} {error "[crop] harvest residue fractions dont add to 100%"}

proc harvest_[cropname] {paddock} {
   global config daysSinceLastHarvest
   set somWtOld [apsimGet "$paddock.SurfaceOrganicMatter.surfaceom_wt"]

   operateLabour "operator [operator]" "activity harvesting"\
                   "area $config($paddock,area)" \
                   "paddock $paddock" "costtype incrop_cost"

   set yield [expr [apsimGet $paddock.[crop].yield]/1000.0]  ;# tonnes/ha
   set biomass [apsimGet $paddock.[crop].biomass]
   if {"[crop]" == "sorghum" } {
     set grainWt [apsimGet $paddock.[crop].graingreenWt]
     if {$grainWt > 0} {
       set grainN [apsimGet $paddock.[crop].graingreenN]
       set grainProtein [expr $grainN / $grainWt * 100.0 * 5.71] ;# (%)
     } else {
       set grainProtein 0.0
     }
     set stover [expr ([apsimGet $paddock.[crop].LeafGreenWt] + \
                       [apsimGet $paddock.[crop].LeafSenescedWt] + \
                       [apsimGet $paddock.[crop].StemGreenWt] ) ]
     if {$stover > 0.0} {
       set stoverProtein [expr ([apsimGet $paddock.[crop].LeafGreenN] + \
                                [apsimGet $paddock.[crop].LeafSenescedN] + \
                                [apsimGet $paddock.[crop].StemGreenN]) / \
                               $stover * 100.0 * 5.71]
     } else {
       set stoverProtein 0.0
     }
     set stover [expr 10 * $stover]
   } else {
     set grainWt [apsimGet $paddock.[crop].grainWt]
     if {$grainWt > 0} {
       set grainProtein [expr [apsimGet $paddock.[crop].grainN] / \
                            $grainWt * 100.0 * 5.71] ;# (%)
       set stover [expr ($biomass - 1000* $yield) ]
       set stoverProtein [expr [apsimGet $paddock.[crop].vegetativeN] / \
                             [apsimGet $paddock.[crop].vegetativeWt]* 100.0 * 5.71]
     } else {
       set stover 0.0
       set stoverProtein 0.0
       set grainProtein 0.0
     }
   }

   apsimSendMessage economics expenditure \
                   "cost [expr [cost] * $config($paddock,area)]" \
                   "area $config($paddock,area)" \
                   "paddock $paddock" "costtype incrop_cost" {comment "harvesting costs"}

   apsimSendMessage economics income {category cropprice} "name [crop]"  \
                          "yield $yield" \
                          "area $config($paddock,area)" "paddock $paddock" "crop [crop]" \
                          "SW_state [apsimGet $config($paddock,watBal).esw]" \
                          "NO3_state [apsimGet $config($paddock,nModule).no3()]"

   apsimSendMessage $paddock.[crop]  harvest  "remove 0.0"
   apsimSendMessage $paddock.[crop]  end_crop

   set somWtNew [apsimGet "$paddock.SurfaceOrganicMatter.surfaceom_wt"]
   set somAdded [expr $somWtNew - $somWtOld]

   set daysSinceLastHarvest($paddock) 0

   set grazedFrac 0.0
   if {[grazed] > 0} {
      set grazedFrac [expr [grazed] / 100.0]
   }
   set storedFrac 0.0
   if {[stored] > 0} {
      set storedFrac [expr [stored] / 100.0]
      apsimSet [cropname]_residue_store.store [expr [apsimGet [cropname]_residue_store.store] + $storedFrac * $stover * $config($paddock,area)]
   }
   set removedFrac [expr ($storedFrac + [removed]) / 100.0]
   if {$removedFrac > 0} {
      apsimWriteToSummaryFile "Residues: removing [expr $removedFrac] of surface residues in paddock $paddock"
      apsimSendMessage "$paddock.SurfaceOrganicMatter" tillage {type user_defined} "f_incorp $removedFrac" {tillage_depth 0.0}
   }

   global annual
   set year [apsimGet year]
   set wetYield [expr ($yield * 100.0) / (100.0 - 12.0)] ;# 12% grain moisture
   if {[info exists annual($year,[crop],harvest)]} {
     set annual($year,[crop],harvest) [expr $annual($year,[crop],harvest) + $wetYield * $config($paddock,area)]
   } else {
     set annual($year,[crop],harvest)  [expr $wetYield * $config($paddock,area)]
   }
   global harvest iat
   lappend harvest [list [apsimGet dd/mm/yyyy] $config(season) $paddock [crop] \
      [format %.0f $biomass] [format %.0f [expr 1000.0 * $yield]] [format %.1f $grainProtein]]
   lappend harvest [list [apsimGet dd/mm/yyyy] $config(season) $paddock [crop]_residue \
      [format %.0f $biomass] [format %.0f $stover] [format %.1f $stoverProtein]]
   lappend iat [list [apsimGet dd/mm/yyyy],[crop],\
[format %.0f $biomass],[format %.0f [expr 1000.0 * $yield]],[format %.1f $grainProtein],\
[format %.0f $stover],[format %.1f $stoverProtein]]
}

proc canHarvest_[cropname] {paddock} {
  return [expr [string equal [apsimGet $paddock.[crop].StageName] "harvest_ripe"] || \
               [string equal [apsimGet $paddock.[crop].plant_status] "dead"]]
}
```
      rule Harvest Sorghum
        #
        cropname = Sorghum  # Enter friendly name of crop
        crop = sorghum  # Enter apsim name of crop to harvest when ripe
        cost = 0  # Cost of Harvesting ($/ha)
        removed = 0  # %age of residues removed (0-100)
        grazed = 0  # %age of residues grazed in situ (0-100)
        stored = 0  # %age of residues stored for feed (0-100)
        left = 100  # %age of residues left for fertility (0-100)
        # Labour
        operator = male  # The operator
        on init:
```
if {[expr [removed]+[grazed]+[stored]+[left]] != 100} {error "[crop] harvest residue fractions dont add to 100%"}

proc harvest_[cropname] {paddock} {
   global config daysSinceLastHarvest
   set somWtOld [apsimGet "$paddock.SurfaceOrganicMatter.surfaceom_wt"]

   operateLabour "operator [operator]" "activity harvesting"\
                   "area $config($paddock,area)" \
                   "paddock $paddock" "costtype incrop_cost"

   set yield [expr [apsimGet $paddock.[crop].yield]/1000.0]
   set biomass [apsimGet $paddock.[crop].biomass]
   if {"[crop]" == "sorghum"} {
     set grainWt [apsimGet $paddock.[crop].graingreenWt]
     if {$grainWt > 0} {
       set grainN [apsimGet $paddock.[crop].graingreenN]
       set grainProtein [expr $grainN / $grainWt * 100.0 * 5.71] ;# (%)
     } else {
       set grainProtein 0.0
     }
     set stover [expr ([apsimGet $paddock.[crop].LeafGreenWt] + \
                       [apsimGet $paddock.[crop].LeafSenescedWt] + \
                       [apsimGet $paddock.[crop].StemGreenWt] ) ]
     if {$stover > 0.0} {
       set stoverProtein [expr ([apsimGet $paddock.[crop].LeafGreenN] + \
                                [apsimGet $paddock.[crop].LeafSenescedN] + \
                                [apsimGet $paddock.[crop].StemGreenN]) / \
                               $stover * 100.0 * 5.71]
     } else {
       set stoverProtein 0.0
     }
     set stover [expr 10 * $stover]
   } elseif {"[crop]" == "maize"} {
     set grainProtein [apsimGet $paddock.[crop].grain_protein]        ;# (%)
     set stover [apsimGet $paddock.[crop].stover]
     set stoverProtein [expr [apsimGet $paddock.[crop].stover_n] / \
                             [apsimGet $paddock.[crop].stover_wt] * 100.0 * 5.71] ;# (%)
   } else {
     set grainWt [apsimGet $paddock.[crop].grainWt]
     if {$grainWt > 0} {
       set grainProtein [expr [apsimGet $paddock.[crop].grainN] / \
                            $grainWt * 100.0 * 5.71] ;# (%)
     } else {
       set grainProtein 0.0
     }
     set stover [expr ($biomass - $yield) ]
     set stoverProtein [expr [apsimGet $paddock.[crop].vegetativeN] / \
                             [apsimGet $paddock.[crop].vegetativeWt]* 100.0 * 5.71]
   }

   apsimSendMessage economics expenditure \
                   "cost [expr [cost] * $config($paddock,area)]" \
                   "area $config($paddock,area)" \
                   "paddock $paddock" "costtype incrop_cost" {comment "harvesting costs"}

   apsimSendMessage economics income {category cropprice} "name [crop]"  \
                          "yield $yield" \
                          "area $config($paddock,area)" "paddock $paddock" "crop [crop]" \
                          "SW_state [apsimGet $config($paddock,watBal).esw]" \
                          "NO3_state [apsimGet $config($paddock,nModule).no3()]"

   apsimSendMessage $paddock.[crop]  harvest  "remove 0.0"
   apsimSendMessage $paddock.[crop]  end_crop

   set somWtNew [apsimGet "$paddock.SurfaceOrganicMatter.surfaceom_wt"]
   set somAdded [expr $somWtNew - $somWtOld]

   set daysSinceLastHarvest($paddock) 0

   set grazedFrac 0.0
   if {[grazed] > 0} {
      set grazedFrac [expr [grazed] / 100.0]
   }
   set storedFrac 0.0
   if {[stored] > 0} {
      set storedFrac [expr [stored] / 100.0]
      apsimSet [cropname]_residue_store.store [expr [apsimGet [cropname]_residue_store.store] + $storedFrac * $stover * $config($paddock,area)]
   }
   set removedFrac [expr ($storedFrac + [removed]) / 100.0]
   if {$removedFrac > 0} {
      apsimWriteToSummaryFile "Residues: removing [expr $removedFrac] of surface residues in paddock $paddock"
      apsimSendMessage "$paddock.SurfaceOrganicMatter" tillage {type user_defined} "f_incorp $removedFrac" {tillage_depth 0.0}
   }

   global annual
   set year [apsimGet year]
   set wetYield [expr ($yield * 100.0) / (100.0 - 12.0)] ;# 12% grain moisture
   if {[info exists annual($year,[crop],harvest)]} {
     set annual($year,[crop],harvest) [expr $annual($year,[crop],harvest) + $wetYield * $config($paddock,area)]
   } else {
     set annual($year,[crop],harvest)  [expr $wetYield * $config($paddock,area)]
   }
   global harvest iat
   lappend harvest [list [apsimGet dd/mm/yyyy] $config(season) $paddock [crop] \
      [format %.0f $biomass] [format %.0f [expr 1000.0 * $yield]] [format %.1f $grainProtein]]
   lappend harvest [list [apsimGet dd/mm/yyyy] $config(season) $paddock [crop]_residue \
      [format %.0f $biomass] [format %.0f $stover] [format %.1f $stoverProtein]]
   lappend iat [list [apsimGet dd/mm/yyyy],[crop],\
[format %.0f $biomass],[format %.0f [expr 1000.0 * $yield]],[format %.1f $grainProtein],\
[format %.0f $stover],[format %.1f $stoverProtein]]
}

proc canHarvest_[cropname] {paddock} {
  return [expr [string equal [apsimGet $paddock.[crop].StageName] "harvest_ripe"] || \
               [string equal [apsimGet $paddock.[crop].plant_status] "dead"]]
}
```
      rule Harvest Mucuna
        #
        cropname = Mucuna  # Enter friendly name of crop
        crop = mucuna  # Enter apsim name of crop to harvest when ripe
        cost = 0  # Cost of Harvesting ($/ha)
        removed = 0  # %age of residues removed (0-100)
        grazed = 0  # %age of residues grazed in situ (0-100)
        stored = 100  # %age of residues stored for feed (0-100)
        left = 0  # %age of residues left for fertility (0-100)
        # Labour
        operator = male  # The operator
        on init:
```
if {[expr [removed]+[grazed]+[stored]+[left]] != 100} {error "[crop] harvest residue fractions dont add to 100%"}

proc harvest_[cropname] {paddock} {
   global config daysSinceLastHarvest
   set somWtOld [apsimGet "$paddock.SurfaceOrganicMatter.surfaceom_wt"]

   operateLabour "operator [operator]" "activity harvesting"\
                   "area $config($paddock,area)" \
                   "paddock $paddock" "costtype incrop_cost"

   set yield [expr [apsimGet $paddock.[crop].yield]/1000.0]  ;# tonnes/ha
   set biomass [apsimGet $paddock.[crop].biomass]
   if {"[crop]" == "sorghum"} {
     set grainWt [apsimGet $paddock.[crop].graingreenWt]
     if {$grainWt > 0} {
       set grainN [apsimGet $paddock.[crop].graingreenN]
       set grainProtein [expr $grainN / $grainWt * 100.0 * 5.71] ;# (%)
     } else {
       set grainProtein 0.0
     }
     set stover [expr ([apsimGet $paddock.[crop].LeafGreenWt] + \
                       [apsimGet $paddock.[crop].LeafSenescedWt] + \
                       [apsimGet $paddock.[crop].StemGreenWt] ) ]
     if {$stover > 0.0} {
       set stoverProtein [expr ([apsimGet $paddock.[crop].LeafGreenN] + \
                                [apsimGet $paddock.[crop].LeafSenescedN] + \
                                [apsimGet $paddock.[crop].StemGreenN]) / \
                               $stover * 100.0 * 5.71]
     } else {
       set stoverProtein 0.0
     }
     set stover [expr 10 * $stover]
   } elseif {"[crop]" == "maize"} {
     set grainProtein [apsimGet $paddock.[crop].grain_protein]        ;# (%)
     set stover [apsimGet $paddock.[crop].stover]
     set stoverProtein [expr [apsimGet $paddock.[crop].stover_n] / \
                             [apsimGet $paddock.[crop].stover_wt] * 100.0 * 5.71] ;# (%)
   } else {
     set grainWt [apsimGet $paddock.[crop].grainWt]
     if {$grainWt > 0} {
       set grainProtein [expr [apsimGet $paddock.[crop].grainN] / \
                            $grainWt * 100.0 * 5.71] ;# (%)
     } else {
       set grainProtein 0.0
     }
     set stover [expr ($biomass - 1000 * $yield) ]
     if {[apsimGet $paddock.[crop].vegetativeWt] > 0 } {
       set stoverProtein [expr [apsimGet $paddock.[crop].vegetativeN] / \
                               [apsimGet $paddock.[crop].vegetativeWt]* 100.0 * 5.71]
     } else {
       set stoverProtein 0.0
     }
   }

   apsimSendMessage economics expenditure \
                   "cost [expr [cost] * $config($paddock,area)]" \
                   "area $config($paddock,area)" \
                   "paddock $paddock" "costtype incrop_cost" {comment "harvesting costs"}

   apsimSendMessage economics income {category cropprice} "name [crop]"  \
                          "yield $yield" \
                          "area $config($paddock,area)" "paddock $paddock" "crop [crop]" \
                          "SW_state [apsimGet $config($paddock,watBal).esw]" \
                          "NO3_state [apsimGet $config($paddock,nModule).no3()]"

   apsimSendMessage $paddock.[crop]  harvest  "remove 0.0"
   apsimSendMessage $paddock.[crop]  end_crop

   set somWtNew [apsimGet "$paddock.SurfaceOrganicMatter.surfaceom_wt"]
   set somAdded [expr $somWtNew - $somWtOld]

   set daysSinceLastHarvest($paddock) 0

   set grazedFrac 0.0
   if {[grazed] > 0} {
      set grazedFrac [expr [grazed] / 100.0]
   }
   set storedFrac 0.0
   if {[stored] > 0} {
      set storedFrac [expr [stored] / 100.0]
      apsimSet [cropname]_residue_store.store [expr [apsimGet [cropname]_residue_store.store] + $storedFrac * $stover * $config($paddock,area)]
   }
   set removedFrac [expr ($storedFrac + [removed]) / 100.0]
   if {$removedFrac > 0} {
      apsimWriteToSummaryFile "Residues: removing [expr $removedFrac] of surface residues in paddock $paddock"
      apsimSendMessage "$paddock.SurfaceOrganicMatter" tillage {type user_defined} "f_incorp $removedFrac" {tillage_depth 0.0}
   }

   global annual
   set year [apsimGet year]
   set wetYield [expr ($yield * 100.0) / (100.0 - 12.0)] ;# 12% grain moisture
   if {[info exists annual($year,[crop],harvest)]} {
     set annual($year,[crop],harvest) [expr $annual($year,[crop],harvest) + $wetYield * $config($paddock,area)]
   } else {
     set annual($year,[crop],harvest)  [expr $wetYield * $config($paddock,area)]
   }
   global harvest iat
   lappend harvest [list [apsimGet dd/mm/yyyy] $config(season) $paddock [crop] \
      [format %.0f $biomass] [format %.0f [expr 1000.0 * $yield]] [format %.1f $grainProtein]]
   lappend harvest [list [apsimGet dd/mm/yyyy] $config(season) $paddock [crop]_residue \
      [format %.0f $biomass] [format %.0f $stover] [format %.1f $stoverProtein]]
   lappend iat [list [apsimGet dd/mm/yyyy],[crop],\
[format %.0f $biomass],[format %.0f [expr 1000.0 * $yield]],[format %.1f $grainProtein],\
[format %.0f $stover],[format %.1f $stoverProtein]]
}

proc canHarvest_[cropname] {paddock} {
  return [expr [string equal [apsimGet $paddock.[crop].StageName] "harvest_ripe"] || \
               [string equal [apsimGet $paddock.[crop].plant_status] "dead"]]
}
```
      rule Weeds
        max_germinations = 0  # Maximum weed germinations / year
        daysToGerm = 20  # Days from tillage to germination
        weedDensity = 20  # Seedling density (plants/m2)
        on init:
```
proc checkWeeds {} {
   global daysSinceLastTillage weeds config
   set rainCrit [apsimGet rain\[4\]]

   foreach paddock $config(paddocks) {
      incr daysSinceLastTillage($paddock)
      set weeds($paddock,status) [apsimGet $paddock.weed.plant_status]
      if {$daysSinceLastTillage($paddock) > [daysToGerm] &&
          $weeds($paddock,status) == "out" &&
          $rainCrit >= 25 &&
          $weeds($paddock,Events) < [max_germinations]} {
           apsimWriteToSummaryFile "Weeds germinating in $paddock"
           apsimSendMessage $paddock.weed sow {crop_class summer_grass} {plants [weedDensity]} {sowing_depth 75} {cultivar early} {row_spacing 750}
           incr weeds($paddock,Events)
      } elseif {$weeds($paddock,status) == "dead" || [apsimGet $paddock.weed.StageName] == "harvest_ripe"} {
           killWeeds $paddock
      }
   }
}

proc killWeeds {paddock} {
   global weeds daysSinceLastTillage annual
   apsimWriteToSummaryFile "Killing weeds in $paddock"
   if {$weeds($paddock,status) != "out"} {
     apsimSendMessage $paddock.weed end_crop
   }
   set weeds($paddock,status) "out"
   set annual($paddock,weedings) [expr $annual($paddock,weedings) + 1.0]
   set daysSinceLastTillage($paddock) 0
}
```
        on start_simulation:
```
foreach paddock $config(paddocks) {
   set weeds($paddock,GermDay) {}
   set weeds($paddock,Events)  0
   set daysSinceLastTillage($paddock)    0
}
```
        on prepare:
```
checkWeeds
```
        on end_year:
```
foreach paddock $config(paddocks) {
   set weeds($paddock,Events)  0
}
```
      rule Fallow Tillage
        # Labour
        operator = male  # The operator
        activity = weeding  # The operator activity
        # Crop
        dah = 40  # Days after harvest
        # Tillage
        tillage_type = user_defined
        tillage_depth = 100  # User_defined depth of seedbed preparation (mm)
        tillage_f_incorp = 0.9  # User_defined fraction of surface residues to incorporate (0-1)
        on init:
```
proc doFallowTillage[dah] {paddock} {
   global config daysSinceLastTillage

   killWeeds $paddock
   if {[string equal "[tillage_type]" "user_defined"]} {
       apsimSendMessage "$paddock.SurfaceOrganicMatter" tillage {type [tillage_type]} {f_incorp [tillage_f_incorp]} {tillage_depth [tillage_depth]}
   } else {
       apsimSendMessage "$paddock.SurfaceOrganicMatter" tillage {type [tillage_type]}
   }
   set daysSinceLastTillage($paddock) 0
}

proc doTillageSometime {paddock operator activity routine} {
   global config
   operateLabour "operator $operator" "activity $activity" \
                 "area $config($paddock,area)" "callback [list $routine $paddock]" \
                 "paddock $paddock" "costtype incrop_cost" {comment "Fallow tillage"}

}

proc doTillageNow {paddock routine} {
   $routine $paddock
}
```
        on prepare:
```
foreach paddock $config(paddocks) {
   if {$daysSinceLastHarvest($paddock) == [dah]} {
      doTillageSometime $paddock [operator] [activity] doFallowTillage[dah]
   }
}
```
      rule Incrop Tillage 1
        # Labour
        operator = male  # The operator
        activity = weeding  # The operator activity
        # Crop
        crop = maize  # Which crop is tilled
        das = 21  # Days after sowing
        # Tillage
        tillage_type = user_defined
        tillage_depth = 100  # User_defined depth of seedbed preparation (mm)
        tillage_f_incorp = 0.9  # User_defined fraction of surface residues to incorporate (0-1)
        on init:
```
proc doIncropTillage[das] {paddock} {
   global config daysSinceLastTillage

   killWeeds $paddock
   if {[string equal "[tillage_type]" "user_defined"]} {
       apsimSendMessage "$paddock.SurfaceOrganicMatter" tillage {type [tillage_type]} {f_incorp [tillage_f_incorp]} {tillage_depth [tillage_depth]}
   } else {
       apsimSendMessage "$paddock.SurfaceOrganicMatter" tillage {type [tillage_type]}
   }
   set daysSinceLastTillage($paddock) 0
}
```
        on post:
```
foreach paddock $config(paddocks) {
   if {[apsimGetOptional $paddock.[crop].DaysAfterSowing] == [das]} {
      doTillageSometime $paddock [operator] [activity] doIncropTillage[das]
   }
}
```
      rule Incrop Tillage 2
        # Labour
        operator = male  # The operator
        activity = weeding  # The operator activity
        # Crop
        crop = maize  # Which crop is tilled
        das = 45  # Days after sowing
        # Tillage
        tillage_type = user_defined
        tillage_depth = 100  # User_defined depth of seedbed preparation (mm)
        tillage_f_incorp = 0.9  # User_defined fraction of surface residues to incorporate (0-1)
        on init:
        script: same as in LivsimSample.Crop Management.Incrop Tillage 1
        on post:
        script: same as in LivsimSample.Crop Management.Incrop Tillage 1
      rule Presow Tillage
        # Labour
        operator = male  # The operator
        activity = presow_till  # The operator activity
        # Tillage
        tillage_type = user_defined
        tillage_depth = 100  # User_defined depth of seedbed preparation (mm)
        tillage_f_incorp = 0.9  # User_defined fraction of surface residues to incorporate (0-1)
        on init:
```
proc doPresowTillage {paddock} {
   global config daysSinceLastTillage

   killWeeds $paddock
   if {[string equal "[tillage_type]" "user_defined"]} {
       apsimSendMessage "$paddock.SurfaceOrganicMatter" tillage {type [tillage_type]} {f_incorp [tillage_f_incorp]} {tillage_depth [tillage_depth]}
   } else {
       apsimSendMessage "$paddock.SurfaceOrganicMatter" tillage {type [tillage_type]}
   }

   operateLabour "operator [operator]" "activity [activity]"\
                   "area $config($paddock,area)" \
                   "paddock $paddock" "costtype incrop_cost" {comment "Pre sowing tillage"}
   set daysSinceLastTillage($paddock) 0
}
```
      rule Sowing Tillage
        # Labour
        operator = male  # The operator
        activity = sowing  # The operator activity
        # Tillage
        tillage_type = user_defined
        tillage_depth = 100  # User_defined depth of seedbed preparation (mm)
        tillage_f_incorp = 0.1  # User_defined fraction of surface residues to incorporate (0-1)
        on init:
```
proc doSowingTillage {paddock} {
   global config daysSinceLastTillage

   killWeeds $paddock
   if {[string equal "[tillage_type]" "user_defined"]} {
       apsimSendMessage "$paddock.SurfaceOrganicMatter" tillage {type [tillage_type]} {f_incorp [tillage_f_incorp]} {tillage_depth [tillage_depth]}
   } else {
       apsimSendMessage "$paddock.SurfaceOrganicMatter" tillage {type [tillage_type]}
   }

   operateLabour "operator [operator]" "activity [activity]"\
                   "area $config($paddock,area)" \
                   "paddock $paddock" "costtype incrop_cost" {comment "Sowing tillage"}
   set daysSinceLastTillage($paddock) 0
}
```
      rule Farm logic
        # No editable parameters
        on init:
```
# Return area (ha) planted to a crop
proc areaOf {crop} {
   global config
   if {[info exists config($crop,alias)]} {set crop $config($crop,alias)}
   set sum 0.0
   foreach paddock $config(cropPaddocks) {
      set state [currentState $paddock]
      if {[info exists config($state,alias)]} {set state $config($state,alias)}
      if {"$state" == "$crop"} {
        set sum [expr $sum + $config($paddock,area)]
      }
   }
   return $sum
}

proc areaPlantedOk {crop} {
   global config
   if {[info exists config($crop,alias)]} {set crop $config($crop,alias)}
   set f [expr [areaOf $crop] / $config(allCropArea)]

   return [expr $f < $config(maxFract,$crop)]
}

proc historyOk {paddock crop} {
   global config
   if {[info exists config($crop,alias)]} {set crop $config($crop,alias)}
   set max $config(maxContinuous,$crop)
   set n [llength $config($paddock,history)]
   for {set i $n} {$i >= $n - $max} {decr i} {
      if {[lindex $config($paddock,history)] != $crop} {return 1}
   }
   return 0
}



########### Support procedures

proc max {a b} { return [expr {($a > $b) ? $a : $b}] }
proc min {a b} { return [expr {($a > $b) ? $b : $a}] }

# Return the current state of the system
proc currentState {paddock} {
   global state
   return $state($paddock)
}

# Gather arguments (eg sowing depth, fert rate etc} from defaults array
# $action: the operation (sow, fert ...
# $what: the module (wheat, sorghum ...
proc gatherArgs {action what} {
   global defaults config

   # 1. "sow,..."
   foreach {index value} [array get defaults $action,*] {
      set args([lindex [split $index ","] end]) $value
   }
   # 2. override above with any "wheat,sow,..."
   foreach {index value} [array get defaults $what,$action,*] {
      set args([lindex [split $index ","] end]) $value
   }
   # 3. override above with any "SpringWheat,sow,..."
   if {[info exists config($what,alias)]} {
      foreach {index value} [array get defaults $config($what,alias),$action,*] {
         set args([lindex [split $index ","] end]) $value
      }
   }
   return [array get args]
}

# Mash a list into name/value pairs to pass via the apsim message system
proc mash {list} {
   set result {}
   foreach {name value} $list {lappend result [list $name $value]}
   return $result
}

# Sum a list
proc lsum {list} {
   set result 0.0
   foreach value $list {set result [expr $result + $value]}
   return $result
}

# Linear interpolation
proc linint {x_coords y_coords value} {
   set y  0.0

   if {[llength $x_coords] <= 0 || [llength $y_coords] <= 0 || [llength $x_coords] != [llength $y_coords]} {
      error "bad coordinates in linear_interp_real"
   }

   for {set indx 0} {$indx < [llength $x_coords]} {incr indx} {
      if {$value <= [lindex $x_coords $indx]} {
         if {$indx == 0} {
            set y [lindex $y_coords $indx]
         } else {
            if {abs($value - [lindex $x_coords $indx]) < 1.0E-4} {
               set y [lindex $y_coords $indx]
            } else  {
               set y_part [expr [lindex $y_coords $indx] - [lindex $y_coords [expr $indx-1]] ]
               set x_part [expr [lindex $x_coords $indx] - [lindex $x_coords [expr $indx-1]] ]
               set y [expr ($y_part/$x_part) * ($value - [lindex $x_coords [expr $indx - 1]]) + [lindex $y_coords [expr $indx- 1]] ]
            }
         break;
         }
      } elseif {$indx == [lindex $x_coords $indx]-1} {
         set y  [lindex $y_coords $indx]
      } else {
         set y  0.0
      }
   }
   return $y
}

#############################
############### The decision routine(s).
#############################
# Return the score for planting "what"
proc checkRules {thisPaddock} {
  global config

  uplevel #0 set paddock \"$thisPaddock\"
  set bestScore -1.0; set bestTarget {}; set bestArc {}; set bestGraph {}
  foreach graph $config($thisPaddock,graphNames) {
     foreach arc [$graph arcs -out [currentState $thisPaddock]] {
        set expr {}
        set target [$graph arc target $arc]
        foreach rule [$graph arc get $arc rules] {
           set value [uplevel #0 expr $rule]
           lappend expr $value
           if {$value == 0} {break} ;# no need to continue evaluating subsequent rules
        }
        if {[llength $expr] > 0} {
           set score [expr [join $expr "*"]]
           if {$score > $bestScore} {
              set bestScore  $score
              set bestTarget $target
              set bestArc    $arc
              set bestGraph  $graph
           }
        }
     }
  }
  return [list  $bestScore $bestGraph $bestTarget $bestArc]
}

# A place holder function to monitor state transitions
proc logState {graph paddock state} {
  ###puts "$graph $paddock $state"
}

# Change state to another
proc changeState {paddock graph arc} {
   global state
   uplevel #0 set paddock \"$paddock\"
   puts "$graph - Changing state in paddock $paddock from $state($paddock) to [$graph arc target $arc]"
   if {[$graph arc keyexists $arc actions]} {
      foreach action [$graph arc get $arc actions] {
         puts "      - undertaking action $action"
         uplevel #0 $action
      }
   }
   set state($paddock) [$graph arc target $arc]
   logState $graph $paddock $state($paddock)
}

# Do daily process at top level
proc doProcess {} {
   global date config daysSinceLastHarvest

   set date "[apsimGet day],[apsimGet year]"

   set more 1
   while {$more} {
      set more 0
      # 1. Find out what's possible
      set bestPaddock {}; set bestScore -1.0
      foreach paddock $config(paddocks) {
         foreach {score graph target arc} [checkRules $paddock] {break}
         if {$score > $bestScore} {
            set bestPaddock $paddock; set bestScore $score; set bestGraph $graph; set bestTarget $target; set bestArc $arc
         }
      }
      if {$bestScore > 0.0} {
         changeState $bestPaddock $bestGraph $bestArc
         set more 1
      }
   }

   foreach paddock $config(paddocks) {
      incr daysSinceLastHarvest($paddock)
   }
}

# pass events to various output files
proc reportEvent {from what} {
   foreach {event args} [split $what "-"] {break}
}

puts "Done farm"
```
        on process:
```
# Housekeeping
if {[catch {doProcess } msg]} {
   puts "$errorInfo"
   error "$msg\n$errorInfo"
}
```
        on start_simulation:
```
foreach paddock $config(paddocks) {
  set state($paddock)         $config($paddock,initialState) ;# Should get this from xml
  set history($paddock)       $config($paddock,history)
  set daysSinceLastHarvest($paddock) 60
}

# All our soils are called "Soil.."
foreach paddock $config(paddocks) {
   set config($paddock,watBal)   "$paddock.Soil Water"
   set config($paddock,nModule)  "$paddock.Soil Nitrogen"
}

set config(states) {}
```
      rule Crop Management
        # Crop Sequence
        sequences = plot1 Maize plot2 Groundnut plot3 Mucuna
        lr_start = 15-mar  # Start of LR season
        lr_end = 14-sep  # end of LR season
        sr_start = 15-sep  # Start of SR season
        sr_end = 14-mar  # end of SR season
        do_reset = no  # Reset SW at start of LR
        on init:
```
package require struct
foreach {paddock sequence} {[sequences]} {
   ::struct::graph ${paddock}graph
   set states [split $sequence "."]
   for {set istate 0} {$istate < [llength $states]} {incr istate} { ${paddock}graph node insert "F$istate" }
   for {set istate 0} {$istate < [llength $states]} {incr istate} {
     set myState [lindex $states $istate].$istate
     ${paddock}graph node insert $myState
     ${paddock}graph arc insert F$istate $myState "arc$istate"
     if {[lindex $states $istate] == "SR_X" } {
       ${paddock}graph arc lappend "arc$istate" rules "\[dateIs [sr_end]\]"
     } elseif {[lindex $states $istate] == "LR_X"} {
       ${paddock}graph arc lappend "arc$istate" rules "\[dateIs [lr_end]\]"
     } else {
       ${paddock}graph arc lappend "arc$istate" actions "sow_[lindex $states $istate] $paddock"
       ${paddock}graph arc lappend "arc$istate" rules "\[canSow_[lindex $states $istate] $paddock \]"
       ${paddock}graph arc lappend "arc$istate" rules "\$daysAfterHarvest(\$paddock) > 1"
     }
     if {$istate == [llength $states] - 1} {
        ${paddock}graph arc insert $myState F0 "arc${istate}Out"
     } else {
        ${paddock}graph arc insert $myState F[expr $istate+1] "arc${istate}Out"
     }
     if {[lindex $states $istate] == "LR_X" || [lindex $states $istate] == "SR_X"} {
       ${paddock}graph arc lappend "arc${istate}Out" rules "1"
     } else {
       ${paddock}graph arc lappend "arc${istate}Out" actions "harvest_[lindex $states $istate] $paddock"
       ${paddock}graph arc lappend "arc${istate}Out" actions "set daysAfterHarvest(\$paddock) 0"
       ${paddock}graph arc lappend "arc${istate}Out" rules "\[canHarvest_[lindex $states $istate] $paddock \]"
     }
   }
   puts "Paddock $paddock cropping sequence:"
   foreach node [${paddock}graph nodes] {
     puts " Node $node"
     foreach key [${paddock}graph node keys $node *] {
       puts " $key: [${paddock}graph node get $node $key]"
     }
     foreach arc [${paddock}graph arcs -out $node] {
       foreach key [${paddock}graph arc keys $arc *] {
          puts " $arc:$key [${paddock}graph arc get $arc $key]"
       }
     }
   }
}

foreach paddock $config(paddocks) {set daysAfterHarvest($paddock) 30}
```
        on prepare:
```
if {[dateIs [lr_start]]} {
   if {"[do_reset]" == "yes"} {
      foreach paddock $config(paddocks) {
         apsimSendMessage $config($paddock,watBal) reset
         apsimSendMessage $config($paddock,nModule) reset
      }
   }
   apsimSendMessage "" lr_start
}
if {[dateIs [lr_end]]} {
  apsimSendMessage "" lr_end
}
```
        on post:
```
foreach paddock $config(paddocks) {incr daysAfterHarvest($paddock)}
```
      rule Annual Reports
        # No editable paramters
        on init:
```
# Utilities
proc lsum {list} {return [expr  [join $list "+"]]}
proc lavg {list} {
  if {[llength $list] > 0} {
    return [expr [lsum $list] / [llength $list]]
  }
  return 0.0
}

# Annual summary of whole farm averages

proc open_annual_stuff {} {
   global annual annualcrop config
   set year [expr [apsimGet year] - 1 ]
   set annual(years) $year
   set annual(accRain) 0.0
   set annual($year,balance) [apsimGetOptional balance]
   set annual($year,income) [apsimGetOptional income]
   set annual($year,expenditure) [apsimGetOptional expenditure]
   foreach {accumulator} { dm_eaten} {
     set annual($year,$accumulator) 0
   }
   foreach {accumulator} {runoff drain soil_loss es weedings} {
     foreach paddock $config(paddocks) {
        set annual($paddock,$accumulator) 0.0
     }
   }
}

proc do_end_year {} {
   global config annual annualcrop

   set year [apsimGet year]

   foreach {accumulator} {runoff drain soil_loss es weedings} {
     foreach paddock $config(paddocks) {
        set annual($year,$paddock,$accumulator) $annual($paddock,$accumulator)
        set annual($paddock,$accumulator) 0.0
     }
   }
   foreach paddock $config(paddocks) {
     set annual($year,$paddock,avg_cover) [apsimGetOptional "$paddock.tracker.avg_cover"]
     if {$annual($year,$paddock,avg_cover) == ""} {set annual($year,$paddock,avg_cover) "*"}

     set annual($year,$paddock,avg_carbon) [apsimGetOptional "$paddock.tracker.avg_carbon"]
     if {$annual($year,$paddock,avg_carbon) == ""} {set annual($year,$paddock,avg_carbon) "*"}
   }
   set annual($year,accRain) $annual(accRain)
   set annual(accRain) 0.0
   set annual($year,balance) [apsimGetOptional balance]
   set annual($year,income) [apsimGetOptional income]
   set annual($year,expenditure) [apsimGetOptional expenditure]
   lappend annual(years) $year
}

proc close_annual_stuff {} {
   global simName config annual annualcrop
   puts "close_annual_stuff called"
   parray annual

   # Heading
   set fp [open $simName.annual.out w]
   puts $fp "Title = $simName"
   puts $fp ""
   puts -nonewline $fp "year "
   foreach {accumulator} {runoff drain soil_loss es avg_cover avg_carbon rain weedings dm_eaten} {
      puts -nonewline $fp " $accumulator"
   }
   foreach id [getLabourers] {
      puts -nonewline $fp " ${id}_labour"
   }
   foreach crop $config(crops) {
      puts -nonewline $fp " ${crop}_harvest"
   }
   puts $fp " income expenditure profit"

   puts -nonewline $fp "() "
   foreach {accumulator} {runoff drain soil_loss es rain } {
      puts -nonewline $fp " (mm)"
   }
   puts -nonewline $fp " ()  ()  () (kg)"
   foreach id [getLabourers] {
      puts -nonewline $fp " (hours)"
   }
   foreach crop $config(crops) {
      puts -nonewline $fp " (tonnes-wet)"
   }
   puts $fp " ($) ($) ($)"

   # Area weighted averages of environmental stuff
   set tfa 0.0
   foreach paddock $config(paddocks) {set tfa [expr $tfa + $config($paddock,area)]}
   if {$tfa <= 0.0} {close $fp; return}

   foreach year [lrange $annual(years) 1 end] {
      puts -nonewline $fp "$year "
      foreach {accumulator} {runoff drain soil_loss es} {
         set s 0.0
         foreach paddock $config(paddocks) {
            set s [expr $s + $annual($year,$paddock,$accumulator) * $config($paddock,area) / $tfa]
         }
         puts -nonewline $fp " [format %.2f $s]"
      }
      foreach {accumulator} {avg_cover avg_carbon} {
         set s 0.0
         foreach paddock $config(paddocks) {
            if {![string is double -strict $annual($year,$paddock,$accumulator)]} {
               set s " *"
               break
            } else {
               set s [expr $s + $annual($year,$paddock,$accumulator) * $config($paddock,area) / $tfa]
            }
         }
         if {[string is double -strict $s]} {
            puts -nonewline $fp " [format %.2f $s]"
         } else {
            puts -nonewline $fp " *"
         }
      }
      puts -nonewline $fp " [format %.2f $annual($year,accRain)]"
      set s 0.0
      foreach paddock $config(paddocks) {set s [expr $s + $annual($year,$paddock,weedings)] }
      puts -nonewline $fp " [format %.0f $s]"
      if {[info exists annual($year,dm_eaten)]} {
         puts -nonewline $fp " [lsum $annual($year,dm_eaten)]"
      } else {
         puts -nonewline $fp " 0"
      }
      foreach id [getLabourers] {
        if {[info exists annual($year,labourhours)]} {
          puts -nonewline $fp " $annual($year,$id,labourhours)"
        } else {
          puts -nonewline $fp " 0"
        }
      }
      foreach crop $config(crops) {
         if {[info exists annual($year,$crop,harvest)]} {
           puts -nonewline $fp " [format %.3f $annual($year,$crop,harvest)]"
         } else {
           puts -nonewline $fp " *"
         }
      }

      if {[info exists annual($year,income)] && [string is double -strict $annual($year,income)] } {
         puts -nonewline $fp " [format %.2f $annual($year,income)]"
      } else {
         puts -nonewline $fp " *"
      }
      if {[info exists annual($year,expenditure)] && [string is double -strict $annual($year,expenditure)]} {
         puts -nonewline $fp " [format %.2f $annual($year,expenditure)]"
      } else {
         puts -nonewline $fp " *"
      }
      # profit = change in bank balance each year
      catch {
         puts -nonewline $fp " [format %.2f [expr $annual($year,balance) - $annual([expr $year-1],balance)]]"
      }
      puts $fp ""
   }
   close $fp
}
```
        on start_simulation:
```
catch "file delete $simName.annual.out"

open_annual_stuff
```
        on end_simulation:
```
close_annual_stuff
```
        on post:
```
   set annual(accRain) [expr $annual(accRain) + [apsimGet rain]]
   foreach {accumulator} {runoff drain es } {
      foreach paddock $config(paddocks) {
         if {$paddock != "toplevel"} {
            set annual($paddock,$accumulator) [expr $annual($paddock,$accumulator) + [apsimGet $config($paddock,watBal).$accumulator]]
         }
      }
   }
   foreach {accumulator} {soil_loss} {
      foreach paddock $config(paddocks) {
         if {$paddock != "toplevel"} {
            set annual($paddock,$accumulator) [expr $annual($paddock,$accumulator) + [apsimGet $paddock.erosion.$accumulator]]
         }
      }
   }
```
        on end_year:
```
do_end_year
```
        on end_month:
```
set cow [apsimGetOptional inputdmOfCows]; if {$cow == ""} {set cow 0}
set shoat [apsimGetOptional inputdmOfShoats]; if {$shoat == ""} {set shoat 0}

set year [apsimGet year]
lappend annual($year,dm_eaten) [expr $cow + $shoat]
```
      rule Harvest Reports
        # No editable paramters
        on init:
```
# Annual summary of whole farm averages

proc open_harvest_stuff {} {
   global harvest config
   set harvest {}
}


proc close_harvest_stuff {} {
   global simName config harvest
   puts "close_harvest_stuff called"

   # Heading
   set fp [open $simName.harvest.out w]
   puts $fp "Title = $simName"
   puts $fp ""
   puts $fp "Date         season paddock crop biomass  yield   protein"
   puts $fp "(dd/mm/yyyy)     ()      ()   () (kg/ha) (kg/ha)  (%)"

   foreach line $harvest {
      puts $fp $line
   }
   close $fp
}
```
        on start_simulation:
```
catch "file delete $simName.harvest.out"

open_harvest_stuff
```
        on end_simulation:
```
close_harvest_stuff
```
      rule IAT Reports
        # No editable paramters
        on init:
```
# Annual summary of whole farm averages

proc open_iat_stuff {} {
   global iat config
   set iat {}
}


proc close_iat_stuff {} {
   global simName config iat
   puts "close_iat_stuff called"

   # Heading
   set fp [open $simName.iat.csv w]
   puts $fp "Date,crop,biomass,grain.yield,grain.protein,residue.yield,residue.protein"
   puts $fp "(dd/mm/yyyy),(),(kg/ha),(kg/ha),(%),(kg/ha),(%)"

   foreach line $iat {
      puts $fp $line
   }
   close $fp
}
```
        on start_simulation:
```
catch "file delete $simName.iat.csv"

open_iat_stuff
```
        on end_simulation:
```
close_iat_stuff
```
      rule Labour Initialisation logic
        # No editable Parameters
        on init:
```
# Apsim Machinery (sub)Module
# Contains Tractors, Implements & Labour.

# Operations:
# bool available(<config>)    ; See if a configuration can be used today (read)
# operate <config> <area>     ; Operate a configuration over an area until finished (event)

########################## Apsim interface code here
source $apsuite/Model/TclLink/CIDataTypes.tcl

# A trace handler for status. This handler is called whenever another module
# asks us whether machinery is available.
#    NB. Careful! Errors in trace routines are not caught!!!
proc machinery:maProc {name1 name2 op} {
   if {$op == "read" } {
      global config $name1
      foreach {junk operator implement} [split $name1 "_"] { break }

      # Check they are known to us
      if {[lsearch $config(operators) $operator] < 0} {
         set msg "operator \"$operator\" is unknown - I only know about $config(operators)"
         error $msg
      }
      if {[lsearch $config(implements) $implement] < 0} {
         set msg "implement \"$implement\" is unknown - I only know about $config(implements)"
         error $msg
      }

      # Now see if they are busy
      set avail 1
      catch {
         global machinery:jobs
         foreach job ${machinery:jobs} {
            foreach {tid iid area paddock costtype} [split $job ","] {break}
            if {"$operator" == "$tid" || "$implement" == "$iid"} {set avail 0}
         }
      } msg
      if {$msg != ""} {apsimWriteToSummaryFile $msg; error $msg}

      # Set the variable - this is what is returned to apsim.
      set $name1 $avail
   }
}

# An event handler.
proc operateLabour {args} {
  foreach arg $args {
     regsub -all "'" [lindex $arg 0] {} _name
     regsub -all "'" [lrange $arg 1 end] {} _value
     if {"$_name" != "callback"} {
        set [string tolower $_name] [string tolower $_value]
     } else {
        set $_name $_value
     }
  }
  if {![info exists operator] || ![info exists activity] || ![info exists area]} {
     error "Must specify a operator, activity, and area to operate over."
  }
  if { ![info exists paddock] } {set paddock {}}
  if { ![info exists costtype] } {set costtype unknown}
  if { ![info exists callback]}  {
    machinery:operate $operator $activity $area $paddock $costtype
  } else {
    machinery:operateLater $operator $activity $area $paddock $costtype $callback
  }
}

# Now register the event handlers.
#apsimSubscribeVariant operate            "machinery:operateHandler"
#apsimSubscribeVariant operate_later      "machinery:operateLaterHandler"
apsimSubscribeNull process            "machinery:process"
apsimSubscribeNull end_financial_year "machinery:end_year"
########################## End apsim interface code

########################## Machinery configuration code
# Read in our configuration
proc machinery:initialise {} {
   global config
   if {![info exists config(operators)]} {set config(operators) {}}
   if {![info exists config(implements)]} {set config(implements) {}}
}

# return the work rate for this combo can cover per hour
proc getCombo {operator implement thing} {
   global config
   if {![info exists config(machinery,$operator,$implement,$thing)]} {
      error "No $thing specified for $operator and $implement"
   }
   return $config(machinery,$operator,$implement,$thing)
}

proc getRate {tid iid} {
   return [getCombo $tid $iid workrate]
}

proc getValue {id thing} {
   global config
   if {![info exists config(machinery,$id,$thing)]} {
      error "No $thing for $id specified (get)"
   }
   return $config(machinery,$id,$thing)
}

# Return the cost of labour per hour
proc labourCost {} {
   global config
   if {![info exists config(economics,labourCost)]} {
      error "No labourCost specified"
   }
   return $config(economics,labourCost)
}

# return the labour cost this combo uses per hour
proc getLabourCost {tid iid} {
   return [expr [getCombo $tid $iid workrate] * [ labourCost ]]
}

proc getLabourers {} {
   global config
   return $config(operators)
}


# Return the number of hours worked per day
proc getHoursPerDay {tid iid} {
   return [getCombo $tid $iid hoursperday]
}

proc setValue {id thing value} {
   global config
   if {![info exists config(machinery,$id,$thing)]} {
      error "No $thing for $id specified (set)"
   }
   set config(machinery,$id,$thing) $value
}

##############
# Operate a configuration over an area. Just add it to the job queue
# and let process look after it.
proc machinery:operate {operator implement area paddock costtype} {
   if {![string is double -strict $area]} {
      error "Area should be a number (not $area)"
   }
   global machinery:jobs
   lappend machinery:jobs $operator,$implement,$area,$paddock,$costtype,
   apsimWriteToSummaryFile "Machinery job \"$operator + $implement\" is queued"
}

proc machinery:operateLater {operator implement area paddock costtype command} {
   if {![string is double -strict $area]} {
      error "Area should be a number (not $area)"
   }
   global machinery:jobs
   lappend machinery:jobs $operator,$implement,$area,$paddock,$costtype,$command
   apsimWriteToSummaryFile "Machinery job \"$operator + $implement\" is queued"
}

# The daily process routine. Manages the job queue
proc machinery:process {} {
   global machinery:jobs annual
   set tomorrowsJobs {}
   # Go through each job. If an item is in use in any prior job, we can't do it today.
   for {set ijob 0} {$ijob < [llength ${machinery:jobs}]} {incr ijob} {
      set job [lindex ${machinery:jobs} $ijob]
      foreach {tid iid area paddock costtype command} [split $job ","] {break}
      set inuse 0
      for {set j 0} {$j < $ijob} {incr j} {
         foreach {Ttid Tiid Tarea Tpaddock Tcosttype Tcommand} [split [lindex ${machinery:jobs} $j] ","] {break}
         if {$tid == $Ttid || $iid == $Tiid} {set inuse 1}
      }
      if {!$inuse} {
        # The job is running today. Work out how many hours, and then the costs
        set maxHours [getHoursPerDay $tid $iid]
        set rate [getRate $tid $iid]

        if {$maxHours * $rate <= $area} {
           set hours $maxHours
           set areaToday [expr $maxHours * $rate]
        } else {
           set hours [expr $area / $rate]
           set areaToday [expr $hours * $rate]
        }
        set cost [expr $hours * [getLabourCost $tid $iid]]
        apsimSendMessage "" expenditure [list hours $hours] [list cost $cost] [list comment "operating costs of $tid + $iid"] [list paddock $paddock] [list area $areaToday] [list $costtype {}]
        set year [apsimGet year]
        if {![info exists annual($year,labourhours)]} {
           set annual($year,$tid,labourhours) $hours
        } else {
           set annual($year,$tid,labourhours) [expr $annual($year,labourhours) + $hours]
        }

        set rate [expr $hours * [getRate $tid $iid]]
        set area [expr $area - $rate]

        if {$area > 0} {
           lappend tomorrowsJobs $tid,$iid,$area,$paddock,$costtype,$command
        } else {
           apsimWriteToSummaryFile "Labour job '$tid + $iid' in $paddock has finished"
           if {$command != ""} { apsimWriteToSummaryFile "doing $command"; eval $command }
        }
      } else {
        lappend tomorrowsJobs $job
      }
   }
   set machinery:jobs $tomorrowsJobs
}

# The "end_year" routine. Do loan payments and replacement
proc machinery:end_year {} {
   global annual
   global machinery:jobs

}
```
        on start_simulation:
```
# Finally, load our configuration database and initialise states
machinery:initialise
set machinery:jobs {}

# Now tell apsim we own it, set up the trace variable we use to trigger when the variable is read
foreach tid $config(operators) {
  foreach iid $config(implements) {
     set v available_${tid}_${iid}
     set $v 0
     apsimRegisterGetSet $v
     trace add variable $v read "machinery:maProc"
  }
}

apsimWriteToSummaryFile "Labour:\nOperators=$config(operators)\nImplements=$config(implements)"
```
      rule Labour Operators
        # Operator
        apsimname = male
        # Implement 1
        implement1name = sowing  # Name
        implement1workrate = 0.5  # Work Rate (ha/hour)
        implement1hoursperday = 12  # Daily Hours (hours)
        # Implement 2
        implement2name = weeding  # Name
        implement2workrate = 0.8  # Work Rate (ha/hour)
        implement2hoursperday = 12  # Daily Hours (hours)
        # Implement 3
        implement3name = harvesting  # Name
        implement3workrate = 0.2  # Work Rate (ha/hour)
        implement3hoursperday = 8  # Daily Hours (hours)
        # Implement 4
        implement4name = presow_till  # Name
        implement4workrate = 0.1  # Work Rate (ha/hour)
        implement4hoursperday = 8  # Daily Hours (hours)
        # Implement 5
        implement5name = spraying  # Name
        implement5workrate = 0.1  # Work Rate (ha/hour)
        implement5hoursperday = 8  # Daily Hours (hours)
        on init:
```
lappend config(operators) "[apsimname]"
set config(machinery,[apsimname],age) "0"

set config(machinery,[apsimname],[implement1name],workrate) "[implement1workrate]"
set config(machinery,[apsimname],[implement1name],hoursperday) "[implement1hoursperday]"

set config(machinery,[apsimname],[implement2name],workrate) "[implement2workrate]"
set config(machinery,[apsimname],[implement2name],hoursperday) "[implement2hoursperday]"

set config(machinery,[apsimname],[implement3name],workrate) "[implement3workrate]"
set config(machinery,[apsimname],[implement3name],hoursperday) "[implement3hoursperday]"

set config(machinery,[apsimname],[implement4name],workrate) "[implement4workrate]"
set config(machinery,[apsimname],[implement4name],hoursperday) "[implement4hoursperday]"

set config(machinery,[apsimname],[implement5name],workrate) "[implement5workrate]"
set config(machinery,[apsimname],[implement5name],hoursperday) "[implement5hoursperday]"
```
      rule Costs - Wages
        # Costs
        labourCost = 0.0  # Cost of labour ($/hr)
        on init:
```
set config(economics,labourCost) "[labourCost]"
```
    manager2 Economics
      # Dummy module
```csharp
using System;
using ModelFramework;

public class Script 
{      
   [EventHandler] public void OnBuyCows() {Console.WriteLine("Buying a cow");}
   [EventHandler] public void OnSellCows() {Console.WriteLine("Selling a cow");}

   [EventHandler] public void OnBuyShoats() {Console.WriteLine("Buying a goat");}
   [EventHandler] public void OnSellShoats() {Console.WriteLine("Selling a goat");}
}
```
    folder Livsim
      manager2 Cow Herd Management
        moduleName = cows  # Name of animal module
        herdsize = 10  # Target number of cows in herd
        maxMale = 0  # Number of entire male cows
        minAge_sale = 2.5  # Age when animals considered for sale (yrs)
        initialAge = 1.5  # Age of Initial herd(y)
        initialWeight = 120  # Weight of initial beasts (kg)
        maxAge = 14  # Maximum age of beasts (y)
        genotype = mashona  # Genotype of cows()
        herdMinFrac = 0.25  # Herd replacement threshold - replace when below this fraction
```csharp
using System;
using ModelFramework;

public class Script 
{      
   [Link] Simulation Sim;
   
   [Param] string moduleName;
   [Param] int herdsize;
   [Param] int maxMale;   
   [Param] double maxAge;   
   [Param] double initialAge;
   [Param] double initialWeight;
   [Param] string genotype;

   [EventHandler] public void OnStart_Simulation()
   {
      if (herdsize > 0) {
         BuyType b = new BuyType();
         b.number = Math.Max(0, herdsize - maxMale);
         b.sex = "F";
         b.age = initialAge;
         b.weight = initialWeight;
         if (genotype != "") 
           b.genotype = genotype;
         Buy(b);
         if (maxMale > 0) {
            b.number = maxMale;
            b.sex = "M";
            Buy(b);
         }
      }
   }
   public void Buy(BuyType b) {
      Sim.Publish(moduleName + ".buy" + moduleName, b);
      Sim.Publish("economics.buy" + moduleName);
   }

   [Param] double minAge_sale;
   [Input] int month;
   [EventHandler] public void OnStart_Month()
   {
      int num = 0;
      string [] sex = new string[500];

      // 1. Remove any males above maturity, keep the youngest as a Billy 
      int numMales = 0;
      do {
         Sim.Get("sex"+moduleName, out sex);
         num = sex.Length;
         if (num > 0) {
           double [] age = new double[num];
           Sim.Get("age"+moduleName, out age);
           numMales = 0;
           int oldestMale = -1;
           double oldestAge = 0.0;
           for (int i = 0; i < num; i++) 
              if (sex[i] == "M" && age[i] > minAge_sale ) {
                  if (age[i] > oldestAge ) {
                    oldestAge = age[i];
                    oldestMale = i;
                  }  
                  numMales++;
              }
           if (oldestMale >= 0) 
             if (numMales > maxMale || age[oldestMale] > maxAge) {
               SellType s = new SellType();
               s.group = oldestMale+1;  // Index Origin 1 in R
               Sell(s);
             }
         }  
      } while (num > 0 && numMales > maxMale);

      // 2. If we have more mature females than we need, sell the oldest non-lactating 
      int numFemales = 0;
      int oldestFemale = 0;
      do {
         Sim.Get("sex"+moduleName, out sex);
         num = sex.Length;
         if (num > 0) {
            double [] age = new double[num];
            Sim.Get("age"+moduleName, out age);
            numFemales = 0;
            oldestFemale = -1;
            double oldestAge = 0.0;
            for (int i = 0; i < num; i++) 
               if ((sex[i] == "F" || sex[i] == "FL") && age[i] > minAge_sale) {
                   if (sex[i] == "F" && age[i] > oldestAge ) {
                     oldestAge = age[i];
                     oldestFemale = i;
                   }  
                   numFemales++;
               }
            if (oldestFemale >= 0)
             if ( numFemales > herdsize - maxMale || age[oldestFemale] > maxAge) {
               SellType s = new SellType();
               s.group = oldestFemale+1;
               Sell(s);
             }
         }
      } while (num > 0 && oldestFemale >= 0 && numFemales > herdsize - maxMale);
   }

   [Param] public double herdMinFrac;
   [EventHandler] public void OnStart_Year()
   {
      string [] sex = new string[500];
      int nMale = 0, nFemale = 0;
      Sim.Get("sex" + moduleName, out sex);
      for (int i = 0; i < sex.Length; i++) 
         if (sex[i] == "M") 
            nMale++;
         else
            nFemale++;
      
      if (nFemale < (herdsize - maxMale) * herdMinFrac) {
         BuyType b = new BuyType();
         b.number = Math.Max(0, herdsize - maxMale - nFemale);
         b.sex = "F";
         b.age = initialAge;
         b.weight = initialWeight;
         if (genotype != "") 
            b.genotype = genotype;
         Buy(b);
   
      }
      if ( nMale < maxMale * herdMinFrac) {
         BuyType b = new BuyType();
         b.number = Math.Max(0, herdsize - maxMale - nFemale);
         b.sex = "M";
         b.age = initialAge;
         b.weight = initialWeight;
         if (genotype != "") 
            b.genotype = genotype;
         Buy(b);
      }
         
   }
   public void Sell(SellType s) {
      Sim.Publish(moduleName + ".sell" + moduleName, s);
      Sim.Publish("economics.sell" + moduleName);
   }
}
```
      manager2 Shoat Herd Management
        moduleName = shoats  # Name of animal module
        herdsize = 14  # Target number of shoats in herd
        maxMale = 0  # Number of entire male shoats
        minAge_sale = 2.25  # Age when animals considered for sale (yrs)
        initialAge = 2.5  # Age of Initial herd(y)
        initialWeight = 60  # Weight of initial beasts (kg)
        maxAge = 12  # Maximum age of beasts (y)
        genotype = na  # Genotype of shoats ()
        herdMinFrac = 0.25  # Herd replacement threshold - replace when below this fraction
```csharp
using System;
using ModelFramework;

public class Script 
{      
   [Link] Simulation Sim;
   
   [Param] string moduleName;
   [Param] int herdsize;
   [Param] int maxMale;   
   [Param] double maxAge;   
   [Param] double initialAge;
   [Param] double initialWeight;
   [Param] string genotype;

   [EventHandler] public void OnStart_Simulation()
   {
      if (herdsize > 0) {
         BuyType b = new BuyType();
         b.number = Math.Max(0, herdsize - maxMale);
         b.sex = "F";
         b.age = initialAge;
         b.weight = initialWeight;
         if (genotype != "") 
           b.genotype = genotype;
         Buy(b);
         if (maxMale > 0) {
            b.number = maxMale;
            b.sex = "M";
            Buy(b);
         }
      }
   }
   public void Buy(BuyType b) {
      Sim.Publish(moduleName + ".buy" + moduleName, b);
      Sim.Publish("economics.buy" + moduleName);
   }

   [Param] double minAge_sale;
   [EventHandler] public void OnStart_Month()
   {
      int num = 0;
      string [] sex = new string[500];

      // 1. Remove any males above maturity, keep the youngest as a Billy 
      int numMales = 0;
      do {
         Sim.Get("sex"+moduleName, out sex);
         num = sex.Length;
         if (num > 0) {
           double [] age = new double[num];
           Sim.Get("age"+moduleName, out age);
           numMales = 0;
           int oldestMale = -1;
           double oldestAge = 0.0;
           for (int i = 0; i < num; i++) 
              if (sex[i] == "M" && age[i] > minAge_sale ) {
                  if (age[i] > oldestAge ) {
                    oldestAge = age[i];
                    oldestMale = i;
                  }  
                  numMales++;
              }
           if (oldestMale >= 0) 
             if (numMales > maxMale || age[oldestMale] > maxAge) {
               SellType s = new SellType();
               s.group = oldestMale+1;  // Index Origin 1 in R
               Sell(s);
             }
         }  
      } while (num > 0 && numMales > maxMale);

      // 2. If we have more mature females than we need, sell the oldest non-lactating 
      int numFemales = 0;
      int oldestFemale = 0;
      do {
         Sim.Get("sex"+moduleName, out sex);
         num = sex.Length;
         if (num > 0) {
            double [] age = new double[num];
            Sim.Get("age"+moduleName, out age);
            numFemales = 0;
            oldestFemale = -1;
            double oldestAge = 0.0;
            for (int i = 0; i < num; i++) 
               if ((sex[i] == "F" || sex[i] == "FL") && age[i] > minAge_sale) {
                   if (sex[i] == "F" && age[i] > oldestAge ) {
                     oldestAge = age[i];
                     oldestFemale = i;
                   }  
                   numFemales++;
               }
            if (oldestFemale >= 0)
             if ( numFemales > herdsize - maxMale || age[oldestFemale] > maxAge) {
               SellType s = new SellType();
               s.group = oldestFemale+1;
               Sell(s);
             }
         }
      } while (num > 0 && oldestFemale >= 0 && numFemales > herdsize - maxMale);
   }   

   // At the start  of each year, restock if below X% of herd size
   [Param] public double herdMinFrac;
   [EventHandler] public void OnStart_Year()
   {
      string [] sex = new string[500];
      int nMale = 0, nFemale = 0;
      Sim.Get("sex" + moduleName, out sex);
      for (int i = 0; i < sex.Length; i++) 
         if (sex[i] == "M") 
            nMale++;
         else
            nFemale++;
      
      if (nFemale < (herdsize - maxMale) * herdMinFrac) {
         BuyType b = new BuyType();
         b.number = Math.Max(0, herdsize - maxMale - nFemale);
         b.sex = "F";
         b.age = initialAge;
         b.weight = initialWeight;
         if (genotype != "na") 
            b.genotype = genotype;
         Buy(b);
   
      }
      if ( nMale < maxMale * herdMinFrac) {
         BuyType b = new BuyType();
         b.number = Math.Max(0, herdsize - maxMale - nFemale);
         b.sex = "M";
         b.age = initialAge;
         b.weight = initialWeight;
         if (genotype != "") 
            b.genotype = genotype;
         Buy(b);
      }
         
   }

   public void Sell(SellType s) {
      Sim.Publish(moduleName + ".sell" + moduleName, s);
      Sim.Publish("economics.sell"+moduleName);
   }
}
```
      manager2 bransupplement
        # Supplement details
        feedClass = bran  # Name of feed
        store = 100000  # Initial amount of storage (kg)
```csharp
using System;
using ModelFramework;

public class Script 
{      
   [Link] Simulation Sim;
   
   [Param] public string feedClass;         // The name of the feed we are storing

   [Param,Output] public double store;             // The amount of stuff we are storing

   // An animal is asking how much we have
   [Output] AvailableToAnimalType AvailableToAnimal {
      get {
        AvailableToAnimalType a = new AvailableToAnimalType();
        a.element = new AvailableToAnimalelementType[1];
        a.element[0] = new AvailableToAnimalelementType();
        a.element[0].CohortID = feedClass;
        a.element[0].AgeID = "green";
        a.element[0].Weight = store;
        return(a);
      }
   }

   // An animal has taken some of our store
   private RemovedByAnimalType eaten = null;
   [Output] RemovedByAnimalType RemovedByAnimal {
      set {
         if (eaten != null) 
           for (int i = 0; i < value.element.Length; i++)
             if (value.element[i].CohortID == eaten.element[0].CohortID &&
                 value.element[i].AgeID == eaten.element[0].AgeID )
               eaten.element[0].WeightRemoved += value.element[i].WeightRemoved;
      }
      get { return(eaten); }
   }

   [EventHandler]
   public void OnInit2()
   {
      eaten = new RemovedByAnimalType();
      eaten.element = new RemovedByAnimalelementType[1];
      eaten.element[0] = new RemovedByAnimalelementType();
      eaten.element[0].CohortID = feedClass;
      eaten.element[0].AgeID = "green";
      eaten.element[0].WeightRemoved = 0;
   }

   [EventHandler]
   public void OnPrepare()
   {   
      for (int i = 0; i < eaten.element.Length; i++) {
          eaten.element[i].WeightRemoved = 0;
      }
   }

   [EventHandler]
   public void OnPost()
   {   
      for (int i = 0; i < eaten.element.Length; i++) {
          store -= eaten.element[i].WeightRemoved;
      }
   }

   [Output] double consumed {
      get {
         if (eaten != null) 
            return(eaten.element[0].WeightRemoved);
         return 0.0;   
      }
   }
}
```
      manager2 Maize_residue_store
        # Supplement details
        feedClass = maize  # Name of feed
        MyStore = 500  # Initial amount stored (kg)
```csharp
using System;
using ModelFramework;

public class Script 
{      
   [Link] Simulation Sim;
   
   [Param] public string feedClass;               // The name of the feed we are storing

   [Param] private double MyStore;
   [Output] public double store {            // The amount of stuff we have stored
       get {
          return(MyStore);
       }
       set {
          Console.WriteLine("Setting " + feedClass + "store to "+  value + " kg");
          MyStore = value;
       }
   }

   // An animal is asking how much we have
   [Output] AvailableToAnimalType AvailableToAnimal {
      get {
        AvailableToAnimalType a = new AvailableToAnimalType();
        a.element = new AvailableToAnimalelementType[1];
        a.element[0] = new AvailableToAnimalelementType();
        a.element[0].CohortID = feedClass;
        a.element[0].AgeID = "green";
        a.element[0].Weight = Math.Max(MyStore, 0.0);
        return(a);
      }
   }

   // An animal has taken some of our store
   private RemovedByAnimalType eaten = null;
   [Output] RemovedByAnimalType RemovedByAnimal {
      set {
         if (eaten != null) {
           for (int i = 0; i < value.element.Length; i++)
             if (value.element[i].CohortID == eaten.element[0].CohortID &&
                 value.element[i].AgeID == eaten.element[0].AgeID )
               eaten.element[0].WeightRemoved += value.element[i].WeightRemoved;
           MyStore -= Math.Min(MyStore, eaten.element[0].WeightRemoved);
         }  
      }
      get { return(eaten); }
   }

   [EventHandler]
   public void OnInit2()
   {
      eaten = new RemovedByAnimalType();
      eaten.element = new RemovedByAnimalelementType[1];
      eaten.element[0] = new RemovedByAnimalelementType();
      eaten.element[0].CohortID = feedClass;
      eaten.element[0].AgeID = "green";
      eaten.element[0].WeightRemoved = 0;
   }

   [EventHandler]
   public void OnPrepare()
   {   
      for (int i = 0; i < eaten.element.Length; i++) {
          eaten.element[i].WeightRemoved = 0;
      }
   }

   [Output] double consumed {
      get {
         if (eaten != null) 
            return(eaten.element[0].WeightRemoved);
         return 0.0;   
      }
   }
}
```
      manager2 Sorghum_residue_store
        # Supplement details
        feedClass = sorghum  # Name of feed
        MyStore = 0  # Initial amount stored (kg)
        script: same as in LivsimSample.Livsim.Maize_residue_store
      manager2 Groundnut_residue_store
        # Supplement details
        feedClass = resd  # Name of feed
        MyStore = 50  # Initial amount stored (kg)
```csharp
using System;
using ModelFramework;

public class Script 
{      
   [Link] Simulation Sim;
   
   [Param] public string feedClass;               // The name of the feed we are storing

   private double MyStore = 0;
   [Output] public double store {            // The amount of stuff we have stored
       get {
          return(MyStore);
       }
       set {
         Console.WriteLine("Setting " + feedClass + "store to " + value + " kg");
         MyStore = value;
      }
   }

   // An animal is asking how much we have
   [Output] AvailableToAnimalType AvailableToAnimal {
      get {
        AvailableToAnimalType a = new AvailableToAnimalType();
        a.element = new AvailableToAnimalelementType[1];
        a.element[0] = new AvailableToAnimalelementType();
        a.element[0].CohortID = feedClass;
        a.element[0].AgeID = "green";
        a.element[0].Weight = Math.Max(MyStore, 0.0);
        return(a);
      }
   }

   // An animal has taken some of our store
   private RemovedByAnimalType eaten = null;
   [Output] RemovedByAnimalType RemovedByAnimal {
      set {
         if (eaten != null) {
           for (int i = 0; i < value.element.Length; i++)
             if (value.element[i].CohortID == eaten.element[0].CohortID &&
                 value.element[i].AgeID == eaten.element[0].AgeID )
               eaten.element[0].WeightRemoved += value.element[i].WeightRemoved;
           MyStore -= Math.Min(MyStore, eaten.element[0].WeightRemoved);
         }  
      }
      get { return(eaten); }
   }

   [EventHandler]
   public void OnInit2()
   {
      eaten = new RemovedByAnimalType();
      eaten.element = new RemovedByAnimalelementType[1];
      eaten.element[0] = new RemovedByAnimalelementType();
      eaten.element[0].CohortID = feedClass;
      eaten.element[0].AgeID = "green";
      eaten.element[0].WeightRemoved = 0;
   }

   [EventHandler]
   public void OnPrepare()
   {   
      for (int i = 0; i < eaten.element.Length; i++) {
          eaten.element[i].WeightRemoved = 0;
      }
   }

   [Output] double consumed {
      get {
         if (eaten != null) 
            return(eaten.element[0].WeightRemoved);
         return 0.0;   
      }
   }
}
```
      manager2 Mucuna_residue_store
        # Supplement details
        feedClass = mucuna  # Name of feed
        MyStore = 500  # Initial amount stored (kg)
        script: same as in LivsimSample.Livsim.Maize_residue_store
      manager2 magic
        # An unlimited feed store
        feedClass = grass  # Name of feed
```csharp
using System;
using ModelFramework;

public class Script 
{      
   [Link] Simulation Sim;

   [Link] Component me;
   
   [Param] public string feedClass;               // The name of the feed we are storing

   // An animal is asking how much we have
   [Output] AvailableToAnimalType AvailableToAnimal {
      get {
        AvailableToAnimalType a = new AvailableToAnimalType();
        a.element = new AvailableToAnimalelementType[1];
        a.element[0] = new AvailableToAnimalelementType();
        a.element[0].CohortID = feedClass;
        a.element[0].AgeID = "green";
        a.element[0].Weight = 50000;
        return(a);
      }
   }

   // An animal has taken some of our store
   private RemovedByAnimalType eaten = null;
   [Output] RemovedByAnimalType RemovedByAnimal {
      set {
         if (eaten != null) 
           for (int i = 0; i < value.element.Length; i++)
             if (value.element[i].CohortID == eaten.element[0].CohortID &&
                 value.element[i].AgeID == eaten.element[0].AgeID )
               eaten.element[0].WeightRemoved += value.element[i].WeightRemoved;
      }
      get { return(eaten); }
   }

   [EventHandler]
   public void OnInit2()
   {
      eaten = new RemovedByAnimalType();
      eaten.element = new RemovedByAnimalelementType[1];
      eaten.element[0] = new RemovedByAnimalelementType();
      eaten.element[0].CohortID = feedClass;
      eaten.element[0].AgeID = "green";
      eaten.element[0].WeightRemoved = 0;
   }

   [EventHandler]
   public void OnPrepare()
   {   
      for (int i = 0; i < eaten.element.Length; i++) {
          eaten.element[i].WeightRemoved = 0;
      }
   }

   [Output] double consumed {
      get {
         if (eaten != null) 
            return(eaten.element[0].WeightRemoved);
         return 0.0;   
      }
   }
}
```
      RLink Feed Quality
        on init:
```r
# Feed source ranking - highest ranks are eaten first, lowest last.
FeedRank <-list()

# Feed (ID 4 in mark's spreadsheet)
Qlty<-list()
Qlty[["maize.dm"]] <- 1000.0  ;#(DM content g/kg)
Qlty[["maize.me"]] <-   12.2  ;#(Metab. Energy MJ/kg)
Qlty[["maize.ge"]] <-   19    ;#
Qlty[["maize.fme"]] <-  8.8   ;#(Ferment. Energy MJ/kg)
Qlty[["maize.cp"]] <-   180   ;#(Crude prot. g/kg)
Qlty[["maize.adin"]] <- 0.5   ;#(Acid Digest insol. N g/kg)
Qlty[["maize.dmd"]] <-  0.8   ;#(Dry matter Digest g/kg)
Qlty[["maize.a"]] <-    0.7   ;#(fr)
Qlty[["maize.b"]] <-    0.2   ;#(fr)
Qlty[["maize.c"]] <-    0.1   ;#(fr)
Qlty[["maize.ndf"]] <-  137   ;#()
Qlty[["maize.p"]] <-    0.001 ;#()
Qlty[["maize.k"]] <-    0.009 ;#()
Qlty[["maize.type"]] <- 3     ;# forage legume
FeedRank[["maize"]] <-4

Qlty[["sorghum.dm"]] <- 1000.0  ;#(DM content g/kg)
Qlty[["sorghum.me"]] <-   12.2  ;#(Metab. Energy MJ/kg)
Qlty[["sorghum.ge"]] <-   19    ;#
Qlty[["sorghum.fme"]] <-  8.8   ;#(Ferment. Energy MJ/kg)
Qlty[["sorghum.cp"]] <-   180   ;#(Crude prot. g/kg)
Qlty[["sorghum.adin"]] <- 0.5   ;#(Acid Digest insol. N g/kg)
Qlty[["sorghum.dmd"]] <-  0.8   ;#(Dry matter Digest g/kg)
Qlty[["sorghum.a"]] <-    0.7   ;#(fr)
Qlty[["sorghum.b"]] <-    0.2   ;#(fr)
Qlty[["sorghum.c"]] <-    0.1   ;#(fr)
Qlty[["sorghum.ndf"]] <-  137   ;#()
Qlty[["sorghum.p"]] <-    0.001 ;#()
Qlty[["sorghum.k"]] <-    0.009 ;#()
Qlty[["sorghum.type"]] <- 3     ;# forage legume
FeedRank[["sorghum"]] <-4

# Feed (ID 6 in mark's spreadsheet)
Qlty[["resd.dm"]] <- 1000.0  ;#(DM content g/kg)
Qlty[["resd.me"]] <-   12.3 ;#(Metab. Energy MJ/kg)
Qlty[["resd.ge"]] <-   19    ;#
Qlty[["resd.fme"]] <-  11.4   ;#(Ferment. Energy MJ/kg)
Qlty[["resd.cp"]] <-   190   ;#(Crude prot. g/kg)
Qlty[["resd.adin"]] <- 1.3   ;#(Acid Digest insol. N g/kg)
Qlty[["resd.dmd"]] <-  0.75   ;#(Dry matter Digest g/kg)
Qlty[["resd.a"]] <-    0.23   ;#(fr)
Qlty[["resd.b"]] <-    0.71   ;#(fr)
Qlty[["resd.c"]] <-    0.18   ;#(fr)
Qlty[["resd.ndf"]] <-  137   ;#()
Qlty[["resd.p"]] <-    0.001 ;#()
Qlty[["resd.k"]] <-    0.009 ;#()
Qlty[["resd.type"]] <- 3     ;# 
FeedRank[["resd"]] <-6

# Feed (ID 6 in mark's spreadsheet)
Qlty[["mucuna.dm"]] <- 1000.0  ;#(DM content g/kg)
Qlty[["mucuna.me"]] <-   12.3 ;#(Metab. Energy MJ/kg)
Qlty[["mucuna.ge"]] <-   19    ;#
Qlty[["mucuna.fme"]] <-  11.4   ;#(Ferment. Energy MJ/kg)
Qlty[["mucuna.cp"]] <-   190   ;#(Crude prot. g/kg)
Qlty[["mucuna.adin"]] <- 1.3   ;#(Acid Digest insol. N g/kg)
Qlty[["mucuna.dmd"]] <-  0.75   ;#(Dry matter Digest g/kg)
Qlty[["mucuna.a"]] <-    0.23   ;#(fr)
Qlty[["mucuna.b"]] <-    0.71   ;#(fr)
Qlty[["mucuna.c"]] <-    0.18   ;#(fr)
Qlty[["mucuna.ndf"]] <-  137   ;#()
Qlty[["mucuna.p"]] <-    0.001 ;#()
Qlty[["mucuna.k"]] <-    0.009 ;#()
Qlty[["mucuna.type"]] <- 3     ;# 
FeedRank[["mucuna"]] <- 5

# Feed (ID 5 in mark's spreadsheet)- worst quality
Qlty[["grass.dm"]] <-  1000.0 ;#(DM content g/kg)
Qlty[["grass.me"]] <-  11.4 ;#(Metab. Energy MJ/kg)
Qlty[["grass.ge"]] <-   19    ;#
Qlty[["grass.fme"]] <-  10.6  ;#(Ferment. Energy MJ/kg)
Qlty[["grass.cp"]] <-   180   ;#(Crude prot. g/kg)
Qlty[["grass.adin"]] <- 1.2   ;#(Acid Digest insol. N g/kg)
Qlty[["grass.dmd"]] <-  0.7   ;#(Dry matter Digest g/kg)
Qlty[["grass.a"]] <-    0.4   ;#(fr)
Qlty[["grass.b"]] <-    0.6   ;#(fr)
Qlty[["grass.c"]] <-    0.2   ;#(fr)
Qlty[["grass.ndf"]] <-  137   ;#()
Qlty[["grass.p"]] <-    0.001 ;#()
Qlty[["grass.k"]] <-    0.009 ;#()
Qlty[["grass.type"]] <- 1     ;# 
FeedRank[["grass"]] <-2

# Concentrate (ID 1 in spreadsheet)
Qlty[["bran.dm"]] <- 1000.0   ;#(DM content g/kg)
Qlty[["bran.me"]] <-   12.7  ;#(Metab. Energy MJ/kg)
Qlty[["bran.ge"]] <-   18.8  ;#
Qlty[["bran.fme"]] <-  9.9   ;#(Ferment. Energy MJ/kg)
Qlty[["bran.cp"]] <-   300   ;#(Crude prot. g/kg)
Qlty[["bran.adin"]] <- 1.3   ;#(Acid Digest insol. N g/kg)
Qlty[["bran.dmd"]] <-  0.81  ;#(Dry matter Digest g/kg)
Qlty[["bran.a"]] <-    0.25  ;#(fr)
Qlty[["bran.b"]] <-    0.64  ;#(fr)
Qlty[["bran.c"]] <-    0.12  ;#(fr)
Qlty[["bran.ndf"]] <-  180   ;#()
Qlty[["bran.p"]] <-    0.005 ;#()
Qlty[["bran.k"]] <-    0.008 ;#()
Qlty[["bran.type"]] <- 2     ;# concentrate
FeedRank[["bran"]] <-10

# Helper function to add all the Y parts of structure X
AASum<-function (x, y) {
   s<- 0
   for (e in 1:x$numelement) {
      s <-  s + x[[paste("element.",e,sep="")]][[y]]
   }
   return(s)
}

# Return a list of feeds in a structure
feedNames <- function(x) {
   r <- NULL
   for (e in 1:x$numelement) {
      n<-x[[paste("element.",e,sep="")]][["CohortID"]]
      if (sum(r == n) == 0) {
         r <- c(r, n)
      } 
   }
   return(r)   
}

# return a feed's attribute from the Qlty data
feedAttr  <- function(x, y) {
   q <- Qlty[[paste(x,y,sep=".")]]
   if (length(q) == 12) {
      q <- q[apsim$get("month")]
   } else if (length(q) != 1) {
      stop(paste("Length of",x,y,"should be 1 or 12, is", length(q)))
   }
   return(q)
}


# If it's a rationed feed source, eat that amount (kg/ha). Otherwise, 
# do the leaf/stem selection.
doDietSelection <- function (DMEaten, available) {
   if ("ration" %in% names(available)) {
      return(eatAmount(min(DMEaten, available[["ration"]]), available)) 
   }
   return(doLeafStemSelection(DMEaten, available)) 
}

# Eat an amount (up to DMEaten kg/ha) from a feed source
eatAmount <- function (DMEaten, available) {
   eaten <- 0; i <- 1 
   for(i in 1:available$numelement) {
      if (eaten < DMEaten) {
        amount <- max(0, min(available[[paste("element.",i,sep="")]][["Weight"]], DMEaten))
      } else {
        amount <- 0
      }
      available[[paste("element.",i,sep="")]][["WeightRemoved"]] <- amount 
      eaten <- eaten + amount
   } 
   return(available)
}

## Green&dead x leaf&stem diet selection (from grasp - pasture).
graz_comp_curve <- function(ndx, a) { return ((a * ndx) / (ndx * (a - 1) + 1)) }
doLeafStemSelection <- function (DMEaten, available) {
   n <- 0; green_leaf <- green_stem <- dead_leaf<- dead_stem <- green_pool <- dead_pool <- 0
   for (i in 1:available$numelement) {
      e <- available[[paste("element.",i,sep="")]]
      if (e$Organ == "leaf" && e$AgeID == "live") {
         green_leaf <- green_leaf + e$Weight
         green_pool <- green_pool + e$Weight
         n <- n + 1 ; igl<- i
      } else if (e$Organ == "leaf" && e$AgeID == "dead") {
         dead_leaf <- dead_leaf + e$Weight
         dead_pool <- dead_pool + e$Weight
         n <- n + 1; idl <- i
      } else if (e$Organ == "stem" && e$AgeID == "live") {
         green_stem <- green_stem + e$Weight
         green_pool <- green_pool + e$Weight
         n <- n + 1; igs <- i
      } else if (e$Organ == "stem" && e$AgeID == "dead") {
         dead_stem <- dead_stem + e$Weight
         dead_pool <- dead_pool + e$Weight
         n <- n + 1; ids <- i
      }
   }
   if (n < 4) {
     stop("Oops! not enough green/dead/leaf/stem pools")
   }
   
   if (green_pool > 0) { green_prop_leaf <- green_leaf / green_pool } else {green_prop_leaf <- 0.0}
   if (dead_pool > 0) { dead_prop_leaf<- dead_leaf / dead_pool } else {dead_prop_leaf <- 0.0}

   green_prop <- green_pool / (green_pool + dead_pool)
   if (is.nan(green_prop)) {green_prop <- 0.0}

   mod_green_prop <-  min(1.0, max( (green_prop - 0.10) / 0.90, 0.0))
   # If green is less than 10%, no active selection for green by stock
   if (mod_green_prop > 0.0) {
      green_diet <- graz_comp_curve(mod_green_prop, 19.0)
   } else {
      green_diet <- green_prop
   }

   leaf_diet <- 0.85
   curve_factor <- (0.5 * leaf_diet - leaf_diet) / (0.5 * leaf_diet - 0.5) 

   total_eaten <- min(DMEaten, green_pool + dead_pool)
   green_eaten <- green_diet * DMEaten
   green_eaten <- min(green_pool, green_eaten)
   dead_eaten <- (1.0 - green_diet) * DMEaten
   dead_eaten <- min(dead_pool, dead_eaten)

   green_leaf_eaten <- green_eaten * graz_comp_curve(green_prop_leaf, curve_factor)
   green_leaf_eaten <- max(min(green_leaf, green_leaf_eaten), 0.0)

   dead_leaf_eaten <- dead_eaten * graz_comp_curve(dead_prop_leaf, curve_factor)
   dead_leaf_eaten <- max(min(dead_leaf, dead_leaf_eaten), 0.0)

   green_stem_eaten <- green_eaten - green_leaf_eaten
   green_stem_eaten <- max(min(green_stem, green_stem_eaten), 0.0)

   dead_stem_eaten <- dead_eaten - dead_leaf_eaten
   dead_stem_eaten <- max(min(dead_stem, dead_stem_eaten), 0.0)

   # Trampling????
   #prop_can_eat <- 1.0
   #trampled <- DMEaten * (( 1.0 / prop_can_eat) - 1.0)

   eaten <- available
   stopifnot (green_leaf_eaten <= eaten[[paste("element.",igl,sep="")]][["Weight"]]) 
   eaten[[paste("element.",igl,sep="")]][["WeightRemoved"]] <-green_leaf_eaten
   stopifnot (dead_leaf_eaten <= eaten[[paste("element.",idl,sep="")]][["Weight"]]) 
   eaten[[paste("element.",idl,sep="")]][["WeightRemoved"]] <-dead_leaf_eaten
   stopifnot (green_stem_eaten <= eaten[[paste("element.",igs,sep="")]][["Weight"]]) 
   eaten[[paste("element.",igs,sep="")]][["WeightRemoved"]] <-green_stem_eaten
   stopifnot (dead_stem_eaten <= eaten[[paste("element.",ids,sep="")]][["Weight"]]) 
   eaten[[paste("element.",ids,sep="")]][["WeightRemoved"]] <-dead_stem_eaten
   return(eaten)
}
 
# Animal classes (column 1)
#Weaners (3-12 months) 1
#Juveniles (1-3 yrs)   2
#Dry (M+F)             3
#Lactating             6
#Kids (0-3 months)     7

# Feed type      (column 2)
# Concentrate          2
# Forage legumes       1
# Pasture              3
                       
# Gather the structures that hold available feed from apsim.
# These same structures are returned with eaten amounts later.
getFeedFromAPSIM <- function (sources) {
   AvailableToAnimal <- list()
   for (source in sources) {
      available <-apsim$get(paste(source, "AvailableToAnimal", sep="."))
      slist<-unlist(strsplit(source,".", fixed=T))
      paddock<-slist[1]
      if (length(slist) <= 1) {
        available$area <- 1.0
      } else {
        available$area <- apsim$get(paste(paddock,"_area",sep=""))
      } 
      AvailableToAnimal[[source]] <- available
   }
   return(AvailableToAnimal)
}

# Define the diet (kg/hd/month) for one beast.
# Forages are equally presented, 
define_dietOLD <- function(AvailableToAnimal, ConcentrateAmount, herdsize, numSupplemented) {
   #Amount of concentrates according to age class and milk production
   numForage<-numConc <-0
   for (source in names(AvailableToAnimal)) {
      if (feedAttr(feedNames(AvailableToAnimal[[source]] )[1],"type") == 2) {
         numConc <- numConc + 1
      } else {
         numForage<- numForage + 1
      }   
   }
   Forage_Quant <-matrix(nrow=numForage, ncol=2)
   Conc_Quant <-matrix(nrow=numConc, ncol=2)
   isource<-iconc  <- iforage <- 1
   for (source in names(AvailableToAnimal)) {
      available <- AvailableToAnimal[[source]] 
      kg <- AASum(available, "Weight") * available$area ;# kg/ha -> kg
      if ("ration" %in% names(available)) {kg <- min(kg, available[["ration"]]) } 
      feedName <- feedNames(available)[1]
      feedType <- feedAttr(feedNames(available)[1],"type")

      if (feedType != 2) {
          kg.hd <- kg / herdsize
          Forage_Quant[iforage,1] <- isource
          Forage_Quant[iforage,2] <-  kg.hd
          iforage <- iforage + 1
      } else {
          kg.hd <- kg / numSupplemented
          Conc_Quant[iconc,1] <- isource
          if (ConcentrateAmount > 0) {
            Conc_Quant[iconc,2] <-  max(0, min(kg.hd, ConcentrateAmount))
          } else {
            Conc_Quant[iconc,2] <-  0.0
          }  
          iconc <- iconc + 1
      }
      isource <- isource + 1
   }

   # Determine quality
   ForageQuality <- matrix(ncol=14,nrow=numForage)
   ConcentrateQuality <- matrix(ncol=14,nrow=numConc)
   isource<- iconc <- iforage <- 1
   for (source in names(AvailableToAnimal)) {
      available <- AvailableToAnimal[[source]]
      name <- feedNames(available)[1]
      feedAttr <- feedAttr(name,"type")
      qualities <- c("dm","me","ge","fme","cp","adin","dmd","a","b","c","ndf","p","k")
      for (iq in 1:length(qualities)) {
         if (feedAttr == 1 || feedAttr == 3) {
            ForageQuality[iforage,iq+1] <- feedAttr(name,qualities[iq])
         } else if (feedAttr == 2) {
            ConcentrateQuality[iconc,iq+1] <- feedAttr(name,qualities[iq])
         }
      }
      if (feedAttr == 1 || feedAttr == 3) {
         ForageQuality[iforage,1] <- isource
         iforage <- iforage + 1
      } else if (feedAttr == 2) {
         ConcentrateQuality[iconc,1] <- isource
         iconc <- iconc + 1
      }
      isource <- isource + 1
   }

   Diet <-list(concentratequantity=Conc_Quant,
               concentratequality=ConcentrateQuality,
               foragequantity=Forage_Quant,
               foragequality=ForageQuality)
   return(Diet)
}

# Define the diet (kg/hd/month) for one beast.
# Forages are equally presented, offers 
define_diet <- function(AvailableToAnimal, ConcentrateAmount, pot_intake, herdsize, numSupplemented) {
   #Amount of concentrates according to age class and milk production
   numForage<-numConc <-0
   for (source in names(AvailableToAnimal)) {
      if (feedAttr(feedNames(AvailableToAnimal[[source]] )[1],"type") == 2) {
         numConc <- numConc + 1
      } else {
         numForage<- numForage + 1
      }   
   }
   Forage_Quant <-matrix(nrow=numForage, ncol=2)
   Conc_Quant <-matrix(nrow=numConc, ncol=2)
   isource <- iconc <- iforage <- 1

   done <- vector()
   # Take the highest ranking feeds first
   allocated <- 0
   while (length(done) < length(names(AvailableToAnimal))) {
      best <- 0; bestclass <- bestsource <- ""
      for (source in names(AvailableToAnimal)) { 
         class <-AvailableToAnimal[[source]]$element.1$CohortID
         if (!source %in% done && FeedRank[[class]] > best) {
            best <- FeedRank[[class]]
            bestclass<-class
            bestsource<-source
         }
      }
      if (bestsource != "") {

        available <- AvailableToAnimal[[bestsource]] 
        kg <- max(0.0, AASum(available, "Weight") * available$area) ;# kg/ha -> kg
        if ("ration" %in% names(available)) {
           kg <- min(kg, available[["ration"]]) 
        } 
        feedType <- feedAttr(feedNames(available)[1],"type")

        if (feedType != 2) {
           kg.hd <- kg / herdsize
           kg.hd <- min(pot_intake, kg.hd)
           Forage_Quant[iforage,1] <- isource
           Forage_Quant[iforage,2] <-  kg.hd
           iforage <- iforage + 1
        } else {
           kg <- min(kg, ConcentrateAmount)
           kg.hd <- ifelse(numSupplemented > 0, kg / numSupplemented, 0)
           Conc_Quant[iconc,1] <- isource
           if (ConcentrateAmount > 0) {
             Conc_Quant[iconc,2] <-  max(0, min(kg.hd, ConcentrateAmount))
           } else {
             Conc_Quant[iconc,2] <-  0.0
           }  
           iconc <- iconc + 1
        }
        pot_intake <- max(pot_intake - kg.hd, 0.0)
        cat (" offering", round(kg.hd,1), "kg from", AASum(available,"Weight") * available$area,"kg of", bestsource, "\n")
        done<-c(done,bestsource)  
        isource <- isource + 1
      } 
   } # while ...

   # Determine quality
   ForageQuality <- matrix(ncol=14,nrow=numForage)
   ConcentrateQuality <- matrix(ncol=14,nrow=numConc)
   isource<- iconc <- iforage <- 1
   for (source in names(AvailableToAnimal)) {
      available <- AvailableToAnimal[[source]]
      name <- feedNames(available)[1]
      feedAttr <- feedAttr(name,"type")
      qualities <- c("dm","me","ge","fme","cp","adin","dmd","a","b","c","ndf","p","k")
      for (iq in 1:length(qualities)) {
         if (feedAttr == 1 || feedAttr == 3) {
            ForageQuality[iforage,iq+1] <- feedAttr(name,qualities[iq])
         } else if (feedAttr == 2) {
            ConcentrateQuality[iconc,iq+1] <- feedAttr(name,qualities[iq])
         }
      }
      if (feedAttr == 1 || feedAttr == 3) {
         ForageQuality[iforage,1] <- isource
         iforage <- iforage + 1
      } else if (feedAttr == 2) {
         ConcentrateQuality[iconc,1] <- isource
         iconc <- iconc + 1
      }
      isource <- isource + 1
   }

   Diet <-list(concentratequantity=Conc_Quant,
               concentratequality=ConcentrateQuality,
               foragequantity=Forage_Quant,
               foragequality=ForageQuality)
   return(Diet)
}
```
        on start_simulation:
```r
    # register accumulators in the system for reporting
    for (source in names(FeedRank)) {
       name <- paste(source, "_eaten", sep="")
       assign(name, 0.0)
       apsim$expose(name, "", get(name))
    }
```
        on prepare:
```r
    for (source in names(FeedRank)) {
       name <- paste(source, "_eaten", sep="")
       assign(name, 0.0)
    }
```
      RLink shoats
        # Manure handling
        manureRecoveryFract = 0.0  # Manure Recovery fraction (0-1)
        initialManureStore = 0.0  # Initial amount of stored manure (kg)
        uncollectedManureDest = verges  # Destination of Uncollected Manure (paddock name)
        collectedManureDest = plot1  # Destination of Stored Manure (paddock name)
        # Feeding
        InitialFeedSources = bransupplement Groundnut_residue_store Sorghum_residue_store Mucuna_residue_store maize_residue_store verges.grasp magic  # Initial feed source (module names)
        Concentrates = bran  # Concentrate (feed name)
        ConcentrateAmountFemale = 15  # Amount of concentrate fed to productive females (kg/hd/month)
        ConcentrateAmountAllElse = 0  # Amount of concentrate fed to dry beasts (kg/hd/month)
        MaizeAmount = 30  # Amount of maize residue fed (if available) (kg/hd/month)
        GroundnutAmount = 15  # Amount of groundnut residue fed (if available) (kg/hd/month)
        MucunaAmount = 30  # Amount of mucuna residue fed (if available) (kg/hd/month)
        SorghumAmount = 30  # Amount of sorghum residue fed (if available) (kg/hd/month)
        # Misc
        doOutput = F  # Do output at endof timestep (T/F)
        on my variables:
```
# Variables exported (rw) to apsim
age[name]                # age of each cow in herd
bw[name]                 # BW of each cow
sex[name]                # Sex of each cow
milk[name]
inputdmOf[name]          # Total DM eaten by herd
faecdmOf[name]           # Total manure produced by herd
faecnOf[name]            # Total N in manure produced by herd
milkOf[name]             # Total milk produced by herd
manurestore              # Size of manure store
FeedSources[name]        # The module name we ask for feed from
ConcentrateAmountFemale[name]  # How much concentrate to feed female goats
manureCollected[name]
```
        on init:
```r
# Initialisation 
require( Rcpp )
library(abind)

# see if we've got the livsim code
if (!file.exists("LIVSIM_shoat/livsim_shoat.r")) {
  msg<-"You need to obtain the LIVSIM source code from Mark.vanWijk@wur.nl\n"
  for (i in 1:10) {cat(msg)} ; flush(stdout());
  apsimFatal(msg)
}

# Manure handling
manurepaddock <- "[collectedManureDest]"
apsim$expose("manurepaddock", "", manurepaddock )
manurestore <- [initialManureStore]
manureNstore <- manurestore * 0.1

# Feed sources & quality
FeedSources[name] <- unlist(strsplit("[InitialFeedSources]", " "))
FeedConcentrates <-unlist(strsplit("[Concentrates]", " "))
ConcentrateAmountFemale[name] <- [ConcentrateAmountFemale]
ConcentrateAmountAllElse[name] <- [ConcentrateAmountAllElse]

# Buy & sell routines. Called by something else in apsim
onBuyShoat <- function (args) {
  cat("Buying ",args[["number"]], "x", args[["weight"]], "kg ",args$genotype, "shoat(s)\n"); flush.console()

  for (i in 1:args[["number"]]) {
     # Add a shoat to the herd.
     if (length(Goats) > 0) {
       Goats <<- cbind(Goats, Initial_Goats[,1])
     } else {
       Goats <<- as.matrix(Initial_Goats[,1])
     }
     Goats[,ncol(Goats)]$sys$id <<- nb[name]
     Goats[,ncol(Goats)]$sys$damid <<- -1000 - Goats[,ncol(Goats)]$sys$id
     Goats[,ncol(Goats)]$char$age <<- args[["age"]]
     Goats[,ncol(Goats)]$char$lactind <<- 0
     Goats[,ncol(Goats)]$char$pregind <<- 0
     if (args[["sex"]] == "m" || args[["sex"]] == "M") {
       Goats[,ncol(Goats)]$char$sex <<- 0
     } else if (args[["sex"]] == "f" || args[["sex"]] == "F") {
       Goats[,ncol(Goats)]$char$sex <<- 1
     } else {
       error(paste("cant determine sex of ", args[["sex"]]))
     }
     Goats[,ncol(Goats)]$char$bw <<- args[["weight"]]
     #breed <- ShoatBreed[[ args$genotype ]]
     #for (pname in names(breed)) {
     #   ShoatParam[[ pname ]] <<- breed[[ pname ]]
     #}
     ShoatParam$sys$nbgoats <<- ShoatParam$sys$nbgoats +1
     nb[name] <<- nb[name]+1
     numShoatsBrought <<- numShoatsBrought + 1
  }
  updateShoatVars()
}
apsim$subscribe("buy[name]", "Buy", "onBuyShoat")

onSellShoat <- function (args) {
  Goat<-Goats[,args$group]
  cat("Selling goat ", args$group, "sex=", ifelse(Goat$char$sex < 0.5, "M", "F"), "age=", round(Goat$char$age,1), "bw=", Goat$char$bw, "\n")

  numShoatsSold <<- numShoatsSold + 1
  weightShoatsSold <<- weightShoatsSold + Goats[,args$group]$char$bw

  Goats <<- as.matrix(Goats[,-args$group])
  ShoatParam$sys$nbgoats <<- ShoatParam$sys$nbgoats - 1
  updateShoatVars()
}
apsim$subscribe("sell[name]", "Sell", "onSellShoat")

# Update the variables that are exposed to apsim
updateShoatVars <- function () {
  inputdmOf[name] <<- 0; faecdmOf[name]<<- 0; faecnOf[name]<<- 0
  bw[name]<<-rep(0, ncol(Goats))
  age[name]<<-rep(0, ncol(Goats))
  sex[name]<<-rep("", ncol(Goats))
  inputdm[name] <<- rep(0, ncol(Goats))
  faecdm[name] <<- rep(0, ncol(Goats))
  faecn[name] <<- rep(0, ncol(Goats))
  herdsize_[name] <<- 0
  if (length(Goats) > 0 ) {
    goat <- 1
    for(goatnr in 1:ncol(Goats)) {
      if (Goats[,goatnr]$char$death == 0) {
        bw[name][goat] <<- Goats[,goatnr]$char$bw
        age[name][goat] <<- Goats[,goatnr]$char$age
        if (Goats[,goatnr]$char$sex < 0.5) {
           sex[name][goat] <<- "M"
        } else {
           if (Goats[,goatnr]$char$calvind > 0 && Goats[,goatnr]$char$calvind<=ShoatParam$lact$laclen && 
              Goats[,goatnr]$char$feeddeficit==0 && Goats[,goatnr]$char$lactind>=0.01) {              
             sex[name][goat] <<- "FL"
           } else {
             sex[name][goat] <<- "F"
           }
        }
        inputdm[name][goat] <<- Goats[,goatnr]$input$dm
        faecdm[name][goat] <<- Goats[,goatnr]$out$faecdm
        faecn[name][goat] <- Goats[,goatnr]$out$faecn
        milk[name][goat] <- Goats[,goatnr]$out$milk
        goat<-goat+1
      }
    }
    inputdmOf[name] <<- sum(inputdm[name])
    faecdmOf[name] <<- sum(faecdm[name])
    faecnOf[name] <<- sum(faecn[name])
    milkOf[name] <<- sum(milk[name])
    herdsize_[name] <<- ncol(Goats)
  }
}

bw[name] <- vector()
age[name] <- vector()
sex[name] <- vector()
inputdm[name] <- vector()
faecdm[name] <- vector()
faecn[name] <- vector()
milk[name] <- vector()
inputdmOf[name] <- 0
faecdmOf[name] <- 0
faecnOf[name] <- 0
milkOf[name] <- 0


## APSIM specific routines                 
dumpit <- function(list) {  if (class(list) == "list") {dumpit2("", list)} else {
 if (length(dim(list) > 1)) {
   for (i in 1:nrow(list)) {cat (list[i,],"\n")}
 }else{  
  cat(list,"\n")
 } 
}}

dumpit2 <- function(prefix, list) {
  for (x in names(list)) {
    if (class(list[[x]]) == "list") {
      dumpit2(paste(prefix,"$",x), list[[x]])
    } else if (length(dim(list[[x]]) > 1)) {
      cat(prefix, "$", x, "=", nrow(list[[x]]),"x",ncol(list[[x]]), ":\n")
       for (i in 1:nrow(list[[x]])) {cat ( list[[x]][i,],"\n")}
    } else {
      cat(prefix, "$", x, "=", list[[x]], "\n")
    }
  }
}


isSupplemented[name] <- function (Goat) {
  return ((Goat$char$age>=0 && Goat$char$age<=0.25) ||
           (Goat$char$age>3 && Goat$out$milk>0.001))
}

# Deal with manure production. Some may be stored for later application to a cropping paddock
manureCollected[name] <- 0.0
doManure[name] <- function (recoveryFract, uncollectedDest) { 
   manureCollected[name] <<- faecdmOf[name] * recoveryFract
   manureNCollected <- faecnOf[name] * recoveryFract

   cat ("Collected manure (stored) = " , round(manureCollected[name],0) , " kg,", round(manureNCollected,1), "kg N \n");
   manurestore <<- manurestore + manureCollected[name]
   manureNstore <<- manureNstore + manureNCollected

   area<-as.numeric(apsim$get(paste(uncollectedDest, "_area",sep="")))
   manureUnCollectedKgHa <- faecdmOf[name] *
           (1.0 - recoveryFract) / area

   manureNUnCollectedKgHa <- faecnOf[name] *
           (1.0 - recoveryFract) / area

   cat ("UnCollected manure (added to", uncollectedDest, "SOM pool) = " , 
          round(manureUnCollectedKgHa,0) , " kg/ha,", round(manureNUnCollectedKgHa,1), "kg/ha N \n")

   apsim$publish(paste(uncollectedDest,".SurfaceOrganicMatter.AddFaeces",sep=""),
                 "AddFaeces", list(OMWeight=manureUnCollectedKgHa, OMN=manureNUnCollectedKgHa, OMP=0))
}

# Apply any stored manure to nominated paddock when asked to
onApplyStoredManureXX <- function (args) {
  manurearea <- as.numeric(apsim$get(paste(manurepaddock,"_area",sep="")))

  cat ("Applying", manurestore, "kg manure to", manurepaddock, "SOM pool over", manurearea, "ha\n")

  manureAppliedKgHa <- manurestore / manurearea
  manureNAppliedKgHa <- manureNstore / manurearea

  if (manureAppliedKgHa  > 0) {
    cat ("manure = " , manureAppliedKgHa , " kg/ha, ", manureNAppliedKgHa, "kg/ha N\n")
    apsim$publish(paste (manurepaddock,".SurfaceOrganicMatter.AddFaeces", sep=""),
                "AddFaeces", list(OMWeight=manureAppliedKgHa , OMN=manureNAppliedKgHa , OMP=0))
  }
  manurestore <<- 0.0
  manureNstore<<- 0.0
}

estimate_pot_intake_[name]<-function(Goat)
  {
  min_dmd<-0.7
  if (Goat$char$sex > 0.5) {
     coefIntake<- 1 ; #??approx(CowParam$lact$milkfatlp,CowParam$bw$intlact,Cow$char$lactind)
  } else {
     coefIntake<-1
  }
  ## FIXME should be: Intake_forages = (130.9*(Feed$me_av/Feed$ge_av)+0.384*Goat$char$bw-18.75)*Goat$char$bw^0.75/1000*Param$sys$tfactor
  Intake_forages<-(0.0107 * Goat$char$bw / (1 - min_dmd)) * 30.4 * coefIntake
  Intake_forages<-max(Intake_forages, 1.5 * Goat$char$bw)

  return(Intake_forages)
}

apsim$subscribe("ApplyStoredManure", "NULL", "onApplyStoredManure")

title <- apsim$get("title")

#-------------------LivSim-------------------
# Step 1: Initialise
#-------------------Reading input for LivSim-------------------
source("LIVSIM_shoat/input/input_livsim_shoat.r")
tmp <-input_livsim_shoat()
Initial_Goats <-tmp[[1]]
ShoatBreed  <-tmp[[2]]
ShoatParam	<-tmp[[3]]
ShoatMgmt	   <-tmp[[4]]
#ForageQuality	<-tmp[[5]]
#ConcentrateQuality <-tmp[[6]]
rm(tmp)

#--------------------------------Setting auxiliary variables-------------------------
ShoatParam$sys$ylen 		 	   <- 365
ShoatParam$sys$timestep 	 	 <- ShoatParam$sys$tfactor / ShoatParam$sys$ylen
ShoatParam$sys$simulationstep <- 12
ShoatParam$sys$monthstep      <- ShoatParam$sys$ylen / 12 / ShoatParam$sys$ylen
ShoatParam$sys$simulationtime <- 24
ShoatParam$sys$nbgoats 		   <- 0
ShoatParam$milk_allowance 	 <- 0.60   # Fraction of the produced milk that is given to the calf.
ShoatParam$max_conc        	 <- 0.40   # Maximum contribution of concentrate to diet of cows as a fraction of the roughage dry matter intake
ShoatParam$calving_rate   	 <- 0.95   # Calving rate (per year)
counter              	 <- 1      # Internal variable

source("LIVSIM_shoat/check_shoat.r")

# Initial conditions - an empty herd.
nb[name]    <-ShoatParam$sys$nbgoats
count_dead <-0
Goats <- define_shoat(0)

# Some modules are fussy over data type (eg string vs int) - register them here after declaration
herdsize_[name] <- 0.0
apsim$expose("herdsize_[name]", "", herdsize_[name])

source("LIVSIM_shoat/livsim_shoat.r")
source("LIVSIM_shoat/potential_intake_shoat.r")
source("LIVSIM_shoat/mortality_shoat.r")
source("LIVSIM_shoat/updategoat_shoat.r")
source("LIVSIM_shoat/potential_growth_shoat.r")
source("LIVSIM_shoat/conception_shoat.r")
source("LIVSIM_shoat/walking_shoat.r")
source("LIVSIM_shoat/nutritive_requirements_shoat.r")
source("LIVSIM_shoat/gestation_shoat.r")
source("LIVSIM_shoat/lactation_shoat.r")
source("LIVSIM_shoat/actual_intake_shoat.r")
source("LIVSIM_shoat/manure_shoat.r")
source("LIVSIM_shoat/balance_check_shoat.r")
source("LIVSIM_shoat/urine_shoat.r")
source("LIVSIM_shoat/define_new_shoat.r")
source("LIVSIM_shoat/shoat_dead.r")
source("LIVSIM_shoat/shoat_replaced.r")

source("LIVSIM_shoat/feed_translation_shoat.r")
```
        on do_stock:
```r
ConcentrateQuality <-ForageQuality <- FeedInput <- AvailableToAnimal <- list()

if (apsim$get("end_month")) {
   cat("[name]: ", ncol(Goats), " in herd\n")
  
   if (length(Goats) > 0) {
    AvailableToAnimal <- getFeedFromAPSIM(FeedSources[name])
    if ([MaizeAmount] > 0 && "maize_residue_store" %in% FeedSources[name]) {
      AvailableToAnimal[["maize_residue_store"]]$ration <- [MaizeAmount] * herdsize_[name]
    } else {
      AvailableToAnimal[["maize_residue_store"]]$ration <- 0
    }
    if ([SorghumAmount] > 0 && "Sorghum_residue_store" %in% FeedSources[name]) {
      AvailableToAnimal[["Sorghum_residue_store"]]$ration <- [SorghumAmount] * herdsize_[name]
    } else {
      AvailableToAnimal[["Sorghum_residue_store"]]$ration <- 0
    }
    if ([GroundnutAmount] > 0 && "Groundnut_residue_store" %in% FeedSources[name]) {
      AvailableToAnimal[["Groundnut_residue_store"]]$ration <- [GroundnutAmount] * herdsize_[name]
    } else {
      AvailableToAnimal[["Groundnut_residue_store"]]$ration <- 0
    }
    if ([MucunaAmount] > 0 && "Mucuna_residue_store" %in% FeedSources[name]) {
      AvailableToAnimal[["Mucuna_residue_store"]]$ration <- [MucunaAmount] * herdsize_[name]
    } else {
      AvailableToAnimal[["Mucuna_residue_store"]]$ration <- 0
    }
    AvailableToAnimal[["magic"]]$ration <- 100000
    numSupplemented <- 0
    for(cownr in 1:ncol(Goats)) {
       if (isSupplemented[name](Goats[,cownr])) {numSupplemented <- numSupplemented + 1}
    }
    nbeforeKids<-ncol(Goats)
    for(cownr in 1:nbeforeKids) {
      New_goat<-matrix()
      Goat<-Goats[,cownr]
      cat("Goat ", cownr, "sex=", ifelse(Goat$char$sex < 0.5, "M", "F"), "age=", round(Goat$char$age,1), "bw=", Goat$char$bw, "\n")
      if(Goat$char$death==0 && Goat$char$replaced==0) {
         ConcentrateAmount <- ifelse(isSupplemented[name](Goat), ConcentrateAmountFemale[name], ConcentrateAmountAllElse[name])
         #for (conc in FeedConcentrates) { AvailableToAnimal[[conc]]$ration <- ConcentrateAmount }
         Diet <- define_diet(AvailableToAnimal, ConcentrateAmount, estimate_pot_intake_[name](Goat), nbeforeKids, numSupplemented)
         source("LIVSIM_shoat/livsim_shoat.r")
         tmp 	<-livsim_shoat(Goat,Goats,ShoatParam,ShoatMgmt,ShoatBreed,Diet,nb[name])
         Goat_new   <-tmp[[1]]
         New_goat   <-tmp[[2]]
         nb[name]   <-tmp[[3]]
         Feed       <-tmp[[4]]
         ShoatParam <-tmp[[5]]
         Kids       <-tmp[[6]]
         rm(tmp)
      } else if(Goat$char$death==1) {
         cat("Shoat has died ", cownr, "bw=", Goat$char$bw, "\n")
         source("LIVSIM_shoat/define_new_shoat.r")
         Goat_new <-define_new_shoat()
         source("LIVSIM_shoat/shoat_dead.r")
         Goat_new	 <- shoat_dead(Goat,Goat_new)
         count_dead <- count_dead+1
      } else if(Goat$char$replaced==1) {
         source("LIVSIM_shoat/define_new_shoat.r")
         Goat_new <-define_new_shoat()
         source("LIVSIM_shoat/shoat_replaced.r")
         Goat_new		   <- shoat_replaced(Goat,Goat_new)
         count_replaced <- count_replaced+1
      } else {
         Goat_new <- Goat
      }
      Goats[,cownr] <- Goat_new
      if(!is.na(New_goat[[1]][2])) {
         Goats<-cbind(Goats,New_goat,deparse.level=0)
      }
    }

    # prune off any fully dead animals 
    deadInHerd <- TRUE
    while (deadInHerd && length(Goats) > 0) {
      deadInHerd <- FALSE
      for(cownr in 1:ncol(Goats)) {
        if(Goats[,cownr]$char$death==2) {
          cat ("Removing dead shoat\n")
          Goats<- as.matrix(Goats[,-cownr])
          deadInHerd <- TRUE
          break
        }
      }
    }
   }

   updateShoatVars()
 
   if (inputdmOf[name] > 0) {
     remaining <- inputdmOf[name]
     done <- vector()
     # Take the highest ranking feeds first
     cat ("[name] eating", round(inputdmOf[name],1), "kg\n")
     while (length(done) < length(names(AvailableToAnimal))) {
        best <- 0; bestclass <- bestsource <- ""
        for (source in names(AvailableToAnimal)) { 
           class <-AvailableToAnimal[[source]]$element.1$CohortID
           if (!source %in% done && FeedRank[[class]] > best) {
              best <- FeedRank[[class]]
              bestclass<-class
              bestsource<-source
           }
        }
        if (bestsource != "") {
          if (feedAttr(bestclass, "type") == 2) {
            # work out the ration fed to entire herd
            amount_kg <-ConcentrateAmountFemale[name] * numSupplemented + ConcentrateAmountAllElse[name] * (herdsize_[name] - numSupplemented)
            amount_kg <- min(remaining, amount_kg)
            AvailableToAnimal[[bestsource]]$ration <- amount_kg 
            eaten <- doDietSelection(amount_kg / AvailableToAnimal[[bestsource]]$area, 
                                  AvailableToAnimal[[bestsource]])
          } else {
            eaten <- doDietSelection(remaining / AvailableToAnimal[[bestsource]]$area, 
                                        AvailableToAnimal[[bestsource]])
          }                            
          removed_kg <- AASum(eaten,"WeightRemoved") * eaten$area
          remaining <- remaining - removed_kg
          cat ("[name] eating", round(removed_kg,1), "kg from", AASum(eaten,"Weight") * eaten$area,"kg of", bestsource, "\n")
          apsim$set(paste(bestsource,"RemovedByAnimal",sep="."), list("RemovedByAnimal", eaten))

          accumName <- paste(bestclass, "_eaten", sep="")
          assign(accumName, removed_kg + get(accumName), envir = .GlobalEnv)
        }
        done<-c(done,bestsource)  
     }
     if (remaining > 0) {
        cat("WARNING - [name] eating more feed (", remaining, " kg) than available!!\n")
     }
   }
   manureCollected[name] <- 0.0
   if (faecdmOf[name] > 0) {
     cat ("Total manure production = " , round(faecdmOf[name],1) , " kg\n");
     doManure[name]([manureRecoveryFract], "[uncollectedManureDest]")
   }
   if ([doOutput]) {
     apsim$publish("livsimoutput.do_output", "Null", list())
   }
}
```
      RLink cows
        # Manure handling
        manureRecoveryFract = 0.3  # Manure Recovery fraction (0-1)
        initialManureStore = 200.0  # Initial amount of stored manure (kg)
        uncollectedManureDest = verges  # Destination of Uncollected Manure (paddock name)
        collectedManureDest = plot1  # Destination of Stored Manure (paddock name)
        # Feeding
        InitialFeedSources = bransupplement Groundnut_residue_store Mucuna_residue_store Sorghum_residue_store maize_residue_store verges.grasp magic  # Initial feed source (module names)
        Concentrates = bran  # Concentrate (feed name)
        ConcentrateAmountFemale = 30  # Amount of concentrate fed to productive females (kg/hd/month)
        ConcentrateAmountAllElse = 0  # Amount of concentrate fed to dry beasts (kg/hd/month)
        MaizeAmount = 45  # Amount of maize residue fed (if available) (kg/hd/month)
        GroundnutAmount = 0  # Amount of groundnut residue fed (if available) (kg/hd/month)
        MucunaAmount = 0  # Amount of mucuna residue fed (if available) (kg/hd/month)
        SorghumAmount = 0  # Amount of sorghum residue fed (if available) (kg/hd/month)
        # Misc
        doOutput = T  # Do output at end of timestep (T/F)
        on my variables:
```
# Variables exported (rw) to apsim
age[name]                # age of each cow in herd
bw[name]                 # BW of each cow
sex[name]                # Sex of each cow
milk[name]               # Milk of each cow
inputdmOf[name]          # Total DM eaten by herd
faecdmOf[name]           # Total manure produced by herd
faecnOf[name]            # Total N in manure produced by herd
milkOf[name]             # Total milk produced by herd
manurestore              # Size of manure store
FeedSources[name]        # The module name we ask for feed from
ConcentrateAmountFemale[name]  # How much concentrate to feed female cows
manureCollected[name]
```
        on init:
```r
# Initialisation 
require( Rcpp )
library(abind)

# see if we've got the livsim code
if (!file.exists("LIVSIM/livsim.r")) {
  msg<-"You need to obtain the LIVSIM source code from Mark.vanWijk@wur.nl\n"
  for (i in 1:10) {cat(msg)} ; flush(stdout());
  apsimFatal(msg)
}

# Manure handling
manurepaddock <- "[collectedManureDest]"
apsim$expose("manurepaddock", "", manurepaddock )

manurestore <- [initialManureStore]
manureNstore <- manurestore * 0.1

# Feed sources & quality
FeedSources[name] <- unlist(strsplit("[InitialFeedSources]", " "))
FeedConcentrates <-unlist(strsplit("[Concentrates]", " "))
ConcentrateAmountFemale[name] <- [ConcentrateAmountFemale]
ConcentrateAmountAllElse[name] <- [ConcentrateAmountAllElse]

# Buy & sell routines. Called by something else in apsim
onBuyCow <- function (args) {
  cat("Buying ",args[["number"]], "x", args[["weight"]], "kg ",args$genotype, "cow(s)\n"); flush.console()

  for (i in 1:args[["number"]]) {
     # Add a shoat to the herd.
     if (length(Cows) > 0) {
       Cows <<- cbind(Cows, Initial_Cows[,1])
     } else {
       Cows <<- as.matrix(Initial_Cows[,1])
     }
     Cows[,ncol(Cows)]$sys$id <<- nb[name]
     Cows[,ncol(Cows)]$sys$damid <<- -1000 - Cows[,ncol(Cows)]$sys$id
     Cows[,ncol(Cows)]$char$age <<- args[["age"]]
     Cows[,ncol(Cows)]$char$lactind <<- 0
     Cows[,ncol(Cows)]$char$pregind <<- 0
     Cows[,ncol(Cows)]$char$death <<-0
     Cows[,ncol(Cows)]$char$feeddeficit <<- 0 
     Cows[,ncol(Cows)]$char$calvind <<- 0 

     if (args[["sex"]] == "m" || args[["sex"]] == "M") {
       Cows[,ncol(Cows)]$char$sex <<- 0
     } else if (args[["sex"]] == "f" || args[["sex"]] == "F") {
       Cows[,ncol(Cows)]$char$sex <<- 1
     } else {
       error(paste("cant determine sex of ", args[["sex"]]))
     }
     Cows[,ncol(Cows)]$char$bw <<- args[["weight"]]
     breed <- CowBreed[[ args$genotype ]]
     for (pname in names(breed)) {
        CowParam[[ pname ]] <<- breed[[ pname ]]
     }
     CowParam$sys$nbCows <<- CowParam$sys$nbCows +1
     nb[name] <<- nb[name]+1
     numCowsBrought <<- numCowsBrought + 1
  }
  updateCowVars()
}
apsim$subscribe("buy[name]", "Buy", "onBuyCow")

onSellCow <- function (args) {
  Cow<-Cows[,args$group]
  cat("Selling Cow", args$group, "sex=", ifelse(Cow$char$sex < 0.5, "M", "F"), "age=", round(Cow$char$age,1), "bw=", Cow$char$bw, "\n")

  numCowsSold <<- numCowsSold + 1
  weightCowsSold <<- weightCowsSold + Cows[,args$group]$char$bw

  Cows <<- as.matrix(Cows[,-args$group])
  CowParam$sys$nbcows <<- CowParam$sys$nbcows - 1
  updateCowVars()
}
apsim$subscribe("sell[name]", "Sell", "onSellCow")

# Update the variables that are exposed to apsim
updateCowVars <- function () {
  inputdmOf[name] <<- 0; faecdmOf[name]<<- 0; faecnOf[name]<<- 0
  bw[name]<<-rep(0, ncol(Cows))
  age[name]<<-rep(0, ncol(Cows))
  sex[name]<<-rep("", ncol(Cows))
  inputdm[name] <<- rep(0, ncol(Cows))
  faecdm[name] <<- rep(0, ncol(Cows))
  faecn[name] <<- rep(0, ncol(Cows))
  milk[name] <<- rep(0, ncol(Cows))
  herdsize_[name] <<- 0
  if (length(Cows) > 0 ) {
    cow <- 1
    for(cownr in 1:ncol(Cows)) {
      if (Cows[,cownr]$char$death == 0) {
        bw[name][cow] <<- Cows[,cownr]$char$bw
        age[name][cow] <<- Cows[,cownr]$char$age
        if (Cows[,cownr]$char$sex < 0.5) {
           sex[name][cow] <<- "M"
        } else {
           if (Cows[,cownr]$char$calvind > 0 && Cows[,cownr]$char$calvind<= CowParam$lact$maxlength * CowParam$sys$monthstep && 
              Cows[,cownr]$char$feeddeficit==0 && Cows[,cownr]$char$lactind>=0.01) {              
             sex[name][cow] <<- "FL"
           } else {
             sex[name][cow] <<- "F"
           }
        }
        inputdm[name][cow] <<- Cows[,cownr]$input$dm
        faecdm[name][cow] <<- Cows[,cownr]$out$faecdm
        faecn[name][cow] <- Cows[,cownr]$out$faecn
        milk[name][cow] <- Cows[,cownr]$out$milk
        cow<-cow+1
      }
    }
    inputdmOf[name] <<- sum(inputdm[name])
    faecdmOf[name] <<- sum(faecdm[name])
    faecnOf[name] <<- sum(faecn[name])
    milkOf[name] <<- sum(milk[name])
    herdsize_[name] <<- ncol(Cows)
  }
}

bw[name] <- vector()
age[name] <- vector()
sex[name] <- vector()
inputdm[name] <- vector()
faecdm[name] <- vector()
faecn[name] <- vector()
milk[name] <- vector()
inputdmOf[name] <- 0
faecdmOf[name] <- 0
faecnOf[name] <- 0
milkOf[name] <- 0
manurearea <- 0

## APSIM specific routines                 
dumpit <- function(list) {  if (class(list) == "list") {dumpit2("", list)} else {
 if (length(dim(list) > 1)) {
   for (i in 1:nrow(list)) {cat (list[i,],"\n")}
 }else{  
  cat(list,"\n")
 } 
}}

dumpit2 <- function(prefix, list) {
  for (x in names(list)) {
    if (class(list[[x]]) == "list") {
      dumpit2(paste(prefix,"$",x), list[[x]])
    } else if (length(dim(list[[x]]) > 1)) {
      cat(prefix, "$", x, "=", nrow(list[[x]]),"x",ncol(list[[x]]), ":\n")
       for (i in 1:nrow(list[[x]])) {cat ( list[[x]][i,],"\n")}
    } else {
      cat(prefix, "$", x, "=", list[[x]], "\n")
    }
  }
}

# FIXME!
isSupplemented[name] <- function (cow) {
  return ((cow$char$age>=0 && cow$char$age<=0.25) ||
           (cow$char$age>3 && cow$out$milk>0.001))
}

# Deal with manure production. Some may be stored for later application to a cropping paddock
manureCollected[name] <- 0.0
doManure[name] <- function (recoveryFract, uncollectedDest) { 
   manureCollected[name] <<- faecdmOf[name] * recoveryFract
   manureNCollected <- faecnOf[name] * recoveryFract

   cat ("Collected manure (stored) = " , round(manureCollected[name],0) , " kg,", round(manureNCollected,1), "kg N \n");
   manurestore <<- manurestore + manureCollected[name]
   manureNstore <<- manureNstore + manureNCollected

   area<-as.numeric(apsim$get(paste(uncollectedDest, "_area",sep="")))
   manureUnCollectedKgHa <- faecdmOf[name] *
           (1.0 - recoveryFract) / area

   manureNUnCollectedKgHa <- faecnOf[name] *
           (1.0 - recoveryFract) / area

   cat ("UnCollected manure (added to", uncollectedDest, "SOM pool) = " , 
          round(manureUnCollectedKgHa,0) , " kg/ha,", round(manureNUnCollectedKgHa,1), "kg/ha N \n")

   apsim$publish(paste(uncollectedDest,".SurfaceOrganicMatter.AddFaeces",sep=""),
                 "AddFaeces", list(OMWeight=manureUnCollectedKgHa, OMN=manureNUnCollectedKgHa, OMP=0))
   manurearea  <<- as.numeric(apsim$get(paste("area.", manurepaddock, "_area",sep="")))
}

# Apply any stored manure to nominated paddock when asked to
onApplyStoredManure <- function () {
  manurearea  <- as.numeric(apsim$get(paste( manurepaddock, "_area",sep=""))) 
  if (manurearea > 0 && manurestore > 0) {
    cat ("Applying", manurestore, "kg manure to", manurepaddock, "SOM pool over", manurearea, "ha\n")

    manureAppliedKgHa <- manurestore / manurearea
    manureNAppliedKgHa <- manureNstore / manurearea

    if (manureAppliedKgHa  > 0) {
      apsim$publish(paste (manurepaddock,".SurfaceOrganicMatter.AddFaeces", sep=""),
                   "AddFaeces", list(OMWeight=manureAppliedKgHa , OMN=manureNAppliedKgHa , OMP=0))
    }
  }
  manurestore <<- 0.0
  manureNstore<<- 0.0
}
apsim$subscribe("ApplyStoredManure", "NULL", "onApplyStoredManure")

title <- apsim$get("title")

estimate_pot_intake_[name]<-function(Cow)
  {
  min_dmd<-0.7
  if (Cow$char$sex==1) {
     coefIntake<- 1 ; #??approx(CowParam$lact$milkfatlp,CowParam$bw$intlact,Cow$char$lactind)
  } else {
     coefIntake<-1
  }
  Intake_forages<-(0.0107 * Cow$char$bw / (1 - min_dmd)) * 30.4 * coefIntake
  return(Intake_forages)
}

#-------------------LivSim-------------------
# Step 1: Initialise
#-------------------Reading input for LivSim-------------------
source("LIVSIM/input/input_livsim.r")
tmp <-input_livsim()
Initial_Cows <-tmp[[1]]
CowBreed  <-tmp[[2]]
CowParam	<-tmp[[3]]
CowMgmt	   <-tmp[[4]]
rm(tmp)

#--------------------------------Setting auxiliary variables-------------------------
CowParam$sys$ylen 		 	   <- 365
CowParam$sys$timestep 	 	 <- CowParam$sys$tfactor / CowParam$sys$ylen
CowParam$sys$simulationstep <- 12
CowParam$sys$monthstep      <- CowParam$sys$ylen / 12 / CowParam$sys$ylen
CowParam$sys$simulationtime <- 24
CowParam$sys$nbcows 		   <- 0
CowParam$milk_allowance 	 <- 0.60   # Fraction of the produced milk that is given to the calf.
CowParam$max_conc        	 <- 0.40   # Maximum contribution of concentrate to diet of cows as a fraction of the roughage dry matter intake
CowParam$calving_rate   	 <- 0.95   # Calving rate (per year)
counter              	 <- 1      # Internal variable

source("LIVSIM/check.r")

# Initial conditions - an empty herd.
nb[name]    <-CowParam$sys$nbcows
count_dead <-0

source("LIVSIM/input/define_cows.r")
Cows <- define_cows(0)

# Some modules are fussy over data type (eg string vs int) - register them here after declaration
herdsize_[name] <- 0.0
apsim$expose("herdsize_[name]", "", herdsize_[name])

source("LIVSIM/livsim.r")
source("LIVSIM/feed_translation.r")
source("LIVSIM/parameters.r")
source("LIVSIM/potential_intake.r")
source("LIVSIM/mortality.r")
source("LIVSIM/updatecow.r")
source("LIVSIM/potential_growth.r")
source("LIVSIM/calving.r")
source("LIVSIM/conception.r")
source("LIVSIM/walking.r")
source("LIVSIM/nutritive_requirements.r")
source("LIVSIM/gestation.r")
source("LIVSIM/lactation.r")
source("LIVSIM/actual_intake.r")
source("LIVSIM/manure.r")
source("LIVSIM/balance_check.r")
source("LIVSIM/urine.r")
source("LIVSIM/define_Cow_new.r")
source("LIVSIM/cow_dead.r")
source("LIVSIM/cow_replaced.r")
```
        on do_stock:
```r
ConcentrateQuality <-ForageQuality <- FeedInput <- AvailableToAnimal <- list()

if (apsim$get("end_month")) {
   cat("[name]: ", ncol(Cows), " in herd\n")
  
   if (length(Cows) > 0) {
    AvailableToAnimal <- getFeedFromAPSIM(FeedSources[name])
    if ([MaizeAmount] > 0 && "maize_residue_store" %in% FeedSources[name]) {
      AvailableToAnimal[["maize_residue_store"]]$ration <- [MaizeAmount] * herdsize_[name]
    } else {
      AvailableToAnimal[["maize_residue_store"]]$ration <- 0
    }
    if ([SorghumAmount] > 0 && "Sorghum_residue_store" %in% FeedSources[name]) {
      AvailableToAnimal[["Sorghum_residue_store"]]$ration <- [SorghumAmount] * herdsize_[name]
    } else {
      AvailableToAnimal[["Sorghum_residue_store"]]$ration <- 0
    }
    if ([GroundnutAmount] > 0 && "Groundnut_residue_store" %in% FeedSources[name]) {
      AvailableToAnimal[["Groundnut_residue_store"]]$ration <- [GroundnutAmount] * herdsize_[name]
    } else {
      AvailableToAnimal[["Groundnut_residue_store"]]$ration <- 0
    }
    if ([MucunaAmount] > 0 && "Mucuna_residue_store" %in% FeedSources[name]) {
      AvailableToAnimal[["Mucuna_residue_store"]]$ration <- [MucunaAmount] * herdsize_[name]
    } else {
      AvailableToAnimal[["Mucuna_residue_store"]]$ration <- 0
    }
    AvailableToAnimal[["magic"]]$ration <- 100000
    numSupplemented <- 0
    for(cownr in 1:ncol(Cows)) {
       if (isSupplemented[name](Cows[,cownr])) {numSupplemented <- numSupplemented + 1}
    }
    nbeforeCalves<-ncol(Cows)
    for(cownr in 1:nbeforeCalves) {
      New_cow<-matrix()
      cow<-Cows[,cownr]
      cat("cow ", cownr, "sex=", ifelse(cow$char$sex < 0.5, "M", "F"), "age=", round(cow$char$age,1), "bw=", cow$char$bw, "\n")
      if(cow$char$death==0 && cow$char$replaced==0) {
         ConcentrateAmount <- ifelse(isSupplemented[name](cow), ConcentrateAmountFemale[name], ConcentrateAmountAllElse[name])
         #for (conc in FeedConcentrates) { AvailableToAnimal[[conc]]$ration <- ConcentrateAmount }
         Diet <- define_diet(AvailableToAnimal, ConcentrateAmount, estimate_pot_intake_[name](cow), nbeforeCalves, numSupplemented)
         source("LIVSIM/livsim.r")
         tmp 	<-livsim(cow,Cows,CowParam,CowMgmt,CowBreed,Diet,nb[name])
         cow_new   <-tmp[[1]]
         New_cow   <-tmp[[2]]
         nb[name]    <-tmp[[3]]
         Feed       <-tmp[[4]]
         CowParam <-tmp[[5]]
         Calves     <-tmp[[6]]
         rm(tmp)
      } else if(cow$char$death==1) {
         cat("Cow has died ", cownr, "bw=", cow$char$bw, "\n")
         source("LIVSIM/define_Cow_new.r")
         cow_new <-define_Cow_new()
         source("LIVSIM/cow_dead.r")
         cow_new	 <- cow_dead(cow,cow_new)
         count_dead <- count_dead+1
      } else if(cow$char$replaced==1) {
         source("LIVSIM/define_Cow_new.r")
         cow_new <-define_Cow_new()
         source("LIVSIM/cow_replaced.r")
         cow_new		   <- cow_replaced(cow,cow_new)
         count_replaced <- count_replaced+1
      } else {
         cow_new <- cow
      }
      Cows[,cownr] <- cow_new
      if(!is.na(New_cow[[1]][2])) {
         Cows<-cbind(Cows,New_cow,deparse.level=0)
      }
    }

    # prune off any fully dead animals 
    deadInHerd <- TRUE
    while (deadInHerd && length(Cows) > 0) {
      deadInHerd <- FALSE
      for(cownr in 1:ncol(Cows)) {
        if(Cows[,cownr]$char$death==2) {
          cat ("Removing dead cow\n")
          Cows<- as.matrix(Cows[,-cownr])
          deadInHerd <- TRUE
          break
        }
      }
    }
   }

   updateCowVars()
 
   if (inputdmOf[name] > 0) {
     remaining <- inputdmOf[name]
     done <- vector()
     # Take the highest ranking feeds first
     cat ("[name] eating", round(inputdmOf[name],1), "kg\n")
     while (length(done) < length(names(AvailableToAnimal))) {
        best <- 0; bestclass <- bestsource <- ""
        for (source in names(AvailableToAnimal)) { 
           class <-AvailableToAnimal[[source]]$element.1$CohortID
           if (!source %in% done && FeedRank[[class]] > best) {
              best <- FeedRank[[class]]
              bestclass<-class
              bestsource<-source
           }
        }
        if (bestsource != "") {
          if (feedAttr(bestclass, "type") == 2) {
            amount_kg <-ConcentrateAmountFemale[name] * numSupplemented + ConcentrateAmountAllElse[name] * (herdsize_[name] - numSupplemented)
            amount_kg <- min(remaining, amount_kg)  
            AvailableToAnimal[[bestsource]]$ration <- amount_kg
            eaten <- doDietSelection(amount_kg / AvailableToAnimal[[bestsource]]$area, 
                                  AvailableToAnimal[[bestsource]])
          } else {
            eaten <- doDietSelection(remaining / AvailableToAnimal[[bestsource]]$area, 
                                        AvailableToAnimal[[bestsource]])
          }                            
          removed_kg <- AASum(eaten,"WeightRemoved") * eaten$area
          remaining <- remaining - removed_kg
          cat ("[name] eating", round(removed_kg,1), "kg from", AASum(eaten,"Weight") * eaten$area,"kg of", bestsource, "\n")
          apsim$set(paste(bestsource,"RemovedByAnimal",sep="."), list("RemovedByAnimal", eaten))

          accumName <- paste(bestclass, "_eaten", sep="")
          assign(accumName, removed_kg + get(accumName), envir = .GlobalEnv)
        }
        done<-c(done,bestsource)  
     }
     if (remaining > 0) {
        cat("WARNING - [name] eating more feed (", remaining, " kg) than available!!\n")
     }
   }

   manureCollected[name] <- 0.0
   if (faecdmOf[name] > 0) {
     cat ("Total manure production = " , round(faecdmOf[name],1) , " kg\n")
     doManure[name]([manureRecoveryFract], "[uncollectedManureDest]")
   }
   if ([doOutput]) {
     apsim$publish("livsimoutput.do_output", "Null", list())
   }
}
```
      RLink Ind Tracker
        on init:
```r
#Save a file of each individual animal's growth curve. Used for custom chart

indivCows<-NULL
indivGoats<-NULL
```
        on do_stock:
```r
if (apsim$get("end_month")) {
  today<-paste(apsim$get("dd_mmm"), apsim$get("year"), sep="_") 
  if (length(Cows) > 0) {
    for(cownr in 1:ncol(Cows)) {
      indivCows <- rbind(indivCows,  c(today, Cows[,cownr]$sys$id, Cows[,cownr]$char$bw))
    }
  }
  if (length(Goats) > 0) {
    for(cownr in 1:ncol(Goats)) {
      indivGoats <- rbind(indivGoats,  c(today, Goats[,cownr]$sys$id, Goats[,cownr]$char$bw))
    }
  }
}
```
        on end_simulation:
```r
if (length(indivCows) > 0) {
  indivCows <- as.data.frame(indivCows)
  names(indivCows) <- c("date","id", "Weight")
  indivCows$date <- as.Date(indivCows$date, "%d_%b_%Y")
  indivCows$id<-as.numeric(as.character(indivCows$id))
  indivCows$Weight<-as.numeric(as.character(indivCows$Weight))
  write.csv(indivCows , file=paste(apsim$get("title"),"individual Cows.csv"),row.names=F)
}
 
if (length(indivGoats) > 0) {
  indivGoats <- as.data.frame(indivGoats)
  names(indivGoats) <- c("date","id", "Weight")
  indivGoats$date <- as.Date(indivGoats$date, "%d_%b_%Y")
  indivGoats$id<-as.numeric(as.character(indivGoats$id))
  indivGoats$Weight<-as.numeric(as.character(indivGoats$Weight))
  write.csv(indivGoats , file=paste(apsim$get("title"),"individual Goats.csv"),row.names=F)
}
```
      RLink Run Summary
        on init:
```r
# Run summary

# number of kids/cows sold
numCowsSold <- 0
numShoatsSold <- 0
numCowsBrought <- 0
numShoatsBrought <- 0
# weight of kids/cows sold
weightCowsSold <- 0
weightShoatsSold <- 0
# milk of kids/cows sold
milkCowsProduced <- 0
milkShoatsProduced <- 0
# manure 
manureCollectedTotal <- 0
```
        on do_stock:
```r
if (apsim$get("end_month")) {
  if (length(Cows) > 0) {
    for(cownr in 1:ncol(Cows)) {
       milkCowsProduced  <- milkCowsProduced  + Cows[,cownr]$out$milk
    }
  }
  if (length(Goats) > 0) {
    for(cownr in 1:ncol(Goats)) {
       milkShoatsProduced  <- milkShoatsProduced  + Goats[,cownr]$out$milk
    }
  }
  manureCollectedTotal <- manureCollectedTotal + manureCollectedcows + manureCollectedshoats
}
```
        on end_simulation:
```
cat("\"numCowsBrought\",\"numCowsSold\",\"numShoatsBrought\",\"numShoatsSold\",\"weightCowsSold\",\"weightShoatsSold\",\"milkCowsProduced\",\"milkShoatsProduced\",\"manureCollectedTotal\"\n",
  numCowsBrought, ",",numCowsSold, ",", numShoatsBrought, ",",numShoatsSold, ",",weightCowsSold, ",",weightShoatsSold,",",milkCowsProduced,",",milkShoatsProduced,",",manureCollectedTotal,"\n", 
  file=paste(apsim$get("title"),"run summary.csv") )
```
    area plot1
      surfaceom SurfaceOrganicMatter
        PoolName = maize_stubble  # Organic Matter pool name
        type = maize  # Organic Matter type
        mass = 100.  # Initial surface residue (kg/ha)
        cnr = 80.0  # C:N ratio of initial residue
        standing_fraction = 0.0  # Fraction of residue standing
      fertiliser
      maize
      sorghum
      peanut
      mucuna
      weed
      canopy
        intercrop = maize sorghum peanut mucuna weed  # Enter crop names to intercrop
      erosion
        model = freebairn  # Model Name
        slope = 0.5  # Slope of plot in percent (%)
        slope_length = 60.0  # Length of plot (m)
        k_factor = 0.4  # Soil erodibility factor (t/ha/EI 30 )
        p_factor = 1.0  # Supporting practise factor (unitless)
        bed_depth = 1900  # Depth to bedrock (mm)
        profile_reduction = off
        profile_layer_merge = 0.05  # Fraction of original size in which the lowest layer is merged into the layer above (0-1)
        minimum_depth = 100.0  # If the profile erodes to this depth, the simulation is stopped (mm)
      Soil: Latitude=0; Longitude=0
        DataSource:
          Dr Merv E Probert, CSIRO Sustainable Ecosystems, St. Lucia, Qld, Australia
          Merv.Probert@csiro.au
        Water
          Thickness  BD    AirDry  LL15  DUL   SAT
          150        1.1   0.14    0.22  0.35  0.5
          150        1.22  0.2     0.24  0.38  0.49
          300        1.31  0.28    0.28  0.4   0.46
          300        1.23  0.3     0.3   0.37  0.48
          300        1.19  0.3     0.3   0.36  0.5
          SoilCrop maize: LL=[0.22, 0.24, 0.28, 0.3, 0.3]; KL=[0.12, 0.12, 0.1, 0.08, 0.07]; XF=[1, 1, 1, 1, 0]
          SoilCrop millet: LL=[0.22, 0.24, 0.28, 0.3, 0.3]; KL=[0.12, 0.12, 0.1, 0.08, 0.07]; XF=[1, 1, 1, 1, 0]
          SoilCrop weed: LL=[0.22, 0.24, 0.28, 0.3, 0.3]; KL=[0.12, 0.12, 0.1, 0.08, 0.07]; XF=[1, 1, 1, 1, 0]
          SoilCrop peanut: LL=[0.22, 0.24, 0.28, 0.3, 0.3]; KL=[0.12, 0.12, 0.1, 0.08, 0.07]; XF=[1, 1, 1, 1, 0]
          SoilCrop pigeonpea: LL=[0.22, 0.24, 0.28, 0.3, 0.3]; KL=[0.12, 0.12, 0.1, 0.08, 0.07]; XF=[1, 1, 1, 1, 0]
          SoilCrop mucuna: LL=[0.22, 0.24, 0.28, 0.3, 0.3]; KL=[0.12, 0.12, 0.1, 0.08, 0.07]; XF=[1, 1, 1, 1, 0]
          SoilCrop sorghum: LL=[0.22, 0.24, 0.28, 0.3, 0.3]; KL=[0.12, 0.12, 0.1, 0.08, 0.07]; XF=[1, 1, 1, 1, 0]
        SoilWater: Thickness=[150, 150, 300, 300, 300]; SWCON=[0.5, 0.5, 0.5, 0.5, 0.5]
          SummerCona = 6
          SummerU = 1.5
          SummerDate = 1-Nov
          WinterCona = 6
          WinterU = 1.5
          WinterDate = 1-Apr
          DiffusConst = 88
          DiffusSlope = 35
          Salb = 0.13
          CN2Bare = 85
          CNRed = 20
          CNCov = 0.8
        SoilOrganicMatter: RootCN=40; RootWt=500; SoilCN=12; EnrACoeff=7.4; EnrBCoeff=0.2
          Thickness  OC   FBiom  FInert
          150        1    0.03   0.35
          150        0.8  0.015  0.7
          300        0.5  0.01   0.8
          300        0.3  0.01   0.9
          300        0.1  0.01   0.95
        Analysis: PHUnits=Water; BoronUnits=HotWater
          Thickness  PH  Boron  CEC
          150        6   1.8    5.1
          150        6   1      5.1
          300        6   0.72   5.1
          300        6   0.57   5.1
          300        6   0.45   5.1
        InitialWater: FractionFull=0.8; PercentMethod=FilledFromTop; RelativeTo=ll15
        Sample Initial nitrogen: NO3Units=kgha; NH4Units=kgha; SWUnits=Volumetric; OCUnits=Total; PHUnits=Water
          Thickness  NO3  NH4
          200        7    3
          1800       3    2
      tracker
        variable:
          average of cover_surface_runoff on end_of_day from lr_start to lr_end as avg_cover
          average of carbon_tot() on end_of_day from start_year to now as avg_carbon
    area plot2: same as LivsimSample.plot1
    area plot3: same as LivsimSample.plot1
    area verges
      surfaceom SurfaceOrganicMatter
        PoolName = maize_stubble  # Organic Matter pool name
        type = maize  # Organic Matter type
        mass = 400.  # Initial surface residue (kg/ha)
        cnr = 80.0  # C:N ratio of initial residue
        standing_fraction = 0.0  # Fraction of residue standing
      fertiliser
      erosion: same as LivsimSample.plot1.Erosion
      Soil: Latitude=0; Longitude=0
        DataSource:
          Dr Merv E Probert, CSIRO Sustainable Ecosystems, St. Lucia, Qld, Australia
          Merv.Probert@csiro.au
        Water
          Thickness  BD    AirDry  LL15  DUL   SAT
          150        1.1   0.14    0.22  0.35  0.5
          150        1.22  0.2     0.24  0.38  0.49
          300        1.31  0.28    0.28  0.4   0.46
          SoilCrop maize: LL=[0.22, 0.24, 0.28]; KL=[0.12, 0.12, 0.1]; XF=[1, 1, 1]
          SoilCrop millet: LL=[0.22, 0.24, 0.28]; KL=[0.12, 0.12, 0.1]; XF=[1, 1, 1]
          SoilCrop weed: LL=[0.22, 0.24, 0.28]; KL=[0.12, 0.12, 0.1]; XF=[1, 1, 1]
          SoilCrop peanut: LL=[0.22, 0.24, 0.28]; KL=[0.12, 0.12, 0.1]; XF=[1, 1, 1]
          SoilCrop pigeonpea: LL=[0.22, 0.24, 0.28]; KL=[0.12, 0.12, 0.1]; XF=[1, 1, 1]
          SoilCrop sorghum: LL=[0.22, 0.24, 0.28]; KL=[0.12, 0.12, 0.1]; XF=[1, 1, 1]
        SoilWater: Thickness=[150, 150, 300]; SWCON=[0.5, 0.5, 0.5]
          SummerCona = 6
          SummerU = 1.5
          SummerDate = 1-Nov
          WinterCona = 6
          WinterU = 1.5
          WinterDate = 1-Apr
          DiffusConst = 88
          DiffusSlope = 35
          Salb = 0.13
          CN2Bare = 85
          CNRed = 20
          CNCov = 0.8
        SoilOrganicMatter: RootCN=40; RootWt=500; SoilCN=12; EnrACoeff=7.4; EnrBCoeff=0.2
          Thickness  OC   FBiom  FInert
          150        0.1  0.03   0.35
          150        0.1  0.015  0.7
          300        0.1  0.01   0.8
          300        0.1  0.01   0.9
          300        0.1  0.01   0.95
        Analysis
          Thickness  PH  Boron  CEC
          150        6   1.8    5.1
          150        6   1      5.1
          300        6   0.72   5.1
        InitialWater: RelativeTo=ll15; FractionFull=0.8; PercentMethod=FilledFromTop
        Sample Initial nitrogen: NO3Units=kgha; NH4Units=kgha
          Thickness  NO3  NH4
          200        7    3
          1800       3    2
      grasp
        root_depth_init = 750  # Initial depth of roots (mm)
        dm_dead_leaf_init = 150  # Initial Dead Leaf weight (kg/ha)
        dm_dead_stem_init = 80  # Initial Dead Stem weight (kg/ha)
        dm_dead_root_init = 80  # Initial Dead Root weight (kg/ha)
        dm_green_leaf_init = 850  # Initial Green Leaf weight (p135, kg/ha)
        dm_green_stem_init = 150  # Initial Green Stem weight (p136, kg/ha)
        dm_green_root_init = 250  # Initial Green Root weight (kg/ha)
        basal_area_init = 0.8  # Initial Basal area of tussocks (p005, %)
        acc_trans_for_n_init = 50  # Initial accumulated transpiration, used for N uptake (mm)
        acc_growth_for_n_init = 50  # Initial accumulated growth, used for N uptake (kg/ha)
        max_n_avail = 6  # Limit to total N (p099, kg/year)
        max_n_avail_dist = 0.8 0.1 0.05  0.05  0.0 0.0  # Distribution of N in profile
        ll = 0.22 0.24 0.28 0.30 0.30  # Lower limit (ll) of water extraction (mm/mm)
        kl = 0.5     0.5    0.5   0.5  0.0  0.0  # Rate of water extraction (kl)
        kl2rlv = 1.0
        crop_type = grass
        uptake_source = calc
        height_max = 1200  # Maximum canopy height (mm)
        hgt_vpd_screen = 200  # Height at which surface effects on vpd are 0 (p095*10, mm)
        height_1000kg = 100  # Sward Height per tonne (p096*10, mm)
        et_use_efficiency = 0  # Evapotranspiration use efficiency used in BA calc (p288, kg/ha/mm) (p288)
        frac_leaf2total = 0.5  # Fraction of total dm produced that goes into leaf pool (p123,0-1)
        yld_cover_slope = 0.693147  # Shape of exponential curve relating yield and cover
        yld_fpc50 = 1200  # yld_fpc50 (p046)
        yld_cov50 = 1500  # Yield transpiring at 50% of pan evap (p045)
        yld_tcov50 = 1500  # Tsdm yield at which cover for runoff is 50% (p271)
        swi_fullgreen = 0.1  # Min soil water for 100% green (p009)
        swi_nogrow = 0.4  # SWI when growth stops (swi_nogrow)
        pot_regrow = 3.0  # Max rate regrowth from tussocks (p006, kg/ha/unit grass ba)
        te_std = 10.0  # Transpiration efficiency at vpd=20mb (p007)
        rad_factor = 8.97
        residual_plant_N = 5  # Always this much n in plant (p097, kg/ha)
        litter_n = 0.3  # N conc of detached stems and roots ((p110-p111)/2)
        n_uptk_per100 = 5  # Nitrogen uptake per 100mm water (p098, kg/ha)
        frost_start = 2  # Minimum screen temp at which green cover=100% (p125, oC)
        frost_kill = 0  # Minimum screen temp at which frost kills all green (p011, oC)
        death_slope = 0.013  # Rate of green death per soil water (p051)
        death_intercept = 0.002  # Background death rate (p010)
        leaf_death_ratio = 1  # Proportion of leaf death to total death (p133)
        stem_death_ratio = 1  # Proportion of stem death to total death (p134)
        n_conc_dm_crit = 2.5  # Level of plant N at which no N stress occurs (p102)
        n_conc_dm_min = 0.4  # Level of soil N at which no N stress occurs (p101)
        n_conc_dm_max = 0.5  # Level of soil N at which soil N to high for growth (p100)
        stem_thresh = 0  # stem_thresh (p124)
        detach_dryseason = 0.0   0.008     0.008  # detach_dryseason: root, leaf, stem
        detach_wetseason = 0.0   0.008     0.008  # detach_wetseason: root, leaf, stem
        day_start_summer = 335
        day_end_summer = 59
        acc_et_reset = 273
        acc_growth_reset = 273
        trans_for_n_reset = 273
        growth_for_n_reset = 273
        day_start_wet = 274
        day_start_dry = 91
        enr_a_coeff = 7.4
        enr_b_coeff = 0.2
      manager Establish pasture
        on start_simulation:
```
grasp establish init_section = establishment
```
      tracker
        variable:
          average of cover_surface_runoff on end_of_day from lr_start to lr_end as avg_cover
          average of carbon_tot() on end_of_day from start_year to now as avg_carbon
    outputfile LivsimOutput: filename=Sample LivsimOutput.out; title=Sample LivsimOutput
      variables
        variables: dd/mm/yyyy as Date, herdsize_shoats, herdsize_cows, inputdmOfShoats, faecdmOfShoats, milkOfShoats, inputdmOfCows, faecdmOfCows, milkOfCows, grass_eaten, maize_eaten, bran_eaten, sorghum_eaten, mucuna_eaten, resd_eaten, store
    RGraphics Goat Growth Curves
```r
library(ggplot2)

default<-  theme(
       axis.line = element_line(colour = "black"),
       panel.grid.major = element_blank(),
       panel.grid.minor = element_blank(),
       panel.border = element_blank(),
       panel.background = element_blank() )

d<-read.csv("Mavona individual Goats.csv")
d$date<-as.Date(d$date)
for (id in unique(d$id)) {
  d$age[d$id==id] <- (d$date[d$id==id] - min(d$date[d$id==id])) / 365.25
}

#breeders <- unique(d$id[d$age > 2.5])
#d<- d[!d$id %in% breeders,]

#Ignore the first 6 (initial) goats
#d<- d[!d$id %in% 0:4,]

jpeg(imageFileName, width=width, height=height)
g<-ggplot(data=d,aes(x=age,y=Weight,group=id)) + geom_line() + default
print(g)
dev.off()
```
    RGraphics Cow Growth Curves
```r
library(ggplot2)

default<-  theme(
       axis.line = element_line(colour = "black"),
       panel.grid.major = element_blank(),
       panel.grid.minor = element_blank(),
       panel.border = element_blank(),
       panel.background = element_blank() )

d<-read.csv("Mavona individual Cows.csv")
d$date<-as.Date(d$date)
for (id in unique(d$id)) {
  d$age[d$id==id] <- (d$date[d$id==id] - min(d$date[d$id==id])) / 365.25
}

#Ignore the first 1 (initial) cow
#d<- d[!d$id %in% 0:1,]


jpeg(imageFileName, width=width, height=height)
g<-ggplot(data=d,aes(x=age,y=Weight,group=id)) + geom_line() + default
print(g)
dev.off()
```
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