folder simulations: version=32
  simulation MultiPaddock
    metfile met: filename=%apsim%/Examples/MetFiles/Goond.met
    clock
      start_date = 1/01/1940  # Enter the start date of the simulation
      end_date = 31/01/1940  # Enter the end date of the simulation
    summaryfile
    manager2 Manager
```vb
Imports System
Imports ModelFramework

Public Class Script
   
   <Link()> Dim MyPaddock As Paddock
   
   <EventHandler()> Public Sub OnPost()

      ' Loop through all child paddocks and change the soil water in each.
      For Each SubPaddock As Paddock In MyPaddock.ChildPaddocks
         Dim SoilWater As SoilWat = SubPaddock.LinkByType("SoilWat")
         Dim sw As Single() = SoilWater.sw
         Console.WriteLine(SubPaddock.FullName + "-" + sw(0).ToString())
         SoilWater.sw = sw
      Next

      ' Loop through all child paddocks and write the names and LAIs of all crops.
      For Each SubPaddock As Paddock In MyPaddock.ChildPaddocks
         For Each Crop As Component In SubPaddock.Crops
            Console.WriteLine(Crop.Name)
         Next
      Next

      ' Loop through all child paddocks and apply fertilier
      ' And irrigation to each paddock.
      For Each SubPaddock As Paddock In MyPaddock.ChildPaddocks
         Dim Fertiliser As Fertiliser = SubPaddock.LinkByType("Fertiliser")
         Dim Irrigation As Irrigation = SubPaddock.LinkByType("Irrigation")
         Dim fert As FertiliserApplicationType = New FertiliserApplicationType()
         fert.Amount = 50
         fert.Depth = 10
         fert.Type = "NO3_N"
         Fertiliser.Apply(fert)
         Dim irrig As IrrigationApplicationType = New IrrigationApplicationType()
         irrig.Amount = 50
         irrig.Duration = 0
         irrig.time = ""
         ReDim irrig.source(-1)
         irrig.Crop_Area = 0
         irrig.NO3 = 0
         irrig.NH4 = 0
         irrig.CL = 0
         Irrigation.Apply(irrig)
      Next
   End Sub


End Class
```
    area paddock1
      soil: LocalName=Waco; Site=Jimbour; Region=South East Queensland
        SoilType = Black Vertosol  # Soil description
        NearestTown = Jimbour, Q 4352
        NaturalVegetation = Grassland, mainly Qld bluegrass
        InitWater Initial water
          percentmethod: percent=1; distributed=filled from top
        Water
          Layer:
            Thickness (mm)  BD (g/cc)  AirDry (mm/mm)  LL15 (mm/mm)  DUL (mm/mm)  SAT (mm/mm)
            150             1.02       0.15            0.29          0.54         0.59
            150             1.03       0.26            0.29          0.53         0.58
            300             1.02       0.29            0.29          0.54         0.59
            300             1.02       0.29            0.29          0.54         0.58
            300             1.06       0.3             0.3           0.52         0.57
            300             1.11       0.31            0.31          0.5          0.55
            300             1.12       0.32            0.32          0.5          0.55
            300             1.15       0.33            0.33          0.48         0.53
            300             1.18       0.34            0.34          0.47         0.52
            300             1.2        0.35            0.35          0.46         0.51
            300             1.25       0.36            0.36          0.44         0.49
          SoilCrop Barley
            Layer:
              Thickness (mm)  LL (mm/mm)  KL (/day)  XF (0-1)
              150             0.29        0.1        1
              150             0.29        0.1        1
              300             0.32        0.08       1
              300             0.38        0.06       1
              300             0.39        0.04       1
              300             0.39        0.02       1
              300             0.41        0.01       1
              300             0.48        0          0
              300             0.47        0          0
              300             0.46        0          0
              300             0.44        0          0
          SoilCrop Chickpea
            Layer:
              Thickness (mm)  LL (mm/mm)  KL (/day)  XF (0-1)
              150             0.29        0.1        1
              150             0.29        0.1        1
              300             0.36        0.08       1
              300             0.43        0.06       1
              300             0.51        0.04       1
              300             0.5         0.02       1
              300             0.5         0.01       1
              300             0.48        0          0
              300             0.47        0          0
              300             0.46        0          0
              300             0.44        0          0
          SoilCrop Lucerne
            Layer:
              Thickness (mm)  LL (mm/mm)  KL (/day)  XF (0-1)
              150             0.29        0.1        1
              150             0.29        0.1        1
              300             0.29        0.1        1
              300             0.29        0.1        1
              300             0.3         0.09       1
              300             0.31        0.09       1
              300             0.32        0.09       1
              300             0.33        0.09       1
              300             0.34        0.09       1
              300             0.35        0.09       1
              300             0.36        0.09       1
          SoilCrop Maize
            Layer:
              Thickness (mm)  LL (mm/mm)  KL (/day)  XF (0-1)
              150             0.29        0.1        1
              150             0.29        0.1        1
              300             0.34        0.1        1
              300             0.34        0.08       1
              300             0.37        0.06       1
              300             0.4         0.04       1
              300             0.42        0.02       1
              300             0.48        0          0
              300             0.47        0          0
              300             0.46        0          0
              300             0.44        0          0
          SoilCrop Perennial Grass
            Layer:
              Thickness (mm)  LL (mm/mm)  KL (/day)  XF (0-1)
              150             0.29        0.1        1
              150             0.29        0.1        1
              300             0.39        0.1        1
              300             0.41        0.1        1
              300             0.4         0.09       1
              300             0.4         0.07       1
              300             0.41        0.05       1
              300             0.41        0          0
              300             0.4         0          0
              300             0.4         0          0
              300             0.42        0          0
          SoilCrop Sorghum
            Layer:
              Thickness (mm)  LL (mm/mm)  KL (/day)  XF (0-1)
              150             0.29        0.1        1
              150             0.29        0.1        1
              300             0.35        0.1        1
              300             0.38        0.08       1
              300             0.4         0.06       1
              300             0.4         0.04       1
              300             0.4         0.02       1
              300             0.48        0          0
              300             0.47        0          0
              300             0.46        0          0
              300             0.44        0          0
          SoilCrop Wheat
            Layer:
              Thickness (mm)  LL (mm/mm)  KL (/day)  XF (0-1)
              150             0.29        0.1        1
              150             0.29        0.1        1
              300             0.32        0.08       1
              300             0.32        0.06       1
              300             0.35        0.04       1
              300             0.38        0.02       1
              300             0.41        0.01       1
              300             0.48        0          0
              300             0.47        0          0
              300             0.46        0          0
              300             0.44        0          0
        SoilWat: SummerCona=3.5; SummerU=6; SummerDate=1-Nov; WinterCona=3.5; WinterU=6; WinterDate=1-Apr; DiffusConst=40; DiffusSlope=16; Salb=0.13; Cn2Bare=73; CnRed=20; CnCov=0.8
          Layer:
            Thickness (mm)  SWCON (0-1)
            150             0.3
            150             0.3
            300             0.3
            300             0.3
            300             0.3
            300             0.3
            300             0.3
            300             0.3
            300             0.3
            300             0.3
            300             0.3
        SoilOrganicMatter: RootCn=40; RootWt=200; SoilCn=12.5; EnrACoeff=7.4; EnrBCoeff=0.2
          Layer:
            Thickness (mm)  OC (Total %)  FBiom (0-1)  FInert (0-1)
            150             1.04          0.025        0.4
            150             0.89          0.02         0.6
            300             0.89          0.015        0.8
            300             0.89          0.01         0.9
            300             0.77          0.01         0.95
            300             0.45          0.01         0.95
            300             0.27          0.01         0.95
            300             0.22          0.01         0.95
            300             0.16          0.01         0.95
            300             0.13          0.01         0.95
            300             0.12          0.01         0.95
        Analysis
          Layer:
            Thickness (mm)  EC (1:5 dS/m)  PH (1:5 water)
            150             0.2            8.4
            150             0.25           8.8
            300             0.31           9
            300             0.4            9.2
            300             0.59           9.2
            300             0.84           9.1
            300             0.93           9
            300             1.01           9
            300             1.06           8.9
            300             1.05           8.9
            300             1.01           8.9
        Sample Initial nitrogen
          Layer:
            Thickness (mm)  NO3 (ppm)  NH4 (ppm)
            150             6.503      0.599004
            150             2.101      0.100001
            300             2.101      0.100001
            300             1.701      0.100001
            300             1.701      0.100001
            300             1.701      0.100001
            300             1.701      0.100001
            300             1.701      0.100001
            300             1.701      0.100001
            300             1.701      0.100001
            300             1.701      0.100001
      surfaceom SurfaceOrganicMatter
        PoolName = wheat  # Organic Matter pool name
        type = wheat  # Organic Matter type
        mass = 1000  # Initial surface residue (kg/ha)
        cnr = 80  # C:N ratio of initial residue
        standing_fraction = 0  # Fraction of residue standing
      fertiliser
      wheat
      folder Manager folder
        manager Sowing rule
          # Sowing criteria
          date1 = 15-may  # Enter sowing window START date (dd-mmm)
          date2 = 10-jul  # Enter sowing window END date (dd-mmm)
          must_sow = no  # Must sow?
          raincrit = 30  # Amount of rainfall
          rainnumdays = 3  # Number of days of rainfall
          esw_amount = 200  # Enter minimum allowable available soil water (mm)
          # Sowing parameters
          crop = wheat  # Enter name of crop to sow
          density = 100  # Enter sowing density (plants/m2)
          depth = 30  # Enter sowing depth (mm)
          cultivar = hartog  # Enter cultivar
          class = plant  # Enter crop growth class
          row_spacing = 250  # Enter row spacing (mm)
          on start_of_day:
```
      if (paddock_is_fallow() = 1 and FallowIn <> 'yes' and (NextCrop = 0 or NextCrop = '[crop]')) then
         if (date_within('[date1], [date2]') = 1) then
            if (rain[[rainnumdays]] >= [raincrit] AND esw >= [esw_amount]) OR
                ('[must_sow]' = 'yes' AND today = date('[date2]'))) THEN
               ChooseNextCrop = 'yes'   ! for rotations
               [crop] sow Population =[density], sowing_depth = [depth], cultivar = [cultivar], row_spacing = [row_spacing], crop_class = [class]
            endif
            if today = date('[date2]') then
               ChooseNextCrop = 'yes'
            endif
         endif
      endif
```
          on init:
```
            nextcrop = 0
            fallowin = 0
```
        manager Sowing fertiliser
          # When should fertiliser be applied
          modulename = wheat  # On which module should the event come from
          eventname = sowing  # On which event should fertiliser be applied
          # Fertiliser application details
          fertmodule = fertiliser  # Module used to apply the fertiliser
          fert_amount_sow = 150  # Amount of starter fertiliser at sowing (kg/ha)
          fert_type_sow = urea_N  # Sowing fertiliser type
          on [modulename].[eventname]:
```
        [fertmodule] apply amount = [fert_amount_sow] (kg/ha), depth = 50 (mm), type = [fert_type_sow]
```
        manager Harvesting rule
          # Harvesting criteria
          crop = wheat  # Enter name of crop to harvest when ripe
          on end_of_day:
```
           if [crop].StageName = 'harvest_ripe' or [crop].PlantStatus = 'dead' then
              [crop]  harvest
              [crop]  end_crop
           endif
```
      outputfile: filename=MultiPaddock paddock1.out; title=MultiPaddock paddock1
        variables
          variable:
            dd/mm/yyyy as Date  # Date (dd/mm/yyyy)
            biomass  # Biomass
            yield  # Yield
            grain_protein  # grain protein content
            grain_size  # Size of each grain
            esw  # Extractable Soil Water (mm)
        events Reporting Frequency: event=harvesting
      irrigation
        automatic_irrigation = off
        asw_depth = 600  # Depth to which ASW is calculated. (mm)
        crit_fr_asw = 0.5  # Fraction of ASW below which irrigation is applied (0-1.0)
        irrigation_efficiency = 1  # Efficiency of the irrigation. (0-1.0)
        irrigation_allocation = off  # Allocation limits
        allocation = 0  # Allocation in ML
        default_no3_conc = 0  # Nitrate concentration (ppm N)
        default_nh4_conc = 0  # Ammonium concentration (ppm N)
        default_cl_conc = 0  # Chloride concentration (ppm Cl)
        default_no3_conc = 0  # Nitrate concentration (ppm N)
        default_nh4_conc = 0  # Ammonium concentration (ppm N)
        default_cl_conc = 0  # Chloride concentration (ppm Cl)
    area paddock2 -> /simulations/MultiPaddock/paddock1
      soil -> /simulations/MultiPaddock/paddock1/Soil
        InitWater Initial water
          percentmethod: percent=0.50; distributed=Filled from top
      outputfile: filename=MultiPaddock paddock2.out; title=MultiPaddock paddock2
        variables -> /simulations/MultiPaddock/paddock1/outputfile/Variables
        events Reporting Frequency -> /simulations/MultiPaddock/paddock1/outputfile/Reporting Frequency
