folder Simulations: version=32
  simulation WaterSupply
    metfile met: filename=%apsim%/Examples/MetFiles/Goond.met
    clock
      start_date = 1/01/1940  # Select the start date of the simulation
      end_date = 31/12/1942  # Select the end date of the simulation
    summaryfile
    area paddock
      folder Manager folder
        manager Sowing rule
          # Sowing criteria
          date1 = 15-may  # Enter sowing window START date (dd-mmm)
          date2 = 10-jul  # Enter sowing window END date (dd-mmm)
          must_sow = no  # Must sow?
          raincrit = 30  # Amount of rainfall
          rainnumdays = 3  # Number of days of rainfall
          esw_amount = 200  # Enter minimum allowable available soil water (mm)
          # Sowing parameters
          crop = wheat  # Enter name of crop to sow
          density = 100  # Enter sowing density (plants/m2)
          depth = 30  # Enter sowing depth (mm)
          cultivar = hartog  # Enter cultivar
          class = plant  # Enter crop growth class
          row_spacing = 250  # Enter row spacing (mm)
          on start_of_day:
```
      if (paddock_is_fallow() = 1 ) then
         if (date_within('[date1], [date2]') = 1) then
            if (rain[[rainnumdays]] >= [raincrit] AND esw >= [esw_amount]) OR
                ('[must_sow]' = 'yes' AND today = date('[date2]'))) THEN
               ChooseNextCrop = 'yes'   ! for rotations
               [crop] sow Population =[density], sowing_depth = [depth], cultivar = [cultivar], row_spacing = [row_spacing], crop_class = [class]
            endif
         endif
      endif
```
        manager Harvesting rule
          # Harvesting criteria
          crop = wheat  # Enter name of crop to harvest when ripe
          on end_of_day:
```
           if [crop].StageName = 'harvest_ripe' or [crop].PlantStatus = 'dead' then
              [crop]  harvest
              [crop]  end_crop
           endif
```
        manager Sowing fertiliser
          # When should fertiliser be applied
          modulename = wheat  # On which module should the event come from
          eventname = sowing  # On which event should fertiliser be applied
          # Fertiliser application details
          fertmodule = fertiliser  # Module used to apply the fertiliser
          fert_amount_sow = 150  # Amount of starter fertiliser at sowing (kg/ha)
          fert_type_sow = urea_N  # Sowing fertiliser type
          on [modulename].[eventname]:
```
        [fertmodule] apply amount = [fert_amount_sow] (kg/ha), depth = 50 (mm), type = [fert_type_sow]
```
      fertiliser
      surfaceom SurfaceOrganicMatter
        PoolName = wheat  # Organic Matter pool name
        type = wheat  # Organic Matter type
        mass = 1000.  # Initial surface residue (kg/ha)
        cnr = 80.0  # C:N ratio of initial residue
        standing_fraction = 0.0  # Fraction of residue standing
      wheat
      outputfile: filename=WaterSupply.out; title=WaterSupply; events=Reporting Frequency
        variables
          variable:
            dd/mm/yyyy as Date  # Date (dd/mm/yyyy)
            wheat.biomass  # Biomass
            wheat.yield  # Yield
            wheat.grain_protein  # grain protein content
            wheat.grain_size  # Size of each grain
            esw  # Extractable Soil Water (mm)
            dam.available_water as dam_water
            channel.available_water as channel_water
            bore.available_water as bore_water
            irrigation  # Irrigation entering the profile (mm)
            logic.deficit
      soil Jimbour,Waco (#016): LocalName=Waco; Site=Jimbour; Region=South East Queensland
        SoilType = Black Vertosol  # Soil description
        NearestTown = Jimbour, Q 4352
        NaturalVegetation = Grassland, mainly Qld bluegrass
        InitWater Initial water
          PercentMethod: Percent=0.22; Distributed=Filled from top
        Water
          Layer:
            Thickness (mm)  BD (g/cc)  AirDry (mm/mm)  LL15 (mm/mm)  DUL (mm/mm)  SAT (mm/mm)
            150             1.020      0.150           0.290         0.540        0.590
            150             1.030      0.260           0.290         0.530        0.580
            300             1.020      0.290           0.290         0.540        0.590
            300             1.020      0.290           0.290         0.540        0.580
            300             1.060      0.300           0.300         0.520        0.570
            300             1.110      0.310           0.310         0.500        0.550
            300             1.120      0.320           0.320         0.500        0.550
            300             1.150      0.330           0.330         0.480        0.530
            300             1.180      0.340           0.340         0.470        0.520
            300             1.200      0.350           0.350         0.460        0.510
            300             1.250      0.360           0.360         0.440        0.490
          SoilCrop Barley
            Layer:
              Thickness (mm)  LL (mm/mm)  KL (/day)  XF (0-1)
              150             0.290       0.100      1
              150             0.290       0.100      1
              300             0.320       0.080      1
              300             0.380       0.060      1
              300             0.390       0.040      1
              300             0.390       0.020      1
              300             0.410       0.010      1
              300             0.480       0          0
              300             0.470       0          0
              300             0.460       0          0
              300             0.440       0          0
          SoilCrop Chickpea
            Layer:
              Thickness (mm)  LL (mm/mm)  KL (/day)  XF (0-1)
              150             0.290       0.100      1
              150             0.290       0.100      1
              300             0.360       0.080      1
              300             0.430       0.060      1
              300             0.510       0.040      1
              300             0.500       0.020      1
              300             0.500       0.010      1
              300             0.480       0          0
              300             0.470       0          0
              300             0.460       0          0
              300             0.440       0          0
          SoilCrop Lucerne
            Layer:
              Thickness (mm)  LL (mm/mm)  KL (/day)  XF (0-1)
              150             0.290       0.100      1
              150             0.290       0.100      1
              300             0.290       0.100      1
              300             0.290       0.100      1
              300             0.300       0.090      1
              300             0.310       0.090      1
              300             0.320       0.090      1
              300             0.330       0.090      1
              300             0.340       0.090      1
              300             0.350       0.090      1
              300             0.360       0.090      1
          SoilCrop Maize
            Layer:
              Thickness (mm)  LL (mm/mm)  KL (/day)  XF (0-1)
              150             0.290       0.100      1
              150             0.290       0.100      1
              300             0.340       0.100      1
              300             0.340       0.080      1
              300             0.370       0.060      1
              300             0.400       0.040      1
              300             0.420       0.020      1
              300             0.480       0          0
              300             0.470       0          0
              300             0.460       0          0
              300             0.440       0          0
          SoilCrop Perennial Grass
            Layer:
              Thickness (mm)  LL (mm/mm)  KL (/day)  XF (0-1)
              150             0.290       0.100      1
              150             0.290       0.100      1
              300             0.390       0.100      1
              300             0.410       0.100      1
              300             0.400       0.090      1
              300             0.400       0.070      1
              300             0.410       0.050      1
              300             0.410       0          0
              300             0.400       0          0
              300             0.400       0          0
              300             0.420       0          0
          SoilCrop Sorghum
            Layer:
              Thickness (mm)  LL (mm/mm)  KL (/day)  XF (0-1)
              150             0.290       0.100      1
              150             0.290       0.100      1
              300             0.350       0.100      1
              300             0.380       0.080      1
              300             0.400       0.060      1
              300             0.400       0.040      1
              300             0.400       0.020      1
              300             0.480       0          0
              300             0.470       0          0
              300             0.460       0          0
              300             0.440       0          0
          SoilCrop Wheat
            Layer:
              Thickness (mm)  LL (mm/mm)  KL (/day)  XF (0-1)
              150             0.290       0.100      1
              150             0.290       0.100      1
              300             0.320       0.080      1
              300             0.320       0.060      1
              300             0.350       0.040      1
              300             0.380       0.020      1
              300             0.410       0.010      1
              300             0.480       0          0
              300             0.470       0          0
              300             0.460       0          0
              300             0.440       0          0
        SoilWat: SummerCona=3.5; SummerU=6; SummerDate=1-Nov; WinterCona=3.5; WinterU=6; WinterDate=1-Apr; DiffusConst=40; DiffusSlope=16; Salb=0.13; Cn2Bare=73; CnRed=20; CnCov=0.8
          Layer:
            Thickness (mm)  SWCON (0-1)
            150             0.300
            150             0.300
            300             0.300
            300             0.300
            300             0.300
            300             0.300
            300             0.300
            300             0.300
            300             0.300
            300             0.300
            300             0.300
        SoilOrganicMatter: RootCn=40; RootWt=200; SoilCn=12.5; EnrACoeff=7.4; EnrBCoeff=0.2
          Layer:
            Thickness (mm)  OC (Total %)  FBiom (0-1)  FInert (0-1)
            150             1.040         0.025        0.400
            150             0.890         0.020        0.600
            300             0.890         0.015        0.800
            300             0.890         0.010        0.900
            300             0.770         0.010        0.950
            300             0.450         0.010        0.950
            300             0.270         0.010        0.950
            300             0.220         0.010        0.950
            300             0.160         0.010        0.950
            300             0.130         0.010        0.950
            300             0.120         0.010        0.950
        Analysis
          Layer:
            Thickness (mm)  EC (1:5 dS/m)  PH (1:5 water)
            150             0.200          8.400
            150             0.250          8.800
            300             0.310          9
            300             0.400          9.200
            300             0.590          9.200
            300             0.840          9.100
            300             0.930          9
            300             1.010          9
            300             1.060          8.900
            300             1.050          8.900
            300             1.010          8.900
        Sample Initial nitrogen
          Layer:
            Thickness (mm)  NO3 (ppm)  NH4 (ppm)
            150             6.503      0.599
            150             2.101      0.100
            300             2.101      0.100
            300             1.701      0.100
            300             1.701      0.100
            300             1.701      0.100
            300             1.701      0.100
            300             1.701      0.100
            300             1.701      0.100
            300             1.701      0.100
            300             1.701      0.100
      manager Logic
        on init:
```
my_crop_area = 50
```
        on start_of_day:
```
 ! hello

!look at available soil water (mm) in the top 7 layers (wheat rooting depth)
max_avail_soil_water = (dul_dep(1) - ll15_dep(1)) + (dul_dep(2) - ll15_dep(2)) +  (dul_dep(3) - ll15_dep(3)) +  (dul_dep(4) - ll15_dep(4))  +  (dul_dep(5) - ll15_dep(5))    +  (dul_dep(6) - ll15_dep(6))    +  (dul_dep(7) - ll15_dep(7))
avail_soil_water = (sw_dep(1) - ll15_dep(1)) + (sw_dep(2) - ll15_dep(2)) +  (sw_dep(3) - ll15_dep(3)) +  (sw_dep(4) - ll15_dep(4))  +  (sw_dep(5) - ll15_dep(5))  +  (sw_dep(6) - ll15_dep(6))  +  (sw_dep(7) - ll15_dep(7))
avail_sw_proportion = avail_soil_water / max_avail_soil_water

deficit = max_avail_soil_water - avail_soil_water


If wheat.PlantStatus = 'alive' and deficit >35.0 then
     Irrigation apply amount = deficit, source = dam , crop_area = my_crop_area
endif

if dam.available_water < 20.0 then
    dam top_up amount = 40, source = channel
endif

if channel.available_water < 900.0  then
    channel top_up amount = 10, source = bore
endif
```
        on end_of_day:
```
 !hello


outputfile do_output
```
      channel
        max_available_water = 1000  # Capacity (ML)
        init_available_water = 50  # Supply volume available at start of simulation (ML)
        max_pump = 200  # Maximum pump delivery volume per day (ML/day)
        min_volume = 2  # Minimum volume in storage that the pump cannot access
        annual_allocation = 1000  # Annual Allocation in ML
        allocation_renewal_day = 180  # Day of year on which allocation is granted
        init_salt_conc = 704.0  # Initial chloride concentration (ppm)
      bore
        max_available_water = 100  # Capacity (ML)
        init_available_water = 50  # Supply volume available at start of simulation (ML)
        max_pump = 200  # Maximum pump delivery volume per day (ML/day)
        min_volume = 2  # Minimum volume in storage below which pump cannot access
        annual_allocation = 100  # Annual Allocation in ML
        allocation_renewal_day = 180  # Day of year on which allocation is granted
        init_salt_conc = 704.0  # Initial chloride concentration (ppm)
      irrigation
        automatic_irrigation = on
        asw_depth = 600.0  # Depth to which ASW is calculated. (mm)
        crit_fr_asw = 0.5  # Fraction of ASW below which irrigation is applied (0-1.0)
        irrigation_efficiency = 1.0  # Efficiency of the irrigation. (0-1.0)
        default_no3_conc = 0.0  # Nitrate concentration (ppm N)
        default_nh4_conc = 0.0  # Ammonium concentration (ppm N)
        default_cl_conc = 0.0  # Chloride concentration (ppm Cl)
      dam
        source_type = dam_gully
        max_available_water = 100  # Capacity (ML)
        max_area = 5  # Storage water surface area at capacity (ha)
        init_available_water = 50  # Initial supply volume available(ML)
        max_pump = 200  # Maximum pump delivery volume per day (ML/day)
        min_volume = 2  # Minimum volume in storage that the pump cannot access
        permeability = 0.00007  # Permeability of sealing layer (m/day)
        seal_thickness = 0.5  # Thickness of low permeability seal (m)
        receive_rainfall = yes  # Does the dam recieve rainfall falling directly into its surface area?
        receive_catchment_runoff = no  # Does the dam receive runoff from a catchment?
        receive_crop_runoff = no  # Dam collects runoff from simulated crop area
        receive_catchment_runoff = no  # Dam collects runoff from larger catchment area
        catchment_area = 50.0  # Catchment area (ha)
        catchment_runoff_factor = 0.5  # Multiplier for soilwat2 runoff to simulate catchment runoff
        init_salt_conc = 704.0  # Initial chloride concentration (ppm)
        receive_crop_runoff = yes  # Dam collects runoff from simulated crop area
        runoff_salt_conc = 700.0  # Runoff chloride concentration (ppm)
        rainfall_salt_conc = 20.0  # Rainfall chloride concentration (ppm)
  simulation Multipaddock Watersupply
    memo Notes
      What still needs to be done
      - can't drag&drop a manager folder into top level

      - accum is stuffed - types.xml puts one in each paddock.

      - paddock_is_fallow is stuffed - needs name of paddock in question (as optional argument?)

      - top level outputfile needs handle paddocks better - the component filter needs all modules in all paddocks

      - report module (outputfile) splits spaces in variables the wrong way - uses a stringTokeniser class that doesn't respect quotes.

      - sorghum broken (CI/2 problem with events?) and wont run

      - need to be able to select a paddock in the genericUI (eg P1 Wheat Sowing rule) from a dropdown, and find a non-dotted name

      - manager can't get its head around modules with spaces in their names (eg x = 'water balance'.dul_dep())
    metfile met: filename=%apsim%/Examples/MetFiles/Goond.met
    clock
      start_date = 1/01/1940  # Enter the start date of the simulation
      end_date = 31/12/1942  # Enter the end date of the simulation
    summaryfile
    outputfile: filename=Multipaddock Watersupply.out; title=Multipaddock Watersupply; events=Reporting Frequency
      variables
        variable:
          dd/mm/yyyy as Date  # Date (dd/mm/yyyy)
          reportKey
          .masterpm.paddock1.wheat.biomass as p1bio  # Biomass
          .masterpm.paddock1.wheat.yield as p1yld  # Yield
          .masterpm.paddock2.wheat.biomass as p2bio
          .masterpm.paddock2.wheat.yield as p2yld
          .masterpm.paddock1.Soil Water.sw_dep() as p1esw  # Extractable Soil Water (mm)
          .masterpm.paddock2.Soil Water.esw as p2esw
    folder Manager folder
      manager scratch manager
        on init:
```
reportKey = 'none'
```
      manager P1 Wheat Sowing rule
        # Paddock
        paddock = .MasterPM.paddock1  # Apsim Name of paddock for this crop
        paddockName = P1  # Text Name of paddock for this crop
        # Sowing criteria
        date1 = 15-mar  # Enter sowing window START date (dd-mmm)
        date2 = 10-apr  # Enter sowing window END date (dd-mmm)
        must_sow = no  # Must sow?
        raincrit = 30  # Amount of rainfall
        rainnumdays = 3  # Number of days of rainfall
        esw_amount = 200  # Enter minimum allowable available soil water (mm)
        # Sowing parameters
        crop = Wheat  # Enter name of crop to sow
        density = 100  # Enter sowing density (plants/m2)
        depth = 30  # Enter sowing depth (mm)
        cultivar = hartog  # Enter cultivar
        row_spacing = 250  # Enter row spacing (mm)
        skiprow = solid
        on start_of_day:
```
      if ([paddockName]InCrop <> 'yes' and (NextCrop = 0 or NextCrop = '[crop]')) then
         if (date_within('[date1], [date2]') = 1) then
!            if (rain[[rainnumdays]] >= [raincrit] AND '[paddock].Soil Water.esw' >= [esw_amount]) OR
            if ('[paddock].Soil Water.esw' >= [esw_amount]) OR
                ('[must_sow]' = 'yes' AND today = date('[date2]'))) THEN
              [paddockName]InCrop = 'yes'
               '[paddock].[crop]' sow Population =[density], sowing_depth = [depth], cultivar = [cultivar], row_spacing = [row_spacing], skip = [skiprow]
            endif
            if today = date('[date2]') then
               ChooseNextCrop = 'yes'
            endif
         endif
      endif
```
        on init:
```
            nextcrop = 0
            fallowin = 0
            [paddockName]InCrop = 'no'
```
      manager P1 Harvesting rule
        # Paddock
        paddock = .MasterPM.paddock1  # Name of paddock for this crop
        paddockName = P1  # Text Name of paddock for this crop
        # Harvesting criteria
        crop = Wheat  # Enter name of crop to harvest when ripe
        on end_of_day:
```
           if [paddock].[crop].StageName = 'harvest_ripe' or [paddock].[crop].PlantStatus = 'dead' then
              reportKey = '[paddockName]'
              .masterpm.outputfile do_output
              [paddock].[crop]  harvest
              [paddock].[crop]  end_crop

            [paddockName]InCrop = 'no'

           endif
```
      manager P1 Sowing fertiliser
        # Paddock
        paddock = .MasterPM.paddock1  # Name of paddock for this crop
        # When should fertiliser be applied
        modulename = Wheat  # On which module should the event come from
        eventname = sowing  # On which event should fertiliser be applied
        # Fertiliser application details
        fertmodule = fertiliser  # Module used to apply the fertiliser
        fert_amount_sow = 150  # Amount of starter fertiliser at sowing (kg/ha)
        fert_type_sow = urea_N  # Sowing fertiliser type
        on [paddock].[modulename].[eventname]:
```
        [paddock].[fertmodule] apply amount = [fert_amount_sow] (kg/ha), depth = 50 (mm), type = [fert_type_sow]
```
      manager P2 Wheat Sowing rule
        # Paddock
        paddock = .MasterPM.paddock2  # Name of paddock for this crop
        paddockName = P2  # Text Name of paddock for this crop
        # Sowing criteria
        date1 = 15-apr  # Enter sowing window START date (dd-mmm)
        date2 = 10-may  # Enter sowing window END date (dd-mmm)
        must_sow = no  # Must sow?
        raincrit = 30  # Amount of rainfall
        rainnumdays = 3  # Number of days of rainfall
        esw_amount = 200  # Enter minimum allowable available soil water (mm)
        # Sowing parameters
        crop = Wheat  # Enter name of crop to sow
        density = 100  # Enter sowing density (plants/m2)
        depth = 30  # Enter sowing depth (mm)
        cultivar = hartog  # Enter cultivar
        row_spacing = 250  # Enter row spacing (mm)
        skiprow = solid
        on start_of_day:
        script: same as in Multipaddock Watersupply.Manager folder.P1 Wheat Sowing rule
        on init:
```
            nextcrop = 0
            fallowin = 0
            [paddockName]InCrop = 'no'
```
      manager P2 Harvesting rule
        # Paddock
        paddock = .MasterPM.paddock2  # Name of paddock for this crop
        paddockName = P2  # Text Name of paddock for this crop
        # Harvesting criteria
        crop = Wheat  # Enter name of crop to harvest when ripe
        on end_of_day:
        script: same as in Multipaddock Watersupply.Manager folder.P1 Harvesting rule
      manager P2 Sowing fertiliser
        # Paddock
        paddock = .MasterPM.paddock2  # Name of paddock for this crop
        # When should fertiliser be applied
        modulename = Wheat  # On which module should the event come from
        eventname = sowing  # On which event should fertiliser be applied
        # Fertiliser application details
        fertmodule = fertiliser  # Module used to apply the fertiliser
        fert_amount_sow = 150  # Amount of starter fertiliser at sowing (kg/ha)
        fert_type_sow = urea_N  # Sowing fertiliser type
        on [paddock].[modulename].[eventname]:
        script: same as in Multipaddock Watersupply.Manager folder.P1 Sowing fertiliser
      tclmanager Irrigation management
        paddock = .MasterPM.paddock1  # Apsim Name of paddock
        paddockName = P1  # Text Name of paddock
        waterBalanceModule = .MasterPM.paddock1.Soil Water  # Name of water balance for this paddock
        paddockArea = 20.0  # Area of paddock
        # Irrigation application details
        irrigate_module = .masterpm.paddock1.Irrigation1  # Module used to apply the irrigation
        irrigate_threshold = 50  # SW deficit for irrigation to apply (mm)
        irrigate_efficiency = 1  # Irrigation efficiency (0-1)
        rule P1 Logic
          on init:
```
set paddock              ".MasterPM.paddock1"
set paddockName          "P1"
set waterBalanceModule   ".MasterPM.paddock1.Soil Water"
set paddockArea          "20.0"
set dam_module           ".masterpm.dam"
set irrigate_module      ".masterpm.paddock1.Irrigation1"
set irrigate_threshold   "30"
set irrigate_efficiency  "0.8"
```
          on prepare:
```
if {[apsimGet ${paddockName}InCrop] == "yes" } {
   set dul [apsimGet ${waterBalanceModule}.dul_dep()]
   set sw  [apsimGet ${waterBalanceModule}.sw_dep()]
   set capacity [expr $dul - $sw]
   if {($capacity - $irrigate_threshold) > 0} {
      apsimSet ${irrigate_module}.irrigation_efficiency $irrigate_efficiency
      apsimSendMessage $irrigate_module apply "amount $capacity" "source $dam_module" "crop_area $paddockArea"
   }
}
```
        rule P2 Logic
          on init:
```
set paddock              ".MasterPM.paddock2"
set paddockName          "P2"
set waterBalanceModule   ".MasterPM.paddock2.Soil Water"
set paddockArea          "50.0"
set dam_module           ".masterpm.dam"
set irrigate_module      ".masterpm.paddock2.Irrigation2"
set irrigate_threshold   "50"
set irrigate_efficiency  "0.6"
```
          on prepare:
          script: same as in Multipaddock Watersupply.Manager folder.Irrigation management.P1 Logic
    dam
      source_type = dam_gully
      max_available_water = 100  # Capacity (ML)
      max_area = 5  # Storage water surface area at capacity (ha)
      init_available_water = 50  # Initial supply volume available(ML)
      max_pump = 10  # Maximum pump delivery volume per day (ML/day)
      min_volume = 2  # Minimum volume in storage that the pump cannot access
      permeability = 0.00007  # Permeability of sealing layer (m/day)
      seal_thickness = 0.5  # Thickness of low permeability seal (m)
      receive_rainfall = yes  # Dam collects rainfall on surface
      receive_catchment_runoff = no  # Dam collects runoff from larger catchment area
      catchment_area = 50  # Catchment area (ha)
      catchment_runoff_factor = 0.5  # soilwat2.runoff multiplier
      receive_crop_runoff = '.masterpm.paddock1.soil water' '.masterpm.paddock2.soil water'  # Dam collects runoff from simulated crop area
      crop_area = 20 50  # Area of each paddock
      init_salt_conc = 704  # Initial chloride concentration (ppm)
      runoff_salt_conc = 700  # Runoff chloride concentration (ppm)
      rainfall_salt_conc = 20  # Rainfall chloride concentration (ppm)
    area paddock1
      fertiliser
      surfaceom SurfaceOrganicMatter
        PoolName = wheat  # Organic Matter pool name
        type = wheat  # Organic Matter type
        mass = 1000  # Initial surface residue (kg/ha)
        cnr = 80  # C:N ratio of initial residue
        standing_fraction = 0  # Fraction of residue standing
      Wheat
      soil: LocalName=Waco; Site=Jimbour; Region=South East Queensland
        SoilType = Black Vertosol  # Soil description
        NearestTown = Jimbour, Q 4352
        NaturalVegetation = Grassland, mainly Qld bluegrass
        InitWater Initial water
          percentmethod: percent=1; distributed=filled from top
        Water
          Layer:
            Thickness (mm)  BD (g/cc)  AirDry (mm/mm)  LL15 (mm/mm)  DUL (mm/mm)  SAT (mm/mm)
            150             1.02       0.145           0.29          0.54         0.59
            150             1.03       0.26            0.29          0.53         0.58
            300             1.02       0.29            0.29          0.54         0.59
            300             1.02       0.29            0.29          0.54         0.58
            300             1.06       0.3             0.3           0.52         0.57
            300             1.11       0.31            0.31          0.5          0.55
            300             1.12       0.32            0.32          0.5          0.55
            300             1.15       0.33            0.33          0.48         0.53
            300             1.18       0.34            0.34          0.47         0.52
            300             1.2        0.35            0.35          0.46         0.51
            300             1.25       0.36            0.36          0.44         0.49
          SoilCrop Barley
            Layer:
              Thickness (mm)  LL (mm/mm)  KL (/day)  XF (0-1)
              150             0.29        0.1        1
              150             0.29        0.1        1
              300             0.32        0.08       1
              300             0.38        0.06       1
              300             0.39        0.04       1
              300             0.39        0.02       1
              300             0.41        0.01       1
              300             0.48        0          0
              300             0.47        0          0
              300             0.46        0          0
              300             0.44        0          0
          SoilCrop Chickpea
            Layer:
              Thickness (mm)  LL (mm/mm)  KL (/day)  XF (0-1)
              150             0.29        0.1        1
              150             0.29        0.1        1
              300             0.36        0.08       1
              300             0.43        0.06       1
              300             0.51        0.04       1
              300             0.5         0.02       1
              300             0.5         0.01       1
              300             0.48        0          0
              300             0.47        0          0
              300             0.46        0          0
              300             0.44        0          0
          SoilCrop Lucerne
            Layer:
              Thickness (mm)  LL (mm/mm)  KL (/day)  XF (0-1)
              150             0.29        0.1        1
              150             0.29        0.1        1
              300             0.29        0.1        1
              300             0.29        0.1        1
              300             0.3         0.09       1
              300             0.31        0.09       1
              300             0.32        0.09       1
              300             0.33        0.09       1
              300             0.34        0.09       1
              300             0.35        0.09       1
              300             0.36        0.09       1
          SoilCrop Maize
            Layer:
              Thickness (mm)  LL (mm/mm)  KL (/day)  XF (0-1)
              150             0.29        0.1        1
              150             0.29        0.1        1
              300             0.34        0.1        1
              300             0.34        0.08       1
              300             0.37        0.06       1
              300             0.4         0.04       1
              300             0.42        0.02       1
              300             0.48        0          0
              300             0.47        0          0
              300             0.46        0          0
              300             0.44        0          0
          SoilCrop Perennial Grass
            Layer:
              Thickness (mm)  LL (mm/mm)  KL (/day)  XF (0-1)
              150             0.29        0.1        1
              150             0.29        0.1        1
              300             0.39        0.1        1
              300             0.41        0.1        1
              300             0.4         0.09       1
              300             0.4         0.07       1
              300             0.41        0.05       1
              300             0.41        0          0
              300             0.4         0          0
              300             0.4         0          0
              300             0.42        0          0
          SoilCrop Sorghum
            Layer:
              Thickness (mm)  LL (mm/mm)  KL (/day)  XF (0-1)
              150             0.29        0.1        1
              150             0.29        0.1        1
              300             0.35        0.1        1
              300             0.38        0.08       1
              300             0.4         0.06       1
              300             0.4         0.04       1
              300             0.4         0.02       1
              300             0.48        0          0
              300             0.47        0          0
              300             0.46        0          0
              300             0.44        0          0
          SoilCrop Wheat
            Layer:
              Thickness (mm)  LL (mm/mm)  KL (/day)  XF (0-1)
              150             0.29        0.1        1
              150             0.29        0.1        1
              300             0.32        0.08       1
              300             0.32        0.06       1
              300             0.35        0.04       1
              300             0.38        0.02       1
              300             0.41        0.01       1
              300             0.48        0          0
              300             0.47        0          0
              300             0.46        0          0
              300             0.44        0          0
        SoilWat: SummerCona=3.5; SummerU=6; SummerDate=1-Nov; WinterCona=3.5; WinterU=6; WinterDate=1-Apr; DiffusConst=40; DiffusSlope=16; Salb=0.13; Cn2Bare=73; CnRed=20; CnCov=0.8
          Layer:
            Thickness (mm)  SWCON (0-1)
            150             0.3
            150             0.3
            300             0.3
            300             0.3
            300             0.3
            300             0.3
            300             0.3
            300             0.3
            300             0.3
            300             0.3
            300             0.3
        SoilOrganicMatter: RootCn=40; RootWt=200; SoilCn=12.5; EnrACoeff=7.4; EnrBCoeff=0.2
          Layer:
            Thickness (mm)  OC (Total %)  FBiom (0-1)  FInert (0-1)
            150             1.04          0.025        0.4
            150             0.89          0.02         0.6
            300             0.89          0.015        0.8
            300             0.89          0.01         0.9
            300             0.77          0.01         0.95
            300             0.45          0.01         0.95
            300             0.27          0.01         0.95
            300             0.22          0.01         0.95
            300             0.16          0.01         0.95
            300             0.13          0.01         0.95
            300             0.12          0.01         0.95
        Analysis
          Layer:
            Thickness (mm)  EC (1:5 dS/m)  PH (1:5 water)
            150             0.2            8.4
            150             0.25           8.8
            300             0.31           9
            300             0.4            9.2
            300             0.59           9.2
            300             0.84           9.1
            300             0.93           9
            300             1.01           9
            300             1.06           8.9
            300             1.05           8.9
            300             1.01           8.9
        Sample Initial nitrogen
          Layer:
            Thickness (mm)  NO3 (ppm)  NH4 (ppm)
            150             6.500      0.600
            150             2.100      0.100
            300             2.100      0.100
            300             1.700      0.100
            300             1.700      0.100
            300             1.700      0.100
            300             1.700      0.100
            300             1.700      0.100
            300             1.700      0.100
            300             1.700      0.100
            300             1.700      0.100
      irrigation Irrigation1
        automatic_irrigation = on
        asw_depth = 600  # Depth to which ASW is calculated. (mm)
        crit_fr_asw = 0.5  # Fraction of ASW below which irrigation is applied (0-1.0)
        irrigation_efficiency = 1  # Efficiency of the irrigation. (0-1.0)
        irrigation_allocation = off  # Allocation limits
        allocation = 0  # Allocation in ML
        default_no3_conc = 0  # Nitrate concentration (ppm N)
        default_nh4_conc = 0  # Ammonium concentration (ppm N)
        default_cl_conc = 0  # Chloride concentration (ppm Cl)
        default_no3_conc = 0  # Nitrate concentration (ppm N)
        default_nh4_conc = 0  # Ammonium concentration (ppm N)
        default_cl_conc = 0  # Chloride concentration (ppm Cl)
    area paddock2
      fertiliser
      surfaceom SurfaceOrganicMatter
        PoolName = wheat  # Organic Matter pool name
        type = wheat  # Organic Matter type
        mass = 1000.  # Initial surface residue (kg/ha)
        cnr = 80.0  # C:N ratio of initial residue
        standing_fraction = 0.0  # Fraction of residue standing
      Wheat
      soil: same as Multipaddock Watersupply.paddock1.Soil
      irrigation Irrigation2
        automatic_irrigation = on
        asw_depth = 600  # Depth to which ASW is calculated. (mm)
        crit_fr_asw = 0.5  # Fraction of ASW below which irrigation is applied (0-1.0)
        irrigation_efficiency = 1  # Efficiency of the irrigation. (0-1.0)
        irrigation_allocation = off  # Allocation limits
        allocation = 0  # Allocation in ML
        default_no3_conc = 0.0  # Nitrate concentration (ppm N)
        default_nh4_conc = 0.0  # Ammonium concentration (ppm N)
        default_cl_conc = 0.0  # Chloride concentration (ppm Cl)
        default_no3_conc = 0.0  # Nitrate concentration (ppm N)
        default_nh4_conc = 0.0  # Ammonium concentration (ppm N)
        default_cl_conc = 0.0  # Chloride concentration (ppm Cl)
