folder BioenergyCropSimulation: version=37; creator=Apsim 7.9-r4098
  memo Bioenergy crops
    Adaption of APSIM Sugar and Lucerne to represent Miscanthus and Switchgrass

    This file contains simulations of Sugar adapted to represent Miscanthus and Lucerne to represent Switchgrass.  It is the work published in:
         Ojeda et al. (2017) Evaluation of Agricultural Production Systems Simulator as yield predictor of Panicum virgatum and Miscanthus x giganteus in several US environments.  GCB Bioenergy 9: 796-816
    which is available under open access at http://onlinelibrary.wiley.com/doi/10.1111/gcbb.12384/full.

    The paper contains full details of the modifications.  In brief the modifications for Miscanthus include radiation use efficiency and biomass partitioning.  The modifications for Switchgrass were more extensive and included the thermal time calculation, biomass partitioning, radiation use efficiency, transpiration efficiency, temperature dependency of photosynthesis and the light extinction coefficint.
  simulation Miscanthus
    summaryfile
    metfile met: filename=%apsim%\Examples\BioEnergy\West Lafayette.met
    clock
      start_date = 14/05/2008  # Select the start date of the simulation
      end_date = 31/12/2014  # Select the end date of the simulation
    area paddock
      fertiliser
      sugar
        ini: filename=MiscanthusFromSugar.xml
      folder Manager folder
        manager Fertilise on fixed date1
          # When should fertiliser be applied
          fert_date = 4/08/2008  # Enter fertiliser date (M-dd-yyyy)
          fert_criteria = 1000  # Don't add fertiliser if N in top 2 layers exceeds (kg/ha)
          # Fertiliser application details
          fertmodule = fertiliser  # Module used to apply the fertiliser
          fert_amount = 84  # Amount of fertiliser to apply (kg/ha)
          fert_type = urea_N  # Fertiliser type
          on start_of_day:
```
         if (today = date('[fert_date]') then
            N_topsoil = no3(1) + nh4(1) + no3(2) + nh4(2)
            if (N_topsoil < [fert_criteria]) then
               [fertmodule] apply amount = [fert_amount] (kg/ha), depth = 50 (mm), type = [fert_type] ()
            endif
         endif
```
        manager Fertilise on fixed date2
          # When should fertiliser be applied
          fert_date = 18/05/2009  # Enter fertiliser date (M-dd-yyyy)
          fert_criteria = 1000  # Don't add fertiliser if N in top 2 layers exceeds (kg/ha)
          # Fertiliser application details
          fertmodule = Fertiliser  # Module used to apply the fertiliser
          fert_amount = 56  # Amount of fertiliser to apply (kg/ha)
          fert_type = urea_N  # Fertiliser type
          on start_of_day:
          script: same as in Miscanthus.paddock.Manager folder.Fertilise on fixed date1
        manager Fertilise on fixed date3
          # When should fertiliser be applied
          fert_date = 10/05/2010  # Enter fertiliser date (M-dd-yyyy)
          fert_criteria = 1000  # Don't add fertiliser if N in top 2 layers exceeds (kg/ha)
          # Fertiliser application details
          fertmodule = Fertiliser  # Module used to apply the fertiliser
          fert_amount = 56  # Amount of fertiliser to apply (kg/ha)
          fert_type = urea_N  # Fertiliser type
          on start_of_day:
          script: same as in Miscanthus.paddock.Manager folder.Fertilise on fixed date1
        manager Fertilise on fixed date4
          # When should fertiliser be applied
          fert_date = 6/05/2011  # Enter fertiliser date (M-dd-yyyy)
          fert_criteria = 1000  # Don't add fertiliser if N in top 2 layers exceeds (kg/ha)
          # Fertiliser application details
          fertmodule = Fertiliser  # Module used to apply the fertiliser
          fert_amount = 56  # Amount of fertiliser to apply (kg/ha)
          fert_type = urea_N  # Fertiliser type
          on start_of_day:
          script: same as in Miscanthus.paddock.Manager folder.Fertilise on fixed date1
        manager Fertilise on fixed date5
          # When should fertiliser be applied
          fert_date = 3/04/2012  # Enter fertiliser date (M-dd-yyyy)
          fert_criteria = 1000  # Don't add fertiliser if N in top 2 layers exceeds (kg/ha)
          # Fertiliser application details
          fertmodule = Fertiliser  # Module used to apply the fertiliser
          fert_amount = 56  # Amount of fertiliser to apply (kg/ha)
          fert_type = urea_N  # Fertiliser type
          on start_of_day:
          script: same as in Miscanthus.paddock.Manager folder.Fertilise on fixed date1
        manager Fertilise on fixed date6
          # When should fertiliser be applied
          fert_date = 3/04/2013  # Enter fertiliser date (M-dd-yyyy)
          fert_criteria = 1000  # Don't add fertiliser if N in top 2 layers exceeds (kg/ha)
          # Fertiliser application details
          fertmodule = Fertiliser  # Module used to apply the fertiliser
          fert_amount = 56  # Amount of fertiliser to apply (kg/ha)
          fert_type = urea_N  # Fertiliser type
          on start_of_day:
          script: same as in Miscanthus.paddock.Manager folder.Fertilise on fixed date1
        manager Fertilise on fixed date7
          # When should fertiliser be applied
          fert_date = 8/05/2014  # Enter fertiliser date (M-dd-yyyy)
          fert_criteria = 1000  # Don't add fertiliser if N in top 2 layers exceeds (kg/ha)
          # Fertiliser application details
          fertmodule = Fertiliser  # Module used to apply the fertiliser
          fert_amount = 56  # Amount of fertiliser to apply (kg/ha)
          fert_type = urea_N  # Fertiliser type
          on start_of_day:
          script: same as in Miscanthus.paddock.Manager folder.Fertilise on fixed date1
        manager Miscanthus management
          # Sugar plant crop management parameters
          crop = sugar  # Enter name of crop to sow
          planting_day = 15-may  # Enter planting date (dd-mmm)
          plantlen = 177  # Duration of a plant crop (days) (30 days/month * 15 months)
          plant_stalks = 20  # Stalk density of plant crop (/m2)
          variety = q117  # Planting variety
          sowing_depth = 100  # Planting depth mm)
          # Ratoon management parameters
          NoRatoons = 6  # Number of ratoons (max = 5)
          ratoonlen1 = 356  # Duration of a 1st ratoon (days)
          ratoonlen2 = 363  # Duration of a 2nd ratoon (days)
          ratoonlen3 = 366  # Duration of a 3rd ratoon (days)
          ratoonlen4 = 368  # Duration of a 4th ratoon (days)
          ratoonlen5 = 363  # Duration of a 5th ratoon (days)
          ratoonlen6 = 365  # Duration of a 6th ratoon (days)
          ratoon1_stalks = 20  # Stalk density of 1st ratoon (/m2)
          ratoon2_stalks = 30  # Stalk density of 2nd ratoon (/m2)
          ratoon3_stalks = 35  # Stalk density of 3rd ratoon (/m2)
          ratoon4_stalks = 45  # Stalk density of 4th ratoon (/m2)
          ratoon5_stalks = 55  # Stalk density of 5th ratoon (/m2)
          ratoon6_stalks = 60  # Stalk density of 6th ratoon (/m2)
          # Residue management at harvest
          surfaceommodule =  # Module used to apply the tillage
          tillage_type = user_defined
          tillage_depth = 0  # User_defined depth of incorporation. 0 = removed. (mm)
          tillage_f_incorp = 0  # User_defined fraction of surface residues to incorporate (0-1)
          burn_flag =  # Was the cane burnt? 1 = Yes
          on init:
```
cropcycle = 0
```
          on start_of_day:
```
            ! -----------------------------------------------------------------
            ! Book keeping to round days to integer values
            plantlen = [plantlen]

            totalrain = totalrain + rain
            totaldnit = totaldnit + dnit
            totalleach = totalleach + flow_no3

            ! Initialise and set a time counter for entire run
            dah = 0


            if (sugar.crop_status = 'alive') then
               dah = 0

               ! Set harvest dates for each crop phase
              if (sugar.DaysAfterSowing = [plantlen] and ratoon_no = 0) or
                  (sugar.DaysAfterSowing = ratoonlen and ratoon_no > 0) then

                  replace_kgNha = cane_wt * 10 * replace_pcN

                  sugar harvest
                  totalfertiliser = 0
                  totalirrigation = 0
                  totalrain = 0
                  totaldnit = 0
                  totalleach = 0

                  if '[burn_flag]' = 1  then
                      if ('[tillage_type]' = 'user_defined') then
                      '[surfaceommodule]' tillage type = [tillage_type], f_incorp = [tillage_f_incorp] (), tillage_depth = [tillage_depth]
                  else
                      '[surfaceommodule]' tillage type = [tillage_type]
                  endif
                      
                  endif

                  if (ratoon_no = [NoRatoons] + 1) then
                     
                  else
                     ! Set stalk density
                     if ratoon_no = 1 then
                        ratoonlen = [ratoonlen1]
                        sugar.plants = [ratoon1_stalks]
                     elseif ratoon_no = 2 then
                        ratoonlen = [ratoonlen2]
                        sugar.plants = [ratoon2_stalks]
                     elseif ratoon_no = 3 then
                        ratoonlen = [ratoonlen3]
                        sugar.plants = [ratoon3_stalks]
                     elseif ratoon_no = 4 then
                        ratoonlen = [ratoonlen4]
                        sugar.plants = [ratoon4_stalks]
                     elseif ratoon_no = 5 then
                        ratoonlen = [ratoonlen5]
                        sugar.plants = [ratoon5_stalks]
                     elseif ratoon_no = 6 then
                        ratoonlen = [ratoonlen6]
                        sugar.plants = [ratoon6_stalks]
                     endif
!                     !sugar.plants = [ratoon_stalks]
                  endif
               else
                  ! We have not reached the harvest date for this ratoon.
               endif

            elseif (sugar.crop_status = 'dead') then
               sugar harvest
               sugar end_crop

            elseif (sugar.crop_status = 'out') and (today = date('[planting_day]') then
               cropcycle = cropcycle + 1
               sugar sow plants = 10 (), cultivar = [variety], sowing_depth = [sowing_depth]
               sugar.plants = [plant_stalks]
               dah = 0

            else
               dah = dah + 1
            endif
            
            If day = 313 and year = 2008 then
                  surfaceom add_surfaceom name = sugar, type = sugar, mass =  27380 (kg/ha), cnr = 482 ()
                  endif
```
      surfaceom
        PoolName = soybean  # Organic Matter pool name
        type = soybean  # Organic Matter type
        mass = 138  # Initial surface residue (kg/ha)
        cnr = 39.5  # C:N ratio of initial residue
        standing_fraction = 0  # Fraction of residue standing
      Soil Drummer: Latitude=0; Longitude=0; YearOfSampling=0
        InitialWater: FractionFull=1; PercentMethod=FilledFromTop
        Water
          Thickness  BD    AirDry  LL15   DUL    SAT    KS
          230        1.24  0.095   0.189  0.361  0.483  165
          200        1.22  0.18    0.2    0.371  0.49   152
          280        1.21  0.194   0.194  0.373  0.493  165
          230        1.25  0.152   0.152  0.342  0.478  232
          150        1.35  0.075   0.075  0.174  0.441  1317
          810        1.35  0.075   0.075  0.177  0.441  1292
          540        1.33  0.126   0.126  0.269  0.447  439
          860        1.33  0.126   0.126  0.267  0.446  445
          SoilCrop sugar: LL=[0.189, 0.2, 0.194, 0.152, 0.075, 0.075, 0.126, 0.126]; KL=[0.08, 0.08, 0.08, 0.08, 0.08, 0.08, 0.08, 0.08]; XF=[1, 1, 1, 1, 1, 0.8, 0.7, 0.6]
        SoilWater: SummerCona=3.9; SummerU=10; SummerDate=1-jun; WinterCona=3.9; WinterU=10; WinterDate=1-dec; DiffusConst=40; DiffusSlope=16; Salb=0.13; CN2Bare=78; CNRed=20; CNCov=0.8; Thickness=[230, 200, 280, 230, 150, 810, 540, 860]; SWCON=[0.277, 0.27, 0.268, 0.292, 0.575, 0.565, 0.372, 0.375]
        SoilOrganicMatter: RootCN=40; RootWt=1000; SoilCN=12; EnrACoeff=7.4; EnrBCoeff=0.2; OCUnits=WalkleyBlack
          Thickness  OC    FBiom  FInert
          230        2.49  0.016  0.003
          200        0.96  0.015  0.001
          280        0.71  0.015  0.001
          230        0.34  0.016  0.002
          150        0     0.152  0.055
          810        0     0.371  0.056
          540        0     0.05   0.25
          860        0     0.083  0.417
        Analysis: Thickness=[230, 200, 280, 230, 150, 810, 540, 860]; PH=[5.8, 6.2, 6.5, 7.1, 8, 8, 8.1, 8.1]; PHUnits=Water; BoronUnits=HotWater
          PH source: Estimated based on local knowledge (layer 5, 6)
        Sample Initial nitrogen: Date=14/05/2008; NO3Units=kgha; NH4Units=kgha; SWUnits=Volumetric; OCUnits=Total; PHUnits=Water
          Thickness  NO3   NH4
          230        18.2  3.7
          200        9.3   0.8
          280        16    0.8
          230        13.8  0.4
          150        4.6   0.1
          810        21.9  0.2
          540        14.5  0
          860        48.8  0
      outputfile: filename=Miscanthus.out; title=Miscanthus
        events Reporting Frequency: event=daily
        variables
          variables: dd/mm/yyyy, year, biomass as MiscanthusBiomass, lai as MiscanthusLAI
  simulation Switchgrass
    metfile met: filename=%apsim%\Examples\BioEnergy\West Lafayette.met
    clock
      start_date = 14/05/2007  # Enter the start date of the simulation
      end_date = 31/12/2014  # Enter the end date of the simulation
    summaryfile
    area paddock
      folder Manager folder
        manager Sow on a fixed date
          # Sowing criteria
          date = 15/05/2007  # Enter sowing date (dd-mmm)
          # Sowing parameters
          crop = lucerne  # Enter name of crop to sow
          density = 1000  # Enter sowing density (plants/m2)
          depth = 15  # Enter sowing depth (mm)
          cultivar = Upland  # Enter cultivar
          class = regrowth  # Enter crop growth class
          row_spacing = 200  # Enter row spacing (mm)
          on start_of_day:
```
        if (today = date('[date]') then
              [crop] sow plants =[density], sowing_depth = [depth], cultivar = [cultivar], row_spacing = [row_spacing], crop_class = [class]
         endif
```
        manager harvest lucerne
          surfaceommodule = SurfaceOrganicMatter
          harvest_date_1 = 27/10/2007
          harvest_date_2 = 27/08/2008
          harvest_date_3 = 29/10/2009
          harvest_date_4 = 27/10/2010
          harvest_date_5 = 28/10/2011
          harvest_date_6 = 01/11/2012
          harvest_date_7 = 16/11/2013
          harvest_date_8 = 02/12/2014
          harvest_date_9 =
          harvest_date_10 =
          harvest_date_11 =
          harvest_date_12 =
          harvest_date_13 =
          harvest_date_14 =
          harvest_date_15 =
          on init:
```
summing = 0
```
          on start_of_day:
```
if (today = date('[harvest_date_1]') then
Lucerne harvest plants = 1000(/m2), height = 30 (mm), remove = 1
'[surfaceommodule]' tillage type = burn, f_incorp = 1 tillage_depth = 0
endif

if (today = date('[harvest_date_2]') then
Lucerne harvest plants = 1000 (/m2), height = 30 (mm), remove = 1
'[surfaceommodule]' tillage type = burn, f_incorp = 1 tillage_depth = 0       
endif

if (today = date('[harvest_date_3]') then
Lucerne harvest plants = 1000 (/m2), height = 30 (mm), remove = 1
'[surfaceommodule]' tillage type = burn, f_incorp = 1 tillage_depth = 0        
endif

if (today = date('[harvest_date_4]') then
Lucerne harvest plants = 1000 (/m2), height = 30 (mm), remove = 1
'[surfaceommodule]' tillage type = burn, f_incorp = 1 tillage_depth = 0
endif

if (today = date('[harvest_date_5]') then
Lucerne harvest plants = 1000 (/m2), height = 30 (mm), remove = 1
'[surfaceommodule]' tillage type = burn, f_incorp = 1 tillage_depth = 0
endif

if (today = date('[harvest_date_6]') then
Lucerne harvest plants = 1000 (/m2), height = 30 (mm), remove = 1
'[surfaceommodule]' tillage type = burn, f_incorp = 1 tillage_depth = 0
endif

if (today = date('[harvest_date_7]') then
Lucerne harvest plants = 1000 (/m2), height = 30 (mm), remove = 1
'[surfaceommodule]' tillage type = burn, f_incorp = 1 tillage_depth = 0
endif

if (today = date('[harvest_date_8]') then
Lucerne harvest plants = 1000 (/m2), height = 30 (mm), remove = 1
'[surfaceommodule]' tillage type = burn, f_incorp = 1 tillage_depth = 0
endif
```
        manager Fertilise on fixed date1
          # When should fertiliser be applied
          fert_date = 01/05/2008  # Enter fertiliser date (M-dd-yyyy)
          fert_criteria = 1000  # Don't add fertiliser if N in top 2 layers exceeds (kg/ha)
          # Fertiliser application details
          fertmodule = fertiliser  # Module used to apply the fertiliser
          fert_amount = 75  # Amount of fertiliser to apply (kg/ha)
          fert_type = urea  # Fertiliser type
          on start_of_day:
          script: same as in Miscanthus.paddock.Manager folder.Fertilise on fixed date1
        manager Fertilise on fixed date2
          # When should fertiliser be applied
          fert_date = 11/05/2009  # Enter fertiliser date (M-dd-yyyy)
          fert_criteria = 1000  # Don't add fertiliser if N in top 2 layers exceeds (kg/ha)
          # Fertiliser application details
          fertmodule = fertiliser  # Module used to apply the fertiliser
          fert_amount = 57  # Amount of fertiliser to apply (kg/ha)
          fert_type = urea  # Fertiliser type
          on start_of_day:
          script: same as in Miscanthus.paddock.Manager folder.Fertilise on fixed date1
        manager Fertilise on fixed date3
          # When should fertiliser be applied
          fert_date = 04/05/2010  # Enter fertiliser date (M-dd-yyyy)
          fert_criteria = 1000  # Don't add fertiliser if N in top 2 layers exceeds (kg/ha)
          # Fertiliser application details
          fertmodule = fertiliser  # Module used to apply the fertiliser
          fert_amount = 50  # Amount of fertiliser to apply (kg/ha)
          fert_type = urea  # Fertiliser type
          on start_of_day:
          script: same as in Miscanthus.paddock.Manager folder.Fertilise on fixed date1
        manager Fertilise on fixed date4
          # When should fertiliser be applied
          fert_date = 04/05/2011  # Enter fertiliser date (M-dd-yyyy)
          fert_criteria = 1000  # Don't add fertiliser if N in top 2 layers exceeds (kg/ha)
          # Fertiliser application details
          fertmodule = fertiliser  # Module used to apply the fertiliser
          fert_amount = 50  # Amount of fertiliser to apply (kg/ha)
          fert_type = urea  # Fertiliser type
          on start_of_day:
          script: same as in Miscanthus.paddock.Manager folder.Fertilise on fixed date1
        manager Fertilise on fixed date5
          # When should fertiliser be applied
          fert_date = 03/04/2012  # Enter fertiliser date (M-dd-yyyy)
          fert_criteria = 1000  # Don't add fertiliser if N in top 2 layers exceeds (kg/ha)
          # Fertiliser application details
          fertmodule = fertiliser  # Module used to apply the fertiliser
          fert_amount = 56  # Amount of fertiliser to apply (kg/ha)
          fert_type = urea  # Fertiliser type
          on start_of_day:
          script: same as in Miscanthus.paddock.Manager folder.Fertilise on fixed date1
        manager Fertilise on fixed date6
          # When should fertiliser be applied
          fert_date = 13/05/2013  # Enter fertiliser date (M-dd-yyyy)
          fert_criteria = 1000  # Don't add fertiliser if N in top 2 layers exceeds (kg/ha)
          # Fertiliser application details
          fertmodule = fertiliser  # Module used to apply the fertiliser
          fert_amount = 56  # Amount of fertiliser to apply (kg/ha)
          fert_type = urea  # Fertiliser type
          on start_of_day:
          script: same as in Miscanthus.paddock.Manager folder.Fertilise on fixed date1
        manager Fertilise on fixed date7
          # When should fertiliser be applied
          fert_date = 10/05/2014  # Enter fertiliser date (M-dd-yyyy)
          fert_criteria = 1000  # Don't add fertiliser if N in top 2 layers exceeds (kg/ha)
          # Fertiliser application details
          fertmodule = fertiliser  # Module used to apply the fertiliser
          fert_amount = 56  # Amount of fertiliser to apply (kg/ha)
          fert_type = urea  # Fertiliser type
          on start_of_day:
          script: same as in Miscanthus.paddock.Manager folder.Fertilise on fixed date1
        manager winter dormant rules
          on init:
```
crop_state = 0
```
          on start_of_day:
```
temp = (mint + maxt)/2

if ((day > 60)  or day < 300 
then
dayl = 1
else
dayl = 0 
endif

if dayl = 1 and temp <=30 and crop_class = 'regrowth' 
then 
lucerne dormancy
crop_state = 1
endif

if dayl = 1 and temp  <=30 and crop_class = 'regrowth'
then
lucerne dormancy
crop_state = 2
endif

if dayl = 1 and temp  <=30 and crop_class = 'regrowth'
then
lucerne dormancy
crop_state = 3
endif

if dayl = 1 and temp <=30 and crop_class = 'regrowth'
then
lucerne dormancy
crop_state = 2
endif
```
          on end_of_day:
```
if crop_state = 1 and crop_class <>'delayed' 
then
lucerne delay
endif

if crop_state = 2 and crop_class <>'reduced' 
then
lucerne reduce
endif

if crop_state = 3 and crop_class <>'dormant' 
then
lucerne dormancy
endif
```
      surfaceom SurfaceOrganicMatter
        PoolName = lucerne_stubble  # Organic Matter pool name
        type = lucerne  # Organic Matter type
        mass = 626  # Initial surface residue (kg/ha)
        cnr = 9.62  # C:N ratio of initial residue
        standing_fraction = 0  # Fraction of residue standing
      fertiliser
      lucerne
        ini: filename=SwitchgrassFromLucerne.xml
      Soil Drummer: YearOfSampling=0
        InitialWater: FractionFull=1; PercentMethod=EvenlyDistributed; RelativeTo=ll15
        Water
          Thickness  BD    AirDry  LL15   DUL    SAT    KS
          230        1.24  0.095   0.189  0.361  0.483  165
          200        1.22  0.18    0.2    0.371  0.49   152
          280        1.21  0.194   0.194  0.373  0.493  165
          230        1.25  0.152   0.152  0.342  0.478  232
          150        1.35  0.075   0.075  0.174  0.441  1317
          810        1.35  0.075   0.075  0.177  0.441  1292
          540        1.33  0.126   0.126  0.269  0.447  439
          860        1.33  0.126   0.126  0.267  0.446  445
          SoilCrop lucerne: LL=[0.189, 0.2, 0.194, 0.152, 0.075, 0.075, 0.126, 0.126]; KL=[0.08, 0.08, 0.08, 0.08, 0.08, 0.08, 0.08, 0.08]; XF=[1, 1, 1, 1, 0.9, 0.8, 0.7, 0.6]
        SoilWater: same as Miscanthus.paddock.Drummer.SoilWater
        SoilOrganicMatter: RootCN=45; RootWt=1000; SoilCN=13.4; EnrACoeff=7.4; EnrBCoeff=0.2; OCUnits=Total
          Thickness  OC     FBiom  FInert
          230        2.084  0.016  0.003
          200        0.82   0.015  0.001
          280        0.631  0.015  0.001
          230        0.314  0.016  0.002
          150        0.002  0.152  0.055
          810        0      0.371  0.056
          540        0      0.05   0.25
          860        0      0.083  0.417
        Analysis: PHUnits=Water; BoronUnits=HotWater
          Thickness  Texture          PH   ParticleSizeSand  ParticleSizeSilt  ParticleSizeClay
          230        silty clay loam  5.8  15                56                30
          200        silty clay loam  6.2  12                56                32
          280        silty clay loam  6.5  9                 60                31
          230        silty loam       7.1  14                62                23
          150        sandy loam       8    65                26                9
          810        sandy loam       8    64                29                6
          540        loam             8.1  41                41                18
          860        loam             8.1  42                42                16
        Sample Initial nitrogen: Date=5/14/2007; NO3Units=kgha; NH4Units=kgha; SWUnits=Volumetric; OCUnits=Total; PHUnits=Water
          Thickness  NO3   NH4
          230        15.4  1.9
          200        6     0.5
          280        8.5   0.6
          230        6.3   0.3
          150        2     0
          810        9.1   0.1
          540        6.9   0
          860        13.5  0
          999999     -     -
      outputfile: filename=Switchgrass.out; title=Switchgrass
        events Reporting Frequency: event=end_day
        variables
          variables: dd/mm/yyyy, year, biomass as SwitchgrassBiomass, lai as SwitchgrassLAI
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