folder Simulations: version=32
  simulation Canopy
    metfile met: filename=%apsim%/Examples/MetFiles/Dalby.met
    clock
      start_date = 1/01/1988  # Select the start date of the simulation
      end_date = 31/12/1988  # Select the end date of the simulation
    summaryfile
    area paddock
      soil No000 SampleBlackVertosol (No000): Site=Generic; Region=South East Queensland; State=Queensland
        Comment = estimated cotton LL  # Comments
        SoilType = Black Vertosol  # Soil description
        NearestTown = Generic
        Water
          Layer:
            Thickness (mm)  BD (g/cc)  AirDry (mm/mm)  LL15 (mm/mm)  DUL (mm/mm)  SAT (mm/mm)
            150             1.020      0.150           0.290         0.540        0.590
            150             1.030      0.230           0.290         0.530        0.580
            300             1.020      0.290           0.290         0.540        0.590
            300             1.020      0.290           0.290         0.540        0.580
            300             1.060      0.290           0.290         0.520        0.570
            300             1.110      0.290           0.290         0.500        0.550
            300             1.120      0.290           0.290         0.500        0.550
            300             1.150      0.290           0.290         0.480        0.530
            300             1.180      0.290           0.290         0.470        0.520
            300             1.200      0.290           0.290         0.460        0.510
            300             1.250      0.290           0.290         0.440        0.490
          SoilCrop wheat
            Layer:
              Thickness (mm)  LL (mm/mm)  KL (/day)  XF (0-1)
              150             0.290       0.060      1
              150             0.290       0.060      1
              300             0.320       0.060      1
              300             0.320       0.040      1
              300             0.350       0.040      1
              300             0.380       0.020      0.420
              300             0.410       0.020      0.370
              300             0.480       0          0
              300             0.470       0          0
              300             0.460       0          0
              300             0.440       0          0
          SoilCrop canola
            Layer:
              Thickness (mm)  LL (mm/mm)  KL (/day)  XF (0-1)
              150             0.290       0.060      1
              150             0.290       0.060      1
              300             0.320       0.060      1
              300             0.320       0.040      1
              300             0.350       0.040      1
              300             0.380       0.020      0.420
              300             0.410       0.010      0.370
              300             0.480       0          0
              300             0.470       0          0
              300             0.460       0          0
              300             0.440       0          0
          SoilCrop barley
            Layer:
              Thickness (mm)  LL (mm/mm)  KL (/day)  XF (0-1)
              150             0.290       0.070      1
              150             0.290       0.070      1
              300             0.320       0.070      1
              300             0.380       0.050      1
              300             0.390       0.050      1
              300             0.390       0.030      0.420
              300             0.410       0.020      0.370
              300             0.480       0          0
              300             0.470       0          0
              300             0.460       0          0
              300             0.440       0          0
          SoilCrop chickpea
            Layer:
              Thickness (mm)  LL (mm/mm)  KL (/day)  XF (0-1)
              150             0.290       0.060      1
              150             0.290       0.060      1
              300             0.360       0.060      1
              300             0.430       0.060      1
              300             0.510       0.060      1
              300             0.500       0.060      0.420
              300             0.500       0.060      0.370
              300             0.480       0          0
              300             0.470       0          0
              300             0.460       0          0
              300             0.440       0          0
          SoilCrop fababean
            Layer:
              Thickness (mm)  LL (mm/mm)  KL (/day)  XF (0-1)
              150             0.290       0.080      1
              150             0.290       0.080      1
              300             0.320       0.080      1
              300             0.320       0.080      1
              300             0.350       0.060      1
              300             0.380       0.040      0.420
              300             0.410       0.030      0.370
              300             0.480       0          0
              300             0.470       0          0
              300             0.460       0          0
              300             0.440       0          0
          SoilCrop Cotton
            Layer:
              Thickness (mm)  LL (mm/mm)  KL (/day)  XF (0-1)
              150             0.290       0.100      1
              150             0.290       0.100      1
              300             0.350       0.100      1
              300             0.360       0.100      1
              300             0.380       0.090      1
              300             0.390       0.070      0.420
              300             0.390       0.050      0.370
              300             0.480       0          0
              300             0.470       0          0
              300             0.460       0          0
              300             0.440       0          0
          SoilCrop Sorghum
            Layer:
              Thickness (mm)  LL (mm/mm)  KL (/day)  XF (0-1)
              150             0.290       0.070      1
              150             0.290       0.070      1
              300             0.350       0.070      1
              300             0.380       0.050      1
              300             0.400       0.050      1
              300             0.400       0.040      0.420
              300             0.400       0.030      0.370
              300             0.480       0          0
              300             0.470       0          0
              300             0.460       0          0
              300             0.440       0          0
          SoilCrop Mungbean
            Layer:
              Thickness (mm)  LL (mm/mm)  KL (/day)  XF (0-1)
              150             0.290       0.060      1
              150             0.290       0.060      1
              300             0.320       0.060      1
              300             0.320       0.040      1
              300             0.350       0.040      1
              300             0.380       0.010      0.420
              300             0.410       0.010      0.370
              300             0.480       0          0
              300             0.470       0          0
              300             0.460       0          0
              300             0.440       0          0
          SoilCrop sunflowr
            Layer:
              Thickness (mm)  LL (mm/mm)  KL (/day)  XF (0-1)
              150             0.290       0.100      1
              150             0.290       0.100      1
              300             0.320       0.080      1
              300             0.320       0.060      1
              300             0.350       0.040      1
              300             0.380       0.020      0.420
              300             0.410       0.010      0.370
              300             0.480       0          0
              300             0.470       0          0
              300             0.460       0          0
              300             0.440       0          0
          SoilCrop Lucerne
            Layer:
              Thickness (mm)  LL (mm/mm)  KL (/day)  XF (0-1)
              150             0.290       0.100      1
              150             0.290       0.100      1
              300             0.290       0.100      1
              300             0.290       0.100      1
              300             0.300       0.090      1
              300             0.310       0.090      0.420
              300             0.320       0.090      0.370
              300             0.330       0.090      0.330
              300             0.340       0.090      0.310
              300             0.350       0.090      0.310
              300             0.360       0.090      0.330
          SoilCrop Maize
            Layer:
              Thickness (mm)  LL (mm/mm)  KL (/day)  XF (0-1)
              150             0.290       0.060      1
              150             0.290       0.060      1
              300             0.340       0.060      1
              300             0.340       0.040      1
              300             0.370       0.040      1
              300             0.400       0.020      0.420
              300             0.420       0.010      0.370
              300             0.480       0          0
              300             0.470       0          0
              300             0.460       0          0
              300             0.440       0          0
          SoilCrop Perennial Grass
            Layer:
              Thickness (mm)  LL (mm/mm)  KL (/day)  XF (0-1)
              150             0.290       0.100      1
              150             0.290       0.100      1
              300             0.390       0.100      1
              300             0.410       0.100      1
              300             0.400       0.090      1
              300             0.400       0.070      0.420
              300             0.410       0.050      0.370
              300             0.410       0          0
              300             0.400       0          0
              300             0.400       0          0
              300             0.420       0          0
          SoilCrop Cowpea: same as Canopy.paddock.No000 SampleBlackVertosol (No000).Water.canola
          SoilCrop Navybean: same as Canopy.paddock.No000 SampleBlackVertosol (No000).Water.Mungbean
          SoilCrop Peanut: same as Canopy.paddock.No000 SampleBlackVertosol (No000).Water.Mungbean
          SoilCrop Pigeonpea
            Layer:
              Thickness (mm)  LL (mm/mm)  KL (/day)  XF (0-1)
              150             0.290       0.060      1
              150             0.290       0.060      1
              300             0.320       0.060      1
              300             0.320       0.050      1
              300             0.350       0.040      1
              300             0.380       0.020      0.420
              300             0.410       0.010      0.370
              300             0.480       0          0
              300             0.470       0          0
              300             0.460       0          0
              300             0.440       0          0
          SoilCrop Soybean: same as Canopy.paddock.No000 SampleBlackVertosol (No000).Water.canola
          SoilCrop Stylo: same as Canopy.paddock.No000 SampleBlackVertosol (No000).Water.sunflowr
          SoilCrop Sugar: same as Canopy.paddock.No000 SampleBlackVertosol (No000).Water.sunflowr
          SoilCrop Lablab: same as Canopy.paddock.No000 SampleBlackVertosol (No000).Water.sunflowr
        SoilWat: SummerCona=3.5; SummerU=6; SummerDate=1-Nov; WinterCona=3.5; WinterU=6; WinterDate=1-Apr; DiffusConst=40; DiffusSlope=16; Salb=0.12; CN2Bare=73; CNRed=20; CNCov=0.8
          Layer:
            Thickness (mm)  SWCON (0-1)
            150             0.300
            150             0.300
            300             0.300
            300             0.300
            300             0.300
            300             0.300
            300             0.300
            300             0.300
            300             0.300
            300             0.300
            300             0.300
        SoilOrganicMatter: RootCN=40; RootWT=1000; SoilCN=12; EnrACoeff=7.4; EnrBCoeff=0.2
          Layer:
            Thickness (mm)  OC (Total %)  FBiom (0-1)  FInert (0-1)
            150             1.040         0.040        0.400
            150             0.890         0.020        0.600
            300             0.890         0.020        0.800
            300             0.890         0.020        1
            300             0.770         0.010        1
            300             0.450         0.010        1
            300             0.270         0.010        1
            300             0.220         0.010        1
            300             0.160         0.010        1
            300             0.130         0.010        1
            300             0.120         0.010        1
        Analysis
          Layer:
            Thickness (mm)  EC (1:5 dS/m)  PH (1:5 water)
            150             0.200          8.400
            150             0.300          8.800
            300             0.300          9
            300             0.400          9.200
            300             0.600          9.200
            300             0.800          9.100
            300             0.900          9
            300             1              9
            300             1.100          8.900
            300             1.100          8.900
            300             1              8.900
        Sample Initial nitrogen
          Layer:
            Thickness (mm)  NO3 (ppm)  NH4 (ppm)
            150             6          1
            150             5          1
            300             3          0.900
            300             2          0.700
            300             1          0.200
            300             1          0.100
            300             1          0.010
            300             1          0.010
            300             1          0.010
            300             1          0.010
            300             1          0.010
        Sample Initial water
          Layer:
            Thickness (mm)  SW (mm/mm)
            150             0.290
            150             0.290
            300             0.350
            300             0.360
            300             0.380
            300             0.390
            300             0.390
            300             0.480
            300             0.470
            300             0.460
            300             0.440
      canopy
        intercrop = maize cowpea  # Enter crop names to intercrop
      cowpea
      maize
      manager Logic
        on start_of_day:
```
 ! MAIZE SOWING AND HARVEST ************
if day = 10 and year = 1988 then
      maize sow cultivar = dekalb_xl82, plants = 10, sowing_depth = 30 (mm)
endif

if (maize.stage = 11) then
      maize harvest
      maize end_crop
endif

! COWPEA SOWING AND HARVEST**********
if day = 10 and year  = 1988 then
   cowpea sow cultivar = banjo, plants = 25 (/m2), sowing_depth = 40 (mm)
endif

if cowpea.StageName = 'harvest_ripe' or cowpea.plant_status = 'dead' then
   cowpea harvest
   cowpea end_crop   
endif
```
      outputfile: filename=Canopy.out; title=Canopy
        variables
          variable:
            dd/mm/yyyy as Date  # Date (dd/mm/yyyy)
            sw_dep()  # Soil water - layered (mm)
            cowpea.lai as lai_cowpea  # Leaf area index
            maize.lai as lai_maize  # Maize Leaf area index
            canopy.cover_tot_sum
            cowpea.biomass as biom_cowpea  # Biomass
            maize.biomass as biom_maize  # Maize Total Above Ground Biomass (kg/ha)
        events Reporting Frequency: event=Daily  # End of daily simulation time step
