folder Simulations: version=32
  simulation Centro
    metfile met: filename=%apsim%/Examples/MetFiles/Dalby.met
    clock
      start_date = 1/01/1988  # Select the start date of the simulation
      end_date = 30/04/1990  # Select the end date of the simulation
    summaryfile
    area paddock
      soil Grey Vertosol-Kupunn (Kupunn No009): Site=Kupunn; Region=Darling Downs; State=Queensland
        Comment = Soil naming structure: \State\Region\Classification-Local Name (Site/district and locator number); oc and ph estimated  # Comments
        SoilType = Grey Vertosol  # Soil description
        NearestTown = Dalby, Q 4405
        NaturalVegetation = Brigalow, belah, wilga
        DataSource = CSIRO Sustainable Ecosystems, Toowoomba
        Water
          Layer:
            Thickness (mm)  BD (g/cc)  AirDry (mm/mm)  LL15 (mm/mm)  DUL (mm/mm)  SAT (mm/mm)
            150             1.400      0.110           0.210         0.390        0.440
            150             1.390      0.170           0.210         0.390        0.440
            300             1.370      0.210           0.210         0.400        0.450
            300             1.360      0.210           0.210         0.410        0.460
            300             1.380      0.210           0.210         0.400        0.450
            300             1.390      0.210           0.210         0.390        0.440
            300             1.420      0.210           0.210         0.380        0.430
          SoilCrop wheat
            Layer:
              Thickness (mm)  LL (mm/mm)  KL (/day)  XF (0-1)
              150             0.210       0.060      1
              150             0.210       0.060      1
              300             0.250       0.060      1
              300             0.280       0.040      1
              300             0.310       0.040      1
              300             0.370       0.020      1
              300             0.380       0.020      1
          SoilCrop chickpea
            Layer:
              Thickness (mm)  LL (mm/mm)  KL (/day)  XF (0-1)
              150             0.210       0.060      1
              150             0.210       0.060      1
              300             0.220       0.060      1
              300             0.270       0.060      1
              300             0.290       0.060      1
              300             0.340       0.060      1
              300             0.380       0.060      1
          SoilCrop Cotton
            Layer:
              Thickness (mm)  LL (mm/mm)  KL (/day)  XF (0-1)
              150             0.210       0.100      1
              150             0.210       0.100      1
              300             0.220       0.100      1
              300             0.250       0.100      1
              300             0.270       0.090      1
              300             0.310       0.070      1
              300             0.360       0.050      1
          SoilCrop Sorghum
            Layer:
              Thickness (mm)  LL (mm/mm)  KL (/day)  XF (0-1)
              150             0.210       0.070      1
              150             0.210       0.070      1
              300             0.260       0.070      1
              300             0.260       0.050      1
              300             0.280       0.050      1
              300             0.340       0.040      1
              300             0.360       0.030      1
          SoilCrop centro
            Layer:
              Thickness (mm)  LL (mm/mm)  KL (/day)  XF (0-1)
              150             0.190       0.060      1
              150             0.210       0.060      1
              300             0.250       0.060      1
              300             0.280       0.040      1
              300             0.310       0.040      1
              300             0.370       0.020      1
              300             0.380       0.020      1
        SoilWat: SummerCona=3.5; SummerU=6; SummerDate=1-Nov; WinterCona=3.5; WinterU=6; WinterDate=1-Apr; DiffusConst=40; DiffusSlope=16; Salb=0.12; CN2Bare=73; CNRed=20; CNCov=0.8
          Layer:
            Thickness (mm)  SWCON (0-1)
            150             0.300
            150             0.300
            300             0.300
            300             0.300
            300             0.300
            300             0.300
            300             0.300
        SoilOrganicMatter: RootCN=40; RootWT=1000; SoilCN=12; EnrACoeff=7.4; EnrBCoeff=0.2
          Layer:
            Thickness (mm)  OC (Total %)  FBiom (0-1)  FInert (0-1)
            150             1.240         0.040        0.400
            150             1.240         0.020        0.600
            300             1.250         0.020        0.800
            300             1.100         0.020        1
            300             0.710         0.010        1
            300             0.340         0.010        1
            300             0.260         0.010        1
        Analysis
          Layer:
            Thickness (mm)  PH (1:5 water)
            150             7
            150             7
            300             7
            300             7
            300             7
            300             7
            300             7
        Sample Initial nitrogen
          Layer:
            Thickness (mm)  NO3 (ppm)  NH4 (ppm)
            150             6          1
            150             5          1
            300             3          0.900
            300             2          0.700
            300             1          0.200
            300             1          0.100
            300             1          0.010
        Sample Initial water
          Layer:
            Thickness (mm)  SW (mm/mm)
            150             0.210
            150             0.210
            300             0.220
            300             0.250
            300             0.270
            300             0.310
            300             0.360
      surfaceom SurfaceOrganicMatter
        PoolName = wheat  # Organic Matter pool name
        type = wheat  # Organic Matter type
        mass = 1000.  # Initial surface residue (kg/ha)
        cnr = 80.0  # C:N ratio of initial residue
        standing_fraction = 0.0  # Fraction of residue standing
      fertiliser
      centro
      folder Manager folder
        manager Sowing rule
          # Sowing criteria
          date1 = 23-Sep  # Enter sowing window START date (dd-mmm)
          date2 = 23-Sep  # Enter sowing window END date (dd-mmm)
          must_sow = yes  # Must sow?
          raincrit = 30  # Amount of rainfall
          rainnumdays = 3  # Number of days of rainfall
          esw_amount = 200  # Enter minimum allowable available soil water (mm)
          # Sowing parameters
          crop = centro  # Enter name of crop to sow
          density = 20  # Enter sowing density (plants/m2)
          depth = 30  # Enter sowing depth (mm)
          cultivar = cavalcade  # Enter cultivar
          class = plant  # Enter crop growth class
          row_spacing = 250  # Enter row spacing (mm)
          on start_of_day:
```
      if (paddock_is_fallow() = 1 ) then
         if (date_within('[date1], [date2]') = 1) then
            if (rain[[rainnumdays]] >= [raincrit] AND esw >= [esw_amount]) OR
                ('[must_sow]' = 'yes' AND today = date('[date2]'))) THEN
               [crop] sow Population =[density], sowing_depth = [depth], cultivar = [cultivar], row_spacing = [row_spacing], crop_class = [class]
            endif
         endif
      endif
```
        manager Sowing fertiliser
          # When should fertiliser be applied
          modulename = centro  # On which module should the event come from
          eventname = sowing  # On which event should fertiliser be applied
          # Fertiliser application details
          fertmodule = fertiliser  # Module used to apply the fertiliser
          fert_amount_sow = 0  # Amount of starter fertiliser at sowing (kg/ha)
          fert_type_sow = urea_N  # Sowing fertiliser type
          on [modulename].[eventname]:
```
        [fertmodule] apply amount = [fert_amount_sow] (kg/ha), depth = 50 (mm), type = [fert_type_sow]
```
        manager Harvesting rule
          # Harvesting criteria
          crop = centro  # Enter name of crop to harvest when ripe
          on end_of_day:
```
           if [crop].StageName = 'harvest_ripe' or [crop].plant_status = 'dead' then
              [crop]  harvest
              [crop]  end_crop
           endif
```
      outputfile: filename=Centro.out; title=Centro
        variables
          variable:
            dd/mm/yyyy as Date  # Date (dd/mm/yyyy)
            year  # Year
            day  # Day
            DaysAfterSowing  # Days after Sowing
            biomass  # Biomass
            green_biomass  # Green Biomass weight
            stover_wt  # Stover Biomass weight
            yield  # Yield
            lai  # Leaf area index
            esw_layr()  # Extractable soil water
            root_depth  # depth of roots
        events Reporting Frequency: event=harvesting
