folder Cotton Simulations: version=37; creator=Apsim 7.10-r4181
  simulation Continuous Dryland Cotton
    metfile met: filename=%apsim%\Examples\MetFiles\WeeWaa1889_2012.met
    clock
      start_date = 01/06/2000  # Enter the start date of the simulation
      end_date = 31/08/2012  # Enter the end date of the simulation
    summaryfile
    area paddock
      Soil: ASCOrder=Vertosol; ASCSubOrder=Grey; SoilType=Clay; Site=Myall Vale; NearestTown=Narrabri, NSW 2390; Region=North West Slopes and Plains; State=New South Wales; Country=Australia; NaturalVegetation=Grasslands; ApsoilNumber=97; Latitude=-30.203; Longitude=149.593; LocationAccuracy=+/- 20m; YearOfSampling=0; DataSource=CSIRO Plant Industry, Myall Vale (D Richards)
        Water
          Thickness  BD    AirDry  LL15  DUL   SAT
          150        1.31  0.11    0.22  0.43  0.48
          150        1.26  0.176   0.22  0.44  0.49
          300        1.36  0.22    0.22  0.41  0.46
          300        1.39  0.22    0.22  0.4   0.45
          300        1.44  0.22    0.22  0.38  0.43
          300        1.45  0.22    0.22  0.37  0.42
          300        1.46  0.22    0.22  0.37  0.42
          BD, DUL source: Field measured and checked for sensibility
          AirDry, LL15 source: Estimated based on local knowledge
          SAT source: Calculated from measured, estimated or calculated BD
          SoilCrop wheat: LL=[0.22, 0.22, 0.23, 0.25, 0.28, 0.3, 0.36]; KL=[0.06, 0.06, 0.06, 0.04, 0.04, 0.02, 0.01]; XF=[1, 1, 1, 1, 1, 1, 1]
            LL source: Field measured and checked for sensibility
          SoilCrop barley: LL=[0.22, 0.22, 0.23, 0.25, 0.28, 0.3, 0.36]; KL=[0.07, 0.07, 0.07, 0.05, 0.05, 0.03, 0.02]; XF=[1, 1, 1, 1, 1, 1, 1]
            LL source: Estimated based on local knowledge
          SoilCrop chickpea: LL=[0.22, 0.22, 0.25, 0.28, 0.3, 0.31, 0.36]; KL=[0.06, 0.06, 0.06, 0.06, 0.06, 0.06, 0.06]; XF=[1, 1, 1, 1, 1, 1, 1]
            LL source: Field measured and checked for sensibility
          SoilCrop cotton: LL=[0.22, 0.22, 0.22, 0.25, 0.27, 0.3, 0.33]; KL=[0.1, 0.1, 0.1, 0.1, 0.09, 0.07, 0.05]; XF=[1, 1, 1, 1, 1, 1, 1]
            LL source: Field measured and checked for sensibility
          SoilCrop sorghum: LL=[0.22, 0.22, 0.24, 0.26, 0.28, 0.31, 0.34]; KL=[0.07, 0.07, 0.07, 0.05, 0.05, 0.04, 0.03]; XF=[1, 1, 1, 1, 1, 1, 1]
            LL source: Field measured and checked for sensibility
          SoilCrop mungbean: LL=[0.22, 0.22, 0.28, 0.34, 0.33, 0.37, 0.37]; KL=[0.06, 0.06, 0.06, 0.04, 0.04, 0.01, 0.01]; XF=[1, 1, 1, 1, 1, 1, 1]
            LL source: Field measured and checked for sensibility
        SoilWater: SummerCona=3.5; SummerU=6; SummerDate=1-Nov; WinterCona=2.5; WinterU=4; WinterDate=1-Apr; DiffusConst=40; DiffusSlope=16; Salb=0.12; CN2Bare=73; CNRed=20; CNCov=0.8; Thickness=[150, 150, 300, 300, 300, 300, 300]; SWCON=[0.3, 0.3, 0.3, 0.3, 0.3, 0.3, 0.3]
        SoilOrganicMatter: RootCN=40; RootWt=1000; SoilCN=12; EnrACoeff=7.4; EnrBCoeff=0.2; OCUnits=WalkleyBlack
          Thickness  OC         FBiom  FInert
          150        0.676923   0.04   0.4
          150        0.584615   0.02   0.6
          300        0.476923   0.02   0.8
          300        0.246154   0.02   1
          300        0.0923077  0.01   1
          300        0.0769231  0.01   1
          300        0.0384615  0.01   1
          OC source: Estimated based on local knowledge
        Analysis: Thickness=[150, 150, 300, 300, 300, 300, 300]; PH=[8.9, 9.2, 9.3, 9, 8.8, 7.5, 8.4]; PHUnits=Water; BoronUnits=HotWater
          PH source: Estimated based on local knowledge
        InitialWater: FractionFull=1; PercentMethod=FilledFromTop; RelativeTo=cotton
        Sample InitialNitrogen: NO3Units=kgha; NH4Units=kgha; SWUnits=Volumetric; OCUnits=Total; PHUnits=Water
          Thickness  NO3  NH4
          150        30   1.79994
          150        34   0.29295
          300        28   1.24848
          300        20   1.27602
          300        20   1.37376
          300        10   1.44855
          300        6    1.47168
      surfaceom SurfaceOrganicMatter
        PoolName = cotton  # Organic Matter pool name
        type = cotton  # Organic Matter type
        mass = 1000  # Initial surface residue (kg/ha)
        cnr = 80  # C:N ratio of initial residue
        standing_fraction = 0  # Fraction of residue standing
      fertiliser
      Cotton2 Cotton
        initsection
          crop_type = cotton
          leaf_res_n_conc = 0.02
          hucut = 40  # oC
          baset = 12  # oC
          open_def = 60  # %
          a_root_leaf = 1.01
          a_stem_leaf = 1.25
          e_par = 2.5  # g/MJ
          specific_lw = 58  # g/m^2
          t_opt = 25  # oC
          t_base = 8  # oC
          wt_area_max = 150
          embryo = 0.75  # g
          f_leaf = 0.6
          f_stem = 0.15
          f_root = 0.25
          elevation_default = 200  # m
          wlog_assimilate_red = 0.2
          wlog_carcap_red = 0.2
          watlog_c = 0.87
          watlog_n = 0.87
          wlog_carcap_red_stress = 0.01
          smi_affect_wlog = 0.75
          days_relief_wlog = 7  # days
          frost_kill_immediate = 2  # oC
          rtdep_max = 130  # cm
          harvest_n_frac = 0.85
          cutout_smi_crit = 0.75
          cutout_smi_days = 5  # days
          cutout_smi_site_red = 0.1
          epcoef1 = 3.051
          epcoef2 = 2.436
          epcoef_smi_crit = 0.5
          fbwstr_low = 0
          fbwstr_high = 0.5
          fbwstr_a = 1
          fbnstr_low = 0
          fbnstr_high = 0.5
          fbnstr_a = 1
          relp_smi_crit = 0.5
          relp_intercept = 0.25
          relp_slope = 0.864
          relp_low = 0
          relp_high = 1
          relp_a = 0.5
          vsnstr_low = 0
          vsnstr_high = 0.9
          vsnstr_a = 1
          flfsmi_low = 0
          flfsmi_high = 0.5
          flfsmi_a = 1
          vlnstr_low = 0
          vlnstr_high = 0.9
          vlnstr_a = 1
          fw_low = 0
          fw_high = 0.25
          fw_a = 1
          adjust_low = 0
          adjust_high = 5
          adjust_a = 1
          fwstrs_low = 0
          fwstrs_high = 0.5
          fwstrs_a = 4
          smi_delay_crit = 0.25
          cold_shock_delay_crit = 11  # oC
          cold_shock_delay = 5.2  # dd
          fert_crit = 1  # kg/ha
          fert_detect = 10  # kg/ha
          days_since_fert_max = 100  # days
          cultivar_default = S71BR
          rootLACrit = 0.012  # m2
          RFV_max = 30  # mm/day
          specific_root_length = 60000  # mm/g
          useDDsumTo1stSq = true
          init cultivars: array=T
            element
              cultivar = _Default_S71BR
              percent_l = 40
              scboll = 5
              respcon = 0.01593
              sqcon = 0.0217
              fcutout = 0.5411
              flai = 0.87
              DDISQ = 402
              TIPOUT = 52
              FRUDD = [50, 161, 307, 338, 484, 630, 848, 1071]
              BLTME = [0, 0, 0, 0.07, 0.21, 0.33, 0.55, 1]
              WT = [0.0104, 0.0272, 0.1441, 0.0988, 0.5042, 0.9617, 1, 0.5785]
              dlds_max = 0.12
              rate_emergence = 1
              popcon = 0.03633
              fburr = 1.23
              ACOTYL = 525
              RLAI = 0.01
              BckGndRetn = 0.9
            element
              cultivar = S71
              percent_l = 42
              scboll = 5.2
              respcon = 0.01593
              sqcon = 0.0217
              fcutout = 0.5411
              flai = 0.87
              DDISQ = 402
              TIPOUT = 52
              FRUDD = [50, 161, 307, 338, 484, 630, 848, 1071]
              BLTME = [0, 0, 0, 0.07, 0.21, 0.33, 0.55, 1]
              WT = [0.0104, 0.0272, 0.1441, 0.0988, 0.5042, 0.9617, 1, 0.5785]
              dlds_max = 0.12
              rate_emergence = 1
              popcon = 0.03633
              fburr = 1.23
              ACOTYL = 525
              RLAI = 0.01
              BckGndRetn = 0.8
            element
              cultivar = S71BR
              percent_l = 40
              scboll = 5
              respcon = 0.01593
              sqcon = 0.0217
              fcutout = 0.5411
              flai = 0.87
              DDISQ = 402
              TIPOUT = 52
              FRUDD = [50, 161, 307, 338, 484, 630, 848, 1071]
              BLTME = [0, 0, 0, 0.07, 0.21, 0.33, 0.55, 1]
              WT = [0.0104, 0.0272, 0.1441, 0.0988, 0.5042, 0.9617, 1, 0.5785]
              dlds_max = 0.12
              rate_emergence = 1
              popcon = 0.03633
              fburr = 1.23
              ACOTYL = 525
              RLAI = 0.01
              BckGndRetn = 0.9
            element
              cultivar = Siok
              percent_l = 42
              scboll = 4.5
              respcon = 0.01593
              sqcon = 0.0228
              fcutout = 0.5411
              flai = 0.52
              DDISQ = 420
              TIPOUT = 52
              FRUDD = [50, 180, 350, 380, 520, 660, 870, 1100]
              BLTME = [0, 0, 0, 0.07, 0.21, 0.33, 0.55, 1]
              WT = [0.0104, 0.0272, 0.1441, 0.0988, 0.5042, 0.9617, 1, 0.5785]
              dlds_max = 0.12
              rate_emergence = 1
              popcon = 0.03633
              fburr = 1.23
              ACOTYL = 525
              RLAI = 0.01
              BckGndRetn = 0.9
            element
              cultivar = Sica
              percent_l = 40
              scboll = 5.5
              respcon = 0.02306
              sqcon = 0.0206
              fcutout = 0.4789
              flai = 0.87
              DDISQ = 420
              TIPOUT = 52
              FRUDD = [50, 180, 350, 380, 520, 660, 870, 1100]
              BLTME = [0, 0, 0, 0.07, 0.21, 0.33, 0.55, 1]
              WT = [0.0104, 0.0272, 0.1441, 0.0988, 0.5042, 0.9617, 1, 0.5785]
              dlds_max = 0.12
              rate_emergence = 1
              popcon = 0.03633
              fburr = 1.23
              ACOTYL = 525
              RLAI = 0.01
              BckGndRetn = 0.9
      folder Manager folder
        manager2 Crop Management
          # Crop properties
          crop = cotton  # Name of this crop
          # Sowing criteria
          date1 = 1-oct  # Enter sowing window START date (dd-mmm)
          date3 = na  # Enter cultivar change date (na if not in use)
          date2 = 10-nov  # Enter sowing window END date (dd-mmm)
          must_sow = yes
          rain_amount = 30  # Enter amount of cumulative rainfall (mm)
          rain_days = 3  # Enter number of days to accumulate rainfall (days)
          esw_amount = 0  # Enter amount of soil water (mm)
          # Sowing Parameters
          cultivar1 = S71BR  # Enter cultivar
          cultivar2 = na  # Enter 2nd Cultivar (na if not using a second cultivar)
          density1 =  # Enter sowing density (plants/m2)
          depth1 = 50  # Enter sowing depth (mm)
          row_spacing1 = 1000  # Enter row spacing (mm)
          # Extra Parameters
          plants_pm1 = 10  # Enter sowing density (plants/ m row cotton)
          ftn1 = na  # Enter Fertile Tiller Number (na for auto)
          skiprow1 = single  # Skip row
          tillageImplement = na  # Name of tillage implement (na if not in use)
```csharp
using System;
using ModelFramework;
using CSGeneral;

// Basic crop management: sowing & harvesting.
// Multi-paddock aware.
// This component DOES NOT require a trigger from the sequencer.
// It will assume it is the only crop in the system if it doesnt find a sequencer.
// If it does find a sequencer, it will do nothing until told to (via Enter/Leave).
public class Script 
{      
   [Link()]  public Simulation MySimulation;
   
   [Param()] private string crop;         // The module name of this crop
   [Param()] private string date1;         //Start of sowing window
   [Param()] private string date2;         //End of sowing window
   [Param()] private string date3;         //date to change to different cultivar
   [Param()] int esw_amount;
   [Param()] private string must_sow;

   [Input()] private DateTime today;

   // Rainfall accumulator
   [Param()] int rain_days;              //check for rain over this period
   [Param()] int rain_amount;            //this much rain over that period

   // Daily rainfall from the system
   [Input] private double rain;
   private ManagerUtility.Tracker<double> rainTracker; 

   private bool inWindow = false;
   private bool endOfWindow = false;
   private bool ChangeCultivar = false;

   //initialise tracker, telling it how many days to track
   [EventHandler] public void OnInitialised()
   {
      rainTracker = new ManagerUtility.Tracker<double>(rain_days); 
   }

   // Daily tests common to all paddocks
   [EventHandler] public void OnPrepare()
   {
      bool startOfWindow = DateUtility.DatesEqual(date1, today);

      inWindow = DateUtility.WithinDates(date1, today, date2);
      ChangeCultivar = false;
      if(date3 != "na")  
         ChangeCultivar = DateUtility.WithinDates(date3, today, date2);
      endOfWindow = DateUtility.DatesEqual(date2, today);

      rainTracker.Add(rain);
      string currentPaddock = "";
      if (MySimulation.Get("currentPaddock", out currentPaddock) == false) 
      {
         // If there is no sequencer plugged in then we are it..
         if (canEnter > 0) {
            OnEnter();
         }
         if (canLeave > 0) {
            OnLeave();
         }
      }
   }
   // Test whether we can sow a crop today
   // +ve number - yes
   // 0          - no
   // -ve number - no, out of scope (planting window)
   [Output, Description("Test whether we can sow a crop today")] public int canEnter  {
      get {
         bool isPossibleToday = false;
         
         string currentPaddock;
         MySimulation.Get("currentPaddock", out currentPaddock);
         //Console.WriteLine("1. '" + currentPaddock + "'");

         Component paddockModule;
         if (currentPaddock != "")
            paddockModule = (Component) MySimulation.LinkByName(currentPaddock);
         else
            paddockModule = (Component) MySimulation.ChildPaddocks[0];
         //Console.WriteLine("2. " + paddockModule.Name);

         Component cropModule = (Component) paddockModule.LinkByName( crop );

         //Console.WriteLine("3. " + cropModule.Name);
         string plantStatus = "";
         cropModule.Get("plant_status", out plantStatus);

         double esw = 0.0;
         Component soilModule = (Component) paddockModule.LinkByType("SoilWat");
         soilModule.Get("esw", out esw);
         if (plantStatus == "out" &&
             inWindow &&
             rainTracker.Sum() >= rain_amount &&
             esw > esw_amount) 
         {
             isPossibleToday = true;
         } 

	     if (isPossibleToday)
            return 1;
         
         if (plantStatus == "out" && endOfWindow && must_sow == "yes")
            return 1;

         if (plantStatus == "out" && !inWindow)
            return -1;
         
         return 0;
      }
   }  
   
   
   // Sow a crop
   [Param()] private string cultivar1;
   [Param()] private string cultivar2;
   [Param()] private string density1;
   [Param()] private string plants_pm1;
   [Param()] private double depth1;
   [Param()] private double row_spacing1;
   [Param()] private string ftn1;
   [Param()] private string skiprow1;
   [Param()] private string tillageImplement;
   
   [EventHandler, Description("Sow the crop")] public void OnEnter()
   {
      Console.WriteLine(today.ToString("dd/MM/yyyy") + " Sowing Crop");
      SowType data = new SowType();
      data.Cultivar = cultivar1;
      if(ChangeCultivar)
         data.Cultivar = cultivar2;

      double density = 0;
      if (! double.TryParse(density1, out density) && density1 != "")
         Console.WriteLine(today.ToString("dd/MM/yyyy") + " Ignoring density parameter \"" + density1 + "\"");

      double plants_pm = 0;
      if (! double.TryParse(plants_pm1, out plants_pm)&& plants_pm1 != "")
         Console.WriteLine(today.ToString("dd/MM/yyyy") + " Ignoring plants_pm parameter \"" + plants_pm1 + "\"");

      data.plants = density;
      data.plants_pm = plants_pm;
      data.sowing_depth = depth1;
      data.row_spacing = row_spacing1;
      data.tiller_no_fertile = (ftn1 == "na") ? "" : ftn1;
      data.SkipRow = 0 ;
      if (skiprow1 == "single")
         data.SkipRow = 1;
      else if (skiprow1 == "double")
         data.SkipRow = 2;

      string currentPaddock;
      MySimulation.Get("currentPaddock", out currentPaddock);
      Component cropModule;
      if (currentPaddock != "")
         cropModule = (Component) MySimulation.LinkByName(currentPaddock + "." + crop);
      else 
         cropModule = (Component) MySimulation.ChildPaddocks[0].LinkByName(crop);

      cropModule.Publish("Sow", data);

      if (tillageImplement.ToLower() != "na") 
	  {
         TillageType t = new TillageType();
         t.type = tillageImplement;
         Component paddockModule;
         if (currentPaddock != "")
            paddockModule = (Component) MySimulation.LinkByName(currentPaddock);
         else
            paddockModule = MySimulation.ChildPaddocks[0];
         paddockModule.Publish("tillage", t);
      }		 
   }

   // Test whether we can harvest a crop today
   // +ve number - yes
   // 0          - no
   // -ve        - out of scope
   [Output] public int canLeave  
   {
      get 
      {
         string currentPaddock;
         MySimulation.Get("currentPaddock", out currentPaddock);

         string plantStatus = "";
         MySimulation.Get((currentPaddock != "" ? currentPaddock + "." : "") + crop + ".plant_status", out plantStatus);
         if (plantStatus == "out")
            return -1;

         string StageName = "";
         MySimulation.Get((currentPaddock != "" ? currentPaddock + "." : "") + crop + ".StageName", out StageName);
         if (StageName == "harvest_ripe" || plantStatus == "dead")
            return 1;
         return 0;
      }
   }

   [EventHandler] public void OnLeave()
   {
      Console.WriteLine(today + " Harvesting Crop");
      HarvestType hdata = new HarvestType();
      hdata.Remove = 0.0;
      string currentPaddock;
      MySimulation.Get("currentPaddock", out currentPaddock);
      Component cropModule;
      if (currentPaddock != "")
         cropModule = (Component) MySimulation.LinkByName(currentPaddock + "." + crop);
      else 
         cropModule = (Component) MySimulation.ChildPaddocks[0].LinkByName(crop);

      cropModule.Publish("harvest", hdata);

      KillCropType kdata = new KillCropType();
      kdata.KillFraction = 0.0F;
      cropModule.Publish("killcrop", kdata);
      cropModule.Publish("end_crop");
   } 
}
```
        manager2 Fertilise at Sowing
          # When should fertiliser be applied
          ModuleName = Cotton  # On which module should the event come from
          EventName = sowing  # On which event should spraying be triggered
          # Event details
          fertType = urea_N  # The type of fertiliser
          fertAmt = 150  # Amount of fertiliser to apply (kg/ha)
```csharp
using System;
using System.Linq;
using System.Collections.Generic;
using ModelFramework;

// Crop management: fertilise at sowing
// Multi-paddock aware.
// This component DOES NOT require a trigger from the sequencer.

public class Script 
{      
   [Link]  public Simulation MySimulation;
   [Param] string fertType;
   [Param] float fertAmt;
   [Param] string ModuleName;
   [Param] string EventName;
   
   [EventHandler] public void OnStart_Simulation()
   {
      foreach (Paddock paddock in MySimulation.ChildPaddocks) 
      {
         foreach (Component child in paddock.Children) {
            if(child.Name == ModuleName){
               RuntimeEventHandler.NullFunction curried = () => OnTrigger(paddock.Name);
               MySimulation.Subscribe(child.FullName + "." + EventName, curried);
               //Console.WriteLine("Subscribed '" + child.FullName + "." + EventName + " => " + paddock.Name + "'"); 
            }
         }
      }
   }

   public void OnTrigger(string paddock)
   {
      //Console.WriteLine("Fertiliser OnTrigger called, paddock='" + paddock + "'"); 
      if (fertAmt > 0) 
      {         
         Component paddockModule;
         if (paddock != "")
            paddockModule = (Component) MySimulation.LinkByName(paddock);
         else
            paddockModule = (Component) MySimulation.ChildPaddocks[0];
         //Console.WriteLine("2. " + paddockModule.Name);

         Fertiliser fertModule = (Fertiliser) paddockModule.LinkByName("Fertiliser");
         fertModule.Apply(fertAmt, 50, fertType);
      }
   }
}
```
        manager2 Cotton defoliation rule
          # No parameters
```csharp
using System;
using System.Collections.Generic;
using ModelFramework;

// Crop management: cotton defoliation
// Multi-paddock aware.
// This component DOES NOT require a trigger from the sequencer.

public class Script 
{      
   [Link]  public Simulation MySimulation;
   [EventHandler] public void OnPost()
   {
      foreach (Paddock paddock in MySimulation.ChildPaddocks) 
      {
         foreach (Component child in paddock.Children) {
            string stageName = "";
            int defol_das = 0;
            if(child.Get("stageName", out stageName) &&
               child.Get("defol_das", out defol_das)){
               if(stageName == "mature" && defol_das == 0) {
                  // Console.WriteLine(/*today.ToString("dd/MM/yyyy") + */"Defoliating " + child.FullName); 
                  child.Publish("defoliate");
               }
            }
         }
      }
   }
}
```
        manager2 Fertilise on days after sowing
          # Test for the mineral N in the soil and don't apply the fertiliser if greater than X kgN/ha is stored in the soil above a depth of Y mm
          ModuleName = wheat1  # On which module should the event come from
          EventName = sowing  # On which event should fertiliser be applied : (see the list by module in Reporting Frequency for possible events)
          Days2Wait = 60  # Number of days to wait after the event happens before the fertiliser is applied
          # Test for the mineral N in the soil and don't apply the fertiliser if greater than X kgN/ha is stored in the soil above a depth of Y mm
          FertAmtCriteria = 1000  # Don't add fertiliser if N in the soil to the depth below exceeds (kg/ha) (insert a large value to avoid this test)
          FertDepthCriteria = 600  # Depth to which the amount of N in the soil should be calculated (mm)
          # Fertiliser application details
          FertDepth = 50  # Depth at which to apply the fertiliser (mm)
          FertAmt = 250  # Amount of fertiliser to add (kg N /ha)
          FertType = urea_n  # Fertiliser type - select from the list
```vb
Imports System
Imports ModelFramework

Public Class Script 
   <Link()> Dim MyPaddock As Paddock
   <Link()> Dim Fert As Fertiliser

   'Parameters - user inputs from the Properties tab

   <Param> Private ModuleName As String         'Module that sends the even that will be used in the decision
   <Param> Private EventName As String          'The name of the event (e.g. "sowing", "irrigated") to control the fertiliser decision
   <Param> Private Days2Wait As Integer         'Wait this many days after the event before applying the fertiliser

   <Param> Private FertAmtCriteria As Single    'Don't apply fertiliser if the N stored in the soil is greater than this.  Disregard the test if the value is -ve
   <Param> Private FertDepthCriteria As Single  'Depth in the soil to calculate the N storage

   <Param> Private FertDepth As Single          'Depth in the soil that the fertilser will be applied
   <Param> Private FertAmt As Single            'Total annual application - needs to be split up between the various application dates listed
   <Param> Private FertType As String           'Type of fertliser to apply

   'Inputs - got by this Manager from elsewhere in APSIM
   <Input> Private Today As DateTime            'Today's date from APSIM 
   <Input> Private dlayer As Single()           'Array of soil layer thicknesses - for calculation of mineral N in the soil
   <Input> Private no3 As Single()              'Array of nitrate-N (kg N /ha) for each soil layer - for calculation of mineral N in the soil
   <Input> Private nh4 As Single()              'Array of ammonium-N (kg N /ha) for each soil layer - for calculation of mineral N in the soil
   <Input> Private urea As Single()             'Array of urea-N (kg N /ha) for each soil layer - for calculation of mineral N in the soil

   'Outputs - calculated by this Manager and available to be output by the user
   <Output> Private CumSoilN As Single          'Mineral-N stored in the soil to a depth of FertDepthCriteria

   'Other variables that are calculated but not needed for outputs
   Private LayerWeights As Single()             'Weigthing of each layer for FertAmtCriteria calculation
   Private CountingTheDays As Integer           'Variable to count the days from the event to the fertiliser application
   Private DoFert As Boolean                    'Variable to help with the fertiliser application decision


   <EventHandler()> Public Sub OnInit2()
      '"OnInit2" is an event handler gets called once at the start of the simulation 

      'Initialise the variables for the delay between the event and the actual application
      CountingTheDays = 0
      DoFert = False

   End Sub

   <EventHandler("[ModuleName].[EventName]")> Public Sub TriggerApplyMyFertiliser() 
      'This subroutine will be called when [ModuleName].[EventName] is fired

      'Initialise the counter between the event and the fertiliser application.  The actual fertiliser aplication is done in the ApplyMyFertiliser subroutine
      CountingTheDays = 1
      DoFert = True

      'if there is to be no delay between the event and the fertiliser application then just go  do it now (don't wait for a Prepare stage which might not be until tomorrow)
      'reset the DoFert because now the fertiliser has been applied (nothing in the queue anymore)
      If Days2Wait = 0 Then
         ApplyMyFertiliser
         DoFert = False
      End If

   End Sub

   <EventHandler()> Public Sub OnPrepare()
      '"OnPrepare" is an event handler gets called once at the start of every day (before Prepare and Post) 

      'Increment the counter once per day if are in that delay stage between the event and the application
      'If the delay period is over then go to the subroutine for the fertiliser application and reset DoFert
      If DoFert Then
         CountingTheDays += 1
         If CountingTheDays >= Days2Wait Then
            ApplyMyFertiliser
            DoFert = False
         End If
      End If

   End Sub

   <EventHandler()> Public Sub ApplyMyFertiliser()
      'This subroutine sends Fertiliser the command to apply the fertiliser 

      'Set the number of elements in the LayerWeights array to equal the number of soil layers - do this here because erosion can change the layering
      'Then move through the array and assign a LayerWeighting from 0 to 1 quantifying what proportion of the soil and mineral N in this layer is above FertDepthCriteria
      ReDim LayerWeights(dlayer.length - 1)                
      Dim CumDepth As Single = 0.0
         For i As Integer = 0 To dlayer.Length - 1     
            CumDepth += dlayer(i)                      
         If CumDepth <= FertDepthCriteria Then
            LayerWeights(i) = 1.0                   
         ElseIf (CumDepth - dlayer(i)) <= FertDepthCriteria Then
            LayerWeights(i) = (FertDepthCriteria - (CumDepth - dlayer(i))) / dlayer(i)
         Else
            LayerWeights(i) = 0.0
         End If
      Next

      'Add up the no3, nh4 and urea (all already in kg N /ha) in each layer and multiply by the layer weighting to get the total mineral N to the set depth
      CumSoilN = 0.0
      For i As Integer = 0 To dlayer.Length - 1     
         CumSoilN += (no3(i) + nh4(i) + urea(i)) * LayerWeights(i)                         
      Next

      'If there is less mineral N in the soil than FertAmtCriteria then it is OK to add fertiliser
      '"Fert.Apply" send the command to apply the specified amount of fertiliser at the specified depth of the specified type of fertiliser
      If CumSoilN <= FertAmtCriteria Then
         Fert.Apply(FertAmt, FertDepth, FertType)
      Else 
         Console.WriteLine("Too much fertiliser - upper threshold " & FertAmtCriteria & "(kg/ha) reached")
      End If

   End Sub

End Class
```
        manager2 Post Harvest Tillage
          # When should fertiliser be applied
          EventName = harvesting  # Which event to listen for
          daysToWait = 3  # How many days to delay after event
          # Event details
          tillage_type = user_defined
          tillage_depth = 150  # User_defined depth of seedbed preparation (mm)
          tillage_f_incorp = 0.95  # User_defined fraction of surface residues to incorporate (0-1)
```csharp
using System;
using System.Linq;
using System.Collections.Generic;
using ModelFramework;

// Crop management: tillage after event
// Multi-paddock aware.
// This component DOES NOT require a trigger from the sequencer.

public class Script 
{      
   [Link]  public Simulation MySimulation;
   [Param] string EventName;
   private Dictionary<string,int> daysAfter = new Dictionary<string,int>();
   
   [EventHandler] public void OnStart_Simulation()
   {
      daysAfter.Add("", -1);
      foreach (Paddock paddock in MySimulation.ChildPaddocks) 
      {
         daysAfter.Add(paddock.Name, -1);
         RuntimeEventHandler.NullFunction curried = () => OnTrigger(paddock.Name);
         paddock.Subscribe( EventName, curried);
      }
   }

   public void OnTrigger(string paddock)
   {
      daysAfter[paddock] = 0;
   }

   [Param] string tillage_type;
   [Param] int tillage_depth;
   [Param] float tillage_f_incorp;
   [Param] int daysToWait;
   
   [EventHandler] public void OnPost()
   {
      List <string> paddocks = new List<string>(daysAfter.Keys);
      foreach (string p in paddocks)  {
         if (daysAfter[p] >= 0) {
            daysAfter[p]++;
            if (daysAfter[p] == daysToWait) {      
               Component paddockModule;
               if (p != "")
                  paddockModule = (Component) MySimulation.LinkByName(p);
               else
                  paddockModule = (Component) MySimulation.ChildPaddocks[0];

               TillageType t = new TillageType();
               t.type = tillage_type;
               t.tillage_depth = tillage_depth;
               t.f_incorp = tillage_f_incorp;

               paddockModule.Publish("tillage", t);
            }
         }
      }
   }
}
```
      outputfile: filename=Continuous Dryland Cotton.out; title=Continuous Dryland Cotton
        variables
          variables: dd/mm/yyyy as Date, dw_total, nuptake_total, yield, bolls_sc, lai_max, esw, InCropRain
        events Reporting Frequency: event=harvesting
      tracker: variable=sum of rain on end_day from sowing to now as InCropRain
  simulation Continuous Irrigated Cotton - deficit rule
    metfile met: filename=%apsim%\Examples\MetFiles\WeeWaa1889_2012.met
    clock
      start_date = 01/06/2000  # Enter the start date of the simulation
      end_date = 31/08/2012  # Enter the end date of the simulation
    summaryfile
    area paddock
      Soil: ASCOrder=Vertosol; ASCSubOrder=Grey; SoilType=Clay; Site=Myall Vale; NearestTown=Narrabri, NSW 2390; Region=North West Slopes and Plains; State=New South Wales; Country=Australia; NaturalVegetation=Grasslands; ApsoilNumber=97; Latitude=-30.203; Longitude=149.593; LocationAccuracy=+/- 20m; YearOfSampling=0; DataSource=CSIRO Plant Industry, Myall Vale (D Richards)
        Water: same as Continuous Dryland Cotton.paddock.Soil.Water
        SoilWater: same as Continuous Dryland Cotton.paddock.Soil.SoilWater
        SoilOrganicMatter: same as Continuous Dryland Cotton.paddock.Soil.SoilOrganicMatter
        Analysis: same as Continuous Dryland Cotton.paddock.Soil.Analysis
        InitialWater: FractionFull=1; PercentMethod=FilledFromTop
        Sample InitialNitrogen: NO3Units=kgha; NH4Units=kgha; SWUnits=Volumetric; OCUnits=Total; PHUnits=Water
          Thickness  NO3  NH4
          150        30   1.79994
          150        34   0.29295
          300        28   1.24848
          300        20   1.27602
          300        20   1.37376
          300        10   1.44855
          300        6    1.47168
      surfaceom SurfaceOrganicMatter
        PoolName = cotton  # Organic Matter pool name
        type = cotton  # Organic Matter type
        mass = 1000  # Initial surface residue (kg/ha)
        cnr = 80  # C:N ratio of initial residue
        standing_fraction = 0  # Fraction of residue standing
      fertiliser
      irrigation
        automatic_irrigation = on
        asw_depth = 800  # Depth to which ASW is calculated. (mm)
        crit_fr_asw = .6  # Fraction of ASW below which irrigation is applied (0-1.0)
        irrigation_efficiency = .8  # Efficiency of the irrigation. (0-1.0)
        irrigation_allocation = off  # Allocation limits
        allocation = 0  # Allocation in mm
        default_no3_conc = 0.0  # Nitrate concentration (ppm N)
        default_nh4_conc = 0.0  # Ammonium concentration (ppm N)
        default_cl_conc = 0.0  # Chloride concentration (ppm Cl)
      Cotton2 Cotton
        initsection
          crop_type = cotton
          leaf_res_n_conc = 0.02
          hucut = 40  # oC
          baset = 12  # oC
          open_def = 60  # %
          a_root_leaf = 1.01
          a_stem_leaf = 1.25
          e_par = 2.5  # g/MJ
          specific_lw = 58  # g/m^2
          t_opt = 25  # oC
          t_base = 8  # oC
          wt_area_max = 150
          embryo = 0.75  # g
          f_leaf = 0.6
          f_stem = 0.15
          f_root = 0.25
          elevation_default = 200  # m
          wlog_assimilate_red = 0.2
          wlog_carcap_red = 0.2
          watlog_c = 0.87
          watlog_n = 0.87
          wlog_carcap_red_stress = 0.01
          smi_affect_wlog = 0.75
          days_relief_wlog = 7  # days
          frost_kill_immediate = 2  # oC
          rtdep_max = 130  # cm
          harvest_n_frac = 0.85
          cutout_smi_crit = 0.75
          cutout_smi_days = 5  # days
          cutout_smi_site_red = 0.1
          epcoef1 = 3.051
          epcoef2 = 2.436
          epcoef_smi_crit = 0.5
          fbwstr_low = 0
          fbwstr_high = 0.5
          fbwstr_a = 1
          fbnstr_low = 0
          fbnstr_high = 0.5
          fbnstr_a = 1
          relp_smi_crit = 0.5
          relp_intercept = 0.25
          relp_slope = 0.864
          relp_low = 0
          relp_high = 1
          relp_a = 0.5
          vsnstr_low = 0
          vsnstr_high = 0.9
          vsnstr_a = 1
          flfsmi_low = 0
          flfsmi_high = 0.5
          flfsmi_a = 1
          vlnstr_low = 0
          vlnstr_high = 0.9
          vlnstr_a = 1
          fw_low = 0
          fw_high = 0.25
          fw_a = 1
          adjust_low = 0
          adjust_high = 5
          adjust_a = 1
          fwstrs_low = 0
          fwstrs_high = 0.5
          fwstrs_a = 4
          smi_delay_crit = 0.25
          cold_shock_delay_crit = 11  # oC
          cold_shock_delay = 5.2  # dd
          fert_crit = 1  # kg/ha
          fert_detect = 10  # kg/ha
          days_since_fert_max = 100  # days
          cultivar_default = S71BR
          rootExpansionDelay = 33  # days
          useDDsumTo1stSq = false
          init cultivars: same as Continuous Dryland Cotton.paddock.Cotton.initsection.cultivars
      folder Manager folder
        manager2 Crop Management
          # Crop properties
          crop = cotton  # Name of this crop
          # Sowing criteria
          date1 = 15-oct  # Enter sowing window START date (dd-mmm)
          date3 = na  # Enter cultivar change date (na if not in use)
          date2 = 15-oct  # Enter sowing window END date (dd-mmm)
          must_sow = yes
          rain_amount = 30  # Enter amount of cumulative rainfall (mm)
          rain_days = 3  # Enter number of days to accumulate rainfall (days)
          esw_amount = 0  # Enter amount of soil water (mm)
          # Sowing Parameters
          cultivar1 = S71BR  # Enter cultivar
          cultivar2 = na  # Enter 2nd Cultivar (na if not using a second cultivar)
          density1 =  # Enter sowing density (plants/m2)
          depth1 = 50  # Enter sowing depth (mm)
          row_spacing1 = 1000  # Enter row spacing (mm)
          # Extra Parameters
          plants_pm1 = 12  # Enter sowing density (plants/ m row cotton)
          ftn1 = na  # Enter Fertile Tiller Number (na for auto)
          skiprow1 = solid  # Skip row
          tillageImplement = na  # Name of tillage implement (na if not in use)
          script: same as in Continuous Dryland Cotton.paddock.Manager folder.Crop Management
        manager2 Cotton defoliation rule: same as Continuous Dryland Cotton.paddock.Manager folder.Cotton defoliation rule
        manager2 Fertilise at Sowing
          # When should fertiliser be applied
          ModuleName = Cotton  # On which module should the event come from
          EventName = sowing  # On which event should spraying be triggered
          # Event details
          fertType = urea_N  # The type of fertiliser
          fertAmt = 160  # Amount of fertiliser to apply (kg/ha)
          script: same as in Continuous Dryland Cotton.paddock.Manager folder.Fertilise at Sowing
        manager2 Fertilise on days after sowing
          # Test for the mineral N in the soil and don't apply the fertiliser if greater than X kgN/ha is stored in the soil above a depth of Y mm
          ModuleName = Cotton  # On which module should the event come from
          EventName = sowing  # On which event should fertiliser be applied : (see the list by module in Reporting Frequency for possible events)
          Days2Wait = 60  # Number of days to wait after the event happens before the fertiliser is applied
          # Test for the mineral N in the soil and don't apply the fertiliser if greater than X kgN/ha is stored in the soil above a depth of Y mm
          FertAmtCriteria = 1000  # Don't add fertiliser if N in the soil to the depth below exceeds (kg/ha) (insert a large value to avoid this test)
          FertDepthCriteria = 600  # Depth to which the amount of N in the soil should be calculated (mm)
          # Fertiliser application details
          FertDepth = 50  # Depth at which to apply the fertiliser (mm)
          FertAmt = 250  # Amount of fertiliser to add (kg N /ha)
          FertType = urea_n  # Fertiliser type - select from the list
          script: same as in Continuous Dryland Cotton.paddock.Manager folder.Fertilise on days after sowing
        manager2 Irrigate on event
          amount = 100  # Amount of irrigation to apply (mm)
          eff = 0.8  # Irrigation efficiency (0-1)
          # Event details
          ModuleName = Cotton  # On which module should the event come from
          EventName = sowing  # On which event should fertiliser be applied(see the list by module in Reporting Frequency for possible events)
```csharp
using System;
using ModelFramework;

public class Script 
{      
   [Link] Irrigation Irrigation; 
   [Param] string ModuleName;    //the module that the event will come from
   [Param] string EventName;     //the event to look for
   [Param] double amount;        //amount of irrigation to apply (mm)
   [Param] double eff;           //irrigation efficiency
     
   // The following event handler will be called each day at the end of the day
   //[ModuleName] and [EventName] will be replaced by the values in the properties window before the script is run
   [EventHandler("[ModuleName].[EventName]")] public void Irrigate()
   {
      IrrigationApplicationType data = new IrrigationApplicationType();
      data.Amount = (int)amount;
      Irrigation.Set("irrigation_efficiency", eff);
      Irrigation.Apply(data);
      Console.WriteLine("Irrigating with " + amount + "mm due to " + ModuleName + "." + EventName + " event."); //write the event to the summary file
   }  
}
```
        manager2 Post Harvest Tillage: same as Continuous Dryland Cotton.paddock.Manager folder.Post Harvest Tillage
      outputfile: filename=Continuous Irrigated Cotton - deficit rule.out; title=Continuous Irrigated Cotton - deficit rule
        variables
          variables: dd/mm/yyyy as Date, dw_total, nuptake_total, yield, bolls_sc, lai_max, esw as PlantExtractableWater
        events Reporting Frequency: event=harvesting
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