folder simulations: version=32
  simulation Continuous Maize Bimodal
    metfile met: filename=%apsim%/Examples/MetFiles/Goond.met
    clock
      start_date = 1/06/1985  # Enter the start date of the simulation
      end_date = 1/05/1989  # Enter the end date of the simulation
    summaryfile
    area paddock
      soil
        InitWater Initial water
          PercentMethod: Percent=0.25; Distributed=Filled from top
        Water
          Layer:
            Thickness (mm)  BD (g/cc)  AirDry (mm/mm)  LL15 (mm/mm)  DUL (mm/mm)  SAT (mm/mm)
            150             1.28       0.11            0.15          0.28         0.32
            150             1.27       0.12            0.15          0.28         0.32
            300             1.34       0.17            0.17          0.285        0.34
            300             1.33       0.17            0.17          0.27         0.33
            300             1.31       0.17            0.17          0.27         0.33
            300             1.31       0.17            0.17          0.27         0.33
          SoilCrop sorg
            Layer:
              Thickness (mm)  LL (mm/mm)  KL (/day)  XF (0-1)
              150             0.15        0.07       1
              150             0.15        0.07       1
              300             0.17        0.07       1
              300             0.17        0.07       1
              300             0.17        0.07       1
              300             0.17        0.07       1
          SoilCrop cowpea
            Layer:
              Thickness (mm)  LL (mm/mm)  KL (/day)  XF (0-1)
              150             0.15        0.08       1
              150             0.15        0.08       1
              300             0.17        0.08       1
              300             0.17        0.08       1
              300             0.17        0.06       1
              300             0.17        0.04       1
          SoilCrop maize: same as Continuous Maize Bimodal.paddock.Soil.Water.cowpea
          SoilCrop mucuna: same as Continuous Maize Bimodal.paddock.Soil.Water.cowpea
          SoilCrop peanut: same as Continuous Maize Bimodal.paddock.Soil.Water.cowpea
          SoilCrop pigeonp: same as Continuous Maize Bimodal.paddock.Soil.Water.cowpea
          SoilCrop soybean: same as Continuous Maize Bimodal.paddock.Soil.Water.cowpea
        SoilWat: SummerCona=5; SummerU=5; SummerDate=1-Nov; WinterCona=5; WinterU=5; WinterDate=1-Apr; DiffusConst=88; DiffusSlope=32; Salb=0.13; CN2Bare=80; CNRed=20; CNCov=0.8
          Layer:
            Thickness (mm)  SWCON (0-1)
            150             0.5
            150             0.5
            300             0.5
            300             0.3
            300             0.3
            300             0.3
        SoilOrganicMatter: RootCN=45; RootWT=400; SoilCN=10; EnrACoeff=7.4; EnrBCoeff=0.2
          Layer:
            Thickness (mm)  OC (Total %)  FBiom (0-1)  FInert (0-1)
            150             0.92          0.02         0.5
            150             0.77          0.015        0.75
            300             0.57          0.01         0.9
            300             0.46          0.01         0.99
            300             0.43          0.01         0.99
            300             0.29          0.01         0.99
        Analysis
          Layer:
            Thickness (mm)  PH (1:5 water)
            150             6
            150             6
            300             6.2
            300             6.4
            300             6.5
            300             6.5
        Sample Initial nitrogen
          Layer:
            Thickness (mm)  NO3 (ppm)  NH4 (ppm)
            150             2          1
            150             1          1
            300             1          1
            300             1          0.500
            300             1          0.500
            300             1          0.500
      surfaceom SurfaceOrganicMatter
        PoolName = wheat  # Organic Matter pool name
        type = wheat  # Organic Matter type
        mass = 0  # Initial surface residue (kg/ha)
        cnr = 80  # C:N ratio of initial residue
        standing_fraction = 0  # Fraction of residue standing
      fertiliser
      maize
      folder Manager folder
        manager Sow using a variable rule with intercropping
          # Crop properties
          crop = maize  # Name of this crop
          cultivar1 = katumani  # Enter cultivar
          cropmethod = sole  # Method of cropping
          rotation_exclude = no  # Exclude from rotation sequence
          # Sowing criteria
          date1 = 10-mar  # Enter sowing window START date (dd-mmm)
          date2 = 01-may  # Enter sowing window END date (dd-mmm)
          must_sow = no
          rain_amount = 40  # Enter amount of cumulative rainfall (mm)
          rain_days = 8  # Enter number of days to accumulate rainfall (days)
          esw_amount = 30  # Enter amount of soil water (mm)
          sow_opp = 1  # Enter sowing opportunity number to sow on (1..n)
          surface_up = 2  # Enter upper limit of sw in top layer (0-2) (mm esw/mm soil)
          surface_low = 0  # Enter lower limit of sw in top layer (0-1) (mm esw/mm soil)
          # Sowing specs
          density = 2  # Enter sowing density (plants/m2)
          depth = 30  # Enter sowing depth (mm)
          row_spacing = 1  # Enter row spacing (mm) (m for maize and sorghum)
          # Sorghum specs
          ftn = 1  # Enter Fertile Tiller No.
          skiprow = solid
          # Starter fertiliser application
          fert_amount_sow = 0  # Amount of starter fertiliser at sowing (kg/ha)
          fert_type_sow = urea_N  # Type
          # TopDress fertiliser application
          fert_days_TopDress = 35  # Enter number of days after sowing to apply top-dress fertiliser (days)
          fert_amount_TopDress = 0  # Amount of TopDress fertiliser (kg/ha)
          fert_type_TopDress = NH4NO3  # Type
          # Pre-sowing manure application
          surfaceommodule_pre_sow = SurfaceOrganicMatter  # Module used to apply the manure
          manure_days_pre_sow = 30  # Enter number of days before window to apply pre-crop manure (days)
          manure_amount_pre_sow = 0  # Amount of manure to apply (kg/ha)
          manure_type_pre_sow = manure  # manure type
          manure_cnr_pre_sow = 25  # manure CNR
          manure_cpr_pre_sow = 50  # manure CPR
          # Pre-sowing fertiliser application
          fert_days_pre_sow = 30  # Enter number of days before window to apply pre-crop fertiliser (days)
          fert_amount_pre_sow = 0  # Amount of pre-crop fertiliser (kg/ha)
          fert_criteria_pre_sow = 1000  # Don't add fertiliser if pre-crop N in top 2 layers exceeds (kg/ha)
          totn_pre_sow = 0  # OR Amount of pre-crop N required in top 3 layers (kg/ha)
          fert_type_pre_sow = urea_N  # Type (NO3_N, NH4_N, NH4NO3, urea_N, urea_no3, urea)
          # Tillage components
          surfaceommodule = SurfaceOrganicMatter  # Name of your surface organic matter module
          soilmodule = Soil  # Name of your soil module
          # Planter Tillage
          planter_type = user_defined
          planter_depth = 150  # User_defined depth of seedbed preparation (mm)
          thin_fraction = 1  # Enter fraction of weed population killed (0-1)
          planter_f_incorp = 1  # User_defined fraction of surface residues to incorporate (0-1)
          planter_cn_red = 0  # cn reduction after tillage ()
          planter_cn_rain = 0  # amount of cummulative rain to dissipate tillage effects on cn ()
          # Seed-bed Tillage Preparation
          till_days_pre_sow = 0  # Enter number of days before window to prepare seed-bed (days)
          must_till = no  # Must Till (yes/no)
          tillage_type = disc  # Tillage type (user_defined, chisel, disc, planter)
          tillage_depth = 100  # User_defined depth of seedbed preparation (mm)
          tillage_f_incorp = 1  # User_defined fraction of surface residues to incorporate (0-1)
          fraction = 0  # Enter biomass removal fraction of growing weeds from field (0-1)
          tillage_cn_red = 0  # cn reduction after tillage ()
          tillage_cn_rain = 0  # amount of cummulative rain to dissipate tillage effects on cn ()
          on init:
```
         next = 1
         crop_in = 0
         blank = 'fallow'
         next_crop = blank
         crop_current = blank
         crop_current1 = blank
         crop_current2 = blank
         crop_sow = blank
         ready_for_next = 1
         ready_to_manure_pre_sow = 0
         days_last_year = 365
         manure_day_pre_sow = 0
         ready_to_till_pre_sow = 0
         till_day_pre_sow = 0
         days_after_weed_kill = 0
         ready_to_fert_pre_sow = 0
         wd_sow_opp_num = 0
         wht_sow_opp_num = 0
         wht_sow_opp_days = 0
         days_this_year = 0
```
          on end_of_day:
```
         if (date_within('[date1], [date2]') = 1) THEN
         else
            wht_sow_opp_num = 0
            wht_sow_opp_days = 0
         endif
```
          on process:
```
         days_this_year = 364 + (date('1-mar') - date('28-feb'))
         if (next_crop = '[crop]' OR next_crop = blank OR '[rotation_exclude]' = 'yes') then
               !  Presowing  manure application

            if ([manure_amount_pre_sow] > 0) then
               !  calculate day to fertilise
               manure_day_pre_sow = date('[date1]') - [manure_days_pre_sow]
               ! Need to correct for possible year boundary condition
               if (manure_day_pre_sow < today) then
                  manure_day_pre_sow = days_this_year + manure_day_pre_sow
               endif
               if (today = manure_day_pre_sow) then
                  ready_to_manure_pre_sow = 1
               endif
               if (crop_in = 0 and ready_to_manure_pre_sow = 1) then
                        ! just put on a fixed amount of manure
                  '[surfaceommodule_pre_sow]' add_surfaceom type=[manure_type_pre_sow], name=[manure_type_pre_sow], mass=[manure_amount_pre_sow], cnr=[manure_cnr_pre_sow], cpr=[manure_cpr_pre_sow]
                  ready_to_manure_pre_sow = 0
                  manure_day_pre_sow = 0
               endif
            endif

               !  Presowing  fertiliser application

            if ([fert_amount_pre_sow] > 0 OR [totn_pre_sow] > 0 ) then
               !  calculate day to fertilise
               fert_day_pre_sow = date('[date1]') - [fert_days_pre_sow]
               ! Need to correct for possible year boundary condition
               if (fert_day_pre_sow < today) then
                  fert_day_pre_sow = days_this_year + fert_day_pre_sow
               endif
               if (today = fert_day_pre_sow) then
                  ready_to_fert_pre_sow = 1
               endif
               if (crop_in = 0 and ready_to_fert_pre_sow = 1) then
                  if ([totn_pre_sow] > 0) then
                     !   Top up soil N of top 3 layers
                     N_deficit = [totn_pre_sow] - (no3(1) + nh4(1) + no3(2) + nh4(2) + no3(3) + nh4(3))
                     if (N_deficit < 0) then
                        ! do nothing
                        N_deficit = 0
                     else
                        fertiliser apply amount = N_deficit (kg/ha), depth = 50 (mm), type = [fert_type_pre_sow] ()
                     endif
                  else
                     N_topsoil = no3(1) + nh4(1) + no3(2) + nh4(2)
                     if (N_topsoil > [fert_criteria_pre_sow]) then
                        ! enough N already in topsoil
                     else
                        ! just put on a fixed amount of N
                        fertiliser apply amount = [fert_amount_pre_sow] (kg/ha), depth = 50 (mm), type = [fert_type_pre_sow] ()
                     endif
                  endif
                  ready_to_fert_pre_sow = 0
                  fert_day_pre_sow = 0
               endif
            endif

            !   Tillage - presowing seedbed preparation
            if ( [till_days_pre_sow] > 0) then
               ! calculate presowing tillage date
               till_day_pre_sow = date('[date1]') - [till_days_pre_sow]
               ! Need to correct for possible year boundary condition
               if (till_day_pre_sow < today) then
                  till_day_pre_sow = days_this_year + till_day_pre_sow
               endif
               if (today = till_day_pre_sow) then
                  ready_to_till_pre_sow = 1
               endif
               if ((crop_in = 0 OR '[must_till]' = 'yes') AND (ready_to_till_pre_sow = 1)) then
                  ! tillage
                if (crop_current = 'weed' or crop_current1 = 'weed' or crop_current2 = 'weed') then
                  if (weed.plant_status <> 'out') then
                        weed harvest, remove=[fraction]
                        weed kill_crop
                        weed end_crop
                        days_after_weed_kill = 0
                       crop_in = crop_in - 1
                       if (crop_current = 'weed') then
                           crop_current = crop_current1
                           crop_current1 = crop_current2
                           crop_current2 = blank
                        elseif (crop_current1 = 'weed') then
                           crop_current1 = crop_current2
                           crop_current2 = blank
                        elseif (crop_current2 = 'weed') then
                           crop_current2 = blank
                        endif
                  endif
                 endif
                  if ('[tillage_type]' = 'user_defined') then
                      '[surfaceommodule]' tillage type = [tillage_type], f_incorp = [tillage_f_incorp] (), tillage_depth = [tillage_depth]
                      '[soilmodule] Water' tillage type = [tillage_type], cn_red = [tillage_cn_red], cn_rain = [tillage_cn_rain]
                  else
                      '[surfaceommodule]' tillage type = [tillage_type] ()
                      '[soilmodule] Water' tillage type = [planter_type]
                  endif
                  ready_to_till_pre_sow = 0
                  till_day_pre_sow = 0
               endif
            endif

            if (today = date('[date2]')) then
               if ('[rotation_exclude]' = 'no') then
                  ready_for_next = 1
               endif
            endif

            if (wht_sow_opp_num > 0) then
               wht_sow_opp_days = wht_sow_opp_days + 1
            else
            endif

         if (crop_in = 0 OR ('[cropmethod]' = 'intercrop'
             AND [crop].plant_status = 'out')) then
               if (date_within('[date1], [date2]') = 1) then
                  crop_sow = 'waiting'
                  surface_moist = (sw(1) - ll15(1)) / (dul(1)- ll15(1))
                  if ((rain[[rain_days]] >= [rain_amount]  AND  esw >= [esw_amount] AND
                        (surface_moist <= [surface_up] and surface_moist >= [surface_low])) OR
                      ('[must_sow]' = 'yes' AND today = date('[date2]'))) THEN


                     if (wht_sow_opp_days >= [rain_days] OR wht_sow_opp_num = 0) then
                        wht_sow_opp_num = wht_sow_opp_num + 1
                        wht_sow_opp_days = 0
                     endif

                     if ((wht_sow_opp_num >= [sow_opp]) OR ('[must_sow]' = 'yes' AND today = date('[date2]')) then
                        if ('[crop]' = 'sorghum') then
                           [crop] sow plants =[density], sowing_depth = [depth], cultivar = [cultivar1], row_spacing = [row_spacing], tiller_no_fertile = [ftn] (), skip = [skiprow]
                        else
                          [crop] sow cultivar = [cultivar1], plants = [density] (plants/m2), sowing_depth = [depth], row_spacing = [row_spacing]
                        endif
                        crop_in = crop_in + 1
                        if ('[rotation_exclude]' = 'no') then
                           ready_for_next = 1
                        endif
                        crop_current2 = crop_current1
                        crop_current1 = crop_current
                        crop_current = '[crop]'
                        crop_sow = '[crop]'
                        ready_to_manure_pre_sow = 0
                        if ([fert_amount_sow] > 0) then
                           fertiliser apply amount = [fert_amount_sow] (kg/ha), depth = 50 (mm), type = [fert_type_sow] ()
                        endif
                        !   Planter -
                        ! Planting
                        if (crop_current = 'weed' or crop_current1 = 'weed' or crop_current2 = 'weed') then
                           if (weed.plant_status <> 'out' AND [thin_fraction] > 0) then
                              weed kill_crop plants_kill_fraction = [thin_fraction]
                              if ([thin_fraction] = 1.0) then
                                 weed end_crop
                                 days_after_weed_kill = 0
                              else
                              endif
                              if ([thin_fraction] = 1.0) then
                                    crop_in = crop_in - 1
                                   if (crop_current = 'weed') then
                                       crop_current = crop_current1
                                       crop_current1 = crop_current2
                                       crop_current2 = blank
                                    elseif (crop_current1 = 'weed') then
                                       crop_current1 = crop_current2
                                       crop_current2 = blank
                                    elseif (crop_current2 = 'weed') then
                                       crop_current2 = blank
                                    endif
                              endif
                           endif
                        endif
                        if ('[planter_type]' = 'user_defined') then
                            '[surfaceommodule]' tillage type = [planter_type], f_incorp = [planter_f_incorp] (), tillage_depth = [planter_depth]
                            '[soilmodule] Water' tillage type = [planter_type], cn_red = [planter_cn_red], cn_rain = [planter_cn_rain]
                        else
                            '[surfaceommodule]' tillage type = [planter_type] ()
                            '[soilmodule] Water' tillage type = [planter_type]
                        endif


                     else
                        !not this opportunity
                     endif
                  endif
               endif
            endif
         endif
         ! apply topdress fertiliser
         if ([fert_amount_TopDress] > 0.0) then
            if ([crop].DaysAfterSowing = [fert_days_TopDress]) then
               fertiliser apply amount = [fert_amount_TopDress] (kg/ha), depth = 50 (mm), type = [fert_type_TopDress] ()
            else
            endif
         else
         endif
```
        manager Sow using a variable rule with intercropping{2}
          # Crop properties
          crop = maize  # Name of this crop
          cultivar1 = katumani  # Enter cultivar
          cropmethod = sole  # Method of cropping
          rotation_exclude = no  # Exclude from rotation sequence
          # Sowing criteria
          date1 = 10-oct  # Enter sowing window START date (dd-mmm)
          date2 = 20-nov  # Enter sowing window END date (dd-mmm)
          must_sow = no
          rain_amount = 40  # Enter amount of cumulative rainfall (mm)
          rain_days = 8  # Enter number of days to accumulate rainfall (days)
          esw_amount = 30  # Enter amount of soil water (mm)
          sow_opp = 1  # Enter sowing opportunity number to sow on (1..n)
          surface_up = 2  # Enter upper limit of sw in top layer (0-2) (mm esw/mm soil)
          surface_low = 0  # Enter lower limit of sw in top layer (0-1) (mm esw/mm soil)
          # Sowing specs
          density = 2  # Enter sowing density (plants/m2)
          depth = 30  # Enter sowing depth (mm)
          row_spacing = 1  # Enter row spacing (mm) (m for maize and sorghum)
          # Sorghum specs
          ftn = 1  # Enter Fertile Tiller No.
          skiprow = solid
          # Starter fertiliser application
          fert_amount_sow = 0  # Amount of starter fertiliser at sowing (kg/ha)
          fert_type_sow = urea_N  # Type
          # TopDress fertiliser application
          fert_days_TopDress = 35  # Enter number of days after sowing to apply top-dress fertiliser (days)
          fert_amount_TopDress = 27  # Amount of TopDress fertiliser (kg/ha)
          fert_type_TopDress = NH4NO3  # Type
          # Pre-sowing manure application
          surfaceommodule_pre_sow = SurfaceOrganicMatter  # Module used to apply the manure
          manure_days_pre_sow = 30  # Enter number of days before window to apply pre-crop manure (days)
          manure_amount_pre_sow = 0  # Amount of manure to apply (kg/ha)
          manure_type_pre_sow = manure  # manure type
          manure_cnr_pre_sow = 25  # manure CNR
          manure_cpr_pre_sow = 50  # manure CPR
          # Pre-sowing fertiliser application
          fert_days_pre_sow = 30  # Enter number of days before window to apply pre-crop fertiliser (days)
          fert_amount_pre_sow = 0  # Amount of pre-crop fertiliser (kg/ha)
          fert_criteria_pre_sow = 1000  # Don't add fertiliser if pre-crop N in top 2 layers exceeds (kg/ha)
          totn_pre_sow = 0  # OR Amount of pre-crop N required in top 3 layers (kg/ha)
          fert_type_pre_sow = urea_N  # Type (NO3_N, NH4_N, NH4NO3, urea_N, urea_no3, urea)
          # Tillage components
          surfaceommodule = SurfaceOrganicMatter  # Name of your surface organic matter module
          soilmodule = Soil  # Name of your soil module
          # Planter Tillage
          planter_type = user_defined
          planter_depth = 150  # User_defined depth of seedbed preparation (mm)
          thin_fraction = 1.0  # Enter fraction of weed population killed (0-1)
          planter_f_incorp = 1  # User_defined fraction of surface residues to incorporate (0-1)
          planter_cn_red = 0  # cn reduction after tillage ()
          planter_cn_rain = 0  # amount of cummulative rain to dissipate tillage effects on cn ()
          # Seed-bed Tillage Preparation
          till_days_pre_sow = 0  # Enter number of days before window to prepare seed-bed (days)
          must_till = no  # Must Till (yes/no)
          tillage_type = disc  # Tillage type (user_defined, chisel, disc, planter)
          tillage_depth = 100  # User_defined depth of seedbed preparation (mm)
          tillage_f_incorp = 1  # User_defined fraction of surface residues to incorporate (0-1)
          fraction = 0.0  # Enter biomass removal fraction of growing weeds from field (0-1)
          tillage_cn_red = 0  # cn reduction after tillage ()
          tillage_cn_rain = 0  # amount of cummulative rain to dissipate tillage effects on cn ()
          on init:
```
         next = 1
         crop_in = 0
         blank = 'fallow'
         next_crop = blank
         crop_current = blank
         crop_current1 = blank
         crop_current2 = blank
         crop_sow = blank
         ready_for_next = 1
         ready_to_manure_pre_sow = 0
         days_last_year = 365
         manure_day_pre_sow = 0
         ready_to_till_pre_sow = 0
         till_day_pre_sow = 0
         days_after_weed_kill = 0
```
          on end_of_day:
          script: same as in Continuous Maize Bimodal.paddock.Manager folder.Sow using a variable rule with intercropping
          on process:
          script: same as in Continuous Maize Bimodal.paddock.Manager folder.Sow using a variable rule with intercropping
        manager Output at harvesting for intercropping
          # Output criteria
          crop = maize  # Enter name of crop to output at harvest
          outputfile = outputfile  # Name of outputfile component
          on end_of_day:
```
         if ([crop]_to_harvest = 1) then
            '[outputfile]' do_output
         endif
```
        manager Harvesting rule for intercropping
          # Harvesting criteria
          crop = maize  # Enter name of crop to harvest when ripe
          fraction_to_remove = 0.95  # Enter fraction of stover to remove (not for maize)
          on init:
```
          [crop]_to_harvest = 0
```
          on end_of_day:
```
         if ([crop]_to_harvest = 1) then
            [crop] harvest, remove=[fraction_to_remove]
            [crop] kill_crop
            [crop] end_crop
                  crop_in = crop_in - 1
            [crop]_to_harvest = 0
            fert_tot = 0
            sow_year = 0
            if (crop_current = '[crop]') then
               crop_current = crop_current1
               crop_current1 = crop_current2
               crop_current2 = blank
            elseif (crop_current1 = '[crop]') then
               crop_current1 = crop_current2
               crop_current2 = blank
            elseif (crop_current2 = '[crop]') then
               crop_current2 = blank
            endif
         endif

         if ([crop].StageName = 'harvest_ripe' OR [crop].plant_status = 'dead') then
            [crop]_to_harvest = 1
         endif
```
        manager Remove all residues on a fixed date
          # Removal criteria
          date = 1-sep  # Date to remove residues (dd-mmm)
          surfaceommodule = SurfaceOrganicMatter  # Name of your surface organic matter module
          on start_of_day:
```
         if today = date('[date]') then
            '[surfaceommodule]' tillage type = user_defined, f_incorp = 1.0 (), tillage_depth = 0.0 ()
         endif
```
        manager Remove all residues on a fixed date{2}
          # Removal criteria
          date = 1-may  # Date to remove residues (dd-mmm)
          surfaceommodule = SurfaceOrganicMatter  # Name of your surface organic matter module
          on start_of_day:
          script: same as in Continuous Maize Bimodal.paddock.Manager folder.Remove all residues on a fixed date
      outputfile: filename=Continuous Maize Bimodal.out; title=Continuous Maize Bimodal; events=My Variables Events
        variables My Variables
          variable:
            dd/mm/yyyy as Date  # Date (dd/mm/yyyy)
            esw  # Extractable Soil Water (mm)
            day  # Day
            year  # Year
            yield  # Yield (kg/ha)
            stover  # Stover (kg/ha)
            biomass  # Total Above Ground Biomass (kg/ha)
            swdef_expan  # Soil water factor for expansion
            swdef_photo  # Soil water factor for photosynthesis
            nfact_expan  # Nitrogen factor for expansion
            nfact_photo  # Nitrogen factor for photosynthesis
            grain_no  # Grain number (g/m2)
            no3()  # NO3 - layered (kg/ha)
