folder Validation: version=37; creator=Apsim 7.10-r0
  simulation Continuous Sorghum with DCaPST
    metfile met: filename=%apsim%/Examples/MetFiles/Bhola.met
    clock
      start_date = 01/10/1985  # Select the start date of the simulation
      end_date = 01/06/1989  # Select the end date of the simulation
    summaryfile
    area paddock
      Soil HRS: SoilType=HMM; LocalName=HRS; Site=HRS; NearestTown=Unknown; Region=SE Queensland; NaturalVegetation=Unknown; Latitude=0; Longitude=0; YearOfSampling=0
        Water
          Thickness  BD    AirDry  LL15   DUL   SAT
          100        1.34  0.08    0.226  0.42  0.45
          100        1.34  0.19    0.226  0.42  0.45
          200        1.33  0.23    0.258  0.46  0.48
          200        1.38  0.26    0.27   0.46  0.47
          200        1.4   0.26    0.268  0.43  0.45
          200        1.55  0.28    0.304  0.4   0.41
          200        1.59  0.25    0.335  0.37  0.38
          200        1.63  0.28    0.33   0.33  0.37
          200        1.66  0.3     0.32   0.32  0.37
          200        1.68  0.31    0.33   0.33  0.36
          SoilCrop Sorghum
            LL=[0.226, 0.226, 0.258, 0.27, 0.268, 0.304, 0.335, 0.33, 0.32, 0.33]
            KL=[0.07, 0.07, 0.07, 0.07, 0.06, 0.06, 0.06, 0.05, 0.05, 0.04]
            XF=[1, 1, 1, 1, 1, 1, 1, 1, 1, 1]
        SoilWater: SummerCona=6.5; SummerU=1.5; SummerDate=1-Nov; WinterCona=6.5; WinterU=1.5; WinterDate=1-Apr; DiffusConst=40; DiffusSlope=16; Salb=0.2; CN2Bare=85; CNRed=20; CNCov=0.8; Thickness=[100, 100, 200, 200, 200, 200, 200, 200, 200, 200]; SWCON=[0.3, 0.3, 0.3, 0.3, 0.3, 0.3, 0.3, 0.3, 0.3, 0.3]
        SoilOrganicMatter: RootCN=50; RootWt=1000; SoilCN=12.5; EnrACoeff=7.4; EnrBCoeff=0.2; OCUnits=Total
          Thickness  OC    FBiom  FInert
          100        1.19  0.05   0.45
          100        0.59  0.02   0.6
          200        0.45  0.01   0.75
          200        0.3   0.01   0.9
          200        0.2   0.01   0.9
          200        0.16  0.01   0.9
          200        0.17  0.01   0.9
          200        0.17  0.05   0.9
          200        0.17  0.02   0.9
          200        0.17  0.01   0.9
        Analysis: Thickness=[100, 100, 200, 200, 200, 200, 200, 200, 200, 200]; PH=[6.3, 6.4, 6.5, 6.6, 6.6, 6.5, 6.5, 6.5, 6.5, 6.5]; PHUnits=Water; BoronUnits=HotWater
        Sample Initial nitrogen: NO3Units=kgha; NH4Units=ppm; SWUnits=Volumetric; OCUnits=Total; PHUnits=Water
          Thickness  NO3       NH4
          100        13.936    0.1
          100        2.18822   0.1
          200        3.27978   0.1
          200        2.484     0.1
          200        3.08      0.1
          200        4.5477    0.1
          200        11.5529   0.1
          200        18.47442  0.1
          200        19.256    0.1
          200        24.41712  0.1
        Sample Initial water: Thickness=[100, 100, 200, 200, 200, 200, 200, 200, 200, 200]; SW=[23.5, 25.2, 54, 60, 53.6, 60.8, 67, 66, 64, 66]; NO3Units=ppm; NH4Units=ppm; SWUnits=mm; OCUnits=Total; PHUnits=Water
      folder Manager folder
        manager2 Crop Management
          # Crop properties
          crop = sorghum  # Name of this crop
          # Sowing criteria
          date1 = 1-nov  # Enter sowing window START date (dd-mmm)
          date3 = na  # Enter cultivar change date (na if not in use)
          date2 = 30-dec  # Enter sowing window END date (dd-mmm)
          must_sow = no
          rain_amount = 25  # Enter amount of cumulative rainfall (mm)
          rain_days = 7  # Enter number of days to accumulate rainfall (days)
          esw_amount = 100  # Enter amount of soil water (mm)
          # Sowing Parameters
          cultivar1 = Buster  # Enter cultivar
          cultivar2 =  # Enter 2nd Cultivar (na if not using a second cultivar)
          density1 = 10  # Enter sowing density (plants/m2)
          depth1 = 30  # Enter sowing depth (mm)
          row_spacing1 = 500  # Enter row spacing (mm)
          # Extra Parameters
          plants_pm1 =  # Enter sowing density (plants/ m row cotton)
          ftn1 = 0  # Enter Fertile Tiller Number (na for auto)
          skiprow1 = solid  # Skip row
          tillageImplement = na  # Name of tillage implement (na if not in use)
```csharp
using System;
using ModelFramework;
using CSGeneral;

// Basic crop management: sowing & harvesting.
// Multi-paddock aware.
// This component DOES NOT require a trigger from the sequencer.
// It will assume it is the only crop in the system if it doesnt find a sequencer.
// If it does find a sequencer, it will do nothing until told to (via Enter/Leave).
public class Script 
{      
   [Link()]  public Simulation MySimulation;
   
   [Param()] private string crop;         // The module name of this crop
   [Param()] private string date1;         //Start of sowing window
   [Param()] private string date2;         //End of sowing window
   [Param()] private string date3;         //date to change to different cultivar
   [Param()] int esw_amount;
   [Param()] private string must_sow;

   [Input()] private DateTime today;

   // Rainfall accumulator
   [Param()] int rain_days;              //check for rain over this period
   [Param()] int rain_amount;            //this much rain over that period

   // Daily rainfall from the system
   [Input] private double rain;
   private ManagerUtility.Tracker<double> rainTracker; 

   private bool inWindow = false;
   private bool endOfWindow = false;
   private bool ChangeCultivar = false;

   //initialise tracker, telling it how many days to track
   [EventHandler] public void OnInitialised()
   {
      rainTracker = new ManagerUtility.Tracker<double>(rain_days); 
   }

   // Daily tests common to all paddocks
   [EventHandler] public void OnPrepare()
   {
      bool startOfWindow = DateUtility.DatesEqual(date1, today);

      inWindow = DateUtility.WithinDates(date1, today, date2);
      ChangeCultivar = false;
      if(date3 != "na")  
         ChangeCultivar = DateUtility.WithinDates(date3, today, date2);
      endOfWindow = DateUtility.DatesEqual(date2, today);

      rainTracker.Add(rain);
      string currentPaddock = "";
      if (MySimulation.Get("currentPaddock", out currentPaddock) == false) 
      {
         // If there is no sequencer plugged in then we are it..
         if (canEnter > 0) {
            OnEnter();
         }
         if (canLeave > 0) {
            OnLeave();
         }
      }
   }
   // Test whether we can sow a crop today
   // +ve number - yes
   // 0          - no
   // -ve number - no, out of scope (planting window)
   [Output, Description("Test whether we can sow a crop today")] public int canEnter  {
      get {
         bool isPossibleToday = false;
         
         string currentPaddock;
         MySimulation.Get("currentPaddock", out currentPaddock);
         //Console.WriteLine("1. '" + currentPaddock + "'");

         Component paddockModule;
         if (currentPaddock != "")
            paddockModule = (Component) MySimulation.LinkByName(currentPaddock);
         else
            paddockModule = (Component) MySimulation.ChildPaddocks[0];
         //Console.WriteLine("2. " + paddockModule.Name);

         Component cropModule = (Component) paddockModule.LinkByName( crop );

         //Console.WriteLine("3. " + cropModule.Name);
         string plantStatus = "";
         cropModule.Get("plant_status", out plantStatus);

         double esw = 0.0;
         Component soilModule = (Component) paddockModule.LinkByType("SoilWat");
         soilModule.Get("esw", out esw);
         if (plantStatus == "out" &&
             inWindow &&
             rainTracker.Sum() >= rain_amount &&
             esw > esw_amount) 
         {
             isPossibleToday = true;
         } 

	     if (isPossibleToday)
            return 1;
         
         if (plantStatus == "out" && endOfWindow && must_sow == "yes")
            return 1;

         if (plantStatus == "out" && !inWindow)
            return -1;
         
         return 0;
      }
   }  
   
[Output, Description("Test whether we have passed the end of the window")] public int pastWindow  {
      get {
         return( (DateUtility.CompareDates(date2, today) < 0) ? 1 : 0);
      }
   }   
   // Sow a crop
   [Param()] private string cultivar1;
   [Param()] private string cultivar2;
   [Param()] private string density1;
   [Param()] private string plants_pm1;
   [Param()] private double depth1;
   [Param()] private double row_spacing1;
   [Param()] private string ftn1;
   [Param()] private string skiprow1;
   [Param()] private string tillageImplement;
   
   [EventHandler, Description("Sow the crop")] public void OnEnter()
   {
      Console.WriteLine(today.ToString("dd/MM/yyyy") + " Sowing Crop");
      SowType data = new SowType();
      data.Cultivar = cultivar1;
      if(ChangeCultivar)
         data.Cultivar = cultivar2;

      double density = 0;
      if (! double.TryParse(density1, out density) && density1 != "")
         Console.WriteLine(today.ToString("dd/MM/yyyy") + " Ignoring density parameter \"" + density1 + "\"");

      double plants_pm = 0;
      if (! double.TryParse(plants_pm1, out plants_pm)&& plants_pm1 != "")
         Console.WriteLine(today.ToString("dd/MM/yyyy") + " Ignoring plants_pm parameter \"" + plants_pm1 + "\"");

      data.plants = density;
      data.plants_pm = plants_pm;
      data.sowing_depth = depth1;
      data.row_spacing = row_spacing1;
      data.tiller_no_fertile = (ftn1 == "na") ? "" : ftn1;
      data.SkipRow = 0 ;
      if (skiprow1 == "single")
         data.SkipRow = 1;
      else if (skiprow1 == "double")
         data.SkipRow = 2;

      string currentPaddock;
      MySimulation.Get("currentPaddock", out currentPaddock);
      Component cropModule;
      if (currentPaddock != "")
         cropModule = (Component) MySimulation.LinkByName(currentPaddock + "." + crop);
      else 
         cropModule = (Component) MySimulation.ChildPaddocks[0].LinkByName(crop);

      cropModule.Publish("Sow", data);

      if (tillageImplement.ToLower() != "na") 
	  {
         TillageType t = new TillageType();
         t.type = tillageImplement;
         Component paddockModule;
         if (currentPaddock != "")
            paddockModule = (Component) MySimulation.LinkByName(currentPaddock);
         else
            paddockModule = MySimulation.ChildPaddocks[0];
         paddockModule.Publish("tillage", t);
      }		 
   }

   // Test whether we can harvest a crop today
   // +ve number - yes
   // 0          - no
   // -ve        - out of scope
   [Output] public int canLeave  
   {
      get 
      {
         string currentPaddock;
         MySimulation.Get("currentPaddock", out currentPaddock);

         string plantStatus = "";
         MySimulation.Get((currentPaddock != "" ? currentPaddock + "." : "") + crop + ".plant_status", out plantStatus);
         if (plantStatus == "out")
            return -1;

         string StageName = "";
         MySimulation.Get((currentPaddock != "" ? currentPaddock + "." : "") + crop + ".StageName", out StageName);
         if (StageName == "harvest_ripe" || plantStatus == "dead")
            return 1;
         return 0;
      }
   }

   [EventHandler] public void OnLeave()
   {
      Console.WriteLine(today + " Harvesting Crop");
      HarvestType hdata = new HarvestType();
      hdata.Remove = 0.0;
      string currentPaddock;
      MySimulation.Get("currentPaddock", out currentPaddock);
      Component cropModule;
      if (currentPaddock != "")
         cropModule = (Component) MySimulation.LinkByName(currentPaddock + "." + crop);
      else 
         cropModule = (Component) MySimulation.ChildPaddocks[0].LinkByName(crop);

      cropModule.Publish("harvest", hdata);

      KillCropType kdata = new KillCropType();
      kdata.KillFraction = 0.0F;
      cropModule.Publish("killcrop", kdata);
      cropModule.Publish("end_crop");
   } 
}
```
        manager2 DCaPS_C4_short
```csharp
using System;
using System.IO;
using ModelFramework;

using DCAPST;
using DCAPST.Interfaces;
using DCAPST.Utilities;

public class Script
{
   [Link] public Simulation MySimulation;
   [Link] Paddock MyPaddock; // Can be used to dynamically get access to simulation structure and variables
   [Input] DateTime Today;   // Equates to the value of the current simulation date - value comes from CLOCK
   [Output] public double[] dcaps = new double[5];

   [Event] public event NullTypeDelegate IntervalStep;

   // Daily Outputs
   [Output] public double BIOtotalDAY;
   [Output] public double BIOshootDAY;
   [Output] public double RootShoot;
   [Output] public double EcanDemand;
   [Output] public double EcanSupply;
   [Output] public double RUE;
   [Output] public double TE;
   [Output] public double RadIntDcapst;
   [Output] public double BIOshootDAYPot;
   [Output] public double SoilWater;

   // Interval outputs
   [Output] public double Hour;
   [Output] public double SunlitTemperature;
   [Output] public double ShadedTemperature;
   [Output] public double SunlitAc1;
   [Output] public double SunlitAc2;
   [Output] public double SunlitAj;
   [Output] public double ShadedAc1;
   [Output] public double ShadedAc2;
   [Output] public double ShadedAj;

   public CanopyParameters CP;
   public PathwayParameters PP;
   public DCAPSTModel DM;

   public double LAITrigger = 0.5;
   public double PsiFactor = 0.4; //psiFactor-Psi Reduction Factor


   // The following event handler will be called once at the beginning of the simulation
   [EventHandler]
   public void OnInitialised()
   {
      CP = Classic.SetUpCanopy(
         CanopyType.C4, // Canopy type
         363, // CO2 partial pressure
         0.7, // Curvature factor
         0.047, // Diffusivity-solubility ratio
         210000, // O2 partial pressure
         0.78, // Diffuse extinction coefficient
         0.8, // Diffuse extinction coefficient NIR
         0.036, // Diffuse reflection coefficient
         0.389, // Diffuse reflection coefficient NIR
         60, // Leaf angle
         0.15, // Leaf scattering coefficient
         0.8, // Leaf scattering coefficient NIR
         0.15, // Leaf width
         1.3, // SLN ratio at canopy top
         14, // Minimum Nitrogen
         1.5, // Wind speed
         1.5);             // Wind speed extinction


      PP = Classic.SetUpPathway(
         0, // jTMin
         37.8649150880407, // jTOpt
         55, // jTMax
         0.711229539802063, // jC
         1, // jBeta
         40600, //mesophyll conductance factor
         1210, // KcAt25
         64200, // KcFactor
         292000, // KoAt25
         10500, // KoFactor
         5.51328906454566, // VcVoAt25
         21265.4029552906, // VcVoFactor
         75, // KpAt25
         36300, // KpFactor
         78000, // VcFactor
         46390, // RdFactor
         57043.2677590512, // VpFactor
         120, // pepRegeneration
         0.15, // spectralCorrectionFactor
         0.1, // ps2ActivityFraction
         0.003, // bundleSheathConductance
         0.465 * PsiFactor, // maxRubiscoActivitySLNRatio
         2.7 * PsiFactor, // maxElectronTransportSLNRatio
         0.0 * PsiFactor, // respirationSLNRatio
         1.55 * PsiFactor, // maxPEPcActivitySLNRatio
         0.0135 * PsiFactor, // mesophyllCO2ConductanceSLNRatio
         2, // extraATPCost
         0.45);   // intercellularToAirCO2Ratio         

      //Set the LAI trigger
      MyPaddock.Set("laiTrigger", LAITrigger);
   }

   // This routine is called when the plant model wants us to do the calculation
   [EventHandler]
   public void Ondodcaps()
   {
      int DOY = 0;
      double latitude = 0;
      double maxT = 0;
      double minT = 0;
      double radn = 0;
      double RootShootRatio = 0;
      double SLN = 0;
      double SWAvailable = 0;
      double lai = 0;

      MyPaddock.Get("DOY", out DOY);
      MyPaddock.Get("latitude", out latitude);
      MyPaddock.Get("maxT", out maxT);
      MyPaddock.Get("minT", out minT);
      MyPaddock.Get("radn", out radn);
      MyPaddock.Get("RootShootRatio", out RootShootRatio);
      MyPaddock.Get("SLN", out SLN);
      MyPaddock.Get("SWAvailable", out SWAvailable);
      MyPaddock.Get("lai", out lai);

      // Model the photosynthesis
      double rpar = 0.5;
      DCAPSTModel DM = Classic.SetUpModel(CP, PP, DOY, latitude, maxT, minT, radn, rpar);

      // Optional values 
      DM.PrintIntervalValues = false; // Switch to print extra data (default = false)
      DM.Biolimit = 0;     // Biological transpiration limit of the crop (0 disables mechanism)
      DM.Reduction = 0;    // Excess water reduction fraction for bio-limited transpiration (0 disables mechanism)

      // Run the simulation
      DM.DailyRun(lai, SLN, SWAvailable, RootShootRatio);

      // Daily Outputs
      RootShoot = RootShootRatio;
      BIOshootDAY = dcaps[0] = DM.ActualBiomass;
      BIOtotalDAY = BIOshootDAY * (1 + RootShoot);
      EcanDemand = dcaps[1] = DM.WaterDemanded;
      EcanSupply = dcaps[2] = DM.WaterSupplied;
      RadIntDcapst = dcaps[3] = DM.InterceptedRadiation;
      RUE = (RadIntDcapst == 0 ? 0 : BIOshootDAY / RadIntDcapst);
      TE = (EcanSupply == 0 ? 0 : BIOshootDAY / EcanSupply);
      BIOshootDAYPot = dcaps[4] = DM.PotentialBiomass;
      SoilWater = SWAvailable;

      // Interval outputs
      foreach (var interval in DM.Intervals)
      {
         Hour = interval.Time;
         SunlitTemperature = interval.Sunlit.Temperature;
         ShadedTemperature = interval.Shaded.Temperature;
         SunlitAc1 = interval.Sunlit.Ac1.Assimilation;
         SunlitAc2 = interval.Sunlit.Ac2.Assimilation;
         SunlitAj = interval.Sunlit.Aj.Assimilation;
         ShadedAc1 = interval.Shaded.Ac1.Assimilation;
         ShadedAc2 = interval.Shaded.Ac2.Assimilation;
         ShadedAj = interval.Shaded.Aj.Assimilation;

         if (IntervalStep != null) IntervalStep.Invoke();
      }
   }

   // Set its default value to garbage so that we find out quickly
   [EventHandler]
   public void OnPrepare()
   {
      RootShoot = 0;
      BIOshootDAY = 0;
      BIOtotalDAY = 0;
      EcanDemand = 0;
      EcanSupply = 0;
      RadIntDcapst = 0;
      RUE = 0;
      TE = 0;
      BIOshootDAYPot = 0;

      for (int i = 0; i < 5; i++) { dcaps[i] = -1.0f; }
   }
}
```
          Reference
            ref = %apsim%/Model/DCaPST.dll  # Path to assembly
      irrigation
        automatic_irrigation = off  # switch
        asw_depth = 600.0  # Depth to which ASW is calculated. (mm)
        crit_fr_asw = 0.5  # Fraction of ASW below which irrigation is applied (0-1.0)
        irrigation_efficiency = 1.0  # Efficiency of the irrigation. (0-1.0)
        default_no3_conc = 0.0  # Nitrate concentration (ppm N)
        default_nh4_conc = 0.0  # Ammonium concentration (ppm N)
        default_cl_conc = 0.0  # Chloride concentration (ppm Cl)
      fertiliser
      sorghum
      outputfile: filename=Continuous Sorghum with DCaPST.out; title=Continuous Sorghum with DCaPST
        variables My Variables
          variables: dd/mm/yyyy as date, stage, DaysAfterSowing, day_of_year, MaxT, MinT, Radn, LAI, SLN, swdef_photo, BIOtotalDAY, BIOshootDAYPot, BIOshootDAY, RootShoot, EcanDemand, EcanSupply, TE, RadIntDcapst, Biomass, Yield
        events My Variables Events: event=Daily
