folder simulations: version=37; creator=Apsim 7.10-r0
  simulation Continuous Wheat with DCaPST
    metfile met: filename=%apsim%/Examples/MetFiles/Goond.met
    clock
      start_date = 01/01/1940  # Enter the start date of the simulation
      end_date = 31/12/1950  # Enter the end date of the simulation
    summaryfile
    area paddock
      Soil: LocalName=Waco; Site=Jimbour; Region=South East Queensland
        SoilType = Black Vertosol  # Soil description
        NearestTown = Jimbour, Q 4352
        NaturalVegetation = Grassland, mainly Qld bluegrass
        InitialWater Initial water: FractionFull=1; PercentMethod=FilledFromTop
        Water
          Thickness  BD    AirDry  LL15  DUL   SAT
          150        1.02  0.15    0.29  0.54  0.59
          150        1.03  0.26    0.29  0.53  0.58
          300        1.02  0.29    0.29  0.54  0.59
          300        1.02  0.29    0.29  0.54  0.58
          300        1.06  0.3     0.3   0.52  0.57
          300        1.11  0.31    0.31  0.5   0.55
          300        1.12  0.32    0.32  0.5   0.55
          300        1.15  0.33    0.33  0.48  0.53
          300        1.18  0.34    0.34  0.47  0.52
          300        1.2   0.35    0.35  0.46  0.51
          300        1.25  0.36    0.36  0.44  0.49
          SoilCrop Barley
            LL=[0.29, 0.29, 0.32, 0.38, 0.39, 0.39, 0.41, 0.48, 0.47, 0.46, 0.44]
            KL=[0.1, 0.1, 0.08, 0.06, 0.04, 0.02, 0.01, 0, 0, 0, 0]
            XF=[1, 1, 1, 1, 1, 1, 1, 0, 0, 0, 0]
          SoilCrop Chickpea
            LL=[0.29, 0.29, 0.36, 0.43, 0.51, 0.5, 0.5, 0.48, 0.47, 0.46, 0.44]
            KL=[0.1, 0.1, 0.08, 0.06, 0.04, 0.02, 0.01, 0, 0, 0, 0]
            XF=[1, 1, 1, 1, 1, 1, 1, 0, 0, 0, 0]
          SoilCrop Lucerne
            LL=[0.29, 0.29, 0.29, 0.29, 0.3, 0.31, 0.32, 0.33, 0.34, 0.35, 0.36]
            KL=[0.1, 0.1, 0.1, 0.1, 0.09, 0.09, 0.09, 0.09, 0.09, 0.09, 0.09]
            XF=[1, 1, 1, 1, 1, 1, 1, 1, 1, 1, 1]
          SoilCrop Maize
            LL=[0.29, 0.29, 0.34, 0.34, 0.37, 0.4, 0.42, 0.48, 0.47, 0.46, 0.44]
            KL=[0.1, 0.1, 0.1, 0.08, 0.06, 0.04, 0.02, 0, 0, 0, 0]
            XF=[1, 1, 1, 1, 1, 1, 1, 0, 0, 0, 0]
          SoilCrop Perennial Grass
            LL=[0.29, 0.29, 0.39, 0.41, 0.4, 0.4, 0.41, 0.41, 0.4, 0.4, 0.42]
            KL=[0.1, 0.1, 0.1, 0.1, 0.09, 0.07, 0.05, 0, 0, 0, 0]
            XF=[1, 1, 1, 1, 1, 1, 1, 0, 0, 0, 0]
          SoilCrop Sorghum
            LL=[0.29, 0.29, 0.35, 0.38, 0.4, 0.4, 0.4, 0.48, 0.47, 0.46, 0.44]
            KL=[0.1, 0.1, 0.1, 0.08, 0.06, 0.04, 0.02, 0, 0, 0, 0]
            XF=[1, 1, 1, 1, 1, 1, 1, 0, 0, 0, 0]
          SoilCrop Wheat
            LL=[0.29, 0.29, 0.32, 0.32, 0.35, 0.38, 0.41, 0.48, 0.47, 0.46, 0.44]
            KL=[0.1, 0.1, 0.08, 0.06, 0.04, 0.02, 0.01, 0, 0, 0, 0]
            XF=[1, 1, 1, 1, 1, 1, 1, 0, 0, 0, 0]
        SoilWater: SummerCona=3.5; SummerU=6; SummerDate=1-Nov; WinterCona=3.5; WinterU=6; WinterDate=1-Apr; DiffusConst=40; DiffusSlope=16; Salb=0.13; CN2Bare=73; CNRed=20; CNCov=0.8; Thickness=[150, 150, 300, 300, 300, 300, 300, 300, 300, 300, 300]; SWCON=[0.3, 0.3, 0.3, 0.3, 0.3, 0.3, 0.3, 0.3, 0.3, 0.3, 0.3]
        SoilOrganicMatter: RootCN=40; RootWt=200; SoilCN=12.5; EnrACoeff=7.4; EnrBCoeff=0.2
          Thickness  OC    FBiom  FInert
          150        1.04  0.025  0.4
          150        0.89  0.02   0.6
          300        0.89  0.015  0.8
          300        0.89  0.01   0.9
          300        0.77  0.01   0.95
          300        0.45  0.01   0.95
          300        0.27  0.01   0.95
          300        0.22  0.01   0.95
          300        0.16  0.01   0.95
          300        0.13  0.01   0.95
          300        0.12  0.01   0.95
        Analysis
          Thickness  EC    PH
          150        0.2   8.4
          150        0.25  8.8
          300        0.31  9
          300        0.4   9.2
          300        0.59  9.2
          300        0.84  9.1
          300        0.93  9
          300        1.01  9
          300        1.06  8.9
          300        1.05  8.9
          300        1.01  8.9
        Sample Initial nitrogen
          Thickness  NO3    NH4
          150        6.503  0.599004
          150        2.101  0.100001
          300        2.101  0.100001
          300        1.701  0.100001
          300        1.701  0.100001
          300        1.701  0.100001
          300        1.701  0.100001
          300        1.701  0.100001
          300        1.701  0.100001
          300        1.701  0.100001
          300        1.701  0.100001
      surfaceom SurfaceOrganicMatter
        PoolName = wheat  # Organic Matter pool name
        type = wheat  # Organic Matter type
        mass = 1000  # Initial surface residue (kg/ha)
        cnr = 80  # C:N ratio of initial residue
        standing_fraction = 0  # Fraction of residue standing
      fertiliser
      wheat
      folder Manager folder
        manager2 Crop Management
          # Crop properties
          crop = wheat  # Name of this crop
          # Sowing criteria
          date1 = 15-may  # Enter sowing window START date (dd-mmm)
          date3 = na  # Enter cultivar change date (na if not in use)
          date2 = 10-jul  # Enter sowing window END date (dd-mmm)
          must_sow = no
          rain_amount = 25  # Enter amount of cumulative rainfall (mm)
          rain_days = 7  # Enter number of days to accumulate rainfall (days)
          esw_amount = 100  # Enter amount of soil water (mm)
          # Sowing Parameters
          cultivar1 = hartog  # Enter cultivar
          cultivar2 = na  # Enter 2nd Cultivar (na if not using a second cultivar)
          density1 = 100  # Enter sowing density (plants/m2)
          depth1 = 30  # Enter sowing depth (mm)
          row_spacing1 = 250  # Enter row spacing (mm)
          # Extra Parameters
          ftn1 = na  # Enter Fertile Tiller Number (na for auto)
          skiprow1 = solid  # Skip row
          tillageImplement = na  # Name of tillage implement (na if not in use)
```csharp
using System;
using ModelFramework;
using CSGeneral;

// Basic crop management: sowing & harvesting.
// Multi-paddock aware.
// This component DOES NOT require a trigger from the sequencer.
// It will assume it is the only crop in the system if it doesnt find a sequencer.
// If it does find a sequencer, it will do nothing until told to (via Enter/Leave).
public class Script 
{      
   [Link()]  public Simulation MySimulation;
   
   [Param()] private string crop;         // The module name of this crop
   [Param()] private string date1;         //Start of sowing window
   [Param()] private string date2;         //End of sowing window
   [Param()] private string date3;         //date to change to different cultivar
   [Param()] int esw_amount;
   [Param()] private string must_sow;

   [Input()] private DateTime today;

   // Rainfall accumulator
   [Param()] int rain_days;              //check for rain over this period
   [Param()] int rain_amount;            //this much rain over that period

   // Daily rainfall from the system
   [Input] private double rain;
   private ManagerUtility.Tracker<double> rainTracker; 

   private bool inWindow = false;
   private bool endOfWindow = false;
   private bool ChangeCultivar = false;

   //initialise tracker, telling it how many days to track
   [EventHandler] public void OnInitialised()
   {
      rainTracker = new ManagerUtility.Tracker<double>(rain_days); 
   }

   // Daily tests common to all paddocks
   [EventHandler] public void OnPrepare()
   {
      bool startOfWindow = DateUtility.DatesEqual(date1, today);

      inWindow = DateUtility.WithinDates(date1, today, date2);
      ChangeCultivar = false;
      if(date3 != "na")  
         ChangeCultivar = DateUtility.WithinDates(date3, today, date2);
      endOfWindow = DateUtility.DatesEqual(date2, today);

      rainTracker.Add(rain);
      string currentPaddock = "";
      if (MySimulation.Get("currentPaddock", out currentPaddock) == false) 
      {
         // If there is no sequencer plugged in then we are it..
         if (canEnter > 0) {
            OnEnter();
         }
         if (canLeave > 0) {
            OnLeave();
         }
      }
   }
   // Test whether we can sow a crop today
   // +ve number - yes
   // 0          - no
   // -ve number - no, out of scope (planting window)
   [Output, Description("Test whether we can sow a crop today")] public int canEnter  {
      get {
         bool isPossibleToday = false;
         
         string currentPaddock;
         MySimulation.Get("currentPaddock", out currentPaddock);
         //Console.WriteLine("1. '" + currentPaddock + "'");

         Component paddockModule;
         if (currentPaddock != "")
            paddockModule = (Component) MySimulation.LinkByName(currentPaddock);
         else
            paddockModule = (Component) MySimulation.ChildPaddocks[0];
         //Console.WriteLine("2. " + paddockModule.Name);

         Component cropModule = (Component) paddockModule.LinkByName( crop );

         //Console.WriteLine("3. " + cropModule.Name);
         string plantStatus = "";
         cropModule.Get("plant_status", out plantStatus);

         double esw = 0.0;
         Component soilModule = (Component) paddockModule.LinkByType("SoilWat");
         soilModule.Get("esw", out esw);
         if (plantStatus == "out" &&
             inWindow &&
             rainTracker.Sum() >= rain_amount &&
             esw > esw_amount) 
         {
             isPossibleToday = true;
         } 

	     if (isPossibleToday)
            return 1;
         
         if (plantStatus == "out" && endOfWindow && must_sow == "yes")
            return 1;

         if (plantStatus == "out" && !inWindow)
            return -1;
         
         return 0;
      }
   }  
   
   
   // Sow a crop
   [Param()] private string cultivar1;
   [Param()] private string cultivar2;
   [Param()] private double density1;
   [Param()] private double depth1;
   [Param()] private double row_spacing1;
   [Param()] private string ftn1;
   [Param()] private string skiprow1;
   [Param()] private string tillageImplement;
   
   [EventHandler, Description("Sow the crop")] public void OnEnter()
   {
      Console.WriteLine(today + " Sowing Crop");
      SowType data = new SowType();
      data.Cultivar = cultivar1;
      if(ChangeCultivar)
         data.Cultivar = cultivar2;

      data.plants = density1;
      data.sowing_depth = depth1;
      data.row_spacing = row_spacing1;
      data.tiller_no_fertile = (ftn1 == "na") ? "" : ftn1;
      data.SkipRow = 0 ;
      if (skiprow1 == "single")
         data.SkipRow = 1;
      else if (skiprow1 == "double")
         data.SkipRow = 2;

      string currentPaddock;
      MySimulation.Get("currentPaddock", out currentPaddock);
      Component cropModule;
      if (currentPaddock != "")
         cropModule = (Component) MySimulation.LinkByName(currentPaddock + "." + crop);
      else 
         cropModule = (Component) MySimulation.ChildPaddocks[0].LinkByName(crop);

      cropModule.Publish("Sow", data);

      if (tillageImplement.ToLower() != "na") 
	  {
         TillageType t = new TillageType();
         t.type = tillageImplement;
         Component paddockModule;
         if (currentPaddock != "")
            paddockModule = (Component) MySimulation.LinkByName(currentPaddock);
         else
            paddockModule = MySimulation.ChildPaddocks[0];
         paddockModule.Publish("tillage", t);
      }		 
   }

   // Test whether we can harvest a crop today
   // +ve number - yes
   // 0          - no
   // -ve        - out of scope
   [Output] public int canLeave  
   {
      get 
      {
         string currentPaddock;
         MySimulation.Get("currentPaddock", out currentPaddock);

         string plantStatus = "";
         MySimulation.Get((currentPaddock != "" ? currentPaddock + "." : "") + crop + ".plant_status", out plantStatus);
         if (plantStatus == "out")
            return -1;

         string StageName = "";
         MySimulation.Get((currentPaddock != "" ? currentPaddock + "." : "") + crop + ".StageName", out StageName);
         if (StageName == "harvest_ripe" || plantStatus == "dead")
            return 1;
         return 0;
      }
   }

   [EventHandler] public void OnLeave()
   {
      Console.WriteLine(today + " Harvesting Crop");
      HarvestType hdata = new HarvestType();
      hdata.Remove = 0.0;
      string currentPaddock;
      MySimulation.Get("currentPaddock", out currentPaddock);
      Component cropModule;
      if (currentPaddock != "")
         cropModule = (Component) MySimulation.LinkByName(currentPaddock + "." + crop);
      else 
         cropModule = (Component) MySimulation.ChildPaddocks[0].LinkByName(crop);

      cropModule.Publish("harvest", hdata);

      KillCropType kdata = new KillCropType();
      kdata.KillFraction = 0.0F;
      cropModule.Publish("killcrop", kdata);
      cropModule.Publish("end_crop");
   } 
}
```
        manager2 Fertilise at Sowing
          # When should fertiliser be applied
          ModuleName = wheat  # On which module should the event come from
          EventName = sowing  # On which event should spraying be triggered
          # Event details
          fertType = urea_N  # The type of fertiliser
          fertAmt = 150  # Amount of fertiliser to apply (kg/ha)
```csharp
using System;
using System.Linq;
using System.Collections.Generic;
using ModelFramework;

// Crop management: fertilise at sowing
// Multi-paddock aware.
// This component DOES NOT require a trigger from the sequencer.

public class Script 
{      
   [Link]  public Simulation MySimulation;
   [Param] string fertType;
   [Param] float fertAmt;
   [Param] string ModuleName;
   [Param] string EventName;
   
   [EventHandler] public void OnStart_Simulation()
   {
      foreach (Paddock paddock in MySimulation.ChildPaddocks) 
      {
         foreach (Component child in paddock.Children) {
            if(child.Name == ModuleName){
               RuntimeEventHandler.NullFunction curried = () => OnTrigger(paddock.Name);
               MySimulation.Subscribe(child.FullName + "." + EventName, curried);
               //Console.WriteLine("Subscribed '" + child.FullName + "." + EventName + " => " + paddock.Name + "'"); 
            }
         }
      }
   }

   public void OnTrigger(string paddock)
   {
      Console.WriteLine("Fertiliser OnTrigger called, paddock='" + paddock + "'"); 
      if (fertAmt > 0) 
      {         
         Component paddockModule;
         if (paddock != "")
            paddockModule = (Component) MySimulation.LinkByName(paddock);
         else
            paddockModule = (Component) MySimulation.ChildPaddocks[0];
         //Console.WriteLine("2. " + paddockModule.Name);

         Fertiliser fertModule = (Fertiliser) paddockModule.LinkByName("Fertiliser");
         fertModule.Apply(fertAmt, 50, fertType);
      }
   }
}
```
        manager2 DCaPS-C3
```csharp
using System;
using System.IO;
using ModelFramework;

using DCAPST;
using DCAPST.Interfaces;
using DCAPST.Utilities;

public class Script
{
   [Link] public Simulation MySimulation;
   [Link] Paddock MyPaddock; // Can be used to dynamically get access to simulation structure and variables
   [Input] DateTime Today;   // Equates to the value of the current simulation date - value comes from CLOCK
   [Output] public double[] dcapst = new double[5];

   [Event] public event NullTypeDelegate IntervalStep;

   // Daily Outputs
   [Output] public double BIOtotalDAY;
   [Output] public double BIOshootDAY;
   [Output] public double RootShoot;
   [Output] public double EcanDemand;
   [Output] public double EcanSupply;
   [Output] public double RUE;
   [Output] public double TE;
   [Output] public double RadIntDcaps;
   [Output] public double BIOshootDAYPot;
   [Output] public double SoilWater;
   [Output] public double dsln;

   // Interval outputs
   [Output] public double Hour;
   [Output] public double SunlitTemperature;
   [Output] public double ShadedTemperature;
   [Output] public double SunlitAc1;
   [Output] public double SunlitAc2;
   [Output] public double SunlitAj;
   [Output] public double ShadedAc1;
   [Output] public double ShadedAc2;
   [Output] public double ShadedAj;

   public CanopyParameters CP;
   public PathwayParameters PP;
   public DCAPSTModel DM;

   public double NLAITrigger = 1.0; // default = 1.0
   public double LAITrigger = 0.5;  // default = 0.5
   public double NLowLimit = 0.0;   // default = 0.5
   public double PsiFactor = 1.0;   // Psi reduction factor

   // DCaPST is disabled to begin with
   bool dcapstON = false;

   // The alternative photosystem model
   string PsModelName1;

   // The following event handler will be called once at the beginning of the simulation
   [EventHandler]
   public void OnInitialised()
   {
      /* IMPORTANT - Do NOT change the order of these values */

      CP = Classic.SetUpCanopy(
         CanopyType.C3, // Canopy type
         370, // CO2 partial pressure
         0.7, // Empirical curvature factor
         0.047, // Diffusivity-solubility ratio
         210000, // O2 partial pressure
         0.78, // PAR diffuse extinction coefficient
         0.8, // NIR diffuse extinction coefficient
         0.036, // PAR diffuse reflection coefficient
         0.389, // NIR diffuse reflection coefficient
         60, // Leaf angle
         0.15, // PAR leaf scattering coefficient
         0.8, // NIR leaf scattering coefficient
         0.05, // Leaf width
         1.3, // SLN ratio at canopy top
         14, // Minimum structural nitrogen
         1.5, // Wind speed
         1.5); // Wind speed profile distribution coefficient

      PP = Classic.SetUpPathway(
         0, // Electron transport minimum temperature
         30.0, // Electron transport optimum temperature
         45.0, // Electron transport maximum temperature
         0.911017958600129, // Electron transport scaling constant
         1, // Electron transport Beta value

         0, // Mesophyll conductance minimum temperature
         29.2338417788683, // Mesophyll conductance optimum temperature
         45, // Mesophyll conductance maximum temperature
         0.875790608584141, // Mesophyll conductance scaling constant
         1, // Mesophyll conductance Beta value

         273.422964228666, // Kc25 - Michaelis Menten constant of Rubisco carboxylation at 25 degrees C
         93720, // KcFactor

         165824.064155384, // Ko25 - Michaelis Menten constant of Rubisco oxygenation at 25 degrees C
         33600, // KoFactor

         4.59217066521612, // VcVo25 - Rubisco carboxylation to oxygenation at 25 degrees C
         35713.19871277176, // VcVoFactor

         0.0, // Kp25 - Michaelis Menten constant of PEPc activity at 25 degrees C (Unused in C3)
         0.0, // KpFactor (Unused in C3)

         65330, // VcFactor
         46390, // RdFactor
         57043.2677590512, // VpFactor

         0.0, // PEPc regeneration (Unused in C3)
         0.15, // Spectral correction factor
         0.1, // Photosystem II activity fraction
         0.003, // Bundle sheath CO2 conductance
         1.1 * PsiFactor, // Max Rubisco activity to SLN ratio
         1.85 * PsiFactor, // Max electron transport to SLN ratio
         0.0 * PsiFactor, // Respiration to SLN ratio
         1.0 * PsiFactor, // Max PEPc activity to SLN ratio
         0.00412 * PsiFactor, // Mesophyll CO2 conductance to SLN ratio
         0.75, // Extra ATP cost
         0.7); // Intercellular CO2 to air CO2 ratio

      //Set the LAI trigger
      MyPaddock.Set("DCaPSTTriggerLAI", LAITrigger);
      MyPaddock.Get("PsModelName1", out PsModelName1);
   }

   // This routine is called when the plant model wants us to do the calculation
   //private bool lowLAI = false;
   private bool skipper = false;
   [EventHandler]
   public void Ondodcapst()
   {
      int DOY = 0;
      double latitude = 0;
      double maxT = 0;
      double minT = 0;
      double radn = 0;
      double RootShootRatio = 0;
      double sln = 0;
      double greenN = 0;
      double SWAvailable = 0;
      double lai = 0;

      MyPaddock.Get("DCAPSTDOY", out DOY);
      MyPaddock.Get("DCAPSTRootShootRatio", out RootShootRatio);
      MyPaddock.Get("DCAPSTswAvail", out SWAvailable);
      MyPaddock.Get("LeafGreenN", out greenN);
      MyPaddock.Get("latitude", out latitude);
      MyPaddock.Get("maxT", out maxT);
      MyPaddock.Get("minT", out minT);
      MyPaddock.Get("radn", out radn);
      MyPaddock.Get("lai", out lai);

      // Model the photosynthesis
      double rpar = 0.5;
      DCAPSTModel DM = Classic.SetUpModel(CP, PP, DOY, latitude, maxT, minT, radn, rpar);

      // OPTIONAL VALUES:      
      // Biological transpiration limit of the crop
      DM.Biolimit = 0;     // default = 0 (disabled)

      // Excess water reduction fraction for bio-limited transpiration 
      DM.Reduction = 0;    // default = 0 (disabled)      

      if (lai > LAITrigger && lai < NLAITrigger)
         sln = Math.Max(greenN, NLowLimit);
      else
         sln = greenN / lai;

      // Run the simulation
      DM.DailyRun(lai, sln, SWAvailable, RootShootRatio);

      // Daily outputs
      RootShoot = RootShootRatio;
      BIOshootDAY = dcapst[0] = DM.ActualBiomass;
      BIOtotalDAY = BIOshootDAY * (1 + RootShoot);
      EcanDemand = dcapst[1] = DM.WaterDemanded;
      EcanSupply = dcapst[2] = DM.WaterSupplied;
      RadIntDcaps = dcapst[3] = DM.InterceptedRadiation;
      RUE = (RadIntDcaps == 0 ? 0 : BIOshootDAY / RadIntDcaps);
      TE = (EcanSupply == 0 ? 0 : BIOshootDAY / EcanSupply);
      BIOshootDAYPot = dcapst[4] = DM.PotentialBiomass;
      SoilWater = SWAvailable;
      dsln = sln;

      // Interval outputs

      // For reasons unknown, wheat calls this method twice, but only the 2nd call is used/valid.
      // This skipper just stops the bad data from showing up in the interval report
      skipper = !skipper;
      if (skipper)
      {
         foreach (var interval in DM.Intervals)
         {
            Hour = interval.Time;
            SunlitTemperature = interval.Sunlit.Temperature;
            ShadedTemperature = interval.Shaded.Temperature;
            SunlitAc1 = interval.Sunlit.Ac1.Assimilation;
            SunlitAc2 = interval.Sunlit.Ac2.Assimilation;
            SunlitAj = interval.Sunlit.Aj.Assimilation;
            ShadedAc1 = interval.Shaded.Ac1.Assimilation;
            ShadedAc2 = interval.Shaded.Ac2.Assimilation;
            ShadedAj = interval.Shaded.Aj.Assimilation;

            if (IntervalStep != null) IntervalStep.Invoke();
         }
      }
   }

   // Set its default value to garbage so that we find out quickly
   [EventHandler]
   public void OnPrepare()
   {
      RootShoot = 0;
      BIOshootDAY = 0;
      BIOtotalDAY = 0;
      EcanDemand = 0;
      EcanSupply = 0;
      RadIntDcaps = 0;
      RUE = 0;
      TE = 0;
      BIOshootDAYPot = 0;

      for (int i = 0; i < 5; i++) { dcapst[i] = -1.0f; }

      double lai = 0;
      MyPaddock.Get("lai", out lai);

      if (!dcapstON && lai >= LAITrigger)
      {
         dcapstON = true;
         MyPaddock.Set("PsModelName", "dcapst");
      }
   }

   // Make certain DCaPST is disabled at sowing
   [EventHandler]
   public void OnSowing()
   {
      dcapstON = false;
      MyPaddock.Set("PsModelName", PsModelName1);
   }
}
```
          Reference
            ref = %apsim%/Model/DCaPST.dll  # Path to assembly
      outputfile: filename=Continuous Wheat with DCaPST.out; title=Continuous Wheat with DCaPST
        variables
          variables: dd/mm/yyyy as Date, biomass, yield, grain_protein, grain_size, esw
        events Reporting Frequency: event=harvesting
      outputfile Daily: filename=Continuous Wheat with DCaPST Daily.out; title=Continuous Wheat with DCaPST Daily
        variables DailyVariables
          variables: dd/mm/yyyy as date, day_of_year, MaxT, MinT, Radn, RootShoot, SLN, SoilWater, LAI, BIOshootDAYPot, BIOshootDAY, EcanDemand, EcanSupply, RadIntDcaps
        events DailyVariables Events: event=Daily
