folder simulations: version=28
  simulation Defoliated Wheat
    metfile met: filename=%apsim%/Examples/MetFiles/lincoln.met
    clock
      start_date = 01/03/2000  # Enter the start date of the simulation
      end_date = 01/03/2001  # Enter the end date of the simulation
    summaryfile
    area paddock
      soil: Site=Jimbour; Region=South East Queensland; LocalName=Waco
        SoilType = Black Vertosol  # Classification
        NearestTown = Jimbour, Q 4352
        NaturalVegetation = Grassland, mainly Qld bluegrass
        InitWater Initial water
          percentmethod: percent=1; distributed=filled from top
        Water
          Layer:
            Thickness (mm)  BD (g/cc)  AirDry (mm/mm)  LL15 (mm/mm)  DUL (mm/mm)  SAT (mm/mm)
            150             1.02       0.15            0.29          0.54         0.59
            150             1.03       0.26            0.29          0.53         0.58
            300             1.02       0.29            0.29          0.54         0.59
            300             1.02       0.29            0.29          0.54         0.58
            300             1.06       0.3             0.3           0.52         0.57
            300             1.11       0.31            0.31          0.5          0.55
            300             1.12       0.32            0.32          0.5          0.55
            300             1.15       0.33            0.33          0.48         0.53
            300             1.18       0.34            0.34          0.47         0.52
            300             1.2        0.35            0.35          0.46         0.51
            300             1.25       0.36            0.36          0.44         0.49
          SoilCrop Barley
            Layer:
              Thickness (mm)  LL (mm/mm)  KL (/day)  XF (0-1)
              150             0.29        0.1        1
              150             0.29        0.1        1
              300             0.32        0.08       1
              300             0.38        0.06       1
              300             0.39        0.04       1
              300             0.39        0.02       1
              300             0.41        0.01       1
              300             0.48        0          0
              300             0.47        0          0
              300             0.46        0          0
              300             0.44        0          0
          SoilCrop Chickpea
            Layer:
              Thickness (mm)  LL (mm/mm)  KL (/day)  XF (0-1)
              150             0.29        0.1        1
              150             0.29        0.1        1
              300             0.36        0.08       1
              300             0.43        0.06       1
              300             0.51        0.04       1
              300             0.5         0.02       1
              300             0.5         0.01       1
              300             0.48        0          0
              300             0.47        0          0
              300             0.46        0          0
              300             0.44        0          0
          SoilCrop Lucerne
            Layer:
              Thickness (mm)  LL (mm/mm)  KL (/day)  XF (0-1)
              150             0.29        0.1        1
              150             0.29        0.1        1
              300             0.29        0.1        1
              300             0.29        0.1        1
              300             0.3         0.09       1
              300             0.31        0.09       1
              300             0.32        0.09       1
              300             0.33        0.09       1
              300             0.34        0.09       1
              300             0.35        0.09       1
              300             0.36        0.09       1
          SoilCrop Maize
            Layer:
              Thickness (mm)  LL (mm/mm)  KL (/day)  XF (0-1)
              150             0.29        0.1        1
              150             0.29        0.1        1
              300             0.34        0.1        1
              300             0.34        0.08       1
              300             0.37        0.06       1
              300             0.4         0.04       1
              300             0.42        0.02       1
              300             0.48        0          0
              300             0.47        0          0
              300             0.46        0          0
              300             0.44        0          0
          SoilCrop Perennial Grass
            Layer:
              Thickness (mm)  LL (mm/mm)  KL (/day)  XF (0-1)
              150             0.29        0.1        1
              150             0.29        0.1        1
              300             0.39        0.1        1
              300             0.41        0.1        1
              300             0.4         0.09       1
              300             0.4         0.07       1
              300             0.41        0.05       1
              300             0.41        0          0
              300             0.4         0          0
              300             0.4         0          0
              300             0.42        0          0
          SoilCrop Sorghum
            Layer:
              Thickness (mm)  LL (mm/mm)  KL (/day)  XF (0-1)
              150             0.29        0.1        1
              150             0.29        0.1        1
              300             0.35        0.1        1
              300             0.38        0.08       1
              300             0.4         0.06       1
              300             0.4         0.04       1
              300             0.4         0.02       1
              300             0.48        0          0
              300             0.47        0          0
              300             0.46        0          0
              300             0.44        0          0
          SoilCrop Wheat
            Layer:
              Thickness (mm)  LL (mm/mm)  KL (/day)  XF (0-1)
              150             0.29        0.1        1
              150             0.29        0.1        1
              300             0.32        0.08       1
              300             0.32        0.06       1
              300             0.35        0.04       1
              300             0.38        0.02       1
              300             0.41        0.01       1
              300             0.48        0          0
              300             0.47        0          0
              300             0.46        0          0
              300             0.44        0          0
        SoilWat: SummerCona=3.5; SummerU=6; SummerDate=1-Nov; WinterCona=3.5; WinterU=6; WinterDate=1-Apr; DiffusConst=40; DiffusSlope=16; Salb=0.13; Cn2Bare=73; CnRed=20; CnCov=0.8
          Layer:
            Thickness (mm)  SWCON (0-1)
            150             0.3
            150             0.3
            300             0.3
            300             0.3
            300             0.3
            300             0.3
            300             0.3
            300             0.3
            300             0.3
            300             0.3
            300             0.3
        SoilOrganicMatter: RootCn=40; RootWt=200; SoilCn=12.5; EnrACoeff=7.4; EnrBCoeff=0.2
          Layer:
            Thickness (mm)  OC (Total %)  FBiom (0-1)  FInert (0-1)
            150             1.04          0.025        0.4
            150             0.89          0.02         0.6
            300             0.89          0.015        0.8
            300             0.89          0.01         0.9
            300             0.77          0.01         0.95
            300             0.45          0.01         0.95
            300             0.27          0.01         0.95
            300             0.22          0.01         0.95
            300             0.16          0.01         0.95
            300             0.13          0.01         0.95
            300             0.12          0.01         0.95
        Analysis
          Layer:
            Thickness (mm)  EC (1:5 dS/m)  PH (1:5 water)
            150             0.2            8.4
            150             0.25           8.8
            300             0.31           9
            300             0.4            9.2
            300             0.59           9.2
            300             0.84           9.1
            300             0.93           9
            300             1.01           9
            300             1.06           8.9
            300             1.05           8.9
            300             1.01           8.9
        Sample Initial nitrogen
          Layer:
            Thickness (mm)  NO3 (ppm)  NH4 (ppm)
            150             6.503      0.599004
            150             2.101      0.100001
            300             2.101      0.100001
            300             1.701      0.100001
            300             1.701      0.100001
            300             1.701      0.100001
            300             1.701      0.100001
            300             1.701      0.100001
            300             1.701      0.100001
            300             1.701      0.100001
            300             1.701      0.100001
      surfaceom surface organic matter
        PoolName = wheat  # Organic Matter pool name
        type = wheat  # Organic Matter type
        mass = 1000  # Initial surface residue (kg/ha)
        cnr = 80  # C:N ratio of initial residue
        standing_fraction = 0  # Fraction of residue standing
      fertiliser
      wheat
      folder Manager folder
        manager Sowing rule
          on start_of_day:
```
if (today = date('01-apr'))  then
wheat sow plants = 500, crop_class = plant, sowing_depth = 10, cultivar = claire, row_spacing = 150 !sets plant number at 500
endif
```
        manager Harvesting rule
          # Harvesting criteria
          crop = wheat  # Enter name of crop to harvest when ripe
          on end_of_day:
```
           if [crop].StageName = 'harvest_ripe' or [crop].plant_status = 'dead' then
              [crop]  harvest
              [crop]  end_crop
           endif
```
        manager Fertiliser rule
          on start_of_day:
```
if (today = date('01-May'))  or (today = date('01-sep')) then
fertiliser apply amount = 200 (kg/ha), depth = 50 (mm), type = urea_n ()
endif
```
        manager2 First defoliation
          DefoliationDateString = 01/6/2000  # Date of defoliation
          ResidualStem = 10  # Amount of stem remaining after defoliation (g/m2)
          ResidualLeaf = 10  # Amount of leaf remaining after defoliation (g/m2)
          Crop2Defoliate = wheat  # Name of crop to defoliate (must be a Plant1 crop)
```csharp
using System;
using ModelFramework;

public class Script
{
   [Param()] private string DefoliationDateString;
   [Param()] private double ResidualStem;
   [Param()] private double ResidualLeaf;
   [Param()] private string Crop2Defoliate;
   
   [Link()]
   public Paddock MyPaddock;
   [Input()] private DateTime Today;
   
   private double GreenLeaf = 0.0;
   private double GreenStem = 0.0;
   private double dlt_GreenLeaf = 0.0;
   private double dlt_GreenStem = 0.0;
   private double Grazed = 0.0;
   
   [Output()]
   private DateTime DefoliationDate;
   
   [EventHandler]
   public void OnInitialised()
   {
      DefoliationDate = DateTime.ParseExact(DefoliationDateString, "d/M/yyyy", null);
   }
      
   [EventHandler] public void OnPrepare()
   {
      if ((Today >= DefoliationDate) && (Grazed == 0))   
      {
         Grazed = 1;
         MyPaddock.Get(Crop2Defoliate + "." + "leafgreenwt", out GreenLeaf);
         MyPaddock.Get(Crop2Defoliate + "." + "stemgreenwt", out GreenStem);

         dlt_GreenLeaf = Math.Max(0, GreenLeaf - ResidualLeaf);
         dlt_GreenStem = Math.Max(0, GreenStem - ResidualStem);
 
         RemoveCropBiomassdmType GreenRemoveCropDmDm = new RemoveCropBiomassdmType();
         
         GreenRemoveCropDmDm.pool = "green";
         GreenRemoveCropDmDm.part = new string[]
            {"leaf","stem"};
         GreenRemoveCropDmDm.dlt = new double[] 
            {dlt_GreenLeaf, dlt_GreenStem};
         
         RemoveCropBiomassType MyRemoveCropDM = new RemoveCropBiomassType();
        
         MyRemoveCropDM.dm = new RemoveCropBiomassdmType[] { GreenRemoveCropDmDm };
         
         Component Crop = MyPaddock.LinkByName(Crop2Defoliate) as Component;
         Crop.Publish("remove_crop_biomass", MyRemoveCropDM);
         
         Console.WriteLine(Today.ToShortDateString() + " - " + "Plant1 Defoliation Rule Invoked");
         Console.WriteLine("          - " + Crop2Defoliate + " has been defoliated");
         Console.WriteLine("          - Removed " + dlt_GreenLeaf + " g/m2 of Leaf");
         Console.WriteLine("          - Removed " + dlt_GreenStem + " g/m2 of Stem");
         Console.WriteLine(" ");
      }
   }
}
```
        manager2 Second defoliation
          DefoliationDateString = 01/8/2000  # Date of defoliation
          ResidualStem = 10  # Amount of stem remaining after defoliation (g/m2)
          ResidualLeaf = 10  # Amount of leaf remaining after defoliation (g/m2)
          Crop2Defoliate = wheat  # Name of crop to defoliate (must be a Plant1 crop)
```csharp
using System;
using ModelFramework;

public class Script : Instance
   {
   [Param()] private string DefoliationDateString;
   [Param()] private double ResidualStem;
   [Param()] private double ResidualLeaf;
   [Param()] private string Crop2Defoliate;
   
   [Link()]
   public Paddock MyPaddock;
   [Input()] private DateTime Today;
   
   private double GreenLeaf = 0.0;
   private double GreenStem = 0.0;
   private double dlt_GreenLeaf = 0.0;
   private double dlt_GreenStem = 0.0;
   private double Grazed = 0.0;
   
   [Output()]
   private DateTime DefoliationDate;
   
   public override void Initialised()
   {
      DefoliationDate = DateTime.ParseExact(DefoliationDateString, "d/M/yyyy", null);
   }
      
   [EventHandler] public void OnPrepare()
   {
      if ((Today >= DefoliationDate) && (Grazed == 0))   
         {
            Grazed = 1;
            MyPaddock.Get(Crop2Defoliate + "." + "leafgreenwt", out GreenLeaf);
            MyPaddock.Get(Crop2Defoliate + "." + "stemgreenwt", out GreenStem);
         
            dlt_GreenLeaf = Math.Max(0, GreenLeaf - ResidualLeaf);
            dlt_GreenStem = Math.Max(0, GreenStem - ResidualStem);
 
            RemoveCropBiomassdmType GreenRemoveCropDmDm = new RemoveCropBiomassdmType();
         
            GreenRemoveCropDmDm.pool = "green";
            GreenRemoveCropDmDm.part = new string[]
               {"leaf","stem"};
            GreenRemoveCropDmDm.dlt = new double[] 
               {dlt_GreenLeaf, dlt_GreenStem};
         
            RemoveCropBiomassType MyRemoveCropDM = new RemoveCropBiomassType();
        
            MyRemoveCropDM.dm = new RemoveCropBiomassdmType[] { GreenRemoveCropDmDm };
         
            Component Crop = MyPaddock.LinkByName(Crop2Defoliate) as Component;
            Crop.Publish("remove_crop_biomass", MyRemoveCropDM);
        
         Console.WriteLine(Today.ToShortDateString() + " - " + "Plant1 Defoliation Rule Invoked");
         Console.WriteLine("          - " + Crop2Defoliate + " has been defoliated");
         Console.WriteLine("          - Removed " + dlt_GreenLeaf + " g/m2 of Leaf");
         Console.WriteLine("          - Removed " + dlt_GreenStem + " g/m2 of Stem");
         Console.WriteLine(" ");
         }
   }
}
```
      outputfile: filename=Defoliated Wheat.out; title=Defoliated Wheat
        variables
          variables: dd/mm/yyyy as Date, biomass, yield, LAI, leafgreenwt, stemgreenwt
        events Reporting Frequency: event=daily
      irrigation
        automatic_irrigation = on
        asw_depth = 600  # Depth to which ASW is calculated. (mm)
        crit_fr_asw = 0.5  # Fraction of ASW below which irrigation is applied (0-1.0)
        irrigation_efficiency = 1  # Efficiency of the irrigation. (0-1.0)
        irrigation_allocation = off  # Allocation limits
        allocation = 0  # Allocation in mm
        default_no3_conc = 0.0  # Nitrate concentration (ppm N)
        default_nh4_conc = 0.0  # Ammonium concentration (ppm N)
        default_cl_conc = 0.0  # Chloride concentration (ppm Cl)
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