folder simulations: version=32
  simulation Effluent-irrigated Eucalypt Forest
    metfile met: filename=%apsim%/Examples/MetFiles/Goond.met
    clock
      start_date = 1/01/1980  # Enter the start date of the simulation
      end_date = 31/12/1989  # Enter the end date of the simulation
    summaryfile
    area Block
      micromet
        soilalbedo = 0.23
        a_interception = 0
        b_interception = 0
        c_interception = 0.1
        d_interception = 0
      soil: LocalName=Uniform; Site=Hypothetical
        SoilType = Loam  # Soil description
        InitWater Initial water
          percentmethod: percent=0.5; distributed=filled from top
        Water
          Layer:
            Thickness (mm)  BD (g/cc)  AirDry (mm/mm)  LL15 (mm/mm)  DUL (mm/mm)  SAT (mm/mm)
            150             1.2        0.07            0.1           0.2          0.3
            150             1.2        0.07            0.1           0.2          0.3
            300             1.2        0.07            0.1           0.2          0.3
            300             1.2        0.07            0.1           0.2          0.3
            300             1.2        0.07            0.1           0.2          0.3
            300             1.2        0.07            0.1           0.2          0.3
            300             1.2        0.07            0.1           0.2          0.3
            300             1.2        0.07            0.1           0.2          0.3
            300             1.2        0.07            0.1           0.2          0.3
            300             1.2        0.07            0.1           0.2          0.3
            300             1.2        0.07            0.1           0.2          0.3
          SoilCrop egrandis
            Layer:
              Thickness (mm)  LL (mm/mm)  KL (/day)  XF (0-1)
              150             0.1         0.07       1
              150             0.1         0.07       1
              300             0.1         0.07       1
              300             0.1         0.06       1
              300             0.1         0.04       1
              300             0.1         0.03       1
              300             0.1         0.03       1
              300             0.1         0.03       1
              300             0.1         0.02       1
              300             0.1         0.02       1
              300             0.1         0.02       1
        SoilWat: SummerCona=3.5; SummerU=4; SummerDate=1-Nov; WinterCona=3.5; WinterU=4; WinterDate=1-Apr; DiffusConst=88; DiffusSlope=35.4; Salb=0.13; Cn2Bare=65; CnRed=20; CnCov=0.8
          Layer:
            Thickness (mm)  SWCON (0-1)
            150             0.3
            150             0.3
            300             0.3
            300             0.3
            300             0.3
            300             0.3
            300             0.3
            300             0.3
            300             0.3
            300             0.3
            300             0.3
        SoilOrganicMatter: RootCn=60; RootWt=1000; SoilCn=20; EnrACoeff=7.4; EnrBCoeff=0.2
          Layer:
            Thickness (mm)  OC (Total %)  FBiom (0-1)  FInert (0-1)
            150             1             0.02         0.6
            150             0.9           0.02         0.6
            300             0.9           0.02         0.8
            300             0.9           0.01         0.9
            300             0.8           0.01         0.95
            300             0.4           0.01         0.95
            300             0.3           0.01         0.95
            300             0.2           0.01         0.95
            300             0.2           0.01         0.95
            300             0.1           0.01         0.95
            300             0.1           0.01         0.95
        Analysis
          Layer:
            Thickness (mm)  EC (1:5 dS/m)  PH (1:5 water)
            150             0.2            6
            150             0.2            6
            300             0.3            6
            300             0.4            6
            300             0.6            6
            300             0.8            6
            300             0.9            6
            300             1              6
            300             1.1            6
            300             1              6
            300             1              6
        Sample Initial nitrogen
          Layer:
            Thickness (mm)  NO3 (ppm)  NH4 (ppm)
            150             1          0.100
            150             1          0.100
            300             1          0.100
            300             1          0.100
            300             1          0.100
            300             1          0.100
            300             1          0.100
            300             1          0.100
            300             1          0.100
            300             1          0.100
            300             1          0.100
      cl
        d0 = 108  # Cl diffusivity in water (mm2/d)
        layers = 10 20 30 50 100 100 100 100 80 50 10  # Cl in each layer (kg/ha)
      surfaceom LitterLayer
        PoolName = egrandis
        type = grandis
        mass = 1000
        cnr = 80
        standing_fraction = 0
      fertiliser
      irrigation
        automatic_irrigation = on
        asw_depth = 600  # Depth to which ASW is calculated. (mm)
        crit_fr_asw = 0.5  # Fraction of ASW below which irrigation is applied (0-1.0)
        irrigation_efficiency = 1  # Efficiency of the irrigation. (0-1.0)
        irrigation_allocation = off  # Allocation limits
        allocation = 0  # Allocation in ML
        default_no3_conc = 10  # Nitrate concentration (ppm N)
        default_nh4_conc = 10  # Ammonium concentration (ppm N)
        default_cl_conc = 300  # Chloride concentration (ppm Cl)
        default_no3_conc = 0  # Nitrate concentration (ppm N)
        default_nh4_conc = 0  # Ammonium concentration (ppm N)
        default_cl_conc = 0  # Chloride concentration (ppm Cl)
      egrandis
      folder Manager folder
        manager Planting rule
          # Sowing criteria
          date1 = 15-mar  # Enter planting date (dd-mmm)
          # Sowing parameters
          crop = egrandis  # Enter name of growth module to sow
          density = 1111  # Enter sowing density (plants/ha)
          on start_of_day:
```
         if (date('[date1]') = today) and [crop].plant_status = 'out' then
               [crop]  establish plants =[density], init_section = seedling
         endif
```
        manager Establishment fertiliser
          # When should fertiliser be applied
          modulename = egrandis  # For which module is fertiliser applied
          eventname = establishing  # On which event should fertiliser be applied
          # Fertiliser application details
          fertmodule = fertiliser  # Module used to apply the fertiliser
          fert_amount_sow = 150  # Amount of starter fertiliser at sowing (kg/ha)
          fert_type_sow = urea_N  # Sowing fertiliser type
          on [modulename].[eventname]:
```
        [fertmodule] apply amount = [fert_amount_sow] (kg/ha), depth = 50 (mm), type = [fert_type_sow]
```
      outputfile: filename=Effluent-irrigated Eucalypt Forest Block.out; title=Effluent-irrigated Eucalypt Forest Block
        variables
          variable:
            dd/mm/yyyy as Date  # Date (dd/mm/yyyy)
            esw  # Extractable Soil Water (mm)
            lai  # E. grandis leaf area index
            adm_green  # E. grandis Live Above-ground Biomass Pools
            fw  # E. grandis water stress factor
            fn  # E. grandis N stress factor
            plants  # E. grandis Plant Population
            no3()
            nh4()
            cl()
            drain
            flow_no3(11) as no3_leached
            irrigation
            irrigation_no3
        events Reporting Frequency: event=daily  # End of daily simulation time step
