folder simulations: version=32
  simulation Maize Legume and Weeds Rotation
    metfile met: filename=%apsim%/Examples/MetFiles/Goond.met
    clock
      start_date = 1/05/1980  # Enter the start date of the simulation
      end_date = 1/05/1985  # Enter the end date of the simulation
    summaryfile
    area paddock
      soil: WaterFormat=VolumetricPercent
        InitWater Initial water
          PercentMethod: Percent=0.00; Distributed=Filled from top
        Water
          Layer:
            Thickness (mm)  BD (g/cc)  AirDry (mm/mm)  LL15 (mm/mm)  DUL (mm/mm)  SAT (mm/mm)
            100             1.35       0.04            0.11          0.22         0.3
            100             1.35       0.14            0.14          0.25         0.3
            100             1.35       0.15            0.16          0.27         0.32
            200             1.4        0.16            0.17          0.28         0.33
            200             1.4        0.18            0.19          0.3          0.34
            200             1.4        0.18            0.2           0.3          0.35
            200             1.4        0.18            0.2           0.31         0.36
            200             1.4        0.18            0.2           0.32         0.37
            200             1.4        0.18            0.2           0.31         0.37
            200             1.4        0.18            0.2           0.31         0.37
          SoilCrop sorg
            Layer:
              Thickness (mm)  LL (mm/mm)  KL (/day)  XF (0-1)
              100             0.11        0.07       1
              100             0.14        0.07       1
              100             0.16        0.07       1
              200             0.17        0.07       1
              200             0.19        0.07       1
              200             0.2         0.07       1
              200             0.2         0.04       1
              200             0.2         0.04       1
              200             0.2         0.04       1
              200             0.2         0.04       1
          SoilCrop cowpea
            Layer:
              Thickness (mm)  LL (mm/mm)  KL (/day)  XF (0-1)
              100             0.11        0.08       1
              100             0.14        0.08       1
              100             0.16        0.08       1
              200             0.17        0.08       1
              200             0.19        0.06       1
              200             0.2         0.04       1
              200             0.2         0.03       1
              200             0.2         0.02       1
              200             0.2         0.01       1
              200             0.2         0.01       1
          SoilCrop maize: same as Maize Legume and Weeds Rotation.paddock.Soil.Water.cowpea
          SoilCrop mucuna: same as Maize Legume and Weeds Rotation.paddock.Soil.Water.cowpea
          SoilCrop peanut: same as Maize Legume and Weeds Rotation.paddock.Soil.Water.cowpea
          SoilCrop pigeonp: same as Maize Legume and Weeds Rotation.paddock.Soil.Water.cowpea
          SoilCrop soybean: same as Maize Legume and Weeds Rotation.paddock.Soil.Water.cowpea
          SoilCrop weed
            Layer:
              Thickness (mm)  LL (mm/mm)  KL (/day)  XF (0-1)
              100             0.11        0.07       1.00
              100             0.14        0.07       1.00
              100             0.16        0.07       1.00
              200             0.17        0.07       1.00
              200             0.19        0.07       1.00
              200             0.20        0.07       1.00
              200             0.20        0.04       1.00
              200             0.20        0.04       1.00
              200             0.20        0.04       1.00
              200             0.20        0.04       1.00
        SoilWat: SummerCona=2.5; SummerU=9; SummerDate=1-Nov; WinterCona=2.5; WinterU=9; WinterDate=1-Apr; DiffusConst=88; DiffusSlope=35.4; Salb=0.13; CN2Bare=75; CNRed=20; CNCov=0.8
          Layer:
            Thickness (mm)  SWCON (0-1)
            100             0.5
            100             0.5
            100             0.5
            200             0.5
            200             0.5
            200             0.5
            200             0.5
            200             0.5
            200             0.5
            200             0.5
        SoilOrganicMatter: RootCN=45; RootWT=1000; SoilCN=14.5; EnrACoeff=7.4; EnrBCoeff=0.2
          Layer:
            Thickness (mm)  OC (Total %)  FBiom (0-1)  FInert (0-1)
            100             1.2           0.02         0.6
            100             1             0.01         0.65
            100             0.86          0.01         0.7
            200             0.83          0.01         0.75
            200             0.58          0.01         0.8
            200             0.54          0.01         0.85
            200             0.47          0.01         0.93
            200             0.5           0.01         0.93
            200             0.5           0.01         0.93
            200             0.5           0.01         0.93
        Analysis
          Layer:
            Thickness (mm)  PH (1:5 water)
            100             6
            100             6
            100             6
            200             6.2
            200             6.5
            200             6.7
            200             6.8
            200             6.8
            200             6.8
            200             6.8
        Sample Initial nitrogen
          Layer:
            Thickness (mm)  NO3 (ppm)  NH4 (ppm)
            100             0.237      0.194
            100             0.712      0.484
            100             0.712      0.290
            200             0.554      0.290
            200             0.395      0.290
            200             0.395      0.290
            200             0.237      0.290
            200             0.237      0.290
            200             0.158      0.290
            200             0.079      0.290
      surfaceom SurfaceOrganicMatter
        PoolName = wheat  # Organic Matter pool name
        type = wheat  # Organic Matter type
        mass = 0  # Initial surface residue (kg/ha)
        cnr = 80  # C:N ratio of initial residue
        standing_fraction = 0  # Fraction of residue standing
      fertiliser
      maize
      weed
      peanut
      canopy
        intercrop = maize peanut weed  # Enter crop names to intercrop
      folder Manager folder
        manager Rotations with Intercrop
          # Fallow properties
          summerf_name = sf  # summer fallow name
          summerf_d2 = 15-mar  # summer fallow END (dd-mmm)
          winterf_name = wf  # winter fallow name
          winterf_d2 = 23-aug  # winter fallow END (dd-mmm)
          # Crop and fallow rotation sequence - finish with nil
          crop01 = maize  # 1
          crop02 = wf  # 2
          crop03 = peanut  # 3
          crop04 = wf  # 4
          crop05 = nil  # 5
          crop06 = wf  # 6
          crop07 = sf  # 7
          crop08 = wf  # 8
          crop09 = sf  # 9
          crop10 = wf  # 10
          crop11 = sf  # 11
          crop12 = wf  # 12
          crop13 = sf  # 13
          crop14 = wf  # 14
          crop15 = sf  # 15
          crop16 = wf  # 16
          crop17 = sf  # 17
          crop18 = wf  # 18
          crop19 = sf  # 19
          crop20 = wf  # 20
          on init:
```
         next = 1
         crop_in = 0
         blank = 'fallow'
         next_crop = blank
         crop_current = blank
         crop_current1 = blank
         crop_current2 = blank
         crop_sow = blank
         ready_for_next = 1
         ready_to_fert_pre_sow = 0
         days_last_year = 365
         fert_day_pre_sow = 0
         ready_to_till_pre_sow = 0
         till_day_pre_sow = 0
         days_after_weed_kill = 0
```
          on start_of_day:
```
         if (ready_for_next = 1) then
            if      (next = 1) THEN
               next_crop = '[crop01]'
               next = 2
            elseif      (next = 2) THEN
               next_crop = '[crop02]'
               next = 3
            elseif (next = 3) THEN
               next_crop = '[crop03]'
               next = 4
            elseif (next = 4) THEN
               next_crop = '[crop04]'
               next = 5
            elseif (next = 5) THEN
               next_crop = '[crop05]'
               next = 6
            elseif (next = 6) THEN
               next_crop = '[crop06]'
               next = 7
            elseif (next = 7) THEN
               next_crop = '[crop07]'
               next = 8
            elseif (next = 8) THEN
               next_crop = '[crop08]'
               next = 9
            elseif (next = 9) THEN
                  next_crop = '[crop09]'
                  next = 10
            elseif (next = 10) THEN
                  next_crop = '[crop10]'
                  next = 11
            elseif (next = 11) THEN
                  next_crop = '[crop11]'
                  next = 12
            elseif (next = 12) THEN
                  next_crop = '[crop12]'
                  next = 13
            elseif (next = 13) THEN
                  next_crop = '[crop13]'
                  next = 14
            elseif (next = 14) THEN
                  next_crop = '[crop14]'
                  next = 15
            elseif (next = 15) THEN
                  next_crop = '[crop15]'
                  next = 16
            elseif (next = 16) THEN
                  next_crop = '[crop16]'
                  next = 17
            elseif (next = 17) THEN
                  next_crop = '[crop17]'
                  next = 18
            elseif (next = 18) THEN
                  next_crop = '[crop18]'
                  next = 19
            elseif (next = 19) THEN
                  next_crop = '[crop19]'
                  next = 20
            elseif (next = 20) THEN
                  next_crop = '[crop20]'
                  next = 1
            endif
            if (next_crop = 'nil' OR next_crop = blank) THEN
               next_crop = '[crop01]'
               next = 2
            endif
            ready_for_next = 0
         endif

            ! treat fallow as a crop - its window starts when the other fallow finishes
            ! assume initiation (sowing) of fallow takes place when previous fallow finishes
            ! or when previous crop is harvested, whichever is the latest.
            ! Assume fallow finishes (harvested) at end of fallow date.

         if (next_crop = '[winterf_name]') then
               ! initiate (sow)
            if ((crop_in = 0)
              OR (crop_in = 1 AND (crop_current = 'weed' OR crop_current1 = 'weed' OR crop_current2 = 'weed'))) then
               if (date_within('[summerf_d2], [winterf_d2]') then
                  crop_in = crop_in + 1
                  ready_for_next = 1
                  crop_current2 = crop_current1
                  crop_current1 = crop_current
                  crop_current = '[winterf_name]'
                  crop_sow = '[winterf_name]'
                  ready_to_fert_pre_sow = 0
               endif
            endif

         elseif (next_crop = '[summerf_name]') then
              ! initiate (sow)
            if ((crop_in = 0)
              OR (crop_in = 1 AND (crop_current = 'weed' OR crop_current1 = 'weed' OR crop_current2 = 'weed'))) then
               if (date_within('[winterf_d2], [summerf_d2]') then
                  crop_in = crop_in + 1
                  ready_for_next = 1
                  crop_current2 = crop_current1
                  crop_current1 = crop_current
                  crop_current = '[summerf_name]'
                  crop_sow = '[summerf_name]'
                  ready_to_fert_pre_sow = 0
               endif
            endif
         endif

         if (crop_current = '[winterf_name]'
          OR crop_current1 = '[winterf_name]'
          OR crop_current2 = '[winterf_name]') then
               ! terminate (harvest)
            if (today = date('[winterf_d2]')+1) then
               crop_in = crop_in - 1
               crop_current = crop_current1
               crop_current1 = crop_current2
               crop_current2 = blank
            endif
         elseif (crop_current = '[summerf_name]'
              OR crop_current1 = '[summerf_name]'
              OR crop_current2 = '[summerf_name]') then
               ! terminate (harvest)
            if (today = date('[summerf_d2]')+1) then
               crop_in = crop_in - 1
               crop_current = crop_current1
               crop_current1 = crop_current2
               crop_current2 = blank
            endif
         endif
```
        manager Sow using a variable rule with intercropping
          # Crop properties
          crop = maize  # Name of this crop
          cultivar1 = sc401  # Enter cultivar
          cropmethod = intercrop  # Method of cropping
          rotation_exclude = no  # Exclude from rotation sequence
          # Sowing criteria
          date1 = 1-nov  # Enter sowing window START date (dd-mmm)
          date2 = 30-dec  # Enter sowing window END date (dd-mmm)
          must_sow = no
          rain_amount = 20  # Enter amount of cumulative rainfall (mm)
          rain_days = 5  # Enter number of days to accumulate rainfall (days)
          esw_amount = 30  # Enter amount of soil water (mm)
          sow_opp = 1  # Enter sowing opportunity number to sow on (1..n)
          surface_up = 2  # Enter upper limit of sw in top layer (0-2) (mm esw/mm soil)
          surface_low = 0  # Enter lower limit of sw in top layer (0-1) (mm esw/mm soil)
          # Sowing specs
          density = 2.2  # Enter sowing density (plants/m2)
          depth = 100  # Enter sowing depth (mm)
          row_spacing = 0.9  # Enter row spacing (mm) (m for maize and sorghum)
          # Sorghum specs
          ftn = 1  # Enter Fertile Tiller No.
          skiprow = solid
          # Starter fertiliser application
          fert_amount_sow = 0  # Amount of starter fertiliser at sowing (kg/ha)
          fert_type_sow = urea_N  # Type
          # TopDress fertiliser application
          fert_days_TopDress = 35  # Enter number of days after sowing to apply top-dress fertiliser (days)
          fert_amount_TopDress = 27  # Amount of TopDress fertiliser (kg/ha)
          fert_type_TopDress = NH4NO3  # Type
          # Pre-sowing manure application
          surfaceommodule_pre_sow = SurfaceOrganicMatter  # Module used to apply the manure
          manure_days_pre_sow = 30  # Enter number of days before window to apply pre-crop manure (days)
          manure_amount_pre_sow = 0  # Amount of manure to apply (kg/ha)
          manure_type_pre_sow = manure  # manure type
          manure_cnr_pre_sow = 25  # manure CNR
          manure_cpr_pre_sow = 50  # manure CPR
          # Pre-sowing fertiliser application
          fert_days_pre_sow = 30  # Enter number of days before window to apply pre-crop fertiliser (days)
          fert_amount_pre_sow = 0  # Amount of pre-crop fertiliser (kg/ha)
          fert_criteria_pre_sow = 1000  # Don't add fertiliser if pre-crop N in top 2 layers exceeds (kg/ha)
          totn_pre_sow = 0  # OR Amount of pre-crop N required in top 3 layers (kg/ha)
          fert_type_pre_sow = urea_N  # Type (NO3_N, NH4_N, NH4NO3, urea_N, urea_no3, urea)
          # Tillage components
          surfaceommodule = SurfaceOrganicMatter  # Name of your surface organic matter module
          soilmodule = Soil  # Name of your soil module
          # Planter Tillage
          planter_type = user_defined
          planter_depth = 150  # User_defined depth of seedbed preparation (mm)
          thin_fraction = 1  # Enter fraction of weed population killed (0-1)
          planter_f_incorp = 1  # User_defined fraction of surface residues to incorporate (0-1)
          planter_cn_red = 0  # cn reduction after tillage ()
          planter_cn_rain = 0  # amount of cummulative rain to dissipate tillage effects on cn ()
          # Seed-bed Tillage Preparation
          till_days_pre_sow = 0  # Enter number of days before window to prepare seed-bed (days)
          must_till = no  # Must Till (yes/no)
          tillage_type = disc  # Tillage type (user_defined, chisel, disc, planter)
          tillage_depth = 100  # User_defined depth of seedbed preparation (mm)
          tillage_f_incorp = 1  # User_defined fraction of surface residues to incorporate (0-1)
          fraction = 0  # Enter biomass removal fraction of growing weeds from field (0-1)
          tillage_cn_red = 0  # cn reduction after tillage ()
          tillage_cn_rain = 0  # amount of cummulative rain to dissipate tillage effects on cn ()
          on init:
```
         next = 1
         crop_in = 0
         blank = 'fallow'
         next_crop = blank
         crop_current = blank
         crop_current1 = blank
         crop_current2 = blank
         crop_sow = blank
         ready_for_next = 1
         ready_to_manure_pre_sow = 0
         days_last_year = 365
         manure_day_pre_sow = 0
         ready_to_till_pre_sow = 0
         till_day_pre_sow = 0
         days_after_weed_kill = 0
```
          on end_of_day:
```
         if (date_within('[date1], [date2]') = 1) THEN
         else
            wht_sow_opp_num = 0
            wht_sow_opp_days = 0
         endif
```
          on process:
```
              days_this_year = 364 + (date('1-mar') - date('28-feb'))
         if (next_crop = '[crop]' OR next_crop = blank OR '[rotation_exclude]' = 'yes') then
               !  Presowing  manure application

            if ([manure_amount_pre_sow] > 0) then
               !  calculate day to fertilise
               manure_day_pre_sow = date('[date1]') - [manure_days_pre_sow]
               ! Need to correct for possible year boundary condition
               if (manure_day_pre_sow < today) then
                  manure_day_pre_sow = days_this_year + manure_day_pre_sow
               endif
               if (today = manure_day_pre_sow) then
                  ready_to_manure_pre_sow = 1
               endif
               if (crop_in = 0 and ready_to_manure_pre_sow = 1) then
                        ! just put on a fixed amount of manure
                  '[surfaceommodule_pre_sow]' add_surfaceom type=[manure_type_pre_sow], name=[manure_type_pre_sow], mass=[manure_amount_pre_sow], cnr=[manure_cnr_pre_sow], cpr=[manure_cpr_pre_sow]
                  ready_to_manure_pre_sow = 0
                  manure_day_pre_sow = 0
               endif
            endif

               !  Presowing  fertiliser application

            if ([fert_amount_pre_sow] > 0 OR [totn_pre_sow] > 0 ) then
               !  calculate day to fertilise
               fert_day_pre_sow = date('[date1]') - [fert_days_pre_sow]
               ! Need to correct for possible year boundary condition
               if (fert_day_pre_sow < today) then
                  fert_day_pre_sow = days_this_year + fert_day_pre_sow
               endif
               if (today = fert_day_pre_sow) then
                  ready_to_fert_pre_sow = 1
               endif
               if (crop_in = 0 and ready_to_fert_pre_sow = 1) then
                  if ([totn_pre_sow] > 0) then
                     !   Top up soil N of top 3 layers
                     N_deficit = [totn_pre_sow] - (no3(1) + nh4(1) + no3(2) + nh4(2) + no3(3) + nh4(3))
                     if (N_deficit < 0) then
                        ! do nothing
                        N_deficit = 0
                     else
                        fertiliser apply amount = N_deficit (kg/ha), depth = 50 (mm), type = [fert_type_pre_sow] ()
                     endif
                  else
                     N_topsoil = no3(1) + nh4(1) + no3(2) + nh4(2)
                     if (N_topsoil > [fert_criteria_pre_sow]) then
                        ! enough N already in topsoil
                     else
                        ! just put on a fixed amount of N
                        fertiliser apply amount = [fert_amount_pre_sow] (kg/ha), depth = 50 (mm), type = [fert_type_pre_sow] ()
                     endif
                  endif
                  ready_to_fert_pre_sow = 0
                  fert_day_pre_sow = 0
               endif
            endif

            !   Tillage - presowing seedbed preparation
            if ( [till_days_pre_sow] > 0) then
               ! calculate presowing tillage date
               till_day_pre_sow = date('[date1]') - [till_days_pre_sow]
               ! Need to correct for possible year boundary condition
               if (till_day_pre_sow < today) then
                  till_day_pre_sow = days_this_year + till_day_pre_sow
               endif
               if (today = till_day_pre_sow) then
                  ready_to_till_pre_sow = 1
               endif
               if ((crop_in = 0 OR '[must_till]' = 'yes') AND (ready_to_till_pre_sow = 1)) then
                  ! tillage
                if (crop_current = 'weed' or crop_current1 = 'weed' or crop_current2 = 'weed') then
                  if (weed.plant_status <> 'out') then
                        weed harvest, remove=[fraction]
                        weed kill_crop
                        weed end_crop
                        days_after_weed_kill = 0
                       crop_in = crop_in - 1
                       if (crop_current = 'weed') then
                           crop_current = crop_current1
                           crop_current1 = crop_current2
                           crop_current2 = blank
                        elseif (crop_current1 = 'weed') then
                           crop_current1 = crop_current2
                           crop_current2 = blank
                        elseif (crop_current2 = 'weed') then
                           crop_current2 = blank
                        endif
                  endif
                 endif
                  if ('[tillage_type]' = 'user_defined') then
                      '[surfaceommodule]' tillage type = [tillage_type], f_incorp = [tillage_f_incorp] (), tillage_depth = [tillage_depth]
                      '[soilmodule] Water' tillage type = [tillage_type], cn_red = [tillage_cn_red], cn_rain = [tillage_cn_rain]
                  else
                      '[surfaceommodule]' tillage type = [tillage_type] ()
                      '[soilmodule] Water' tillage type = [planter_type]
                  endif
                  ready_to_till_pre_sow = 0
                  till_day_pre_sow = 0
               endif
            endif

            if (today = date('[date2]')) then
               if ('[rotation_exclude]' = 'no') then
                  ready_for_next = 1
               endif
            endif

            if (wht_sow_opp_num > 0) then
               wht_sow_opp_days = wht_sow_opp_days + 1
            else
            endif

         if (crop_in = 0 OR ('[cropmethod]' = 'intercrop'
             AND [crop].plant_status = 'out')) then
               if (date_within('[date1], [date2]') = 1) then
                  crop_sow = 'waiting'
                  surface_moist = (sw(1) - ll15(1)) / (dul(1)- ll15(1))
                  if ((rain[[rain_days]] >= [rain_amount]  AND  esw >= [esw_amount] AND
                        (surface_moist <= [surface_up] and surface_moist >= [surface_low])) OR
                      ('[must_sow]' = 'yes' AND today = date('[date2]'))) THEN


                     if (wht_sow_opp_days >= [rain_days] OR wht_sow_opp_num = 0) then
                        wht_sow_opp_num = wht_sow_opp_num + 1
                        wht_sow_opp_days = 0
                     endif

                     if ((wht_sow_opp_num >= [sow_opp]) OR ('[must_sow]' = 'yes' AND today = date('[date2]')) then
                        if ('[crop]' = 'sorghum') then
                           [crop] sow Population =[density], sowing_depth = [depth], cultivar = [cultivar1], row_spacing = [row_spacing], tiller_no_fertile = [ftn] (), skip = [skiprow]
                        else
                          [crop] sow cultivar = [cultivar1], plants = [density] (plants/m2), sowing_depth = [depth], row_spacing = [row_spacing]
                        endif
                        crop_in = crop_in + 1
                        if ('[rotation_exclude]' = 'no') then
                           ready_for_next = 1
                        endif
                        crop_current2 = crop_current1
                        crop_current1 = crop_current
                        crop_current = '[crop]'
                        crop_sow = '[crop]'
                        ready_to_manure_pre_sow = 0
                        if ([fert_amount_sow] > 0) then
                           fertiliser apply amount = [fert_amount_sow] (kg/ha), depth = 50 (mm), type = [fert_type_sow] ()
                        endif
                        !   Planter -
                        ! Planting
                        if (crop_current = 'weed' or crop_current1 = 'weed' or crop_current2 = 'weed') then
                           if (weed.plant_status <> 'out' AND [thin_fraction] > 0) then
                              weed kill_crop plants_kill_fraction = [thin_fraction]
                              if ([thin_fraction] = 1.0) then
                                 weed end_crop
                                 days_after_weed_kill = 0
                              else
                              endif
                              if ([thin_fraction] = 1.0) then
                                    crop_in = crop_in - 1
                                   if (crop_current = 'weed') then
                                       crop_current = crop_current1
                                       crop_current1 = crop_current2
                                       crop_current2 = blank
                                    elseif (crop_current1 = 'weed') then
                                       crop_current1 = crop_current2
                                       crop_current2 = blank
                                    elseif (crop_current2 = 'weed') then
                                       crop_current2 = blank
                                    endif
                              endif
                           endif
                        endif
                        if ('[planter_type]' = 'user_defined') then
                            '[surfaceommodule]' tillage type = [planter_type], f_incorp = [planter_f_incorp] (), tillage_depth = [planter_depth]
                            '[soilmodule] Water' tillage type = [planter_type], cn_red = [planter_cn_red], cn_rain = [planter_cn_rain]
                        else
                            '[surfaceommodule]' tillage type = [planter_type] ()
                            '[soilmodule] Water' tillage type = [planter_type]
                        endif


                     else
                        !not this opportunity
                     endif
                  endif
               endif
            endif
         endif
         ! apply topdress fertiliser
         if ([fert_amount_TopDress] > 0.0) then
            if ([crop].DaysAfterSowing = [fert_days_TopDress]) then
               fertiliser apply amount = [fert_amount_TopDress] (kg/ha), depth = 50 (mm), type = [fert_type_TopDress] ()
            else
            endif
         else
         endif
```
        manager Sow using a variable rule with intercropping{2}
          # Crop properties
          crop = peanut  # Name of this crop
          cultivar1 = early_bunch  # Enter cultivar
          cropmethod = intercrop  # Method of cropping
          rotation_exclude = no  # Exclude from rotation sequence
          # Sowing criteria
          date1 = 1-nov  # Enter sowing window START date (dd-mmm)
          date2 = 30-dec  # Enter sowing window END date (dd-mmm)
          must_sow = no
          rain_amount = 30  # Enter amount of cumulative rainfall (mm)
          rain_days = 5  # Enter number of days to accumulate rainfall (days)
          esw_amount = 30  # Enter amount of soil water (mm)
          sow_opp = 1  # Enter sowing opportunity number to sow on (1..n)
          surface_up = 2  # Enter upper limit of sw in top layer (0-2) (mm esw/mm soil)
          surface_low = 0  # Enter lower limit of sw in top layer (0-1) (mm esw/mm soil)
          # Sowing specs
          density = 11.1  # Enter sowing density (plants/m2)
          depth = 100  # Enter sowing depth (mm)
          row_spacing = 450  # Enter row spacing (mm) (m for maize and sorghum)
          # Sorghum specs
          ftn = 1  # Enter Fertile Tiller No.
          skiprow = solid
          # Starter fertiliser application
          fert_amount_sow = 0  # Amount of starter fertiliser at sowing (kg/ha)
          fert_type_sow = urea_N  # Type
          # TopDress fertiliser application
          fert_days_TopDress = 35  # Enter number of days after sowing to apply top-dress fertiliser (days)
          fert_amount_TopDress = 0  # Amount of TopDress fertiliser (kg/ha)
          fert_type_TopDress = NH4NO3  # Type
          # Pre-sowing manure application
          surfaceommodule_pre_sow = SurfaceOrganicMatter  # Module used to apply the manure
          manure_days_pre_sow = 30  # Enter number of days before window to apply pre-crop manure (days)
          manure_amount_pre_sow = 0  # Amount of manure to apply (kg/ha)
          manure_type_pre_sow = manure  # manure type
          manure_cnr_pre_sow = 25  # manure CNR
          manure_cpr_pre_sow = 50  # manure CPR
          # Pre-sowing fertiliser application
          fert_days_pre_sow = 30  # Enter number of days before window to apply pre-crop fertiliser (days)
          fert_amount_pre_sow = 0  # Amount of pre-crop fertiliser (kg/ha)
          fert_criteria_pre_sow = 1000  # Don't add fertiliser if pre-crop N in top 2 layers exceeds (kg/ha)
          totn_pre_sow = 0  # OR Amount of pre-crop N required in top 3 layers (kg/ha)
          fert_type_pre_sow = urea_N  # Type (NO3_N, NH4_N, NH4NO3, urea_N, urea_no3, urea)
          # Tillage components
          surfaceommodule = SurfaceOrganicMatter  # Name of your surface organic matter module
          soilmodule = Soil  # Name of your soil module
          # Planter Tillage
          planter_type = user_defined
          planter_depth = 150  # User_defined depth of seedbed preparation (mm)
          thin_fraction = 1  # Enter fraction of weed population killed (0-1)
          planter_f_incorp = 1  # User_defined fraction of surface residues to incorporate (0-1)
          planter_cn_red = 0  # cn reduction after tillage ()
          planter_cn_rain = 0  # amount of cummulative rain to dissipate tillage effects on cn ()
          # Seed-bed Tillage Preparation
          till_days_pre_sow = 0  # Enter number of days before window to prepare seed-bed (days)
          must_till = no  # Must Till (yes/no)
          tillage_type = disc  # Tillage type (user_defined, chisel, disc, planter)
          tillage_depth = 100  # User_defined depth of seedbed preparation (mm)
          tillage_f_incorp = 1  # User_defined fraction of surface residues to incorporate (0-1)
          fraction = 0  # Enter biomass removal fraction of growing weeds from field (0-1)
          tillage_cn_red = 0  # cn reduction after tillage ()
          tillage_cn_rain = 0  # amount of cummulative rain to dissipate tillage effects on cn ()
          on init:
          script: same as in Maize Legume and Weeds Rotation.paddock.Manager folder.Sow using a variable rule with intercropping
          on end_of_day:
          script: same as in Maize Legume and Weeds Rotation.paddock.Manager folder.Sow using a variable rule with intercropping
          on process:
          script: same as in Maize Legume and Weeds Rotation.paddock.Manager folder.Sow using a variable rule with intercropping
        manager Sow WEEDS using a variable rule with intercropping
          # Crop properties
          crop = weed  # Name of this crop
          cultivar1 = early  # Enter first type
          cla = summer_grass  # Enter class type
          date_ch1 = 1-jul  # Enter type change date (dd-mmm)
          cultivar2 = late  # Enter second type
          cropmethod = intercrop  # Method of cropping
          rotation_exclude = yes  # Exclude from rotation sequence
          # Sowing criteria
          date1 = 01-oct  # Enter sowing window START date (dd-mmm)
          date2 = 30-apr  # Enter sowing window END date (dd-mmm)
          must_sow = no
          rain_amount = 10  # Enter amount of rainfall (mm)
          rain_days = 5  # Enter number of days of rainfall (days)
          esw_amount = 5  # Enter amount of soil water (mm)
          sow_opp = 1  # Enter sowing opportunity number to sow on (1..n)
          surface_up = 2  # Enter upper limit of sw in top layer (0-2) (mm esw/mm soil)
          surface_low = 0  # Enter lower limit of sw in top layer (0-1) (mm esw/mm soil)
          # Sowing specs
          density = 5  # Enter sowing density (plants/m2)
          depth = 15  # Enter sowing depth (mm)
          row_spacing = 350  # Enter row spacing (mm)
          # Seed-bed Tillage Preparation
          till_days_pre_sow = 0  # Enter number of days before window to prepare seed-bed (days)
          must_till = no
          tillage_type = disc
          tillage_depth = 100  # User_defined depth of seedbed preparation (mm)
          tillage_f_incorp = 1  # User_defined fraction of surface residues to incorporate (0-1)
          fraction = 0  # Enter biomass removal fraction of growing weeds from field (0-1)
          on init:
          script: same as in Maize Legume and Weeds Rotation.paddock.Manager folder.Rotations with Intercrop
          on process:
```
               if (next_crop = '[crop]' OR next_crop = blank OR '[rotation_exclude]' = 'yes') then


                  if (today = date('[date2]')) then
                     if ('[rotation_exclude]' = 'no') then
                        ready_for_next = 1
                     endif
                  endif

                  if (wd_sow_opp_num > 0) then
                     wd_sow_opp_days = wd_sow_opp_days + 1
                  else
                  endif

                  if (crop_in = 0 OR ('[cropmethod]' = 'intercrop'
                      AND weed.plant_status = 'out')
                      AND days_after_weed_kill > 0) then
                        if (date_within('[date1], [date2]') = 1) then
                           crop_sow = 'waiting'
                           surface_moist = (sw(1) - ll15(1)) / (dul(1)- ll15(1))
                           if ((rain[[rain_days]] >= [rain_amount]  AND  esw >= [esw_amount] AND
                                 (surface_moist <= [surface_up] and surface_moist >= [surface_low])) OR
                               ('[must_sow]' = 'yes' AND today = date('[date2]'))) THEN


                              if (wd_sow_opp_days >= [rain_days] OR wd_sow_opp_num = 0) then
                                 wd_sow_opp_num = wd_sow_opp_num + 1
                                 wd_sow_opp_days = 0
                              endif

                              if ((wd_sow_opp_num >= [sow_opp]) OR ('[must_sow]' = 'yes' AND today = date('[date2]')) then
                                 if (date_within('[date1], [date_ch1]') = 1) then
                                    weed sow crop_class = [cla], plants = [density] (plants/m2), sowing_depth = [depth], cultivar = [cultivar1], row_spacing = [row_spacing]
                                 else
                                    weed sow crop_class = [cla], plants = [density] (plants/m2), sowing_depth = [depth], cultivar = [cultivar2], row_spacing = [row_spacing]
                                 endif
                                 crop_in = crop_in + 1
                                 if ('[rotation_exclude]' = 'no') then
                                    ready_for_next = 1
                                 endif
                                 crop_current2 = crop_current1
                                 crop_current1 = crop_current
                                 crop_current = '[crop]'
                                 crop_sow = '[crop]'
                              else
                                 !not this opportunity
                              endif
                        endif
                     endif
                  endif
               endif
```
          on end_of_day:
```
              days_this_year = 364 + (date('1-mar') - date('28-feb'))
               days_after_weed_kill = days_after_weed_kill + 1

               if (next_crop = '[crop]' OR next_crop = blank OR '[rotation_exclude]' = 'yes') then
                  !   Tillage - presowing seedbed preparation
                  if ( [till_days_pre_sow] > 0) then
                     ! calculate presowing tillage date
                     till_day_pre_sow = date('[date1]') - [till_days_pre_sow]
                     ! Need to correct for possible year boundary condition
                     if (till_day_pre_sow < today) then
                        till_day_pre_sow = days_this_year + till_day_pre_sow
                     endif
                     if (today = till_day_pre_sow) then
                        ready_to_till_pre_sow = 1
                     endif
                     if ((crop_in = 0 OR '[must_till]' = 'yes') AND (ready_to_till_pre_sow = 1)) then
                        ! tillage
                        if (weed.plant_status <> 'out') then
                           weed harvest, remove=[fraction]
                           weed kill_crop
                           weed end_crop
                           crop_in = crop_in - 1
                          if (crop_current = 'weed') then
                              crop_current = crop_current1
                              crop_current1 = crop_current2
                              crop_current2 = blank
                           elseif (crop_current1 = 'weed') then
                              crop_current1 = crop_current2
                              crop_current2 = blank
                           elseif (crop_current2 = 'weed') then
                              crop_current2 = blank
                           endif
                        endif
                     endif
                  endif
               endif


               if (date_within('[date1], [date2]') = 1) THEN
               else
                  wd_sow_opp_num = 0
                  wd_sow_opp_days = 0
               endif
```
        manager Output at harvesting for intercropping
          # Output criteria
          crop = maize  # Enter name of crop to output at harvest
          outputfile = outputfile  # Name of outputfile component
          on end_of_day:
```
         if ([crop]_to_harvest = 1) then
            '[outputfile]' do_output
         endif
```
        manager Output at harvesting for intercropping{2}
          # Output criteria
          crop = peanut  # Enter name of crop to output at harvest
          outputfile = outputfile  # Name of outputfile component
          on end_of_day:
```
         if ([crop]_to_harvest = 1) then
            '[outputfile]' do_output
         endif
```
        manager Harvesting rule for intercropping
          # Harvesting criteria
          crop = maize  # Enter name of crop to harvest when ripe
          fraction_to_remove = 0.95  # Enter fraction of stover to remove (not for maize)
          on init:
```
          [crop]_to_harvest = 0
```
          on end_of_day:
```
         if ([crop]_to_harvest = 1) then
            [crop] harvest, remove=[fraction_to_remove]
            [crop] kill_crop
            [crop] end_crop
                  crop_in = crop_in - 1
            [crop]_to_harvest = 0
            fert_tot = 0
            sow_year = 0
            if (crop_current = '[crop]') then
               crop_current = crop_current1
               crop_current1 = crop_current2
               crop_current2 = blank
            elseif (crop_current1 = '[crop]') then
               crop_current1 = crop_current2
               crop_current2 = blank
            elseif (crop_current2 = '[crop]') then
               crop_current2 = blank
            endif
         endif

         if ([crop].StageName = 'harvest_ripe' OR [crop].plant_status = 'dead') then
            [crop]_to_harvest = 1
         endif
```
        manager Harvesting rule for intercropping{2}
          # Harvesting criteria
          crop = peanut  # Enter name of crop to harvest when ripe
          fraction_to_remove = 0.95  # Enter fraction of stover to remove (not for maize)
          on init:
```
          [crop]_to_harvest = 0
```
          on end_of_day:
          script: same as in Maize Legume and Weeds Rotation.paddock.Manager folder.Harvesting rule for intercropping
        manager Weeding at threshold weed biomass or maximum days
          # Weeding properties
          weed_interval = 35  # Maximum days after emergence to weed (days)
          weed_biomass = 5000  # Weeding biomass threshold to weed (kg/ha)
          weed_maxno_in = 1  # Maximum number of in-crop weedings (1..n)
          weed_maxno_out = 0  # Maximum number of fallow weedings (1..n)
          thin_fraction = 1  # Enter fraction of weed population weeded (0-1)
          fraction = 0  # Enter biomass removal fraction from field (0-1)
          surfaceommodule = SurfaceOrganicMatter  # Name of your surface organic matter module
          tillage_type = user_defined  # Enter name of tillage type
          f_incorp = 0.1  # Enter fraction of surface residues incorporated into soil (0-1)
          tillage_depth = 25  # Enter depth of incorporation of surface residues (mm)
          on init:
```
          daemerge = 0
```
          on end_of_day:
```
         if ((crop_in >= 1)
            AND (weed.plant_status <> 'out')) then
            if (weed.stage >= 3.0) then
               daemerge = daemerge + 1
            endif

            if (weed.biomass > [weed_biomass] OR daemerge >= [weed_interval]) then
               if ((crop_in > 1 AND [weed_maxno_in] > weed_count_in) OR (crop_in = 1 AND [weed_maxno_out] > weed_count_out)) then
                  if (crop_in > 1) then
                     weed_count_in = weed_count_in + 1
                  elseif (crop_in = 1) then
                     weed_count_out = weed_count_out + 1
                  endif
                  weed harvest, remove = [fraction]
                  weed kill_crop plants_kill_fraction = [thin_fraction]
                  if ([thin_fraction] = 1.0) then
                     weed end_crop
                     days_after_weed_kill = 0
                 else
                  endif
                  '[surfaceommodule]' tillage type = [tillage_type], f_incorp = [f_incorp], tillage_depth = [tillage_depth]
                  if ([thin_fraction] = 1.0) then
                    crop_in = crop_in - 1
                    if (crop_current = 'weed') then
                        crop_current = crop_current1
                        crop_current1 = crop_current2
                        crop_current2 = blank
                     elseif (crop_current1 = 'weed') then
                        crop_current1 = crop_current2
                        crop_current2 = blank
                     elseif (crop_current2 = 'weed') then
                        crop_current2 = blank
                     endif
                     daemerge = 0
                  else
                  endif
               else
               endif
            else
            endif
         else
            daemerge = 0
         endif

         if (((crop_in = 1)
            AND (weed.plant_status <> 'out'))
            OR (crop_in = 0)) then
            weed_count_in = 0
         else
            weed_count_out = 0
         endif
```
        manager Remove all residues on a fixed date
          # Removal criteria
          date = 08-may  # Date to remove residues (dd-mmm)
          surfaceommodule = SurfaceOrganicMatter  # Name of your surface organic matter module
          on start_of_day:
```
         if today = date('[date]') then
            '[surfaceommodule]' tillage type = user_defined, f_incorp = 1.0 (), tillage_depth = 0.0 ()
         endif
```
      outputfile: filename=Maize Legume and Weeds Rotation.out; title=Maize Legume and Weeds Rotation; events=My Variables Events
        variables My Variables
          variable:
            dd/mm/yyyy as Date  # Date (dd/mm/yyyy)
            esw  # Extractable Soil Water (mm)
            day  # Day
            year  # Year
            yield  # Yield (kg/ha)
            stover  # Stover (kg/ha)
            biomass  # Total Above Ground Biomass (kg/ha)
            SurfaceOrganicMatter.surfaceom_wt  # Total mass of all surface organic materials
