folder simulations: version=36; creator=Apsim 7.5-r3232
  simulation SWIM3 Maize
    metfile met: filename=%apsim%/Examples/MetFiles/Goond.met
    clock
      start_date = 01/01/1940  # Enter the start date of the simulation
      end_date = 31/12/1960  # Enter the end date of the simulation
    summaryfile
    area paddock
      Soil: SoilType=Black Vertosol; LocalName=Waco; Site=Jimbour; NearestTown=Jimbour, Q 4352; Region=South East Queensland; NaturalVegetation=Grassland, mainly Qld bluegrass; Latitude=0; Longitude=0
        Swim: Salb=0.13; CN2Bare=75; CNRed=20; CNCov=0.8; KDul=0.1; PSIDul=-100; VC=true; DTmin=0; DTmax=1440; MaxWaterIncrement=10; SpaceWeightingFactor=0; SoluteSpaceWeightingFactor=0; Diagnostics=false
          SwimSoluteParameters: Dis=15; Disp=1; A=1; DTHP=1
            zero: DTHC, WaterTableCl, WaterTableNO3, WaterTableNH4, WaterTableUrea, WaterTableTracer, WaterTableMineralisationInhibitor, WaterTableUreaseInhibitor, WaterTableNitrificationInhibitor, WaterTableDenitrificationInhibitor
            Thickness  NO3Exco  NO3FIP  NH4Exco  NH4FIP  UreaExco  UreaFIP  ClExco  ClFIP
            1000       0        1       100      1       0         1        0       1
            1000       0        1       100      1       0         1        0       1
            1000       0        1       100      1       0         1        0       1
        InitialWater Initial water: FractionFull=1; PercentMethod=FilledFromTop
        Water
          Thickness  BD    AirDry  LL15  DUL   SAT   KS
          150        1.02  0.15    0.29  0.54  0.59  50
          150        1.03  0.26    0.29  0.53  0.58  50
          300        1.02  0.29    0.29  0.54  0.59  50
          300        1.02  0.29    0.29  0.54  0.58  50
          300        1.06  0.3     0.3   0.52  0.57  50
          300        1.11  0.31    0.31  0.5   0.55  50
          300        1.12  0.32    0.32  0.5   0.55  50
          300        1.15  0.33    0.33  0.48  0.53  50
          300        1.18  0.34    0.34  0.47  0.52  50
          300        1.2   0.35    0.35  0.46  0.51  50
          300        1.25  0.36    0.36  0.44  0.49  50
          SoilCrop Barley
            LL=[0.29, 0.29, 0.32, 0.38, 0.39, 0.39, 0.41, 0.48, 0.47, 0.46, 0.44]
            KL=[0.1, 0.1, 0.08, 0.06, 0.04, 0.02, 0.01, 0, 0, 0, 0]
            XF=[1, 1, 1, 1, 1, 1, 1, 0, 0, 0, 0]
          SoilCrop Chickpea
            LL=[0.29, 0.29, 0.36, 0.43, 0.51, 0.5, 0.5, 0.48, 0.47, 0.46, 0.44]
            KL=[0.1, 0.1, 0.08, 0.06, 0.04, 0.02, 0.01, 0, 0, 0, 0]
            XF=[1, 1, 1, 1, 1, 1, 1, 0, 0, 0, 0]
          SoilCrop Lucerne
            LL=[0.29, 0.29, 0.29, 0.29, 0.3, 0.31, 0.32, 0.33, 0.34, 0.35, 0.36]
            KL=[0.1, 0.1, 0.1, 0.1, 0.09, 0.09, 0.09, 0.09, 0.09, 0.09, 0.09]
            XF=[1, 1, 1, 1, 1, 1, 1, 1, 1, 1, 1]
          SoilCrop Maize
            LL=[0.29, 0.29, 0.29, 0.29, 0.3, 0.31, 0.32, 0.33, 0.34, 0.35, 0.36]
            KL=[0.1, 0.1, 0.1, 0.08, 0.06, 0.04, 0.02, 0, 0, 0, 0]
            XF=[1, 1, 1, 1, 1, 1, 1, 0, 0, 0, 0]
          SoilCrop Perennial Grass
            LL=[0.29, 0.29, 0.39, 0.41, 0.4, 0.4, 0.41, 0.41, 0.4, 0.4, 0.42]
            KL=[0.1, 0.1, 0.1, 0.1, 0.09, 0.07, 0.05, 0, 0, 0, 0]
            XF=[1, 1, 1, 1, 1, 1, 1, 0, 0, 0, 0]
          SoilCrop Sorghum
            LL=[0.29, 0.29, 0.35, 0.38, 0.4, 0.4, 0.4, 0.48, 0.47, 0.46, 0.44]
            KL=[0.1, 0.1, 0.1, 0.08, 0.06, 0.04, 0.02, 0, 0, 0, 0]
            XF=[1, 1, 1, 1, 1, 1, 1, 0, 0, 0, 0]
          SoilCrop Wheat
            LL=[0.29, 0.29, 0.32, 0.32, 0.35, 0.38, 0.41, 0.48, 0.47, 0.46, 0.44]
            KL=[0.1, 0.1, 0.08, 0.06, 0.04, 0.02, 0.01, 0, 0, 0, 0]
            XF=[1, 1, 1, 1, 1, 1, 1, 0, 0, 0, 0]
        SoilOrganicMatter: RootCN=40; RootWt=200; SoilCN=12.5; EnrACoeff=7.4; EnrBCoeff=0.2
          Thickness  OC    FBiom  FInert
          150        1.04  0.025  0.4
          150        0.89  0.02   0.6
          300        0.89  0.015  0.8
          300        0.89  0.01   0.9
          300        0.77  0.01   0.95
          300        0.45  0.01   0.95
          300        0.27  0.01   0.95
          300        0.22  0.01   0.95
          300        0.16  0.01   0.95
          300        0.13  0.01   0.95
          300        0.12  0.01   0.95
        Analysis: PHUnits=Water; BoronUnits=HotWater
          Thickness  EC    PH   CL
          150        0.2   8.4  1
          150        0.25  8.8  1
          300        0.31  9    1
          300        0.4   9.2  1
          300        0.59  9.2  1
          300        0.84  9.1  1
          300        0.93  9    1
          300        1.01  9    1
          300        1.06  8.9  1
          300        1.05  8.9  1
          300        1.01  8.9  1
        Sample Initial nitrogen
          Thickness  NO3    NH4
          150        6.503  0.599004
          150        2.101  0.100001
          300        2.101  0.100001
          300        1.701  0.100001
          300        1.701  0.100001
          300        1.701  0.100001
          300        1.701  0.100001
          300        1.701  0.100001
          300        1.701  0.100001
          300        1.701  0.100001
          300        1.701  0.100001
        LayerStructure: Thickness=[10, 20, 30, 40, 100, 200, 300, 300, 300, 300, 300, 100]
      surfaceom SurfaceOrganicMatter
        PoolName = wheat  # Organic Matter pool name
        type = wheat  # Organic Matter type
        mass = 1000  # Initial surface residue (kg/ha)
        cnr = 80  # C:N ratio of initial residue
        standing_fraction = 0  # Fraction of residue standing
      fertiliser
      folder Manager folder
        manager Sowing rule
          # Sowing criteria
          date1 = 10-nov  # Enter sowing window START date (dd-mmm)
          date2 = 11-nov  # Enter sowing window END date (dd-mmm)
          must_sow = yes  # Must sow?
          raincrit = 25  # Amount of rainfall
          rainnumdays = 7  # Number of days of rainfall
          esw_amount = 10  # Enter minimum allowable available soil water (mm)
          # Sowing parameters
          crop = maize  # Enter name of crop to sow
          density = 10  # Enter sowing density (plants/m2)
          depth = 30  # Enter sowing depth (mm)
          cultivar = dekalb_xl82  # Enter cultivar
          class = plant  # Enter crop growth class
          row_spacing = 750  # Enter row spacing (mm)
          on start_of_day:
```
      if (paddock_is_fallow() = 1 and FallowIn <> 'yes' and (NextCrop = 0 or NextCrop = '[crop]')) then
         if (date_within('[date1], [date2]') = 1) then
            if (rain[[rainnumdays]] >= [raincrit] AND esw >= [esw_amount]) OR
                ('[must_sow]' = 'yes' AND today = date('[date2]'))) THEN
               ChooseNextCrop = 'yes'   ! for rotations
               [crop] sow plants =[density], sowing_depth = [depth], cultivar = [cultivar], row_spacing = [row_spacing], crop_class = [class]
            endif
            if today = date('[date2]') then
               ChooseNextCrop = 'yes'
            endif
         endif
      endif
```
          on init:
```
            nextcrop = 0
            fallowin = 0
```
        manager Sowing fertiliser
          # When should fertiliser be applied
          modulename = maize  # On which module should the event come from
          eventname = sowing  # On which event should fertiliser be applied
          # Fertiliser application details
          fertmodule = fertiliser  # Module used to apply the fertiliser
          fert_amount_sow = 300  # Amount of starter fertiliser at sowing (kg/ha)
          fert_type_sow = urea_N  # Sowing fertiliser type
          on [modulename].[eventname]:
```
        [fertmodule] apply amount = [fert_amount_sow] (kg/ha), depth = 50 (mm), type = [fert_type_sow]
```
        manager Harvesting rule
          # Harvesting criteria
          crop = maize  # Enter name of crop to harvest when ripe
          on end_of_day:
```
           if [crop].StageName = 'harvest_ripe' or [crop].plant_status = 'dead' then
              [crop]  harvest
              [crop]  end_crop
           endif
```
        manager Salinity
          on init:
```
EC50 = 0
```
          on start_of_day:
```
if day = 300 or maize.daysaftersowing = 1 or maize.daysaftersowing = 50 then

irrigation apply amount = 100

endif
```
          on end_of_day:
```
EC50 = conc_water_cl(7)/640
```
      outputfile: filename=SWIM3 Maize.out; title=SWIM3 Maize
        variables
          variables: dd/mm/yyyy as Date, biomass, yield, grain_protein, grain_size, esw, cl()
        events Reporting Frequency: event=harvesting
      maize
      irrigation
        automatic_irrigation = off
        asw_depth = 600  # Depth to which ASW is calculated. (mm)
        crit_fr_asw = 0.5  # Fraction of ASW below which irrigation is applied (0-1.0)
        irrigation_efficiency = 1  # Efficiency of the irrigation. (0-1.0)
        irrigation_allocation = off  # Allocation limits
        allocation = 0  # Allocation in mm
        default_no3_conc = 0.0  # Nitrate concentration (ppm N)
        default_nh4_conc = 0.0  # Ammonium concentration (ppm N)
        default_cl_conc = 0.0  # Chloride concentration (ppm Cl)
      outputfile Daily (disabled): filename=SWIM3 Maize Daily.out; title=SWIM3 Maize Daily
        variables
          variables: dd/mm/yyyy as Date, daysaftersowing, irrigation, EC50, psio(7), sw_dep(), ll15_dep(), es, lai, swdef_photo, nfact_photo, dlt_dm_light, dlt_dm_water, ep, sw_demand, rlv
        events Reporting Frequency: event=end_day
  simulation SWIM3 Maize with Cl -> /simulations/SWIM3 Maize
    area paddock -> /simulations/SWIM3 Maize/paddock
      outputfile -> /simulations/SWIM3 Maize/paddock/outputfile: filename=SWIM3 Maize with Cl.out; title=SWIM3 Maize with Cl
        variables -> /simulations/SWIM3 Maize/paddock/outputfile/Variables
        events Reporting Frequency -> /simulations/SWIM3 Maize/paddock/outputfile/Reporting Frequency
      irrigation
        automatic_irrigation = off
        asw_depth = 600  # Depth to which ASW is calculated. (mm)
        crit_fr_asw = 0.5  # Fraction of ASW below which irrigation is applied (0-1.0)
        irrigation_efficiency = 1  # Efficiency of the irrigation. (0-1.0)
        irrigation_allocation = off  # Allocation limits
        allocation = 0  # Allocation in mm
        default_no3_conc = 0.0  # Nitrate concentration (ppm N)
        default_nh4_conc = 0.0  # Ammonium concentration (ppm N)
        default_cl_conc = 4160  # Chloride concentration (ppm Cl)
      outputfile Daily (disabled): filename=SWIM3 Maize with Cl Daily.out; title=SWIM3 Maize with Cl Daily
        variables
          variables: dd/mm/yyyy as Date, daysaftersowing, irrigation, EC50, psio(7), sw_dep(), ll15_dep(), es, lai, swdef_photo, nfact_photo, dlt_dm_light, dlt_dm_water, ep, sw_demand, rlv
        events Reporting Frequency: event=end_day
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