folder Simulations: version=34
  simulation Millet P
    clock
      start_date = 01/09/1988  # Enter the start date of the simulation
      end_date = 31/05/1989  # Enter the end date of the simulation
    summaryfile
    metfile met: filename=%apsim%/Examples/MetFiles/Dalby.met
    area paddock
      millet
      canopy
        intercrop = millet millet1 millet2 millet3 millet4 millet5  # Enter crop names to intercrop
      surfaceom SurfaceOrganicMatter
        PoolName = wheat  # Organic Matter pool name
        type = wheat  # Organic Matter type
        mass = 0  # Initial surface residue (kg/ha)
        cnr = 80  # C:N ratio of initial residue
        standing_fraction = 0  # Fraction of residue standing
      fertiliser
      irrigation
        automatic_irrigation = on
        asw_depth = 600  # Depth to which ASW is calculated. (mm)
        crit_fr_asw = 0.5  # Fraction of ASW below which irrigation is applied (0-1.0)
        irrigation_efficiency = 1  # Efficiency of the irrigation. (0-1.0)
        irrigation_allocation = off  # Allocation limits
        allocation = 0  # Allocation in mm
        default_no3_conc = 0.0  # Nitrate concentration (ppm N)
        default_nh4_conc = 0.0  # Ammonium concentration (ppm N)
        default_cl_conc = 0.0  # Chloride concentration (ppm Cl)
      folder Manager folder
        manager Sow on a fixed date
          # Sowing criteria
          date = 1-dec  # Enter sowing date (dd-mmm)
          # Sowing parameters
          crop = millet  # Enter name of crop to sow
          density = 7.5  # Enter sowing density (plants/m2)
          depth = 30  # Enter sowing depth (mm)
          cultivar = wrajpop  # Enter cultivar
          on start_of_day:
```
        if (today = date('[date]') then
            [crop] sow Population =[density], sowing_depth = [depth], cultivar = [cultivar]
         endif
```
        manager Fertilise N at sowing
          # When should fertiliser be applied
          modulename = millet  # On which module should the event come from
          eventname = sowing  # On which event should fertiliser be applied
          # Fertiliser application details
          fertmodule = Fertiliser  # Module used to apply the fertiliser
          fert_amount_sow = 50  # Amount of starter fertiliser at sowing (kg/ha)
          fert_type_sow = urea_N  # Sowing fertiliser type
          on [modulename].[eventname]:
```
        [fertmodule] apply amount = [fert_amount_sow] (kg/ha), depth = 50 (mm), type = [fert_type_sow]
```
        manager Fertilise with Phosphorus at sowing
          # When should fertiliser be applied
          modulename = millet  # On which module should the event come from
          eventname = sowing  # On which event should fertiliser be applied
          # Fertiliser application details
          fertmodule = Fertiliser  # Module used to apply the fertiliser
          fert_amount_sow = 150  # Amount of starter fertiliser at sowing (kg/ha)
          fert_type_sow = broadcast_p  # Sowing fertiliser type
          on [modulename].[eventname]:
          script: same as in Millet P.paddock.Manager folder.Fertilise N at sowing
        manager Harvesting rule
          # Harvesting criteria
          crop = millet  # Enter name of crop to harvest when ripe
          on end_of_day:
```
if [crop].StageName = 'harvest_ripe' or [crop].PlantStatus = 'dead' then
   [crop] harvest
   [crop]1 harvest
   [crop]2 harvest
   [crop]3 harvest
   [crop]4 harvest
   [crop]5 harvest
   [crop] end_crop
   [crop]1 end_crop
   [crop]2 end_crop
   [crop]3 end_crop
   [crop]4 end_crop
   [crop]5 end_crop
   
endif
```
        manager Tiller Aggregation
          on init:
```
millet_yield = 0.0
millet_lai = 0.0
millet_biomass = 0.0
```
          on end_of_day:
```
millet_yield = millet.Yield + millet1.Yield + millet2.Yield + millet3.Yield + millet4.Yield + millet5.Yield
millet_lai = millet.LAI + millet1.LAI + millet2.LAI + millet3.LAI + millet4.LAI + millet5.LAI
millet_biomass = millet.Biomass + millet1.Biomass + millet2.Biomass + millet3.Biomass + millet4.Biomass + millet5.Biomass
```
      Soil: Latitude=0; Longitude=0
        InitialWater Initial water: FractionFull=0.00; PercentMethod=FilledFromTop
        Water
          Thickness  BD    AirDry  LL15  DUL   SAT
          100        1.35  0.04    0.11  0.22  0.3
          100        1.35  0.14    0.14  0.25  0.3
          100        1.35  0.15    0.16  0.27  0.32
          200        1.4   0.16    0.17  0.28  0.33
          200        1.4   0.18    0.19  0.3   0.34
          200        1.4   0.18    0.2   0.3   0.35
          200        1.4   0.18    0.2   0.31  0.36
          200        1.4   0.18    0.2   0.32  0.37
          200        1.4   0.18    0.2   0.31  0.37
          200        1.4   0.18    0.2   0.31  0.37
          SoilCrop sorg
            LL=[0.11, 0.14, 0.16, 0.17, 0.19, 0.2, 0.2, 0.2, 0.2, 0.2]
            KL=[0.07, 0.07, 0.07, 0.07, 0.07, 0.07, 0.04, 0.04, 0.04, 0.04]
            XF=[1, 1, 1, 1, 1, 1, 1, 1, 1, 1]
          SoilCrop cowpea
            LL=[0.11, 0.14, 0.16, 0.17, 0.19, 0.2, 0.2, 0.2, 0.2, 0.2]
            KL=[0.08, 0.08, 0.08, 0.08, 0.06, 0.04, 0.03, 0.02, 0.01, 0.01]
            XF=[1, 1, 1, 1, 1, 1, 1, 1, 1, 1]
          SoilCrop maize
            LL=[0.11, 0.14, 0.16, 0.17, 0.19, 0.2, 0.2, 0.2, 0.2, 0.2]
            KL=[0.08, 0.08, 0.08, 0.08, 0.06, 0.04, 0.03, 0.02, 0.01, 0.01]
            XF=[1, 1, 1, 1, 1, 1, 1, 1, 1, 1]
          SoilCrop mucuna
            LL=[0.11, 0.14, 0.16, 0.17, 0.19, 0.2, 0.2, 0.2, 0.2, 0.2]
            KL=[0.08, 0.08, 0.08, 0.08, 0.06, 0.04, 0.03, 0.02, 0.01, 0.01]
            XF=[1, 1, 1, 1, 1, 1, 1, 1, 1, 1]
          SoilCrop peanut
            LL=[0.11, 0.14, 0.16, 0.17, 0.19, 0.2, 0.2, 0.2, 0.2, 0.2]
            KL=[0.08, 0.08, 0.08, 0.08, 0.06, 0.04, 0.03, 0.02, 0.01, 0.01]
            XF=[1, 1, 1, 1, 1, 1, 1, 1, 1, 1]
          SoilCrop pigeonp
            LL=[0.11, 0.14, 0.16, 0.17, 0.19, 0.2, 0.2, 0.2, 0.2, 0.2]
            KL=[0.08, 0.08, 0.08, 0.08, 0.06, 0.04, 0.03, 0.02, 0.01, 0.01]
            XF=[1, 1, 1, 1, 1, 1, 1, 1, 1, 1]
          SoilCrop soybean
            LL=[0.11, 0.14, 0.16, 0.17, 0.19, 0.2, 0.2, 0.2, 0.2, 0.2]
            KL=[0.08, 0.08, 0.08, 0.08, 0.06, 0.04, 0.03, 0.02, 0.01, 0.01]
            XF=[1, 1, 1, 1, 1, 1, 1, 1, 1, 1]
          SoilCrop Millet
            LL=[0.11, 0.14, 0.16, 0.17, 0.19, 0.2, 0.2, 0.2, 0.2, 0.2]
            KL=[0.08, 0.08, 0.08, 0.08, 0.06, 0.04, 0.03, 0.02, 0.01, 0.01]
            XF=[1, 1, 1, 1, 1, 1, 1, 1, 1, 1]
        SoilWater: SummerCona=2.5; SummerU=9; SummerDate=1-Nov; WinterCona=2.5; WinterU=9; WinterDate=1-Apr; DiffusConst=88; DiffusSlope=35.4; Salb=0.13; CN2Bare=75; CNRed=20; CNCov=0.8; Thickness=[100, 100, 100, 200, 200, 200, 200, 200, 200, 200]; SWCON=[0.5, 0.5, 0.5, 0.5, 0.5, 0.5, 0.5, 0.5, 0.5, 0.5]
        SoilOrganicMatter: RootCN=45; RootWt=1000; SoilCN=14.5; EnrACoeff=7.4; EnrBCoeff=0.2
          Thickness  OC    FBiom  FInert
          100        1.2   0.02   0.6
          100        1     0.01   0.65
          100        0.86  0.01   0.7
          200        0.83  0.01   0.75
          200        0.58  0.01   0.8
          200        0.54  0.01   0.85
          200        0.47  0.01   0.93
          200        0.5   0.01   0.93
          200        0.5   0.01   0.93
          200        0.5   0.01   0.93
        Analysis: Thickness=[100, 100, 100, 200, 200, 200, 200, 200, 200, 200]; PH=[6, 6, 6, 6.2, 6.5, 6.7, 6.8, 6.8, 6.8, 6.8]
        Phosphorus: RootCP=200; RateDissolRock=0.2; RateLossAvail=0.3; SorptionCoeff=0.7
          Thickness  LabileP  BandedP  RockP  Sorption
          100        5        0        0      50
          100        1        0        0      100
          100        1        0        0      200
          200        1        0        0      200
          200        1        0        0      200
          200        1        0        0      200
          200        1        0        0      200
          200        1        0        0      200
          200        1        0        0      200
          200        1        0        0      200
        Sample Initial nitrogen
          Thickness  NO3    NH4
          100        0.237  0.194
          100        0.712  0.484
          100        0.712  0.290
          200        0.554  0.290
          200        0.395  0.290
          200        0.395  0.290
          200        0.237  0.290
          200        0.237  0.290
          200        0.158  0.290
          200        0.079  0.290
      outputfile: filename=Millet P.out; title=Millet P
        variables My Variables
          variables: dd/mm/yyyy as Date, day, year, millet_lai, millet_biomass, millet_yield, esw, Yield, Biomass, LAI, pfact_photo, NStressPhoto, WaterStressPhoto
        events My Variables Events: event=Daily  # End of day
