folder simulations: version=17
  simulation MultiPaddock
    metfile met: filename=%apsim%\Examples\MetFiles\goond.met
    clock
      start_date = 1/01/1940  # Enter the start date of the simulation
      end_date = 31/01/1940  # Enter the end date of the simulation
    summaryfile: filename=Continuous Wheat Simulation.sum
    manager2 Manager
```vb
Imports System
Imports ModelFramework

Public Class Script 
   Inherits Instance

   <EventHandler()> Public Sub OnPost()
      Dim MyPaddock As New PaddockType(Me)
      
      ' Loop through all child paddocks and change the soil water in each.
      For Each SubPaddock As PaddockType In MyPaddock.SubPaddocks
         Dim sw As Single() = SubPaddock.Soil.sw
         Console.WriteLine(SubPaddock.Name + "-" + sw(0).ToString())
         SubPaddock.Soil.sw = sw
      Next

      ' Loop through all child paddocks and write the names and LAIs of all crops.
      For Each SubPaddock As PaddockType In MyPaddock.SubPaddocks
         For Each Crop As CropType In SubPaddock.Crops
            Console.WriteLine(Crop.Name + " - " + Crop.lai.ToString())
         Next
      Next

      ' Loop through all child paddocks and apply fertilier 
      ' And irrigation to each paddock.
      For Each SubPaddock As PaddockType In MyPaddock.SubPaddocks
         SubPaddock.Fertiliser.Apply(50, 10, "NO3_N")
         SubPaddock.Irrigation.Apply(50)
      Next
   End Sub

   
End Class
```
    area paddock1
      registrations global
      soil: Site=Jimbour; Region=South East Queensland; LocalName=Waco; SoilType=Black Vertosol; NearestTown=Jimbour, Q 4352; NaturalVegetation=Grassland, mainly Qld bluegrass; Cona=3.5; DiffusConst=40; DiffusSlope=16; U=6; Salb=0.13; Cn2Bare=73; CnRed=20; CnCov=0.8; CnCanopyFact=1; RootCn=40; RootWt=200; SoilCn=12.5; EnrACoeff=7.4; EnrBCoeff=0.2
        profile
          layer:
            thickness  bd    ll15  airdry  dul   sat   sw       swcon  oc    ph   fbiom  finert  no3  nh4  ec    ll Barley  kl Barley  xf Barley  ll Chickpea  kl Chickpea  xf Chickpea  ll Lucerne  kl Lucerne  xf Lucerne  ll Maize  kl Maize  xf Maize  ll Perennial Grass  kl Perennial Grass  xf Perennial Grass  ll Sorghum  kl Sorghum  xf Sorghum  ll Wheat  kl Wheat  xf Wheat
            150        1.02  0.29  0.15    0.54  0.59  9999.99  0.3    1.04  8.4  0.025  0.4     6.5  0.6  0.2   0.29       0.1        1          0.29         0.1          1            0.29        0.1         1           0.29      0.1       1         0.29                0.1                 1                   0.29        0.1         1           0.29      0.1       1
            150        1.03  0.29  0.26    0.53  0.58  9999.99  0.3    0.89  8.8  0.02   0.6     2.1  0.1  0.25  0.29       0.1        1          0.29         0.1          1            0.29        0.1         1           0.29      0.1       1         0.29                0.1                 1                   0.29        0.1         1           0.29      0.1       1
            300        1.02  0.29  0.29    0.54  0.59  9999.99  0.3    0.89  9    0.015  0.8     2.1  0.1  0.31  0.32       0.08       1          0.36         0.08         1            0.29        0.1         1           0.34      0.1       1         0.39                0.1                 1                   0.35        0.1         1           0.32      0.08      1
            300        1.02  0.29  0.29    0.54  0.58  9999.99  0.3    0.89  9.2  0.01   0.9     1.7  0.1  0.4   0.38       0.06       1          0.43         0.06         1            0.29        0.1         1           0.34      0.08      1         0.41                0.1                 1                   0.38        0.08        1           0.32      0.06      1
            300        1.06  0.3   0.3     0.52  0.57  9999.99  0.3    0.77  9.2  0.01   0.95    1.7  0.1  0.59  0.39       0.04       1          0.51         0.04         1            0.3         0.09        1           0.37      0.06      1         0.4                 0.09                1                   0.4         0.06        1           0.35      0.04      1
            300        1.11  0.31  0.31    0.5   0.55  9999.99  0.3    0.45  9.1  0.01   0.95    1.7  0.1  0.84  0.39       0.02       1          0.5          0.02         1            0.31        0.09        1           0.4       0.04      1         0.4                 0.07                1                   0.4         0.04        1           0.38      0.02      1
            300        1.12  0.32  0.32    0.5   0.55  9999.99  0.3    0.27  9    0.01   0.95    1.7  0.1  0.93  0.41       0.01       1          0.5          0.01         1            0.32        0.09        1           0.42      0.02      1         0.41                0.05                1                   0.4         0.02        1           0.41      0.01      1
            300        1.15  0.33  0.33    0.48  0.53  9999.99  0.3    0.22  9    0.01   0.95    1.7  0.1  1.01  0.48       0          0          0.48         0            0            0.33        0.09        1           0.48      0         0         0.41                0                   0                   0.48        0           0           0.48      0         0
            300        1.18  0.34  0.34    0.47  0.52  9999.99  0.3    0.16  8.9  0.01   0.95    1.7  0.1  1.06  0.47       0          0          0.47         0            0            0.34        0.09        1           0.47      0         0         0.4                 0                   0                   0.47        0           0           0.47      0         0
            300        1.2   0.35  0.35    0.46  0.51  9999.99  0.3    0.13  8.9  0.01   0.95    1.7  0.1  1.05  0.46       0          0          0.46         0            0            0.35        0.09        1           0.46      0         0         0.4                 0                   0                   0.46        0           0           0.46      0         0
            300        1.25  0.36  0.36    0.44  0.49  9999.99  0.3    0.12  8.9  0.01   0.95    1.7  0.1  1.01  0.44       0          0          0.44         0            0            0.36        0.09        1           0.44      0         0         0.42                0                   0                   0.44        0           0           0.44      0         0
        InitWater
          percentmethod: percent=1; distributed=filled from top
        InitNitrogen
          profile
            layer:
              no3    nh4       thickness
              6.503  0.599004  150
              2.101  0.100001  150
              2.101  0.100001  300
              1.701  0.100001  300
              1.701  0.100001  300
              1.701  0.100001  300
              1.701  0.100001  300
              1.701  0.100001  300
              1.701  0.100001  300
              1.701  0.100001  300
              1.701  0.100001  300
      surfaceom surface organic matter
        PoolName = wheat  # Organic Matter pool name
        type = wheat  # Organic Matter type
        mass = 1000  # Initial surface residue (kg/ha)
        cnr = 80  # C:N ratio of initial residue
        standing_fraction = 0  # Fraction of residue standing
      fertiliser
      wheat
      folder Manager folder
        manager Sowing rule
          category =  # Sowing criteria
          date1 = 15-may  # Enter sowing window START date (dd-mmm)
          date2 = 10-jul  # Enter sowing window END date (dd-mmm)
          must_sow = no  # Must sow?
          raincrit = 30  # Amount of rainfall
          rainnumdays = 3  # Number of days of rainfall
          esw_amount = 200  # Enter minimum allowable available soil water (mm)
          category =  # Sowing parameters
          crop = wheat  # Enter name of crop to sow
          density = 100  # Enter sowing density (plants/m2)
          depth = 30  # Enter sowing depth (mm)
          cultivar = hartog  # Enter cultivar
          class = plant  # Enter crop growth class
          row_spacing = 250  # Enter row spacing (mm)
          on start_of_day:
```
      if (paddock_is_fallow() = 1 and FallowIn <> 'yes' and (NextCrop = 0 or NextCrop = '[crop]')) then
         if (date_within('[date1], [date2]') = 1) then
            if (rain[[rainnumdays]] >= [raincrit] AND esw >= [esw_amount]) OR
                ('[must_sow]' = 'yes' AND today = date('[date2]'))) THEN
               ChooseNextCrop = 'yes'   ! for rotations
               [crop] sow plants =[density], sowing_depth = [depth], cultivar = [cultivar], row_spacing = [row_spacing], crop_class = [class]
            endif
            if today = date('[date2]') then
               ChooseNextCrop = 'yes'
            endif
         endif
      endif
```
          on init:
```
            nextcrop = 0
            fallowin = 0
```
        manager Sowing fertiliser
          category =  # When should fertiliser be applied
          modulename = wheat  # On which module should the event come from
          eventname = sowing  # On which event should fertiliser be applied
          category =  # Fertiliser application details
          fertmodule = fertiliser  # Module used to apply the fertiliser
          fert_amount_sow = 150  # Amount of starter fertiliser at sowing (kg/ha)
          fert_type_sow = urea_N  # Sowing fertiliser type
          on [modulename].[eventname]:
```
        [fertmodule] apply amount = [fert_amount_sow] (kg/ha), depth = 50 (mm), type = [fert_type_sow]
```
        manager Harvesting rule
          category =  # Harvesting criteria
          crop = wheat  # Enter name of crop to harvest when ripe
          on end_of_day:
```
           if [crop].StageName = 'harvest_ripe' or [crop].plant_status = 'dead' then
              [crop]  harvest
              [crop]  end_crop
           endif
```
      outputfile
        variables
          variables: dd/mm/yyyy as Date, biomass, yield, grain_protein, grain_size, esw
        events Reporting Frequency: event=harvesting
      irrigation
        automatic_irrigation = off
        asw_depth = 600  # Depth to which ASW is calculated. (mm)
        crit_fr_asw = 0.5  # Fraction of ASW below which irrigation is applied (0-1.0)
        irrigation_efficiency = 1  # Efficiency of the irrigation. (0-1.0)
        irrigation_allocation = off  # Allocation limits
        allocation = 0  # Allocation in ML
        default_no3_conc = 0  # Nitrate concentration (ppm N)
        default_nh4_conc = 0  # Ammonium concentration (ppm N)
        default_cl_conc = 0  # Chloride concentration (ppm Cl)
        default_no3_conc = 0  # Nitrate concentration (ppm N)
        default_nh4_conc = 0  # Ammonium concentration (ppm N)
        default_cl_conc = 0  # Chloride concentration (ppm Cl)
    area paddock2 -> /simulations/MultiPaddock/paddock1
      soil -> /simulations/MultiPaddock/paddock1/Soil
        InitWater
          percentmethod: percent=0.50; distributed=Filled from top
