folder simulations: version=31
  simulation RSimple
    memo Readme
      R variables are exposed to the system in the "my variables" tab.
      Other apsim components can read or write these variables.

      Apsim variables are "imported" into the R interpreter at the start of every event.
    metfile met: filename=%apsim%/Examples/MetFiles/Goond.met
    clock
      start_date = 01/01/1940  # Enter the start date of the simulation
      end_date = 03/01/1940  # Enter the end date of the simulation
    summaryfile
    RLink
      on my variables:
```
# R Variables made available to other apsim modules 
zzz   # scalars
xxx
yyy   # vectors
q     # Undefined
```
      on apsim variables:
```
# Apsim variables "imported" on each event.
# The "apsim" name may be an illegal R variable name, so an alias facility is provided
rain as rainfall                       # The apsim variable "rain" is the R variable "rainfall"
day
".masterpm.clock.dd/mm/yyyy" as date   # Quotes are honoured in module names
```
      on init:
```r
zzz <- 45.42
xxx <- 'abcdef'
yyy <- seq(1,3)
```
      on process:
```r
# Arbitrary calculations 

zzz <- zzz + 1
yyy[2]<-as.numeric(unlist(strsplit(date, "/"))[3])
yyy[3]<-sqrt(day)
```
    outputfile: filename=RSimple.out; title=RSimple
      variables
        variables: dd/mm/yyyy, xxx, yyy, zzz, q
      events Reporting Frequency: event=daily
  simulation RSinglePaddock
    memo Readme
      There is an R language module called "apsim" with the following functions

      apsim$get(name)
      apsim$set(name, value)
      apsim$publish(name, type, structure)
      apsim$subscribe(name, type, handler)

      "name" is a character string that refers to an apsim variable or event

      "value" is numeric or character data, scalar or vector forms.

      "type" is the name of the apsim datastructure passed to the handler of an event. It can be "Null".

      "structure" is a named list that is converted to a C structure for the handler of an event. It can be empty.

      "handler" is the name of an R function that will be called with a named list as its single argument when the subscribed event occurs.
    metfile met: filename=%apsim%/Examples/MetFiles/Goond.met
    clock
      start_date = 01/01/1940  # Enter the start date of the simulation
      end_date = 02/01/1945  # Enter the end date of the simulation
    summaryfile
    area paddock
      soil: Site=Jimbour; Region=South East Queensland; LocalName=Waco
        SoilType = Black Vertosol  # Classification
        NearestTown = Jimbour, Q 4352
        NaturalVegetation = Grassland, mainly Qld bluegrass
        InitWater Initial water
          percentmethod: percent=1; distributed=filled from top
        Water
          Layer:
            Thickness (mm)  BD (g/cc)  AirDry (mm/mm)  LL15 (mm/mm)  DUL (mm/mm)  SAT (mm/mm)
            150             1.02       0.15            0.29          0.54         0.59
            150             1.03       0.26            0.29          0.53         0.58
            300             1.02       0.29            0.29          0.54         0.59
            300             1.02       0.29            0.29          0.54         0.58
            300             1.06       0.3             0.3           0.52         0.57
            300             1.11       0.31            0.31          0.5          0.55
            300             1.12       0.32            0.32          0.5          0.55
            300             1.15       0.33            0.33          0.48         0.53
            300             1.18       0.34            0.34          0.47         0.52
            300             1.2        0.35            0.35          0.46         0.51
            300             1.25       0.36            0.36          0.44         0.49
          SoilCrop Barley
            Layer:
              Thickness (mm)  LL (mm/mm)  KL (/day)  XF (0-1)
              150             0.29        0.1        1
              150             0.29        0.1        1
              300             0.32        0.08       1
              300             0.38        0.06       1
              300             0.39        0.04       1
              300             0.39        0.02       1
              300             0.41        0.01       1
              300             0.48        0          0
              300             0.47        0          0
              300             0.46        0          0
              300             0.44        0          0
          SoilCrop Chickpea
            Layer:
              Thickness (mm)  LL (mm/mm)  KL (/day)  XF (0-1)
              150             0.29        0.1        1
              150             0.29        0.1        1
              300             0.36        0.08       1
              300             0.43        0.06       1
              300             0.51        0.04       1
              300             0.5         0.02       1
              300             0.5         0.01       1
              300             0.48        0          0
              300             0.47        0          0
              300             0.46        0          0
              300             0.44        0          0
          SoilCrop Lucerne
            Layer:
              Thickness (mm)  LL (mm/mm)  KL (/day)  XF (0-1)
              150             0.29        0.1        1
              150             0.29        0.1        1
              300             0.29        0.1        1
              300             0.29        0.1        1
              300             0.3         0.09       1
              300             0.31        0.09       1
              300             0.32        0.09       1
              300             0.33        0.09       1
              300             0.34        0.09       1
              300             0.35        0.09       1
              300             0.36        0.09       1
          SoilCrop Maize
            Layer:
              Thickness (mm)  LL (mm/mm)  KL (/day)  XF (0-1)
              150             0.29        0.1        1
              150             0.29        0.1        1
              300             0.34        0.1        1
              300             0.34        0.08       1
              300             0.37        0.06       1
              300             0.4         0.04       1
              300             0.42        0.02       1
              300             0.48        0          0
              300             0.47        0          0
              300             0.46        0          0
              300             0.44        0          0
          SoilCrop Perennial Grass
            Layer:
              Thickness (mm)  LL (mm/mm)  KL (/day)  XF (0-1)
              150             0.29        0.1        1
              150             0.29        0.1        1
              300             0.39        0.1        1
              300             0.41        0.1        1
              300             0.4         0.09       1
              300             0.4         0.07       1
              300             0.41        0.05       1
              300             0.41        0          0
              300             0.4         0          0
              300             0.4         0          0
              300             0.42        0          0
          SoilCrop Sorghum
            Layer:
              Thickness (mm)  LL (mm/mm)  KL (/day)  XF (0-1)
              150             0.29        0.1        1
              150             0.29        0.1        1
              300             0.35        0.1        1
              300             0.38        0.08       1
              300             0.4         0.06       1
              300             0.4         0.04       1
              300             0.4         0.02       1
              300             0.48        0          0
              300             0.47        0          0
              300             0.46        0          0
              300             0.44        0          0
          SoilCrop Wheat
            Layer:
              Thickness (mm)  LL (mm/mm)  KL (/day)  XF (0-1)
              150             0.29        0.1        1
              150             0.29        0.1        1
              300             0.32        0.08       1
              300             0.32        0.06       1
              300             0.35        0.04       1
              300             0.38        0.02       1
              300             0.41        0.01       1
              300             0.48        0          0
              300             0.47        0          0
              300             0.46        0          0
              300             0.44        0          0
        SoilWat: SummerCona=3.5; SummerU=6; SummerDate=1-Nov; WinterCona=3.5; WinterU=6; WinterDate=1-Apr; DiffusConst=40; DiffusSlope=16; Salb=0.13; Cn2Bare=73; CnRed=20; CnCov=0.8
          Layer:
            Thickness (mm)  SWCON (0-1)
            150             0.3
            150             0.3
            300             0.3
            300             0.3
            300             0.3
            300             0.3
            300             0.3
            300             0.3
            300             0.3
            300             0.3
            300             0.3
        SoilOrganicMatter: RootCn=40; RootWt=200; SoilCn=12.5; EnrACoeff=7.4; EnrBCoeff=0.2
          Layer:
            Thickness (mm)  OC (Total %)  FBiom (0-1)  FInert (0-1)
            150             1.04          0.025        0.4
            150             0.89          0.02         0.6
            300             0.89          0.015        0.8
            300             0.89          0.01         0.9
            300             0.77          0.01         0.95
            300             0.45          0.01         0.95
            300             0.27          0.01         0.95
            300             0.22          0.01         0.95
            300             0.16          0.01         0.95
            300             0.13          0.01         0.95
            300             0.12          0.01         0.95
        Analysis
          Layer:
            Thickness (mm)  EC (1:5 dS/m)  PH (1:5 water)
            150             0.2            8.4
            150             0.25           8.8
            300             0.31           9
            300             0.4            9.2
            300             0.59           9.2
            300             0.84           9.1
            300             0.93           9
            300             1.01           9
            300             1.06           8.9
            300             1.05           8.9
            300             1.01           8.9
        Sample Initial nitrogen
          Layer:
            Thickness (mm)  NO3 (ppm)  NH4 (ppm)
            150             6.503      0.599004
            150             2.101      0.100001
            300             2.101      0.100001
            300             1.701      0.100001
            300             1.701      0.100001
            300             1.701      0.100001
            300             1.701      0.100001
            300             1.701      0.100001
            300             1.701      0.100001
            300             1.701      0.100001
            300             1.701      0.100001
      surfaceom SurfaceOrganicMatter
        PoolName = wheat  # Organic Matter pool name
        type = wheat  # Organic Matter type
        mass = 1000  # Initial surface residue (kg/ha)
        cnr = 80  # C:N ratio of initial residue
        standing_fraction = 0  # Fraction of residue standing
      fertiliser
      wheat
      RLink
        # Sowing criteria
        date1 = 15-may  # Enter sowing window START date (dd-mmm)
        date2 = 10-jul  # Enter sowing window END date (dd-mmm)
        must_sow = yes  # Must sow?
        raincrit = 25  # Amount of rainfall
        rainnumdays = 7  # Number of days of rainfall
        esw_amount = 100  # Enter minimum allowable available soil water (mm)
        # Sowing parameters
        crop = wheat  # Enter name of crop to sow
        density = 100  # Enter sowing density (plants/m2)
        depth = 30  # Enter sowing depth (mm)
        cultivar = hartog  # Enter cultivar
        class = plant  # Enter crop growth class
        row_spacing = 250  # Enter row spacing (mm)
        # Fertiliser application details
        fertmodule = fertiliser  # Module used to apply the fertiliser
        fert_amount_sow = 150  # Amount of starter fertiliser at sowing (kg/ha)
        fert_type_sow = urea_N  # Sowing fertiliser type
        on prepare:
```r
# getting and setting simple apsim variables:
year<-apsim$get("year")

today<-as.Date(paste(apsim$get("dd_mmm"), year, sep="_"), "%d_%b_%Y")
if (as.Date("[date2]", "%d-%b") < as.Date("[date1]", "%d-%b")) {
  w1 <- as.Date(paste("[date1]",year,sep="-"), "%d-%b-%Y")
  w2 <- as.Date(paste("[date2]",year+1,sep="-"), "%d-%b-%Y")
} else {
  w1 <- as.Date(paste("[date1]",year,sep="-"), "%d-%b-%Y")
  w2 <- as.Date(paste("[date2]",year,sep="-"), "%d-%b-%Y")
}

# Publishing apsim events. NB named list items are case sensitive.
if (apsim$get("[crop].plant_status") == "out" && today >= w1 && today <= w2) {
   if ((apsim$get("rain[[rainnumdays]]") > [raincrit] && apsim$get("esw") >= [esw_amount]) ||
       ("[must_sow]" == "yes" && today == w2)) {
      apsim$publish("[crop].sow", "Sow", list(plants=[density], sowing_depth=[depth], Cultivar ="[cultivar]", row_spacing = [row_spacing], crop_class = "[class]"))
      apsim$publish("[fertmodule].apply", "FertiliserApplication", list(Amount = [fert_amount_sow], Depth = 50, Type = "[fert_type_sow]"))
   } 
}
```
        on post:
```
if (apsim$get("[crop].StageName") == "harvest_ripe" || apsim$get("[crop].plant_status") == "dead") {
   apsim$publish("[crop].harvest",  "Harvest", list(Remove=1.0))
   apsim$publish("[crop].end_crop", "Null", list())  
}
```
        on init:
```r
onFlowering<-function (args) {
   cat ("RLink: On flowering called\n")
}

seen <- FALSE
onNewMet<-function (args) {
   if (!seen) {
     cat ("RLink: new met event\n")
     for (n in names(args)) {
       cat (n,args[[n]],"\n")
     }
     seen <<- TRUE
   }
}

apsim$subscribe("flowering", "Null", "onFlowering")

apsim$subscribe("newmet", "NewMet", "onNewMet")
```
      outputfile: filename=RSinglePaddock.out; title=RSinglePaddock
        variables
          variables: dd/mm/yyyy, yield, biomass
        events Reporting Frequency: event=harvesting
