folder simulations: version=32
  simulation Rotation Sample (Directed Graph)
    metfile met: filename=%apsim%/Examples/MetFiles/Goond.met
    clock
      start_date = 1/01/1940  # Enter the start date of the simulation
      end_date = 31/12/1950  # Enter the end date of the simulation
    summaryfile
    area Paddock
      soil: LocalName=Brigalow; Site=Kupunn; Region=South East Queensland
        Comment = oc and ph not measured  # Comments
        SoilType = Grey Vertosol  # Soil description
        NearestTown = Dalby, Q 4405
        NaturalVegetation = Brigalow, belah, wilga
        InitWater Initial water
          percentmethod: percent=1; distributed=filled from top
        Water
          Layer:
            Thickness (mm)  BD (g/cc)  AirDry (mm/mm)  LL15 (mm/mm)  DUL (mm/mm)  SAT (mm/mm)
            150             1.4        0.105           0.21          0.39         0.44
            150             1.39       0.189           0.21          0.39         0.44
            300             1.37       0.22            0.22          0.4          0.45
            300             1.36       0.25            0.25          0.41         0.46
            300             1.38       0.27            0.27          0.4          0.45
            300             1.39       0.31            0.31          0.39         0.44
            300             1.42       0.36            0.36          0.38         0.43
          SoilCrop Chickpea
            Layer:
              Thickness (mm)  LL (mm/mm)  KL (/day)  XF (0-1)
              150             0.21        0.1        1
              150             0.21        0.1        1
              300             0.22        0.08       1
              300             0.27        0.06       1
              300             0.29        0.04       1
              300             0.34        0.02       1
              300             0.38        0.01       1
          SoilCrop Cotton
            Layer:
              Thickness (mm)  LL (mm/mm)  KL (/day)  XF (0-1)
              150             0.21        0.1        1
              150             0.21        0.1        1
              300             0.22        0.1        1
              300             0.25        0.1        1
              300             0.27        0.09       1
              300             0.31        0.07       1
              300             0.36        0.05       1
          SoilCrop Sorghum
            Layer:
              Thickness (mm)  LL (mm/mm)  KL (/day)  XF (0-1)
              150             0.21        0.1        1
              150             0.21        0.1        1
              300             0.26        0.1        1
              300             0.26        0.08       1
              300             0.28        0.06       1
              300             0.34        0.04       1
              300             0.36        0.02       1
          SoilCrop Wheat
            Layer:
              Thickness (mm)  LL (mm/mm)  KL (/day)  XF (0-1)
              150             0.21        0.1        1
              150             0.21        0.1        1
              300             0.25        0.08       1
              300             0.28        0.06       1
              300             0.31        0.04       1
              300             0.37        0.02       1
              300             0.38        0.01       1
        SoilWat: SummerCona=3.5; SummerU=6; SummerDate=1-Nov; WinterCona=3.5; WinterU=6; WinterDate=1-Apr; DiffusConst=40; DiffusSlope=16; Salb=0.13; Cn2Bare=73; CnRed=20; CnCov=0.8
          Layer:
            Thickness (mm)  SWCON (0-1)
            150             0.3
            150             0.3
            300             0.3
            300             0.3
            300             0.3
            300             0.3
            300             0.3
        SoilOrganicMatter: RootCn=40; RootWt=200; SoilCn=12.5; EnrACoeff=7.4; EnrBCoeff=0.2
          Layer:
            Thickness (mm)  OC (Total %)  FBiom (0-1)  FInert (0-1)
            150             1.24          0.03         0.4
            150             1.24          0.02         0.6
            300             1.25          0.01         0.8
            300             1.1           0.01         0.9
            300             0.71          0.01         0.95
            300             0.34          0.01         0.95
            300             0.26          0.01         0.95
        Analysis
          Layer:
            Thickness (mm)  PH (1:5 water)
            150             7
            150             7
            300             7
            300             7
            300             7
            300             7
            300             7
        Sample Initial nitrogen
          Layer:
            Thickness (mm)  NO3 (ppm)  NH4 (ppm)
            150             6.500      0.600
            150             2.100      0.100
            300             2.100      0.100
            300             1.700      0.100
            300             1.700      0.100
            300             1.700      0.100
            300             1.700      0.100
      fertiliser
      chickpea
      cotton
      wheat
      tclmanager Manager
        tclui Rotation Initialisation: initialState=WinterFallow; simpleLogging=0
          uiscript=source $apsuite/UserInterface/APSFarm/RotationInitialisationUI.tcl
          rule Rotation Sample (Directed Graph) Rotation Initialisation.out - Rotation Initialisation UI1
            on init:
```
source $apsuite/UserInterface/APSFarm/RotationInitialisation.tcl
set state "WinterFallow"
```
          rule Rotation Sample (Directed Graph) Rotation Initialisation.out - Rotation Initialisation UI2
            on process:
```
checkSetup
doProcess
```
          rule Rotation Sample (Directed Graph) Rotation Initialisation.out - Rotation Initialisation UI3
            on exit:
```
exit
```
        tclui Rotation Management: uiscript=source $apsuite/UserInterface/APSFarm/RotationsUI.tcl; graph_name=stateGraph
          node SummerFallow2: desc=New state
          node Chickpea: desc=Chickpea
          node Wheat: desc=Wheat Crop
          node WinterFallow: desc=New state
          node SummerFallow1: desc=New state
          node F1: desc=New state
          node Cotton: desc=A Cotton Crop
          arc arc2: source=SummerFallow1; target=WinterFallow; rules=[apsimGet day]  == 192
          arc arc6: source=WinterFallow; target=Cotton; actions=sow_cotton; rules=[canPlant_cotton]
          arc arc3: source=Wheat; target=SummerFallow2
            actions=[apsimSendMessage wheat harvest, apsimSendMessage wheat end_crop]
            rules={[apsimGet wheat.stageName] == "harvest_ripe" || [apsimGet wheat.plant_status] == "dead"}
          arc arc7: source=F1; target=SummerFallow1; rules=[apsimGet day]  == 192
          arc arc0: source=F1; target=Chickpea; actions=sow_chickpea; rules=[canPlant_chickpea]
          arc arc8: source=Chickpea; target=SummerFallow1
            actions=[apsimSendMessage chickpea harvest, apsimSendMessage chickpea end_crop]
            rules={[apsimGet chickpea.stageName] == "harvest_ripe" || [apsimGet chickpea.plant_status] == "dead"}
          arc arc1: source=SummerFallow1; target=Wheat; actions=sow_wheat; rules=[canPlant_wheat]
          arc arc5: source=Cotton; target=F1; actions=apsimSendMessage cotton harvest; rules=[apsimGet ozcot_status] > 0
          arc arc9: source=SummerFallow2; target=WinterFallow; rules=[apsimGet day]  == 74
          paddock toplevel: isManaged=0
          paddock: isManaged=0
          rule Rotation Management Init rule
            on init:
```
package require struct
::struct::graph stateGraph
stateGraph node insert "SummerFallow2"
set colour(SummerFallow2) "gray"
stateGraph node insert "Chickpea"
set colour(Chickpea) "lightgreen"
stateGraph node insert "Wheat"
set colour(Wheat) "darkgreen"
stateGraph node insert "WinterFallow"
set colour(WinterFallow) "gray"
stateGraph node insert "SummerFallow1"
set colour(SummerFallow1) "maroon"
stateGraph node insert "F1"
set colour(F1) "gray"
stateGraph node insert "Cotton"
set colour(Cotton) "purple"
stateGraph arc insert "SummerFallow1" "WinterFallow" "arc2"
stateGraph arc lappend "arc2" rules {[apsimGet day]  == 192}
stateGraph arc lappend "arc2" actions {}
stateGraph arc insert "WinterFallow" "Cotton" "arc6"
stateGraph arc lappend "arc6" actions {sow_cotton}
stateGraph arc lappend "arc6" rules {[canPlant_cotton]}
stateGraph arc lappend "arc6" actions {}
stateGraph arc insert "Wheat" "SummerFallow2" "arc3"
stateGraph arc lappend "arc3" actions {apsimSendMessage wheat harvest}
stateGraph arc lappend "arc3" actions {apsimSendMessage wheat end_crop}
stateGraph arc lappend "arc3" rules {{[apsimGet wheat.stageName] == "harvest_ripe" || [apsimGet wheat.plant_status] == "dead"}}
stateGraph arc lappend "arc3" actions {}
stateGraph arc insert "F1" "SummerFallow1" "arc7"
stateGraph arc lappend "arc7" rules {[apsimGet day]  == 192}
stateGraph arc lappend "arc7" actions {}
stateGraph arc insert "F1" "Chickpea" "arc0"
stateGraph arc lappend "arc0" actions {sow_chickpea}
stateGraph arc lappend "arc0" rules {[canPlant_chickpea]}
stateGraph arc lappend "arc0" actions {}
stateGraph arc insert "Chickpea" "SummerFallow1" "arc8"
stateGraph arc lappend "arc8" actions {apsimSendMessage chickpea harvest}
stateGraph arc lappend "arc8" actions {apsimSendMessage chickpea end_crop}
stateGraph arc lappend "arc8" rules {{[apsimGet chickpea.stageName] == "harvest_ripe" || [apsimGet chickpea.plant_status] == "dead"}}
stateGraph arc lappend "arc8" actions {}
stateGraph arc insert "SummerFallow1" "Wheat" "arc1"
stateGraph arc lappend "arc1" actions {sow_wheat}
stateGraph arc lappend "arc1" rules {[canPlant_wheat]}
stateGraph arc lappend "arc1" actions {}
stateGraph arc insert "Cotton" "F1" "arc5"
stateGraph arc lappend "arc5" actions {apsimSendMessage cotton harvest}
stateGraph arc lappend "arc5" rules {[apsimGet ozcot_status] > 0}
stateGraph arc lappend "arc5" actions {}
stateGraph arc insert "SummerFallow2" "WinterFallow" "arc9"
stateGraph arc lappend "arc9" rules {[apsimGet day]  == 74}
stateGraph arc lappend "arc9" actions {}
```
        tclui Cotton Sowing Rule: uiscript=source $apsuite/UserInterface/APSFarm/GenericSowingUI.tcl; state=Cotton; crop=cotton; date1=15-oct; date2=15-dec; raincrit=10; rainnumdays=3; esw_amount=100; must_sow=yes; cultivar=Siok; plants=100; sowing_depth=30; row_spacing=1000; fert_cost=???; criteria=variable; plants_pm=10; skiprow=0; module=ozcot; skipplant=0; class=plant
          ruletemplate Sowing rule - initialisation:
            # Support procedures
            # Can we plant a crop today?
            proc canPlant_[crop] {} {
              if {"[criteria]" == "variable"} {
                 set year [apsimGet year]; set day [apsimGet day]
                 set d1 [clock format [clock scan "[date1]-$year"] -format %j]
                 set d2 [clock format [clock scan "[date2]-$year"] -format %j]

                 if {"[must_sow]" == "yes" && $day == $d2} {return 1}

                 if {$d1 > $d2} {
                    set dateOK [expr $day >= $d1 || $day <= $d2]
                 } else {
                    set dateOK [expr $day >= $d1 && $day <= $d2]
                 }
                 set rainOK [expr [apsimGet rain\[[rainnumdays]\]] >= [raincrit]]
                 set eswOK [expr [apsimGet esw] >= [esw_amount]]
                 return [expr $dateOK && $rainOK && $eswOK]
              } elseif {"[criteria]" == "fixed"} {
                 set year [apsimGet year]; set day [apsimGet day]
                 set d1 [clock format [clock scan "[date1]-$year"] -format %j]
                 return [expr $day == $d1]
              } else {
                 error "Unknown sowing criteria \"[criteria]\"."
              }
              return "notreached"
            }

            # Plant a crop now
            proc sow_[crop] {} {
              if {"[module]" == "plant"} {
                 apsimSendMessage [crop] sow {plants [plants]} {sowing_depth [sowing_depth]} \
                         {cultivar [cultivar]} {row_spacing [row_spacing]} \
                         {skipplant [skipplant]} {skiprow [skiprow]} {crop_class [class]}
              } elseif {"[module]" == "cropmod"} {
                 apsimSendMessage [crop] sow {plants [density]} {sowing_depth [depth]} \
                         {cultivar [cultivar]} {row_spacing [row_spacing]} {skiprow [skiprow]}
              } elseif {"[module]" == "growth"} {
                 apsimSendMessage [crop] ???
              } elseif {"[module]" == "ozcot"} {
                 apsimSendMessage [crop] sow {plants_pm [plants_pm]} {sowing_depth [sowing_depth]} \
                         {row_spacing [row_spacing]} {skiprow [skiprow]} {cultivar [cultivar]}
              } elseif {"[module]" == "oryza"} {
                 apsimSendMessage [crop] sow {cultivar [cultivar]}
              } elseif {"[module]" == "sorghum"} {
                 apsimSendMessage [crop] sow {plants [plants]} {sowing_depth [sowing_depth]} \
                         {cultivar [cultivar]} {row_spacing [row_spacing]} {skiprow [skiprow]} \
                         {tiller_no_fertile [tiller_no_fertile]}
              } elseif {"[module]" == "sugar"} {
                 apsimSendMessage [crop] sow {plants [plants]} {cultivar [cultivar]} {sowing_depth [sowing_depth]}
              } else {
                error "Unknown crop module \"[module]\"."
              }
            }
          rule Rotation Sample (Directed Graph) Cotton Sowing Rule.out - Sowing rule - initialisation
            on init:
```
# Support procedures
# Can we plant a crop today?
proc canPlant_cotton {} {
  if {"variable" == "variable"} {
     set year [apsimGet year]; set day [apsimGet day]
     set d1 [clock format [clock scan "15-oct-$year"] -format %j]
     set d2 [clock format [clock scan "15-dec-$year"] -format %j]

     if {"yes" == "yes" && $day == $d2} {return 1}

     if {$d1 > $d2} {
        set dateOK [expr $day >= $d1 || $day <= $d2]
     } else {
        set dateOK [expr $day >= $d1 && $day <= $d2]
     }
     set rainOK [expr [apsimGet rain\[3\]] >= 10]
     set eswOK [expr [apsimGet esw] >= 100]
     return [expr $dateOK && $rainOK && $eswOK]
  } elseif {"variable" == "fixed"} {
     set year [apsimGet year]; set day [apsimGet day]
     set d1 [clock format [clock scan "15-oct-$year"] -format %j]
     return [expr $day == $d1]
  } else {
     error "Unknown sowing criteria \"variable\"."
  }
  return "notreached"
}

# Plant a crop now
proc sow_cotton {} {
  if {"ozcot" == "plant"} {
     apsimSendMessage cotton sow {plants 100} {sowing_depth 30} \
             {cultivar Siok} {row_spacing 1000} \
             {skipplant 0} {skiprow 0} {crop_class plant}
  } elseif {"ozcot" == "cropmod"} {
     apsimSendMessage cotton sow {plants [density]} {sowing_depth [depth]} \
             {cultivar Siok} {row_spacing 1000} {skiprow 0}
  } elseif {"ozcot" == "growth"} {
     apsimSendMessage cotton ???
  } elseif {"ozcot" == "ozcot"} {
     apsimSendMessage cotton sow {plants_pm 10} {sowing_depth 30} \
             {row_spacing 1000} {skiprow 0} {cultivar Siok}
  } elseif {"ozcot" == "oryza"} {
     apsimSendMessage cotton sow {cultivar Siok}
  } elseif {"ozcot" == "sorghum"} {
     apsimSendMessage cotton sow {plants 100} {sowing_depth 30} \
             {cultivar Siok} {row_spacing 1000} {skiprow 0} \
             {tiller_no_fertile [tiller_no_fertile]}
  } elseif {"ozcot" == "sugar"} {
     apsimSendMessage cotton sow {plants 100} {cultivar Siok} {sowing_depth 30}
  } else {
    error "Unknown crop module \"ozcot\"."
  }
}
```
        tclui Chickpea Sowing Rule: uiscript=source $apsuite/UserInterface/APSFarm/GenericSowingUI.tcl; state=Chickpea; crop=chickpea; date1=15-may; date2=10-jul; raincrit=15; rainnumdays=3; esw_amount=50; must_sow=no; cultivar=amethyst; plants=25; sowing_depth=30; row_spacing=500; fert_cost=???; criteria=variable; skipplant=0; skiprow=0; class=plant; module=plant
          ruletemplate Sowing rule - initialisation:
            # Support procedures
            # Can we plant a crop today?
            proc canPlant_[crop] {} {
              if {"[criteria]" == "variable"} {
                 set year [apsimGet year]; set day [apsimGet day]
                 set d1 [clock format [clock scan "[date1]-$year"] -format %j]
                 set d2 [clock format [clock scan "[date2]-$year"] -format %j]

                 if {"[must_sow]" == "yes" && $day == $d2} {return 1}

                 if {$d1 > $d2} {
                    set dateOK [expr $day >= $d1 || $day <= $d2]
                 } else {
                    set dateOK [expr $day >= $d1 && $day <= $d2]
                 }
                 set rainOK [expr [apsimGet rain\[[rainnumdays]\]] >= [raincrit]]
                 set eswOK [expr [apsimGet esw] >= [esw_amount]]
                 return [expr $dateOK && $rainOK && $eswOK]
              } elseif {"[criteria]" == "fixed"} {
                 set year [apsimGet year]; set day [apsimGet day]
                 set d1 [clock format [clock scan "[date1]-$year"] -format %j]
                 return [expr $day == $d1]
              } else {
                 error "Unknown sowing criteria \"[criteria]\"."
              }
              return "notreached"
            }

            # Plant a crop now
            proc sow_[crop] {} {
              if {"[module]" == "plant"} {
                 apsimSendMessage [crop] sow {plants [plants]} {sowing_depth [sowing_depth]} \
                         {cultivar [cultivar]} {row_spacing [row_spacing]} \
                         {skipplant [skipplant]} {skiprow [skiprow]} {crop_class [class]}
              } elseif {"[module]" == "cropmod"} {
                 apsimSendMessage [crop] sow {plants [density]} {sowing_depth [depth]} \
                         {cultivar [cultivar]} {row_spacing [row_spacing]} {skiprow [skiprow]}
              } elseif {"[module]" == "growth"} {
                 apsimSendMessage [crop] ???
              } elseif {"[module]" == "ozcot"} {
                 apsimSendMessage [crop] sow {plants_pm [plants_pm]} {sowing_depth [sowing_depth]} \
                         {row_spacing [row_spacing]} {skiprow [skiprow]} {cultivar [cultivar]}
              } elseif {"[module]" == "oryza"} {
                 apsimSendMessage [crop] sow {cultivar [cultivar]}
              } elseif {"[module]" == "sorghum"} {
                 apsimSendMessage [crop] sow {plants [plants]} {sowing_depth [sowing_depth]} \
                         {cultivar [cultivar]} {row_spacing [row_spacing]} {skiprow [skiprow]} \
                         {tiller_no_fertile [tiller_no_fertile]}
              } elseif {"[module]" == "sugar"} {
                 apsimSendMessage [crop] sow {plants [plants]} {cultivar [cultivar]} {sowing_depth [sowing_depth]}
              } else {
                error "Unknown crop module \"[module]\"."
              }
            }
          rule Rotation Sample (Directed Graph) Chickpea Sowing Rule.out - Sowing rule - initialisation
            on init:
```
# Support procedures
# Can we plant a crop today?
proc canPlant_chickpea {} {
  if {"variable" == "variable"} {
     set year [apsimGet year]; set day [apsimGet day]
     set d1 [clock format [clock scan "15-may-$year"] -format %j]
     set d2 [clock format [clock scan "10-jul-$year"] -format %j]

     if {"no" == "yes" && $day == $d2} {return 1}

     if {$d1 > $d2} {
        set dateOK [expr $day >= $d1 || $day <= $d2]
     } else {
        set dateOK [expr $day >= $d1 && $day <= $d2]
     }
     set rainOK [expr [apsimGet rain\[3\]] >= 15]
     set eswOK [expr [apsimGet esw] >= 50]
     return [expr $dateOK && $rainOK && $eswOK]
  } elseif {"variable" == "fixed"} {
     set year [apsimGet year]; set day [apsimGet day]
     set d1 [clock format [clock scan "15-may-$year"] -format %j]
     return [expr $day == $d1]
  } else {
     error "Unknown sowing criteria \"variable\"."
  }
  return "notreached"
}

# Plant a crop now
proc sow_chickpea {} {
  if {"plant" == "plant"} {
     apsimSendMessage chickpea sow {plants 25} {sowing_depth 30} \
             {cultivar amethyst} {row_spacing 500} \
             {skipplant 0} {skiprow 0} {crop_class plant}
  } elseif {"plant" == "cropmod"} {
     apsimSendMessage chickpea sow {plants [density]} {sowing_depth [depth]} \
             {cultivar amethyst} {row_spacing 500} {skiprow 0}
  } elseif {"plant" == "growth"} {
     apsimSendMessage chickpea ???
  } elseif {"plant" == "ozcot"} {
     apsimSendMessage chickpea sow {plants_pm } {sowing_depth 30} \
             {row_spacing 500} {skiprow 0} {cultivar amethyst}
  } elseif {"plant" == "oryza"} {
     apsimSendMessage chickpea sow {cultivar amethyst}
  } elseif {"plant" == "sorghum"} {
     apsimSendMessage chickpea sow {plants 25} {sowing_depth 30} \
             {cultivar amethyst} {row_spacing 500} {skiprow 0} \
             {tiller_no_fertile [tiller_no_fertile]}
  } elseif {"plant" == "sugar"} {
     apsimSendMessage chickpea sow {plants 25} {cultivar amethyst} {sowing_depth 30}
  } else {
    error "Unknown crop module \"plant\"."
  }
}
```
        tclui Wheat Sowing Rule: uiscript=source $apsuite/UserInterface/APSFarm/GenericSowingUI.tcl; state=Wheat; crop=wheat; date1=15-may; date2=10-jul; raincrit=25; rainnumdays=3; esw_amount=50; must_sow=no; cultivar=hartog; plants=100; sowing_depth=30; row_spacing=250; fert_cost=???; criteria=variable; skipplant=0; skiprow=0; class=plant; module=plant
          ruletemplate Sowing rule - initialisation:
            # Support procedures
            # Can we plant a crop today?
            proc canPlant_[crop] {} {
              if {"[criteria]" == "variable"} {
                 set year [apsimGet year]; set day [apsimGet day]
                 set d1 [clock format [clock scan "[date1]-$year"] -format %j]
                 set d2 [clock format [clock scan "[date2]-$year"] -format %j]

                 if {"[must_sow]" == "yes" && $day == $d2} {return 1}

                 if {$d1 > $d2} {
                    set dateOK [expr $day >= $d1 || $day <= $d2]
                 } else {
                    set dateOK [expr $day >= $d1 && $day <= $d2]
                 }
                 set rainOK [expr [apsimGet rain\[[rainnumdays]\]] >= [raincrit]]
                 set eswOK [expr [apsimGet esw] >= [esw_amount]]
                 return [expr $dateOK && $rainOK && $eswOK]
              } elseif {"[criteria]" == "fixed"} {
                 set year [apsimGet year]; set day [apsimGet day]
                 set d1 [clock format [clock scan "[date1]-$year"] -format %j]
                 return [expr $day == $d1]
              } else {
                 error "Unknown sowing criteria \"[criteria]\"."
              }
              return "notreached"
            }

            # Plant a crop now
            proc sow_[crop] {} {
              if {"[module]" == "plant"} {
                 apsimSendMessage [crop] sow {plants [plants]} {sowing_depth [sowing_depth]} \
                         {cultivar [cultivar]} {row_spacing [row_spacing]} \
                         {skipplant [skipplant]} {skiprow [skiprow]} {crop_class [class]}
              } elseif {"[module]" == "cropmod"} {
                 apsimSendMessage [crop] sow {plants [density]} {sowing_depth [depth]} \
                         {cultivar [cultivar]} {row_spacing [row_spacing]} {skiprow [skiprow]}
              } elseif {"[module]" == "growth"} {
                 apsimSendMessage [crop] ???
              } elseif {"[module]" == "ozcot"} {
                 apsimSendMessage [crop] sow {plants_pm [plants_pm]} {sowing_depth [sowing_depth]} \
                         {row_spacing [row_spacing]} {skiprow [skiprow]} {cultivar [cultivar]}
              } elseif {"[module]" == "oryza"} {
                 apsimSendMessage [crop] sow {cultivar [cultivar]}
              } elseif {"[module]" == "sorghum"} {
                 apsimSendMessage [crop] sow {plants [plants]} {sowing_depth [sowing_depth]} \
                         {cultivar [cultivar]} {row_spacing [row_spacing]} {skiprow [skiprow]} \
                         {tiller_no_fertile [tiller_no_fertile]}
              } elseif {"[module]" == "sugar"} {
                 apsimSendMessage [crop] sow {plants [plants]} {cultivar [cultivar]} {sowing_depth [sowing_depth]}
              } else {
                error "Unknown crop module \"[module]\"."
              }
            }
          rule Rotation Sample (Directed Graph) Wheat Sowing Rule.out - Sowing rule - initialisation
            on init:
```
# Support procedures
# Can we plant a crop today?
proc canPlant_wheat {} {
  if {"variable" == "variable"} {
     set year [apsimGet year]; set day [apsimGet day]
     set d1 [clock format [clock scan "15-may-$year"] -format %j]
     set d2 [clock format [clock scan "10-jul-$year"] -format %j]

     if {"no" == "yes" && $day == $d2} {return 1}

     if {$d1 > $d2} {
        set dateOK [expr $day >= $d1 || $day <= $d2]
     } else {
        set dateOK [expr $day >= $d1 && $day <= $d2]
     }
     set rainOK [expr [apsimGet rain\[3\]] >= 25]
     set eswOK [expr [apsimGet esw] >= 50]
     return [expr $dateOK && $rainOK && $eswOK]
  } elseif {"variable" == "fixed"} {
     set year [apsimGet year]; set day [apsimGet day]
     set d1 [clock format [clock scan "15-may-$year"] -format %j]
     return [expr $day == $d1]
  } else {
     error "Unknown sowing criteria \"variable\"."
  }
  return "notreached"
}

# Plant a crop now
proc sow_wheat {} {
  if {"plant" == "plant"} {
     apsimSendMessage wheat sow {plants 100} {sowing_depth 30} \
             {cultivar hartog} {row_spacing 250} \
             {skipplant 0} {skiprow 0} {crop_class plant}
  } elseif {"plant" == "cropmod"} {
     apsimSendMessage wheat sow {plants [density]} {sowing_depth [depth]} \
             {cultivar hartog} {row_spacing 250} {skiprow 0}
  } elseif {"plant" == "growth"} {
     apsimSendMessage wheat ???
  } elseif {"plant" == "ozcot"} {
     apsimSendMessage wheat sow {plants_pm [plants_pm]} {sowing_depth 30} \
             {row_spacing 250} {skiprow 0} {cultivar hartog}
  } elseif {"plant" == "oryza"} {
     apsimSendMessage wheat sow {cultivar hartog}
  } elseif {"plant" == "sorghum"} {
     apsimSendMessage wheat sow {plants 100} {sowing_depth 30} \
             {cultivar hartog} {row_spacing 250} {skiprow 0} \
             {tiller_no_fertile [tiller_no_fertile]}
  } elseif {"plant" == "sugar"} {
     apsimSendMessage wheat sow {plants 100} {cultivar hartog} {sowing_depth 30}
  } else {
    error "Unknown crop module \"plant\"."
  }
}
```
      outputfile: filename=Rotation Sample (Directed Graph).out; title=Rotation Sample (Directed Graph)
        variables
          variable:
            dd/mm/yyyy as Date  # Date (dd/mm/yyyy)
            yield
            biomass
        events Reporting Frequency: event=harvesting
