folder simulations: version=36; creator=Apsim 7.8-r3860
  simulation Rotation Sample
    metfile met: filename=%apsim%/Examples/MetFiles/Goond.met
    clock
      start_date = 1/01/1940  # Enter the start date of the simulation
      end_date = 31/12/1950  # Enter the end date of the simulation
    summaryfile
    area paddock
      cotton
      Soil: LocalName=Brigalow; Site=Kupunn; Region=South East Queensland
        Comment = oc and ph not measured  # Comments
        SoilType = Grey Vertosol  # Soil description
        NearestTown = Dalby, Q 4405
        NaturalVegetation = Brigalow, belah, wilga
        InitialWater Initial water: FractionFull=1; PercentMethod=FilledFromTop
        Water
          Thickness  BD    AirDry  LL15  DUL   SAT
          150        1.4   0.105   0.21  0.39  0.44
          150        1.39  0.189   0.21  0.39  0.44
          300        1.37  0.22    0.22  0.4   0.45
          300        1.36  0.25    0.25  0.41  0.46
          300        1.38  0.27    0.27  0.4   0.45
          300        1.39  0.31    0.31  0.39  0.44
          300        1.42  0.36    0.36  0.38  0.43
          SoilCrop Chickpea: LL=[0.21, 0.21, 0.22, 0.27, 0.29, 0.34, 0.38]; KL=[0.1, 0.1, 0.08, 0.06, 0.04, 0.02, 0.01]; XF=[1, 1, 1, 1, 1, 1, 1]
          SoilCrop Cotton: LL=[0.21, 0.21, 0.22, 0.25, 0.27, 0.31, 0.36]; KL=[0.1, 0.1, 0.1, 0.1, 0.09, 0.07, 0.05]; XF=[1, 1, 1, 1, 1, 1, 1]
          SoilCrop Sorghum: LL=[0.21, 0.21, 0.26, 0.26, 0.28, 0.34, 0.36]; KL=[0.1, 0.1, 0.1, 0.08, 0.06, 0.04, 0.02]; XF=[1, 1, 1, 1, 1, 1, 1]
          SoilCrop Wheat: LL=[0.21, 0.21, 0.25, 0.28, 0.31, 0.37, 0.38]; KL=[0.1, 0.1, 0.08, 0.06, 0.04, 0.02, 0.01]; XF=[1, 1, 1, 1, 1, 1, 1]
        SoilWater: SummerCona=3.5; SummerU=6; SummerDate=1-Nov; WinterCona=3.5; WinterU=6; WinterDate=1-Apr; DiffusConst=40; DiffusSlope=16; Salb=0.13; CN2Bare=73; CNRed=20; CNCov=0.8; Thickness=[150, 150, 300, 300, 300, 300, 300]; SWCON=[0.3, 0.3, 0.3, 0.3, 0.3, 0.3, 0.3]
        SoilOrganicMatter: RootCN=40; RootWt=200; SoilCN=12.5; EnrACoeff=7.4; EnrBCoeff=0.2
          Thickness  OC    FBiom  FInert
          150        1.24  0.03   0.4
          150        1.24  0.02   0.6
          300        1.25  0.01   0.8
          300        1.1   0.01   0.9
          300        0.71  0.01   0.95
          300        0.34  0.01   0.95
          300        0.26  0.01   0.95
        Analysis: Thickness=[150, 150, 300, 300, 300, 300, 300]; PH=[7, 7, 7, 7, 7, 7, 7]
        Sample Initial nitrogen
          Thickness  NO3    NH4
          150        6.500  0.600
          150        2.100  0.100
          300        2.100  0.100
          300        1.700  0.100
          300        1.700  0.100
          300        1.700  0.100
          300        1.700  0.100
      surfaceom SurfaceOrganicMatter
        PoolName = wheat_stubble  # Organic Matter pool name
        type = wheat  # Organic Matter type
        mass = 1000  # Initial surface residue (kg/ha)
        cnr = 80  # C:N ratio of initial residue
        standing_fraction = 0  # Fraction of residue standing
      fertiliser
      chickpea
      wheat
      cotton2 cotton
        initsection
          crop_type = cotton
          leaf_res_n_conc = 0.02
          hucut = 40  # oC
          baset = 12  # oC
          open_def = 60  # %
          a_root_leaf = 1.01
          a_stem_leaf = 1.25
          e_par = 2.5  # g/MJ
          specific_lw = 58  # g/m^2
          t_opt = 25  # oC
          t_base = 8  # oC
          wt_area_max = 150
          embryo = 0.75  # g
          f_leaf = 0.6
          f_stem = 0.15
          f_root = 0.25
          elevation_default = 200  # m
          wlog_assimilate_red = 0.2
          wlog_carcap_red = 0.2
          watlog_c = 0.87
          watlog_n = 0.87
          wlog_carcap_red_stress = 0.01
          smi_affect_wlog = 0.75
          days_relief_wlog = 7  # days
          frost_kill_immediate = 2  # oC
          rtdep_max = 130  # cm
          harvest_n_frac = 0.85
          cutout_smi_crit = 0.75
          cutout_smi_days = 5  # days
          cutout_smi_site_red = 0.1
          epcoef1 = 3.051
          epcoef2 = 2.436
          epcoef_smi_crit = 0.5
          fbwstr_low = 0
          fbwstr_high = 0.5
          fbwstr_a = 1
          fbnstr_low = 0
          fbnstr_high = 0.5
          fbnstr_a = 1
          relp_smi_crit = 0.5
          relp_intercept = 0.25
          relp_slope = 0.864
          relp_low = 0
          relp_high = 1
          relp_a = 0.5
          vsnstr_low = 0
          vsnstr_high = 0.9
          vsnstr_a = 1
          flfsmi_low = 0
          flfsmi_high = 0.5
          flfsmi_a = 1
          vlnstr_low = 0
          vlnstr_high = 0.9
          vlnstr_a = 1
          fw_low = 0
          fw_high = 0.25
          fw_a = 1
          adjust_low = 0
          adjust_high = 5
          adjust_a = 1
          fwstrs_low = 0
          fwstrs_high = 0.5
          fwstrs_a = 4
          smi_delay_crit = 0.25
          cold_shock_delay_crit = 11  # oC
          cold_shock_delay = 5.2  # dd
          fert_crit = 1  # kg/ha
          fert_detect = 10  # kg/ha
          days_since_fert_max = 100  # days
          cultivar_default = S71BR
          cotton_co2 = 400  # ppm
          rootExpansionDelay = 33
          useDDsumTo1stSq = false
          init cultivars: array=T
            element
              cultivar = _Default_S71BR
              percent_l = 40
              scboll = 5
              respcon = 0.01593
              sqcon = 0.0217
              fcutout = 0.5411
              flai = 0.52
              DDISQ = 402
              TIPOUT = 52
              FRUDD = [50, 161, 307, 338, 484, 630, 848, 1071]
              BLTME = [0, 0, 0, 0.07, 0.21, 0.33, 0.55, 1]
              WT = [0.0104, 0.0272, 0.1441, 0.0988, 0.5042, 0.9617, 1, 0.5785]
              dlds_max = 0.12
              rate_emergence = 1
              popcon = 0.03633
              fburr = 1.23
              ACOTYL = 525
              RLAI = 0.01
              BckGndRetn = 0.9
            element
              cultivar = S71
              percent_l = 42
              scboll = 5.2
              respcon = 0.01593
              sqcon = 0.0217
              fcutout = 0.5411
              flai = 0.52
              DDISQ = 402
              TIPOUT = 52
              FRUDD = [50, 161, 307, 338, 484, 630, 848, 1071]
              BLTME = [0, 0, 0, 0.07, 0.21, 0.33, 0.55, 1]
              WT = [0.0104, 0.0272, 0.1441, 0.0988, 0.5042, 0.9617, 1, 0.5785]
              dlds_max = 0.12
              rate_emergence = 1
              popcon = 0.03633
              fburr = 1.23
              ACOTYL = 525
              RLAI = 0.01
              BckGndRetn = 0.8
            element
              cultivar = S71BR
              percent_l = 40
              scboll = 5
              respcon = 0.01593
              sqcon = 0.0217
              fcutout = 0.5411
              flai = 0.52
              DDISQ = 402
              TIPOUT = 52
              FRUDD = [50, 161, 307, 338, 484, 630, 848, 1071]
              BLTME = [0, 0, 0, 0.07, 0.21, 0.33, 0.55, 1]
              WT = [0.0104, 0.0272, 0.1441, 0.0988, 0.5042, 0.9617, 1, 0.5785]
              dlds_max = 0.12
              rate_emergence = 1
              popcon = 0.03633
              fburr = 1.23
              ACOTYL = 525
              RLAI = 0.01
              BckGndRetn = 0.9
            element
              cultivar = Siok
              percent_l = 42
              scboll = 4.5
              respcon = 0.01593
              sqcon = 0.0228
              fcutout = 0.5411
              flai = 0.52
              DDISQ = 420
              TIPOUT = 52
              FRUDD = [50, 180, 350, 380, 520, 660, 870, 1100]
              BLTME = [0, 0, 0, 0.07, 0.21, 0.33, 0.55, 1]
              WT = [0.0104, 0.0272, 0.1441, 0.0988, 0.5042, 0.9617, 1, 0.5785]
              dlds_max = 0.12
              rate_emergence = 1
              popcon = 0.03633
              fburr = 1.23
              ACOTYL = 525
              RLAI = 0.01
              BckGndRetn = 0.9
            element
              cultivar = Sica
              percent_l = 40
              scboll = 5.5
              respcon = 0.02306
              sqcon = 0.0206
              fcutout = 0.4789
              flai = 0.87
              DDISQ = 420
              TIPOUT = 52
              FRUDD = [50, 180, 350, 380, 520, 660, 870, 1100]
              BLTME = [0, 0, 0, 0.07, 0.21, 0.33, 0.55, 1]
              WT = [0.0104, 0.0272, 0.1441, 0.0988, 0.5042, 0.9617, 1, 0.5785]
              dlds_max = 0.12
              rate_emergence = 1
              popcon = 0.03633
              fburr = 1.23
              ACOTYL = 525
              RLAI = 0.01
              BckGndRetn = 0.9
          init cultivars: same as Rotation Sample.paddock.cotton.initsection.cultivars
      folder Manager folder
        manager Rotations
          # Fallow options
          SummerFallowName = sf  # Enter summer fallow name
          SummerFallowEndDate = 15-mar  # Enter summer fallow END date (dd-mmm)
          WinterFallowName = wf  # Enter winter fallow name
          WinterFallowEndDate = 23-aug  # Enter winter fallow END date (dd-mmm)
          # Crop rotation sequence
          crop1 = cotton  # Enter 1st crop
          crop2 = chickpea  # Enter 2nd crop
          crop3 = sf  # Enter 3rd crop
          crop4 = wheat  # Enter 4th crop
          crop5 = sf  # Enter 5th crop
          crop6 = wf  # Enter 6th crop
          crop7 = nil  # Enter 7th crop
          crop8 = nil  # Enter 8th crop
          crop9 = nil  # Enter 9th crop
          crop10 = nil  # Enter 10th crop
          crop11 = nil  # Enter 11th crop
          crop12 = nil  # Enter 12th crop
          crop13 = nil  # Enter 13th crop
          crop14 = nil  # Enter 14th crop
          crop15 = nil  # Enter 15th crop
          crop16 = nil  # Enter 16th crop
          crop17 = nil  # Enter 17th crop
          crop18 = nil  # Enter 18th crop
          crop19 = nil  # Enter 19th crop
          crop20 = nil  # Enter 20th crop
          on init:
```
         NextCropIndex = 1
         NextCrop = ' '
         ChooseNextCrop = 'yes'
         SummerFallowIn = 'no'
         WinterFallowIn = 'no'
         FallowIn = 'no'
```
          on start_of_day:
```
      if (ChooseNextCrop = 'yes') then
         if (NextCropIndex = 1) then
            NextCrop = '[crop1]'
         elseif (NextCropIndex = 2) then
            NextCrop = '[crop2]'
         elseif (NextCropIndex = 3) then
            NextCrop = '[crop3]'
         elseif (NextCropIndex = 4) then
            NextCrop = '[crop4]'
         elseif (NextCropIndex = 5) then
            NextCrop = '[crop5]'
         elseif (NextCropIndex = 6) then
            NextCrop = '[crop6]'
         elseif (NextCropIndex = 7) then
            NextCrop = '[crop7]'
         elseif (NextCropIndex = 8) then
            NextCrop = '[crop8]'
         elseif (NextCropIndex = 9) then
            NextCrop = '[crop9]'
         elseif (NextCropIndex = 10) then
            NextCrop = '[crop10]'
         elseif (NextCropIndex = 11) then
            NextCrop = '[crop11]'
         elseif (NextCropIndex = 12) then
            NextCrop = '[crop12]'
         elseif (NextCropIndex = 13) then
            NextCrop = '[crop13]'
         elseif (NextCropIndex = 14) then
            NextCrop = '[crop14]'
         elseif (NextCropIndex = 15) then
            NextCrop = '[crop15]'
         elseif (NextCropIndex = 16) then
            NextCrop = '[crop16]'
         elseif (NextCropIndex = 17) then
            NextCrop = '[crop17]'
         elseif (NextCropIndex = 18) then
            NextCrop = '[crop18]'
         elseif (NextCropIndex = 19) then
            NextCrop = '[crop19]'
         elseif (NextCropIndex = 20) then
            NextCrop = '[crop20]'
         endif
         if (NextCrop = 'nil' or NextCrop = ' ') then
            NextCrop = '[crop1]'
            NextCropIndex = 1
         endif
         NextCropIndex = NextCropIndex + 1
         ChooseNextCrop = 'no'
      endif
      ! if the next crop is due to be a fallow and we're within the
      ! correct date range then put a fallow in.
      if (NextCrop = '[WinterFallowName]') then
         if (paddock_is_fallow() = 1 and FallowIn = 'no') then
            if (date_within('[SummerFallowEndDate], [WinterFallowEndDate]') then
               WinterFallowIn = 'yes'
               FallowIn = 'yes'
               ChooseNextCrop = 'yes'
            endif
         endif
      elseif (NextCrop = '[SummerFallowName]') then
         if (paddock_is_fallow() = 1 and FallowIn = 'no') then
            if (date_within('[WinterFallowEndDate], [SummerFallowEndDate]') then
               SummerFallowIn = 'yes'
               FallowIn = 'yes'
               ChooseNextCrop = 'yes'
            endif
         endif
      endif

      ! if we currently have a fallow in and we're at the end of the fallow window
      ! then remove the fallow.
      if (WinterFallowIn = 'yes' and today = date('[WinterFallowEndDate]')+1) then
         WinterFallowIn = 'no'
         FallowIn = 'no'
      endif
      if (SummerFallowIn = 'yes' and today = date('[SummerFallowEndDate]')+1) then
         SummerFallowIn = 'no'
         FallowIn = 'no'
      endif
```
        manager CottonSowing
          # Sowing criteria
          date1 = 10-Oct  # Enter sowing window START date (dd-mmm)
          date2 = 10-Dec  # Enter sowing window END date (dd-mmm)
          must_sow = yes  # Must sow?
          raincrit = 10  # Amount of rainfall
          rainnumdays = 3  # Number of days of rainfall
          esw_amount = 100  # Enter minimum allowable available soil water (mm)
          # Sowing parameters
          crop = cotton  # Enter name of crop to sow
          density = 10  # Enter sowing density (plants/m row)
          depth = 30  # Enter sowing depth (mm)
          cultivar = Siok  # Enter cultivar
          row_spacing = 1000  # Enter row spacing (mm)
          skip = 0  # Enter Skip Row (0=solid, 1=single, 2=double)
          on start_of_day:
```
      if (paddock_is_fallow() = 1 and FallowIn <> 'yes' and (NextCrop = 0 or NextCrop = '[crop]')) then
         if (date_within('[date1], [date2]') = 1) then
            if (rain[[rainnumdays]] >= [raincrit] AND esw >= [esw_amount]) OR
                ('[must_sow]' = 'yes' AND today = date('[date2]'))) THEN
               ChooseNextCrop = 'yes'   ! for rotations
               [crop] sow plants_pm =[density], sowing_depth = [depth], cultivar = [cultivar], row_spacing = [row_spacing], skiprow = [skip]
            endif
            if today = date('[date2]') then
               ChooseNextCrop = 'yes'
            endif
         endif
      endif
```
        manager ChickPeaSowing
          # Sowing criteria
          date1 = 15-may  # Enter sowing window START date (dd-mmm)
          date2 = 10-jul  # Enter sowing window END date (dd-mmm)
          must_sow = no  # Must sow?
          raincrit = 25  # Amount of rainfall
          rainnumdays = 3  # Number of days of rainfall
          esw_amount = 50  # Enter minimum allowable available soil water (mm)
          # Sowing parameters
          crop = chickpea  # Enter name of crop to sow
          density = 25  # Enter sowing density (plants/m2)
          depth = 30  # Enter sowing depth (mm)
          cultivar = amethyst  # Enter cultivar
          class = plant  # Enter crop growth class
          row_spacing = 500  # Enter row spacing (mm)
          on start_of_day:
```
      if (paddock_is_fallow() = 1 and FallowIn <> 'yes' and (NextCrop = 0 or NextCrop = '[crop]')) then
         if (date_within('[date1], [date2]') = 1) then
            if (rain[[rainnumdays]] >= [raincrit] AND esw >= [esw_amount]) OR
                ('[must_sow]' = 'yes' AND today = date('[date2]'))) THEN
               ChooseNextCrop = 'yes'   ! for rotations
               [crop] sow plants =[density], sowing_depth = [depth], cultivar = [cultivar], row_spacing = [row_spacing], crop_class = [class]
            endif
            if today = date('[date2]') then
               ChooseNextCrop = 'yes'
            endif
         endif
      endif
```
        manager WheatSowing
          # Sowing criteria
          date1 = 15-may  # Enter sowing window START date (dd-mmm)
          date2 = 10-jul  # Enter sowing window END date (dd-mmm)
          must_sow = no  # Must sow?
          raincrit = 25  # Amount of rainfall
          rainnumdays = 3  # Number of days of rainfall
          esw_amount = 50  # Enter minimum allowable available soil water (mm)
          # Sowing parameters
          crop = wheat  # Enter name of crop to sow
          density = 100  # Enter sowing density (plants/m2)
          depth = 30  # Enter sowing depth (mm)
          cultivar = hartog  # Enter cultivar
          class = plant  # Enter crop growth class
          row_spacing = 250  # Enter row spacing (mm)
          on start_of_day:
          script: same as in Rotation Sample.paddock.Manager folder.ChickPeaSowing
        manager Fertilise at sowing
          # When should fertiliser be applied
          modulename = wheat  # On which module should the event come from
          eventname = sowing  # On which event should fertiliser be applied
          # Fertiliser application details
          fertmodule = fertiliser  # Module used to apply the fertiliser
          fert_amount_sow = 150  # Amount of starter fertiliser at sowing (kg/ha)
          fert_type_sow = urea_N  # Sowing fertiliser type
          on [modulename].[eventname]:
```
        [fertmodule] apply amount = [fert_amount_sow] (kg/ha), depth = 50 (mm), type = [fert_type_sow]
```
        manager CottonHarvesting
          # Harvesting criteria
          crop = cotton  # Enter name of crop to harvest when ripe
          on end_of_day:
```
          !!  cotton defoliation
          if ([crop].stageName = 'mature'  and  [crop].defol_das = 0 ) then
              [crop] defoliate
          endif
             
          !! cotton harvest
          if ([crop].stageName = 'harvest_ripe' ) then
              [crop] harvest
              [crop] end_crop
          endif
```
        manager ChickPeaHarvesting
          # Harvesting criteria
          crop = chickpea  # Enter name of crop to harvest when ripe
          on end_of_day:
```
           if [crop].StageName = 'harvest_ripe' or [crop].plant_status = 'dead' then
              [crop]  harvest
              [crop]  end_crop
           endif
```
        manager WheatHarvesting
          # Harvesting criteria
          crop = wheat  # Enter name of crop to harvest when ripe
          on end_of_day:
          script: same as in Rotation Sample.paddock.Manager folder.ChickPeaHarvesting
      outputfile: filename=Rotation Sample.out; title=Rotation Sample
        variables
          variables: dd/mm/yyyy as Date, cotton.dm as Cotton.Biomass, biomass, lai
        events Reporting Frequency: event=Daily  # End of day
