folder Simulations: version=32
  folder Scenario
    simulation Control
      metfile met: filename=%apsim%\Examples\MetFiles\Dinajpur.met
      manager ClimateControl
        # Climate Control Window
        date1 = 1-jan  # Enter window START date (dd-mmm)
        date2 = 31-dec  # Enter window END date (dd-mmm)
        # Climate Change Parameters
        MaxtChange = 0  # Change in maximum temperature (oC)
        MintChange = 0  # Change in minimum temperature (oC)
        RainChange = 0  # Relative change in daily rainfall (%)
        RadnChange = 0  # Relative change in daily radiation (%)
        CO2 = 350  # Atmospheric CO2 Concentration (ppm)
        on prenewmet:
```
!  Adjust daily temperatures, rainfall and radiation up or down according to user-defined amounts
! To apply different levels of climate control to different times of year add multiple copies of this logic into your simulation and change the window.

if (date_within('[date1], [date2]') = 1) then
   maxt = maxt + [MaxtChange]
   mint = mint + [MintChange]
   rain = rain + rain * [RainChange] / 100
   radn = radn + radn * [RadnChange] / 100
   co2 = [CO2]
 endif
```
        on Init:
```
co2 = [CO2]
```
      clock
        start_date = 01/01/1959  # Select the start date of the simulation
        end_date = 31/12/2009  # Select the end date of the simulation
      summaryfile
      area paddock
        soil Silt: Site=North Joynags; Region=Bhola; State=Southern Bangladesh; Country=Bangladesh
          SoilType = Silt  # Soil description
          NearestTown = Bhola
          ApsoilNumber = 673
          Latitude = 22.585  # Latitude (WGS84)
          Longitude = 90.666  # Longitude (WGS84)
          LocationAccuracy = +/- 50m (NB: northern hemisphere site)
          DataSource = Collected as part of ACIAR project 'Expanding Rabi season cropping in southern Bangladesh'
          Comments = 2006/07 field measured DUL using wettest profile from Anthesis measurements, estimated CLL (due to the difficulty of in-field CLL measurement it is likely that CLL% is lower than this estimate)
          Water
            Layer:
              Thickness (mm)  KS (mm/day)  BD (g/cc)  Airdry (mm/mm)  LL15 (mm/mm)  DUL (mm/mm)  SAT (mm/mm)
              150             24           1.416      0.118           0.235         0.386        0.436
              150             24           1.414      0.195           0.243         0.387        0.437
              300             24           1.351      0.282           0.282         0.41         0.46
              300             24           1.32       0.282           0.282         0.422        0.472
              300             24           1.32       0.282           0.282         0.422        0.472
              300             1            1.32       0.282           0.282         0.422        0.492
            SoilCrop wheat
              Layer:
                Thickness (mm)  ll (mm/mm)  kl (/day)  xf (0-1)
                150             0.235       0.06       1
                150             0.243       0.06       1
                300             0.282       0.04       1
                300             0.32        0.04       1
                300             0.36        0.03       1
                300             0.4         0.02       1
          SoilWat: SummerCona=3; SummerU=4; SummerDate=1-Apr; WinterCona=2.5; WinterU=3.5; WinterDate=1-Dec; DiffusConst=40; DiffusSlope=16; Salb=0.14; Cn2Bare=94; CnRed=20; CnCov=0.8
            Layer:
              Thickness (mm)  SWCON (0-1)
              150             0.3
              150             0.3
              300             0.3
              300             0.3
              300             0.3
              300             0.3
          SoilOrganicMatter
            Layer:
              Thickness (mm)  OC (Walkley Black %)  FBIOM (0-1)  FINERT (0-1)
              150             1.5                   0.04         0.4
              150             1.2                   0.02         0.6
              300             0.75                  0.02         0.8
              300             0.38                  0.02         0.9
              300             0.23                  0.01         1
              300             0.15                  0.01         1
            RootCn = 40
            RootWt = 1500
            SoilCn = 12.5
            EnrACoeff = 7.4
            EnrBCoeff = 0.2
          Analysis
            Layer:
              Thickness (mm)  Texture  PH (1:5 water)
              150             Silt     6.5
              150             Silt     7
              300             Silt     7.4
              300             Silt     8.1
              300             Silt     8.3
              300             Silt     8.5
          InitWater: RelativeTo=ll15
            PercentMethod: Percent=1; Distributed=Evenly distributed
          Sample Initial nitrogen
            Layer:
              Thickness (mm)  no3 (kg/ha)  nh4 (kg/ha)
              200             6            4
              1800            4            1
        folder Manager folder
          manager Sow using a variable rule
            # Sowing criteria
            date1 = 8-dec  # Enter sowing window START date (dd-mmm)
            date2 = 8-dec  # Enter sowing window END date (dd-mmm)
            must_sow = yes  # Must sow?
            raincrit = 30  # Amount of rainfall
            rainnumdays = 3  # Number of days of rainfall
            esw_amount = 200  # Enter minimum allowable available soil water (mm)
            # Sowing parameters
            crop = wheat  # Enter name of crop to sow
            density = 100  # Enter sowing density (plants/m2)
            depth = 30  # Enter sowing depth (mm)
            cultivar = prodip  # Enter cultivar
            class = plant  # Enter crop growth class
            row_spacing = 250  # Enter row spacing (mm)
            on start_of_day:
```
      if (paddock_is_fallow() = 1 and FallowIn <> 'yes' and (NextCrop = 0 or NextCrop = '[crop]')) then
         if (date_within('[date1], [date2]') = 1) then
            if (rain[[rainnumdays]] >= [raincrit] AND esw >= [esw_amount]) OR
                ('[must_sow]' = 'yes' AND today = date('[date2]'))) THEN
               ChooseNextCrop = 'yes'   ! for rotations
               [crop] sow Population =[density], sowing_depth = [depth], cultivar = [cultivar], row_spacing = [row_spacing], crop_class = [class]
            endif
            if today = date('[date2]') then
               ChooseNextCrop = 'yes'
            endif
         endif
      endif
```
          manager Harvesting rule
            # Harvesting criteria
            crop = wheat  # Enter name of crop to harvest when ripe
            on end_of_day:
```
           if ('[crop]' = 'cotton') then
              if ([crop].ozcot_status > 0) then
                  [crop] harvest
              endif
           elseif ([crop].StageName = 'harvest_ripe' or [crop].plant_status = 'dead') then
              [crop]  harvest
              [crop]  end_crop
           endif
```
          manager Fertilise at sowing
            # When should fertiliser be applied
            modulename = wheat  # On which module should the event come from
            eventname = sowing  # On which event should fertiliser be applied
            # Fertiliser application details
            fertmodule = Fertiliser  # Module used to apply the fertiliser
            fert_amount_sow = 40  # Amount of starter fertiliser at sowing (kg/ha)
            fert_type_sow = urea_N  # Sowing fertiliser type
            on [modulename].[eventname]:
```
        [fertmodule] apply amount = [fert_amount_sow] (kg/ha), depth = 50 (mm), type = [fert_type_sow]
```
          manager Fertilise and Irrigate Rabi crop
            croptype = wheat
            cropdas = 20  # DAS to apply fertiliser and irrigation
            # Fertiliser application details
            fertmodule = Fertiliser  # Module used to apply the fertiliser
            fert_amount = 30  # Amount of fertiliser to apply (kg/ha)
            fert_type = urea_N  # Fertiliser type
            # Irrigation application details
            irrig_amount = 60  # Amount of irrigation to apply
            on start_of_day:
```
   if [croptype].daysaftersowing = [cropdas] then        
         [fertmodule] apply amount = [fert_amount] (kg/ha), depth = 50 (mm), type = [fert_type] (mm)
         irrigation apply amount = [irrig_amount] (mm) 
         tot_irrig = 0              
    endif

    tot_irrig = tot_irrig + irrig_amount
```
          manager Fertilise and Irrigate Rabi crop1
            croptype = wheat
            cropdas = 40  # DAS to apply fertiliser and irrigation
            # Fertiliser application details
            fertmodule = Fertiliser  # Module used to apply the fertiliser
            fert_amount = 30  # Amount of fertiliser to apply (kg/ha)
            fert_type = urea_N  # Fertiliser type
            # Irrigation application details
            irrig_amount = 60  # Amount of irrigation to apply
            on start_of_day:
            script: same as in Scenario.Control.paddock.Manager folder.Fertilise and Irrigate Rabi crop
          manager Irrigate at sowing
            # When should irrigation be applied
            modulename = wheat  # The module the event come from
            eventname = sowing  # Which event should irrigation be applied
            # Irrigation application details
            irrigatemodule = Irrigation  # Module used to apply the irrigation
            irrig_amount_evt = 60  # Amount of irrigation to apply (mm)
            on [modulename].[eventname]:
```
         if ([irrig_amount_evt] > 0) then
            '[irrigatemodule]' apply amount = [irrig_amount_evt] (mm)
         endif
```
          manager Rabi residue
            # When should tillage be performed
            modulename = wheat  # The module the event come from
            eventname = harvesting  # On which event should tillage be done
            # Tillage details
            surfaceommodule = SurfaceOrganicMatter  # Module used to apply the tillage
            tillage_type = user_defined
            tillage_depth = 0  # User_defined depth of seedbed preparation (mm)
            tillage_f_incorp = .8  # User_defined fraction of surface residues to incorporate (0-1)
            on [modulename].[eventname]:
```
            '[surfaceommodule]' tillage type = [tillage_type], f_incorp = [tillage_f_incorp] (), tillage_depth = [tillage_depth]
```
          tracker
            variable:
              sum of rain on start_of_day from sowing to now as RainSinceSowing
              sum of ep on end_of_day from sowing to now as Transp
              sum of es on end_of_day from sowing to now as SoilEvap
          manager Reset water, nitrogen and surfaceOM on sowing
            # When should a reset be done
            modulename = wheat  # The module the event is to come from
            eventname = sowing  # On which event should a reset be done
            # Reset details
            soilmodule = Silt  # Name of your soil module
            surfaceommodule = SurfaceOrganicMatter  # Name of your surface organic matter module
            resetWater = yes  # Reset soil water?
            resetNitrogen = yes  # Reset soil nitrogen?
            resetSurfaceOM = yes  # Reset surface organic matter?
            on [modulename].[eventname]:
```
            resetWater = '[resetWater]'
            resetNitrogen  = '[resetNitrogen]'
            resetSurfaceOM = '[resetSurfaceOM]'
            if (resetWater = 'yes') then
                '[soilmodule] Water' reset
            endif
            if (resetNitrogen = 'yes') then
                '[soilmodule] Nitrogen' reset
            endif
            if (resetSurfaceOM = 'yes') then
                '[surfaceommodule]' reset
            endif
            if (resetWater = 'yes' or resetNitrogen = 'yes' or resetSurfaceOM = 'yes') then
               act_mods reseting
            endif
```
        irrigation
          automatic_irrigation = off
          asw_depth = 600  # Depth to which ASW is calculated. (mm)
          crit_fr_asw = 0.5  # Fraction of ASW below which irrigation is applied (0-1.0)
          irrigation_efficiency = 1  # Efficiency of the irrigation. (0-1.0)
          default_no3_conc = 0.0  # Nitrate concentration (ppm N)
          default_nh4_conc = 0.0  # Ammonium concentration (ppm N)
          default_cl_conc = 0.0  # Chloride concentration (ppm Cl)
        rice
        wheat
        surfaceom SurfaceOrganicMatter
          PoolName = rice_stubble  # Organic Matter pool name
          type = rice  # Organic Matter type
          mass = 0  # Initial surface residue (kg/ha)
          cnr = 80.0  # C:N ratio of initial residue
          standing_fraction = 0.0  # Fraction of residue standing
        fertiliser
        pond
          algae_present = 0  # is there algae present in this pond (0 or 1)
          CEC = 30.0  # surface soil cation exchange capacity
        outputfile: filename=Control.out; title=Control
          variables
            variables: dd/mm/yyyy as Date, year, day, wheat.yield as wheat_yield, wheat.biomass as wheat_biom, esw, no3(), RainSinceSowing, Transp, SoilEvap
          events Reporting Frequency: event=harvesting
    simulation C450
      metfile met: filename=%apsim%\Examples\MetFiles\Dinajpur.met
      manager ClimateControl
        # Climate Control Window
        date1 = 1-jan  # Enter window START date (dd-mmm)
        date2 = 31-dec  # Enter window END date (dd-mmm)
        # Climate Change Parameters
        MaxtChange = 0  # Change in maximum temperature (oC)
        MintChange = 0  # Change in minimum temperature (oC)
        RainChange = 0  # Relative change in daily rainfall (%)
        RadnChange = 0  # Relative change in daily radiation (%)
        CO2 = 450  # Atmospheric CO2 Concentration (ppm)
        on prenewmet:
        script: same as in Scenario.Control.ClimateControl
        on Init:
```
co2 = [CO2]
```
      clock
        start_date = 01/01/1959  # Select the start date of the simulation
        end_date = 31/12/2009  # Select the end date of the simulation
      summaryfile
      area paddock
        soil Silt: same as Scenario.Control.paddock.Silt
        folder Manager folder: same as Scenario.Control.paddock.Manager folder
        irrigation: same as Scenario.Control.paddock.Irrigation
        rice
        wheat
        surfaceom SurfaceOrganicMatter
          PoolName = rice_stubble  # Organic Matter pool name
          type = rice  # Organic Matter type
          mass = 0  # Initial surface residue (kg/ha)
          cnr = 80.0  # C:N ratio of initial residue
          standing_fraction = 0.0  # Fraction of residue standing
        fertiliser
        pond
          algae_present = 0  # is there algae present in this pond (0 or 1)
          CEC = 30.0  # surface soil cation exchange capacity
        outputfile: filename=C450.out; title=C450
          variables
            variables: dd/mm/yyyy as Date, year, day, wheat.yield as wheat_yield, wheat.biomass as wheat_biom, esw, no3(), RainSinceSowing, Transp, SoilEvap
          events Reporting Frequency: event=harvesting
    simulation C450+T2
      metfile met: filename=%apsim%\Examples\MetFiles\Dinajpur.met
      manager ClimateControl
        # Climate Control Window
        date1 = 1-jan  # Enter window START date (dd-mmm)
        date2 = 31-dec  # Enter window END date (dd-mmm)
        # Climate Change Parameters
        MaxtChange = 0  # Change in maximum temperature (oC)
        MintChange = 2  # Change in minimum temperature (oC)
        RainChange = 0  # Relative change in daily rainfall (%)
        RadnChange = 0  # Relative change in daily radiation (%)
        CO2 = 450  # Atmospheric CO2 Concentration (ppm)
        on prenewmet:
        script: same as in Scenario.Control.ClimateControl
        on Init:
```
co2 = [CO2]
```
      clock
        start_date = 01/01/1959  # Select the start date of the simulation
        end_date = 31/12/2009  # Select the end date of the simulation
      summaryfile
      area paddock
        soil Silt: same as Scenario.Control.paddock.Silt
        folder Manager folder: same as Scenario.Control.paddock.Manager folder
        irrigation: same as Scenario.Control.paddock.Irrigation
        rice
        wheat
        surfaceom SurfaceOrganicMatter
          PoolName = rice_stubble  # Organic Matter pool name
          type = rice  # Organic Matter type
          mass = 0  # Initial surface residue (kg/ha)
          cnr = 80.0  # C:N ratio of initial residue
          standing_fraction = 0.0  # Fraction of residue standing
        fertiliser
        pond
          algae_present = 0  # is there algae present in this pond (0 or 1)
          CEC = 30.0  # surface soil cation exchange capacity
        outputfile: filename=C450+T2.out; title=C450+T2
          variables
            variables: dd/mm/yyyy as Date, year, day, wheat.yield as wheat_yield, wheat.biomass as wheat_biom, esw, no3(), RainSinceSowing, Transp, SoilEvap
          events Reporting Frequency: event=harvesting
    simulation C450+T2-R10
      metfile met: filename=%apsim%\Examples\MetFiles\Dinajpur.met
      manager ClimateControl
        # Climate Control Window
        date1 = 1-jan  # Enter window START date (dd-mmm)
        date2 = 31-dec  # Enter window END date (dd-mmm)
        # Climate Change Parameters
        MaxtChange = 0  # Change in maximum temperature (oC)
        MintChange = 2  # Change in minimum temperature (oC)
        RainChange = -10  # Relative change in daily rainfall (%)
        RadnChange = 0  # Relative change in daily radiation (%)
        CO2 = 450  # Atmospheric CO2 Concentration (ppm)
        on prenewmet:
        script: same as in Scenario.Control.ClimateControl
        on Init:
```
co2 = [CO2]
```
      clock
        start_date = 01/01/1959  # Select the start date of the simulation
        end_date = 31/12/2009  # Select the end date of the simulation
      summaryfile
      area paddock
        soil Silt: same as Scenario.Control.paddock.Silt
        folder Manager folder
          manager Sow using a variable rule: same as Scenario.Control.paddock.Manager folder.Sow using a variable rule
          manager Harvesting rule: same as Scenario.Control.paddock.Manager folder.Harvesting rule
          manager Fertilise at sowing: same as Scenario.Control.paddock.Manager folder.Fertilise at sowing
          manager Fertilise and Irrigate Rabi crop: same as Scenario.Control.paddock.Manager folder.Fertilise and Irrigate Rabi crop
          manager Fertilise and Irrigate Rabi crop1
            croptype = wheat
            cropdas = 40  # DAS to apply fertiliser and irrigation
            # Fertiliser application details
            fertmodule = Fertiliser  # Module used to apply the fertiliser
            fert_amount = 30  # Amount of fertiliser to apply (kg/ha)
            fert_type = urea_N  # Fertiliser type
            # Irrigation application details
            irrig_amount = 0  # Amount of irrigation to apply
            on start_of_day:
            script: same as in Scenario.Control.paddock.Manager folder.Fertilise and Irrigate Rabi crop
          manager Irrigate at sowing: same as Scenario.Control.paddock.Manager folder.Irrigate at sowing
          manager Rabi residue: same as Scenario.Control.paddock.Manager folder.Rabi residue
          tracker
            variable:
              sum of rain on start_of_day from sowing to now as RainSinceSowing
              sum of ep on end_of_day from sowing to now as Transp
              sum of es on end_of_day from sowing to now as SoilEvap
          manager Reset water, nitrogen and surfaceOM on sowing: same as Scenario.Control.paddock.Manager folder.Reset water, nitrogen and surfaceOM on sowing
        irrigation: same as Scenario.Control.paddock.Irrigation
        rice
        wheat
        surfaceom SurfaceOrganicMatter
          PoolName = rice_stubble  # Organic Matter pool name
          type = rice  # Organic Matter type
          mass = 0  # Initial surface residue (kg/ha)
          cnr = 80.0  # C:N ratio of initial residue
          standing_fraction = 0.0  # Fraction of residue standing
        fertiliser
        pond
          algae_present = 0  # is there algae present in this pond (0 or 1)
          CEC = 30.0  # surface soil cation exchange capacity
        outputfile: filename=C450+T2-R10.out; title=C450+T2-R10
          variables
            variables: dd/mm/yyyy as Date, year, day, wheat.yield as wheat_yield, wheat.biomass as wheat_biom, esw, no3(), RainSinceSowing, Transp, SoilEvap
          events Reporting Frequency: event=harvesting
