folder simulations: version=36
  simulation Silt fertilised
    metfile met: filename=%apsim%\Examples\MetFiles\Bhola.met
    clock
      start_date = 01/01/2001  # Enter the start date of the simulation
      end_date = 31/12/2001  # Enter the end date of the simulation
    summaryfile
    area paddock
      Soil Silt: Site=North Joynags; Region=Bhola; State=Southern Bangladesh; Country=Bangladesh
        SoilType = Silt  # Soil description
        NearestTown = Bhola
        ApsoilNumber = 673
        Latitude = 22.585  # Latitude (WGS84)
        Longitude = 90.666  # Longitude (WGS84)
        LocationAccuracy = +/- 50m (NB: northern hemisphere site)
        DataSource = Collected as part of ACIAR project 'Expanding Rabi season cropping in southern Bangladesh'
        Comments = 2006/07 field measured DUL using wettest profile from Anthesis measurements, estimated CLL (due to the difficulty of in-field CLL measurement it is likely that CLL% is lower than this estimate)
        Water
          Thickness  BD     AirDry  LL15   DUL    SAT
          150        1.416  0.118   0.235  0.386  0.436
          150        1.414  0.195   0.243  0.387  0.437
          300        1.351  0.282   0.282  0.41   0.46
          300        1.32   0.282   0.282  0.422  0.472
          300        1.32   0.282   0.282  0.422  0.472
          300        1.32   0.282   0.282  0.422  0.492
          BD source: Field measured and checked for sensibility, Estimated based on local knowledge
          AirDry, LL15 source: Estimated based on local knowledge
          DUL source: Field measured and checked for sensibility
          SAT source: c-bd
          SoilCrop wheat: LL=[0.235, 0.243, 0.282, 0.32, 0.36, 0.4]; KL=[0.06, 0.06, 0.04, 0.04, 0.03, 0.02]; XF=[1, 1, 1, 1, 1, 1]
            LL source: Estimated based on local knowledge
        SoilWater: SummerCona=3; SummerU=4; SummerDate=1-Apr; WinterCona=2.5; WinterU=3.5; WinterDate=1-Dec; DiffusConst=40; DiffusSlope=16; Salb=0.14; CN2Bare=94; CNRed=20; CNCov=0.8; Thickness=[150, 150, 300, 300, 300, 300]; SWCON=[0.3, 0.3, 0.3, 0.3, 0.3, 0.3]
        SoilOrganicMatter: OCUnits=WalkleyBlack
          Thickness  OC    FBiom  FInert
          150        1.5   0.04   0.4
          150        1.2   0.02   0.6
          300        0.75  0.02   0.8
          300        0.38  0.02   0.9
          300        0.23  0.01   1
          300        0.15  0.01   1
          OC source: Estimated based on local knowledge
          RootCN = 40
          RootWt = 1500
          SoilCN = 12.5
          EnrACoeff = 7.4
          EnrBCoeff = 0.2
        Analysis
          Thickness  Texture  PH
          150        Silt     6.5
          150        Silt     7
          300        Silt     7.4
          300        Silt     8.1
          300        Silt     8.3
          300        Silt     8.5
          Texture, PH source: Estimated based on local knowledge
        InitialWater: RelativeTo=ll15; FractionFull=0.5; PercentMethod=EvenlyDistributed
        Sample Initial nitrogen: NO3Units=kgha; NH4Units=kgha
          Thickness  NO3  NH4
          200        6    4
          1800       4    1
      surfaceom SurfaceOrganicMatter
        PoolName = wheat  # Organic Matter pool name
        type = wheat  # Organic Matter type
        mass = 2000  # Initial surface residue (kg/ha)
        cnr = 80  # C:N ratio of initial residue
        standing_fraction = 0  # Fraction of residue standing
      fertiliser
      folder Manager folder
      outputfile: filename=Silt fertilised.out; title=Silt fertilised
        variables
          variables: dd/mm/yyyy as Date, year, day, rain, dlayer, esw, drain, no3() as NO3_Total, nh4() as NH4_Total, urea(), dnit(), no3, nh4
        events Reporting Frequency: event=end_day
      manager Fertilise on fixed date
        # When should fertiliser be applied
        fert_date = 15-jan  # Enter fertiliser date (dd-mmm)
        fert_criteria = 1000  # Don't add fertiliser if N in top 2 layers exceeds (kg/ha)
        # Fertiliser application details
        fertmodule = fertiliser  # Module used to apply the fertiliser
        fert_amount = 100  # Amount of fertiliser to apply (kg/ha)
        fert_type = urea_N  # Fertiliser type
        on start_of_day:
```
         if (today = date('[fert_date]') then
            N_topsoil = no3(1) + nh4(1) + no3(2) + nh4(2)
            if (N_topsoil < [fert_criteria]) then
               [fertmodule] apply amount = [fert_amount] (kg/ha), depth = 50 (mm), type = [fert_type] ()
            endif
         endif
```
  simulation Silt fertilised short
    metfile met: filename=%apsim%\Examples\MetFiles\Bhola.met
    clock
      start_date = 14/01/2001  # Enter the start date of the simulation
      end_date = 31/01/2001  # Enter the end date of the simulation
    summaryfile
    area paddock
      Soil Silt: same as Silt fertilised.paddock.Silt
      surfaceom SurfaceOrganicMatter
        PoolName = wheat  # Organic Matter pool name
        type = wheat  # Organic Matter type
        mass = 2000  # Initial surface residue (kg/ha)
        cnr = 80  # C:N ratio of initial residue
        standing_fraction = 0  # Fraction of residue standing
      fertiliser
      folder Manager folder
      outputfile: filename=Silt fertilised short.out; title=Silt fertilised short
        variables
          variables: dd/mm/yyyy as Date, year, day, rain, dlayer, esw, drain, no3() as NO3_Total, nh4() as NH4_Total, urea(), dnit(), no3, nh4
        events Reporting Frequency: event=end_day
      manager Fertilise on fixed date: same as Silt fertilised.paddock.Fertilise on fixed date
  simulation Silt wheat residues incorp
    metfile met: filename=%apsim%\Examples\MetFiles\Bhola.met
    clock
      start_date = 01/06/2001  # Enter the start date of the simulation
      end_date = 31/12/2001  # Enter the end date of the simulation
    summaryfile
    area paddock
      Soil Silt: Site=North Joynags; Region=Bhola; State=Southern Bangladesh; Country=Bangladesh
        SoilType = Silt  # Soil description
        NearestTown = Bhola
        ApsoilNumber = 673
        Latitude = 22.585  # Latitude (WGS84)
        Longitude = 90.666  # Longitude (WGS84)
        LocationAccuracy = +/- 50m (NB: northern hemisphere site)
        DataSource = Collected as part of ACIAR project 'Expanding Rabi season cropping in southern Bangladesh'
        Comments = 2006/07 field measured DUL using wettest profile from Anthesis measurements, estimated CLL (due to the difficulty of in-field CLL measurement it is likely that CLL% is lower than this estimate)
        Water: same as Silt fertilised.paddock.Silt.Water
        SoilWater: same as Silt fertilised.paddock.Silt.SoilWater
        SoilOrganicMatter: same as Silt fertilised.paddock.Silt.SoilOrganicMatter
        Analysis: same as Silt fertilised.paddock.Silt.Analysis
        InitialWater: RelativeTo=ll15; FractionFull=0.5; PercentMethod=EvenlyDistributed
        Sample Initial nitrogen: NO3Units=kgha; NH4Units=kgha
          Thickness  NO3  NH4
          200        36   4
          1800       24   1
      surfaceom wheat
        PoolName = wheat  # Organic Matter pool name
        type = wheat  # Organic Matter type
        mass = 2000  # Initial surface residue (kg/ha)
        cnr = 80  # C:N ratio of initial residue
        standing_fraction = 0  # Fraction of residue standing
      fertiliser
      folder Manager folder
        manager Tillage on fixed date
          # When should tillage be done
          tillage_date = 15-jun  # Enter tillage date (dd-mmm)
          # Tillage application details
          surfaceommodule = wheat  # Module used to apply the tillage
          tillage_type = tine
          tillage_depth = 100  # User_defined depth of seedbed preparation (mm)
          tillage_f_incorp = 1.0  # User_defined fraction of surface residues to incorporate (0-1)
          on start_of_day:
```
         if (today = date('[tillage_date]') then
            if ('[tillage_type]' = 'user_defined') then
                '[surfaceommodule]' tillage type = [tillage_type], f_incorp = [tillage_f_incorp] (), tillage_depth = [tillage_depth]
            else
                '[surfaceommodule]' tillage type = [tillage_type]
            endif
            ready_to_till_pre_sow = 0
            till_day_pre_sow = 0
         endif
```
      outputfile: filename=Silt wheat residues incorp.out; title=Silt wheat residues incorp
        variables
          variables: dd/mm/yyyy as Date, biom_n() as biom_n_Tot, fom_n() as fom_n_Tot, no3() as NO3_Tot
        events Reporting Frequency: event=end_day
  simulation Silt cowpea residues incorp
    metfile met: filename=%apsim%\Examples\MetFiles\Bhola.met
    clock
      start_date = 01/06/2001  # Enter the start date of the simulation
      end_date = 31/12/2001  # Enter the end date of the simulation
    summaryfile
    area paddock
      Soil Silt: same as Silt wheat residues incorp.paddock.Silt
      surfaceom cowpea
        PoolName = cowpea  # Organic Matter pool name
        type = cowpea  # Organic Matter type
        mass = 2000  # Initial surface residue (kg/ha)
        cnr = 20  # C:N ratio of initial residue
        standing_fraction = 0  # Fraction of residue standing
      fertiliser
      folder Manager folder
        manager Tillage on fixed date
          # When should tillage be done
          tillage_date = 15-jun  # Enter tillage date (dd-mmm)
          # Tillage application details
          surfaceommodule = cowpea  # Module used to apply the tillage
          tillage_type = tine
          tillage_depth = 100  # User_defined depth of seedbed preparation (mm)
          tillage_f_incorp = 1.0  # User_defined fraction of surface residues to incorporate (0-1)
          on start_of_day:
          script: same as in Silt wheat residues incorp.paddock.Manager folder.Tillage on fixed date
      outputfile: filename=Silt cowpea residues incorp.out; title=Silt cowpea residues incorp
        variables
          variables: dd/mm/yyyy as Date, biom_n() as biom_n_Tot, fom_n() as fom_n_Tot, no3() as NO3_Tot
        events Reporting Frequency: event=end_day
