folder simulations: version=36
  simulation Silt Fallow Residue
    metfile met: filename=%apsim%\Examples\MetFiles\Bhola.met
    clock
      start_date = 01/01/2001  # Enter the start date of the simulation
      end_date = 31/12/2001  # Enter the end date of the simulation
    summaryfile
    area field
      folder Manager folder
      Soil Silt: Site=North Joynags; Region=Bhola; State=Southern Bangladesh; Country=Bangladesh
        SoilType = Silt  # Soil description
        NearestTown = Bhola
        ApsoilNumber = 673
        Latitude = 22.585  # Latitude (WGS84)
        Longitude = 90.666  # Longitude (WGS84)
        LocationAccuracy = +/- 50m (NB: northern hemisphere site)
        DataSource = Collected as part of ACIAR project 'Expanding Rabi season cropping in southern Bangladesh'
        Comments = 2006/07 field measured DUL using wettest profile from Anthesis measurements, estimated CLL (due to the difficulty of in-field CLL measurement it is likely that CLL% is lower than this estimate)
        Water
          Thickness  BD     AirDry  LL15   DUL    SAT
          150        1.416  0.118   0.235  0.386  0.436
          150        1.414  0.195   0.243  0.387  0.437
          300        1.351  0.282   0.282  0.41   0.46
          300        1.32   0.282   0.282  0.422  0.472
          300        1.32   0.282   0.282  0.422  0.472
          300        1.32   0.282   0.282  0.422  0.492
          BD source: Field measured and checked for sensibility, Estimated based on local knowledge
          AirDry, LL15 source: Estimated based on local knowledge
          DUL source: Field measured and checked for sensibility
          SAT source: c-bd
          SoilCrop wheat: LL=[0.235, 0.243, 0.282, 0.32, 0.36, 0.4]; KL=[0.06, 0.06, 0.04, 0.04, 0.03, 0.02]; XF=[1, 1, 1, 1, 1, 1]
            LL source: Estimated based on local knowledge
        SoilWater: SummerCona=3; SummerU=4; SummerDate=1-Apr; WinterCona=2.5; WinterU=3.5; WinterDate=1-Dec; DiffusConst=40; DiffusSlope=16; Salb=0.14; CN2Bare=94; CNRed=20; CNCov=0.8; Thickness=[150, 150, 300, 300, 300, 300]; SWCON=[0.3, 0.3, 0.3, 0.3, 0.3, 0.3]
        SoilOrganicMatter: RootCN=40; RootWt=1500; SoilCN=12.5; EnrACoeff=7.4; EnrBCoeff=0.2; OCUnits=WalkleyBlack
          Thickness  OC    FBiom  FInert
          150        1.5   0.04   0.4
          150        1.2   0.02   0.6
          300        0.75  0.02   0.8
          300        0.38  0.02   0.9
          300        0.23  0.01   1
          300        0.15  0.01   1
          OC source: Estimated based on local knowledge
        Analysis
          Thickness  Texture  PH
          150        Silt     6.5
          150        Silt     7
          300        Silt     7.4
          300        Silt     8.1
          300        Silt     8.3
          300        Silt     8.5
          Texture, PH source: Estimated based on local knowledge
        InitialWater: RelativeTo=ll15; FractionFull=0.5; PercentMethod=EvenlyDistributed
        Sample Initial nitrogen: NO3Units=kgha; NH4Units=kgha
          Thickness  NO3  NH4
          200        6    4
          1800       4    1
      surfaceom SurfaceOrganicMatter
        PoolName = rice_stubble  # Organic Matter pool name
        type = rice  # Organic Matter type
        mass = 0  # Initial surface residue (kg/ha)
        cnr = 80.0  # C:N ratio of initial residue
        standing_fraction = 0.0  # Fraction of residue standing
      outputfile: filename=Silt Fallow Residue field.out; title=Silt Fallow Residue field
        variables
          variables: dd/mm/yyyy as Date, year, day, rain, esw, es, runoff, drain, no3(), dlt_n_min, surfaceom_wt, surfaceom_cover
        events Reporting Frequency: event=end_day
  simulation Silt rice residue
    metfile met: filename=%apsim%\Examples\MetFiles\Bhola.met
    clock
      start_date = 01/01/2001  # Enter the start date of the simulation
      end_date = 31/12/2001  # Enter the end date of the simulation
    summaryfile
    area field
      folder Manager folder
      Soil Silt: same as Silt Fallow Residue.field.Silt
      surfaceom SurfaceOrganicMatter
        PoolName = rice_stubble  # Organic Matter pool name
        type = rice  # Organic Matter type
        mass = 2000  # Initial surface residue (kg/ha)
        cnr = 80.0  # C:N ratio of initial residue
        standing_fraction = 0.0  # Fraction of residue standing
      outputfile: filename=Silt rice residue field.out; title=Silt rice residue field
        variables
          variables: dd/mm/yyyy as Date, year, day, rain, esw, es, runoff, drain, no3(), dlt_n_min, surfaceom_wt, surfaceom_cover
        events Reporting Frequency: event=end_day
  simulation Silt cowpea residue
    metfile met: filename=%apsim%\Examples\MetFiles\Bhola.met
    clock
      start_date = 01/01/2001  # Enter the start date of the simulation
      end_date = 31/12/2001  # Enter the end date of the simulation
    summaryfile
    area field
      folder Manager folder
      Soil Silt: same as Silt Fallow Residue.field.Silt
      surfaceom Cowpea
        PoolName = cowpea_stubble  # Organic Matter pool name
        type = cowpea  # Organic Matter type
        mass = 2000  # Initial surface residue (kg/ha)
        cnr = 20.0  # C:N ratio of initial residue
        standing_fraction = 0.0  # Fraction of residue standing
      outputfile: filename=Silt cowpea residue field.out; title=Silt cowpea residue field
        variables
          variables: dd/mm/yyyy as Date, year, day, rain, esw, es, runoff, drain, no3(), dlt_n_min, surfaceom_wt, surfaceom_cover
        events Reporting Frequency: event=end_day
