folder Simulations: version=32
  simulation Direct_seeded_rice_single
    metfile met: filename=%apsim%\Examples\MetFiles\Bhola.met
    clock
      start_date = 01/01/2001  # Select the start date of the simulation
      end_date = 31/12/2001  # Select the end date of the simulation
    summaryfile
    area paddock
      soil Silt: Site=North Joynags; Region=Bhola; State=Southern Bangladesh; Country=Bangladesh
        SoilType = Silt  # Soil description
        NearestTown = Bhola
        ApsoilNumber = 673
        Latitude = 22.585  # Latitude (WGS84)
        Longitude = 90.666  # Longitude (WGS84)
        LocationAccuracy = +/- 50m (NB: northern hemisphere site)
        DataSource = Collected as part of ACIAR project 'Expanding Rabi season cropping in southern Bangladesh'
        Comments = 2006/07 field measured DUL using wettest profile from Anthesis measurements, estimated CLL (due to the difficulty of in-field CLL measurement it is likely that CLL% is lower than this estimate)
        Water
          Layer:
            Thickness (mm)  BD (g/cc)  Airdry (mm/mm)  LL15 (mm/mm)  DUL (mm/mm)  SAT (mm/mm)
            150             1.416      0.118           0.235         0.386        0.436
            150             1.414      0.195           0.243         0.387        0.437
            300             1.351      0.282           0.282         0.41         0.46
            300             1.32       0.282           0.282         0.422        0.472
            300             1.32       0.282           0.282         0.422        0.472
            300             1.32       0.282           0.282         0.422        0.492
          SoilCrop wheat
            Layer:
              Thickness (mm)  ll (mm/mm)  kl (/day)  xf (0-1)
              150             0.235       0.06       1
              150             0.243       0.06       1
              300             0.282       0.04       1
              300             0.32        0.04       1
              300             0.36        0.03       1
              300             0.4         0.02       1
        SoilWat: SummerCona=3; SummerU=4; SummerDate=1-Apr; WinterCona=2.5; WinterU=3.5; WinterDate=1-Dec; DiffusConst=40; DiffusSlope=16; Salb=0.14; Cn2Bare=94; CnRed=20; CnCov=0.8
          Layer:
            Thickness (mm)  SWCON (0-1)
            150             0.3
            150             0.3
            300             0.3
            300             0.3
            300             0.3
            300             0.3
        SoilOrganicMatter: RootCn=40; RootWt=1500; SoilCn=12.5; EnrACoeff=7.4; EnrBCoeff=0.2
          Layer:
            Thickness (mm)  OC (Walkley Black %)  FBIOM (0-1)  FINERT (0-1)
            150             1.5                   0.04         0.4
            150             1.2                   0.02         0.6
            300             0.75                  0.02         0.8
            300             0.38                  0.02         0.9
            300             0.23                  0.01         1
            300             0.15                  0.01         1
        Analysis
          Layer:
            Thickness (mm)  Texture  PH (1:5 water)
            150             Silt     6.5
            150             Silt     7
            300             Silt     7.4
            300             Silt     8.1
            300             Silt     8.3
            300             Silt     8.5
        InitWater
          percentmethod: percent=1; distributed=filled from top
        Sample Initial nitrogen
          Layer:
            Thickness (mm)  no3 (kg/ha)  nh4 (kg/ha)
            200             6            4
            1800            4            1
      folder Manager folder
        manager Rice-Direct seeding
          # Sowing criteria
          date1 = 1-Jul  # Enter sowing window START date (dd-mmm)
          date2 = 1-jul  # Enter sowing window END date (dd-mmm)
          must_sow = yes  # Must sow?
          raincrit = 20  # Amount of rainfall
          rainnumdays = 3  # Number of days of rainfall
          esw_amount = 20  # Enter minimum allowable available soil water (mm)
          # Crop parameters
          ricemodule = rice  # Name of your rice module
          ricecultivar = local  # Cultivar
          r_nplds = 180  # Number of plants per seed bed (plants/m2)
          ferttype = urea  # Fertilizer type
          sowfert = 0  # Amount of fertilizer at sowing
          on start_of_day:
```
                                                                                                                                                                     !Transplanted Rice                
                                    
  if (paddock_is_fallow() = 1  and date_within('[date1], [date2]') = 1) then    
        if (rain[[rainnumdays]] >= [raincrit] AND esw >= [esw_amount]) OR
              ('[must_sow]' = 'yes' AND today = date('[date2]')))    then 
                                                                                                            !sbdur= duration of seedbed                                                                                                                                                             !nplh= number of plants on hills
                                                                                                            !nh= number of hills
                 [ricemodule] sow cultivar = [ricecultivar], establishment = direct-seed, nplds = [r_nplds]
                 fertiliser apply amount = [sowfert], type=[ferttype]              !Inital fertilizer
                 top_dress = 0
                 tot_irrig = 0
         endif
   endif

   if rice.plant_status = 'dead' then                                                                                                       ! Harvest Rice crop
         rice  end_crop
   endif
```
          on Init:
```
top_dress = 0
tot_irrig = 0
```
      micromet
        soilalbedo = 0.23
        a_interception = 0
        b_interception = 0
        c_interception = 0
        d_interception = 0
      irrigation
        automatic_irrigation = off
        asw_depth = 600  # Depth to which ASW is calculated. (mm)
        crit_fr_asw = 0.5  # Fraction of ASW below which irrigation is applied (0-1.0)
        irrigation_efficiency = 1  # Efficiency of the irrigation. (0-1.0)
        default_no3_conc = 0.0  # Nitrate concentration (ppm N)
        default_nh4_conc = 0.0  # Ammonium concentration (ppm N)
        default_cl_conc = 0.0  # Chloride concentration (ppm Cl)
      rice
      surfaceom SurfaceOrganicMatter
        PoolName = rice_stubble  # Organic Matter pool name
        type = rice  # Organic Matter type
        mass = 0  # Initial surface residue (kg/ha)
        cnr = 80.0  # C:N ratio of initial residue
        standing_fraction = 0.0  # Fraction of residue standing
      fertiliser
      outputfile: filename=Direct_seeded_rice_single.out; title=Direct_seeded_rice_single
        variables
          variables: dd/mm/yyyy as Date, year, day, esw, no3() as no3_Tot, cropsta as crop_stage, dae, wagt as total_biomass, wso as storage_organs, wrr as rice_yield, rain, dul(1), sw(1), sat(1)
        events Reporting Frequency: event=end_day
  simulation Transplanted_paddy_rice_single
    metfile met: filename=%apsim%\Examples\MetFiles\Bhola.met
    clock
      start_date = 01/01/2001  # Select the start date of the simulation
      end_date = 31/12/2001  # Select the end date of the simulation
    summaryfile
    area paddock
      soil Silt: Site=North Joynags; Region=Bhola; State=Southern Bangladesh; Country=Bangladesh
        SoilType = Silt  # Soil description
        NearestTown = Bhola
        ApsoilNumber = 673
        Latitude = 22.585  # Latitude (WGS84)
        Longitude = 90.666  # Longitude (WGS84)
        LocationAccuracy = +/- 50m (NB: northern hemisphere site)
        DataSource = Collected as part of ACIAR project 'Expanding Rabi season cropping in southern Bangladesh'
        Comments = 2006/07 field measured DUL using wettest profile from Anthesis measurements, estimated CLL (due to the difficulty of in-field CLL measurement it is likely that CLL% is lower than this estimate)
        Water
          Layer:
            Thickness (mm)  KS (mm/day)  BD (g/cc)  Airdry (mm/mm)  LL15 (mm/mm)  DUL (mm/mm)  SAT (mm/mm)
            150             24           1.416      0.118           0.235         0.386        0.436
            150             24           1.414      0.195           0.243         0.387        0.437
            300             24           1.351      0.282           0.282         0.41         0.46
            300             24           1.32       0.282           0.282         0.422        0.472
            300             24           1.32       0.282           0.282         0.422        0.472
            300             1            1.32       0.282           0.282         0.422        0.492
          SoilCrop wheat: same as Direct_seeded_rice_single.paddock.Silt.Water.wheat
        SoilWat: SummerCona=3; SummerU=4; SummerDate=1-Apr; WinterCona=2.5; WinterU=3.5; WinterDate=1-Dec; DiffusConst=40; DiffusSlope=16; Salb=0.14; Cn2Bare=94; CnRed=20; CnCov=0.8
          Layer:
            Thickness (mm)  SWCON (0-1)
            150             0.3
            150             0.3
            300             0.3
            300             0.3
            300             0.3
            300             0.3
        SoilOrganicMatter: same as Direct_seeded_rice_single.paddock.Silt.SoilOrganicMatter
        Analysis: same as Direct_seeded_rice_single.paddock.Silt.Analysis
        InitWater
          percentmethod: percent=1; distributed=filled from top
        Sample Initial nitrogen
          Layer:
            Thickness (mm)  no3 (kg/ha)  nh4 (kg/ha)
            200             6            4
            1800            4            1
      folder Manager folder
        manager Rice-Transplant Aman
          # Sowing criteria
          date1 = 1-jul  # Enter sowing window START date (dd-mmm)
          date2 = 1-jul  # Enter sowing window END date (dd-mmm)
          must_sow = yes  # Must sow?
          raincrit = 20  # Amount of rainfall
          rainnumdays = 3  # Number of days of rainfall
          esw_amount = 20  # Enter minimum allowable available soil water (mm)
          # Crop parameters
          ricemodule = rice  # Name of your soil module
          ricecultivar = BR23  # Cultivar
          r_sbdur = 25  # Duration of seedbed
          r_nplh = 2  # Number of plants on hills
          r_nh = 25  # Number of hills
          r_nplsb = 1000  # Number of plants per seed bed
          ferttype = urea_N  # Fertilizer type
          sowfert = 30  # Amount of fertilizer at transplant
          on start_of_day:
```
                                                                                                                                                                     !Transplanted Rice                
                                    
  if (paddock_is_fallow() = 1  and date_within('[date1], [date2]') = 1) then    
        if (rain[[rainnumdays]] >= [raincrit] AND esw >= [esw_amount]) OR
              ('[must_sow]' = 'yes' AND today = date('[date2]')))    then 
                                                                                                                                                                      !sbdur= duration of seedbed
                                                                                                                                                                      !nplh= number of plants on hills
                                                                                                                                                                      !nh= number of hills
                 [ricemodule] sow cultivar = [ricecultivar], establishment = transplant, sbdur = [r_sbdur], nplh = [r_nplh], nh = [r_nh], nplsb = [r_nplsb]
                 fertiliser apply amount = [sowfert], type=[ferttype]              !Inital fertilizer
                 top_dress = 0
                 tot_irrig = 0
         endif
   endif

   if rice.plant_status = 'dead' then                                                                                                       ! Harvest Rice crop
         rice  end_crop
   endif
```
          on Init:
```
top_dress = 0
tot_irrig = 0
```
        manager Pond_depth
          # Manage pond depth
          soilmodule = Silt  # Name of your soil module
          date1 = 1-jun  # Start date for ponding (dd-mmm)
          date2 = 30-oct  # End date for ponding (dd-mmm)
          max_dop = 150  # Maximum depth of pond (mm)
          min_dop = 50  # Minimum depth of pond for irrigation trigger
          # Enable irrigation - to top up pond
          irrig_yes = no  # Enable irrigation (yes/no)
          date3 = 1-jul  # Start date for irrigation (dd-mmm)
          date4 = 30-oct  # End date for irrigation (dd-mmm)
          irrig_number = 6  # Maximum number of irrigations allowed
          on start_of_day:
```
                                                                                                                                ! Pond  on/off
   if (date_within('[date1], [date2]') = 1) then
            '[soilmodule] Water' set max_pond = [max_dop]
    else
            '[soilmodule] Water' set max_pond = 0
    endif

   if '[irrig_yes]' = 'yes' then                                                                                ! Enable irrigation
     if (date_within('[date3], [date4]') = 1) then                                             ! Enable irrigation
            if rice.plant_status = 'alive' and pond < [min_dop] and count <= [irrig_number] then          ! Top up pond 
                irrig_amount = [max_dop] - pond
                irrigation apply amount = irrig_amount 
                tot_irrig = tot_irrig + irrig_amount
                count = count + 1
            endif
      endif
   endif

    if today = date('[date4]') then                                                                   ! Reset irrigation counter
        count = 0
    endif
```
          on Init:
```
count = 0
irrig_amount = 0
max_dop = 100
min_dop = 20
```
        manager Fertilise on growth stage
          #
          fert_criteria = 1000  # Don't add fertiliser if N in top 2 layers exceeds (kg/ha)
          #
          fertmodule = Fertiliser  # Module used to apply the fertiliser
          rice_dvs = 0.3  # Rice growth stage to apply fertiliser (0-2) dvs =0.3
          fert_amount = 40  # Amount of fertiliser to apply (kg/ha)
          fert_type = urea_N  # Fertiliser type
          on start_of_day:
```
  
            N_topsoil = no3(1) + nh4(1) + no3(2) + nh4(2)
            if (N_topsoil < [fert_criteria]) then
                  if rice.dvs > [rice_dvs] and  top_dress = 0 then                                                                                          ! Add top dress fertilizer 
                     [fertmodule] apply amount = [fert_amount] (kg/ha), depth = 50 (mm), type = [fert_type] ()
                     top_dress = 1
                  endif
            endif
```
          on init:
```
top_dress = 0
```
        manager Rice residue
          # When should tillage be performed
          modulename = rice  # The module the event come from
          eventname = harvesting  # On which event should tillage be done
          # Tillage details
          surfaceommodule = SurfaceOrganicMatter  # Module used to apply the tillage
          tillage_type = user_defined
          tillage_depth = 0  # User_defined depth of seedbed preparation (mm)
          tillage_f_incorp = 0.85  # User_defined fraction of surface residues to incorporate (0-1)
          on [modulename].[eventname]:
```
 if day > 213 then       ! 1-August------------- 40% residue left after Aus compared to 15% after Aman
            '[surfaceommodule]' tillage type = [tillage_type], f_incorp = [tillage_f_incorp] (), tillage_depth = [tillage_depth]
 else
            '[surfaceommodule]' tillage type = [tillage_type], f_incorp = 0.60 (), tillage_depth = [tillage_depth]
endif
```
      micromet
        soilalbedo = 0.23
        a_interception = 0
        b_interception = 0
        c_interception = 0
        d_interception = 0
      irrigation: same as Direct_seeded_rice_single.paddock.Irrigation
      rice
      surfaceom SurfaceOrganicMatter
        PoolName = rice_stubble  # Organic Matter pool name
        type = rice  # Organic Matter type
        mass = 0  # Initial surface residue (kg/ha)
        cnr = 80.0  # C:N ratio of initial residue
        standing_fraction = 0.0  # Fraction of residue standing
      fertiliser
      pond
        algae_present = 0  # is there algae present in this pond (0 or 1)
        CEC = 30.0  # surface soil cation exchange capacity
      outputfile: filename=Transplanted_paddy_rice_single.out; title=Transplanted_paddy_rice_single
        variables
          variables: dd/mm/yyyy as Date, year, day, esw, no3() as no3_Tot, cropsta as crop_stage, dae, wagt as total_biomass, wso as storage_organs, wrr as rice_yield, tnsoil as N_avail, rain, dul(1), sw(1), no3(), NH4, drain, irrigation, sat(1), sat(2), dul(2)
        events Reporting Frequency: event=end_day
  simulation Transplanted_paddy_rice1
    metfile met: filename=%apsim%\Examples\MetFiles\Bhola.met
    clock
      start_date = 01/01/2001  # Select the start date of the simulation
      end_date = 31/12/2001  # Select the end date of the simulation
    summaryfile
    area paddock
      soil Silt: Site=North Joynags; Region=Bhola; State=Southern Bangladesh; Country=Bangladesh
        SoilType = Silt  # Soil description
        NearestTown = Bhola
        ApsoilNumber = 673
        Latitude = 22.585  # Latitude (WGS84)
        Longitude = 90.666  # Longitude (WGS84)
        LocationAccuracy = +/- 50m (NB: northern hemisphere site)
        DataSource = Collected as part of ACIAR project 'Expanding Rabi season cropping in southern Bangladesh'
        Comments = 2006/07 field measured DUL using wettest profile from Anthesis measurements, estimated CLL (due to the difficulty of in-field CLL measurement it is likely that CLL% is lower than this estimate)
        Water
          Layer:
            Thickness (mm)  KS (mm/day)  BD (g/cc)  Airdry (mm/mm)  LL15 (mm/mm)  DUL (mm/mm)  SAT (mm/mm)
            150             240          1.416      0.118           0.235         0.386        0.436
            150             1            1.414      0.195           0.243         0.387        0.437
            300             240          1.351      0.282           0.282         0.41         0.46
            300             240          1.32       0.282           0.282         0.422        0.472
            300             240          1.32       0.282           0.282         0.422        0.472
            300             5            1.32       0.282           0.282         0.422        0.492
          SoilCrop wheat: same as Direct_seeded_rice_single.paddock.Silt.Water.wheat
        SoilWat
          Layer:
            Thickness (mm)  SWCON (0-1)
            150             0.3
            150             0.01
            300             0.3
            300             0.3
            300             0.3
            300             0.3
          SummerCona = 0
          SummerU = 0
          SummerDate = 1-Apr
          WinterCona = 2.5
          WinterU = 3.5
          WinterDate = 1-Dec
          DiffusConst = 40
          DiffusSlope = 16
          Salb = 0.14
          Cn2Bare = 94
          CnRed = 20
          CnCov = 0.8
        SoilOrganicMatter: same as Direct_seeded_rice_single.paddock.Silt.SoilOrganicMatter
        Analysis: same as Direct_seeded_rice_single.paddock.Silt.Analysis
        InitWater
          percentmethod: percent=1; distributed=filled from top
        Sample Initial nitrogen
          Layer:
            Thickness (mm)  no3 (kg/ha)  nh4 (kg/ha)
            200             6            4
            1800            4            1
      folder Manager folder
        manager Pond_depth: same as Transplanted_paddy_rice_single.paddock.Manager folder.Pond_depth
        manager Fertilise on growth stage: same as Transplanted_paddy_rice_single.paddock.Manager folder.Fertilise on growth stage
        manager Rice residue: same as Transplanted_paddy_rice_single.paddock.Manager folder.Rice residue
      micromet
        soilalbedo = 0.23
        a_interception = 0
        b_interception = 0
        c_interception = 0
        d_interception = 0
      irrigation: same as Direct_seeded_rice_single.paddock.Irrigation
      rice
      surfaceom SurfaceOrganicMatter
        PoolName = rice_stubble  # Organic Matter pool name
        type = rice  # Organic Matter type
        mass = 0  # Initial surface residue (kg/ha)
        cnr = 80.0  # C:N ratio of initial residue
        standing_fraction = 0.0  # Fraction of residue standing
      fertiliser
      pond
        algae_present = 0  # is there algae present in this pond (0 or 1)
        CEC = 30.0  # surface soil cation exchange capacity
      outputfile: filename=Transplanted_paddy_rice1.out; title=Transplanted_paddy_rice1
        variables
          variables: dd/mm/yyyy as Date, year, day, esw, no3() as no3_Tot, cropsta as crop_stage, dae, wagt as total_biomass, wso as storage_organs, wrr as rice_yield, tnsoil as N_avail, rain, dul(1), sw(1), no3(), NH4, drain, irrigation, sat(1), sat(2), dul(2), pond, es, trc
        events Reporting Frequency: event=end_day
