folder Simulations: version=32
  simulation TemperateGrassEstablished
    metfile met: filename=%apsim%/Examples/MetFiles/Goond.met
    clock
      start_date = 1/01/1954  # Select the start date of the simulation
      end_date = 1/01/1955  # Select the end date of the simulation
    summaryfile
    area paddock
      soil SandyLoam: Site=Hopetoun; Region=sth Mallee; State=Victoria; Longitude=142.237
        Comment = Hopetoun Landcare site 2005; lower slope; OC estimated for all layers; OC*1.3; CLL field measured; Observed rooting depth 70cm  # Comments
        SoilType = Sandy Loam  # Soil description
        NearestTown = Hopetoun
        ApsoilNumber = 717
        Latitude = -35.733  # Latitude (WGS84)
        LocationAccuracy = +-1000m
        DataSource = Based on Soil Characterisation undertaken by Birchip Cropping Group during 2005
        InitWater Initial water
          PercentMethod: Percent=0
        Water
          Layer:
            Thickness (mm)  BD (g/cc)  AirDry (mm/mm)  LL15 (mm/mm)  DUL (mm/mm)  SAT (mm/mm)
            100             1.43       0.06            0.12          0.24         0.43
            300             1.498      0.096           0.12          0.23         0.4
            300             1.608      0.14            0.14          0.27         0.36
            300             1.637      0.14            0.14          0.3          0.35
            300             1.579      0.14            0.14          0.32         0.37
          SoilCrop wheat
            Layer:
              Thickness (mm)  LL (mm/mm)  KL (/day)  XF (0-1)
              100             0.12        0.06       1
              300             0.12        0.06       1
              300             0.14        0.06       1
              300             0.15        0.04       1
              300             0.15        0.04       0
          SoilCrop barley
            Layer:
              Thickness (mm)  LL (mm/mm)  KL (/day)  XF (0-1)
              100             0.12        0.07       1
              300             0.12        0.07       1
              300             0.14        0.07       1
              300             0.15        0.05       1
              300             0.15        0.05       0
          SoilCrop oats: same as TemperateGrassEstablished.paddock.SandyLoam.Water.barley
          SoilCrop lucerne
            Layer:
              Thickness (mm)  LL (mm/mm)  KL (/day)  XF (0-1)
              100             0.12        0.1        1
              300             0.12        0.1        1
              300             0.14        0.1        1
              300             0.15        0.09       1
              300             0.15        0.09       1
          SoilCrop bambatsi
            Layer:
              Thickness (mm)  LL (mm/mm)  KL (/day)  XF (0-1)
              100             0.12        0.1        1
              300             0.12        0.1        1
              300             0.14        0.1        1
              300             0.15        0.09       1
              300             0.15        0.07       0
          SoilCrop perennial grass: same as TemperateGrassEstablished.paddock.SandyLoam.Water.bambatsi
          SoilCrop weed
            Layer:
              Thickness (mm)  LL (mm/mm)  KL (/day)  XF (0-1)
              100             0.12        0.07       1
              300             0.12        0.07       1
              300             0.14        0.07       1
              300             0.15        0.05       1
              300             0.15        0.04       0
          SoilCrop medic
            Layer:
              Thickness (mm)  LL (mm/mm)  KL (/day)  XF (0-1)
              100             0.12        0.07       1
              300             0.12        0.07       1
              300             0.14        0.07       1
              300             0.15        0.05       0
              300             0.15        0.04       0
        SoilWat: SummerCona=3.5; SummerU=6; SummerDate=1-Nov; WinterCona=2; WinterU=2; WinterDate=1-apr; DiffusConst=88; DiffusSlope=35; Salb=0.13; CN2Bare=68; CNRed=20; CNCov=0.8
          Layer:
            Thickness (mm)  SWCON (0-1)
            100             0.6
            300             0.6
            300             0.5
            300             0.5
            300             0.5
        SoilOrganicMatter: RootCN=40; RootWT=1000; SoilCN=12; EnrACoeff=7.4; EnrBCoeff=0.2
          Layer:
            Thickness (mm)  OC (Total %)  FBiom (0-1)  FInert (0-1)
            100             1             0.04         0.4
            300             0.8           0.02         0.5
            300             0.5           0.02         0.7
            300             0.25          0.02         1
            300             0.15          0.01         1
        Analysis
          Layer:
            Thickness (mm)  Texture                   EC (1:5 dS/m)  PH (1:5 water)  CL (mg/kg)  Boron (Hot water mg/kg)
            100             Sandy loam (10-20%)       0.2            8.3             11          1.3
            300             Sandy clay loam (20-30%)  0.2            9               88          1.4
            300             Sandy clay loam (20-30%)  0.6            9.6             336         9.4
            300             Sandy clay loam (20-30%)  0.6            9.7             363         16.7
            300             Sandy clay loam (20-30%)  0.6            9.7             284         13.4
        Sample Initial nitrogen
          Layer:
            Thickness (mm)  NO3 (ppm)  NH4 (ppm)
            100             3.00002    0.100007
            300             6.00003    0.0999987
            300             4.00001    0.100027
            300             4.00002    0.100027
            300             0.1        0.100027
      surfaceom SurfaceOrganicMatter
        PoolName = wheat_stubble  # Organic Matter pool name
        type = wheat  # Organic Matter type
        mass = 1000  # Initial surface residue (kg/ha)
        cnr = 80  # C:N ratio of initial residue
        standing_fraction = 0  # Fraction of residue standing
      fertiliser
      AusfarmPasture AusfarmEstablishedPasture
        debug = off
        sand = 0.1 0.1 0.1 0.1 0.1
        svp_fract = 0.75
        co2_ppm = 400  # co2 (ppm)
        species = Cocksfoot  # Name of the pasture species
        nutrients = N  # Determines which of the plant nutrient submodels to activate
        fertility = 1  # Fertility scalar. Only meaningful in simple mode
        max_rtdep = 1300  # Maximum rooting depth (mm)
        lagged_day_t = -999.9  # Lagged daytime temperature (oC)
        phenology = 1.005  # Value denoting the phenological stage of the species
        flower_len = 0  # Current maximum length of the flowering period (d)
        flower_time = 0  # Time since the start of flowering (d)
        senc_index = 0  # Number of preceding days of dry conditions (d)
        dorm_index = 0  # Number of preceding days of cool, moist conditions (d)
        dorm_t = -999.9  # Lagged mean temperature used in summer-dormancy calculations (oc)
        seed_dorm_time = 0  # Time since commencement of embryo dormancy (d)
        germ_index = 0  # Germination index. Only meaningful if the species is modelled with seed pools (d)
        AusfarmPastureGreen Green
          status = established
          rt_dep = 100  # Current rooting depth of the cohort (mm)
          estab_index = 0  # Establishment index. Only meaningful if status = seedling
          stress_index = 0  # Stress index. Only meaningful if status = seedling
          stem_reloc = 0  # Maximum amount of stem tissue to be relocated to seed (kg/ha)
          frosts = 0  # Number of frosts experienced by this herbage cohort during its lifetime
          AusfarmPastureGreenHerbage Leaf
            dmd = 0.825  # dmd (kg/kg)
            weight = 8000  # weight (kg/ha)
            spec_area = 10  # spec_area (cm^2/g)
            root_wt = 3600  # root_wt (kg/ha)
          AusfarmPastureGreenHerbage Stem
            dmd = 0.825  # dmd (kg/kg)
            weight = 1000  # weight (kg/ha)
            spec_area = 10  # spec_area (cm^2/g)
            root_wt = 0  # root_wt (kg/ha)
        AusfarmPastureDry Dry
          status = dead  # State of a cohort of dry herbage
          AusfarmPastureDryHerbage Leaf
            dmd = 0.65  # dmd (kg/kg)
            weight = 500  # weight (kg/ha)
            spec_area = 10  # spec_area (cm^2/g)
          AusfarmPastureDryHerbage Stem
            dmd = 0.425  # dmd (kg/kg)
            weight = 100  # weight (kg/ha)
            spec_area = 10  # spec_area (cm^2/g)
        AusfarmPastureDry Litter
          status = litter  # State of a cohort of dry herbage
          AusfarmPastureDryHerbage Leaf
            dmd = 0.651  # dmd (kg/kg)
            weight = 233  # weight (kg/ha)
            spec_area = 10  # spec_area (cm^2/g)
          AusfarmPastureDryHerbage Stem
            dmd = 0  # dmd (kg/kg)
            weight = 0  # weight (kg/ha)
            spec_area = 10  # spec_area (cm^2/g)
        AusfarmPastureSeeds Seeds
      folder Manager
        manager Area
          area = 100  # Area of paddock (ha)
          on Init:
```
area = [area]
```
        manager Reset
          # When should a reset be done
          reset_date = 1-jan  # Enter date of reset (dd-mmm)
          # Reset details
          soilmodule = SandyLoam  # Name of your soil module
          surfaceommodule = SurfaceOrganicMatter  # Name of your surface organic matter module
          resetWater = no  # Reset soil water?
          resetNitrogen = yes  # Reset soil nitrogen?
          resetSurfaceOM = no  # Reset surface organic matter?
          on start_of_day:
```
         if (today = date('[reset_date]')) then
            resetWater = '[resetWater]'
            resetNitrogen  = '[resetNitrogen]'
            resetSurfaceOM = '[resetSurfaceOM]'
            if (resetWater = 'yes') then
                '[soilmodule] Water' reset
            endif
            if (resetNitrogen = 'yes') then
                '[soilmodule] Nitrogen' reset
            endif
            if (resetSurfaceOM = 'yes') then
                '[surfaceommodule]' reset
            endif
            act_mods reseting
         endif
```
        manager Fertilise on fixed date
          # When should fertiliser be applied
          fert_date = 1-apr  # Enter fertiliser date (dd-mmm)
          fert_criteria = 500  # Don't add fertiliser if N in top 2 layers exceeds (kg/ha)
          # Fertiliser application details
          fertmodule = Fertiliser  # Module used to apply the fertiliser
          fert_amount = 20  # Amount of fertiliser to apply (kg/ha)
          fert_type = NO3_N  # Fertiliser type
          on start_of_day:
```
         if (today = date('[fert_date]') then
            N_topsoil = no3(1) + nh4(1) + no3(2) + nh4(2)
            if (N_topsoil < [fert_criteria]) then
               [fertmodule] apply amount = [fert_amount] (kg/ha), depth = 50 (mm), type = [fert_type] ()
            endif
         endif
```
        manager CutOnDMThreshold
          # When should a cut be done?
          availdmthreshold = 1500  # Enter DM threshold after which a cut should be performed (kg/ha)
          # Cut details
          pasturemodel = AusfarmEstablishedPasture  # Enter name of pasture module
          height = 80  # Enter height of cut (mm)
          gathered = 0.5  # Proportion of cut forage gathered in (remainder becomes litter)
          dmdloss = 0.1  # Loss of DMD during cutting, drying and storage
          dmdcontent = 0.9  # Dry matter content when stored (kg/kg)
          on start_of_day:
```
if ([pasturemodel]Model.avail_dm > [availdmthreshold]) then
      standing_DM = [pasturemodel]Model.avail_dm
      '[pasturemodel]' cutpasture cut_height = [height], gathered = [gathered], dmd_loss = [dmdloss], dm_content = [dmdcontent]
      resid_DM = [pasturemodel]Model.avail_dm
      removed_DM = standing_DM - resid_DM
endif
```
      outputfile daily: filename=TemperateGrassEstablished daily.out; title=TemperateGrassEstablished daily
        variables
          variable:
            dd/mm/yyyy as Date  # Date (dd/mm/yyyy)
            year  # Year
            day
            phenology
            growth
            leaf_dm
            stem_dm
            litter_dm
            rtdep
            urea()
            cover_tot
            uptake_nh4()
            nh4()
            uptake_no3()
            no3()
            nit_tot()
            glf_nitr
            glf_sm
            glf_tmp
            glf_vpd
            removed_dm
            avail_dm
        events Reporting Frequency: event=Daily  # End of day
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