folder Simulations: version=37; creator=Apsim 7.10-r4176
  simulation Upland Aus
    memo
      Upland broadcast - local cultivar - short season low yielding.
    climatechange
      maxtmodifier = 0  # Change in maximum temperature in degrees celsius
      mintmodifier = 0  # Change in minimum temperature in degrees celsius
      rainmodifier = 1  # Relative change in rainfall
      radiationmodifier = 1.5  # Relative change in radiation
      co2 = 350  # Atmospheric C02 concentration (ppm)
    metfile met: filename=%apsim%/Examples/MetFiles/Bhola.met
    clock
      start_date = 1/01/1988  # Select the start date of the simulation
      end_date = 30/6/1989  # Select the end date of the simulation
    summaryfile
    area paddock
      Soil BholaSouthBalia06: Site=Sth Balia; Region=Bhola; State=Bangladesh; Longitude=90.633614
        Comment = 2006/07 field measured DUL using wettest profile from pre-season measurements, estimated CLL  # Comments
        NearestTown = Bhola
        Latitude = 999999  # Latitude (WGS84)
        Water
          Thickness  BD     AirDry  LL15  DUL    SAT
          150        1.458  0.18    0.18  0.345  0.42
          150        1.348  0.19    0.19  0.311  0.461
          300        1.413  0.19    0.2   0.387  0.437
          300        1.4    0.2     0.25  0.392  0.442
          300        1.36   0.25    0.27  0.407  0.457
          300        1.32   0.28    0.3   0.407  0.457
          300        1.32   0.3     0.34  0.407  0.457
          500        1.32   0.34    0.38  0.41   0.457
          500        1.32   0.36    0.38  0.41   0.457
          SoilCrop wheat: LL=[0.18, 0.19, 0.22, 0.27, 0.3, 0.35, 0.407, 0.41, 0.41]; KL=[0.06, 0.06, 0.06, 0.06, 0.03, 0.02, 0.02, 0.02, 0.02]; XF=[1, 1, 1, 1, 1, 0, 0, 0, 0]
          SoilCrop wheat_old: LL=[0.206, 0.191, 0.263, 0.306, 0.33, 0.35, 0.407, 0.41, 0.41]; KL=[0.06, 0.06, 0.04, 0.04, 0.03, 0.02, 0.02, 0.06, 0.06]; XF=[1, 1, 1, 1, 1, 1, 0, 1, 1]
          SoilCrop mungbean: LL=[0.18, 0.19, 0.22, 0.27, 0.407, 0.407, 0.407, 0.41, 0.41]; KL=[0.06, 0.06, 0.06, 0.06, 0.03, 0.02, 0.02, 0.02, 0.02]; XF=[1, 1, 1, 1, 0, 0, 0, 0, 0]
        SoilWater: SummerCona=2.5; SummerU=4; SummerDate=1-Nov; WinterCona=2.5; WinterU=4; WinterDate=1-Apr; DiffusConst=450; DiffusSlope=188; Salb=0.14; CN2Bare=84; CNRed=20; CNCov=0.8
          Thickness  SWCON  MWCON
          150        0.1    1
          150        0.1    1
          300        0.1    1
          300        0.1    1
          300        0.1    1
          300        0.1    1
          300        0.1    1
          500        0.1    1
          500        0      0
        SoilOrganicMatter: RootCN=40; RootWt=1500; SoilCN=12.5; EnrACoeff=7.4; EnrBCoeff=0.2; OCUnits=Total
          Thickness  OC    FBiom  FInert
          150        1.5   0.04   0.4
          150        1.2   0.02   0.6
          300        0.75  0.02   0.8
          300        0.38  0.02   0.9
          300        0.23  0.01   1
          300        0.15  0.01   1
          300        0.15  0.01   1
          500        0.15  0.01   1
          500        0.15  0.01   1
        Analysis
          Thickness  EC  PH   CL
          150        0   6.5  0
          150        0   7    0
          300        0   7.4  0
          300        0   8.1  0
          300        0   8.3  0
          300        0   8.5  0
          300        0   8.5  0
          500        0   8.5  0
          500        0   8.5  0
        Sample Initial nitrogen: NO3Units=ppm; NH4Units=ppm; SWUnits=Volumetric; OCUnits=Total; PHUnits=Water
          Thickness  NO3       NH4
          150        0.399957  0.600183
          150        0.599955  0.100016
          300        0.599952  0.100016
          300        0.299999  0.100016
          300        0.70001   0.100016
          300        0.399987  0.100016
          300        0.1       0.1
          500        0.1       0.1
          500        0.1       0.1
        Sample Initial water: Thickness=[150, 150, 300, 300, 300, 300, 300, 500, 500]; NO3Units=ppm; NH4Units=ppm; SWUnits=Volumetric; OCUnits=Total; PHUnits=Water
          SW=[0.34, 0.284, 0.382, 0.426, 0.422, 0.451, 0.425, 0.425, 0.425]
      surfaceom
        PoolName = wheat_stubble  # Organic Matter pool name
        type = wheat  # Organic Matter type
        mass = 1000  # Initial surface residue (kg/ha)
        cnr = 80  # C:N ratio of initial residue
        standing_fraction = 0  # Fraction of residue standing
      fertiliser
      irrigation
        automatic_irrigation = on
        asw_depth = 300  # Depth to which ASW is calculated. (mm)
        crit_fr_asw = 0.6  # Fraction of ASW below which irrigation is applied (0-1.0)
        irrigation_efficiency = 1  # Efficiency of the irrigation. (0-1.0)
        default_no3_conc = 0  # Nitrate concentration (ppm N)
        default_nh4_conc = 0  # Ammonium concentration (ppm N)
        default_cl_conc = 0  # Chloride concentration (ppm Cl)
      rice
        eo_source = eo
      folder Manager folder
        manager Rice sowing rule
          on init:
```
!Inital variables
Irrigation_amount = 0
evap_amount = 0
```
          on start_of_day:
```
!Upland Aus
                                      ! plant 25th Mar (Mar-July)
if (day = 84) then
    rice sow cultivar = local, establishment = direct-seed, nplds = 180 (p/m2)
endif
```
          on end_of_day:
```
if (rice.plant_status = 'dead') then
  rice end_crop
  Irrigation_amount = 0                                                   !reset  counters
  evap_amount = 0
                                                                                           !remove stubble
  SurfaceOM tillage type = burn, remove = 0.95
endif


                                                                                           !counters
 Irrigation_amount = Irrigation_amount + irrig_tot
 evap_amount = evap_amount + es
```
        manager Fertilise_sowing
          # When should fertiliser be applied
          fert_date = 15-aug  # Enter fertiliser date (dd-mmm)
          fert_criteria = 1000  # Don't add fertiliser if N in top 2 layers exceeds (kg/ha)
          # Fertiliser application details
          fertmodule = Fertiliser  # Module used to apply the fertiliser
          fert_amount = 0  # Amount of fertiliser to apply (kg/ha)
          fert_type = urea_N  # Fertiliser type
          on start_of_day:
```
         if (today = date('[fert_date]') then
            N_topsoil = no3(1) + nh4(1) + no3(2) + nh4(2)
            if (N_topsoil < [fert_criteria]) then
               [fertmodule] apply amount = [fert_amount] (kg/ha), depth = 50 (mm), type = [fert_type] ()
            endif
         endif
```
        manager First_Fertilise_DAS
          # When should fertiliser be applied
          fert_date = 05-Apr  # Enter fertiliser date (dd-mmm)
          fert_criteria = 1000  # Don't add fertiliser if N in top 2 layers exceeds (kg/ha)
          # Fertiliser application details
          fertmodule = Fertiliser  # Module used to apply the fertiliser
          fert_amount = 15  # Amount of fertiliser to apply (kg/ha)
          fert_type = urea_N  # Fertiliser type
          on start_of_day:
          script: same as in Upland Aus.paddock.Manager folder.Fertilise_sowing
        manager Second_Fertilise_DAS
          # When should fertiliser be applied
          fert_date = 25-Apr  # Enter fertiliser date (dd-mmm)
          fert_criteria = 1000  # Don't add fertiliser if N in top 2 layers exceeds (kg/ha)
          # Fertiliser application details
          fertmodule = Fertiliser  # Module used to apply the fertiliser
          fert_amount = 20  # Amount of fertiliser to apply (kg/ha)
          fert_type = urea_N  # Fertiliser type
          on start_of_day:
          script: same as in Upland Aus.paddock.Manager folder.Fertilise_sowing
        manager Third_Fertilise_DAS
          # When should fertiliser be applied
          fert_date = 10-May  # Enter fertiliser date (dd-mmm)
          fert_criteria = 1000  # Don't add fertiliser if N in top 2 layers exceeds (kg/ha)
          # Fertiliser application details
          fertmodule = Fertiliser  # Module used to apply the fertiliser
          fert_amount = 40  # Amount of fertiliser to apply (kg/ha)
          fert_type = urea_N  # Fertiliser type
          on start_of_day:
          script: same as in Upland Aus.paddock.Manager folder.Fertilise_sowing
      outputfile Output: filename=Upland Aus Output.out; title=Upland Aus Output
        variables
          variables: dd/mm/yyyy as Date, year, crop_type, DaysAfterSowing, dae as Rice.DaysAfterSowing, cropsta, wagt, wso, rlai, zrt, ldstrs, lestrs, lrstrs, ancr, irrigation_amount as irrig, evap_amount, biomass, yield, TopsTotalN, esw, tnsoil as N_avail_4_rice, NO3(), surfaceom_wt, water_table
        events Reporting Frequency: event=daily  # End of daily simulation time step
  simulation Paddy Transplanted Aman
    memo
      Paddy rice - Transplanted - mid season - using a BR23 cultivar described in the INI.
    climatechange
      maxtmodifier = 0  # Change in maximum temperature in degrees celsius
      mintmodifier = 0  # Change in minimum temperature in degrees celsius
      rainmodifier = 1  # Relative change in rainfall
      radiationmodifier = 1.5  # Relative change in radiation
      co2 = 350  # Atmospheric C02 concentration (ppm)
    metfile met: filename=%apsim%/Examples/MetFiles/Bhola.met
    clock
      start_date = 1/01/1988  # Select the start date of the simulation
      end_date = 30/6/1989  # Select the end date of the simulation
    summaryfile
    area paddock
      Soil BholaSouthBalia06: Site=Sth Balia; Region=Bhola; State=Bangladesh; Longitude=90.633614
        Comment = 2006/07 field measured DUL using wettest profile from pre-season measurements, estimated CLL  # Comments
        NearestTown = Bhola
        Latitude = 999999  # Latitude (WGS84)
        Water: same as Upland Aus.paddock.BholaSouthBalia06.Water
        SoilWater: SummerCona=2.5; SummerU=4; SummerDate=1-Nov; WinterCona=2.5; WinterU=4; WinterDate=1-Apr; DiffusConst=450; DiffusSlope=188; Salb=0.14; CN2Bare=84; CNRed=20; CNCov=0.8
          Thickness  SWCON  MWCON
          150        0.1    1
          150        0.1    1
          300        0.1    1
          300        0.1    1
          300        0.1    1
          300        0.1    1
          300        0.1    1
          500        0.1    1
          500        0      0
        SoilOrganicMatter: RootCN=40; RootWt=1500; SoilCN=12.5; EnrACoeff=7.4; EnrBCoeff=0.2
          Thickness  OC    FBiom  FInert
          150        1.5   0.04   0.4
          150        1.2   0.02   0.6
          300        0.75  0.02   0.8
          300        0.38  0.02   0.9
          300        0.23  0.01   1
          300        0.15  0.01   1
          300        0.15  0.01   1
          500        0.15  0.01   1
          500        0.15  0.01   1
        Analysis
          Thickness  EC  PH   CL
          150        0   6.5  0
          150        0   7    0
          300        0   7.4  0
          300        0   8.1  0
          300        0   8.3  0
          300        0   8.5  0
          300        0   8.5  0
          500        0   8.5  0
          500        0   8.5  0
        Sample Initial nitrogen
          Thickness  NO3       NH4
          150        0.399957  0.600183
          150        0.599955  0.100016
          300        0.599952  0.100016
          300        0.299999  0.100016
          300        0.70001   0.100016
          300        0.399987  0.100016
          300        0.1       0.1
          500        0.1       0.1
          500        0.1       0.1
        Sample Initial water: Thickness=[150, 150, 300, 300, 300, 300, 300, 500, 500]
          SW=[0.34, 0.284, 0.382, 0.426, 0.422, 0.451, 0.425, 0.425, 0.425]
      surfaceom
        PoolName = wheat_stubble  # Organic Matter pool name
        type = wheat  # Organic Matter type
        mass = 1000  # Initial surface residue (kg/ha)
        cnr = 80  # C:N ratio of initial residue
        standing_fraction = 0  # Fraction of residue standing
      fertiliser
      irrigation
        automatic_irrigation = on
        asw_depth = 500  # Depth to which ASW is calculated. (mm)
        crit_fr_asw = 0.6  # Fraction of ASW below which irrigation is applied (0-1.0)
        irrigation_efficiency = 1  # Efficiency of the irrigation. (0-1.0)
        default_no3_conc = 0.0  # Nitrate concentration (ppm N)
        default_nh4_conc = 0.0  # Ammonium concentration (ppm N)
        default_cl_conc = 0.0  # Chloride concentration (ppm Cl)
      rice
        eo_source = eo
      folder Manager folder
        manager Rice sowing rule
          on init:
```
!Inital variables
Irrigation_amount = 0
evap_amount = 0
```
          on start_of_day:
```
!Transplanted Aman
                                      ! plant 1st Aug (July-Dec)
! Transplant
if (day = 213) then                                                                    !sbdur= duration of seedbed
                                                                                                    !nplh= number of plants on hills
                                                                                                    !nh= number of hills
    rice sow cultivar = BR23, establishment = transplant, sbdur = 22, nplh = 4 , nh = 28, nplsb = 112
endif
```
          on end_of_day:
          script: same as in Upland Aus.paddock.Manager folder.Rice sowing rule
        manager Fertilise_sowing: same as Upland Aus.paddock.Manager folder.Fertilise_sowing
        manager First_Fertilise_DAS
          # When should fertiliser be applied
          fert_date = 15-aug  # Enter fertiliser date (dd-mmm)
          fert_criteria = 1000  # Don't add fertiliser if N in top 2 layers exceeds (kg/ha)
          # Fertiliser application details
          fertmodule = Fertiliser  # Module used to apply the fertiliser
          fert_amount = 25  # Amount of fertiliser to apply (kg/ha)
          fert_type = urea_N  # Fertiliser type
          on start_of_day:
          script: same as in Upland Aus.paddock.Manager folder.Fertilise_sowing
        manager Second_Fertilise_DAS
          # When should fertiliser be applied
          fert_date = 30-aug  # Enter fertiliser date (dd-mmm)
          fert_criteria = 1000  # Don't add fertiliser if N in top 2 layers exceeds (kg/ha)
          # Fertiliser application details
          fertmodule = Fertiliser  # Module used to apply the fertiliser
          fert_amount = 30  # Amount of fertiliser to apply (kg/ha)
          fert_type = urea_N  # Fertiliser type
          on start_of_day:
          script: same as in Upland Aus.paddock.Manager folder.Fertilise_sowing
        manager Third_Fertilise_DAS
          # When should fertiliser be applied
          fert_date = 15-sep  # Enter fertiliser date (dd-mmm)
          fert_criteria = 1000  # Don't add fertiliser if N in top 2 layers exceeds (kg/ha)
          # Fertiliser application details
          fertmodule = Fertiliser  # Module used to apply the fertiliser
          fert_amount = 50  # Amount of fertiliser to apply (kg/ha)
          fert_type = urea_N  # Fertiliser type
          on start_of_day:
          script: same as in Upland Aus.paddock.Manager folder.Fertilise_sowing
      outputfile Output: filename=Paddy Transplanted Aman Output.out; title=Paddy Transplanted Aman Output
        variables
          variable:
            dd/mm/yyyy as Date  # Date (dd/mm/yyyy)
            year
            crop_type  # usually rice
            DaysAfterSowing
            dae as Rice.DaysAfterSowing  # Days after emergence (days)
            cropsta  # Crop stage(0-4)
            wagt  # Total aboveground dry matter kg/ha
            wso  # Dry weight of storage organs kg/ha
            rlai  # Rice leaf area index
            zrt  # Root length or rooting depth
            ldstrs  # Drought stress factor accelerating leaf death   !-
            lestrs  # Drought stress factor reducing leaf expansion  !-
            lrstrs  # Drought stress factor causing leaf rolling
            ancr  # Actual nitrogen uptake rate by crop  !kg N ha-1 d-1
            irrigation_amount as irrig
            evap_amount
            biomass  # Biomass
            yield  # Yield
            TopsTotalN  # Total Tops nitrogen
            esw
            tnsoil as N_avail_4_rice  # Daily amount of N available for uptake from soil  !kg N ha-1 d-1
            NO3()
            surfaceom_wt
            water_table
        events Reporting Frequency: event=daily  # End of daily simulation time step
  simulation Paddy Transplated Rotation
    memo
      Transplanted - early season - using a BR3 cultivar described in the INI.
                          - mid season - August - BR23
    climatechange
      maxtmodifier = 0  # Change in maximum temperature in degrees celsius
      mintmodifier = 0  # Change in minimum temperature in degrees celsius
      rainmodifier = 1  # Relative change in rainfall
      radiationmodifier = 1.5  # Relative change in radiation
      co2 = 350  # Atmospheric C02 concentration (ppm)
    metfile met: filename=%apsim%/Examples/MetFiles/Bhola.met
    clock
      start_date = 1/01/1988  # Select the start date of the simulation
      end_date = 30/6/1989  # Select the end date of the simulation
    summaryfile
    area paddock
      Soil BholaSouthBalia06: same as Paddy Transplanted Aman.paddock.BholaSouthBalia06
      surfaceom
        PoolName = wheat_stubble  # Organic Matter pool name
        type = wheat  # Organic Matter type
        mass = 1000  # Initial surface residue (kg/ha)
        cnr = 80  # C:N ratio of initial residue
        standing_fraction = 0  # Fraction of residue standing
      fertiliser
      irrigation
        automatic_irrigation = on
        asw_depth = 300  # Depth to which ASW is calculated. (mm)
        crit_fr_asw = 0.6  # Fraction of ASW below which irrigation is applied (0-1.0)
        irrigation_efficiency = 1  # Efficiency of the irrigation. (0-1.0)
        default_no3_conc = 0.0  # Nitrate concentration (ppm N)
        default_nh4_conc = 0.0  # Ammonium concentration (ppm N)
        default_cl_conc = 0.0  # Chloride concentration (ppm Cl)
      rice
        eo_source = eo
      folder Manager folder
        manager Rice sowing rule
          on init:
```
!Inital variables
Irrigation_amount = 0
evap_amount = 0
```
          on start_of_day:
```
!Transplanted Aus
                                      ! plant 25th Apr (Apr-Aug)
! Transplant
if (day = 91) then                                                                    !sbdur= duration of seedbed
                                                                                                    !nplh= number of plants on hills
                                                                                                    !nh= number of hills
          rice sow cultivar = BR3, establishment = transplant, sbdur = 22, nplh = 25 , nh = 7, nplsb = 180
endif

!Transplanted Aman
                                      ! plant 20th Aug (July-Dec)
! Transplant
if (day = 213) then                                                                    !sbdur= duration of seedbed
                                                                                                    !nplh= number of plants on hills
                                                                                                    !nh= number of hills
      rice sow cultivar = BR23, establishment = transplant, sbdur = 22, nplh = 4 , nh = 28, nplsb = 112
endif
```
          on end_of_day:
          script: same as in Upland Aus.paddock.Manager folder.Rice sowing rule
        manager Fertilise_sowing: same as Upland Aus.paddock.Manager folder.Fertilise_sowing
        manager First_Fertilise_DAS
          # When should fertiliser be applied
          fert_date = 05-may  # Enter fertiliser date (dd-mmm)
          fert_criteria = 1000  # Don't add fertiliser if N in top 2 layers exceeds (kg/ha)
          # Fertiliser application details
          fertmodule = Fertiliser  # Module used to apply the fertiliser
          fert_amount = 25  # Amount of fertiliser to apply (kg/ha)
          fert_type = urea_N  # Fertiliser type
          on start_of_day:
          script: same as in Upland Aus.paddock.Manager folder.Fertilise_sowing
        manager Second_Fertilise_DAS
          # When should fertiliser be applied
          fert_date = 22-may  # Enter fertiliser date (dd-mmm)
          fert_criteria = 1000  # Don't add fertiliser if N in top 2 layers exceeds (kg/ha)
          # Fertiliser application details
          fertmodule = Fertiliser  # Module used to apply the fertiliser
          fert_amount = 30  # Amount of fertiliser to apply (kg/ha)
          fert_type = urea_N  # Fertiliser type
          on start_of_day:
          script: same as in Upland Aus.paddock.Manager folder.Fertilise_sowing
        manager Third_Fertilise_DAS
          # When should fertiliser be applied
          fert_date = 6-jun  # Enter fertiliser date (dd-mmm)
          fert_criteria = 1000  # Don't add fertiliser if N in top 2 layers exceeds (kg/ha)
          # Fertiliser application details
          fertmodule = Fertiliser  # Module used to apply the fertiliser
          fert_amount = 50  # Amount of fertiliser to apply (kg/ha)
          fert_type = urea_N  # Fertiliser type
          on start_of_day:
          script: same as in Upland Aus.paddock.Manager folder.Fertilise_sowing
      outputfile Output: filename=Paddy Transplated Rotation Output.out; title=Paddy Transplated Rotation Output
        variables: same as Paddy Transplanted Aman.paddock.Output.Variables
        events Reporting Frequency: event=daily  # End of daily simulation time step
  simulation Upland Aus Swim
    memo
      Upland broadcast - local cultivar - short season low yielding.

      SWIM characterisation needs work.
    metfile met: filename=%apsim%/Examples/MetFiles/Bhola.met
    clock
      start_date = 1/01/1988  # Select the start date of the simulation
      end_date = 30/6/1989  # Select the end date of the simulation
    summaryfile
    area paddock
      Soil SWIM Soil: Latitude=0; Longitude=0; YearOfSampling=0
        Analysis: PHUnits=Water; BoronUnits=HotWater
        Water
          Thickness  BD     AirDry  LL15  DUL    SAT    KS
          150        1.458  0.18    0.18  0.345  0.42   25
          150        1.348  0.19    0.19  0.311  0.461  25
          300        1.413  0.19    0.2   0.387  0.437  25
          300        1.4    0.2     0.25  0.392  0.442  25
          300        1.36   0.25    0.27  0.407  0.457  25
          300        1.32   0.28    0.3   0.407  0.457  25
          300        1.32   0.3     0.34  0.407  0.457  25
          500        1.32   0.34    0.38  0.41   0.457  25
          500        1.32   0.36    0.38  0.41   0.457  25
          SoilCrop rice: LL=[0.18, 0.19, 0.22, 0.27, 0.3, 0.35, 0.407, 0.41, 0.41]; KL=[0.06, 0.06, 0.06, 0.06, 0.03, 0.02, 0.02, 0.02, 0.02]; XF=[1, 1, 1, 1, 1, 0, 0, 0, 0]
        Sample Soil sample: NO3Units=ppm; NH4Units=ppm; SWUnits=Volumetric; OCUnits=Total; PHUnits=Water
          Thickness  NO3  NH4  SW     PH
          150        0.4  0.6  0.345  6.5
          150        0.6  0.1  0.311  7
          300        0.6  0.1  0.387  7.4
          300        0.3  0.1  0.392  8.1
          300        0.7  0.1  0.407  8.3
          300        0.4  0.1  0.407  8.5
          300        0.1  0.1  0.407  8.5
          500        0.1  0.1  0.41   8.5
          500        0.1  0.1  0.41   8.5
        LayerStructure
          Thickness=[10, 20, 30, 40, 100, 100, 300, 300, 300, 300, 300, 500, 500]
        SoilOrganicMatter: same as Upland Aus.paddock.BholaSouthBalia06.SoilOrganicMatter
        Swim: Salb=0.13; CN2Bare=75; CNRed=20; CNCov=0.8; KDul=0.1; PSIDul=-100; VC=true; DTmin=0; DTmax=1440; MaxWaterIncrement=10; SpaceWeightingFactor=0; SoluteSpaceWeightingFactor=0; Diagnostics=false
          SwimSoluteParameters: Dis=15; Disp=1; A=1; DTHP=1
            zero: DTHC, WaterTableCl, WaterTableNO3, WaterTableNH4, WaterTableUrea, WaterTableTracer, WaterTableMineralisationInhibitor, WaterTableUreaseInhibitor, WaterTableNitrificationInhibitor, WaterTableDenitrificationInhibitor
            Thickness  NO3Exco  NO3FIP  NH4Exco  NH4FIP  UreaExco  UreaFIP  ClExco  ClFIP
            1000       0        1       100      1       0         1        0       1
            1000       0        1       100      1       0         1        0       1
            1000       0        1       100      1       0         1        0       1
          SwimWaterTable: WaterTableDepth=2800
          SwimSubsurfaceDrain: DrainDepth=600; DrainSpacing=30000; DrainRadius=50; Klat=1000; ImpermDepth=3000
      surfaceom
        PoolName = wheat_stubble  # Organic Matter pool name
        type = wheat  # Organic Matter type
        mass = 1000  # Initial surface residue (kg/ha)
        cnr = 80  # C:N ratio of initial residue
        standing_fraction = 0  # Fraction of residue standing
      fertiliser
      irrigation: same as Upland Aus.paddock.Irrigation
      rice
        eo_source = eo
      folder Manager folder: same as Upland Aus.paddock.Manager folder
      outputfile Output: filename=Upland Aus Swim Output.out; title=Upland Aus Swim Output
        variables
          variables: dd/mm/yyyy as Date, year, crop_type, DaysAfterSowing, dae as Rice.DaysAfterSowing, cropsta, wagt, wso, rlai, zrt, ldstrs, lestrs, lrstrs, ancr, irrigation_amount as irrig, evap_amount, biomass, yield, TopsTotalN, esw, tnsoil as N_avail_4_rice, NO3(), surfaceom_wt, water_table
        events Reporting Frequency: event=daily  # End of daily simulation time step
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