folder simulations: version=37; creator=Apsim 7.9-r4088
  simulation Wether Lucerne Supplement
    PlugIns
      PlugIn=[%apsim%\UserInterface\ApsimUIPlugIn.xml, %apsim%\UserInterface\SoilTypes.xml, %apsim%\UserInterface\GenericFunctionsIDE.xml, %apsim%\UserInterface\Graph.xml, %apsim%\UserInterface\DevelopersPlugIn.xml, %apsim%\Model\SlurryTank.xml, %apsim%\Model\Pigs.xml, %apsim%\Model\FeedItem.xml, %apsim%\Model\WHEATSTRAW.xml, %apsim%\Model\WASHWATER.xml, %apsim%\Model\animalSection.xml, %apsim%\Model\floor.xml, %apsim%\Model\PigHousing.xml, %apsim%\Model\PHmodel.xml, %apsim%\Model\simpleBuilding.xml, %apsim%\Model\atmosphere.xml, %apsim%\Model\Accum.xml, %apsim%\Model\AgPasture.xml, %apsim%\Model\Bambatsi.xml, %apsim%\Model\Barley.xml, %apsim%\Model\Br.xml, %apsim%\Model\Bore.xml, %apsim%\Model\Broccoli.xml, %apsim%\Model\ButterflyPea.xml, %apsim%\Model\Canola.xml, %apsim%\Model\Canopy.xml, %apsim%\Model\Centro.xml, %apsim%\Model\Channel.xml, %apsim%\Model\Chickpea.xml, %apsim%\Model\Chicory.xml, %apsim%\Model\Cl2.xml, %apsim%\Model\Climatechange.xml, %apsim%\Model\Clock.xml, %apsim%\Model\Cotton.xml, %apsim%\Model\Cowpea.xml, %apsim%\Model\CropUI.xml, %apsim%\Model\Dam.xml, %apsim%\Model\DCD.xml, %apsim%\Model\dcd1.xml, %apsim%\Model\dcd2.xml, %apsim%\Model\dcd3.xml, %apsim%\Model\Dymex_StripeRust.xml, %apsim%\Model\EGrandis.xml, %apsim%\Model\EMelliodora.xml, %apsim%\Model\Eo.xml, %apsim%\Model\EPopulnea.xml, %apsim%\Model\Erosion.xml, %apsim%\Model\Events.xml, %apsim%\Model\Fababean.xml, %apsim%\Model\Factorial.xml, %apsim%\Model\Factor.xml, %apsim%\Model\FactorComplex.xml, %apsim%\Model\FrenchBean.xml, %apsim%\Model\Fertiliser.xml, %apsim%\Model\Fieldpea.xml, %apsim%\Model\Gcm_data.xml, %apsim%\Model\Grasp.xml, %apsim%\Model\Graz.xml, %apsim%\Model\Growth.xml, %apsim%\Model\Horsegram.xml, %apsim%\Model\Ini.xml, %apsim%\Model\InitWater.xml, %apsim%\Model\Input.xml, %apsim%\Model\Irrigation.xml, %apsim%\Model\KWTest.xml, %apsim%\Model\Lablab.xml, %apsim%\Model\Lettuce.xml, %apsim%\Model\Log.xml, %apsim%\Model\Lentil.xml, %apsim%\Model\Lucerne.xml, %apsim%\Model\Lupin.xml, %apsim%\Model\Maize.xml, %apsim%\Model\MaizeZ.xml, %apsim%\Model\Manager.xml, %apsim%\Model\Map.xml, %apsim%\Model\Memo.xml, %apsim%\Model\MetFile.xml, %apsim%\Model\MicroMet.xml, %apsim%\Model\Millet.xml, %apsim%\Model\Millet1.xml, %apsim%\Model\Millet2.xml, %apsim%\Model\Millet3.xml, %apsim%\Model\Millet4.xml, %apsim%\Model\Millet5.xml, %apsim%\Model\Mucuna.xml, %apsim%\Model\Mungbean.xml, %apsim%\Model\Navybean.xml, %apsim%\Model\NitrificationInhibitor2.xml, %apsim%\Model\Oats.xml, %apsim%\Model\Ocean_data.xml, %apsim%\Model\OilPalm.xml, %apsim%\Model\Operations.xml, %apsim%\Model\Orobanche.xml, %apsim%\Model\Oryza.xml, %apsim%\Model\OutputFile.xml, %apsim%\Model\Patchinput.xml, %apsim%\Model\PatchData.xml, %apsim%\Model\Peanut.xml, %apsim%\Model\Pigeonpea.xml, %apsim%\Model\Pond.xml, %apsim%\Model\Potato.xml, %apsim%\Model\RLink.xml, %apsim%\Model\RotPlot.xml, %apsim%\Model\RugPlotUI.xml, %apsim%\Model\Root.xml, %apsim%\Model\Rule.xml, %apsim%\Model\Script.xml, %apsim%\Model\Seedling.xml, %apsim%\Model\SiloInput.xml, %apsim%\Model\Slurp.xml, %apsim%\Model\Soi.xml, %apsim%\Model\Soil.xml, %apsim%\Model\SoilNui.xml, %apsim%\Model\SoilTemp.xml, %apsim%\Model\Solute.xml, %apsim%\Model\SWIM3SubsurfaceDrain.xml, %apsim%\Model\SWIM3SoluteParameters.xml, %apsim%\Model\SWIM3.xml, %apsim%\Model\SWIM3WaterTable.xml, %apsim%\Model\Tracer.xml, %apsim%\Model\Sorghum.xml, %apsim%\Model\SorghumConstants.xml, %apsim%\Model\SorghumGenotype.xml, %apsim%\Model\Soybean.xml, %apsim%\Model\Stylo.xml, %apsim%\Model\Sugar.xml, %apsim%\Model\SurfaceTemp.xml, %apsim%\Model\Summaryfile.xml, %apsim%\Model\Sunflower.xml, %apsim%\Model\SurfaceOM.xml, %apsim%\Model\SweetCorn.xml, %apsim%\Model\SweetSorghum.xml, %apsim%\Model\SWIM2.xml, %apsim%\Model\Sysbal.xml, %apsim%\Model\Tcllink.xml, %apsim%\Model\Tclmanager.xml, %apsim%\Model\Tclui.xml, %apsim%\Model\TextOutput.xml, %apsim%\Model\Tracker.xml, %apsim%\Model\Tree.xml, %apsim%\Model\UreaseInhibitor2.xml, %apsim%\Model\Variables.xml, %apsim%\Model\Venlink.xml, %apsim%\Model\vine.xml, %apsim%\Model\WaterSupply.xml, %apsim%\Model\Weed.xml, %apsim%\Model\Wheat.xml, %apsim%\Model\WFMillet.xml, %apsim%\Model\YPCalc.xml, %apsim%\UserInterface\Ausfarm.xml]
    metfile met: filename=%Apsim%/Examples/MetFiles/Goond.met
    clock
      start_date = 1/01/1940  # Select the start date of the simulation
      end_date = 30/12/1945  # Select the end date of the simulation
    summaryfile
    area paddock: paddock_area=1.0
      Soil: SoilType=Black Vertosol; Site=Generic; Region=South East Queensland; Latitude=0; Longitude=0
        Water
          Thickness  BD    AirDry  LL15  DUL   SAT
          150        1.02  0.14    0.29  0.54  0.59
          150        1.03  0.26    0.29  0.53  0.58
          300        1.02  0.29    0.29  0.54  0.59
          300        1.02  0.29    0.29  0.54  0.58
          300        1.06  0.3     0.3   0.52  0.57
          300        1.11  0.31    0.31  0.5   0.55
          300        1.12  0.32    0.32  0.5   0.55
          300        1.15  0.33    0.33  0.48  0.53
          300        1.18  0.34    0.34  0.47  0.52
          300        1.2   0.35    0.35  0.46  0.51
          300        1.25  0.36    0.36  0.44  0.49
          SoilCrop wheat
            LL=[0.29, 0.29, 0.32, 0.32, 0.35, 0.38, 0.41, 0.48, 0.47, 0.46, 0.44]
            KL=[0.1, 0.1, 0.08, 0.06, 0.04, 0.02, 0.01, 0, 0, 0, 0]
            XF=[1, 1, 1, 1, 1, 1, 1, 0, 0, 0, 0]
          SoilCrop barley
            LL=[0.29, 0.29, 0.32, 0.38, 0.39, 0.39, 0.41, 0.48, 0.47, 0.46, 0.44]
            KL=[0.1, 0.1, 0.08, 0.06, 0.04, 0.02, 0.01, 0, 0, 0, 0]
            XF=[1, 1, 1, 1, 1, 1, 1, 0, 0, 0, 0]
          SoilCrop canola
            LL=[0.29, 0.29, 0.32, 0.32, 0.35, 0.38, 0.41, 0.48, 0.47, 0.46, 0.44]
            KL=[0.1, 0.1, 0.08, 0.06, 0.04, 0.02, 0.01, 0, 0, 0, 0]
            XF=[1, 1, 1, 1, 1, 1, 1, 0, 0, 0, 0]
          SoilCrop Chickpea
            LL=[0.29, 0.29, 0.36, 0.43, 0.51, 0.5, 0.5, 0.48, 0.47, 0.46, 0.44]
            KL=[0.1, 0.1, 0.08, 0.06, 0.04, 0.02, 0.01, 0, 0, 0, 0]
            XF=[1, 1, 1, 1, 1, 1, 1, 0, 0, 0, 0]
          SoilCrop Lucerne
            LL=[0.29, 0.29, 0.29, 0.29, 0.3, 0.31, 0.32, 0.33, 0.34, 0.35, 0.36]
            KL=[0.1, 0.1, 0.1, 0.1, 0.09, 0.09, 0.09, 0.09, 0.09, 0.09, 0.09]
            XF=[1, 1, 1, 1, 1, 1, 1, 1, 1, 1, 1]
          SoilCrop Maize
            LL=[0.29, 0.29, 0.34, 0.34, 0.37, 0.4, 0.42, 0.48, 0.47, 0.46, 0.44]
            KL=[0.1, 0.1, 0.1, 0.08, 0.06, 0.04, 0.02, 0, 0, 0, 0]
            XF=[1, 1, 1, 1, 1, 1, 1, 0, 0, 0, 0]
          SoilCrop Perennial Grass
            LL=[0.29, 0.29, 0.39, 0.41, 0.4, 0.4, 0.41, 0.41, 0.4, 0.4, 0.42]
            KL=[0.1, 0.1, 0.1, 0.1, 0.09, 0.07, 0.05, 0, 0, 0, 0]
            XF=[1, 1, 1, 1, 1, 1, 1, 0, 0, 0, 0]
          SoilCrop Sorghum
            LL=[0.29, 0.29, 0.35, 0.38, 0.4, 0.4, 0.4, 0.48, 0.47, 0.46, 0.44]
            KL=[0.1, 0.1, 0.1, 0.08, 0.06, 0.04, 0.02, 0, 0, 0, 0]
            XF=[1, 1, 1, 1, 1, 1, 1, 0, 0, 0, 0]
          SoilCrop Cowpea
            LL=[0.29, 0.29, 0.32, 0.32, 0.35, 0.38, 0.41, 0.48, 0.47, 0.46, 0.44]
            KL=[0.1, 0.1, 0.08, 0.06, 0.04, 0.02, 0.01, 0, 0, 0, 0]
            XF=[1, 1, 1, 1, 1, 1, 1, 0, 0, 0, 0]
          SoilCrop Fababean
            LL=[0.29, 0.29, 0.32, 0.32, 0.35, 0.38, 0.41, 0.48, 0.47, 0.46, 0.44]
            KL=[0.1, 0.1, 0.08, 0.06, 0.04, 0.02, 0.01, 0, 0, 0, 0]
            XF=[1, 1, 1, 1, 1, 1, 1, 0, 0, 0, 0]
          SoilCrop Mungbean
            LL=[0.29, 0.29, 0.32, 0.32, 0.35, 0.38, 0.41, 0.48, 0.47, 0.46, 0.44]
            KL=[0.1, 0.1, 0.08, 0.06, 0.04, 0.02, 0.01, 0, 0, 0, 0]
            XF=[1, 1, 1, 1, 1, 1, 1, 0, 0, 0, 0]
          SoilCrop Navybean
            LL=[0.29, 0.29, 0.32, 0.32, 0.35, 0.38, 0.41, 0.48, 0.47, 0.46, 0.44]
            KL=[0.1, 0.1, 0.08, 0.06, 0.04, 0.02, 0.01, 0, 0, 0, 0]
            XF=[1, 1, 1, 1, 1, 1, 1, 0, 0, 0, 0]
          SoilCrop Peanut
            LL=[0.29, 0.29, 0.32, 0.32, 0.35, 0.38, 0.41, 0.48, 0.47, 0.46, 0.44]
            KL=[0.1, 0.1, 0.08, 0.06, 0.04, 0.02, 0.01, 0, 0, 0, 0]
            XF=[1, 1, 1, 1, 1, 1, 1, 0, 0, 0, 0]
          SoilCrop Pigeonpea
            LL=[0.29, 0.29, 0.32, 0.32, 0.35, 0.38, 0.41, 0.48, 0.47, 0.46, 0.44]
            KL=[0.1, 0.1, 0.08, 0.06, 0.04, 0.02, 0.01, 0, 0, 0, 0]
            XF=[1, 1, 1, 1, 1, 1, 1, 0, 0, 0, 0]
          SoilCrop Soybean
            LL=[0.29, 0.29, 0.32, 0.32, 0.35, 0.38, 0.41, 0.48, 0.47, 0.46, 0.44]
            KL=[0.1, 0.1, 0.08, 0.06, 0.04, 0.02, 0.01, 0, 0, 0, 0]
            XF=[1, 1, 1, 1, 1, 1, 1, 0, 0, 0, 0]
          SoilCrop Stylo
            LL=[0.29, 0.29, 0.32, 0.32, 0.35, 0.38, 0.41, 0.48, 0.47, 0.46, 0.44]
            KL=[0.1, 0.1, 0.08, 0.06, 0.04, 0.02, 0.01, 0, 0, 0, 0]
            XF=[1, 1, 1, 1, 1, 1, 1, 0, 0, 0, 0]
          SoilCrop Sugar
            LL=[0.29, 0.29, 0.32, 0.32, 0.35, 0.38, 0.41, 0.48, 0.47, 0.46, 0.44]
            KL=[0.1, 0.1, 0.08, 0.06, 0.04, 0.02, 0.01, 0, 0, 0, 0]
            XF=[1, 1, 1, 1, 1, 1, 1, 0, 0, 0, 0]
          SoilCrop Sunflower
            LL=[0.29, 0.29, 0.32, 0.32, 0.35, 0.38, 0.41, 0.48, 0.47, 0.46, 0.44]
            KL=[0.1, 0.1, 0.08, 0.06, 0.04, 0.02, 0.01, 0, 0, 0, 0]
            XF=[1, 1, 1, 1, 1, 1, 1, 0, 0, 0, 0]
          SoilCrop Lablab
            LL=[0.29, 0.29, 0.32, 0.32, 0.35, 0.38, 0.41, 0.48, 0.47, 0.46, 0.44]
            KL=[0.1, 0.1, 0.08, 0.06, 0.04, 0.02, 0.01, 0, 0, 0, 0]
            XF=[1, 1, 1, 1, 1, 1, 1, 0, 0, 0, 0]
          SoilCrop Cotton
            LL=[0.29, 0.29, 0.35, 0.36, 0.38, 0.39, 0.39, 0.48, 0.47, 0.46, 0.44]
            KL=[0.1, 0.1, 0.1, 0.08, 0.06, 0.04, 0.02, 0, 0, 0, 0]
            XF=[1, 1, 1, 1, 1, 1, 1, 0, 0, 0, 0]
        SoilWater: SummerCona=3.5; SummerU=6; SummerDate=1-Nov; WinterCona=3.5; WinterU=6; WinterDate=1-Apr; DiffusConst=40; DiffusSlope=16; Salb=0.13; CN2Bare=73; CNRed=20; CNCov=0.8; Thickness=[150, 150, 300, 300, 300, 300, 300, 300, 300, 300, 300]; SWCON=[0.3, 0.3, 0.3, 0.3, 0.3, 0.3, 0.3, 0.3, 0.3, 0.3, 0.3]
        SoilOrganicMatter: RootCN=40; RootWt=200; SoilCN=12.5; EnrACoeff=7.4; EnrBCoeff=0.2
          Thickness  OC    FBiom  FInert
          150        1.04  0.025  0.4
          150        0.89  0.02   0.6
          300        0.89  0.015  0.8
          300        0.89  0.01   0.9
          300        0.77  0.01   0.95
          300        0.45  0.01   0.95
          300        0.27  0.01   0.95
          300        0.22  0.01   0.95
          300        0.16  0.01   0.95
          300        0.13  0.01   0.95
          300        0.12  0.01   0.95
        Analysis
          Thickness  EC    PH
          150        0.2   8.4
          150        0.25  8.8
          300        0.31  9
          300        0.4   9.2
          300        0.59  9.2
          300        0.84  9.1
          300        0.93  9
          300        1.01  9
          300        1.06  8.9
          300        1.05  8.9
          300        1.01  8.9
        Sample Initial nitrogen
          Thickness  NO3      NH4
          150        6.50005  0.600073
          150        2.10002  0.100012
          300        2.10002  0.100012
          300        1.70001  0.100012
          300        1.70001  0.100012
          300        1.70001  0.100012
          300        1.70001  0.100012
          300        1.70001  0.100012
          300        1.70001  0.100012
          300        1.70001  0.100012
          300        1.70001  0.100012
        Sample Initial water: Thickness=[150, 150, 300, 300, 300, 300, 300, 300, 300, 300, 300]
          SW=[0.540, 0.530, 0.540, 0.540, 0.520, 0.500, 0.500, 0.480, 0.470, 0.460, 0.440]
      surfaceom SurfaceOrganicMatter
        PoolName = wheat_stubble  # Organic Matter pool name
        type = wheat  # Organic Matter type
        mass = 1000  # Initial surface residue (kg/ha)
        cnr = 80  # C:N ratio of initial residue
        standing_fraction = 0  # Fraction of residue standing
      lucerne
      supplement
        spoilage_time = 0
      stock
        fraction_faeces_added = 0.5
        fraction_urine_added = 0.5
        herbage1 = lucerne  # First plant herbage source
      folder Manager folder
        manager Sow on a fixed date
          # Sowing criteria
          date = 1/07/1940  # Enter sowing date (dd-mmm)
          # Sowing parameters
          crop = lucerne  # Enter name of crop to sow
          density = 100  # Enter sowing density (plants/m2)
          depth = 50  # Enter sowing depth (mm)
          cultivar = sceptre  # Enter cultivar
          row_spacing = 500  # Enter row spacing (mm)
          on start_of_day:
```
        if (today = date('[date]') then
              [crop] sow plants =[density], sowing_depth = [depth], cultivar = [cultivar], row_spacing = [row_spacing]
         endif
```
        manager Buy sheep on feed-on-offer
          # Buy properties
          stockmodule = stock  # Name of stock module
          genotype = suffolk  # Select Genotype
          herbage_module = lucerne  # Module supplying herbage
          buy_feed_on_offer = 200  # Feed on offer (kg/ha)
          buy_number = 15  # Number of stock
          sex = wether  # Select sex
          buy_age = 12  # Age (months)
          buy_weight = 45  # Weight (kg)
          on init:
```
               sheep_presence = 'off'
```
          on start_of_day:
```
        if ([herbage_module].biomass >= [buy_feed_on_offer] AND sheep_presence = 'off') then
           [stockmodule]scienceconverter buystock number = [buy_number] (-), genotype = '[genotype]', sex = [sex], age = [buy_age] (months), weight = [buy_weight] (kg)
           sheep_presence = 'on'
         endif
```
        manager Buy supplement on a fixed date
          # Buy properties
          supplementmodule = supplement  # Name of supplement module
          buy_date = 1-jan  # Date (dd-mmm)
          buy_name = 'lupins'  # Name of the supplement to purchase
          buy_amount = 1000  # Fresh weight of supplement to purchase (kg)
          on start_of_day:
```
        if (today = date('[buy_date]') then
           [supplementmodule]scienceconverter buysupplement supplement = [buy_name] (-), amount = [buy_amount] (kg)
         endif
```
        manager Feed supplement on animal condition loss
          # Feed properties
          supplementmodule = supplement  # Name of supplement module
          days = 5  # Number of days to sum condition change
          crit_condition_change = 0  # Critical condition change needed to start feeding (kg/head)
          max_feed_rate = 1  # Maximum rate of feeding in kg FW/day; 1.0 is sensible for sheep
          feed_name = 'lupins'  # Name of the supplement to purchase
          on init:
```
         FALSE = 0
         TRUE = 1
         feeding = FALSE
         feed_rate = 0.0     ! Rate of feeding in kg FW/day
         crit_cs = 0.0
         feed_rate_factor = 0.2
         est_lag_days = 10.0 / feed_rate_factor
         initial_feed_rate = 0.0
        yest_cond_score_all = 0.0
```
          on start_of_day:
```
         dlt_cond_score = cond_score_all - yest_cond_score_all
         yest_cond_score_all = cond_score_all
            if (feeding = TRUE AND cond_score_all = 0.0) then
               crit_cs = 0.0
               feeding = FALSE
            endif

            if (dlt_cond_score[[days]] < [crit_condition_change] AND crit_cs <= 0.0) then
               crit_cs = cond_score_all
            endif
            if ((feeding = FALSE) AND (cond_score_all < crit_cs)) then
               feeding = TRUE
               feed_rate = initial_feed_rate
            else
               ! leave feeding as is
            endif

            if (feeding = TRUE) then
               feed_rate = feed_rate - feed_rate_factor * (cond_score_all + dlt_cond_score*est_lag_days - crit_cs)
               if (feed_rate > [max_feed_rate]) then
                  feed_rate = [max_feed_rate]
               elseif (feed_rate < 0.0) then
                  feed_rate = 0.0
               endif
               if (feed_rate > 0) then
                   feed_amount = feed_rate * number_all
                   [supplementmodule]scienceconverter feedsupplement  supplement = [feed_name], amount = feed_amount
               else
                  feed_rate = 0.0
               endif
            else
               feed_rate = 0.0
            endif
```
        manager Sell sheep on weight
          # Sell properties
          stockmodule = stock  # Name of stock module
          sell_on_weight_gain = 50  # Weight (gaining)
          sell_on_weight_loss = 40  # Weight (losing)
          sell_number = 15  # Number of stock
          on start_of_day:
```
        if ((stock.weight >= [sell_on_weight_gain] OR stock.weight <= [sell_on_weight_loss]) AND sheep_presence = 'on') then
           [stockmodule]scienceconverter sellstock number = [sell_number] (-)
           sheep_presence = 'off'
        endif
```
      accum Accumulate: variable=dlt_cond_score[20]  # variable
      outputfile: filename=Wether Lucerne Supplement.out; title=Wether Lucerne Supplement
        variables My Variables
          variables: dd/mmm/yyyy as Date2, year, dm_feed_on_offer(), dm_feed_removed(), stock.age, stock.wt_change, stock.weight, stock.sex, stock.past_intake, stock.number, stock.cond_score_all, stock.past_intake_all, stock.supp_intake_all, stock.fleece_wt_all, stock.fibre_diam_all, lucerne.biomass, lucerne.stage, lucerne.lai
        events My Variables Events: event=daily
