folder simulations: version=37; creator=Apsim 7.10-r4145
  simulation Wether in pasture crop rotation
    memo Simulation_notes
      This simulates a wether/lamb trading system where young animals are bought in
      to fatten over winter and spring. They are then sold to a specified weight.

      Two paddocks.
        The first paddock is a pasture paddock. Stocking rate is calculated for this area.
        Second paddock has wheat sown and the animals are moved here for winter feeding and stubble feeding.
        The Feedlot could be used for feeding stock away from pasture.

      The Pasture component is the AusFarm pasture. (**** Only single species supported at this stage)
      The Stock component is the Livestock manager (not stockscienceconverter)
      Supplement is the AusFarm supplement (no science converter)

      Note:

      The Stock component initialisation values should be edited. The rand_seed value should
      be set to 0 for normal use. When it is set to 9999 the animal mortalities will be replicated
      between runs.
    metfile met: filename=%apsim%\Examples\MetFiles\wagga_aps.met
    clock
      start_date = 01/01/1990  # Select the start date of the simulation
      end_date = 30/12/2000  # Select the end date of the simulation
    summaryfile
    area PasturePaddock: paddock_area=100
      Soil: ASCOrder=Sodosol; ASCSubOrder=Red; SoilType=?; Site=Wagga Wagga; NearestTown=Wagga Wagga; Region=Riverina; State=New South Wales; Country=Australia; ApsoilNumber=550-YP; Latitude=-35.123; Longitude=147.354; LocationAccuracy=Regional Soil Type; YearOfSampling=0
        DataSource=PAWC estimated by A. Peake, CSIRO Sustainable Ecosystems (2005)
        Water
          Thickness  BD    AirDry  LL15  DUL   SAT
          100        1.55  0.06    0.12  0.24  0.38
          100        1.55  0.08    0.1   0.22  0.39
          200        1.5   0.12    0.12  0.24  0.4
          200        1.5   0.12    0.12  0.34  0.4
          300        1.55  0.12    0.12  0.34  0.4
          300        1.55  0.12    0.12  0.34  0.4
          300        1.55  0.12    0.12  0.34  0.4
          BD, AirDry, LL15, DUL, SAT source: Estimated based on local knowledge
          SoilCrop wheat: LL=[0.12, 0.1, 0.12, 0.17, 0.18, 0.22, 0.29]; KL=[0.06, 0.06, 0.04, 0.04, 0.03, 0.02, 0.02]; XF=[1, 1, 1, 1, 1, 1, 1]
            LL source: Estimated based on local knowledge
          SoilCrop barley: LL=[0.12, 0.1, 0.12, 0.17, 0.18, 0.22, 0.29]; KL=[0.07, 0.07, 0.07, 0.07, 0.05, 0.05, 0.03]; XF=[1, 1, 1, 1, 1, 1, 1]
            LL source: Estimated based on local knowledge
          SoilCrop oats: same as Wether in pasture crop rotation.PasturePaddock.Soil.Water.wheat
        SoilWater: SummerCona=3.5; SummerU=6; SummerDate=1-Nov; WinterCona=2; WinterU=2; WinterDate=1-Apr; DiffusConst=88; DiffusSlope=35; Salb=0.13; CN2Bare=78; CNRed=20; CNCov=0.8; Thickness=[100, 100, 200, 200, 300, 300, 300]; SWCON=[0.6, 0.5, 0.5, 0.4, 0.3, 0.3, 0.3]
        SoilOrganicMatter: RootCN=45; RootWt=1500; SoilCN=12.5; EnrACoeff=7.4; EnrBCoeff=0.2; OCUnits=WalkleyBlack
          Thickness  OC         FBiom  FInert
          100        1.23077    0.03   0.4
          100        0.615385   0.02   0.5
          200        0.307692   0.02   0.7
          200        0.153846   0.01   0.8
          300        0.0769231  0.01   0.9
          300        0.0769231  0.01   1
          300        0.0769231  0.01   1
          OC source: Estimated based on local knowledge
        Analysis: PHUnits=Water; BoronUnits=HotWater
          Thickness  EC   PH   CL   ESP
          100        0.1  6.6  0.1  1
          100        0.1  5.3  0.1  2
          200        0.1  6    0.1  4
          200        0.1  6.6  0.1  8
          300        0.1  9    0.1  16
          300        0.1  9    0.1  32
          300        0.1  9    0.1  32
          EC, PH, CL, ESP source: Estimated based on local knowledge
        InitialWater: FractionFull=1; PercentMethod=FilledFromTop
        Sample InitialNitrogen: NO3Units=ppm; NH4Units=ppm; SWUnits=Volumetric; OCUnits=Total; PHUnits=Water
          Thickness  NO3  NH4
          100        6.5  0.6
          100        2.1  0.1
          200        2.1  0.1
          200        1.7  0.1
          300        1.7  0.1
          300        1.7  0.1
          300        1.7  0.1
      surfaceom SurfaceOrganicMatter
        PoolName = pasture_residue  # Organic Matter pool name
        type = pasture  # Organic Matter type
        mass = 1000  # Initial surface residue (kg/ha)
        cnr = 80  # C:N ratio of initial residue
        standing_fraction = 0.1  # Fraction of residue standing
      Pasture Ryegrass
        initsection
          param_file =
          species = Perennial Ryegrass
          nutrients = N
          fertility = 0.68
          layers = [150, 150, 300, 300, 300, 300]  # mm
          max_rtdep = 700  # mm
          lagged_day_t = -999.9  # oC
          phenology = 3.05
          flower_len = 0  # d
          flower_time = 0  # d
          senc_index = 0  # d
          dorm_index = 0  # d
          dorm_t = -999.9  # oC
          extinct_coeff = [0, 0.6, 0.55]
          seed_dorm_time = 0  # d
          germ_index = 0  # d
          init green: array=T
            element
              status = established
              rt_dep = 600  # mm
              estab_index = 0
              stress_index = 0
              stem_reloc = 0  # kg/ha
              frosts = 0
              field herbage: array=T
                element
                  dmd = 0.825  # kg/kg
                  weight = 1000  # kg/ha
                  n_conc = 0  # kg/kg
                  spec_area = 10  # cm^2/g
                element
                  dmd = 0.825  # kg/kg
                  weight = 800  # kg/ha
                  n_conc = 0  # kg/kg
                  spec_area = 10  # cm^2/g
              field root_wt: array=T
                element: kind=double; array=T; unit=kg/ha; val=200
                element: kind=double; array=T; unit=kg/ha; val=0
            element
              status = senescing
              rt_dep = 600  # mm
              estab_index = 0
              stress_index = 0
              stem_reloc = 0  # kg/ha
              frosts = 0
              field herbage: array=T
                element
                  dmd = 0.825  # kg/kg
                  weight = 500  # kg/ha
                  n_conc = 0  # kg/kg
                  spec_area = 305  # cm^2/g
                element
                  dmd = 0.825  # kg/kg
                  weight = 1000  # kg/ha
                  n_conc = 0  # kg/kg
                  spec_area = 55  # cm^2/g
              field root_wt: array=T
                element: kind=double; array=T; unit=kg/ha; val=500
                element: kind=double; array=T; unit=kg/ha; val=0
          init dry: array=T
            element
              status = dead
              field herbage: array=T
                element
                  dmd = 0.65  # kg/kg
                  weight = 1000  # kg/ha
                  n_conc = 0  # kg/kg
                  spec_area = 10  # cm^2/g
                element
                  dmd = 0.35  # kg/kg
                  weight = 1000  # kg/ha
                  n_conc = 0  # kg/kg
                  spec_area = 10  # cm^2/g
            element
              status = litter
              field herbage: array=T
                element
                  dmd = 0.65  # kg/kg
                  weight = 500  # kg/ha
                  n_conc = 0  # kg/kg
                  spec_area = 10  # cm^2/g
                element
                  dmd = 0.35  # kg/kg
                  weight = 500  # kg/ha
                  n_conc = 0  # kg/kg
                  spec_area = 10  # cm^2/g
          init seeds
      folder Manager folder
        manager2 Constants
          A = Parameter value  # Param A
```csharp
using System;
using ModelFramework;

public class Script 
{      
   [Link] Paddock MyPaddock; // Can be used to dynamically get access to simulation structure and variables
   [Input] DateTime Today;   // Equates to the value of the current simulation date - value comes from CLOCK
   [Output()] public double[] sand;


   // The following event handler will be called once at the beginning of the simulation
   [EventHandler] public void OnInitialised()
   {
      // the grazplan pasture component requires some PSD values
      sand = new double[] {0.5, 0.45, 0.35, 0.35, 0.35, 0.25, 0.15, 0.15, 0.05, 0.05};
   }

   // The following event handler will be called each day at the beginning of the day
   [EventHandler] public void OnPrepare()
   {

   }

}
```
      TextOutput DailyOutput
        initsection
          filename = Wether in pasture crop rotation_PasturePaddock_DailyOutput.out
          interval = 1
          intervalunit = day
          summary_file =
          apsim_format = true
          title = ApsimVersion = 7.10 Title = Wether in pasture crop rotation_PasturePaddock_DailyOutput.out
          outputfrequency = post
          dateformat = dd/MM/yyyy
          init outputs: array=T
            element
              varname = cover_tot
              alias = cover_tot
              aggreg =
              decplaces = 2
            element
              varname = avail_dm
              alias = avail_dm
              aggreg =
              decplaces = 2
            element
              varname = green_dm
              alias = green_dm
              aggreg =
              decplaces = 2
            element
              varname = dry_dm
              alias = dry_dm
              aggreg =
              decplaces = 2
            element
              varname = nh4_uptake
              alias = nh4_uptake
              aggreg =
              decplaces = 4
    area WheatPaddock: paddock_area=100.0
      Soil: same as Wether in pasture crop rotation.PasturePaddock.Soil
      surfaceom SurfaceOrganicMatter
        PoolName = wheat  # Organic Matter pool name
        type = wheat  # Organic Matter type
        mass = 1000  # Initial surface residue (kg/ha)
        cnr = 80  # C:N ratio of initial residue
        standing_fraction = 0.2  # Fraction of residue standing
      fertiliser
      wheat
      folder Management
        manager2 Crop Management
          # Crop properties
          crop = wheat  # Name of this crop
          # Sowing criteria
          date1 = 15-may  # Enter sowing window START date (dd-mmm)
          date3 = na  # Enter cultivar change date (na if not in use)
          date2 = 10-jul  # Enter sowing window END date (dd-mmm)
          must_sow = no
          rain_amount = 25  # Enter amount of cumulative rainfall (mm)
          rain_days = 7  # Enter number of days to accumulate rainfall (days)
          esw_amount = 100  # Enter amount of soil water (mm)
          # Sowing Parameters
          cultivar1 = hartog  # Enter cultivar
          cultivar2 = na  # Enter 2nd Cultivar (na if not using a second cultivar)
          density1 = 100  # Enter sowing density (plants/m2)
          depth1 = 30  # Enter sowing depth (mm)
          row_spacing1 = 250  # Enter row spacing (mm)
          # Extra Parameters
          ftn1 = na  # Enter Fertile Tiller Number (na for auto)
          skiprow1 = solid  # Skip row
          tillageImplement = chisel  # Name of tillage implement (na if not in use)
```csharp
using System;
using ModelFramework;
using CSGeneral;

// Basic crop management: sowing & harvesting.
// Multi-paddock aware.
// This component DOES NOT require a trigger from the sequencer.
// It will assume it is the only crop in the system if it doesnt find a sequencer.
// If it does find a sequencer, it will do nothing until told to (via Enter/Leave).
public class Script 
{      
   [Link] Paddock MyPaddock;
   [Link()] Cashbook cashbook;
   [Link()]  public Simulation MySimulation;
   
   [Param()] private string crop;         // The module name of this crop
   [Param()] private string date1;         //Start of sowing window
   [Param()] private string date2;         //End of sowing window
   [Param()] private string date3;         //date to change to different cultivar
   [Param()] int esw_amount;
   [Param()] private string must_sow;

   [Input()] private DateTime today;

   // Rainfall accumulator
   [Param()] int rain_days;              //check for rain over this period
   [Param()] int rain_amount;            //this much rain over that period

   // Daily rainfall from the system
   [Input] private double rain;
   private ManagerUtility.Tracker<double> rainTracker; 

   [Output()] public int CropHarvested {get{return crop_harvested;}} 
   [Output()] public double GrainSpilt {get{return grain_spilt;}} 
   private int crop_harvested;
   private double grain_spilt;
   
   private bool inWindow = false;
   private bool endOfWindow = false;
   private bool ChangeCultivar = false;

   //initialise tracker, telling it how many days to track
   [EventHandler] public void OnInitialised()
   {
      rainTracker = new ManagerUtility.Tracker<double>(rain_days); 
   }

   // Daily tests common to all paddocks
   [EventHandler] public void OnPrepare()
   {
      crop_harvested = 0;
      grain_spilt = 0;
      
      bool startOfWindow = DateUtility.DatesEqual(date1, today);

      inWindow = DateUtility.WithinDates(date1, today, date2);
      ChangeCultivar = false;
      if(date3 != "na")  
         ChangeCultivar = DateUtility.WithinDates(date3, today, date2);
      endOfWindow = DateUtility.DatesEqual(date2, today);

      rainTracker.Add(rain);
      string currentPaddock = "";
      if (MySimulation.Get("currentPaddock", out currentPaddock) == false) 
      {
         // If there is no sequencer plugged in then we are it..
         if (canEnter > 0) {
            OnEnter();
         }
         if (canLeave > 0) {
            OnLeave();
         }
      }
   }
   // Test whether we can sow a crop today
   // +ve number - yes
   // 0          - no
   // -ve number - no, out of scope (planting window)
   [Output, Description("Test whether we can sow a crop today")] 
   public int canEnter  {
      get {
         bool isPossibleToday = false;
         
         string currentPaddock;
         MySimulation.Get("currentPaddock", out currentPaddock);
         //Console.WriteLine("1. '" + currentPaddock + "'");

         Component paddockModule;
         if (currentPaddock != "")
            paddockModule = (Component) MySimulation.LinkByName(currentPaddock);
         else
            paddockModule = (Component) MySimulation.ChildPaddocks[1];
         //Console.WriteLine("2. " + paddockModule.Name);

         Component cropModule = (Component) paddockModule.LinkByName( crop );

         //Console.WriteLine("3. " + cropModule.Name);
         string plantStatus = "";
         cropModule.Get("plant_status", out plantStatus);

         double esw = 0.0;
         Component soilModule = (Component) paddockModule.LinkByType("SoilWat");
         soilModule.Get("esw", out esw);
         if (plantStatus == "out" &&
             inWindow &&
             rainTracker.Sum() >= rain_amount &&
             esw > esw_amount) 
         {
             isPossibleToday = true;
         } 

	     if (isPossibleToday)
            return 1;
         
         if (plantStatus == "out" && endOfWindow && must_sow == "yes")
            return 1;

         if (plantStatus == "out" && !inWindow)
            return -1;
         
         return 0;
      }
   }  
   
   
   // Sow a crop
   [Param()] private string cultivar1;
   [Param()] private string cultivar2;
   [Param()] private double density1;
   [Param()] private double depth1;
   [Param()] private double row_spacing1;
   [Param()] private string ftn1;
   [Param()] private string skiprow1;
   [Param()] private string tillageImplement;
   
   [EventHandler, Description("Sow the crop")] 
   public void OnEnter()
   {
      Console.WriteLine(today + " Sowing Crop");
      SowType data = new SowType();
      data.Cultivar = cultivar1;
      if(ChangeCultivar)
         data.Cultivar = cultivar2;

      data.plants = density1;
      data.sowing_depth = depth1;
      data.row_spacing = row_spacing1;
      data.tiller_no_fertile = (ftn1 == "na") ? "" : ftn1;
      data.SkipRow = 0 ;
      if (skiprow1 == "single")
         data.SkipRow = 1;
      else if (skiprow1 == "double")
         data.SkipRow = 2;

      string currentPaddock;
      MySimulation.Get("currentPaddock", out currentPaddock);
      Component cropModule;
      if (currentPaddock != "")
         cropModule = (Component) MySimulation.LinkByName(currentPaddock + "." + crop);
      else 
         cropModule = (Component) MySimulation.ChildPaddocks[1].LinkByName(crop);

      cropModule.Publish("Sow", data);

      if (tillageImplement.ToLower() != "na") 
	  {
         TillageType t = new TillageType();
         t.type = tillageImplement;
         Component paddockModule;
         if (currentPaddock != "")
            paddockModule = (Component) MySimulation.LinkByName(currentPaddock);
         else
            paddockModule = MySimulation.ChildPaddocks[1];
         paddockModule.Publish("tillage", t);
      }		 
   }

   // Test whether we can harvest a crop today
   // +ve number - yes
   // 0          - no
   // -ve        - out of scope
   [Output] 
   public int canLeave  
   {
      get 
      {
         string currentPaddock;
         MySimulation.Get("currentPaddock", out currentPaddock);

         string plantStatus = "";
         MySimulation.Get((currentPaddock != "" ? currentPaddock + "." : "") + crop + ".plant_status", out plantStatus);
         if (plantStatus == "out")
            return -1;

         string StageName = "";
         MySimulation.Get((currentPaddock != "" ? currentPaddock + "." : "") + crop + ".StageName", out StageName);
         if (StageName == "harvest_ripe" || plantStatus == "dead")
            return 1;
         return 0;
      }
   }

   [EventHandler] 
   public void OnLeave()
   {
      Console.WriteLine(today + " Harvesting Crop");
      HarvestType hdata = new HarvestType();
      hdata.Remove = 0.0;
      string currentPaddock;
      MySimulation.Get("currentPaddock", out currentPaddock);
      Component cropModule;
      Component cropPaddock;
      if (currentPaddock != "")
      {
         cropModule = (Component) MySimulation.LinkByName(currentPaddock + "." + crop);
         cropPaddock = (Component) MySimulation.LinkByName(currentPaddock);
      }
      else
      {
         cropModule = (Component) MySimulation.ChildPaddocks[1].LinkByName(crop);   // WheatPaddock.wheat
         cropPaddock = (Component) MySimulation.ChildPaddocks[1];                   // WheatPaddock
      }
      
      // record the income from the harvest
      double area;
      cropPaddock.Get(cropPaddock.Name + ".area", out area);
      double crop_yield;
      cropModule.Get(cropModule.Name + ".Yield", out crop_yield);
            
      // spilt grain for stubble feeding
      double grainSpillage = 0.025;                      // kg split / kg of yield
      grain_spilt = crop_yield * grainSpillage;          // kg/ha spilt
      crop_yield -= grain_spilt;                         // kg/ha yield
      
      EarnType income = new EarnType();
      income.name = "wheat_sales";
      income.amount = 0.001 * area * crop_yield;
      cashbook.Earn(income);
      
      hdata.Height = 300.00;
      cropModule.Publish("harvest", hdata);
      crop_harvested = 1;                    // allows the grazing of stubbles to occure
      
      KillCropType kdata = new KillCropType();
      kdata.KillFraction = 0.0F;
      cropModule.Publish("killcrop", kdata);
      cropModule.Publish("end_crop");
   } 
}
```
        manager2 Fertilise at Sowing
          # When should fertiliser be applied
          ModuleName = wheat  # On which module should the event come from
          EventName = sowing  # On which event should spraying be triggered
          # Event details
          fertType = urea_N  # The type of fertiliser
          fertAmt = 100  # Amount of fertiliser to apply (kg/ha)
```csharp
using System;
using System.Linq;
using System.Collections.Generic;
using ModelFramework;

// Crop management: fertilise at sowing
// Multi-paddock aware.
// This component DOES NOT require a trigger from the sequencer.

public class Script 
{      
   [Link]  public Simulation MySimulation;
   [Param] string fertType;
   [Param] float fertAmt;
   [Param] string ModuleName;
   [Param] string EventName;
   
   [EventHandler] public void OnStart_Simulation()
   {
      foreach (Paddock paddock in MySimulation.ChildPaddocks) 
      {
         foreach (Component child in paddock.Children) {
            if(child.Name == ModuleName){
               RuntimeEventHandler.NullFunction curried = () => OnTrigger(paddock.Name);
               MySimulation.Subscribe(child.FullName + "." + EventName, curried);
               //Console.WriteLine("Subscribed '" + child.FullName + "." + EventName + " => " + paddock.Name + "'"); 
            }
         }
      }
   }

   public void OnTrigger(string paddock)
   {
      Console.WriteLine("Fertiliser OnTrigger called, paddock='" + paddock + "'"); 
      if (fertAmt > 0) 
      {         
         Component paddockModule;
         if (paddock != "")
            paddockModule = (Component) MySimulation.LinkByName(paddock);
         else
            paddockModule = (Component) MySimulation.ChildPaddocks[0];
         //Console.WriteLine("2. " + paddockModule.Name);

         Fertiliser fertModule = (Fertiliser) paddockModule.LinkByName("Fertiliser");
         fertModule.Apply(fertAmt, 50, fertType);
      }
   }
}
```
        manager2 SOMForStock
```csharp
using System;
using System.Collections.Generic;
using ModelFramework;

/// <summary>
/// This script is designed to be the AvailableToAnimal interface for the SurfaceOM component.
/// </summary>
public class Script 
{      
   [Link()] Simulation MySimulation;
   [Link] Paddock MyPaddock; // Can be used to dynamically get access to simulation structure and variables
   [Input] DateTime Today;   // Equates to the value of the current simulation date - value comes from CLOCK
   
   // the animal forage interface
   [Output()] public AvailableToAnimalType AvailableToAnimal {get {getSOMState(); return availableToStock;} set{;}}  
   [Writable, Output] public RemovedByAnimalType RemovedByAnimal {get {return removedByStock;} set {setSOM(value);}}
   
   private const int STANDING = 0;
   private const int LYING = 1;
   
   private SurfaceOM som;           // the surfaceom component that animals will forage on
   private RemovedByAnimalType removedByStock;
   private AvailableToAnimalType availableToStock;
   
   /// <summary>
   /// This is the list of valid residues that can be used here
   /// </summary>
   private string[] residueTypes = new string[] { "wheat", "barley", "oats", "sorghum", "canola", "lupins", "fababean", "chickpea", "fieldpea" };
   private ResidueData[] ResidueDataArray;
   
   /// <summary>
   /// A lookup list of forage parameters
   /// </summary>
   private Dictionary<string, CropParams> forageParams = new Dictionary<string, CropParams>();
   
   // The following event handler will be called once at the beginning of the simulation
   [EventHandler] public void OnInitialised()
   {
      som = (SurfaceOM) MyPaddock.LinkByType("SurfaceOM");
      
      removedByStock = new RemovedByAnimalType();
      availableToStock = new AvailableToAnimalType();
      
      // setup common forage type parameters objects
      forageParams.Add("wheat", new CerealParams());
      forageParams.Add("barley", new CerealParams());
      forageParams.Add("oats", new CerealParams());
      forageParams.Add("sorghum", new CerealParams());

      forageParams.Add("canola", new DicotParams());

      forageParams.Add("lupins", new LegumeParams());
      forageParams.Add("fababean", new LegumeParams());
      forageParams.Add("chickpea", new LegumeParams());
      forageParams.Add("fieldpea", new LegumeParams());
      
      readResidueParams(); // now read these parameters into the residue item
   }

   // The following event handler will be called each day at the beginning of the day
   [EventHandler] public void OnPrepare()
   {
      //double scover;
      //som.Get("surfaceom_cover", out scover);
      
   }

   [EventHandler] public void OnProcess()
   {
   }
   
   // Handle the response to the request for the SOM status
   [EventHandler] public void OnSurfaceOrganicMatterState(SurfaceOrganicMatterType data)
   {  
      storeResidueData(data);    // store the SOM data
      getGrazingData();          // populate the AvailableToAnimal
   }
   
   [EventHandler] public void OnPost()
   {

   }

   /// <summary>
   /// Store the SOM data retrieved from SurfaceOM 
   /// </summary>
   /// <param name="data">The SOM state</param>
   private void storeResidueData(SurfaceOrganicMatterType data)
   {
      for (int Idx = 0; Idx < ResidueDataArray.Length; Idx++)
         ResidueDataArray[Idx].Pools = null;
      
      for (int iType = 0; iType < data.Pool.Length; iType++)
      {
         SurfaceOrganicMatterPoolType residueValue = data.Pool[iType];     // wheat, canola ......

         string sType = residueValue.OrganicMatterType;
         int Idx = ResidueDataArray.Length - 1;
         while ((Idx >= 0) && (string.Compare(sType, ResidueDataArray[Idx].ResidueType, true) != 0)) 
            Idx--;
         
         if (Idx < 0) 
            ;//   log("Surface OM type " + sType + " not recognised in OnSurfaceOrganicMatterState()");
         else
         {
            ResidueDataArray[Idx].Pools = new PoolData[2, 3];
            for (int iPool = 0; iPool <= Math.Min(2, residueValue.StandingFraction.Length - 1); iPool++)
            {
               FOMType fom = residueValue.StandingFraction[iPool];
               ResidueDataArray[Idx].Pools[0, iPool] = new PoolData();
               ResidueDataArray[Idx].Pools[0, iPool].DM = fom.amount; 
               ResidueDataArray[Idx].Pools[0, iPool].C = fom.C;
               ResidueDataArray[Idx].Pools[0, iPool].N = fom.N; 
               ResidueDataArray[Idx].Pools[0, iPool].P = fom.P;
               ResidueDataArray[Idx].Pools[0, iPool].AshAlk = fom.AshAlk;
            }
            
            for (int iPool = 0; iPool <= Math.Min(2, residueValue.LyingFraction.Length - 1); iPool++)
            {
               FOMType fom = residueValue.LyingFraction[iPool];
               ResidueDataArray[Idx].Pools[1, iPool] = new PoolData();
               ResidueDataArray[Idx].Pools[1, iPool].DM = fom.amount;
               ResidueDataArray[Idx].Pools[1, iPool].C = fom.C;
               ResidueDataArray[Idx].Pools[1, iPool].N = fom.N; 
               ResidueDataArray[Idx].Pools[1, iPool].P = fom.P;
               ResidueDataArray[Idx].Pools[1, iPool].AshAlk = fom.AshAlk;
            }
            ResidueDataArray[Idx].PotDecomp = residueValue.PotDecompRate;
         }
      }
   }

   //=========================================================================
   /// <summary>
   /// Using the SOM state data, populate an AvailableToAnimal
   /// </summary>
   private void getGrazingData()
   {
      
      string[] organ = new string[]{"standing", "lying"};
      double[] height = new double[]{300.0, 90.0};
            
      // populate the forage structure for animals
      List<AvailableToAnimalelementType> cohorts = new List<AvailableToAnimalelementType>();
      
      for (int Idx = 0; Idx < ResidueDataArray.Length; Idx++)     
      {
         // each residue type that has data from SOM
         ResidueData residue = ResidueDataArray[Idx];
         
         // if there was residue found in SOM for this residue type
         if (residue.Pools != null)
         {
            // get the weighted averages for N and DMD of the standing and lying pools
            double biomass;
            double sumDMD;
            double sumN;
            double sumAsh;
            for (int part = STANDING; part <= LYING; part++)
            {
               biomass = 0;
               sumDMD = 0;
               sumN = 0;
               sumAsh = 0;
               // carbohydrate, cellulose, lignin 
               for (int i = 0; i < 3; i++)
               {
                  biomass += residue.Pools[part, i].DM;
                  sumDMD += calcPoolDMD(Idx, residue.Pools[part, i].N / residue.Pools[part, i].DM) * residue.Pools[part, i].DM;
                  sumN += residue.Pools[part, i].DM * residue.Pools[part, i].N;
                  sumAsh += residue.Pools[part, i].DM * residue.Pools[part, i].AshAlk;
               }
               // store the ratio of this pool DM to the total standing or lying
               for (int i = 0; i < 3; i++)
                  ResidueDataArray[Idx].Pools[part, i].DmFract = residue.Pools[part, i].DM / biomass;
                  
               double avDMD = sumDMD / biomass;
               double avN = sumN / biomass;
               double avAsh = sumAsh / biomass;
            
               AvailableToAnimalelementType cohort = new AvailableToAnimalelementType();
               cohort.CohortID = residue.ResidueType;
               cohort.Organ = organ[part];
               cohort.AgeID = "senesced";
               cohort.Bottom = 20;
               cohort.Top = height[part];
               cohort.Chem = "ddm";
               cohort.Weight = biomass * avDMD;
               cohort.N = avN * avDMD;
               cohort.P = 0;
               cohort.S = cohort.N * residue.S2N;
               cohort.AshAlk = avAsh * avDMD;
               cohorts.Add(cohort);
            
               cohort = new AvailableToAnimalelementType();
               cohort.CohortID = residue.ResidueType;
               cohort.Organ = organ[part];
               cohort.AgeID = "senesced";
               cohort.Bottom = 0;
               cohort.Top = height[part];
               cohort.Chem = "idm";
               cohort.Weight = biomass * (1 - avDMD);
               cohort.N = avN * (1 - avDMD);
               cohort.P = 0;
               cohort.S = cohort.N * residue.S2N;
               cohort.AshAlk = avAsh * (1 - avDMD);
               cohorts.Add(cohort);
            }
         }
      }
      
      availableToStock.element = new AvailableToAnimalelementType[cohorts.Count];
      for(int c = 0; c < cohorts.Count; c++)
      {
         availableToStock.element[c] = new AvailableToAnimalelementType();
         availableToStock.element[c].CohortID = cohorts[c].CohortID;
         availableToStock.element[c].Organ = cohorts[c].Organ;
         availableToStock.element[c].AgeID = cohorts[c].AgeID;
         availableToStock.element[c].Bottom = cohorts[c].Bottom;
         availableToStock.element[c].Top = cohorts[c].Top;
         availableToStock.element[c].Chem = cohorts[c].Chem;
         availableToStock.element[c].Weight = cohorts[c].Weight;
         availableToStock.element[c].N = cohorts[c].N;
         availableToStock.element[c].P = cohorts[c].P;
         availableToStock.element[c].S = cohorts[c].S;
         availableToStock.element[c].AshAlk = cohorts[c].AshAlk;
         //log(string.Format("Available: {0} {1} {2} {3}", cohorts[c].CohortID, cohorts[c].Organ, cohorts[c].Chem, cohorts[c].Weight));
      }
   }
     
   private double[] ClassDig = new double[] {0.8,0.7,0.6,0.5,0.4,0.3};
   
   /// <summary>
   /// Do some estimation of the DMD for the N concentration value
   /// </summary>
   /// <param name="residueIdx">The residue item/type</param>
   /// <param name="NConc">The N value</param>
   /// <returns>Estimate of the DMD</returns>
   private double calcPoolDMD(int residueIdx, double NConc)
   {
      double dmd;
      ResidueData residueData = ResidueDataArray[residueIdx];
      
      if (NConc >= residueData.RefNConc[0])
         dmd = ClassDig[0];
      else if (NConc <= residueData.RefNConc[5])
         dmd = ClassDig[5];
      else
      {
         // fairly rough interpolation estimate
         int z = 1;
         while (NConc < residueData.RefNConc[z])
         {
            z++;
         }

         double fracN = (NConc - residueData.RefNConc[z]) / (residueData.RefNConc[z - 1] - residueData.RefNConc[z]);
         double digWidth = ClassDig[z - 1] - ClassDig[z];
         dmd = fracN * digWidth + ClassDig[z];
      }
      return dmd;
   }
          
   /// <summary>
   /// Make a request for the SOM state hence triggering an event
   /// </summary>
   private void getSOMState()
   { 
      // request the SOM status and it will be handled by OnSurfaceOrganicMatterState()
      if (som != null)
      {
         int som_status;
         som.Get("surface_organic_matter", out som_status);
      }
      else
         log("Cannot request surface_organic_matter in getSOMState()");
   }
   
   /// <summary>
   /// Is called whenever the Stock component sets a RemovedByAnimal value.
   /// The forage removed is then removed from SOM. 
   /// </summary>
   /// <param name="removed">The residue removed by Stock</param>
   private void setSOM(RemovedByAnimalType removed)
   {
      //log("setSOM");
      // the RemovedByAnimal structure has been populated by Stock.
      if (removed != null)
      {
         if (removed.element != null)
         {
            List<string> residueList = new List<string>();
            SurfaceOrganicMatterType somRemoved = new SurfaceOrganicMatterType();
            
            // more than one residue can be removed
            // get a unique list of residues removed
            for (int c = 0; c < removed.element.Length; c++)
            {
               if (residueList.IndexOf(removed.element[c].CohortID) < 0)
               {
                  residueList.Add(removed.element[c].CohortID);
               }
            }
            
            // create all the removal pools
            int somTypes = residueList.Count; // the som types removed
            somRemoved.Pool = new SurfaceOrganicMatterPoolType[somTypes];
            for (int idx = 0; idx < residueList.Count; idx++)        // for each residue
            {
               somRemoved.Pool[idx] = new SurfaceOrganicMatterPoolType();
               somRemoved.Pool[idx].OrganicMatterType = residueList[idx];     // name of the residue type
               somRemoved.Pool[idx].Name = residueList[idx];     // name of the residue type
               
               // find the residue data details used when retrieving the residue and populating AvailableToAnimal (assuming everything is synchronous)
               int resIdx = ResidueDataArray.Length - 1;
               while ((resIdx >= 0) && (string.Compare(residueList[idx], ResidueDataArray[resIdx].ResidueType, true) != 0)) 
                  resIdx--;
               
               if (resIdx >= 0)
               {
                  // create the pools
                  somRemoved.Pool[idx].StandingFraction = new FOMType[3];
                  somRemoved.Pool[idx].LyingFraction = new FOMType[3];
                  for(int i = 0;i < 3;i++)
                  {
                     somRemoved.Pool[idx].StandingFraction[i] = new FOMType();
                     somRemoved.Pool[idx].LyingFraction[i] = new FOMType();
                  }
                  
                  somRemoved.Pool[idx].PotDecompRate = Convert.ToSingle(ResidueDataArray[resIdx].PotDecomp);
                  
                  double totalFromLying = 0;
                  double totalFromStanding = 0;
                  for (int c = 0; c < removed.element.Length; c++)
                  {
                     //log(string.Format("Removed: {0} {1} {2} {3}", removed.element[c].CohortID, removed.element[c].Organ, removed.element[c].Chem, removed.element[c].WeightRemoved));
            
                     if (string.Compare(residueList[idx], removed.element[c].CohortID, true) == 0) // if this cohort returned is the residue
                     {
                        if (removed.element[c].Organ == "standing")
                           totalFromStanding += removed.element[c].WeightRemoved;
                        else
                           totalFromLying += removed.element[c].WeightRemoved; // calculate the removal
                     } 
                  }  // next cohort
                  
                  // proportion out the total standing or lying into the 3 pools
                  for (int pool = 0; pool < 3; pool++)
                  {
                     somRemoved.Pool[idx].StandingFraction[pool].amount = (float) (ResidueDataArray[resIdx].Pools[STANDING, pool].DmFract * totalFromStanding);
                     double dmRemovedFract = 0.0;
                     if (ResidueDataArray[resIdx].Pools[STANDING, pool].DM > 0)
                        dmRemovedFract = somRemoved.Pool[idx].StandingFraction[pool].amount / ResidueDataArray[resIdx].Pools[STANDING, pool].DM; // prop removed
                     
                     // proportion the removal of the following properties
                     somRemoved.Pool[idx].StandingFraction[pool].N = (float) (ResidueDataArray[resIdx].Pools[STANDING, pool].N * dmRemovedFract);
                     somRemoved.Pool[idx].StandingFraction[pool].P = (float) (ResidueDataArray[resIdx].Pools[STANDING, pool].P * dmRemovedFract);
                     somRemoved.Pool[idx].StandingFraction[pool].C = (float) (ResidueDataArray[resIdx].Pools[STANDING, pool].C * dmRemovedFract);
                     somRemoved.Pool[idx].StandingFraction[pool].AshAlk = (float) (ResidueDataArray[resIdx].Pools[STANDING, pool].AshAlk * dmRemovedFract);
                  }
                  for (int pool = 0; pool < 3; pool++)
                  {
                     somRemoved.Pool[idx].LyingFraction[pool].amount = (float) (ResidueDataArray[resIdx].Pools[LYING, pool].DmFract * totalFromLying);
                     double dmRemovedFract = 0.0;
                     if (ResidueDataArray[resIdx].Pools[LYING, pool].DM > 0)
                        dmRemovedFract = somRemoved.Pool[idx].LyingFraction[pool].amount / ResidueDataArray[resIdx].Pools[LYING, pool].DM; // prop removed
                     
                     somRemoved.Pool[idx].LyingFraction[pool].N = (float) (ResidueDataArray[resIdx].Pools[LYING, pool].N * dmRemovedFract);
                     somRemoved.Pool[idx].LyingFraction[pool].P = (float) (ResidueDataArray[resIdx].Pools[LYING, pool].P * dmRemovedFract);
                     somRemoved.Pool[idx].LyingFraction[pool].C = (float) (ResidueDataArray[resIdx].Pools[LYING, pool].C * dmRemovedFract);
                     somRemoved.Pool[idx].LyingFraction[pool].AshAlk = (float) (ResidueDataArray[resIdx].Pools[LYING, pool].AshAlk * dmRemovedFract);
                  }
               }
            }  // next residue
            // Send the removal to Surface OM
            som.RemoveSurfaceom(somRemoved);  //call SOM.remove_surfaceom
         }
      } 
   }
   
   private void log(string msg)
   {
      Console.WriteLine(msg);
   }
   
   /// <summary>
   /// Copy the forage parameters into the residue structures
   /// </summary>
   private void readResidueParams()
   {
      ResidueDataArray = new ResidueData[residueTypes.Length];
      for (int i = 0; i < residueTypes.Length;i++)
      {
         CropParams forage;
         string residueName = residueTypes[i];
         if (forageParams.TryGetValue(residueName, out forage))
         {
            ResidueDataArray[i] = new ResidueData();
            ResidueData item = ResidueDataArray[i];
            item.ResidueType = residueName;
            if (forage.IsLegume)
               item.Legume = 1.0;
            else
               item.Legume = 0.0;
            item.RefNConc = forage.ResidueRefNConc;
            item.CP2N = forage.CP2N[ParamConsts.STEM];
            item.P2N = forage.P2N[ParamConsts.STEM];
            item.S2N = forage.S2N[ParamConsts.STEM];
            item.AshAlkalinity = forage.AshAlk[ParamConsts.STEM];
            ResidueDataArray[i] = item;
         }
         else
            log("Missing surface OM type " + residueTypes[i]);
      }
   }
}
  

///<summary>
/// Constants used when accessing forage parameters
///</summary>
public class ParamConsts
{
   // age
   static public int GREEN = 0;
   static public int SEN = 1;
   static public int DEAD = 2;

   // part
   //static public int ROOT = 0;
   static public int LEAF = 0;
   static public int STEM = 1;
   static public int POD = 2;
   static public int MEAL = 3;
   static public int OIL = 4;

   static public string[] PLANT_PART = new string[] { "leaf", "stem", "pod", "meal", "oil" };
   static public string[] PLANT_COMP = new string[] { "green", "senesced", "dead" };
}

///<summary>
/// Base class for any forage parameters
///</summary>
public class CropParams
{
   public bool IsLegume;

   public double[,] MaxDMD;           // [age, part]
   public double[,] MinDMD;           // [age, part]

   // interpolation - average DMD vs stage
   public double[] StagePoints;       // [stage] 
   public double[,,] StageDMD;        // [age, part, stage]

   public double SeedRipeStage;
   public double[] SeedDMD;           // [part]  part = POD..OIL
   public int[] SeedClass;            // [UNRIPE..RIPE]

   public double[] CP2N;              // [part] part = leaf..oil
   public double[] P2N;               // [part] part = leaf..oil
   public double[] S2N;               // [part] part = leaf..oil
   public double[] AshAlk;            // [part] part = leaf..oil

   public int DefolStageCount;
   public double[] DefolStagePoints;  // [stage]
   public double[] DefolStageLower;   // [stage]
   public double[] DefolStageUpper;   // [stage]
   public double DefolPower;

   /// <summary>
   /// reference N concentrations of each DMD class (80%-30%) for use with SurfaceOM 
   /// </summary>
   public double[] ResidueRefNConc;
}

/// <summary>
/// Cereal crops
/// </summary>
public class CerealParams : CropParams
{
   /// <summary>
   /// wheat, barley, oats, sorghum
   /// </summary>
   public CerealParams()
   {
      this.IsLegume = false;
      //                        leaf stem 
      this.MaxDMD = new double[,] {{0.85,0.85},   //green
                                   {0.75,0.55},   //sen 
                                   {0.75,0.55} }; //dead          

      this.MinDMD = new double[,]{{0.50,0.45},    //green
                                  {0.40,0.25},    //sen 
                                  {0.40,0.25} };  //dead          

      // interpolation - average DMD vs stage
      this.StagePoints = new double[] { 0.0, 5.0, 6.0, 6.5, 8.0, 9.0, 10.0, 11.0 };
      this.StageDMD = new double[,,] { //green
         {
            {0.82, 0.82, 0.82, 0.82, 0.70, 0.68, 0.68, 0.68}, //leaf
            {0.82, 0.82, 0.65, 0.64, 0.59, 0.51, 0.42, 0.30 } //stem   
         },
         { //sen
            {0.75, 0.75, 0.70, 0.68, 0.60, 0.58, 0.50, 0.43}, //leaf
            {0.55, 0.55, 0.55, 0.55, 0.45, 0.38, 0.30, 0.30}  //stem
         },
         { //dead
            {0.60, 0.60, 0.60, 0.60, 0.60, 0.57, 0.43, 0.43}, //leaf
            {0.55, 0.55, 0.55, 0.55, 0.45, 0.38, 0.30, 0.30}  //stem
         }
         };
      this.SeedRipeStage = 9.0;
      this.SeedClass = new int[] { 1, 3 };
      this.SeedDMD = new double[] { 0, 0, 0.67, 0.9, 1.0 };

      this.CP2N = new double[] { 6.25, 6.25, 6.25, 5.70, 5.70 };
      this.P2N = new double[] { 0.05, 0.05, 0.05, 0.15, 0.00 };
      this.S2N = new double[] { 0.07, 0.07, 0.07, 0.09, 0.00 };
      this.AshAlk = new double[] { 0.60, 0.60, 1.10, 1.10, 1.10 };

      this.ResidueRefNConc = new double[] { 0.040, 0.029, 0.019, 0.011, 0.005, 0.003 };
   }
}

/// <summary>
/// Dicot crops
/// </summary>    
public class DicotParams : CropParams
{
   /// <summary>
   /// canola
   /// </summary>
   public DicotParams()
   {
      this.IsLegume = false;
      //                        leaf stem 
      this.MaxDMD = new double[,] {{0.85,0.85},   //green
                                   {0.75,0.55},   //sen 
                                   {0.75,0.55} }; //dead          

      this.MinDMD = new double[,]{{0.50,0.45},    //green
                                  {0.40,0.25},    //sen 
                                  {0.40,0.25} };  //dead          

      // interpolation - average DMD vs stage
      this.StagePoints = new double[] { 0.00, 6.00, 7.00, 8.00, 10.00 };
      this.StageDMD = new double[,,] { //green
         {
            {0.84, 0.84, 0.78, 0.55, 0.55}, //leaf
            {0.84, 0.84, 0.76, 0.50, 0.50} //stem   
         },
         { //sen
            {0.60, 0.60, 0.56, 0.40, 0.40}, //leaf
            {0.55, 0.55, 0.49, 0.30, 0.30}  //stem
         },
         { //dead
            {0.60, 0.60, 0.56, 0.40, 0.40}, //leaf
            {0.55, 0.55, 0.49, 0.30, 0.30}  //stem
         }
         };
      this.SeedRipeStage = 9.0;
      this.SeedClass = new int[] { 1, 3 };
      this.SeedDMD = new double[] { 0, 0, 0.65, 0.67, 1.00 };

      this.CP2N = new double[] { 6.25, 6.25, 6.25, 5.70, 5.70 };
      this.P2N = new double[] { 0.12, 0.12, 0.12, 0.27, 0.00 };
      this.S2N = new double[] { 0.30, 0.30, 0.30, 0.21, 0.00 };
      this.AshAlk = new double[] { 1.15, 1.15, 1.15, 0.75, 0.00 };

      this.ResidueRefNConc = new double[] { 0.040, 0.029, 0.019, 0.011, 0.005, 0.003 };
   }
}

/// <summary>
/// Legume crops
/// </summary>
public class LegumeParams : DicotParams
{
   /// <summary>
   /// lupin, fababean, chickpea, fieldpea
   /// </summary>
   public LegumeParams()
   {
      this.IsLegume = true;
      this.ResidueRefNConc = new double[] { 0.052, 0.037, 0.025, 0.015, 0.006, 0.004 };
   }
}

public class ResidueData
{
   public string ResidueType;
   public double Legume;
   public double[] RefNConc = new double[6]; // DigClassArray;
   public double CP2N;
   public double P2N;
   public double S2N;
   public double AshAlkalinity;
   public PoolData[,] Pools = new PoolData[2, 3];  //standing/lying, OM pool

   public double PotDecomp;
}

public class PoolData
{
   public double DM;
   public double C;
   public double N;
   public double P;
   public double AshAlk;
   public double DmFract;
   //public double NConc;  // [N] in DMD pool
   //public double PConc;  // [P] in DMD pool
}
```
      TextOutput DailyOutput
        initsection
          filename = Wether in pasture crop rotation_WheatPaddock_DailyOutput.out
          interval = 1
          intervalunit = day
          summary_file =
          apsim_format = true
          title = ApsimVersion = 7.10 Title = Wether in pasture crop rotation_WheatPaddock_DailyOutput.out
          outputfrequency = post
          dateformat = dd/MM/yyyy
          init outputs: array=T
            element
              varname = biomass
              alias = biomass
              aggreg =
              decplaces = 2
            element
              varname = green_biomass
              alias = green_biomass
              aggreg =
              decplaces = 2
            element
              varname = paddock
              alias = animals_paddock
              aggreg =
              decplaces = 0
            element
              varname = cover_tot
              alias = cover_tot
              aggreg =
              decplaces = 2
            element
              varname = surfaceom_cover
              alias = surfaceom_cover
              aggreg =
              decplaces = 2
      TextOutput Summary
        initsection
          filename = Wether in pasture crop rotation_WheatPaddock_Summary.out
          interval = 1
          intervalunit = year
          summary_file =
          apsim_format = true
          title = ApsimVersion = 7.10 Title = Wether in pasture crop rotation_WheatPaddock_Summary.out
          outputfrequency = post
          dateformat = dd/MM/yyyy
          init outputs: array=T
            element
              varname = yield
              alias = Yield_kg/ha
              aggreg = max
              decplaces = 2
    area Feedlot: paddock_area=10
      Soil: SoilType=Black Vertosol; Site=Generic; Region=South East Queensland; Latitude=0; Longitude=0; YearOfSampling=0
        Water
          Thickness  BD    AirDry  LL15  DUL   SAT
          150        1.02  0.14    0.29  0.54  0.59
          150        1.03  0.26    0.29  0.53  0.58
          300        1.02  0.29    0.29  0.54  0.59
          300        1.02  0.29    0.29  0.54  0.58
          300        1.06  0.3     0.3   0.52  0.57
          300        1.11  0.31    0.31  0.5   0.55
          300        1.12  0.32    0.32  0.5   0.55
          300        1.15  0.33    0.33  0.48  0.53
          300        1.18  0.34    0.34  0.47  0.52
          300        1.2   0.35    0.35  0.46  0.51
          300        1.25  0.36    0.36  0.44  0.49
          SoilCrop wheat
            LL=[0.29, 0.29, 0.32, 0.32, 0.35, 0.38, 0.41, 0.48, 0.47, 0.46, 0.44]
            KL=[0.1, 0.1, 0.08, 0.06, 0.04, 0.02, 0.01, 0, 0, 0, 0]
            XF=[1, 1, 1, 1, 1, 1, 1, 0, 0, 0, 0]
          SoilCrop barley
            LL=[0.29, 0.29, 0.32, 0.38, 0.39, 0.39, 0.41, 0.48, 0.47, 0.46, 0.44]
            KL=[0.1, 0.1, 0.08, 0.06, 0.04, 0.02, 0.01, 0, 0, 0, 0]
            XF=[1, 1, 1, 1, 1, 1, 1, 0, 0, 0, 0]
          SoilCrop canola
            LL=[0.29, 0.29, 0.32, 0.32, 0.35, 0.38, 0.41, 0.48, 0.47, 0.46, 0.44]
            KL=[0.1, 0.1, 0.08, 0.06, 0.04, 0.02, 0.01, 0, 0, 0, 0]
            XF=[1, 1, 1, 1, 1, 1, 1, 0, 0, 0, 0]
          SoilCrop Chickpea
            LL=[0.29, 0.29, 0.36, 0.43, 0.51, 0.5, 0.5, 0.48, 0.47, 0.46, 0.44]
            KL=[0.1, 0.1, 0.08, 0.06, 0.04, 0.02, 0.01, 0, 0, 0, 0]
            XF=[1, 1, 1, 1, 1, 1, 1, 0, 0, 0, 0]
          SoilCrop Lucerne
            LL=[0.29, 0.29, 0.29, 0.29, 0.3, 0.31, 0.32, 0.33, 0.34, 0.35, 0.36]
            KL=[0.1, 0.1, 0.1, 0.1, 0.09, 0.09, 0.09, 0.09, 0.09, 0.09, 0.09]
            XF=[1, 1, 1, 1, 1, 1, 1, 1, 1, 1, 1]
          SoilCrop Maize
            LL=[0.29, 0.29, 0.34, 0.34, 0.37, 0.4, 0.42, 0.48, 0.47, 0.46, 0.44]
            KL=[0.1, 0.1, 0.1, 0.08, 0.06, 0.04, 0.02, 0, 0, 0, 0]
            XF=[1, 1, 1, 1, 1, 1, 1, 0, 0, 0, 0]
          SoilCrop Perennial Grass
            LL=[0.29, 0.29, 0.39, 0.41, 0.4, 0.4, 0.41, 0.41, 0.4, 0.4, 0.42]
            KL=[0.1, 0.1, 0.1, 0.1, 0.09, 0.07, 0.05, 0, 0, 0, 0]
            XF=[1, 1, 1, 1, 1, 1, 1, 0, 0, 0, 0]
          SoilCrop Sorghum
            LL=[0.29, 0.29, 0.35, 0.38, 0.4, 0.4, 0.4, 0.48, 0.47, 0.46, 0.44]
            KL=[0.1, 0.1, 0.1, 0.08, 0.06, 0.04, 0.02, 0, 0, 0, 0]
            XF=[1, 1, 1, 1, 1, 1, 1, 0, 0, 0, 0]
          SoilCrop Cowpea
            LL=[0.29, 0.29, 0.32, 0.32, 0.35, 0.38, 0.41, 0.48, 0.47, 0.46, 0.44]
            KL=[0.1, 0.1, 0.08, 0.06, 0.04, 0.02, 0.01, 0, 0, 0, 0]
            XF=[1, 1, 1, 1, 1, 1, 1, 0, 0, 0, 0]
          SoilCrop Fababean
            LL=[0.29, 0.29, 0.32, 0.32, 0.35, 0.38, 0.41, 0.48, 0.47, 0.46, 0.44]
            KL=[0.1, 0.1, 0.08, 0.06, 0.04, 0.02, 0.01, 0, 0, 0, 0]
            XF=[1, 1, 1, 1, 1, 1, 1, 0, 0, 0, 0]
          SoilCrop Mungbean
            LL=[0.29, 0.29, 0.32, 0.32, 0.35, 0.38, 0.41, 0.48, 0.47, 0.46, 0.44]
            KL=[0.1, 0.1, 0.08, 0.06, 0.04, 0.02, 0.01, 0, 0, 0, 0]
            XF=[1, 1, 1, 1, 1, 1, 1, 0, 0, 0, 0]
          SoilCrop Navybean
            LL=[0.29, 0.29, 0.32, 0.32, 0.35, 0.38, 0.41, 0.48, 0.47, 0.46, 0.44]
            KL=[0.1, 0.1, 0.08, 0.06, 0.04, 0.02, 0.01, 0, 0, 0, 0]
            XF=[1, 1, 1, 1, 1, 1, 1, 0, 0, 0, 0]
          SoilCrop Peanut
            LL=[0.29, 0.29, 0.32, 0.32, 0.35, 0.38, 0.41, 0.48, 0.47, 0.46, 0.44]
            KL=[0.1, 0.1, 0.08, 0.06, 0.04, 0.02, 0.01, 0, 0, 0, 0]
            XF=[1, 1, 1, 1, 1, 1, 1, 0, 0, 0, 0]
          SoilCrop Pigeonpea
            LL=[0.29, 0.29, 0.32, 0.32, 0.35, 0.38, 0.41, 0.48, 0.47, 0.46, 0.44]
            KL=[0.1, 0.1, 0.08, 0.06, 0.04, 0.02, 0.01, 0, 0, 0, 0]
            XF=[1, 1, 1, 1, 1, 1, 1, 0, 0, 0, 0]
          SoilCrop Soybean
            LL=[0.29, 0.29, 0.32, 0.32, 0.35, 0.38, 0.41, 0.48, 0.47, 0.46, 0.44]
            KL=[0.1, 0.1, 0.08, 0.06, 0.04, 0.02, 0.01, 0, 0, 0, 0]
            XF=[1, 1, 1, 1, 1, 1, 1, 0, 0, 0, 0]
          SoilCrop Stylo
            LL=[0.29, 0.29, 0.32, 0.32, 0.35, 0.38, 0.41, 0.48, 0.47, 0.46, 0.44]
            KL=[0.1, 0.1, 0.08, 0.06, 0.04, 0.02, 0.01, 0, 0, 0, 0]
            XF=[1, 1, 1, 1, 1, 1, 1, 0, 0, 0, 0]
          SoilCrop Sugar
            LL=[0.29, 0.29, 0.32, 0.32, 0.35, 0.38, 0.41, 0.48, 0.47, 0.46, 0.44]
            KL=[0.1, 0.1, 0.08, 0.06, 0.04, 0.02, 0.01, 0, 0, 0, 0]
            XF=[1, 1, 1, 1, 1, 1, 1, 0, 0, 0, 0]
          SoilCrop Sunflower
            LL=[0.29, 0.29, 0.32, 0.32, 0.35, 0.38, 0.41, 0.48, 0.47, 0.46, 0.44]
            KL=[0.1, 0.1, 0.08, 0.06, 0.04, 0.02, 0.01, 0, 0, 0, 0]
            XF=[1, 1, 1, 1, 1, 1, 1, 0, 0, 0, 0]
          SoilCrop Lablab
            LL=[0.29, 0.29, 0.32, 0.32, 0.35, 0.38, 0.41, 0.48, 0.47, 0.46, 0.44]
            KL=[0.1, 0.1, 0.08, 0.06, 0.04, 0.02, 0.01, 0, 0, 0, 0]
            XF=[1, 1, 1, 1, 1, 1, 1, 0, 0, 0, 0]
          SoilCrop Cotton
            LL=[0.29, 0.29, 0.35, 0.36, 0.38, 0.39, 0.39, 0.48, 0.47, 0.46, 0.44]
            KL=[0.1, 0.1, 0.1, 0.08, 0.06, 0.04, 0.02, 0, 0, 0, 0]
            XF=[1, 1, 1, 1, 1, 1, 1, 0, 0, 0, 0]
        SoilWater: SummerCona=3.5; SummerU=6; SummerDate=1-Nov; WinterCona=3.5; WinterU=6; WinterDate=1-Apr; DiffusConst=40; DiffusSlope=16; Salb=0.13; CN2Bare=73; CNRed=20; CNCov=0.8; Thickness=[150, 150, 300, 300, 300, 300, 300, 300, 300, 300, 300]; SWCON=[0.3, 0.3, 0.3, 0.3, 0.3, 0.3, 0.3, 0.3, 0.3, 0.3, 0.3]
        SoilOrganicMatter: RootCN=40; RootWt=200; SoilCN=12.5; EnrACoeff=7.4; EnrBCoeff=0.2
          Thickness  OC    FBiom  FInert
          150        1.04  0.025  0.4
          150        0.89  0.02   0.6
          300        0.89  0.015  0.8
          300        0.89  0.01   0.9
          300        0.77  0.01   0.95
          300        0.45  0.01   0.95
          300        0.27  0.01   0.95
          300        0.22  0.01   0.95
          300        0.16  0.01   0.95
          300        0.13  0.01   0.95
          300        0.12  0.01   0.95
        Analysis
          Thickness  EC    PH
          150        0.2   8.4
          150        0.25  8.8
          300        0.31  9
          300        0.4   9.2
          300        0.59  9.2
          300        0.84  9.1
          300        0.93  9
          300        1.01  9
          300        1.06  8.9
          300        1.05  8.9
          300        1.01  8.9
        Sample Initial nitrogen
          Thickness  NO3      NH4
          150        6.50005  0.600073
          150        2.10002  0.100012
          300        2.10002  0.100012
          300        1.70001  0.100012
          300        1.70001  0.100012
          300        1.70001  0.100012
          300        1.70001  0.100012
          300        1.70001  0.100012
          300        1.70001  0.100012
          300        1.70001  0.100012
          300        1.70001  0.100012
        Sample Initial water: Thickness=[150, 150, 300, 300, 300, 300, 300, 300, 300, 300, 300]
          SW=[0.540, 0.530, 0.540, 0.540, 0.520, 0.500, 0.500, 0.480, 0.470, 0.460, 0.440]
      surfaceom SurfaceOrganicMatter
        PoolName = wheat_stubble  # Organic Matter pool name
        type = wheat  # Organic Matter type
        mass = 0  # Initial surface residue (kg/ha)
        cnr = 0  # C:N ratio of initial residue
        standing_fraction = 0  # Fraction of residue standing
      folder Manager folder
    folder Manager
      manager2 Manage_stock
        Genotype = Suffolk
        Sex = wethers
        sr = 20  # Stocking rate
        graze_paddock = PasturePaddock  # Grazed paddock
        # Replacements
        Age = 8  # Purchase age (months)
        replace_date = 15-May  # Purchase date (dd-mmm)
        replace_weight = 45  # Purchase weight (kg)
        replace_cs = 2.5  # Purchase CS
        # Cull stock
        cull_date = 31-Dec  # Cull date (dd-mmm)
        cull_years = 5  # Cull age (yrs)
```csharp
using System;
using ModelFramework;
using CSGeneral;

public class Script 
{  
   [Link()] Cashbook cashbook;
   [Link()] Stock stock;
   [Link]   public Component MySelf;
   [Link()] Simulation MySimulation;
   [Link()] Clock ticker;
   [Input()] DateTime today;   // Equates to the value of the current simulation date - value comes from CLOCK
   [Param()] string replace_date;
   [Param()] double replace_weight;
   [Param()] double replace_cs;
   [Param()] string Genotype;
   [Param()] string Sex;   
   [Param()] double Age;
   [Param()] double sr;                   //stocking rate animals/ha
   [Param()] string cull_date;
   [Param()] int cull_years;
   [Param()] string graze_paddock;
   
   [Output()] int[] stock_buy_number;
   [Output()] double[] stock_buy_weight;
   [Output()] double[] stock_buy_cond_score;
  
   
   private int[] numberPurchased;
   private double[] buyWeight;
   private double[] buyCondScore;

   // outputs dedicated to the culling sales
   [Output()] int[] cull_sale_number;
   [Output()] double[] cull_sale_weight;
   [Output()] double[] cull_sale_cond_score;

   private double[] sale_weight;          // sale weights by tag
   private double[] sale_cond_score;      // condition at sale by tag
   private int[] number_sold;             // number sold by tag
   
   // tag ID numbers
   private const int WETHERS = 1;
   // count of tags
   private const int NUMTAGS = 1;

   // The following event handler will be called once at the beginning of the simulation
   [EventHandler] public void OnStart_Simulation()
   {  
   }
      
   // The following event handler will be called once at the beginning of the simulation
   [EventHandler] public void OnInitialised()
   {
      numberPurchased = new int[NUMTAGS];
      buyWeight = new double[NUMTAGS];
      buyCondScore = new double[NUMTAGS];
      
      stock_buy_number = new int[NUMTAGS];
      stock_buy_weight = new double[NUMTAGS];
      stock_buy_cond_score = new double[NUMTAGS]; 
      
      // for culling
      number_sold = new int[NUMTAGS];
      sale_weight = new double[NUMTAGS];
      sale_cond_score = new double[NUMTAGS];
      
      // reporting outputs for culling
      cull_sale_number = new int[NUMTAGS];
      cull_sale_weight = new double[NUMTAGS];
      cull_sale_cond_score = new double[NUMTAGS]; 
   }
   
   // The following event handler will be called each day at the beginning of the day
   [EventHandler] public void OnPrepare()
   {
      if (today.Day == 1)
      {
         //initialise the montly summary values for each tag
         stock_buy_number = new int[NUMTAGS];
         stock_buy_weight = new double[NUMTAGS];
         stock_buy_cond_score = new double[NUMTAGS];
         
         //initialise the montly summary values for each tag
         cull_sale_number = new int[NUMTAGS];
         cull_sale_weight = new double[NUMTAGS];
         cull_sale_cond_score = new double[NUMTAGS];
      }
      
     
   }
   
   [EventHandler] public void OnProcess()
   {
      // if the first day of the simulation
      if (ticker.is_start_simulation)
      {
         initCohorts();
      }
      else if (DateUtility.DatesEqual(cull_date, today))
      {
         cullStock();  
      }
      else if (DateUtility.DatesEqual(replace_date, today))
      {
         purchaseTradeSheep();
      }
      
      //getAvailableToAnimal(); //dummy call for testing only <<<<<<
   }
   
   // Temporary function to test the GetValue and RequestSet
   private void getAvailableToAnimal()
   {
      AvailableToAnimalType available = new AvailableToAnimalType();
      
      Component wheatPaddock = (Component) MySimulation.LinkByName("wheatpaddock");
      Component somforstock = (Component) MySimulation.LinkByName("wheatpaddock.somforstock");
      if (somforstock != null)
      {
         somforstock.GetObject(somforstock.FullName + ".AvailableToAnimal", ref available);
         //for (int i = 0; i < available.element.Length; i++)
            //log(available.element[i].CohortID + " " + available.element[i].Organ + " " + available.element[i].AgeID);
         
         RemovedByAnimalType val = new RemovedByAnimalType();
         val.element = new RemovedByAnimalelementType[2];
         val.element[0] = new RemovedByAnimalelementType();
         val.element[1] = new RemovedByAnimalelementType();
         somforstock.SetObject(somforstock.FullName + ".removedbyanimal", ref val);
      }
      else
         log("Cannot find SOMForStock");
   }
   
   
   
   [EventHandler] public void OnPost()
   {
      // on the last day of the month
      if (today.Day == DateTime.DaysInMonth(today.Year, today.Month))
      {
         //store the summary values for the month on the last day of the month
         numberPurchased.CopyTo(stock_buy_number, 0);
         buyWeight.CopyTo(stock_buy_weight, 0);
         buyCondScore.CopyTo(stock_buy_cond_score, 0);

         //reset the working values
         numberPurchased = new int[NUMTAGS];
         buyWeight = new double[NUMTAGS];
         buyCondScore = new double[NUMTAGS];
         
         //store the summary values for the month on the last day of the month
         number_sold.CopyTo(cull_sale_number, 0);
         sale_weight.CopyTo(cull_sale_weight, 0);
         sale_cond_score.CopyTo(cull_sale_cond_score, 0);

         //reset the working values for culling
         number_sold = new int[NUMTAGS];
         sale_weight = new double[NUMTAGS];
         sale_cond_score = new double[NUMTAGS];
      }
      
      // Write the Cashbook report at the end of the simulation
      if (ticker.is_end_simulation)
      {
         ReportType data = new ReportType();
         data.filename = "Wether in pasture crop rotation_cashbook.txt";
         cashbook.Report(data);
      }
   }

   /// <summary>
   /// Initialise the cohorts of animals for todays date
   /// </summary>
   private void initCohorts()
   {
      int flockSize = estTodaysFlockSize(Genotype, sr, today, replace_date);
      AddAnimalsType data = new AddAnimalsType();
      
      DateTime birthDate = DateUtility.GetDate(replace_date).AddMonths(-1 * Convert.ToInt32(Age));
      data.birth_day = birthDate.DayOfYear;  
      data.cond_score = 3;
      //data.foetuses = 0;
      data.genotype = Genotype;
      //data.lactating = 0;
      //data.mated_to = "";
      
      // determine the min age of the cohorts
      DateTime r = DateUtility.GetDate(replace_date);
      DateTime replacementDate = new DateTime(today.Year, r.Month, r.Day);
      int daysSinceReplace = (today.Subtract(replacementDate).Days + 730) % 365;
      // Have the animals passed their birthday since the replacement date?
      int ageYearsOffset;
      if (Age * 30.5 % 365 + daysSinceReplace >= 365)
      {
         ageYearsOffset = 1;
      }
      else
      {
         ageYearsOffset = 0;
      }
      
      data.min_years = ageYearsOffset;
      data.max_years = cull_years;     // sets the age of the oldest cohort
      //data.mean_fleece_wt = 0; // when unset it is calculated
      //data.mean_weight = 50;   // when unset a default set of live weights is calculated
      data.number = flockSize;
      //data.offspring = 0;
      //data.pregnant = 0;
      data.sex = Sex;
      
      // get the shearing day from the other script
      data.shear_day = getShearingDate().DayOfYear; 
      //data.young_cond_score = 0;
      //data.young_fleece_wt = 0;
      //data.young_wt = 0;
      
      stock.AddAnimals(data);   
      for (int g = 1; g <= stock.no_groups; g++)
      {
         // test the ages of the groups here and tag appropriately
         
         stock.Tag(g, WETHERS);
      }
   }

   /// <summary>
   /// Get the shearing date from the other Manager script
   /// </summary>
   /// <returns>The DateTime value</returns>
   private DateTime getShearingDate()
   {
      // get the shearing date from the other script
      DateTime shearAt = today;  // useful default
      Component shearingManager = (Component) MySimulation.LinkByName("Shearing");
      if (shearingManager != null)
      {
         string shearing;
         shearingManager.Get("Shearing.ShearingDate", out shearing);
         DateTime shearDate = DateUtility.GetDate(shearing);
         shearAt = new DateTime(today.Year, shearDate.Month, shearDate.Day);
         
      }
      return shearAt;
   }
      
   /// <summary>
   /// Get the genotype parameters for the genotype name
   /// </summary>
   /// <param name="genotypeName">Name of the genotype e.g. Suffolk</param>
   /// <returns>The params</returns>
   private GenotypeselementType getGenoParams(string genotypeName)
   {
      GenotypesType geno = new GenotypesType();
      stock.GetObject(stock.Name + ".genotypes", ref geno);
      int i = geno.element.Length - 1;
      while (i >= 0)
      {
         if (string.Compare(geno.element[i].name, genotypeName, true) == 0)
            return geno.element[i];
         i--;  
      }
      return null;
   }
      
   /// <summary>
   /// Estimate the flock size today
   /// </summary>
   /// <param name="genoName">Genotype name</param>
   /// <param name="stockingRate">The stocking rate of the main mob</param>
   /// <param name="purchaseDay">The purchase date</param>
   /// <param name="replacementDay">The day of the year that replacement normally takes place (when the farm is fully stocked)</param>
   /// <returns>The animal number estimate</returns>
   private int estTodaysFlockSize(string genoName, double stockingRate, DateTime purchaseDay, string replacementDay)
   {
      // find the params for the genotype
      GenotypeselementType param = getGenoParams(genoName);
      double deathRate = 0;
      if (param != null)
         deathRate = param.death_rate;
      double survivalRate = Math.Min(1.0 - deathRate, 0.999999);

      // Compute the expected size of the flock today. 
      int replaceFlockSize = Convert.ToInt32(getStockedArea(graze_paddock) * stockingRate);                                  // total flock required for this stocking rate
      double yearsOffset = (((purchaseDay.DayOfYear - DateUtility.GetDate(replacementDay).DayOfYear) + 365) % 365) / 365.0;   // using replacement date calculate the ageing to today
      int flockSize = Convert.ToInt32(replaceFlockSize * Math.Pow(survivalRate, yearsOffset));                   // reduce the flock by expected deaths
      
      return flockSize;
   }
      
   /// <summary>
   /// Purchase the replacement animals used in this trading enterprise
   /// </summary>
   /// <param name="record">Record the purchase numbers and weights</param>
   private void purchaseTradeSheep()
   {
      Component pasturePaddock = (Component) MySimulation.LinkByName("PasturePaddock");
      
      int replaceFlockSize = Convert.ToInt32(getStockedArea(graze_paddock) * sr);   // total flock required for this stocking rate on replacement day
      
      BuyType data = new BuyType();
      data.age = Age;
      data.cond_score = replace_cs;
      
      // estimate a fleece weight for the replacements
      GenotypeselementType param = getGenoParams(Genotype);
      double yearsOffset = (((getShearingDate().DayOfYear - DateUtility.GetDate(replace_date).DayOfYear) + 365) % 365) / 365.0;   // offset from shearing to now (replacement date) 
      data.fleece_wt = param.ref_fleece_wt * yearsOffset; //estimated fleece weight 
      
      data.genotype = Genotype;
      data.number = replaceFlockSize - stock.number_all;             // top up to the required animals/ha
      data.pregnant = 0;
      data.sex = Sex;
      data.weight = replace_weight; 
      
      int newGroup = buyAnimals(data, WETHERS);
      
      // configure the new animals
      if (newGroup >= 0)
      {
         stock.Move(newGroup, pasturePaddock.Name);         // move to a suitable paddock
         stock.Tag(newGroup, WETHERS);                      // tag them
      }
   }

   /// <summary>
   /// Purchase animals, tagging them
   /// </summary>
   /// <param name="buyData">Purchase details</param>
   /// <param name="newTag">Give them this tag</param>
   /// <returns>The new group number for the purchased animals</returns>
   private int buyAnimals(BuyType buyData, int newTag)
   {
      int newGroup = -1;   // init to nothing bought
      
      if (buyData.number > 0)
      {
         stock.Buy(buyData);                    // acquire animals
         newGroup = stock.no_groups;            // added to the end of the list of groups
      
         int tagIndex = newTag - 1;             // need 0 offset for C# arrays
         int groupIndex = newGroup - 1;
         
         buyWeight[tagIndex] = (numberPurchased[tagIndex] * buyWeight[tagIndex] + stock.number[groupIndex] * stock.weight[groupIndex]) / (numberPurchased[tagIndex] + stock.number[groupIndex]);
         buyCondScore[tagIndex] = (numberPurchased[tagIndex] * buyCondScore[tagIndex] + stock.number[groupIndex] * stock.cond_score[groupIndex]) / (numberPurchased[tagIndex] + stock.number[groupIndex]);
         numberPurchased[tagIndex] = numberPurchased[tagIndex] + stock.number[groupIndex];
         log(string.Format("{0}: Purchase {1:d} animals", today.ToShortDateString(), stock.number[groupIndex]));
         
         SpendType expense = new SpendType();
         expense.name = "replacements";
         expense.amount = numberPurchased[tagIndex];
         expense.param1 = buyWeight[tagIndex];
         expense.param2 = buyCondScore[tagIndex];
         cashbook.Spend(expense);
      }

      return newGroup;
   }

   /// <summary>
   /// Sale of cull stock
   /// The rule used here is to sell any animals older than the cull age specified
   /// </summary>
   private void cullStock()
   {
      SplitAllType data = new SplitAllType();
      data.type = "age";
      data.value = 365 * cull_years;
      stock.SplitAll(data);

      int animalsNumber;
      double animalsAge;
    
      for (int g = 1; g <= stock.no_groups; g++)      // Sell them and record their weight etc
      {
         animalsNumber = stock.number[g - 1];
         animalsAge = stock.age[g - 1];

         if (animalsAge >= 365 * cull_years)
         {
            sellAnimalGroup(g, animalsNumber);
         }
      }
   }
      
   /// <summary>
   /// Sell animals from the animal group and store the sale results
   /// </summary>
   /// <param name="groupNum">The animal group number (1->n)</param>
   /// <param name="saleNum">The number of animals to sell</param>
   /// <returns>The number of stock sold</returns>
   private int sellAnimalGroup(int groupNum, int saleNum)
   {
      int groupIndex = groupNum - 1;                    // convert to 0 offset for C# arrays
      int tagIndex = stock.tag_no[groupIndex] - 1;      // convert to 0 offset for C# arrays
      int selling = Math.Min(saleNum, stock.number[groupIndex]);   // ensure no virtual flock negative number
      
      if (selling > 0)
      {
         sale_weight[tagIndex] = (number_sold[tagIndex] * sale_weight[tagIndex] + saleNum * stock.weight[groupIndex]) / (number_sold[tagIndex] + selling);
         sale_cond_score[tagIndex] = (number_sold[tagIndex] * sale_cond_score[tagIndex] + saleNum * stock.cond_score[groupIndex]) / (number_sold[tagIndex] + selling);
         number_sold[tagIndex] = number_sold[tagIndex] + selling;
      
         log(string.Format("{0}: Culling {1:d} animals aged {2:#.#} days", today.ToShortDateString(), selling, stock.age[groupIndex]));
                  
         stock.Sell(groupNum, selling);
         
         // record the sales income
         EarnType income = new EarnType();
         income.name = "wether_sales";
         income.amount = selling;
         income.param1 = stock.weight[groupIndex];
         income.param2 = stock.cond_score[groupIndex];
         cashbook.Earn(income);
         
         // record the sales expenses
         SpendType expense = new SpendType();
         expense.name = "transport";
         expense.amount = selling;
         cashbook.Spend(expense);
      }
      
      return selling;
   }
   
   /// <summary>
   /// Get the total area that will be stocked. 
   /// Used to calculate stock numbers at the specified stocking rate.
   /// If stock are to be spread over a number of paddocks then incorporate that in here.
   /// </summary>
   /// <returns>Area in hectares</returns>
   private double getStockedArea(string paddName)
   {
      double area;
      
      Component myPaddock = (Component) MySimulation.LinkByName(paddName);
      myPaddock.Get(myPaddock.Name + ".area", out area);
      
      return area;
   }
      
   /// <summary>
   /// Convert the DateTime value to a GrazPlan date value
   /// </summary>
   /// <param name="date">The DateTime value</param>
   /// <returns>The stddate</returns>
   private int asStdDate(DateTime date)
   {
      return Convert.ToInt32(date.Day + date.Month * 0x100 + date.Year * 0x10000);
   }
      
   private void log(string msg)
   {
      Console.WriteLine(msg);
   }
}
```
      manager2 Grazing_crop
        # Winter Grazing
        graze_crop = WheatPaddock  # Which paddock name to graze
        start_graze = 1-Aug  # Allow crop grazing after (ddmmm)
        start_level = 1200  # DM required before grazing crop (kg/ha)
        finish_graze = 5-Sep  # Finish crop grazing on (ddmmm)
        finish_level = 1000  # Exit crop if DM falls below (kg/ha)
        # Stubble Grazing
        stubble_paddock = WheatPaddock  # Stubble paddock to graze
        stubble_cover_threshold = 0.6  # Stubble cover threshold for grazing
        # Complete Grazing
        return_to_paddock = PasturePaddock  # Return animals to paddock
```csharp
using System;
using System.Collections.Generic;
using ModelFramework;
using CSGeneral;

public class Script 
{      
   [Link()] Supplement supp;
   [Link()] Stock stock;
   [Link] Simulation MySimulation; 
   [Input] DateTime today;   // Equates to the value of the current simulation date - value comes from CLOCK
   [Param()] string graze_crop; 
   [Param()] string start_graze; 
   [Param()] string finish_graze;
   [Param()] double start_level; 
   [Param()] double finish_level;
   [Param()] double stubble_cover_threshold;     // Threshold cover to abandon summer grazing
   [Param()] string return_to_paddock;
   [Param()] string stubble_paddock;

   private bool cropGrazing;  // true if crop grazing
   private int grazingDays;   // number of days on the crop paddock

   private bool cropHarvested;
   private double spiltGrainRemaining;
   private bool stubblePresent;
   private int stubbleDays;
   private bool stubbleGrazing;
   private int maxStubbleDays = 28;                // Length of stubble grazing period
   private double spiltGrainAccessRate = 0.020;    // (kg/head) / (kg/ha spilt grain)
   private double spiltGrainMaxIntake = 0.20;      // kg FW/head/day
   private double bestStubbleCover;
   
   // The following event handler will be called once at the beginning of the simulation
   [EventHandler] public void OnInitialised()
   {
      cropGrazing = false;
      grazingDays = 0;
      cropHarvested = false;
      resetStubble();
   }

   // The following event handler will be called each day at the beginning of the day
   [EventHandler] public void OnPrepare()
   {

   }

   [EventHandler] public void OnProcess()
   {
      if (DateUtility.DatesEqual("1-May", today))
      {
         resetStubble();  
      }
      
      // A fairly simple grazing rotation where the animals are moved onto
      // a crop paddock for a short time.
      if (!cropGrazing)
      {
         // check if it is time for crop grazing
         if (DateUtility.WithinDates(start_graze, today, finish_graze))
         {        
            Paddock paddockModule = (Paddock) MySimulation.LinkByName(graze_crop);
            if (paddockModule != null)
            {
               List<Component> children = paddockModule.Crops;
               if (children.Count > 0)
               {
                  string plantStatus = "";
                  children[0].Get("plant_status", out plantStatus);
                  double biomass = 0;
                  children[0].Get("biomass", out biomass);
                  if ((string.Compare(plantStatus, "alive", true) == 0) && (biomass >= start_level))
                  {
                     //move all animals to crop
                     for (int g = 1; g <= stock.no_groups; g++)
                     {
                        stock.Move(g, paddockModule.Name);  
                        log(string.Format("{0}: Moving {1:d} animals in group {2:d} to {3}", today.ToShortDateString(), stock.number[g - 1], g, paddockModule.Name));
                     }
                     //inc grazing days
                     cropGrazing = true;
                     grazingDays++;
                  }
               }
               
            }
         }
      }
      else
      {
         // check if the animals should move back to pasture  
         grazingDays++;  
         
         Paddock paddockModule = (Paddock) MySimulation.LinkByName(graze_crop);
         if (paddockModule != null)
         {
            List<Component> children = paddockModule.Crops;
            if (children.Count > 0)
            {
               double biomass = 0;
               children[0].Get("biomass", out biomass);
               if ((biomass < finish_level) || DateUtility.DatesEqual(finish_graze, today))
               {
                  //move all animals off the crop
                  for (int g = 1; g <= stock.no_groups; g++)
                  {
                     stock.Move(g, return_to_paddock);  
                     log(string.Format("{0}: Moving {1:d} animals in group {2:d} to {3}", today.ToShortDateString(), stock.number[g - 1], g, return_to_paddock));
                  }
                  cropGrazing = false;
                  grazingDays = 0;
               }
            }
         }
      }      
     
      // Stubble grazing
      // -During October - January, detect the availability of stubbles and hence the start of stubble grazing stage
      // -End stubble grazing after a fixed time, or when there is insufficient stubble cover
      // -The spilt grain "submodel" is initialized here
      cropHarvested = false;
      if (DateUtility.WithinDates("1-Oct", today, "31-Jan"))
      {
         // check if the crop has been harvested (Wheat crop in WheatPaddock)
         Component cropManager = (Component) MySimulation.LinkByName(stubble_paddock + ".Crop Management");
         if (cropManager != null)
         {   
            int harvested;
            cropManager.Get(cropManager.FullName + ".cropHarvested", out harvested);
            cropHarvested = harvested > 0;
         }
         if (cropHarvested)
         {
            stubblePresent = true;
            cropManager.Get(cropManager.FullName + ".GrainSpilt", out spiltGrainRemaining);
         }
         
         if ((!stubbleGrazing) && (stubbleDays < maxStubbleDays))
         {
            if (stubblePresent)  // stubble available
            {
               // move all animals to the stubble
               for (int g = 1; g <= stock.no_groups; g++)
               {
                  stock.Move(g, stubble_paddock);  
                  log(string.Format("{0}: Moving {1:d} animals in group {2:d} to {3} for stubble grazing", today.ToShortDateString(), stock.number[g - 1], g, stubble_paddock));
               }
               stubbleGrazing = true;
            }
         }
      }
      
      
      // check every 7 days to see if the stubble grazing should finish
      if (DateUtility.WithinDates("1-Oct", today, "30-Apr"))            
      {
         grazingStubbleSpiltGrain();   // each stubble grazing day ensure they have spilt grain
            
         if (stubbleGrazing) 
         {
            stubbleDays += 1;                // Number of days of stubble grazing
            if (today.Day % 7 == 0)
            {
               // check the paddock(s) for stubble cover
               Paddock paddockModule = (Paddock) MySimulation.LinkByName(stubble_paddock);
               List<Component> children = paddockModule.Crops;
               if (children.Count > 0)
               {
                  double cover = 0;
                  children[0].Get("cover_tot", out cover);
               
                  SurfaceOM som = (SurfaceOM) paddockModule.LinkByType("SurfaceOM");
                  double scover;
                  som.Get("surfaceom_cover", out scover);
                              
                  bestStubbleCover = 1.0 - (1.0 - cover) * (1.0 - scover);
                  //log(string.Format("cover: {0} scover: {1} calc: {2}", cover, scover, bestStubbleCover));
               }

               if ((stubbleDays >= maxStubbleDays) || (bestStubbleCover < stubble_cover_threshold))
               {
                  // move all animals back to pasture
                  for (int g = 1; g <= stock.no_groups; g++)
                  {
                     stock.Move(g, return_to_paddock);  
                     log(string.Format("{0}: Moving {1:d} animals in group {2:d} to {3}", today.ToShortDateString(), stock.number[g - 1], g, return_to_paddock));
                  }
                  stubbleGrazing = false;
               }
            }
         }
      }
   }
   
   /// <summary>
   /// Feed the spilt grain in the stubble paddock
   /// </summary>
   private void grazingStubbleSpiltGrain()
   {
      if (stubbleGrazing)
      {
         // Make spilt grain available to animals grazing stubbles
         for (int g = 1; g <= stock.no_groups; g++)
         {
            if (spiltGrainRemaining > 0.0)
            {
               double spiltGrainFound = Math.Min(spiltGrainMaxIntake, spiltGrainAccessRate * spiltGrainRemaining) * stock.number[g - 1];
               spiltGrainRemaining = Math.Max(0.0, spiltGrainRemaining - spiltGrainFound / getPaddockArea(stubble_paddock));
               
               FeedType food = new FeedType();
               food.supplement = "Wheat";
               food.amount = spiltGrainFound;
               food.paddock = stubble_paddock; 
               supp.Feed(food);
            }
         }
      }
   }
    
   /// <summary>
   /// Get the area of any paddock
   /// </summary>
   /// <param name="paddName">Name of the paddock</param>
   private double getPaddockArea(string paddName)
   {
      double area;
      
      Component myPaddock = (Component) MySimulation.LinkByName(paddName);
      myPaddock.Get(myPaddock.Name + ".area", out area);
      
      return area;
   }

   
   private void resetStubble()
   {
      stubbleDays = 0;
      stubblePresent = false;
      spiltGrainRemaining = 0;
      stubbleGrazing = false;
      bestStubbleCover = 0;
   }
      
   private void log(string msg)
   {
      Console.WriteLine(msg);
   }

}
```
      manager2 Manage_supplement
        buy_date = 1-Jan  # Purchase date (dd-mmm)
        buy_amount = 500000  # Fresh weight of supplement to purchase (kg)
        # Maintenance (survival) feed description
        buy_name = lupins  # Supplement type
        crit_condition = 2  # Maintain this minimum condition score
        max_feed_rate = 1  # Maximum rate of feeding in kg FW/day; 1.0 is sensible for sheep
        # Production feeding
        target_feed_name = wheat  # Supplement type
        target_begin = 15-Jan  # Start feeding (dd-mmm)
        target_finish = 15-Feb  # Target date (dd-mmm)
        target_weight = 60  # Target weight (kg) (0 = no feeding)
        feed_paddock = Feedlot  # Feed in this paddock
```csharp
using System;
using ModelFramework;
using CSGeneral;

public class Script 
{  
   [Link()] Supplement supp;
   [Link()] Stock stock;
   [Link()] Simulation MySimulation;
   [Input()] DateTime today;           // Equates to the value of the current simulation date - value comes from CLOCK
   [Param()] private string buy_date;  
   [Param()] private string buy_name;
   [Param()] private double buy_amount;
   // maintenance feeding
   [Param()] private double max_feed_rate;
   [Param()] private double crit_condition;
   // production target feeding 
   [Param()] private string target_begin;
   [Param()] private string target_finish;
   [Param()] private double target_weight;
   [Param()] private string target_feed_name;
   [Param()] private string feed_paddock;
   
   [Output()] public double SuppFed;         // total fed for the day
   [Output()] public double[] suppFedKg;     // total supplement fed for each tag group

   private double[] feedRate;      // feeding rate for each tag group
   
   // tag ID numbers
   private const int WETHERS = 1;
   // count of tags
   private const int NUMTAGS = 1;

   // The following event handler will be called once at the beginning of the simulation
   [EventHandler] public void OnStart_Simulation()
   {
      feedRate = new double[NUMTAGS];
      suppFedKg = new double[NUMTAGS];
   }
      
   [EventHandler] public void OnInitialised()
   {
      
   }
      
   // The following event handler will be called each day at the beginning of the day
   [EventHandler] public void OnPrepare()
   {
      // keep the supplement store stocked
      if (DateUtility.DatesEqual(buy_date, today))
      {
         StoresType store = new StoresType();
         supp.GetObject("stores", ref store);
         int nstores = store.element.Length;
         for (int i = 1; i < nstores; i++)
         {
            if (string.Compare(store.element[i].name, buy_name, true) == 0)
            {
               double purchaseAmount = buy_amount - store.element[i].stored;
               if (purchaseAmount > 0)
               {
                  SupplementBuyType food = new SupplementBuyType();
                  food.supplement = buy_name;
                  food.amount = purchaseAmount;
                  supp.Buy(food); 
                  Console.WriteLine(string.Format("{0}: Buy supplement: {1:0.00} kg of {2}", today.ToShortDateString(), food.amount, store.element[1].name));   
               }
            }
         }
      }
   }
   
   [EventHandler] public void OnProcess()
   {
      maintenanceFeed();
      productionFeed();
   }
   
   [EventHandler] public void OnPost()
   {
      
   }

   /// <summary>
   /// Carry out the production feeding
   /// </summary>
   private void productionFeed()
   {
      // do production feeding if the weight target > 0
      if ((target_weight > 0) && (DateUtility.WithinDates(target_begin, today, target_finish)))
      {
         buyProductionFeed();

         double maxFeedRate = max_feed_rate;             // kg/day
      
         // feed each tag group (could use a list of tag groups here)
         for (int tag = 1; tag <= NUMTAGS; tag++)
         {
            bool doFeeding = true;
         
            // (assumes that all of this tag group are in the same paddock)
            string feedPaddock = feed_paddock;   
            int count = 0;
            for (int g = 1; g <= stock.no_groups; g++)
            {
               if (string.Compare(stock.paddock[g - 1], feedPaddock, true) != 0)
               {
                  stock.Move(g, feedPaddock);
                  count += stock.number[g - 1];
               }
            }
            if (count > 0)
               log(string.Format("{0}: Moving {1:d} animals in tag group {2:d} to {3} for production feeding", today.ToShortDateString(), count, tag, feedPaddock));
            
            double weightTag = stock.weight_tag[tag - 1];
            if (!doFeeding && (weightTag < target_weight))
            {
               doFeeding = true;
            }
            else if (doFeeding && (weightTag > target_weight + 0.1))
            {
               doFeeding = false;
            }
        
            double crit_dwt = 0.0;
            if (doFeeding)
            {
               //crit_dwt = 0.05;                       // expected daily weight gain when feeding
               
               int daysLeft;
               // calculate the days until they should reach their weight
               int lastSaleDOY = DateUtility.GetDate(target_finish).DayOfYear;
               if (today.DayOfYear <= lastSaleDOY)
               {
                  daysLeft = lastSaleDOY - today.DayOfYear + 1;
               }
               else
               {
                  daysLeft = lastSaleDOY - today.DayOfYear + 366;
               }
               crit_dwt = (target_weight - stock.weight_tag[tag - 1]) / daysLeft;             
               
               feedRate[tag - 1] = Math.Max(0.0, Math.Min(maxFeedRate, feedRate[tag - 1] - 0.5 * (stock.wt_change_tag[tag - 1] - crit_dwt)));
               suppFedKg[tag - 1] = stock.number_tag[tag - 1] * feedRate[tag - 1];

               FeedType food = new FeedType();
               food.supplement = buy_name;
               food.amount = suppFedKg[tag - 1];
               food.paddock = feedPaddock; 
               supp.Feed(food);                       // occurs in this Process stage which is before do_stock
               Console.WriteLine(string.Format("{0}: Feeding: {1:0.00} kg of {2} in {3}", today.ToShortDateString(), food.amount, buy_name, food.paddock));   
               SuppFed += food.amount;
            }
            else
            {
               feedRate[tag - 1] = 0.0;
               suppFedKg[tag - 1] = 0.0;
            }
         }

      }
   }
      
   /// <summary>
   /// Maintain the production supplement store
   /// </summary>
   private void buyProductionFeed()
   {
      // Check that the supplement store is stocked        
      // ensure there is at least 1kg per head in the store
         
      bool found = false;
      double stored = 0.0;
         
      StoresType store = new StoresType();
      supp.GetObject("stores", ref store);
      int nstores = store.element.Length;
      int i = 1; 
      while (!found && (i < nstores))
      {
         if (string.Compare(store.element[i].name, target_feed_name, true) == 0)
         {
            found = true;
            stored = store.element[i].stored;
         }
         i++;
      }
         
      double purchaseAmount = stock.number_all - stored;
      if (purchaseAmount > 0)
      {
         SupplementBuyType food = new SupplementBuyType();
         food.supplement = target_feed_name;
         food.amount = purchaseAmount * 2;   
         supp.Buy(food); 
         Console.WriteLine(string.Format("{0}: Buy production supplement: {1:0.00} kg of {2}", today.ToShortDateString(), food.amount, food.supplement));   
      }
   }
      
   /// <summary>
   /// Carry out survival maintenance feeding
   /// </summary>
   private void maintenanceFeed()
   {
      SuppFed = 0.0;                                  // reset the daily total
      
      double maxFeedRate = max_feed_rate;             // kg/day
      
      // feed each tag group (could use a list of tag groups here)
      for (int tag = 1; tag <= NUMTAGS; tag++)
      {
         double criticalCS = crit_condition;          // maintenance feeding to maintain this CS. (Could specify values for each tag)
         
         bool doFeeding = false;
         
         string feedPaddock = "PasturePaddock";       // Find the paddock occupied by this mob (assumes that all of this tag group are in the same paddock)
         double lowCS = 5.0;                          // Find the lowest CS in each mob
         for (int g = 1; g <= stock.no_groups; g++)
         {
            if (stock.tag_no[g - 1] == tag)
            {
               lowCS = Math.Min(lowCS, stock.cond_score[g - 1]);
               feedPaddock = stock.paddock[g - 1];
            }
         }
         if (string.Compare(feedPaddock, "feedlot", true) == 0)   // This ensures that confinement feeding happens
         {
            doFeeding = true;
         }
         if (!doFeeding && (lowCS < criticalCS))
         {
            doFeeding = true;
         }
         else if (doFeeding && (lowCS > criticalCS + 0.1))
         {
            doFeeding = false;
         }
        
         double crit_dwt = 0.0;
         if (doFeeding)
         {
            crit_dwt = 0.05;                       // expected daily weight gain when feeding
            feedRate[tag - 1] = Math.Max(0.0, Math.Min(maxFeedRate, feedRate[tag - 1] - 0.5 * (stock.wt_change_tag[tag - 1] - crit_dwt)));
            suppFedKg[tag - 1] = stock.number_tag[tag - 1] * feedRate[tag - 1];

            FeedType food = new FeedType();
            food.supplement = buy_name;
            food.amount = suppFedKg[tag - 1];
            food.paddock = feedPaddock; 
            supp.Feed(food);                       // occurs in this Process stage which is before do_stock
            Console.WriteLine(string.Format("{0}: Feeding: {1:0.00} kg of {2} in {3}", today.ToShortDateString(), food.amount, buy_name, food.paddock));   
            SuppFed += food.amount;
         }
         else
         {
            feedRate[tag - 1] = 0.0;
            suppFedKg[tag - 1] = 0.0;
         }
      }
   }
   
   private void log(string msg)
   {
      Console.WriteLine(msg);
   }
}
```
      manager2 Shearing
        shear_date = 15-Sep  # Shearing date (dd-mmm)
```csharp
using System;
using ModelFramework;
using CSGeneral;

public class Script 
{
   [Link()] Cashbook cashbook;
   [Link()] Stock stock;
   [Link()] Simulation MySimulation;
   [Input] DateTime today;   // Equates to the value of the current simulation date - value comes from CLOCK

   [Param()] string shear_date;
   [Output()] int[] NumberShorn;
   [Output()] double[] ShornFleece;
   [Output()] double[] ShornFibre;
   [Output()] string ShearingDate {get{return shear_date;}} // available to other scripts

   private const int NUMTAGS = 1;
   
   // The following event handler will be called once at the beginning of the simulation
   [EventHandler] public void OnInitialised()
   {
      NumberShorn = new int[NUMTAGS];
      ShornFleece = new double[NUMTAGS];
      ShornFibre = new double[NUMTAGS];
   }
   
   // The following event handler will be called each day at the beginning of the day
   [EventHandler] public void OnPrepare()
   {
      if (today.Day == 1)
      {
         //initialise the montly summary values for each tag
         NumberShorn = new int[NUMTAGS];
         ShornFleece = new double[NUMTAGS];
         ShornFibre = new double[NUMTAGS];
      }
   }

   // The following event handler will be called each day
   [EventHandler] public void OnProcess()
   {
      if (DateUtility.DatesEqual(shear_date, today))
      {
         shearAnimals();  
      }
   }

   /// <summary>
   /// Shear all the sheep and record the production for each tag group
   /// </summary>
   /// <returns></returns>
   private void shearAnimals()
   {
      // Store the amount and fibre diameter of the fleeces
      // These array values are reset at the start of every month
      for (int tagIndex = 0; tagIndex < stock.number_tag.Length; tagIndex++ )     
      {
         NumberShorn[tagIndex] = stock.number_tag[tagIndex];
         ShornFleece[tagIndex] = stock.c_fleece_wt_tag[tagIndex];   // clean
         ShornFibre[tagIndex] = stock.fibre_diam_tag[tagIndex];

         // store the income from the wool and the shearing expenses
         EarnType income = new EarnType();
         income.name = "wool_sales";
         income.amount = NumberShorn[tagIndex] * ShornFleece[tagIndex];
         income.param1 = stock.fibre_diam_tag[tagIndex];
         cashbook.Earn(income);
         
         SpendType expense = new SpendType();
         expense.name = "shearing";
         expense.amount = NumberShorn[tagIndex];
         expense.param1 = 3.0196;  //shearer only cost per head
         cashbook.Spend(expense);
      }

      ShearType data = new ShearType();
      data.group = 0;
      stock.Shear(data);              // Shear all sheep
      
      log(string.Format("{0}: Shearing", today.ToShortDateString()));
   }
   
   private void log(string msg)
   {
      Console.WriteLine(msg);
   }
}
```
      manager2 Selling
        sell_start = 15-Dec  # Start selling (dd-mmm)
        sell_finish = 15-Mar  # End selling (dd-mmm)
        selling_policy = 1  # Sale policy (0 for none)
        # Policy 1 (target)
        selling_weight = 60  # Selling weight (kg)
        # Policy 2 (drought)
        daily_weight_gain = 0  # Daily weight gain trigger (kg/day)
        days_to_average = 7  # Average weight gain over (days)
```csharp
using System;
using System.Collections.Generic;
using ModelFramework;
using CSGeneral;

public class Script 
{      
   [Link()] Cashbook cashbook;
   [Link()] Stock stock;
   [Link()] Simulation MySimulation;
   [Input] DateTime today;             // Equates to the value of the current simulation date - value comes from CLOCK
   
   [Param()] string sell_start;        // start selling
   [Param()] string sell_finish;       // end selling period
   [Param()] double selling_weight;    // sell at this weight
   [Param()] int selling_policy;       // choose which selling policy. See performSale() for details. Use 0 to turn off.
   [Param()] double daily_weight_gain; // if the daily weight gain falls below this value the animals will be sold
   [Param()] int days_to_average;      // average weight gain over x days
   
   [Output()] int[] stock_sale_number;
   [Output()] double[] stock_sale_weight;
   [Output()] double[] stock_sale_cond_score;

   private double[] sale_weight;          // sale weights by tag
   private double[] sale_cond_score;      // condition at sale by tag
   private int[] number_sold;             // number sold by tag

   // tag ID numbers
   private const int WETHERS = 1;
   // count of tags
   private const int NUMTAGS = 1;
   
   private double[] wtGains;              // used to average daily weight gain
   private List<int> tagsToSell;          // The list of tag groups that will be sold in any selling policy
   
   // The following event handler will be called once at the beginning of the simulation
   [EventHandler] public void OnInitialised()
   {
      number_sold = new int[NUMTAGS];
      sale_weight = new double[NUMTAGS];
      sale_cond_score = new double[NUMTAGS];
      
      // reporting outputs
      stock_sale_number = new int[NUMTAGS];
      stock_sale_weight = new double[NUMTAGS];
      stock_sale_cond_score = new double[NUMTAGS]; 
      
      wtGains = new double[days_to_average + 1];
      // init to invalid 
      for (int i = 0; i < days_to_average + 1; i++)
         wtGains[i] = -999.0;
      
      tagsToSell = new List<int>();
      // this may need to be adjusted daily depending of the timing and purpose of the sales
      tagsToSell.Add(WETHERS);      
   }

   // The following event handler will be called each day at the beginning of the day
   [EventHandler] public void OnPrepare()
   {
      if (today.Day == 1)
      {
         //initialise the montly summary values for each tag
         stock_sale_number = new int[NUMTAGS];
         stock_sale_weight = new double[NUMTAGS];
         stock_sale_cond_score = new double[NUMTAGS];
      }
   }

   [EventHandler] public void OnProcess()
   {
      // sell animals using the specified policy
      performSale(selling_policy, tagsToSell);
   }

   [EventHandler] public void OnPost()
   {
      if (today.Day == DateTime.DaysInMonth(today.Year, today.Month))
      {
         //store the summary values for the month on the last day of the month
         number_sold.CopyTo(stock_sale_number, 0);
         sale_weight.CopyTo(stock_sale_weight, 0);
         sale_cond_score.CopyTo(stock_sale_cond_score, 0);

         //reset the working values
         number_sold = new int[NUMTAGS];
         sale_weight = new double[NUMTAGS];
         sale_cond_score = new double[NUMTAGS];
      }
   }

   /// <summary>
   /// Carry out one of the sale policies.
   /// </summary>
   /// <param name="salePolicy">Policy number</param>
   /// <param name="tagsSelling">The list of tags to sell</param>
   private void performSale(int salePolicy, List<int> tagsSelling)
   {
      switch (salePolicy)
      {
         case 1:
            // Selling within in a period every 14 days anything that has reached selling weight. 
            // At the end of the period, everything gets sold regardless of weight.
            if (DateUtility.WithinDates(sell_start, today, sell_finish))
            {
               // sell every 14 days or at the start and end of the period
               if ((today.Day % 14 == 0) || DateUtility.DatesEqual(sell_start, today) || DateUtility.DatesEqual(sell_finish, today))
               {
                  // need to split by weight and sell only those that meet the weight
                  SplitAllType split = new SplitAllType();
                  split.othertag = 1;
                  split.type = "weight";
                  split.value = selling_weight;
                  stock.SplitAll(split);
                  for (int groupNum = stock.no_groups; groupNum > 0; groupNum--)
                  {
                     int groupIdx = groupNum - 1;  //convert to index in C# arrays
                     if (tagsSelling.Contains(stock.tag_no[groupIdx]))
                     {
                        if ((stock.weight[groupIdx] >= selling_weight) || DateUtility.DatesEqual(sell_finish, today))
                        {
                           sellAnimalGroup(groupNum, stock.number[groupIdx]);
                        }
                     }
                  }
               }
            }
            break;
         case 2:
            // Drought selling within a period.
            
            // every day calculate the weight gain for the specified period length
            int animalCount = 0;
            double animalDWG = 0;
            for (int g = 1; g <= stock.no_groups; g++)
            {
               if (tagsSelling.Contains(stock.tag_no[g - 1]))
               {
                  animalCount += stock.number[g - 1];
                  animalDWG += stock.number[g - 1] * stock.wt_change[g - 1];
               }
            }
            if (animalCount > 0)
            {
               animalDWG /= animalCount;     // calc average daily weight gain for the tag group(s) for today
            }
               
            double total = 0;
            double count = 0;
            wtGains[days_to_average] = animalDWG;
            for (int i = 0; i < days_to_average; i++)
            {
               wtGains[i] = wtGains[i + 1];
               if (wtGains[i] > -999.0)
               {
                  total += wtGains[i];
                  count++;
               }
            }
            double avWtGain = total / Math.Max(1, count);
            
            // sell if in the selling period and meets criteria
            if (DateUtility.WithinDates(sell_start, today, sell_finish))
            {
               if ((animalCount > 0) && ((avWtGain < daily_weight_gain) || DateUtility.DatesEqual(sell_finish, today)))
               {
                  for (int g = 1; g <= stock.no_groups; g++)
                  {
                     if (tagsSelling.Contains(stock.tag_no[g - 1]))
                     {
                        sellAnimalGroup(g, stock.number[g - 1]);
                     }
                  }
                  log(string.Format("\tSelling when average weight gain over {0} days is {1:0.#####} kg/day", days_to_average, avWtGain));
               }
            }
            break;
         default:
            break;
         }
      }
         
      /// <summary>
      /// Sell animals from the animal group and store the sale results
      /// </summary>
      /// <param name="groupNum">The animal group number (1->n)</param>
      /// <param name="saleNum">The number of animals to sell</param>
      /// <returns>The number of stock sold</returns>
      public int sellAnimalGroup(int groupNum, int saleNum)
      {
         int groupIndex = groupNum - 1;                    // convert to 0 offset for C# arrays
         int tagIndex = stock.tag_no[groupIndex] - 1;      // convert to 0 offset for C# arrays
         int selling = Math.Min(saleNum, stock.number[groupIndex]);   // ensure no virtual flock negative number
      
         if (selling > 0)
         {
            sale_weight[tagIndex] = (number_sold[tagIndex] * sale_weight[tagIndex] + saleNum * stock.weight[groupIndex]) / (number_sold[tagIndex] + selling);
            sale_cond_score[tagIndex] = (number_sold[tagIndex] * sale_cond_score[tagIndex] + saleNum * stock.cond_score[groupIndex]) / (number_sold[tagIndex] + selling);
            number_sold[tagIndex] = number_sold[tagIndex] + selling;
      
            log(string.Format("{0}: Selling {1:d} animals from group {2:d}", today.ToShortDateString(), selling, groupNum));
                  
            stock.Sell(groupNum, selling);
         
            // record the sales income
            EarnType income = new EarnType();
            income.name = "lamb_sales";
            income.amount = selling;
            income.param1 = stock.weight[groupIndex];
            income.param2 = stock.cond_score[groupIndex];
            cashbook.Earn(income);
            
            // sales costs
            SpendType expense = new SpendType();
            expense.name = "transport";
            expense.amount = selling;
            cashbook.Spend(expense);
         }
      
         return selling;
      }

      private void log(string msg)
      {
         Console.WriteLine(msg);
      }
   }
```
      memo Scripts
        === Simulation management scripts ===

        1. Manage_stock
           This script is a general one that configures the purchase/replacement of new stock
           and the removal of aged animals.

        2. Grazing_crop
           This script is designed to move the animals onto the crop paddock for winter grazing
           or stubble grazing after harvest. It also returns animals to the normal feed paddock.

        3. Manage_supplement
           Use this script to specify the maintenance feeding and any production feeding.
           Production feeding can be turned off.

        4. Shearing
           Specify the shearing date for all the stock.

        5. Selling
           There are two selling policies here. Target and Drought.
           These policies will be applied within a sales period.
           You can select which selling policy to use. If you turn both off, it is possible
            to grow the animals out to cast for age selling.
    Stock
      initsection
        param_file =
        rand_seed = 9999
        only_plant2stock = false
        init genotypes: array=T
          element
            name = Suffolk
            dam_breed =
            sire_breed =
            generation = 0
            srw = 55  # kg
            conception = [0.22, 0.76]
            death_rate = 0.02  # /y
            ref_fleece_wt = 3.465  # kg
            max_fibre_diam = 26  # um
            fleece_yield = 0.7  # kg/kg
            peak_milk = 0  # kg
            wnr_death_rate = 0.02  # /y
        init paddock_list: array=T
          element
            name = PasturePaddock
            area = 100  # ha
            slope = 0  # deg
            forages = PasturePaddock.Ryegrass
            excretion = PasturePaddock.SurfaceOrganicMatter
            urine = PasturePaddock.soil nitrogen
          element
            name = WheatPaddock
            area = 100  # ha
            slope = 0  # deg
            forages = [WheatPaddock.wheat, WheatPaddock.SOMForStock]
            excretion = WheatPaddock.SurfaceOrganicMatter
            urine = WheatPaddock.soil nitrogen
          element
            name = Feedlot
            area = 10  # ha
            slope = 0  # deg
            excretion = Feedlot.SurfaceOrganicMatter
            urine = Feedlot.soil nitrogen
    memo stock_configuration
      ===  Configuring Stock for forages and nutrient cycling.  ===

      In APSIM it is necessary to specify the connections from Stock to the forage and soil components.
      Using the initialisation screen for Stock, the paddock_list values can be set.

      In this simulation there are three paddocks. Each of these can be described in the
      paddock_list.

      This Stock component has three paddocks in the array. The values for each paddock are:

      - name = the full name of the paddock component
      - area  = the area (ha) of the paddock
      - slope = the slope of the paddock (deg)
      - forages = array of forages found in the paddock.
      - excretion = the full name of the Surface Organic Matter component
      - urine = the full name of the Soil Nitrogen component

      When surface organic matter is to be available for grazing animals, a SOMForStock script
      from the AusFarm toolbox must be dropped into the paddock. This component is then another
      forage source. In this simulation the SOMForStock is used to allow the stock to consume some
      stubble material.

      Notes:
         1. Another property that must be set is the only_plant2stock. This must be set to False.
         2. The rand_seed value should be set to 0 for normal use. When it is set to 9999 the animal
         mortalities will be replicated between runs.

       ------------------------------------------------------------------------------------------
      The normal procedure for adding paddock items would be:

      1. Right click the paddock_list item and choose Add.
      2. Enter the name of the paddock and the area value.
      3. Add a forage item and enter the full name of the forage.
    Supplement
      initsection
        spoilage_time = 0  # d
        init stores: array=T
          element
            name = lupins
            stored = 0  # kg
            roughage = false
            dm_content = 0.88  # kg/kg
            dmd = 0.8
            me_content = 13.3  # MJ/kg
            cp_conc = 0.32  # kg/kg
            prot_dg = 0.75  # kg/kg
            p_conc = 0.0042  # kg/kg
            s_conc = 0.0026  # kg/kg
            ee_conc = 0.06  # kg/kg
            adip2cp = 0.03  # kg/kg
            ash_alk = 0.4  # mol/kg
            max_passage = 0  # kg/kg
          element
            name = Wheat
            stored = 0  # kg
            roughage = false
            dm_content = 0.89  # kg/kg
            dmd = 0.9
            me_content = 13.8  # MJ/kg
            cp_conc = 0.14  # kg/kg
            prot_dg = 0.92  # kg/kg
            p_conc = 0.0038  # kg/kg
            s_conc = 0.0014  # kg/kg
            ee_conc = 0.02  # kg/kg
            adip2cp = 0.02  # kg/kg
            ash_alk = 0.18  # mol/kg
            max_passage = 0.2  # kg/kg
    TextOutput Daily
      initsection
        filename = Wether in pasture crop rotation_Daily.out
        interval = 1
        intervalunit = day
        summary_file =
        apsim_format = true
        title = ApsimVersion = 7.10 Title = Wether in pasture crop rotation_Daily.out
        outputfrequency = post
        dateformat = dd/MM/yyyy
        init outputs: array=T
          element
            varname = number_all
            alias = number_all
            aggreg =
            decplaces = 0
          element
            varname = Deaths_all
            alias = Deaths_all
            aggreg = total
            decplaces = 0
          element
            varname = wt_change_all
            alias = wt_change_all
            aggreg =
            decplaces = 3
          element
            varname = weight_all
            alias = weight_all
            aggreg =
            decplaces = 2
          element
            varname = cond_score_all
            alias = cond_score_all
            aggreg =
            decplaces = 2
          element
            varname = past_intake_all:weight
            alias = Past_intake_(kg)
            aggreg =
            decplaces = 3
          element
            varname = supp_intake_all:weight
            alias = Supp_intake_(kg)
            aggreg =
            decplaces = 3
          element
            varname = suppFedKg
            alias = Supp_fed
            aggreg =
            decplaces = 2
          element
            varname = fleece_wt_all
            alias = fleece_wt_all
            aggreg =
            decplaces = 2
          element
            varname = fibre_diam_all
            alias = fibre_diam_all
            aggreg =
            decplaces = 2
          element
            varname = supplement.stores[2]:stored
            alias = Stored
            aggreg =
            decplaces = 2
          element
            varname = number
            alias = number
            aggreg =
            decplaces = 0
          element
            varname = age
            alias = age
            aggreg =
            decplaces = 0
          element
            varname = paddock
            alias = paddock
            aggreg =
            decplaces = 0
    TextOutput Monthly
      initsection
        filename = Wether in pasture crop rotation_Monthly.out
        interval = 1
        intervalunit = month
        summary_file =
        apsim_format = true
        title = ApsimVersion = 7.10 Title = Wether in pasture crop rotation_Monthly.out
        outputfrequency = post
        dateformat = dd/MM/yyyy
        init outputs: array=T
          element
            varname = number_all
            alias = number_all
            aggreg =
            decplaces = 0
          element
            varname = Deaths_all
            alias = Deaths_total
            aggreg = total
            decplaces = 0
          element
            varname = stock_sale_number
            alias = Sale_number
            aggreg = max
            decplaces = 0
          element
            varname = stock_sale_weight
            alias = Sale_weight
            aggreg = max
            decplaces = 2
          element
            varname = stock_sale_cond_score
            alias = Sale_CS
            aggreg = max
            decplaces = 1
          element
            varname = stock_buy_number
            alias = Purchased
            aggreg = max
            decplaces = 0
          element
            varname = stock_buy_weight
            alias = Purchased_weight
            aggreg = max
            decplaces = 2
          element
            varname = stock_buy_cond_score
            alias = Purchased_CS
            aggreg = max
            decplaces = 1
          element
            varname = cull_sale_number
            alias = Culls_sold
            aggreg = max
            decplaces = 0
          element
            varname = cull_sale_weight
            alias = Culls_weight
            aggreg = max
            decplaces = 2
          element
            varname = cull_sale_cond_score
            alias = Cull_CS
            aggreg = max
            decplaces = 1
          element
            varname = NumberShorn
            alias = Number_shorn
            aggreg = max
            decplaces = 0
          element
            varname = ShornFleece
            alias = ShornFleece_(greasy_kg)
            aggreg = max
            decplaces = 2
          element
            varname = ShornFibre
            alias = ShornFibre(micron)
            aggreg = max
            decplaces = 1
    Cashbook: description=Gross Margin summary
      initsection
        reset_day = 1
        reset_month = 7
        report_period = 12
        init_cash = 0
        discount = 0
        currency = AUD
        init income: array=T
          element
            name = wether_sales
            full_name = Cast for age animal sales
            units = No.
            price = weight * wether_price * 0.01 *  Dressing[cs] + skin_price
            params = [weight, cs]
          element
            name = lamb_sales
            full_name = Lamb sales
            units = No.
            price = weight * lamb_price * 0.01*  Dressing[cs] + skin_price
            params = [weight, cs]
          element
            name = wool_sales
            full_name = Wool sales
            units = kg CFW
            price = 0.01 * Fleece[microns]
            params = microns
          element
            name = wheat_sales
            full_name = Wheat sales
            units = tonnes
            price = wheat_price
        init expenses: array=T
          element
            name = replacements
            full_name = Replacements
            units = No.
            price = 90.0
            params = [weight, cs]
          element
            name = shearing
            full_name = Shearing
            units = No.
            price = rate
            params = rate
          element
            name = transport
            full_name = Transport cost
            units = No.
            price = 4.0
        init constants: array=T
          element
            name = wether_price
            value = 400
            description =
          element
            name = lamb_price
            value = 600
            description =
          element
            name = skin_price
            value = 10
            description =
          element
            name = wheat_price
            value = 350
            description =
        init grids: array=T
          element
            name = Fleece
            col_limits = [19, 21, 23, 25, 27, 28]
            field values: array=T
              element: kind=double; array=T; val=[2200, 1900, 1723, 1183, 1046, 800, 550]
          element
            name = Dressing
            col_limits = [1, 2, 3, 4, 5]
            field values: array=T
              element: kind=double; array=T; val=[0.4, 0.41, 0.43, 0.45, 0.47, 0.49]
    memo Cashbook notes
      This cash book gross margin summary can be found in an external text file (Wether in pasture crop rotation_cashbook.txt) that is tab delimited.
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