folder Simulations: version=36; creator=Apsim 7.8-r3960
  simulation agpasturePaddock
    clock
      start_date = 1/07/1980  # Enter the start date of the simulation
      end_date = 30/06/1981  # Enter the end date of the simulation
    metfile met: filename=%apsim%\Examples\MetFiles\lincoln.met
    summaryfile
    area pad
      manager2 Grazing at regular intervals
        # Setting up a harvesting rotation for AgPasture
        CutPasture_StartDate = 01/01/1900  # Enter the date to start the rotation (dd/mm/yyyy)
        CutPasture_EndDate = 31/12/2100  # Enter the date to end the rotation (dd/mm/yyyy)
        Interval2Cut = 21  # Enter the interval between harvests (days)
        RemoveAmountType = Setting residual DM amount  # Choose what amount is being defined
        HerbageAmount = 1000  # Enter the herbage amount (kgDM/ha)
        # Settings for dung/urine
        FracN2Remove = 0.15  # Enter fraction of N that is removed from the field (0-1)
        UrineDepth = 300  # Enter the depth down to which urine will apllied (mm)
        FracN2Dung = 0.4  # Enter the proportion of N returned in dung (0-1)
```csharp
using System;
using ModelFramework;

//This manager sets up a cut/grazing rotation for AgPasture. It also handles the return of harvested material, as dung and urine.
// The rotation is valid between two given dates only, these don't need to be bounded to the simulation dates (start date is set to simulation start date, if prior to it).
// Harvest is done on above ground standing DM, i.e. leaves plus stem/sheath (dead and green).
// This manager allows harvest on fixed intervals:
//   Cut is allowed at given days only (set by start rotation date and then at regular intervals);
//   Cut happens if amount to remove is set and/or if existing DM is greater than ResidualDM;
//   Cut is only allowed on the date selected, 'Can_Cut' is set to "no" at the end of the day;
//
// Removal of DM (carbon) is based on digestibility, while for N a fraction is removed
// The DM and N to be returned as dung are added to surfaceOM 'RuminantDung_PastureFed'.
// The partition of N between urine and dung is set by the user.
// N urine is added as urea fertiliser, distributed from surface down to  a given depth. The proportion per layer decreases linearly with depth.

//-->  Last uptaded in: 05/Oct/2015 ..................

public class Script
{
   //Parameter variables:
   [Param] private DateTime CutPasture_StartDate;  //Date to start the cutting rotation
   [Param] private DateTime CutPasture_EndDate;    //Date to end cutting rotation
   [Param] private int Interval2Cut;               //The interval between cuts, used if cut trigger type is by interval (days), (values will be interpolated using DoY)
   [Param] private string RemoveAmountType;        //The type of amount being defined (Setting DM amount to remove,Setting residual DM amount)
   [Param] private double HerbageAmount ;          //The DM amount (kg/ha, DM above ground)

   [Param] private double FracN2Remove;            //Fraction of the N in the material cut that is removed from simulation (0-1)
   [Param] private double UrineDepth;              //The depth down to which urine will be applied (mm), proportion applied per layer decrease with depth
   [Param] private double FracN2Dung;              //The fraction of returned N that goes into dung, if return is as dung & urine (0-1)

   //Links and events:
   [Link] private Component MySelf;
   [Link] private AgPasture MyAgPasture;
   [Link] private Fertiliser MyFertiliser;
   [Link] private SurfaceOM MySurfaceOM;

   //Variables read from other modules
   [Input] private DateTime Today;     //Today's date
   [Input] private double[] dlayer;    //Today's day of year
   private double LowerThreshold;      //Minimum residual DM
   private double MinimumFraction;     //Minimum fraction of given amount that still triggers a harvest
   private int CutInterval;
   private double ResidualDM;
   private double AmountWanted;

   //Outputs
   [Output][Units("")] public string Can_Cut;                  //Whether today is a harvesting day
   [Output][Units("")] public string Has_Cut;                  //Whether today's harvest was done
   [Output][Units("kg/ha")] public double harvested_dm;        //Pasture DM harvested today (kg/ha)
   [Output][Units("kgN/ha")] public double harvested_n;        //N harvested today
   [Output][Units("kg/ha")] public double removed_dm;          //DM removed from the paddock
   [Output][Units("kgN/ha")] public double removed_n;          //N removed from the paddock
   [Output][Units("kgN/ha")] public double returned_dm;        //DM returned to the paddock
   [Output][Units("kgN/ha")] public double returned_n;         //N returned to the paddock
   [Output][Units("kgN/ha")] public double NReturnedInDung;    //N returned as dung (SurfaceOM)
   [Output][Units("kgN/ha")] public double NReturnedInUrine;   //N returned as urine (urea)
   [Output][Units("kg/ha/day")] public double GrowthRateCalc;  //Average growth rate for this cut
   [Output][Units("days")] public int DaysAfterCut;            //Number of days after last harvest
   [Output][Units("kg/ha")] public double PreHarvestDM;        //Total standing DM (Leaf + Stem/Sheath) before cut
   [Output][Units("kg/ha")] public double PostHarvestDM;       //Total standing DM (Leaf + Stem/Sheath) after cut

   //Internal variables
   private double FracDM2Remove;       //The fraction of DM to be removed from the simulation (0-1)
   private bool CutIsAllowed;          //Whether cutting are allowed
   private double[] FracLayer;         //The fraction of urine to be applied in each layer

   [EventHandler()]
   public void OnInitialised()
   {
      //Reset variables
      CutInterval = Interval2Cut;
      DaysAfterCut = CutInterval - 1;
      CutIsAllowed = false;
      Can_Cut = "no";
      Has_Cut = "no";
      LowerThreshold = 500;   // assume a minimum of 500kgDM/ha
      MinimumFraction = 0.5;  // assume that at least 50% of required amount should be available to trigger a harvest

      //Check the fractions of DM ad N to remove
      FracDM2Remove = MyAgPasture.HarvestedDigestibility;
      if ((FracN2Remove < 0.0) || (FracN2Remove > 1.0))
      {
         throw new Exception("Fraction of N to remove is out of bounds");
      }
      if ((FracN2Dung < 0.0) || (FracN2Dung > 1.0))
      {
         throw new Exception("Proportion of N to return as dung is out of bounds");
      }

      //compute the fraction of urine to be aplied per layer
      FracLayer = new double[dlayer.Length];
      double DepthFromSurface = 0.0;
      double dltZ = 0.0;
      for (int z = 0; z < dlayer.Length;z++)
      {
         if(DepthFromSurface < UrineDepth)
         {
            dltZ = Math.Min(dlayer[z], UrineDepth - DepthFromSurface);
            FracLayer[z] = 2 * dltZ * (1 - ((DepthFromSurface + 0.5 * dltZ) / UrineDepth)) / UrineDepth;
         }
         DepthFromSurface += dlayer[z];
      }

      //write messages on summary file
      string myMessage1 = ", every " + CutInterval.ToString() + " days";
      string myMessage2 = "     remove ";
      if (RemoveAmountType.Contains("residual"))
      {
         ResidualDM = HerbageAmount;
         AmountWanted = 0.0;
         myMessage2 += "all biomass down to residual DM (" + ResidualDM.ToString("#0") + " kgDM/ha)";
      }
      else if (RemoveAmountType.Contains("remove"))
      {
         ResidualDM = LowerThreshold;
         AmountWanted = HerbageAmount;
         myMessage2 += "a given amount (" + AmountWanted.ToString("#0") + " kgDM/ha)";
      }
      Console.WriteLine("");
      Console.WriteLine("   Harvest rotation for AgPasture initialised");
      Console.WriteLine("     rotation rule valid between " + CutPasture_StartDate.ToString("dd/MM/yyyy") + " and " + CutPasture_EndDate.ToString("dd/MM/yyyy"));
      Console.WriteLine("     rotation type: harvest at regular intervals" + myMessage1);
      Console.WriteLine(myMessage2);
      Console.WriteLine("     fraction of harvested DM to return as dung: based on herbage digestibility");
      myMessage2 = ((1.0 - FracN2Remove) * 100).ToString("#0.0") + "% (" + ((1.0 - FracN2Dung) * 100).ToString("#0.0") + "% of it as urine)";
      Console.WriteLine("     fraction of harvested N to return as dung & urine: " + myMessage2);
      Console.WriteLine("     proportion of urine N to be added in each layer:");
      myMessage1 = FracLayer[0].ToString("0.000");
      for (int z = 1;z < dlayer.Length;z++)
      {
         myMessage1 += ", " + FracLayer[z].ToString("0.000");
      }
      Console.WriteLine("      " + myMessage1);
      Console.WriteLine("");
   }

   [EventHandler()]
   public void OnPrepare()
   {
      double Amount2Harvest = 0.0;
      double AmountHarvestable = 0.0;

      //Reset variables:
      Has_Cut = "no";
      harvested_dm = 0.0;
      harvested_n = 0.0;
      removed_dm = 0.0;
      removed_n = 0.0;
      returned_dm = 0.0;
      returned_n = 0.0;
      GrowthRateCalc = 0.0;
      NReturnedInDung = 0.0;
      NReturnedInUrine = 0.0;
      DaysAfterCut = DaysAfterCut + 1;
      CutInterval = Interval2Cut;
      PreHarvestDM = MyAgPasture.StandingHerbageWt;
      if (RemoveAmountType.Contains("residual"))
      {
         ResidualDM = HerbageAmount;
         AmountWanted = Math.Max(0.0, PreHarvestDM - ResidualDM);
      }
      else if (RemoveAmountType.Contains("remove"))
      {
         ResidualDM = LowerThreshold;
         AmountWanted = HerbageAmount;
      }

      //Decide whether cut is allowed:
      if ((Today.Date >= CutPasture_StartDate.Date) && (Today.Date <= CutPasture_EndDate.Date))
      {
         if (DaysAfterCut >= CutInterval)
         {
            CutIsAllowed = true;
            Can_Cut = "yes";
         }
         else
         {
            CutIsAllowed = false;
            Can_Cut = "no";
            //always reset CutIsAllowed
         }

         //Decide how much to cut:
         if (CutIsAllowed)
         {
            AmountHarvestable = Math.Max(0.0, PreHarvestDM - ResidualDM);
            if (AmountHarvestable >= AmountWanted * MinimumFraction)
               Amount2Harvest = Math.Min(AmountWanted, AmountHarvestable);
            else
               Amount2Harvest = AmountWanted;

            //Decide whether cut actually happens:
            if ((AmountHarvestable >= Amount2Harvest))
            {
               CutPasture(Amount2Harvest);
               HandleResidues();
               //reset cut variables
               DaysAfterCut = 0;
               Has_Cut = "yes";
               GrowthRateCalc = harvested_dm / DaysAfterCut;
               PostHarvestDM = MyAgPasture.StandingHerbageWt;
            }
         }
         else
         {
            Amount2Harvest = 0.0;
            AmountHarvestable = 0.0;
         }
      }
   }


   private void CutPasture(double Amount2Harvest)
   {
      // -- Cutting pasture ----------------------------------------------------------------------------

      GrazeType CutData = new GrazeType();
      CutData.sender = MySelf.Name;
      CutData.amount = (float) Amount2Harvest;
      CutData.type = "SetRemoveAmount";
      MyAgPasture.Graze(CutData);
      harvested_dm = MyAgPasture.HarvestedWt;
      harvested_n = MyAgPasture.HarvestedN;

      //Let user know (via summary) that a cut was made
      Console.WriteLine(Today.ToString("dd MMMM yyyy") + " (Day of year=" + Today.DayOfYear.ToString() + "), " + MySelf.Name + ":");
      Console.WriteLine("     Removing " + harvested_dm.ToString("#0") + "kg DM/ha, with " + harvested_n.ToString("#0.0") + "kg N/ha");
   }


   private void HandleResidues()
   {
      // -- Residue management -------------------------------------------------------------------------

      FracDM2Remove = MyAgPasture.HarvestedDigestibility;
      removed_dm = harvested_dm * FracDM2Remove;
      removed_n = harvested_n * FracN2Remove;
      returned_dm = harvested_dm - removed_dm;
      returned_n = harvested_n - removed_n;

      if (returned_dm < 0.0)
      {
         throw new Exception("Return_DM value is negative");
      }
      if (returned_n < 0.0)
      {
         throw new Exception("Return_N value is negative");
      }

      NReturnedInDung = returned_n * FracN2Dung;
      NReturnedInUrine = Math.Max(0.0, returned_n - (returned_n * FracN2Dung));

      if (NReturnedInDung > returned_n)
      {
         throw new Exception("Amount of N to return as dung is larger than total return, check proportion or CN ratio");
      }

      if ((returned_dm > 0.0) || (NReturnedInDung > 0.0))
      {
         BiomassRemovedType SOMData = new BiomassRemovedType();
         SOMData.crop_type = "RuminantDung_PastureFed";
         SOMData.dm_type = new string[] { SOMData.crop_type };
         SOMData.dlt_crop_dm = new float[] { (float) returned_dm };
         SOMData.dlt_dm_n = new float[] { (float) NReturnedInDung };
         SOMData.fraction_to_residue = new float[] { 1.0F };
         MySurfaceOM.BiomassRemoved(SOMData);
      }

      if (NReturnedInUrine > 0.0)
      {
         FertiliserApplicationType UrineData = new FertiliserApplicationType();
         UrineData.Amount = (float) NReturnedInUrine;
         UrineData.Depth = 10;   // mm
         UrineData.Type = "urea_n";
         MyFertiliser.Apply(UrineData);
      }
   }
}
```
      micromet
        soilalbedo = 0.23
        a_interception = 0
        b_interception = 0
        c_interception = 0
        d_interception = 0
      fertiliser
      irrigation
        automatic_irrigation = on
        asw_depth = 600  # Depth to which ASW is calculated. (mm)
        crit_fr_asw = 0.5  # Fraction of ASW below which irrigation is applied (0-1.0)
        irrigation_efficiency = 1  # Efficiency of the irrigation. (0-1.0)
        irrigation_allocation = off  # Allocation limits
        allocation = 0  # Allocation in mm
        default_no3_conc = 0  # Nitrate concentration (ppm N)
        default_nh4_conc = 0  # Ammonium concentration (ppm N)
        default_cl_conc = 0  # Chloride concentration (ppm Cl)
      surfaceom SurfaceOrganicMatter
        PoolName = AgPasture  # Organic Matter pool name
        type = grass  # Organic Matter type
        mass = 1000  # Initial surface residue (kg/ha)
        cnr = 15  # C:N ratio of initial residue
        standing_fraction = 0  # Fraction of residue standing
      Soil SoilLismore: SoilType=0; Site=Winchmore; NearestTown=Winchmore; Region=Canterbury; State=New Zealand; NaturalVegetation=0; ApsoilNumber=0; Latitude=0; Longitude=0; LocationAccuracy=0; YearOfSampling=0; DataSource=published soil profile description (as an example)
        InitialWater Initial water: FractionFull=0.99; PercentMethod=FilledFromTop
        Water
          Thickness  BD    AirDry  LL15  DUL   SAT
          100        1.25  0.06    0.14  0.32  0.45
          200        1.31  0.06    0.14  0.32  0.45
          300        1.23  0.03    0.03  0.07  0.15
          300        1.24  0.03    0.03  0.05  0.08
          300        1.25  0.03    0.03  0.05  0.08
          300        1.26  0.03    0.03  0.05  0.08
          300        1.29  0.03    0.03  0.05  0.08
          SoilCrop ryegrass_clover: LL=[0.14, 0.14, 0.03, 0.03, 0.03, 0.03, 0.03]; KL=[0.1, 0.1, 0.1, 0.02, 0, 0, 0]; XF=[1, 1, 1, 1, 0, 0, 0]
          SoilCrop agpasture: LL=[0.14, 0.14, 0.03, 0.03, 0.03, 0.03, 0.03]; KL=[0.1, 0.1, 0.1, 0.02, 0, 0, 0]; XF=[1, 1, 1, 1, 0, 0, 0]
          SoilCrop ryegrass: LL=[0.14, 0.14, 0.03, 0.03, 0.03, 0.03, 0.03]; KL=[0.1, 0.1, 0.1, 0.02, 0, 0, 0]; XF=[1, 1, 1, 1, 0, 0, 0]
          SoilCrop clover: LL=[0.14, 0.14, 0.03, 0.03, 0.03, 0.03, 0.03]; KL=[0.1, 0.1, 0.1, 0.02, 0, 0, 0]; XF=[1, 1, 1, 1, 0, 0, 0]
          SoilCrop maize: LL=[0.14, 0.14, 0.03, 0.02, 0.02, 0.02, 0.02]; KL=[0.06, 0.06, 0.06, 0.06, 0.06, 0.06, 0.06]; XF=[1, 1, 1, 1, 1, 1, 1]
          SoilCrop cotton: LL=[0.14, 0.14, 0.03, 0.02, 0.02, 0.02, 0.02]; KL=[0.1, 0.1, 0.1, 0.1, 0.09, 0.07, 0.05]; XF=[1, 1, 1, 1, 1, 1, 1]
          SoilCrop sorghum: LL=[0.14, 0.14, 0.03, 0.02, 0.02, 0.02, 0.02]; KL=[0.07, 0.07, 0.07, 0.05, 0.05, 0.04, 0.03]; XF=[1, 1, 1, 1, 1, 1, 0.9]
          SoilCrop slurp: LL=[0.14, 0.14, 0.03, 0.02, 0.02, 0.02, 0.02]; KL=[0.06, 0.06, 0.06, 0.06, 0.06, 0.06, 0.06]; XF=[1, 1, 1, 1, 1, 1, 1]
        SoilWater: SummerCona=3.5; SummerU=6; SummerDate=1-Nov; WinterCona=2; WinterU=2; WinterDate=1-apr; DiffusConst=88; DiffusSlope=35; Salb=0.13; CN2Bare=73; CNRed=20; CNCov=0.8; Thickness=[100, 200, 300, 300, 300, 300, 300]; SWCON=[0.4, 0.5, 0.6, 0.6, 0.8, 0.8, 0.8]
        SoilOrganicMatter: RootCN=40; RootWt=800; SoilCN=11.3; EnrACoeff=7.4; EnrBCoeff=0.2
          Thickness  OC   FBiom  FInert
          100        4    0.04   0.3
          200        2.5  0.02   0.5
          300        0.5  0.02   0.6
          300        0.1  0.01   0.8
          300        0.1  0.01   1
          300        0    0      1
          300        0    0      1
        Analysis: Thickness=[100, 200, 300, 300, 300, 300, 300]; PH=[5.9, 5.9, 5.9, 5.9, 5.9, 5.9, 5.9]
        Sample Initial nitrogen
          Thickness  NO3      NH4
          100        7.61905  0.132451
          200        7.27008  0.132451
          300        3.87147  0.132451
          300        3.84025  0.132451
          300        3.80952  0.132451
          300        3.77929  0.132451
          300        3.6914   0.132451
      AgPasture
        # Initial values for each species to be simulated
        SpeciesToSimulate = Ryegrass    WhiteClover  # Name of the species to be simulated
        InitialShootDM = 1500   500  # Initial above ground dry matter weight (kgDM/ha)
        InitialRootDM = 450     150  # Initial root dry matter weight (kgDM/ha)
        InitialRootDepth = 750     350  # Initial rooting depth (mm)
        WaterUptakeSource = calc  # Water uptake done by AgPasture (calc) or by apsim?
      outputfile: filename=agpasturePaddock pad.out; title=agpasturePaddock pad
        variables
          variable:
            dd/mmm/yyyy as Date
            AboveGroundLiveWt
            HerbageGrowthWt
            HarvestedWt
            SpeciesStandingLiveHerbageWt
            LAITotal
            LAIGreen
            LAIDead
            SpeciesProportionStanding(2) as CloverContent
            surfaceom_wt
        events Reporting Frequency: event=end_day
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