folder Simulations (disabled): version=28
  simulation FarmSim-DDRules-2
    manager2 FarmSimOptions
      # FARMSIM
      UI_FarmType = SheepAndBeef  # Choose the farm type
      # Soil type
      UI_SoilType = Medium  # Choose the soil type in the farm
      # Fertiliser parameter
      UI_FertLevel = High  # Choose the fertiliser level
      # Dairy farm specific parameters
      UI_StockRate = 5  # Choose the cow stocking rate (2-5cows /ha)
      UI_SuppType = GrainOrConcentrate  # Choose the type of supplement
      # Sheep and beef farm specific parameter
      UI_BeefPercentage = 100  # Choose the percentage of beef stock units on the farm (0, 10, 20, 50 or 100%)
      # Irrigation parameters
      UI_IrrigSeason = Long  # Choose season length - None, Short (Oct-Mar), or Long (Aug-Apr)?
      UI_IrrigAmount_type = Scheduled  # How is the irrigation amount determined?
      UI_IrrigAmount_FixedAmount = 30  # If fixed, what is the amount applied at each irrigation?
      UI_IrrigAmount_RefillPercentage = 95  # If sheduled, what is the percentage of PAW after irrigation (80-100%)?
      UI_IrrigInterval_type = Scheduled  # How the irrigation interval is determined?
      UI_IrrigInterval_FixedInterval = 5  # If fixed, what is the interval between irrigations (days)?
      UI_IrrigInterval_TriggerPercentage = 75  # If sheduled, at what percentage of PAW does irrigation start (50-75%)?
```vb
Imports System
Imports ModelFramework

Public Class Script
   Inherits Instance

   <Param()><Output()> Public UI_FarmType As String
   <Param()><Output()> Public UI_SoilType As String
   <Param()><Output()> Public UI_FertLevel As String
   <Param()><Output()> Public UI_StockRate As Single
   <Param()><Output()> Public UI_SuppType As String
   <Param()><Output()> Public UI_BeefPercentage As Single
   
   <Param()><Output()> Public UI_IrrigSeason  As String
   <Param()><Output()> Public UI_IrrigAmount_type As String
   <Param()><Output()> Public UI_IrrigAmount_FixedAmount As Single
   <Param()><Output()> Public UI_IrrigAmount_RefillPercentage As Single
   <Param()><Output()> Public UI_IrrigInterval_type As String
   <Param()><Output()> Public UI_IrrigInterval_FixedInterval As Single
   <Param()><Output()> Public UI_IrrigInterval_TriggerPercentage As Single


   '<EventHandler()> Public Sub OnInit2()

     

   'End Sub
   
End Class
```
    clock
      start_date = 1/07/1980  # Enter the start date of the simulation
      end_date = 30/06/1981  # Enter the end date of the simulation
    metfile met: filename=%apsim%_dev\data\MetFiles\Other\WinchmoreMet.met
    summaryfile
    DDRules
    outputfile DDRules Outputs: filename=FarmSim-DDRules-2 DDRules Outputs.out; title=FarmSim-DDRules-2 DDRules Outputs
      variables
        variables: dd/mm/yyyy as Date, DM_Eaten, DM_Eaten_Pasture, DM_Eaten_Supplement, SilageCut, DM_Eaten_Cow, DM_Eaten_Pasture_Cow, DM_Eaten_Supplement_Cow, BaseStockingRate
      events Reporting Frequency: event=Daily
    area pad
      AgPasture ryegrass_clover
        Nspecies = 2  # Number of species
        thisspeciesName = ryegrass_clover  # Crop name shown as on the simulation tree
        speciesName = ryegrass whiteclover  # Species names
        micrometType = grass grass  # crop type for MicroMet
        isAnnual = 0 0  # Annual species? no=0, yes=1
        isLegume = 0 1  # Legume species? no=0, yes=1
        photoPath = 3 3  # C3 or C4 species? C3=3, C4=4
        rootDepth = 900  300
        growthTmin = 3 3  # Minimum temperature for growth
        growthTmax = 32 32  # Maximum temperature for growth
        growthTopt = 20 20  # Optimum temperature for growth
        growthTq = 2 2  # Curvture of growth response to temperature
        massFluxTmin = 2 2  # Minimum temperature for mass flux
        massFluxTopt = 20 20  # Optimum temperature for mass flux
        massFluxW0 = 2 2  # Scale factor for response of mass flux to soil moisture
        massFluxWopt = 0.5 0.5  # Optimum soil moisture for mass flux
        heatOnsetT = 28 28  # Heat effects- Onset temperature
        heatFullT = 35 35  # Heat effects- Full temperature
        heatSumT = 30 30  # Heat effects- Temperature sum for recovery
        coldOnsetT = 0 0  # Cold effects- Onset temperature
        coldFullT = -3 -3  # Cold effects- Full temperature
        coldSumT = 20 20  # Cold effects- Temperature sum for recovery
        Pm = 1 1  # Reference CO2 assimilation rate (mg CO2/m2.s)
        maintRespiration = 3 3  # Maintenance respiration coefficient (%)
        growthEfficiency = 0.75 0.75
        SpecificLeafArea = 20 20
        lightExtCoeff = 0.5 0.8  # Light extinction coefficient
        stockParameter = 0.05 0.05  # Stock influence parameter
        maxRootFraction = 0.25 0.25  # Maximum biomass fraction allocated to root
        leafRate = 3 3  # Reference leaf appearance rate without stress
        fLeaf = 0.7 0.56  # Reference growth partition to leaves
        fStolon = 0 0.2  # Reference growth partition to stolon
        digestLive = 0.6 0.6  # Digestibility of live plant material
        digestDead = 0.2 0.2  # Digestibility of dead plant material
        dmshoot = 1500 350  # Initial shoot dry matter (kg/ha)
        dmlitter = 250 50  # Initial litter dry matter (kg/ha)
        dmgreenmin = 500 80  # Minimum green dry matter (kg/ha)
        NconcOptimum_leaves = 4 4.5  # N concentration - leaf optimum
        NconcMaximum_leaves = 5 5.5  # N concentration - leaf luxary
        NconcMinimum_leaves = 1.2 2.0  # N concentration - leaf scenescent
        RelativeNconc_Stems = 0.5 0.5  # Stem N concentration as fraction of leaf N concentration
        RelativeNconc_Stolons = 0 0.5  # Stolon N concentration as fraction of leaf N concentration
        RelativeNconc_Roots = 0.5 0.5  # Root N concentration as fraction of leaf N concentration
        NMinFix = 0 0.2  # Minimum N fixation (when soil N is sufficient)
        NMaxFix = 0 0.6  # Maximum N fixation (when soil N is unavailable)
        CO2PmaxScale = 700 700  # CO2 - Scale factor for CO2 effect on photosynthesis
        CO2NScale = 600 600  # CO2 - Scale factor for CO2 effects on plant N concentration
        CO2NMin = 0.7 0.7  # CO2 - Minimum fraction that plant N concentration may reduce to uder elevated CO2
        CO2NCurvature = 2 2  # CO2 - Curvature factor of CO2 effect on plant N concentration
        Frgr = 1 1  # Relative growth factor
        rlvp = 1 0.2 0.1 0.05 0 0 0 0  # Root distribution of swards (relative to each soil layer)
      soil SoilLismore: Site=Winchmore; Region=Canterbury; State=New Zealand; Longitude=0
        SoilType = 0  # Classification
        NearestTown = Winchmore
        NaturalVegetation = 0
        ApsoilNumber = 0
        Latitude = 0  # Latitude (WGS84)
        LocationAccuracy = 0
        DataSource = published soil profile description (as an example)
        Comment = Soil naming structure: \State\Region\Classification-Local Name (Site/district and locator number)  # Comments
        InitWater Initial water
          PercentMethod: Percent=0.99; Distributed=Filled from top
        Water
          Layer:
            Thickness (mm)  BD (g/cc)  AirDry (mm/mm)  LL15 (mm/mm)  DUL (mm/mm)  SAT (mm/mm)
            100             1.25       0.06            0.14          0.32         0.45
            200             1.31       0.06            0.14          0.32         0.45
            300             1.23       0.03            0.03          0.07         0.15
            300             1.24       0.03            0.03          0.05         0.08
            300             1.25       0.03            0.03          0.05         0.08
            300             1.26       0.03            0.03          0.05         0.08
            300             1.29       0.03            0.03          0.05         0.08
          SoilCrop ryegrass_clover
            Layer:
              Thickness (mm)  LL (mm/mm)  KL (/day)  XF (0-1)
              100             0.14        0.1        1
              200             0.14        0.1        1
              300             0.03        0.1        1
              300             0.03        0.02       1
              300             0.03        0          0
              300             0.03        0          0
              300             0.03        0          0
          SoilCrop agpasture: same as FarmSim-DDRules-2.pad.SoilLismore.Water.ryegrass_clover
          SoilCrop ryegrass: same as FarmSim-DDRules-2.pad.SoilLismore.Water.ryegrass_clover
          SoilCrop clover: same as FarmSim-DDRules-2.pad.SoilLismore.Water.ryegrass_clover
          SoilCrop maize
            Layer:
              Thickness (mm)  LL (mm/mm)  KL (/day)  XF (0-1)
              100             0.14        0.06       1
              200             0.14        0.06       1
              300             0.03        0.06       1
              300             0.02        0.06       1
              300             0.02        0.06       1
              300             0.02        0.06       1
              300             0.02        0.06       1
          SoilCrop cotton
            Layer:
              Thickness (mm)  LL (mm/mm)  KL (/day)  XF (0-1)
              100             0.14        0.1        1
              200             0.14        0.1        1
              300             0.03        0.1        1
              300             0.02        0.1        1
              300             0.02        0.09       1
              300             0.02        0.07       1
              300             0.02        0.05       1
          SoilCrop sorghum
            Layer:
              Thickness (mm)  LL (mm/mm)  KL (/day)  XF (0-1)
              100             0.14        0.07       1
              200             0.14        0.07       1
              300             0.03        0.07       1
              300             0.02        0.05       1
              300             0.02        0.05       1
              300             0.02        0.04       1
              300             0.02        0.03       0.9
          SoilCrop slurp: same as FarmSim-DDRules-2.pad.SoilLismore.Water.maize
        SoilWat: SummerCona=3.5; SummerU=6; SummerDate=1-Nov; WinterCona=2; WinterU=2; WinterDate=1-apr; DiffusConst=88; DiffusSlope=35; Salb=0.13; CN2Bare=73; CNRed=20; CNCov=0.8
          Layer:
            Thickness (mm)  SWCON (0-1)
            100             0.4
            200             0.5
            300             0.6
            300             0.6
            300             0.8
            300             0.8
            300             0.8
        SoilOrganicMatter: RootCN=40; RootWT=800; SoilCN=11.3; EnrACoeff=7.4; EnrBCoeff=0.2
          Layer:
            Thickness (mm)  OC (Total %)  FBiom (0-1)  FInert (0-1)
            100             4             0.04         0.3
            200             2.5           0.02         0.5
            300             0.5           0.02         0.6
            300             0.1           0.01         0.8
            300             0.1           0.01         1
            300             0             0            1
            300             0             0            1
        Analysis
          Layer:
            Thickness (mm)  PH (1:5 water)
            100             5.9
            200             5.9
            300             5.9
            300             5.9
            300             5.9
            300             5.9
            300             5.9
        Sample Initial nitrogen
          Layer:
            Thickness (mm)  NO3 (ppm)  NH4 (ppm)
            100             7.61905    0.132451
            200             7.27008    0.132451
            300             3.87147    0.132451
            300             3.84025    0.132451
            300             3.80952    0.132451
            300             3.77929    0.132451
            300             3.6914     0.132451
      micromet
        soilalbedo = 0.23
        a_interception = 0
        b_interception = 0
        c_interception = 0
        d_interception = 0
      fertiliser
      surfaceom Surface Organic Matter
        PoolName = AgPasture  # Organic Matter pool name
        type = grass  # Organic Matter type
        mass = 1000  # Initial surface residue (kg/ha)
        cnr = 15  # C:N ratio of initial residue
        standing_fraction = 0  # Fraction of residue standing
      irrigation
        automatic_irrigation = on
        asw_depth = 600  # Depth to which ASW is calculated. (mm)
        crit_fr_asw = 0.5  # Fraction of ASW below which irrigation is applied (0-1.0)
        irrigation_efficiency = 1  # Efficiency of the irrigation. (0-1.0)
        irrigation_allocation = off  # Allocation limits
        allocation = 0  # Allocation in mm
        default_no3_conc = 0  # Nitrate concentration (ppm N)
        default_nh4_conc = 0  # Ammonium concentration (ppm N)
        default_cl_conc = 0  # Chloride concentration (ppm Cl)
      outputfile: filename=FarmSim-DDRules-2 pad.out; title=FarmSim-DDRules-2 pad
        variables
          variables: dd/mmm/yyyy as Date, AboveGroundLiveWt, HerbageGrowthWt, HarvestWt, SpeciesLiveWt, LAI_total, surfaceom_wt, LeafLiveWt, leafgreenwt
        events Reporting Frequency: event=end_day
    area pad1
      AgPasture ryegrass_clover: same as FarmSim-DDRules-2.pad.ryegrass_clover
      soil SoilLismore: same as FarmSim-DDRules-2.pad.SoilLismore
      micromet
        soilalbedo = 0.23
        a_interception = 0
        b_interception = 0
        c_interception = 0
        d_interception = 0
      fertiliser
      surfaceom Surface Organic Matter
        PoolName = AgPasture  # Organic Matter pool name
        type = grass  # Organic Matter type
        mass = 1000  # Initial surface residue (kg/ha)
        cnr = 15  # C:N ratio of initial residue
        standing_fraction = 0  # Fraction of residue standing
      irrigation: same as FarmSim-DDRules-2.pad.Irrigation
      outputfile: filename=FarmSim-DDRules-2 pad1.out; title=FarmSim-DDRules-2 pad1
        variables
          variables: dd/mmm/yyyy as Date, AboveGroundLiveWt, HerbageGrowthWt, HarvestWt, SpeciesLiveWt, LAI_total, surfaceom_wt, LeafLiveWt, leafgreenwt
        events Reporting Frequency: event=end_day
    area pad2
      AgPasture ryegrass_clover: same as FarmSim-DDRules-2.pad.ryegrass_clover
      soil SoilLismore: same as FarmSim-DDRules-2.pad.SoilLismore
      micromet
        soilalbedo = 0.23
        a_interception = 0
        b_interception = 0
        c_interception = 0
        d_interception = 0
      fertiliser
      surfaceom Surface Organic Matter
        PoolName = AgPasture  # Organic Matter pool name
        type = grass  # Organic Matter type
        mass = 1000  # Initial surface residue (kg/ha)
        cnr = 15  # C:N ratio of initial residue
        standing_fraction = 0  # Fraction of residue standing
      irrigation: same as FarmSim-DDRules-2.pad.Irrigation
      outputfile: filename=FarmSim-DDRules-2 pad2.out; title=FarmSim-DDRules-2 pad2
        variables
          variables: dd/mmm/yyyy as Date, AboveGroundLiveWt, HerbageGrowthWt, HarvestWt, SpeciesLiveWt, LAI_total, surfaceom_wt, LeafLiveWt, leafgreenwt
        events Reporting Frequency: event=end_day
    area pad3
      AgPasture ryegrass_clover: same as FarmSim-DDRules-2.pad.ryegrass_clover
      soil SoilLismore: same as FarmSim-DDRules-2.pad.SoilLismore
      micromet
        soilalbedo = 0.23
        a_interception = 0
        b_interception = 0
        c_interception = 0
        d_interception = 0
      fertiliser
      surfaceom Surface Organic Matter
        PoolName = AgPasture  # Organic Matter pool name
        type = grass  # Organic Matter type
        mass = 1000  # Initial surface residue (kg/ha)
        cnr = 15  # C:N ratio of initial residue
        standing_fraction = 0  # Fraction of residue standing
      irrigation: same as FarmSim-DDRules-2.pad.Irrigation
      outputfile: filename=FarmSim-DDRules-2 pad3.out; title=FarmSim-DDRules-2 pad3
        variables
          variables: dd/mmm/yyyy as Date, AboveGroundLiveWt, HerbageGrowthWt, HarvestWt, SpeciesLiveWt, LAI_total, surfaceom_wt, LeafLiveWt, leafgreenwt
        events Reporting Frequency: event=end_day
    area pad4
      AgPasture ryegrass_clover: same as FarmSim-DDRules-2.pad.ryegrass_clover
      soil SoilLismore: same as FarmSim-DDRules-2.pad.SoilLismore
      micromet
        soilalbedo = 0.23
        a_interception = 0
        b_interception = 0
        c_interception = 0
        d_interception = 0
      fertiliser
      surfaceom Surface Organic Matter
        PoolName = AgPasture  # Organic Matter pool name
        type = grass  # Organic Matter type
        mass = 1000  # Initial surface residue (kg/ha)
        cnr = 15  # C:N ratio of initial residue
        standing_fraction = 0  # Fraction of residue standing
      irrigation: same as FarmSim-DDRules-2.pad.Irrigation
      outputfile: filename=FarmSim-DDRules-2 pad4.out; title=FarmSim-DDRules-2 pad4
        variables
          variables: dd/mmm/yyyy as Date, AboveGroundLiveWt, HerbageGrowthWt, HarvestWt, SpeciesLiveWt, LAI_total, surfaceom_wt, LeafLiveWt, leafgreenwt
        events Reporting Frequency: event=end_day
  simulation FarmSim-DDRules-3
    manager2 FarmSimOptions
      # FARMSIM
      UI_FarmType = SheepAndBeef  # Choose the farm type
      # Soil type
      UI_SoilType = Medium  # Choose the soil type in the farm
      # Fertiliser parameter
      UI_FertLevel = High  # Choose the fertiliser level
      # Dairy farm specific parameters
      UI_StockRate = 3  # Choose the cow stocking rate (2-5cows /ha)
      UI_SuppType = GrainOrConcentrate  # Choose the type of supplement
      # Sheep and beef farm specific parameter
      UI_BeefPercentage = 100  # Choose the percentage of beef stock units on the farm (0, 10, 20, 50 or 100%)
      # Irrigation parameters
      UI_IrrigSeason = Long  # Choose season length - None, Short (Oct-Mar), or Long (Aug-Apr)?
      UI_IrrigAmount_type = Scheduled  # How is the irrigation amount determined?
      UI_IrrigAmount_FixedAmount = 30  # If fixed, what is the amount applied at each irrigation?
      UI_IrrigAmount_RefillPercentage = 95  # If sheduled, what is the percentage of PAW after irrigation (80-100%)?
      UI_IrrigInterval_type = Scheduled  # How the irrigation interval is determined?
      UI_IrrigInterval_FixedInterval = 5  # If fixed, what is the interval between irrigations (days)?
      UI_IrrigInterval_TriggerPercentage = 75  # If sheduled, at what percentage of PAW does irrigation start (50-75%)?
      script: same as in FarmSim-DDRules-2.FarmSimOptions
    clock
      start_date = 1/07/1980  # Enter the start date of the simulation
      end_date = 30/06/1981  # Enter the end date of the simulation
    metfile met: filename=%apsim%_dev\data\MetFiles\Other\WinchmoreMet.met
    summaryfile
    DDRules
    outputfile DDRules Outputs: filename=FarmSim-DDRules-3 DDRules Outputs.out; title=FarmSim-DDRules-3 DDRules Outputs
      variables
        variables: dd/mm/yyyy as Date, DM_Eaten, DM_Eaten_Pasture, DM_Eaten_Supplement, SilageCut, DM_Eaten_Cow, DM_Eaten_Pasture_Cow, DM_Eaten_Supplement_Cow, BaseStockingRate, localGR, localMG
      events Reporting Frequency: event=Daily
    area pad
      AgPasture ryegrass_clover: same as FarmSim-DDRules-2.pad.ryegrass_clover
      soil SoilLismore: same as FarmSim-DDRules-2.pad.SoilLismore
      micromet
        soilalbedo = 0.23
        a_interception = 0
        b_interception = 0
        c_interception = 0
        d_interception = 0
      fertiliser
      surfaceom Surface Organic Matter
        PoolName = AgPasture  # Organic Matter pool name
        type = grass  # Organic Matter type
        mass = 1000  # Initial surface residue (kg/ha)
        cnr = 15  # C:N ratio of initial residue
        standing_fraction = 0  # Fraction of residue standing
      irrigation: same as FarmSim-DDRules-2.pad.Irrigation
      outputfile: filename=FarmSim-DDRules-3 pad.out; title=FarmSim-DDRules-3 pad
        variables
          variables: dd/mmm/yyyy as Date, AboveGroundLiveWt, HerbageGrowthWt, HarvestWt, SpeciesLiveWt, LAI_total, surfaceom_wt, LeafLiveWt, leafgreenwt
        events Reporting Frequency: event=end_day
    area pad1
      AgPasture ryegrass_clover: same as FarmSim-DDRules-2.pad.ryegrass_clover
      soil SoilLismore: same as FarmSim-DDRules-2.pad.SoilLismore
      micromet
        soilalbedo = 0.23
        a_interception = 0
        b_interception = 0
        c_interception = 0
        d_interception = 0
      fertiliser
      surfaceom Surface Organic Matter
        PoolName = AgPasture  # Organic Matter pool name
        type = grass  # Organic Matter type
        mass = 1000  # Initial surface residue (kg/ha)
        cnr = 15  # C:N ratio of initial residue
        standing_fraction = 0  # Fraction of residue standing
      irrigation: same as FarmSim-DDRules-2.pad.Irrigation
      outputfile: filename=FarmSim-DDRules-3 pad1.out; title=FarmSim-DDRules-3 pad1
        variables
          variables: dd/mmm/yyyy as Date, AboveGroundLiveWt, HerbageGrowthWt, HarvestWt, SpeciesLiveWt, LAI_total, surfaceom_wt, LeafLiveWt, leafgreenwt
        events Reporting Frequency: event=end_day
    area pad2
      AgPasture ryegrass_clover: same as FarmSim-DDRules-2.pad.ryegrass_clover
      soil SoilLismore: same as FarmSim-DDRules-2.pad.SoilLismore
      micromet
        soilalbedo = 0.23
        a_interception = 0
        b_interception = 0
        c_interception = 0
        d_interception = 0
      fertiliser
      surfaceom Surface Organic Matter
        PoolName = AgPasture  # Organic Matter pool name
        type = grass  # Organic Matter type
        mass = 1000  # Initial surface residue (kg/ha)
        cnr = 15  # C:N ratio of initial residue
        standing_fraction = 0  # Fraction of residue standing
      irrigation: same as FarmSim-DDRules-2.pad.Irrigation
      outputfile: filename=FarmSim-DDRules-3 pad2.out; title=FarmSim-DDRules-3 pad2
        variables
          variables: dd/mmm/yyyy as Date, AboveGroundLiveWt, HerbageGrowthWt, HarvestWt, SpeciesLiveWt, LAI_total, surfaceom_wt, LeafLiveWt, leafgreenwt
        events Reporting Frequency: event=end_day
    area pad3
      AgPasture ryegrass_clover: same as FarmSim-DDRules-2.pad.ryegrass_clover
      soil SoilLismore: same as FarmSim-DDRules-2.pad.SoilLismore
      micromet
        soilalbedo = 0.23
        a_interception = 0
        b_interception = 0
        c_interception = 0
        d_interception = 0
      fertiliser
      surfaceom Surface Organic Matter
        PoolName = AgPasture  # Organic Matter pool name
        type = grass  # Organic Matter type
        mass = 1000  # Initial surface residue (kg/ha)
        cnr = 15  # C:N ratio of initial residue
        standing_fraction = 0  # Fraction of residue standing
      irrigation: same as FarmSim-DDRules-2.pad.Irrigation
      outputfile: filename=FarmSim-DDRules-3 pad3.out; title=FarmSim-DDRules-3 pad3
        variables
          variables: dd/mmm/yyyy as Date, AboveGroundLiveWt, HerbageGrowthWt, HarvestWt, SpeciesLiveWt, LAI_total, surfaceom_wt, LeafLiveWt, leafgreenwt
        events Reporting Frequency: event=end_day
    area pad4
      AgPasture ryegrass_clover: same as FarmSim-DDRules-2.pad.ryegrass_clover
      soil SoilLismore: same as FarmSim-DDRules-2.pad.SoilLismore
      micromet
        soilalbedo = 0.23
        a_interception = 0
        b_interception = 0
        c_interception = 0
        d_interception = 0
      fertiliser
      surfaceom Surface Organic Matter
        PoolName = AgPasture  # Organic Matter pool name
        type = grass  # Organic Matter type
        mass = 1000  # Initial surface residue (kg/ha)
        cnr = 15  # C:N ratio of initial residue
        standing_fraction = 0  # Fraction of residue standing
      irrigation: same as FarmSim-DDRules-2.pad.Irrigation
      outputfile: filename=FarmSim-DDRules-3 pad4.out; title=FarmSim-DDRules-3 pad4
        variables
          variables: dd/mmm/yyyy as Date, AboveGroundLiveWt, HerbageGrowthWt, HarvestWt, SpeciesLiveWt, LAI_total, surfaceom_wt, LeafLiveWt, leafgreenwt
        events Reporting Frequency: event=end_day
  simulation FarmSim-DDRules-1
    manager2 FarmSimOptions: same as FarmSim-DDRules-3.FarmSimOptions
    clock
      start_date = 1/07/1980  # Enter the start date of the simulation
      end_date = 30/06/1981  # Enter the end date of the simulation
    metfile met: filename=%apsim%_dev\data\MetFiles\Other\WinchmoreMet.met
    summaryfile
    DDRules
    outputfile DDRules Outputs: filename=FarmSim-DDRules-1 DDRules Outputs.out; title=FarmSim-DDRules-1 DDRules Outputs
      variables
        variables: dd/mm/yyyy as Date, DM_Eaten, DM_Eaten_Pasture, DM_Eaten_Supplement, SilageCut, DM_Eaten_Cow, DM_Eaten_Pasture_Cow, DM_Eaten_Supplement_Cow, BaseStockingRate, localGR, N_to_BC_Cow, Cow_dLWt
      events Reporting Frequency: event=Daily
    area pad
      AgPasture ryegrass_clover: same as FarmSim-DDRules-2.pad.ryegrass_clover
      soil SoilLismore: same as FarmSim-DDRules-2.pad.SoilLismore
      micromet
        soilalbedo = 0.23
        a_interception = 0
        b_interception = 0
        c_interception = 0
        d_interception = 0
      fertiliser
      surfaceom Surface Organic Matter
        PoolName = AgPasture  # Organic Matter pool name
        type = grass  # Organic Matter type
        mass = 1000  # Initial surface residue (kg/ha)
        cnr = 15  # C:N ratio of initial residue
        standing_fraction = 0  # Fraction of residue standing
      irrigation: same as FarmSim-DDRules-2.pad.Irrigation
      outputfile: filename=FarmSim-DDRules-1 pad.out; title=FarmSim-DDRules-1 pad
        variables
          variables: dd/mmm/yyyy as Date, AboveGroundLiveWt, HerbageGrowthWt, HarvestWt, SpeciesLiveWt, LAI_total, surfaceom_wt, LeafLiveWt, leafgreenwt
        events Reporting Frequency: event=end_day
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