folder LUDF: version=27
  simulation Milking Platform
    DDRules
    clock
      start_date = 01/06/2006  # Enter the start date of the simulation
      end_date = 30/07/2009  # Enter the end date of the simulation
    metfile met: filename=%apsim%\Examples\MetFiles\lincoln.met
    summaryfile: filename=AgPasture Simulation.sum
    outputfile
      variables
        variables: dd/mm/yyyy as Date, MilkSolids_Cow, ME_Demand_Maintance_Cow, ME_Demand_Lactation_Cow, ME_Demand_WeightChange_Cow, ME_Demand_Pregnancy_Cow, ME_Demand_Walking_Cow, MilkSolids_Ha, Cow_LWt, TotalCows, MilkingCows
      events Reporting Frequency: event=Daily
    outputfile Outputfile1
      variables
        variables: dd/mm/yyyy as Date, Irrigation, FarmArea, Fertiliser
      events Reporting Frequency: event=Daily
    area Laneways
      AgPasture ryegrass_clover
        Nspecies = 2  # Number of species
        thisCropName = ryegrass_clover  # Crop name shown as on the simulation tree
        cropName = ryegrass whiteclover  # Species names
        micrometType = grass grass  # crop type for MicroMet
        isAnnual = 0 0  # Annual species? no=0, yes=1
        isLegume = 0 1  # Legume species? no=0, yes=1
        photoPath = 3 3  # C3 or C4 species? C3=3, C4=4
        rootDepth = 900  300
        growthTmin = 3 3  # Minimum temperature for growth
        growthTmax = 32 32  # Maximum temperature for growth
        growthTopt = 20 20  # Optimum temperature for growth
        growthTq = 2 2  # Curvture of growth response to temperature
        massFluxTmin = 2 2  # Minimum temperature for mass flux
        massFluxTopt = 20 20  # Optimum temperature for mass flux
        massFluxW0 = 2 2  # Scale factor for response of mass flux to soil moisture
        massFluxWopt = 0.5 0.5  # Optimum soil moisture for mass flux
        heatOnsetT = 28 28  # Heat effects- Onset temperature
        heatFullT = 35 35  # Heat effects- Full temperature
        heatSumT = 30 30  # Heat effects- Temperature sum for recovery
        coldOnsetT = 0 0  # Cold effects- Onset temperature
        coldFullT = -3 -3  # Cold effects- Full temperature
        coldSumT = 20 20  # Cold effects- Temperature sum for recovery
        Pm = 1 1  # Reference CO2 assimilation rate (mg CO2/m2.s)
        maintRespiration = 3 3  # Maintenance respiration coefficient (%)
        growthEfficiency = 0.75 0.75
        SLA = 20 20  # Specific leaf area
        lightExtCoeff = 0.5 0.8  # Light extinction coefficient
        stockParameter = 0.05 0.05  # Stock influence parameter
        maxRootFraction = 0.25 0.25  # Maximum biomass fraction allocated to root
        leafRate = 3 3  # Reference leaf appearance rate without stress
        fLeaf = 0.7 0.7  # Reference growth partition to leaves
        fStolon = 0 0.2  # Reference growth partition to stolon
        digestLive = 0.6 0.6  # Digestibility of live plant material
        digestDead = 0.2 0.2  # Digestibility of dead plant material
        dmtotal = 1800 350  # Initial shoot dry matter (kg/ha)
        dmlitter = 250 50  # Initial litter dry matter (kg/ha)
        dmgreenmin = 500 80  # Minimum green dry matter (kg/ha)
        NcleafOpt = 4 4.5  # N concentration - leaf optimum
        NcleafMax = 5 5.5  # N concentration - leaf luxary
        NcleafMin = 1.2 2.0  # N concentration - leaf scenescent
        NcstemFr = 0.5 0.5  # Stem N concentration as fraction of leaf N concentration
        NcstolFr = 0 0.5  # Stolon N concentration as fraction of leaf N concentration
        NcrootFr = 0.5 0.5  # Root N concentration as fraction of leaf N concentration
        NMinFix = 0 0.2  # Minimum N fixation (when soil N is sufficient)
        NMaxFix = 0 0.6  # Maximum N fixation (when soil N is unavailable)
        CO2PmaxScale = 700 700  # CO2 - Scale factor for CO2 effect on photosynthesis
        CO2NScale = 600 600  # CO2 - Scale factor for CO2 effects on plant N concentration
        CO2NMin = 0.7 0.7  # CO2 - Minimum fraction that plant N concentration may reduce to uder elevated CO2
        CO2NCurvature = 2 2  # CO2 - Curvature factor of CO2 effect on plant N concentration
        Frgr = 1 1  # Relative growth factor
        rlvp = 1 0.2 0.1 0.05 0 0 0 0  # Root distribution of swards (relative to each soil layer)
      micromet
        soilalbedo = 0.23
        a_interception = 0
        b_interception = 0
        c_interception = 0
        d_interception = 0
      fertiliser
      surfaceom Surface Organic Matter
        PoolName = AgPasture  # Organic Matter pool name
        type = grass  # Organic Matter type
        mass = 1000  # Initial surface residue (kg/ha)
        cnr = 15  # C:N ratio of initial residue
        standing_fraction = 0  # Fraction of residue standing
      irrigation
        automatic_irrigation = on
        asw_depth = 600  # Depth to which ASW is calculated. (mm)
        crit_fr_asw = 0.5  # Fraction of ASW below which irrigation is applied (0-1.0)
        irrigation_efficiency = 1  # Efficiency of the irrigation. (0-1.0)
        irrigation_allocation = off  # Allocation limits
        allocation = 0  # Allocation in mm
        default_no3_conc = 0  # Nitrate concentration (ppm N)
        default_nh4_conc = 0  # Ammonium concentration (ppm N)
        default_cl_conc = 0  # Chloride concentration (ppm Cl)
      outputfile
        variables
          variables: dd/mmm/yyyy as Date, HerbageGrowthWt, SpeciesLiveWt, LAI_total, LeafLiveWt, leafgreenwt, surfaceom_wt, surfaceom_n, surfaceom_c, AboveGroundWt, AboveGroundLiveWt, AboveGroundDeadWt, GLFwater, cover_green, AboveGroundNPct, EffluientPondVolume
        events Reporting Frequency: event=end_day
      soil Canterbury_M: Country=New Zealand; Region=Plains; SoilType=NZ_sedementary; State=Canterbury
        DataSource=Generic profile descriptions provided by Trevor Webb and data for functional horizions based on SWAMP project results
        Comments=Bulk density values were measured on the fine earth fraction so values entered into apsim soil are adjusted down to account for stone content (assuming stones are inert from all soil process so their mass and volume is removed from model paramaters).  SAT, DUL, LL15 and Air dry have been adjusted down to account for stone content.  OC has not been adjusted so the model will get the correct carbon and N amounts using the adjusted BD.
        Water
          Layer:
            Thickness (mm)  KS (mm/day)  BD (g/cc)  Airdry (mm/mm)  LL15 (mm/mm)  DUL (mm/mm)  SAT (mm/mm)
            250             4832.04      1.3105     0.07675         0.1535        0.3735       0.456165
            300             389.229      1.524      0.201           0.201         0.332        0.39432
            300             16.3619      1.65       0.201           0.201         0.3375       0.358515
            300             16800        0.39       0.012           0.012         0.039        0.12
            350             16800        0.39       0.012           0.012         0.039        0.12
          SoilCrop Barley
            Layer:
              Thickness (mm)  LL (mm/mm)  kl (/day)  xf (0-1)
              250             0.1535      0.15       1
              300             0.201       0.1        1
              300             0.201       0.1        0.301194
              300             0.012       0.05       1
              350             0.012       0.05       1
          SoilCrop Canola
            Layer:
              Thickness (mm)  LL (mm/mm)  kl (/day)  xf (0-1)
              250             0.1535      0.15       1
              300             0.201       0.1        0.825307
              300             0.201       0.1        0.120996
              300             0.012       0.05       1
              350             0.012       0.05       1
          SoilCrop Cloverseed
            Layer:
              Thickness (mm)  LL (mm/mm)  kl (/day)  xf (0-1)
              250             0.1535      0.15       1
              300             0.201       0.1        1
              300             0.201       0.1        0.153816
              300             0.012       0.05       1
              350             0.012       0.05       1
          SoilCrop Fieldpea
            Layer:
              Thickness (mm)  LL (mm/mm)  kl (/day)  xf (0-1)
              250             0.1535      0.15       1
              300             0.201       0.1        0.449329
              300             0.201       0.1        0.090718
              300             0.012       0.05       1
              350             0.012       0.05       1
          SoilCrop Fababean: same as Milking Platform.Laneways.Canterbury_M.Water.Canola
          SoilCrop kale: same as Milking Platform.Laneways.Canterbury_M.Water.Canola
          SoilCrop ItallianRyegrass: same as Milking Platform.Laneways.Canterbury_M.Water.Canola
          SoilCrop Lucerne: same as Milking Platform.Laneways.Canterbury_M.Water.Barley
          SoilCrop Maize: same as Milking Platform.Laneways.Canterbury_M.Water.Canola
          SoilCrop Oats: same as Milking Platform.Laneways.Canterbury_M.Water.Cloverseed
          SoilCrop Potato: same as Milking Platform.Laneways.Canterbury_M.Water.Fieldpea
          SoilCrop Grassseed: same as Milking Platform.Laneways.Canterbury_M.Water.Canola
          SoilCrop Triticale: same as Milking Platform.Laneways.Canterbury_M.Water.Cloverseed
          SoilCrop Wheat: same as Milking Platform.Laneways.Canterbury_M.Water.Cloverseed
          SoilCrop ryegrass_clover: same as Milking Platform.Laneways.Canterbury_M.Water.Canola
          SoilCrop ryegrass: same as Milking Platform.Laneways.Canterbury_M.Water.Canola
          SoilCrop whiteclover: same as Milking Platform.Laneways.Canterbury_M.Water.Fieldpea
        Analysis
          Layer:
            Thickness (mm)  Rocks (%)  PH (1:5 water)  CEC (cmol+/kg)  ParticleSizeSand (%)  ParticleSizeSilt (%)  ParticleSizeClay (%)
            250             0          6               13              14.5                  65.5                  20
            300             0          6               9               18                    58                    24
            300             0          6               9               14                    63                    23
            300             70         6               5               37.7916               57.0964               5.112
            350             70         6               5               37.7916               57.0964               5.112
        SoilWat: SummerCona=4.4; SummerU=9; SummerDate=1-Oct; WinterCona=3; WinterU=6; WinterDate=1-Apr; DiffusConst=88; DiffusSlope=35; Salb=0.13; Cn2Bare=73; CnRed=20; CnCov=0.8
          Layer:
            Thickness (mm)  SWCON (0-1)
            250             0.496442
            300             0.365575
            300             0.0968316
            300             0.650598
            350             0.650598
        SoilOrganicMatter: RootCn=40; RootWt=1000; SoilCn=11; EnrACoeff=7.4; EnrBCoeff=0.2
          Layer:
            Thickness (mm)  OC (Total %)  FBIOM (0-1)  FINERT (0-1)
            250             2.36763       0.0288947    0.449328
            300             0.493357      0.0136287    0.758676
            300             0.226613      0.0105998    0.901885
            300             0.202414      0.0100992    0.960109
            350             0.200179      0.0100141    0.984954
        InitWater
          percentmethod: percent=1; distributed=filled from top
        Sample Initial nitrogen
          Layer:
            Thickness (mm)  NO3 (kg/ha)  NH4 (kg/ha)
            80              25           1
            5               20           1
            20              15           1
            67              10           1
    area 01E
      AgPasture ryegrass_clover
        Nspecies = 2  # Number of species
        thisCropName = ryegrass_clover  # Crop name shown as on the simulation tree
        cropName = ryegrass whiteclover  # Species names
        micrometType = grass grass  # crop type for MicroMet
        isAnnual = 0 0  # Annual species? no=0, yes=1
        isLegume = 0 1  # Legume species? no=0, yes=1
        photoPath = 3 3  # C3 or C4 species? C3=3, C4=4
        rootDepth = 900  300
        growthTmin = 3 3  # Minimum temperature for growth
        growthTmax = 32 32  # Maximum temperature for growth
        growthTopt = 20 20  # Optimum temperature for growth
        growthTq = 2 2  # Curvture of growth response to temperature
        massFluxTmin = 2 2  # Minimum temperature for mass flux
        massFluxTopt = 20 20  # Optimum temperature for mass flux
        massFluxW0 = 2 2  # Scale factor for response of mass flux to soil moisture
        massFluxWopt = 0.5 0.5  # Optimum soil moisture for mass flux
        heatOnsetT = 28 28  # Heat effects- Onset temperature
        heatFullT = 35 35  # Heat effects- Full temperature
        heatSumT = 30 30  # Heat effects- Temperature sum for recovery
        coldOnsetT = -20 -20  # Cold effects- Onset temperature
        coldFullT = -40 -50  # Cold effects- Full temperature
        coldSumT = 20 20  # Cold effects- Temperature sum for recovery
        Pm = 1 1  # Reference CO2 assimilation rate (mg CO2/m2.s)
        maintRespiration = 3 3  # Maintenance respiration coefficient (%)
        growthEfficiency = 0.75 0.75
        SLA = 20 20  # Specific leaf area
        lightExtCoeff = 0.5 0.8  # Light extinction coefficient
        stockParameter = 0.05 0.05  # Stock influence parameter
        maxRootFraction = 0.25 0.25  # Maximum biomass fraction allocated to root
        leafRate = 3 3  # Reference leaf appearance rate without stress
        fLeaf = 0.7 0.7  # Reference growth partition to leaves
        fStolon = 0 0.2  # Reference growth partition to stolon
        digestLive = 0.6 0.6  # Digestibility of live plant material
        digestDead = 0.2 0.2  # Digestibility of dead plant material
        dmtotal = 3600 700  # Initial shoot dry matter (kg/ha)
        dmlitter = 250 50  # Initial litter dry matter (kg/ha)
        dmgreenmin = 500 80  # Minimum green dry matter (kg/ha)
        NcleafOpt = 4 4.5  # N concentration - leaf optimum
        NcleafMax = 5 5.5  # N concentration - leaf luxary
        NcleafMin = 1.2 2.0  # N concentration - leaf scenescent
        NcstemFr = 0.5 0.5  # Stem N concentration as fraction of leaf N concentration
        NcstolFr = 0 0.5  # Stolon N concentration as fraction of leaf N concentration
        NcrootFr = 0.5 0.5  # Root N concentration as fraction of leaf N concentration
        NMinFix = 0 0.2  # Minimum N fixation (when soil N is sufficient)
        NMaxFix = 0 0.6  # Maximum N fixation (when soil N is unavailable)
        CO2PmaxScale = 700 700  # CO2 - Scale factor for CO2 effect on photosynthesis
        CO2NScale = 600 600  # CO2 - Scale factor for CO2 effects on plant N concentration
        CO2NMin = 0.7 0.7  # CO2 - Minimum fraction that plant N concentration may reduce to uder elevated CO2
        CO2NCurvature = 2 2  # CO2 - Curvature factor of CO2 effect on plant N concentration
        Frgr = 1 1  # Relative growth factor
        rlvp = 1 0.2 0.1 0.05 0 0 0 0  # Root distribution of swards (relative to each soil layer)
      micromet
        soilalbedo = 0.23
        a_interception = 0
        b_interception = 0
        c_interception = 0
        d_interception = 0
      fertiliser
      surfaceom Surface Organic Matter
        PoolName = AgPasture  # Organic Matter pool name
        type = grass  # Organic Matter type
        mass = 1000  # Initial surface residue (kg/ha)
        cnr = 15  # C:N ratio of initial residue
        standing_fraction = 0  # Fraction of residue standing
      irrigation
        automatic_irrigation = off
        asw_depth = 300  # Depth to which ASW is calculated. (mm)
        crit_fr_asw = 0.85  # Fraction of ASW below which irrigation is applied (0-1.0)
        irrigation_efficiency = 1  # Efficiency of the irrigation. (0-1.0)
        irrigation_allocation = off  # Allocation limits
        allocation = 0  # Allocation in mm
        default_no3_conc = 0  # Nitrate concentration (ppm N)
        default_nh4_conc = 0  # Ammonium concentration (ppm N)
        default_cl_conc = 0  # Chloride concentration (ppm Cl)
      soil EyreLike
        SoilType = NZ_sedementary  # Classification
        Country = New Zealand
        Site = -
        Region = Plains
        NearestTown = -
        State = Canterbury
        DataSource = Generic profile descriptions provided by Trevor Webb and data for functional horizions based on SWAMP project results
        Comments = Trevor Webb says Eyre soils are not at the extreme end of the possibilities for this soil name.  Based on Eyre stony (less stones).  Bulk density values were measured on the fine earth fraction so values entered into apsim soil are adjusted down to account for stone content (assuming stones are inert from all soil process so their mass and volume is removed from model paramaters).  SAT, DUL, LL15 and Air dry have been adjusted down to account for stone content.  OC has not been adjusted so the model will get the correct carbon and N amounts using the adjusted BD.
        Analysis
          Layer:
            Thickness (mm)  Rocks (%)  PH (1:5 water)  CEC (cmol+/kg)  ParticleSizeSand (%)  ParticleSizeSilt (%)  ParticleSizeClay (%)
            120             10         6               13              12.7966               66.7554               20.448
            50              15         6               9               12.7966               66.7554               20.448
            150             50         6               8               15.796                76.536                7.668
            300             65         6               5               37.7916               57.0964               5.112
            380             75         6               4               39.7912               55.0968               5.112
            500             75         6               4               39.7912               55.0968               5.112
        Water
          Layer:
            Thickness (mm)  KS (mm/day)  BD (g/cc)  Airdry (mm/mm)  LL15 (mm/mm)  DUL (mm/mm)  SAT (mm/mm)
            120             7200         1.17       0.072           0.144         0.342        0.423
            50              7200         1.105      0.068           0.136         0.323        0.3995
            150             12000        0.7        0.03            0.03          0.175        0.215
            300             16800        0.455      0.014           0.014         0.0455       0.14
            380             24000        0.25       0.01            0.01          0.0275       0.125
            500             24000        0.25       0.01            0.01          0.0275       0.125
          SoilCrop Barley
            Layer:
              Thickness (mm)  LL (mm/mm)  kl (/day)  xf (0-1)
              120             0.144       0.304413   1
              50              0.136       0.316452   1
              150             0.03        0.330953   1
              300             0.014       0.525406   1
              380             0.01        0.21174    1
              500             0.01        0.0303872  1
          SoilCrop Canola: same as Milking Platform.01E.EyreLike.Water.Barley
          SoilCrop Cloverseed
            Layer:
              Thickness (mm)  LL (mm/mm)  kl (/day)   xf (0-1)
              120             0.144       0.233223    1
              50              0.136       0.229006    1
              150             0.03        0.180537    1
              300             0.014       0.172449    1
              380             0.01        0.0412621   1
              500             0.01        0.00339304  1
          SoilCrop Fieldpea
            Layer:
              Thickness (mm)  LL (mm/mm)  kl (/day)   xf (0-1)
              120             0.144       0.295617    1
              50              0.136       0.301008    1
              150             0.03        0.286816    1
              300             0.014       0.328348    1
              380             0.01        0.0819977   0.67032
              500             0.01        0.00678614  0.67032
          SoilCrop Fababean
            Layer:
              Thickness (mm)  LL (mm/mm)  kl (/day)  xf (0-1)
              120             0.144       0.31277    1
              50              0.136       0.330014   1
              150             0.03        0.376275   1
              300             0.014       0.697699   1
              380             0.01        0.442327   1
              500             0.01        0.133242   1
          SoilCrop kale: same as Milking Platform.01E.EyreLike.Water.Barley
          SoilCrop ItallianRyegrass: same as Milking Platform.01E.EyreLike.Water.Barley
          SoilCrop Lucerne
            Layer:
              Thickness (mm)  LL (mm/mm)  kl (/day)  xf (0-1)
              120             0.144       0.241856   1
              50              0.136       0.264555   1
              150             0.03        0.341835   1
              300             0.014       0.77884    1
              380             0.01        0.595774   1
              500             0.01        0.348871   1
          SoilCrop Maize
            Layer:
              Thickness (mm)  LL (mm/mm)  kl (/day)  xf (0-1)
              120             0.144       0.316904   1
              50              0.136       0.336154   1
              150             0.03        0.397309   1
              300             0.014       0.775067   1
              380             0.01        0.594207   1
              500             0.01        0.262663   1
          SoilCrop Oats: same as Milking Platform.01E.EyreLike.Water.Barley
          SoilCrop Potato
            Layer:
              Thickness (mm)  LL (mm/mm)  kl (/day)    xf (0-1)
              120             0.144       0.27597      1
              50              0.136       0.266046     1
              150             0.03        0.191355     1
              300             0.014       0.0966877    1
              380             0.01        0.011188     0.67032
              500             0.01        0.000337847  0.67032
          SoilCrop Grassseed
            Layer:
              Thickness (mm)  LL (mm/mm)  kl (/day)   xf (0-1)
              120             0.144       0.286157    1
              50              0.136       0.283984    1
              150             0.03        0.251558    1
              300             0.014       0.185874    1
              380             0.01        0.0303872   1
              500             0.01        0.00151415  1
          SoilCrop Triticale: same as Milking Platform.01E.EyreLike.Water.Barley
          SoilCrop Wheat: same as Milking Platform.01E.EyreLike.Water.Barley
          SoilCrop ryegrass_clover: same as Milking Platform.01E.EyreLike.Water.Grassseed
          SoilCrop ryegrass: same as Milking Platform.01E.EyreLike.Water.Grassseed
          SoilCrop whiteclover: same as Milking Platform.01E.EyreLike.Water.Fieldpea
        SoilWat: SummerCona=4.4; SummerU=9; SummerDate=1-Oct; WinterCona=3; WinterU=6; WinterDate=1-Apr; DiffusConst=88; DiffusSlope=35; Salb=0.13; Cn2Bare=73; CnRed=20; CnCov=0.8
          Layer:
            Thickness (mm)  SWCON (0-1)
            120             0.457632
            50              0.520003
            150             0.650583
            300             0.650598
            380             0.6506
            500             0.6506
        SoilOrganicMatter: RootCn=40; RootWt=1000; SoilCn=11; EnrACoeff=7.4; EnrBCoeff=0.2
          Layer:
            Thickness (mm)  OC (Total %)  FBIOM (0-1)  FINERT (0-1)
            120             2.45608       0.0379071    0.350351
            50              2.45608       0.0267581    0.496576
            150             1.36156       0.019197     0.627055
            300             0.558945      0.0123842    0.810112
            380             0.41047       0.01031      0.931528
            500             0.40031       0.0100221    0.981709
        InitWater
          percentmethod: percent=1; distributed=filled from top
        Sample Initial nitrogen
          Layer:
            Thickness  no3 (kg/ha)  nh4 (kg/ha)
            200        30           5
            1800       20           1
      outputfile
        variables
          variables: dd/mmm/yyyy as Date, AboveGroundWt, AboveGroundLiveWt, AboveGroundDeadWt, HerbageGrowthWt, GLFwater, GLFtemp, GLFn
        events Reporting Frequency: event=end_day
    area 02P
      soil PaparuaLike
        SoilType = NZ_sedementary  # Classification
        Country = New Zealand
        Site = -
        Region = Plains
        NearestTown = -
        State = Canterbury
        DataSource = Generic profile descriptions provided by Trevor Webb and data for functional horizions based on SWAMP project results
        Comments = VERY ROUGH based on discussion with Trevor Webb - taken from the "Canterbury Light" generic soil but no stones untiol 0.7 m - assume soil properties from 30 cm apply down to 70 cm.Bulk density values were measured on the fine earth fraction so values entered into apsim soil are adjusted down to account for stone content (assuming stones are inert from all soil process so their mass and volume is removed from model paramaters).  SAT, DUL, LL15 and Air dry have been adjusted down to account for stone content.  OC has not been adjusted so the model will get the correct carbon and N amounts using the adjusted BD.
        Analysis
          Layer:
            Thickness (mm)  Rocks (%)  PH (1:5 water)  CEC (cmol+/kg)  ParticleSizeSand (%)  ParticleSizeSilt (%)  ParticleSizeClay (%)
            200             0          6               13              14.5                  65.5                  20
            150             0          6               9               26.5                  60.5                  13
            150             0          6               9               17.7956               69.4244               12.78
            200             0          6               5               37.7916               57.0964               5.112
            300             80         6               4               39.7912               55.0968               5.112
            500             80         6               4               39.7912               55.0968               5.112
        Water
          Layer:
            Thickness (mm)  KS (mm/day)  BD (g/cc)  Airdry (mm/mm)  LL15 (mm/mm)  DUL (mm/mm)  SAT (mm/mm)
            200             4832.04      1.3105     0.07675         0.1535        0.3735       0.456165
            150             4715.08      1.474      0.152           0.152         0.32         0.41292
            150             720          1.474      0.152           0.152         0.32         0.413
            200             16800        1.474      0.152           0.152         0.32         0.413
            300             24000        0.2        0.008           0.008         0.022        0.1
            500             24000        0.2        0.008           0.008         0.022        0.1
          SoilCrop Barley
            Layer:
              Thickness (mm)  LL (mm/mm)  kl (/day)  xf (0-1)
              200             0.1535      0.236583   1
              150             0.152       0.28592    1
              150             0.05        0.286      1
              200             0.014       0.286      1
              300             0.008       0.234779   1
              500             0.008       0.0354191  1
          SoilCrop Canola: same as Milking Platform.02P.PaparuaLike.Water.Barley
          SoilCrop Cloverseed
            Layer:
              Thickness (mm)  LL (mm/mm)  kl (/day)   xf (0-1)
              200             0.1535      0.179407    1
              150             0.152       0.137126    1
              150             0.05        0.137       1
              200             0.014       0.137       1
              300             0.008       0.0479326   1
              500             0.008       0.00398922  1
          SoilCrop Fieldpea
            Layer:
              Thickness (mm)  LL (mm/mm)  kl (/day)   xf (0-1)
              200             0.1535      0.220855    1
              150             0.152       0.257553    1
              150             0.05        0.258       0.67032
              200             0.014       0.258       1
              300             0.008       0.0941019   0.67032
              500             0.008       0.00796968  0.67032
          SoilCrop Fababean
            Layer:
              Thickness (mm)  LL (mm/mm)  kl (/day)  xf (0-1)
              200             0.1535      0.251453   1
              150             0.152       0.330259   1
              150             0.05        0.33       1
              200             0.014       0.33       1
              300             0.008       0.466488   1
              500             0.008       0.150739   1
          SoilCrop kale: same as Milking Platform.02P.PaparuaLike.Water.Barley
          SoilCrop ItallianRyegrass: same as Milking Platform.02P.PaparuaLike.Water.Barley
          SoilCrop Lucerne
            Layer:
              Thickness (mm)  LL (mm/mm)  kl (/day)  xf (0-1)
              200             0.1535      0.20426    1
              150             0.152       0.31077    1
              150             0.05        0.311      1
              200             0.014       0.311      1
              300             0.008       0.615175   1
              500             0.008       0.37501    1
          SoilCrop Maize
            Layer:
              Thickness (mm)  LL (mm/mm)  kl (/day)  xf (0-1)
              200             0.1535      0.258678   1
              150             0.152       0.351398   1
              150             0.05        0.351      1
              200             0.014       0.351      1
              300             0.008       0.613657   1
              500             0.008       0.287755   1
          SoilCrop Oats: same as Milking Platform.02P.PaparuaLike.Water.Barley
          SoilCrop Potato
            Layer:
              Thickness (mm)  LL (mm/mm)  kl (/day)    xf (0-1)
              200             0.1535      0.188424     1
              150             0.152       0.135922     1
              150             0.05        0.136        0.67032
              200             0.014       0.136        1
              300             0.008       0.0131205    0.67032
              500             0.008       0.000397606  0.67032
          SoilCrop Grassseed
            Layer:
              Thickness (mm)  LL (mm/mm)  kl (/day)   xf (0-1)
              200             0.1535      0.204584    1
              150             0.152       0.200483    1
              150             0.05        0.2         1
              200             0.014       0.2         1
              300             0.008       0.0354191   1
              500             0.008       0.00178129  1
          SoilCrop Triticale: same as Milking Platform.02P.PaparuaLike.Water.Barley
          SoilCrop Wheat: same as Milking Platform.02P.PaparuaLike.Water.Barley
          SoilCrop ryegrass_clover: same as Milking Platform.02P.PaparuaLike.Water.Grassseed
          SoilCrop ryegrass: same as Milking Platform.02P.PaparuaLike.Water.Grassseed
          SoilCrop whiteclover: same as Milking Platform.02P.PaparuaLike.Water.Fieldpea
        SoilWat: SummerCona=4.4; SummerU=9; SummerDate=1-Oct; WinterCona=3; WinterU=6; WinterDate=1-Apr; DiffusConst=88; DiffusSlope=35; Salb=0.13; Cn2Bare=73; CnRed=20; CnCov=0.8
          Layer:
            Thickness (mm)  SWCON (0-1)
            200             0.496442
            150             0.56107
            150             0.561
            200             0.561
            300             0.6506
            500             0.6506
        SoilOrganicMatter: RootCn=40; RootWt=1000; SoilCn=11; EnrACoeff=7.4; EnrBCoeff=0.2
          Layer:
            Thickness (mm)  OC (Total %)  FBIOM (0-1)  FINERT (0-1)
            200             2.88977       0.0319525    0.493608
            150             0.971538      0.017682     0.700441
            150             0.80854       0.0131233    0.808993
            200             0.800258      0.0110929    0.887009
            300             0.800002      0.0102439    0.946627
            500             0.8           0.0100221    0.983924
        InitWater
          percentmethod: percent=1; distributed=filled from top
        Sample Initial nitrogen
          Layer:
            Thickness  no3 (kg/ha)  nh4 (kg/ha)
            200        30           5
            1800       20           1
      outputfile -> /LUDF/Milking Platform/01E/outputfile
      AgPasture ryegrass_clover -> /LUDF/Milking Platform/01E/ryegrass_clover
      micromet -> /LUDF/Milking Platform/01E/Micromet
      fertiliser -> /LUDF/Milking Platform/01E/Fertiliser
      surfaceom Surface Organic Matter -> /LUDF/Milking Platform/01E/Surface Organic Matter
      irrigation -> /LUDF/Milking Platform/01E/Irrigation
    area 03P -> /LUDF/Milking Platform/02P
    area 04P -> /LUDF/Milking Platform/02P
    area 05P -> /LUDF/Milking Platform/02P
    area 06P -> /LUDF/Milking Platform/02P
    area 07P -> /LUDF/Milking Platform/02P
    area 08P -> /LUDF/Milking Platform/02P
    area 09P -> /LUDF/Milking Platform/02P
    area 10P -> /LUDF/Milking Platform/02P
      AgPasture ryegrass_clover
        Nspecies = 2  # Number of species
        thisCropName = AgPasture  # Crop name shown as on the simulation tree
        cropName = ryegrass whiteclover  # Species names
        dmtotal = 1500      350  # Initial shoot dry matter (kg/ha)
        dmlitter = 250        50  # Initial litter dry matter (kg/ha)
        dmgreenmin = 500        50  # Minimum green dry matter (kg/ha)
        rootDepth = 900        400  # Root depth (mm)
        rlvp = 1 0.2 0.1 0.05 0 0 0  # Root distribution of swards (relative to each soil layer)
        WaterUptakeSource = calc  # Water uptake done by AgPasture (calc) or by apsim?
    area 11P -> /LUDF/Milking Platform/02P
    area 12T -> /LUDF/Milking Platform/02P
      soil TemukaLike: Country=New Zealand; Region=Plains; SoilType=NZ_sedementary; State=Canterbury
        DataSource=Generic profile descriptions provided by Trevor Webb and data for functional horizions based on SWAMP project results
        Comments=Bulk density values were measured on the fine earth fraction so values entered into apsim soil are adjusted down to account for stone content (assuming stones are inert from all soil process so their mass and volume is removed from model paramaters).  SAT, DUL, LL15 and Air dry have been adjusted down to account for stone content.  OC has not been adjusted so the model will get the correct carbon and N amounts using the adjusted BD.
        Analysis
          Layer:
            Thickness (mm)  Rocks (%)  PH (1:5 water)  CEC (cmol+/kg)  ParticleSizeSand (%)  ParticleSizeSilt (%)  ParticleSizeClay (%)
            250             0          6               13              14.5                  65.5                  20
            200             0          6               19              7.7976                53.8624               38.34
            400             0          6               19              1                     55                    44
            250             0          6               9               15                    66                    19
            400             0          6               9               15                    66                    19
        Water
          Layer:
            Thickness (mm)  KS (mm/day)  BD (g/cc)  Airdry (mm/mm)  LL15 (mm/mm)  DUL (mm/mm)  SAT (mm/mm)
            250             4832.04      1.3105     0.07675         0.1535        0.3735       0.456165
            200             720          1.42       0.3             0.3           0.43         0.45
            400             19.0512      1.424      0.308           0.308         0.446        0.4557
            250             97.995       1.601      0.162           0.162         0.325        0.37572
            400             97.995       1.601      0.162           0.162         0.325        0.37572
          SoilCrop Barley
            Layer:
              Thickness (mm)  LL (mm/mm)  kl (/day)   xf (0-1)
              250             0.1535      0.220855    1
              200             0.3         0.238897    1
              400             0.308       0.0409162   1
              250             0.162       0.0217893   1
              400             0.162       0.00528755  1
          SoilCrop Canola
            Layer:
              Thickness (mm)  LL (mm/mm)  kl (/day)   xf (0-1)
              250             0.1535      0.220855    1
              200             0.3         0.238897    0.825307
              400             0.308       0.0409162   0.316004
              250             0.162       0.0217893   0.510686
              400             0.162       0.00528755  0.510686
          SoilCrop Cloverseed
            Layer:
              Thickness (mm)  LL (mm/mm)  kl (/day)    xf (0-1)
              250             0.1535      0.154575     1
              200             0.3         0.0679578    1
              400             0.308       0.0122099    0.435178
              250             0.162       0.00439625   0.731982
              400             0.162       0.000616139  0.731982
          SoilCrop Fieldpea
            Layer:
              Thickness (mm)  LL (mm/mm)  kl (/day)   xf (0-1)
              250             0.1535      0.200508    1
              200             0.3         0.168828    0.449329
              400             0.308       0.0215978   0.201897
              250             0.162       0.00844899  0.301194
              400             0.162       0.00122552  0.301194
          SoilCrop Fababean
            Layer:
              Thickness (mm)  LL (mm/mm)  kl (/day)  xf (0-1)
              250             0.1535      0.240379   1
              200             0.3         0.284483   0.825307
              400             0.308       0.10758    0.316004
              250             0.162       0.0467416  0.510686
              400             0.162       0.020134   0.510686
          SoilCrop kale: same as Milking Platform.12T.TemukaLike.Water.Canola
          SoilCrop ItallianRyegrass: same as Milking Platform.12T.TemukaLike.Water.Canola
          SoilCrop Lucerne
            Layer:
              Thickness (mm)  LL (mm/mm)  kl (/day)  xf (0-1)
              250             0.1535      0.20426    1
              200             0.3         0.303078   1
              400             0.308       0.175193   1
              250             0.162       0.0795588  1
              400             0.162       0.0441555  1
          SoilCrop Maize
            Layer:
              Thickness (mm)  LL (mm/mm)  kl (/day)  xf (0-1)
              250             0.1535      0.249634   1
              200             0.3         0.313183   0.825307
              400             0.308       0.177124   0.316004
              250             0.162       0.0759389  0.510686
              400             0.162       0.0347419  0.510686
          SoilCrop Oats
            Layer:
              Thickness (mm)  LL (mm/mm)  kl (/day)   xf (0-1)
              250             0.1535      0.220855    1
              200             0.3         0.238897    1
              400             0.308       0.0409162   0.435178
              250             0.162       0.0217893   0.731982
              400             0.162       0.00528755  0.731982
          SoilCrop Potato
            Layer:
              Thickness (mm)  LL (mm/mm)  kl (/day)    xf (0-1)
              250             0.1535      0.17408      1
              200             0.3         0.0539383    0.449329
              400             0.308       0.00485778   0.201897
              250             0.162       0.00100537   0.301194
              400             0.162       6.16568e-05  0.301194
          SoilCrop Grassseed
            Layer:
              Thickness (mm)  LL (mm/mm)  kl (/day)    xf (0-1)
              250             0.1535      0.180564     1
              200             0.3         0.0930868    0.825307
              400             0.308       0.0106384    0.316004
              250             0.162       0.00296644   0.510686
              400             0.162       0.000275799  0.510686
          SoilCrop Triticale: same as Milking Platform.12T.TemukaLike.Water.Oats
          SoilCrop Wheat: same as Milking Platform.12T.TemukaLike.Water.Oats
          SoilCrop ryegrass_clover: same as Milking Platform.12T.TemukaLike.Water.Grassseed
          SoilCrop ryegrass: same as Milking Platform.12T.TemukaLike.Water.Grassseed
          SoilCrop whiteclover: same as Milking Platform.12T.TemukaLike.Water.Fieldpea
        SoilWat: SummerCona=4.4; SummerU=9; SummerDate=1-Oct; WinterCona=3; WinterU=6; WinterDate=1-Apr; DiffusConst=88; DiffusSlope=35; Salb=0.13; Cn2Bare=73; CnRed=20; CnCov=0.8
          Layer:
            Thickness (mm)  SWCON (0-1)
            250             0.496442
            200             0.14775
            400             0.0758548
            250             0.306273
            400             0.306273
        SoilOrganicMatter: RootCn=40; RootWt=1000; SoilCn=11; EnrACoeff=7.4; EnrBCoeff=0.2
          Layer:
            Thickness (mm)  OC (Total %)  FBIOM (0-1)  FINERT (0-1)
            250             5.29822       0.0288947    0.696896
            200             1.22931       0.0148983    0.845673
            400             0.293377      0.0108097    0.937255
            250             0.206935      0.0101152    0.976333
            400             0.200515      0.0100164    0.991073
        InitWater
          percentmethod: percent=1; distributed=filled from top
        Sample Initial nitrogen
          Layer:
            Thickness  no3 (kg/ha)  nh4 (kg/ha)
            200        30           5
            1800       20           1
    area 13T -> /LUDF/Milking Platform/12T
    area 14T -> /LUDF/Milking Platform/12T
    area 15T -> /LUDF/Milking Platform/12T
    area 16T -> /LUDF/Milking Platform/12T
    area 17T -> /LUDF/Milking Platform/12T
    area 18T -> /LUDF/Milking Platform/12T
    area 19T -> /LUDF/Milking Platform/12T
    area 20T -> /LUDF/Milking Platform/12T
    area 21T -> /LUDF/Milking Platform/12T
    outputfile Simple
      variables
        variables: dd/mm/yyyy as Date, FarmArea, StockingRate, PeakStockingRate, TotalCows, ME_Demand_Total, ME_Demand_Total_Cow, ME_Eaten_Pasture_Cow, ME_Eaten_Supplement_Cow
      events Reporting Frequency: event=Daily
    outputfile Supplements
      variables
        variables: dd/mm/yyyy as Date, SilageCut_kgha, SilageFedOut_kgha, SupplementFedOut_kgha, SilageStore_kgha
      events Reporting Frequency: event=Daily
    outputfile Cover
      variables
        variables: dd/mm/yyyy as Date, AverageFarmCover, FeedSituation, IdealAvgGrazingCover, IdealPreGrazingCover, GrazingInterval, GrazingResidual, AverageGrowthRate
      events Reporting Frequency: event=Daily
    outputfile Intakes
      variables
        variables: dd/mm/yyyy as Date, DM_Eaten_Pasture, DM_Eaten_Silage, DM_Eaten_Supplement, ME_Eaten_Pasture, ME_Eaten_Silage, ME_Eaten_Supplement, DM_Eaten_plus_Silage, DM_Eaten_All
      events Reporting Frequency: event=Daily
    folder Grazing Managment
      manager Farm Settings
        #
        farm_area = 160  # Effective Farm Area (ha)
        stocking_rate = 4.2  # Stocking Rate at Peak Milk (cows/ha)
        milk_prod = 0.00, 0.59, 1.38, 1.83, 1.87, 1.67, 1.6, 1.47, 1.35, 1.14, 0.73, 0.00  # kgMS/day [July-June]
        Live_Wt = 531, 430, 437, 444, 451, 465, 475, 475, 476, 484, 500, 515  # kgLWt [July-June]
        Eff_Paddocks = 02P, 21T  # Effluent paddock names
        silage_on_hand = 2500  # Quantity of silage on farm at start of simulation (kgDM/ha)
        energy_content = 11.5  # Quality of silage on farm at start of simulation (ME/kgDM)
        Lane_Paddocks = Laneways  # Laneway paddocks
        Lane_Time = 2  # Time in laneways [0-24]
        on init:
```
DDRules.FarmArea = [farm_area]
DDRules.PeakStockingRate = [stocking_rate]
DDRules.StockingRate = [stocking_rate]
DDRules.HoursInDairyShed = 4
DDRules.EffluentPaddocksPercentage = 0.18
DDRules.EffluentPaddocks = '[Eff_Paddocks]'
DDRules.SupplementME = 12.5
DDRules.SupplementN = 0.035
DDRules.SupplementWastage = 0
DDRules.SupplementDigestability = 0.7
DDRules.MilkCurve = '[milk_prod]'
DDRules.LWtCurve = '[Live_Wt]'
DDRules.AllocationType = 1  
DDRules.SilageME = [energy_content]
DDRules.SilageStore_kgha = [silage_on_hand]
DDRules.PorportionOfFarmInLaneWays = 0.05
DDRules.LanewayPaddocks = '[Lane_Paddocks]'
DDRules.HoursOnLaneWays = [Lane_Time]
```
      operations Operations Fertiliser
        01-Aug  DDRules ApplyFertiliser amount = 12.5 (kg/ha), depth = 0 (mm), type = urea_N()
        01-Oct  DDRules ApplyFertiliser amount = 12.5 (kg/ha), depth = 0 (mm), type = urea_N()
        01-Nov  DDRules ApplyFertiliser amount = 12.5 (kg/ha), depth = 0 (mm), type = urea_N()
        01-Dec  DDRules ApplyFertiliser amount = 12.5 (kg/ha), depth = 0 (mm), type = urea_N()
        01-Jan  DDRules ApplyFertiliser amount = 12.5 (kg/ha), depth = 0 (mm), type = urea_N()
        01-Feb  DDRules ApplyFertiliser amount = 12.5 (kg/ha), depth = 0 (mm), type = urea_N()
        01-Mar  DDRules ApplyFertiliser amount = 12.5 (kg/ha), depth = 0 (mm), type = urea_N()
        01-Apr  DDRules ApplyFertiliser amount = 12.5 (kg/ha), depth = 0 (mm), type = urea_N()
        01-Sep  DDRules ApplyFertiliser amount = 12.5 (kg/ha), depth = 0 (mm), type = urea_N()
        01-may  DDRules ApplyFertiliser amount = 12.5 (kg/ha), depth = 0 (mm), type = urea_N()
        15-Aug  DDRules ApplyFertiliser amount = 12.5 (kg/ha), depth = 0 (mm), type = urea_N()
        15-Sep  DDRules ApplyFertiliser amount = 12.5 (kg/ha), depth = 0 (mm), type = urea_N()
        15-Oct  DDRules ApplyFertiliser amount = 12.5 (kg/ha), depth = 0 (mm), type = urea_N()
        15-Nov  DDRules ApplyFertiliser amount = 12.5 (kg/ha), depth = 0 (mm), type = urea_N()
        15-Dec  DDRules ApplyFertiliser amount = 12.5 (kg/ha), depth = 0 (mm), type = urea_N()
        15-Jan  DDRules ApplyFertiliser amount = 12.5 (kg/ha), depth = 0 (mm), type = urea_N()
        15-Feb  DDRules ApplyFertiliser amount = 12.5 (kg/ha), depth = 0 (mm), type = urea_N()
        15-Mar  DDRules ApplyFertiliser amount = 12.5 (kg/ha), depth = 0 (mm), type = urea_N()
        15-Apr  DDRules ApplyFertiliser amount = 12.5 (kg/ha), depth = 0 (mm), type = urea_N()
        15-May  DDRules ApplyFertiliser amount = 12.5 (kg/ha), depth = 0 (mm), type = urea_N()
      manager Irrigate at SW deficit
        trigger = 0.70  # Enter sw deficit to irrigate at (mm)
        mmAmount = 6.0  # Application Amount (mm)
        eff = 0.8  # Irrigation Efficiency [0-1]
        on start_of_day:
```
if PlantAvalibleWater < [trigger] then        
        DDRules.irrigation_efficiency = [eff]
        DDRules ApplyIrrigation amount = [mmAmount]
endif
```
      manager Wintering Off Dry Stock (disabled)
        #
        DoWinter = yes  # Winter dry stock off farm
        on init:
```
if ('[DoWinter]' = 'yes') then
   DDRules.WinterOffDryStock = 1
else
   DDRules.WinterOffDryStock = 0
endif
```
      manager Conservation Settings (disabled)
        #
        start_date = 2-jul  # Enter start date (dd-mmm)
        finish_date = 1-jul  # Enter finish date (dd-mmm)
        trigger_mass = 0  # Close paddock if pasture mass exceeds (kg/ha)
        residual = 1500  # Pasture residual after cut (kgDM/ha)
        silage_store = yes  # Store conserved feed for later use
        energy_content = 11.5  # Energy content of conversed feed (ME/kgDM)
        cutting_waste = 0  # cutting_waste [%]
        on init:
```
ConservationStart = '[start_date]'
ConservationFinish = '[finish_date]'
ConservationTrigger = [trigger_mass]
ConservationResidual = [residual]
SilageCutWastage = [cutting_waste]
SilageME = [energy_content]

if '[silage_store]' = 'yes' then
   SilageStoreEnable = 1
else
   SilageStoreEnable = 0
endif
```
      manager Wintering Off (WIP) (disabled)
        # Test alternative wintering off
        start_date = 1-november  # Enter start date (dd-mmm)
        finish_date = 1-december  # Enter finish date (dd-mmm)
        proportion = 0.5  # Proportion of herd wintered off-farm (0-1)
        on init:
```
DCWO = '[start_date]'
DSWO = '[finish_date]'
PWO = [Proportion]
```
      manager Irrigate based on rainfall (disabled)
        # When should irrigation be applied
        pastdays = 7  # If rainfall over the past number of days
        EnoughRain = 100  # Is less than (mm)
        # This will happen
        irrigate_module = DDRules  # Module used to apply the irrigation
        irrigate_efficiency = 1  # Irrigation efficiency (0-1)
        on start_of_day:
```
!if not enough rain has occured then irrigate. 
            !Irrigate with the amount that is missing.
            !Only irrigate if a certain number of days have passed.

            if (rain[[pastdays]] < [EnoughRain]) then
               '[irrigate_module]' set irrigation_efficiency = [irrigate_efficiency]
               difference = [EnoughRain] - rain[[pastdays]]
               '[irrigate_module]' ApplyIrrigation amount = 5.5 (mm)
            endif
```
      manager Grazing Settings Mar
        #
        date = 01-mar  # Enter date (dd-mmm)
        #
        residual = 1480  # Grazing Residual [kgDM/ha]
        length = 30  # Rotation Length [days]
        on start_of_day:
```
if (today = date('[date]')) then
   DDRules.GrazingResidual = [residual]
   DDRules.GrazingInterval = [length]
endif
```
      manager Grazing Settings Apr
        #
        date = 01-apr  # Enter date (dd-mmm)
        #
        residual = 2000  # Grazing Residual [kgDM/ha]
        length = 35  # Rotation Length [days]
        on start_of_day:
        script: same as in Milking Platform.Grazing Managment.Grazing Settings Mar
      manager Grazing Settings May
        #
        date = 01-may  # Enter date (dd-mmm)
        #
        residual = 2000  # Grazing Residual [kgDM/ha]
        length = 42  # Rotation Length [days]
        on start_of_day:
        script: same as in Milking Platform.Grazing Managment.Grazing Settings Mar
      manager Grazing Settings Jun
        #
        date = 01-jun  # Enter date (dd-mmm)
        #
        residual = 2000  # Grazing Residual [kgDM/ha]
        length = 350  # Rotation Length [days]
        on start_of_day:
        script: same as in Milking Platform.Grazing Managment.Grazing Settings Mar
      manager Grazing Settings Jul
        #
        date = 01-jul  # Enter date (dd-mmm)
        #
        residual = 2000  # Grazing Residual [kgDM/ha]
        length = 350  # Rotation Length [days]
        on start_of_day:
        script: same as in Milking Platform.Grazing Managment.Grazing Settings Mar
      manager Grazing Settings Aug
        #
        date = 01-aug  # Enter date (dd-mmm)
        #
        residual = 2000  # Grazing Residual [kgDM/ha]
        length = 150  # Rotation Length [days]
        on start_of_day:
        script: same as in Milking Platform.Grazing Managment.Grazing Settings Mar
      manager Grazing Settings Sep
        #
        date = 01-sep  # Enter date (dd-mmm)
        #
        residual = 1480  # Grazing Residual [kgDM/ha]
        length = 50  # Rotation Length [days]
        on start_of_day:
        script: same as in Milking Platform.Grazing Managment.Grazing Settings Mar
      manager Grazing Settings Oct
        #
        date = 01-oct  # Enter date (dd-mmm)
        #
        residual = 1480  # Grazing Residual [kgDM/ha]
        length = 21  # Rotation Length [days]
        on start_of_day:
        script: same as in Milking Platform.Grazing Managment.Grazing Settings Mar
      manager Dry off cows (disabled)
        # When should cows be dried off?
        date = 15-sep  # Date (dd-mmm)
        # Drying off details
        module = DDRules  # Module used to apply the irrigation
        dry_prop = 1.0  # Proportion of cows to dry off [0-1]
        on start_of_day:
```
            if (today = date('[Date]')) then
               DDRules.DryOffProportion = [dry_prop]
            endif
```
      manager Winter Dry Cows
        # Drying off details
        module = DDRules  # Module used to apply the irrigation
        dry_prop = 1.0  # Proportion of cows to dry off [0-1]
        on start_of_day:
```
            if (DDRules.Cow_IsDry) then
               DDRules.DryOffProportion = [dry_prop]
            else
               DDRules.DryOffProportion = 0.0
            endif
```
    outputfile Paddock Status
      variables
        variables: dd/mm/yyyy as Date, PaddockStatus
      events Reporting Frequency: event=Daily
    manager Calculations
      on start_of_day:
```
DM_Eaten_plus_Silage = DM_Eaten_Pasture + DM_Eaten_Silage

DM_Eaten_All = DM_Eaten_Pasture + DM_Eaten_Silage + DM_Eaten_Supplement
```
      on end_of_day:
      script: same as in Milking Platform.Calculations
    outputfile Outputfile Nitrogen
      variables
        variables: dd/mm/yyyy as Date, N_Eaten, N_Out, N_Eaten_Pasture, N_Eaten_Silage, N_Eaten_Supplement, N_to_BC, N_to_feaces, N_to_milk, N_to_urine, NIntakeBalance, NOutBalance, NTotalBalance, TotalNIn, TotalNOut
      events Reporting Frequency: event=Daily
    manager Nitrogen Calcs
      on start_of_day:
```
TotalNIn = N_Eaten_Pasture + N_Eaten_Silage + N_Eaten_Supplement
NIntakeBalance = TotalNIn - N_Eaten

TotalNOut = N_to_BC + N_to_feaces + N_to_milk + N_to_urine
NOutBalance = TotalNOut - N_Out

NTotalBalance = NIntakeBalance - NOutBalance
```
    outputfile Simple Cows
      variables
        variables: dd/mm/yyyy as Date, TotalCows, DryCows, MilkingCows
      events Reporting Frequency: event=Daily
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