folder Simulations: version=32
  simulation Ludf
    clock
      start_date = 01/07/2002  # Enter the start date of the simulation
      end_date = 30/06/2011  # Enter the end date of the simulation
    metfile met: filename=%apsim%\Examples\MetFiles\lincoln.met
    summaryfile
    DDRules
    folder Grazing Managment
      manager Farm Settings
        #
        farm_area = 160  # Effective Farm Area (ha)
        stocking_rate = 3.75  # Stocking Rate at Peak Milk (cows/ha)
        Live_Wt = 531, 430, 437, 444, 451, 465, 475, 475, 476, 484, 500, 515  # kgLWt [July-June]
        Eff_Paddocks = 10T, 11P, 12P  # Effluent paddock names
        silage_on_hand = 2500  # Quantity of silage on farm at start of simulation (kgDM/ha)
        energy_content = 11.5  # Quality of silage on farm at start of simulation (ME/kgDM)
        Lane_Paddocks = Lanes  # Laneway paddocks
        Lane_Time = 24  # Time in laneways [0-24]
        Milk_Time = 0  # Time in the milking shed [0-24]
        apply_fert_to_eff_pdks = 0  # Apply fertiliser to effluent paddocks
        on init:
```
DDRules.FarmArea = [farm_area]
!DDRules.ApplyFertToEffluentPdks = [apply_fert_to_eff_pdks]
DDRules.PeakStockingRate = [stocking_rate]
DDRules.StockingRate = [stocking_rate]
!DDRules.SupplementME = 12.5
!DDRules.SupplementN = 0.035
!DDRules.SupplementWastage = 0
!DDRules.SupplementDigestibility = 0.7


DDRules.AllocationType = 1
!DDRules.SilageME = [energy_content]
DDRules.SilageStore_kgha = [silage_on_hand]
!DDRules.SilageWastage = 0.15
DDRules.HoursInDairyShed = [Milk_Time]

DDRules.LanewayPaddocks = '[Lane_Paddocks]'
DDRules.ProportionOfFarmInLaneWays = 0.05
DDRules.HoursOnLaneWays = [Lane_Time]
```
      manager2 Farm Setting Script
        MilkCurveString = 0.00, 1.50, 1.91, 2.01, 1.86, 1.67, 1.58, 1.48, 1.42, 1.33, 1.12, 0.00  # Milk Curve [kgMS/day [July to June]
        LWtString = 531,430,437,444,451,465,475,475,476,484,500,515  # LWt [July to June]
        EffPaddockStrings = 10T, 11P, 12P  # Effluent Paddocks
        GrazingIntByMnth = 20, 25, 30, 40, 50, 100, 100, 80, 50, 25, 20, 20  # Grazing interval by month [Jan-Dec]
        myGrazingInterval_ = 30
        GrazingResByMnth = 1600, 1600, 1600, 1500, 1400, 1200, 1200, 1400, 1500, 1500, 1500, 1500  # Grazing residual by month [Jun-May]
        GrazingResValByMnth = 1600, 1600, 1600, 1600, 1600, 1200, 1200, 1600, 1600, 1600, 1600, 1600  # Grazing residual by month (Val) [Jun-May]
        myGrazingResidual_ = 1600
        WinterOffDryStock_ = 1
        DCWO_ = 01-May
        DSWO_ = 01-Aug
        PWO_ = 0.0
        Dry_Off_Proportion = 0  # Proportion of cows dried off
        a_RPM_ = 500  # intercept of the Rising Plate Meter equation
        b_RPM_ = 140  # slope of the Rising Plate Meter equation
        RotationInterval_ = 21
        DefaultPastureMetE = 11.5  # Default pasture metabolisable energy
        SupplementME_ = 12.5
        SupplementN_ = 0.018
        SupplementWastage_ = 0.0
        SupplementDigestibility_ = 0.8
        GrassSilageSupplementME_ = 10
        GrassSilageSupplementN_ = 0.035
        GrassSilageSupplementWastage_ = 0.0
        GrassSilageSupplementDigestibility_ = 0.7
        GrainOrConcentrateSupplementME_ = 12
        GrainOrConcentrateSupplementN_ = 0.018
        GrainOrConcentrateSupplementWastage_ = 0.0
        GrainOrConcentrateSupplementDigestibility_ = 0.8
        SilageCutWastage_ = 0.05
        SilageWastage_ = 0.15
        SilageME_ = 10.5  # DefaultSilageME
        SilageN_ = 0.035
        SilageQualityModifier_ = 0.9
        SilageDigestibility_ = 0.68
        EffluentPaddocksPercentage_ = 1.0
        MovingAverageSeriesLength_ = 7
        SurplusCover_ = 0.2
        Stocking_Rate_Threshold_ = 0.1
        PreGrazingCoverTarget_ = 4000  # calcPre
        MaxPreGrazingCoverTarget_ = 10000  # maxPre
        Live_Weight_ = 480
        ConditionScore_ = 3
        BC_ = 3.8,3.9,4.2,4.4,4.5,5.1,5,5.1,4,3.8,3.9,3.9  # BC [Jan to Dec]
        Default_N_Conc_ = 0.035
        Default_Digestibility_ = 0.68
        DefaultApplicationDepth_ = 300  # Default Urea Application Depth
```csharp
          using System;
          using ModelFramework;
          using System.Globalization;

          public class Script
          {
          [Param()]
          private string GrazingIntByMnth;
          [Param()]
          private string MilkCurveString;
          [Param()]
          private string LWtString;
          [Param()]
          private string EffPaddockStrings;
          [Param()]
          private string GrazingResByMnth;
          [Param()]
          private string GrazingResValByMnth;
          [Param()]
          private string myGrazingResidual_;
          [Param()]
          private string myGrazingInterval_;
          [Param()]
          private string WinterOffDryStock_;
          [Param()]
          private string DCWO_;
          [Param()]
          private string DSWO_;
          [Param()]
          private string PWO_;
 	       [Param()]
          private string Dry_Off_Proportion;
          [Param()]
	       private string DefaultPastureMetE;
          [Param()]
          private string a_RPM_;
          [Param()]
          private string b_RPM_;
          [Param()]
          private string RotationInterval_;
          [Param()]
          private string SupplementME_;
          [Param()]
          private string SupplementN_;
          [Param()]
          private string SupplementWastage_;
          [Param()]
          private string SupplementDigestibility_;
          [Param()]
          private string GrassSilageSupplementME_;
          [Param()]
          private string GrassSilageSupplementN_;
          [Param()]
          private string GrassSilageSupplementWastage_;
          [Param()]
          private string GrassSilageSupplementDigestibility_;
          [Param()]
          private string GrainOrConcentrateSupplementME_;
          [Param()]
          private string GrainOrConcentrateSupplementN_;
          [Param()]
          private string GrainOrConcentrateSupplementWastage_;
          [Param()]
          private string GrainOrConcentrateSupplementDigestibility_;
          [Param()]
          private string SilageCutWastage_;
          [Param()]
          private string SilageWastage_;
          [Param()]
          private string SilageME_;
          [Param()]
          private string SilageN_;
          [Param()]
          private string SilageQualityModifier_;
          [Param()]
          private string SilageDigestibility_;
          [Param()]
          private string EffluentPaddocksPercentage_;
          [Param()]
          private string MovingAverageSeriesLength_;
          [Param()]
          private string SurplusCover_;
          [Param()]
          private string Stocking_Rate_Threshold_;
          [Param()]
          private string PreGrazingCoverTarget_;
          [Param()]
          private string MaxPreGrazingCoverTarget_;
          [Param()]
          private string Live_Weight_;
          [Param()]
          private string ConditionScore_;
          [Param()]
          private string BC_ ;
          [Param()]
          private string Default_N_Conc_;
          [Param()]
          private string Default_Digestibility_;
          [Param()]
          private string DefaultApplicationDepth_;

          [Link()]
          public DDRules MyDDRules;

          [EventHandler]
          public void OnInitialised()
          {
          // Console.Out.WriteLine(GrazingIntByMnth);
          MyDDRules.GrazingIntervalByMonth = GrazingIntByMnth;
          MyDDRules.GrazingResidualByMonth = GrazingResByMnth;
          MyDDRules.GrazingInterval = Int32.Parse(myGrazingInterval_);
          MyDDRules.GrazingResidual = Int32.Parse(myGrazingResidual_);
          MyDDRules.GrazingResidualValByMonth = GrazingResValByMnth;
          MyDDRules.MilkCurve = MilkCurveString;
          MyDDRules.LWtCurve = LWtString;
          MyDDRules.EffluentPaddocks = strToStringArray(EffPaddockStrings);
          // MyDDRules.Variable("GrazingResidualValByMonth").Set("1600, 1600, 1600, 1600, 1600, 1200, 1200, 1600, 1600, 1600, 1600, 1600");
          MyDDRules.DefaultPastureMetEnergy = DefaultPastureMetE;

          MyDDRules.WinterOffDryStock__ = int.Parse(WinterOffDryStock_);

          MyDDRules.DCWO__ = DCWO_;
          MyDDRules.DSWO__ = DSWO_;
          MyDDRules.PWO__ = float.Parse(PWO_, CultureInfo.InvariantCulture);

          MyDDRules.DryOffProportion = Double.Parse(Dry_Off_Proportion);

          MyDDRules.a_RPM__ = Double.Parse(a_RPM_);
          MyDDRules.b_RPM__ = Double.Parse(b_RPM_);

          MyDDRules.RotationInterval__ = Int32.Parse(RotationInterval_);

          MyDDRules.SupplementME__ = Double.Parse(SupplementME_);
          MyDDRules.SupplementN__ = Double.Parse(SupplementN_);
          MyDDRules.SupplementWastage__ = Double.Parse(SupplementWastage_);
          MyDDRules.SupplementDigestibility__ = Double.Parse(SupplementDigestibility_);

          MyDDRules.GrassSilageSupplementME__ = Double.Parse(GrassSilageSupplementME_);
          MyDDRules.GrassSilageSupplementN__ = Double.Parse(GrassSilageSupplementN_);
          MyDDRules.GrassSilageSupplementWastage__ = Double.Parse(GrassSilageSupplementWastage_);
          MyDDRules.GrassSilageSupplementDigestibility__ = Double.Parse(GrassSilageSupplementDigestibility_);

          MyDDRules.GrainOrConcentrateSupplementME__ = Double.Parse(GrainOrConcentrateSupplementME_);
          MyDDRules.GrainOrConcentrateSupplementN__ = Double.Parse(GrainOrConcentrateSupplementN_);
          MyDDRules.GrainOrConcentrateSupplementWastage__ = Double.Parse(GrainOrConcentrateSupplementWastage_);
          MyDDRules.GrainOrConcentrateSupplementDigestibility__ = Double.Parse(GrainOrConcentrateSupplementDigestibility_);

          MyDDRules.SilageCutWastage__ = Double.Parse(SilageCutWastage_);
          MyDDRules.SilageWastage__ = Double.Parse(SilageWastage_);
          
          MyDDRules.SilageME__ = Double.Parse(SilageME_);
          MyDDRules.SilageN__ = Double.Parse(SilageN_);
          MyDDRules.SilageQualityModifier__ = Double.Parse(SilageQualityModifier_);
          MyDDRules.SilageDigestibility__ = Double.Parse(SilageDigestibility_);

          MyDDRules.EffluentPaddocksPercentage = Double.Parse(EffluentPaddocksPercentage_);
          MyDDRules.GrowthRateWindowSize = Int32.Parse(MovingAverageSeriesLength_);

          MyDDRules.SurplusCover = Double.Parse(SurplusCover_);
          MyDDRules.Stocking_Rate_Threshold__ = Double.Parse(Stocking_Rate_Threshold_);
          MyDDRules.PreGrazingCoverTarget__ = Double.Parse(PreGrazingCoverTarget_);
          MyDDRules.MaxPreGrazingCoverTarget__ = Double.Parse(MaxPreGrazingCoverTarget_);
          MyDDRules.Live_Weight__ = Double.Parse(Live_Weight_);
          MyDDRules.ConditionScore__ = Double.Parse(ConditionScore_);
          MyDDRules.Cow_BC_ByMonth = BC_;
          
      
          MyDDRules.Default_N_Conc__ = Double.Parse(Default_N_Conc_);
          MyDDRules.Default_Digestibility__ = Double.Parse(Default_Digestibility_);
          MyDDRules.DefaultApplicationDepth__= Double.Parse(DefaultApplicationDepth_);
      

          }

          private Double strToDouble(String strValue) {
          return Double.Parse(strValue);
          }

     private Double[] strToDoubleArray(String strValue, int length) {
      // Console.Out.WriteLine(strValue);
       Double[] values = new Double[length];
       String[] strValues = strValue.Split(',');
       for (int i = 0; i < length; i++) {
         values[i] = Double.Parse(strValues[i]);
      }
      return values;
   }

   private int[] strToIntArray(String strValue, int length) {
      Console.Out.WriteLine(strValue);
      int[] values = new int[length];
      String[] strValues = strValue.Split(',');
      for (int i = 0; i < length; i++) {
         values[i] = int.Parse(strValues[i]);
      }
      return values;
   }
   
   private String[] strToStringArray(String strValue) {
      return strValue.Split(',');      
   }
   
   [EventHandler] public void OnPrepare()
   {

   }   
}
```
      operations Operations Fertiliser
        01-Aug  DDRules ApplyFertiliser amount = 10 (kg/ha), depth = 0 (mm), type = urea_N()
        01-Oct  DDRules ApplyFertiliser amount = 10 (kg/ha), depth = 0 (mm), type = urea_N()
        01-Nov  DDRules ApplyFertiliser amount = 10 (kg/ha), depth = 0 (mm), type = urea_N()
        01-Dec  DDRules ApplyFertiliser amount = 10 (kg/ha), depth = 0 (mm), type = urea_N()
        01-Jan  DDRules ApplyFertiliser amount = 10 (kg/ha), depth = 0 (mm), type = urea_N()
        01-Feb  DDRules ApplyFertiliser amount = 10 (kg/ha), depth = 0 (mm), type = urea_N()
        01-Mar  DDRules ApplyFertiliser amount = 10 (kg/ha), depth = 0 (mm), type = urea_N()
        01-Apr  DDRules ApplyFertiliser amount = 10 (kg/ha), depth = 0 (mm), type = urea_N()
        01-Sep  DDRules ApplyFertiliser amount = 10 (kg/ha), depth = 0 (mm), type = urea_N()
        01-may  DDRules ApplyFertiliser amount = 10 (kg/ha), depth = 0 (mm), type = urea_N()
        15-Aug  DDRules ApplyFertiliser amount = 10 (kg/ha), depth = 0 (mm), type = urea_N()
        15-Sep  DDRules ApplyFertiliser amount = 10 (kg/ha), depth = 0 (mm), type = urea_N()
        15-Oct  DDRules ApplyFertiliser amount = 10 (kg/ha), depth = 0 (mm), type = urea_N()
        15-Nov  DDRules ApplyFertiliser amount = 10 (kg/ha), depth = 0 (mm), type = urea_N()
        15-Dec  DDRules ApplyFertiliser amount = 10 (kg/ha), depth = 0 (mm), type = urea_N()
        15-Jan  DDRules ApplyFertiliser amount = 10 (kg/ha), depth = 0 (mm), type = urea_N()
        15-Feb  DDRules ApplyFertiliser amount = 10 (kg/ha), depth = 0 (mm), type = urea_N()
        15-Mar  DDRules ApplyFertiliser amount = 10 (kg/ha), depth = 0 (mm), type = urea_N()
        15-Apr  DDRules ApplyFertiliser amount = 10 (kg/ha), depth = 0 (mm), type = urea_N()
        15-May  DDRules ApplyFertiliser amount = 10 (kg/ha), depth = 0 (mm), type = urea_N()
      manager Conservation Settings
        #
        start_date = 15-Sep  # Enter start date (dd-mmm)
        finish_date = 15-Feb  # Enter finish date (dd-mmm)
        trigger_mass = 0  # Close paddock if pasture mass exceeds (kg/ha)
        residual = 1500  # Pasture residual after cut (kgDM/ha)
        silage_store = yes  # Store conserved feed for later use
        energy_content = 11.5  # Energy content of conversed feed (ME/kgDM)
        cutting_waste = 0  # Silage cut wasteage [%]
        on init:
```
ConservationStart = '[start_date]'
ConservationFinish = '[finish_date]'
!ConservationTrigger = [trigger_mass]
!ConservationResidual = [residual]
!SilageCutWastage = [cutting_waste]
!SilageME = [energy_content]

if '[silage_store]' = 'yes' then
   SilageStoreEnable = 1
else
   SilageStoreEnable = 0
endif
```
      manager Winter Dry Cows (disabled)
        # Drying off details
        module = DDRules  # Module used to apply the irrigation
        dry_prop = 1.0  # Proportion of cows to dry off [0-1]
        on start_of_day:
```
            if (DDRules.Cow_IsDry) then
               DDRules.DryOffProportion = [dry_prop]
            endif
```
      manager2 Stocking Rates
```csharp
using System;
using System.Collections.Generic;
using ModelFramework;

public class Script
   {
   [Link()]
   public DDRules MyDDRules;
   [Link()]
   public Clock clock;
   
   Dictionary<DateTime, double> peak;
   Dictionary<int, double> dry;
   
   [EventHandler] public void OnInitialised()
   {
      peak = new Dictionary<DateTime, double>();
      peak.Add(new DateTime(2003, 7, 1), 4.05);
      peak.Add(new DateTime(2004, 7, 1), 4.05);
      peak.Add(new DateTime(2005, 7, 1), 4.05);
      peak.Add(new DateTime(2006, 7, 1), 4.15);
      peak.Add(new DateTime(2007, 7, 1), 4.20);
      peak.Add(new DateTime(2008, 7, 1), 4.25);
      peak.Add(new DateTime(2009, 7, 1), 4.13);
      peak.Add(new DateTime(2010, 7, 1), 4.18);
      
      dry = new Dictionary<int, double>();
      dry.Add(7, 1.00);
      dry.Add(8, 0.60);
      dry.Add(9, 0.20);
      dry.Add(10, 0.00);
      dry.Add(11, 0.00);
      dry.Add(12, 0.00);
      dry.Add(1, 0.00);
      dry.Add(2, 0.00);
      dry.Add(3, 0.00);
      dry.Add(4, 0.10);
      dry.Add(5, 0.35);
      dry.Add(6, 1.00);
   }
   
   [EventHandler] public void OnPrepare()
   {
      double x;
      if (peak.TryGetValue(new DateTime(clock.year, clock.month, clock.day_of_month), out x)) {
         MyDDRules.PeakStockingRate = x;
      }         
      if (dry.TryGetValue(clock.month, out x)) {
         MyDDRules.DryOffProportion = x;
      }         
   }   
}
```
      manager2 Grazing
```csharp
using System;
using System.Collections.Generic;
using ModelFramework;

public class Script
   {
   [Link()]
   public DDRules MyDDRules;
   [Link()]
   public Clock clock;
   
   Dictionary<DateTime, GrazeData> grazing;
   
   [EventHandler] public void OnInitialised()
   {
      grazing = new Dictionary<DateTime, GrazeData>();
      GrazeData temp = new GrazeData(new DateTime(0001, 3, 1), 1480, 28); 
      grazing.Add(temp.date, temp);
      temp = new GrazeData(new DateTime(1904, 4, 1), 1480, 34); 
      grazing.Add(temp.date, temp);
      temp = new GrazeData(new DateTime(1904, 5, 1), 1480, 55); 
      grazing.Add(temp.date, temp);
      temp = new GrazeData(new DateTime(1904, 6, 1), 1480, 408); 
      grazing.Add(temp.date, temp);
      temp = new GrazeData(new DateTime(1904, 7, 1), 1480, 227); 
      grazing.Add(temp.date, temp);
      temp = new GrazeData(new DateTime(1904, 8, 1), 1480, 75); 
      grazing.Add(temp.date, temp);
      temp = new GrazeData(new DateTime(1904, 9, 1), 1480, 38); 
      grazing.Add(temp.date, temp);
      temp = new GrazeData(new DateTime(1904, 10, 1), 1480, 21); 
      grazing.Add(temp.date, temp);
      temp = new GrazeData(new DateTime(1904, 11, 1), 1480, 21); 
      grazing.Add(temp.date, temp);
      temp = new GrazeData(new DateTime(1904, 12, 1), 1480, 21); 
      grazing.Add(temp.date, temp);
      temp = new GrazeData(new DateTime(1904, 1, 1), 1480, 21); 
      grazing.Add(temp.date, temp);
      temp = new GrazeData(new DateTime(1904, 2, 1), 1480, 21); 
      grazing.Add(temp.date, temp);
   }
   
   [EventHandler] public void OnPrepare()
   {
      GrazeData x;
      if (grazing.TryGetValue(new DateTime(1904, clock.month, clock.day_of_month), out x)) {
         MyDDRules.GrazingResidual = x.residual;
         MyDDRules.GrazingInterval = x.rotation;
      }         
   } 
   
   public class GrazeData {
      public DateTime date;
      public int residual;
      public int rotation;
      
      public GrazeData(DateTime date, int residual, int rotation) {
         this.date = date;
         this.residual = residual;
         this.rotation = rotation;
      }
   }
}
```
    folder Pasture Managment
      manager2 Centre Pivot
        trigger = 0.75  # Propoertion of Plant Avalible Water to irrigate at [0-1]
        mmAmount = 5.5  # Application Amount (mm)
        eff = 0.8  # Irrigation Efficiency [0-1]
        depth = 300  # Depth to calculate soil moisture (mm)
```csharp
using System;
using ModelFramework;

// Very simple centre pivot irrigator. When the soil moisture is less than the trigger an fix amount of water is applied to all paddocks.
public class Script 
{      
   [Link] Paddock MyPaddock; // Can be used to dynamically get access to simulation structure and variables
   [Input] DateTime Today;   // Equates to the value of the current simulation date - value comes from CLOCK
   [Param] double trigger;         
   [Param] double depth;         
   [Param] float mmAmount;         
   [Param] float eff;         
   [Output] double Irrigation;

   
   // The following event handler will be called once at the beginning of the simulation
   [EventHandler] public void OnInitialised()
   {
      Irrigation = 0;
   }
      
   // The following event handler will be called each day at the beginning of the day
   [EventHandler] public void OnPrepare()      
   {
      Irrigation = 0;
   }
   
   [EventHandler] public void OnProcess() 
   {
      if (PlantAvalibleWater(depth) < trigger) {
         Irrigation += mmAmount;
         IrrigationApplicationType data = new IrrigationApplicationType();
         data.Amount = mmAmount * eff;
         
         foreach (Paddock pdk in MyPaddock.ChildPaddocks) {
            apply(pdk, data);
            Console.Out.WriteLine("Irrigating paddock " + pdk.Name + " with " + mmAmount + "mm");
         }  
      }
   }
   
   public double PlantAvalibleWater(double atDepth) {
      double totalWater = 0;
      double totalArea = 0;
      foreach(Paddock pdk in MyPaddock.ChildPaddocks) {
         double swd = PlantAvalibleWater(pdk, atDepth);
         double pdkArea = 1;
         //if (!pdk.Get("Area", out pdkArea)) {
         //   pdkArea = 1;
         //}
            
         totalArea += pdkArea;
         totalWater += (swd * pdkArea);
      }
      Console.Out.WriteLine("Irrigating: totalWater = " + totalWater + "mm");
      Console.Out.WriteLine("Irrigating: totalArea = " + totalArea);
      Console.Out.WriteLine("Irrigating: PAW = " + (totalWater / totalArea) + "mm");
      return totalWater / totalArea;
   }
   
   public double PlantAvalibleWater(Paddock pdk, double atDepth) {
      ModelFramework.SoilWat SoilWater;
      SoilWater = (ModelFramework.SoilWat) pdk.LinkByType("SoilWat");

      float[] sw_dep = SoilWater.sw_dep; 
      float[] dul_dep = SoilWater.dul_dep; 
      float[] ll15_dep = SoilWater.ll15_dep; 
      float[] dLayer = SoilWater.dlayer;
      double Stored = 0.0;
      double Possible = 0.0;
      double CumDepth = 0.0;
      for (int z = 0; z < dLayer.Length; z++) {
         CumDepth += dLayer[z];
         Stored += (sw_dep[z] - ll15_dep[z]) * Math.Min(1.0, Math.Max(0.0, (1.0 - (CumDepth - atDepth) / dLayer[z])));
         Possible += (dul_dep[z] - ll15_dep[z]) * Math.Min(1.0, Math.Max(0.0, (1.0 - (CumDepth - atDepth) / dLayer[z])));
      }

      return Stored / Possible;
   }  
   
   public void apply(Paddock pdk, IrrigationApplicationType data) {
      Irrigation myIrrigation = (Irrigation)pdk.LinkByType("Irrigation");
      myIrrigation.Apply(data);
   }
   }
```
      manager2 Fertiliser Application (disabled)
        trigger = 0.75  # Enter sw deficit to irrigate at (mm)
        mmAmount = 5.5  # Application Amount (mm)
        eff = 0.8  # Irrigation Efficiency [0-1]
        depth = 300  # Depth to calculate soil moisture (mm)
```csharp
using System;
using ModelFramework;

// Very simple centre pivot irrigator. When the soil moisture is less than the trigger an fix amount of water is applied to all paddocks.
public class Script 
{      
   [Link] Paddock MyPaddock; // Can be used to dynamically get access to simulation structure and variables
   [Input] DateTime Today;   // Equates to the value of the current simulation date - value comes from CLOCK
   [Param] double trigger;         
   [Param] double depth;         
   [Param] float mmAmount;         
   [Param] float eff;         
   [Output] double Fertiliser;

   
   // The following event handler will be called once at the beginning of the simulation
   [EventHandler] public void OnInitialised()
   {
      Fertiliser = 0;
   }
      
   // The following event handler will be called each day at the beginning of the day
   [EventHandler] public void OnPrepare()      
   {
      Fertiliser = 0;
   }
   
   [Event] public event OnFertiliseDelegate On_Apply_Fertiliser;
   public void On_Apply_Fertiliser(FertiliserApplicationType data) {
      Console.WriteLine("Fertiliser Event Called " + data.Amount);
      //Irrigation myIrrigation = (Irrigation)pdk.LinkByType("Irrigation");
      //myIrrigation.Apply(data);
   }
   }
```
    area 01T
      AgPasture ryegrass_clover
        Nspecies = 2  # Number of species
        thisCropName = ryegrass_clover  # Crop name shown as on the simulation tree
        cropName = ryegrass whiteclover  # Species names
        dmtotal = 2500      350  # Initial shoot dry matter (kg/ha)
        dmlitter = 250        50  # Initial litter dry matter (kg/ha)
        dmgreenmin = 500        50  # Minimum green dry matter (kg/ha)
        rootDepth = 900        400  # Root depth (mm)
        rlvp = 1.0 1.0  # Root distribution parameter ([0-1] relative to Root depth)
        WaterUptakeSource = calc  # Water uptake done by AgPasture (calc) or by apsim?
      micromet
        soilalbedo = 0.23
        a_interception = 0
        b_interception = 0
        c_interception = 0
        d_interception = 0
      fertiliser
      surfaceom Surface Organic Matter
        PoolName = AgPasture  # Organic Matter pool name
        type = grass  # Organic Matter type
        mass = 1000  # Initial surface residue (kg/ha)
        cnr = 15  # C:N ratio of initial residue
        standing_fraction = 0  # Fraction of residue standing
      irrigation
        automatic_irrigation = off
        asw_depth = 600  # Depth to which ASW is calculated. (mm)
        crit_fr_asw = 0.5  # Fraction of ASW below which irrigation is applied (0-1.0)
        irrigation_efficiency = 1  # Efficiency of the irrigation. (0-1.0)
        irrigation_allocation = off  # Allocation limits
        allocation = 0  # Allocation in mm
        default_no3_conc = 0  # Nitrate concentration (ppm N)
        default_nh4_conc = 0  # Ammonium concentration (ppm N)
        default_cl_conc = 0  # Chloride concentration (ppm Cl)
      outputfile: filename=Ludf 01T.out; title=Ludf 01T
        variables
          variables: dd/mmm/yyyy as Date, AboveGroundWt, HerbageGrowthWt, AboveGroundLiveWt, AboveGroundDeadWt, stemsenescedwt, StolonWt, no3, nh4, urea, fertiliser, runoff, irrigation, rain, rainfall, irrig_loss, irrigation, irrig_tot
        events Reporting Frequency: event=end_day
      soil TemukaLike: Region=Plains; State=Canterbury; Country=New Zealand
        DataSource=Generic profile descriptions provided by Trevor Webb and data for functional horizions based on SWAMP project results
        Comments=Bulk density values were measured on the fine earth fraction so values entered into apsim soil are adjusted down to account for stone content (assuming stones are inert from all soil process so their mass and volume is removed from model paramaters).  SAT, DUL, LL15 and Air dry have been adjusted down to account for stone content.  OC has not been adjusted so the model will get the correct carbon and N amounts using the adjusted BD.
        SoilType = NZ_sedementary  # Soil description
        Analysis
          Layer:
            Thickness (mm)  Rocks (%)  PH (1:5 water)  CEC (cmol+/kg)  ParticleSizeSand (%)  ParticleSizeSilt (%)  ParticleSizeClay (%)
            250             0          6               13              14.5                  65.5                  20
            200             0          6               19              7.7976                53.8624               38.34
            400             0          6               19              1                     55                    44
            250             0          6               9               15                    66                    19
            400             0          6               9               15                    66                    19
        Water
          Layer:
            Thickness (mm)  KS (mm/day)  BD (g/cc)  Airdry (mm/mm)  LL15 (mm/mm)  DUL (mm/mm)  SAT (mm/mm)
            250             4832.04      1.3105     0.07675         0.1535        0.3735       0.456165
            200             720          1.42       0.3             0.3           0.43         0.45
            400             19.0512      1.424      0.308           0.308         0.446        0.4557
            250             97.995       1.601      0.162           0.162         0.325        0.37572
            400             97.995       1.601      0.162           0.162         0.325        0.37572
          SoilCrop Barley
            Layer:
              Thickness (mm)  LL (mm/mm)  kl (/day)   xf (0-1)
              250             0.1535      0.220855    1
              200             0.3         0.238897    1
              400             0.308       0.0409162   1
              250             0.162       0.0217893   1
              400             0.162       0.00528755  1
          SoilCrop Canola
            Layer:
              Thickness (mm)  LL (mm/mm)  kl (/day)   xf (0-1)
              250             0.1535      0.220855    1
              200             0.3         0.238897    0.825307
              400             0.308       0.0409162   0.316004
              250             0.162       0.0217893   0.510686
              400             0.162       0.00528755  0.510686
          SoilCrop Cloverseed
            Layer:
              Thickness (mm)  LL (mm/mm)  kl (/day)    xf (0-1)
              250             0.1535      0.154575     1
              200             0.3         0.0679578    1
              400             0.308       0.0122099    0.435178
              250             0.162       0.00439625   0.731982
              400             0.162       0.000616139  0.731982
          SoilCrop Fieldpea
            Layer:
              Thickness (mm)  LL (mm/mm)  kl (/day)   xf (0-1)
              250             0.1535      0.200508    1
              200             0.3         0.168828    0.449329
              400             0.308       0.0215978   0.201897
              250             0.162       0.00844899  0.301194
              400             0.162       0.00122552  0.301194
          SoilCrop Fababean
            Layer:
              Thickness (mm)  LL (mm/mm)  kl (/day)  xf (0-1)
              250             0.1535      0.240379   1
              200             0.3         0.284483   0.825307
              400             0.308       0.10758    0.316004
              250             0.162       0.0467416  0.510686
              400             0.162       0.020134   0.510686
          SoilCrop kale: same as Ludf.01T.TemukaLike.Water.Canola
          SoilCrop ItallianRyegrass: same as Ludf.01T.TemukaLike.Water.Canola
          SoilCrop Lucerne
            Layer:
              Thickness (mm)  LL (mm/mm)  kl (/day)  xf (0-1)
              250             0.1535      0.20426    1
              200             0.3         0.303078   1
              400             0.308       0.175193   1
              250             0.162       0.0795588  1
              400             0.162       0.0441555  1
          SoilCrop Maize
            Layer:
              Thickness (mm)  LL (mm/mm)  kl (/day)  xf (0-1)
              250             0.1535      0.249634   1
              200             0.3         0.313183   0.825307
              400             0.308       0.177124   0.316004
              250             0.162       0.0759389  0.510686
              400             0.162       0.0347419  0.510686
          SoilCrop Oats
            Layer:
              Thickness (mm)  LL (mm/mm)  kl (/day)   xf (0-1)
              250             0.1535      0.220855    1
              200             0.3         0.238897    1
              400             0.308       0.0409162   0.435178
              250             0.162       0.0217893   0.731982
              400             0.162       0.00528755  0.731982
          SoilCrop Potato
            Layer:
              Thickness (mm)  LL (mm/mm)  kl (/day)    xf (0-1)
              250             0.1535      0.17408      1
              200             0.3         0.0539383    0.449329
              400             0.308       0.00485778   0.201897
              250             0.162       0.00100537   0.301194
              400             0.162       6.16568e-05  0.301194
          SoilCrop Grassseed
            Layer:
              Thickness (mm)  LL (mm/mm)  kl (/day)    xf (0-1)
              250             0.1535      0.180564     1
              200             0.3         0.0930868    0.825307
              400             0.308       0.0106384    0.316004
              250             0.162       0.00296644   0.510686
              400             0.162       0.000275799  0.510686
          SoilCrop Triticale: same as Ludf.01T.TemukaLike.Water.Oats
          SoilCrop Wheat: same as Ludf.01T.TemukaLike.Water.Oats
          SoilCrop ryegrass_clover: same as Ludf.01T.TemukaLike.Water.Grassseed
          SoilCrop ryegrass: same as Ludf.01T.TemukaLike.Water.Grassseed
          SoilCrop whiteclover: same as Ludf.01T.TemukaLike.Water.Fieldpea
        SoilWat: SummerCona=4.4; SummerU=9; SummerDate=1-Oct; WinterCona=3; WinterU=6; WinterDate=1-Apr; DiffusConst=88; DiffusSlope=35; Salb=0.13; Cn2Bare=73; CnRed=20; CnCov=0.8
          Layer:
            Thickness (mm)  SWCON (0-1)
            250             0.496442
            200             0.14775
            400             0.0758548
            250             0.306273
            400             0.306273
        SoilOrganicMatter: RootCn=40; RootWt=1000; SoilCn=11; EnrACoeff=7.4; EnrBCoeff=0.2
          Layer:
            Thickness (mm)  OC (Total %)  FBIOM (0-1)  FINERT (0-1)
            250             5.29822       0.0288947    0.696896
            200             1.22931       0.0148983    0.845673
            400             0.293377      0.0108097    0.937255
            250             0.206935      0.0101152    0.976333
            400             0.200515      0.0100164    0.991073
        InitWater
          percentmethod: percent=1; distributed=filled from top
        Sample Initial nitrogen
          Layer:
            Thickness  no3 (kg/ha)  nh4 (kg/ha)
            200        30           5
            1800       20           1
    area 02T
      AgPasture ryegrass_clover: same as Ludf.01T.ryegrass_clover
      micromet
        soilalbedo = 0.23
        a_interception = 0
        b_interception = 0
        c_interception = 0
        d_interception = 0
      fertiliser
      surfaceom Surface Organic Matter
        PoolName = AgPasture  # Organic Matter pool name
        type = grass  # Organic Matter type
        mass = 1000  # Initial surface residue (kg/ha)
        cnr = 15  # C:N ratio of initial residue
        standing_fraction = 0  # Fraction of residue standing
      irrigation: same as Ludf.01T.Irrigation
      outputfile: filename=Ludf 02T.out; title=Ludf 02T
        variables
          variables: dd/mmm/yyyy as Date, AboveGroundWt, HerbageGrowthWt, AboveGroundLiveWt, AboveGroundDeadWt, stemsenescedwt, StolonWt, HerbageGrowthWt
        events Reporting Frequency: event=end_day
      soil TemukaLike: same as Ludf.01T.TemukaLike
    area 03T
      AgPasture ryegrass_clover: same as Ludf.01T.ryegrass_clover
      micromet
        soilalbedo = 0.23
        a_interception = 0
        b_interception = 0
        c_interception = 0
        d_interception = 0
      fertiliser
      surfaceom Surface Organic Matter
        PoolName = AgPasture  # Organic Matter pool name
        type = grass  # Organic Matter type
        mass = 1000  # Initial surface residue (kg/ha)
        cnr = 15  # C:N ratio of initial residue
        standing_fraction = 0  # Fraction of residue standing
      irrigation: same as Ludf.01T.Irrigation
      outputfile: filename=Ludf 03T.out; title=Ludf 03T
        variables
          variables: dd/mmm/yyyy as Date, AboveGroundWt, HerbageGrowthWt, AboveGroundLiveWt, AboveGroundDeadWt, stemsenescedwt, StolonWt, HerbageGrowthWt
        events Reporting Frequency: event=end_day
      soil TemukaLike: same as Ludf.01T.TemukaLike
    area 04T
      AgPasture ryegrass_clover: same as Ludf.01T.ryegrass_clover
      micromet
        soilalbedo = 0.23
        a_interception = 0
        b_interception = 0
        c_interception = 0
        d_interception = 0
      fertiliser
      surfaceom Surface Organic Matter
        PoolName = AgPasture  # Organic Matter pool name
        type = grass  # Organic Matter type
        mass = 1000  # Initial surface residue (kg/ha)
        cnr = 15  # C:N ratio of initial residue
        standing_fraction = 0  # Fraction of residue standing
      irrigation: same as Ludf.01T.Irrigation
      outputfile: filename=Ludf 04T.out; title=Ludf 04T
        variables
          variables: dd/mmm/yyyy as Date, AboveGroundWt, HerbageGrowthWt, AboveGroundLiveWt, AboveGroundDeadWt, stemsenescedwt, StolonWt, HerbageGrowthWt
        events Reporting Frequency: event=end_day
      soil TemukaLike: same as Ludf.01T.TemukaLike
    area 05T
      AgPasture ryegrass_clover: same as Ludf.01T.ryegrass_clover
      micromet
        soilalbedo = 0.23
        a_interception = 0
        b_interception = 0
        c_interception = 0
        d_interception = 0
      fertiliser
      surfaceom Surface Organic Matter
        PoolName = AgPasture  # Organic Matter pool name
        type = grass  # Organic Matter type
        mass = 1000  # Initial surface residue (kg/ha)
        cnr = 15  # C:N ratio of initial residue
        standing_fraction = 0  # Fraction of residue standing
      irrigation: same as Ludf.01T.Irrigation
      outputfile: filename=Ludf 05T.out; title=Ludf 05T
        variables
          variables: dd/mmm/yyyy as Date, AboveGroundWt, HerbageGrowthWt, AboveGroundLiveWt, AboveGroundDeadWt, stemsenescedwt, StolonWt, HerbageGrowthWt
        events Reporting Frequency: event=end_day
      soil TemukaLike: same as Ludf.01T.TemukaLike
    area 06T
      AgPasture ryegrass_clover: same as Ludf.01T.ryegrass_clover
      micromet
        soilalbedo = 0.23
        a_interception = 0
        b_interception = 0
        c_interception = 0
        d_interception = 0
      fertiliser
      surfaceom Surface Organic Matter
        PoolName = AgPasture  # Organic Matter pool name
        type = grass  # Organic Matter type
        mass = 1000  # Initial surface residue (kg/ha)
        cnr = 15  # C:N ratio of initial residue
        standing_fraction = 0  # Fraction of residue standing
      irrigation: same as Ludf.01T.Irrigation
      outputfile: filename=Ludf 06T.out; title=Ludf 06T
        variables
          variables: dd/mmm/yyyy as Date, AboveGroundWt, HerbageGrowthWt, AboveGroundLiveWt, AboveGroundDeadWt, stemsenescedwt, StolonWt, HerbageGrowthWt
        events Reporting Frequency: event=end_day
      soil TemukaLike: same as Ludf.01T.TemukaLike
    area 07T
      AgPasture ryegrass_clover: same as Ludf.01T.ryegrass_clover
      micromet
        soilalbedo = 0.23
        a_interception = 0
        b_interception = 0
        c_interception = 0
        d_interception = 0
      fertiliser
      surfaceom Surface Organic Matter
        PoolName = AgPasture  # Organic Matter pool name
        type = grass  # Organic Matter type
        mass = 1000  # Initial surface residue (kg/ha)
        cnr = 15  # C:N ratio of initial residue
        standing_fraction = 0  # Fraction of residue standing
      irrigation: same as Ludf.01T.Irrigation
      outputfile: filename=Ludf 07T.out; title=Ludf 07T
        variables
          variables: dd/mmm/yyyy as Date, AboveGroundWt, HerbageGrowthWt, AboveGroundLiveWt, AboveGroundDeadWt, stemsenescedwt, StolonWt, HerbageGrowthWt
        events Reporting Frequency: event=end_day
      soil TemukaLike: same as Ludf.01T.TemukaLike
    area 08T
      AgPasture ryegrass_clover: same as Ludf.01T.ryegrass_clover
      micromet
        soilalbedo = 0.23
        a_interception = 0
        b_interception = 0
        c_interception = 0
        d_interception = 0
      fertiliser
      surfaceom Surface Organic Matter
        PoolName = AgPasture  # Organic Matter pool name
        type = grass  # Organic Matter type
        mass = 1000  # Initial surface residue (kg/ha)
        cnr = 15  # C:N ratio of initial residue
        standing_fraction = 0  # Fraction of residue standing
      irrigation: same as Ludf.01T.Irrigation
      outputfile: filename=Ludf 08T.out; title=Ludf 08T
        variables
          variables: dd/mmm/yyyy as Date, AboveGroundWt, HerbageGrowthWt, AboveGroundLiveWt, AboveGroundDeadWt, stemsenescedwt, StolonWt, HerbageGrowthWt
        events Reporting Frequency: event=end_day
      soil TemukaLike: same as Ludf.01T.TemukaLike
    area 09T
      AgPasture ryegrass_clover: same as Ludf.01T.ryegrass_clover
      micromet
        soilalbedo = 0.23
        a_interception = 0
        b_interception = 0
        c_interception = 0
        d_interception = 0
      fertiliser
      surfaceom Surface Organic Matter
        PoolName = AgPasture  # Organic Matter pool name
        type = grass  # Organic Matter type
        mass = 1000  # Initial surface residue (kg/ha)
        cnr = 15  # C:N ratio of initial residue
        standing_fraction = 0  # Fraction of residue standing
      irrigation: same as Ludf.01T.Irrigation
      outputfile: filename=Ludf 09T.out; title=Ludf 09T
        variables
          variables: dd/mmm/yyyy as Date, AboveGroundWt, HerbageGrowthWt, AboveGroundLiveWt, AboveGroundDeadWt, stemsenescedwt, StolonWt, HerbageGrowthWt
        events Reporting Frequency: event=end_day
      soil TemukaLike: same as Ludf.01T.TemukaLike
    area 10T -> /Simulations/Ludf/01T
      outputfile: filename=Ludf 10T.out; title=Ludf 10T
        variables -> /Simulations/Ludf/01T/outputfile/Variables
        events Reporting Frequency -> /Simulations/Ludf/01T/outputfile/Reporting Frequency
    area 11P
      AgPasture ryegrass_clover: same as Ludf.01T.ryegrass_clover
      micromet
        soilalbedo = 0.23
        a_interception = 0
        b_interception = 0
        c_interception = 0
        d_interception = 0
      fertiliser
      surfaceom Surface Organic Matter
        PoolName = AgPasture  # Organic Matter pool name
        type = grass  # Organic Matter type
        mass = 1000  # Initial surface residue (kg/ha)
        cnr = 15  # C:N ratio of initial residue
        standing_fraction = 0  # Fraction of residue standing
      irrigation: same as Ludf.01T.Irrigation
      outputfile: filename=Ludf 11P.out; title=Ludf 11P
        variables
          variables: dd/mmm/yyyy as Date, AboveGroundWt, HerbageGrowthWt, AboveGroundLiveWt, AboveGroundDeadWt, stemsenescedwt, StolonWt, no3, nh4, urea, fertiliser, runoff, irrigation, rain, rainfall, irrig_loss, irrigation, irrig_tot
        events Reporting Frequency: event=end_day
      soil PaparuaLike
        SoilType = NZ_sedementary  # Soil description
        Site = -
        NearestTown = -
        Region = Plains
        State = Canterbury
        Country = New Zealand
        DataSource = Generic profile descriptions provided by Trevor Webb and data for functional horizions based on SWAMP project results
        Comments = VERY ROUGH based on discussion with Trevor Webb - taken from the "Canterbury Light" generic soil but no stones untiol 0.7 m - assume soil properties from 30 cm apply down to 70 cm.Bulk density values were measured on the fine earth fraction so values entered into apsim soil are adjusted down to account for stone content (assuming stones are inert from all soil process so their mass and volume is removed from model paramaters).  SAT, DUL, LL15 and Air dry have been adjusted down to account for stone content.  OC has not been adjusted so the model will get the correct carbon and N amounts using the adjusted BD.
        Analysis
          Layer:
            Thickness (mm)  Rocks (%)  PH (1:5 water)  CEC (cmol+/kg)  ParticleSizeSand (%)  ParticleSizeSilt (%)  ParticleSizeClay (%)
            200             0          6               13              14.5                  65.5                  20
            150             0          6               9               26.5                  60.5                  13
            150             0          6               9               17.7956               69.4244               12.78
            200             0          6               5               37.7916               57.0964               5.112
            300             80         6               4               39.7912               55.0968               5.112
            500             80         6               4               39.7912               55.0968               5.112
        Water
          Layer:
            Thickness (mm)  KS (mm/day)  BD (g/cc)  Airdry (mm/mm)  LL15 (mm/mm)  DUL (mm/mm)  SAT (mm/mm)
            200             4832.04      1.3105     0.07675         0.1535        0.3735       0.456165
            150             4715.08      1.474      0.152           0.152         0.32         0.41292
            150             720          1.474      0.152           0.152         0.32         0.413
            200             16800        1.474      0.152           0.152         0.32         0.413
            300             24000        0.2        0.008           0.008         0.022        0.1
            500             24000        0.2        0.008           0.008         0.022        0.1
          SoilCrop Barley
            Layer:
              Thickness (mm)  LL (mm/mm)  kl (/day)  xf (0-1)
              200             0.1535      0.236583   1
              150             0.152       0.28592    1
              150             0.05        0.286      1
              200             0.014       0.286      1
              300             0.008       0.234779   1
              500             0.008       0.0354191  1
          SoilCrop Canola: same as Ludf.11P.PaparuaLike.Water.Barley
          SoilCrop Cloverseed
            Layer:
              Thickness (mm)  LL (mm/mm)  kl (/day)   xf (0-1)
              200             0.1535      0.179407    1
              150             0.152       0.137126    1
              150             0.05        0.137       1
              200             0.014       0.137       1
              300             0.008       0.0479326   1
              500             0.008       0.00398922  1
          SoilCrop Fieldpea
            Layer:
              Thickness (mm)  LL (mm/mm)  kl (/day)   xf (0-1)
              200             0.1535      0.220855    1
              150             0.152       0.257553    1
              150             0.05        0.258       0.67032
              200             0.014       0.258       1
              300             0.008       0.0941019   0.67032
              500             0.008       0.00796968  0.67032
          SoilCrop Fababean
            Layer:
              Thickness (mm)  LL (mm/mm)  kl (/day)  xf (0-1)
              200             0.1535      0.251453   1
              150             0.152       0.330259   1
              150             0.05        0.33       1
              200             0.014       0.33       1
              300             0.008       0.466488   1
              500             0.008       0.150739   1
          SoilCrop kale: same as Ludf.11P.PaparuaLike.Water.Barley
          SoilCrop ItallianRyegrass: same as Ludf.11P.PaparuaLike.Water.Barley
          SoilCrop Lucerne
            Layer:
              Thickness (mm)  LL (mm/mm)  kl (/day)  xf (0-1)
              200             0.1535      0.20426    1
              150             0.152       0.31077    1
              150             0.05        0.311      1
              200             0.014       0.311      1
              300             0.008       0.615175   1
              500             0.008       0.37501    1
          SoilCrop Maize
            Layer:
              Thickness (mm)  LL (mm/mm)  kl (/day)  xf (0-1)
              200             0.1535      0.258678   1
              150             0.152       0.351398   1
              150             0.05        0.351      1
              200             0.014       0.351      1
              300             0.008       0.613657   1
              500             0.008       0.287755   1
          SoilCrop Oats: same as Ludf.11P.PaparuaLike.Water.Barley
          SoilCrop Potato
            Layer:
              Thickness (mm)  LL (mm/mm)  kl (/day)    xf (0-1)
              200             0.1535      0.188424     1
              150             0.152       0.135922     1
              150             0.05        0.136        0.67032
              200             0.014       0.136        1
              300             0.008       0.0131205    0.67032
              500             0.008       0.000397606  0.67032
          SoilCrop Grassseed
            Layer:
              Thickness (mm)  LL (mm/mm)  kl (/day)   xf (0-1)
              200             0.1535      0.204584    1
              150             0.152       0.200483    1
              150             0.05        0.2         1
              200             0.014       0.2         1
              300             0.008       0.0354191   1
              500             0.008       0.00178129  1
          SoilCrop Triticale: same as Ludf.11P.PaparuaLike.Water.Barley
          SoilCrop Wheat: same as Ludf.11P.PaparuaLike.Water.Barley
          SoilCrop ryegrass_clover: same as Ludf.11P.PaparuaLike.Water.Grassseed
          SoilCrop ryegrass: same as Ludf.11P.PaparuaLike.Water.Grassseed
          SoilCrop whiteclover: same as Ludf.11P.PaparuaLike.Water.Fieldpea
        SoilWat: SummerCona=4.4; SummerU=9; SummerDate=1-Oct; WinterCona=3; WinterU=6; WinterDate=1-Apr; DiffusConst=88; DiffusSlope=35; Salb=0.13; Cn2Bare=73; CnRed=20; CnCov=0.8
          Layer:
            Thickness (mm)  SWCON (0-1)
            200             0.496442
            150             0.56107
            150             0.561
            200             0.561
            300             0.6506
            500             0.6506
        SoilOrganicMatter: RootCn=40; RootWt=1000; SoilCn=11; EnrACoeff=7.4; EnrBCoeff=0.2
          Layer:
            Thickness (mm)  OC (Total %)  FBIOM (0-1)  FINERT (0-1)
            200             2.88977       0.0319525    0.493608
            150             0.971538      0.017682     0.700441
            150             0.80854       0.0131233    0.808993
            200             0.800258      0.0110929    0.887009
            300             0.800002      0.0102439    0.946627
            500             0.8           0.0100221    0.983924
        InitWater
          percentmethod: percent=1; distributed=filled from top
        Sample Initial nitrogen
          Layer:
            Thickness  no3 (kg/ha)  nh4 (kg/ha)
            200        30           5
            1800       20           1
    area 12P
      AgPasture ryegrass_clover: same as Ludf.01T.ryegrass_clover
      micromet
        soilalbedo = 0.23
        a_interception = 0
        b_interception = 0
        c_interception = 0
        d_interception = 0
      fertiliser
      surfaceom Surface Organic Matter
        PoolName = AgPasture  # Organic Matter pool name
        type = grass  # Organic Matter type
        mass = 1000  # Initial surface residue (kg/ha)
        cnr = 15  # C:N ratio of initial residue
        standing_fraction = 0  # Fraction of residue standing
      irrigation: same as Ludf.01T.Irrigation
      outputfile: filename=Ludf 12P.out; title=Ludf 12P
        variables
          variables: dd/mmm/yyyy as Date, AboveGroundWt, HerbageGrowthWt, AboveGroundLiveWt, AboveGroundDeadWt, stemsenescedwt, StolonWt, no3, nh4, urea, fertiliser, runoff, irrigation, rain, rainfall, irrig_loss, irrigation, irrig_tot
        events Reporting Frequency: event=end_day
      soil PaparuaLike: same as Ludf.11P.PaparuaLike
    area 13P
      AgPasture ryegrass_clover: same as Ludf.01T.ryegrass_clover
      micromet
        soilalbedo = 0.23
        a_interception = 0
        b_interception = 0
        c_interception = 0
        d_interception = 0
      fertiliser
      surfaceom Surface Organic Matter
        PoolName = AgPasture  # Organic Matter pool name
        type = grass  # Organic Matter type
        mass = 1000  # Initial surface residue (kg/ha)
        cnr = 15  # C:N ratio of initial residue
        standing_fraction = 0  # Fraction of residue standing
      irrigation: same as Ludf.01T.Irrigation
      outputfile: filename=Ludf 13P.out; title=Ludf 13P
        variables
          variables: dd/mmm/yyyy as Date, AboveGroundWt, HerbageGrowthWt, AboveGroundLiveWt, AboveGroundDeadWt, stemsenescedwt, StolonWt, no3, nh4, urea, fertiliser, runoff, irrigation, rain, rainfall, irrig_loss, irrigation, irrig_tot
        events Reporting Frequency: event=end_day
      soil PaparuaLike: same as Ludf.11P.PaparuaLike
    area 14P
      AgPasture ryegrass_clover: same as Ludf.01T.ryegrass_clover
      micromet
        soilalbedo = 0.23
        a_interception = 0
        b_interception = 0
        c_interception = 0
        d_interception = 0
      fertiliser
      surfaceom Surface Organic Matter
        PoolName = AgPasture  # Organic Matter pool name
        type = grass  # Organic Matter type
        mass = 1000  # Initial surface residue (kg/ha)
        cnr = 15  # C:N ratio of initial residue
        standing_fraction = 0  # Fraction of residue standing
      irrigation: same as Ludf.01T.Irrigation
      outputfile: filename=Ludf 14P.out; title=Ludf 14P
        variables
          variables: dd/mmm/yyyy as Date, AboveGroundWt, HerbageGrowthWt, AboveGroundLiveWt, AboveGroundDeadWt, stemsenescedwt, StolonWt, no3, nh4, urea, fertiliser, runoff, irrigation, rain, rainfall, irrig_loss, irrigation, irrig_tot
        events Reporting Frequency: event=end_day
      soil PaparuaLike: same as Ludf.11P.PaparuaLike
    area 15P
      AgPasture ryegrass_clover: same as Ludf.01T.ryegrass_clover
      micromet
        soilalbedo = 0.23
        a_interception = 0
        b_interception = 0
        c_interception = 0
        d_interception = 0
      fertiliser
      surfaceom Surface Organic Matter
        PoolName = AgPasture  # Organic Matter pool name
        type = grass  # Organic Matter type
        mass = 1000  # Initial surface residue (kg/ha)
        cnr = 15  # C:N ratio of initial residue
        standing_fraction = 0  # Fraction of residue standing
      irrigation: same as Ludf.01T.Irrigation
      outputfile: filename=Ludf 15P.out; title=Ludf 15P
        variables
          variables: dd/mmm/yyyy as Date, AboveGroundWt, HerbageGrowthWt, AboveGroundLiveWt, AboveGroundDeadWt, stemsenescedwt, StolonWt, no3, nh4, urea, fertiliser
        events Reporting Frequency: event=end_day
      soil PaparuaLike: same as Ludf.11P.PaparuaLike
    area 16P
      AgPasture ryegrass_clover: same as Ludf.01T.ryegrass_clover
      micromet
        soilalbedo = 0.23
        a_interception = 0
        b_interception = 0
        c_interception = 0
        d_interception = 0
      fertiliser
      surfaceom Surface Organic Matter
        PoolName = AgPasture  # Organic Matter pool name
        type = grass  # Organic Matter type
        mass = 1000  # Initial surface residue (kg/ha)
        cnr = 15  # C:N ratio of initial residue
        standing_fraction = 0  # Fraction of residue standing
      irrigation: same as Ludf.01T.Irrigation
      outputfile: filename=Ludf 16P.out; title=Ludf 16P
        variables
          variables: dd/mmm/yyyy as Date, AboveGroundWt, HerbageGrowthWt, AboveGroundLiveWt, AboveGroundDeadWt, stemsenescedwt, StolonWt, no3, nh4, urea, fertiliser
        events Reporting Frequency: event=end_day
      soil PaparuaLike: same as Ludf.11P.PaparuaLike
    area 17P
      AgPasture ryegrass_clover: same as Ludf.01T.ryegrass_clover
      micromet
        soilalbedo = 0.23
        a_interception = 0
        b_interception = 0
        c_interception = 0
        d_interception = 0
      fertiliser
      surfaceom Surface Organic Matter
        PoolName = AgPasture  # Organic Matter pool name
        type = grass  # Organic Matter type
        mass = 1000  # Initial surface residue (kg/ha)
        cnr = 15  # C:N ratio of initial residue
        standing_fraction = 0  # Fraction of residue standing
      irrigation: same as Ludf.01T.Irrigation
      outputfile: filename=Ludf 17P.out; title=Ludf 17P
        variables
          variables: dd/mmm/yyyy as Date, AboveGroundWt, HerbageGrowthWt, AboveGroundLiveWt, AboveGroundDeadWt, stemsenescedwt, StolonWt, no3, nh4, urea, fertiliser
        events Reporting Frequency: event=end_day
      soil PaparuaLike: same as Ludf.11P.PaparuaLike
    area 18P
      AgPasture ryegrass_clover: same as Ludf.01T.ryegrass_clover
      micromet
        soilalbedo = 0.23
        a_interception = 0
        b_interception = 0
        c_interception = 0
        d_interception = 0
      fertiliser
      surfaceom Surface Organic Matter
        PoolName = AgPasture  # Organic Matter pool name
        type = grass  # Organic Matter type
        mass = 1000  # Initial surface residue (kg/ha)
        cnr = 15  # C:N ratio of initial residue
        standing_fraction = 0  # Fraction of residue standing
      irrigation: same as Ludf.01T.Irrigation
      outputfile: filename=Ludf 18P.out; title=Ludf 18P
        variables
          variables: dd/mmm/yyyy as Date, AboveGroundWt, HerbageGrowthWt, AboveGroundLiveWt, AboveGroundDeadWt, stemsenescedwt, StolonWt, no3, nh4, urea, fertiliser
        events Reporting Frequency: event=end_day
      soil PaparuaLike: same as Ludf.11P.PaparuaLike
    area 19P
      AgPasture ryegrass_clover: same as Ludf.01T.ryegrass_clover
      micromet
        soilalbedo = 0.23
        a_interception = 0
        b_interception = 0
        c_interception = 0
        d_interception = 0
      fertiliser
      surfaceom Surface Organic Matter
        PoolName = AgPasture  # Organic Matter pool name
        type = grass  # Organic Matter type
        mass = 1000  # Initial surface residue (kg/ha)
        cnr = 15  # C:N ratio of initial residue
        standing_fraction = 0  # Fraction of residue standing
      irrigation: same as Ludf.01T.Irrigation
      outputfile: filename=Ludf 19P.out; title=Ludf 19P
        variables
          variables: dd/mmm/yyyy as Date, AboveGroundWt, HerbageGrowthWt, AboveGroundLiveWt, AboveGroundDeadWt, stemsenescedwt, StolonWt, no3, nh4, urea, fertiliser
        events Reporting Frequency: event=end_day
      soil PaparuaLike: same as Ludf.11P.PaparuaLike
    area 20P
      AgPasture ryegrass_clover: same as Ludf.01T.ryegrass_clover
      micromet
        soilalbedo = 0.23
        a_interception = 0
        b_interception = 0
        c_interception = 0
        d_interception = 0
      fertiliser
      surfaceom Surface Organic Matter
        PoolName = AgPasture  # Organic Matter pool name
        type = grass  # Organic Matter type
        mass = 1000  # Initial surface residue (kg/ha)
        cnr = 15  # C:N ratio of initial residue
        standing_fraction = 0  # Fraction of residue standing
      irrigation: same as Ludf.01T.Irrigation
      outputfile: filename=Ludf 20P.out; title=Ludf 20P
        variables
          variables: dd/mmm/yyyy as Date, AboveGroundWt, HerbageGrowthWt, AboveGroundLiveWt, AboveGroundDeadWt, stemsenescedwt, StolonWt, no3, nh4, urea, fertiliser
        events Reporting Frequency: event=end_day
      soil PaparuaLike: same as Ludf.11P.PaparuaLike
    area 21E
      AgPasture ryegrass_clover: same as Ludf.01T.ryegrass_clover
      micromet
        soilalbedo = 0.23
        a_interception = 0
        b_interception = 0
        c_interception = 0
        d_interception = 0
      fertiliser
      surfaceom Surface Organic Matter
        PoolName = AgPasture  # Organic Matter pool name
        type = grass  # Organic Matter type
        mass = 1000  # Initial surface residue (kg/ha)
        cnr = 15  # C:N ratio of initial residue
        standing_fraction = 0  # Fraction of residue standing
      irrigation: same as Ludf.01T.Irrigation
      outputfile: filename=Ludf 21E.out; title=Ludf 21E
        variables
          variables: dd/mmm/yyyy as Date, AboveGroundWt, HerbageGrowthWt, AboveGroundLiveWt, AboveGroundDeadWt, stemsenescedwt, StolonWt, no3, nh4, urea, fertiliser
        events Reporting Frequency: event=end_day
      soil EyreLike
        SoilType = NZ_sedementary  # Soil description
        Site = -
        NearestTown = -
        Region = Plains
        State = Canterbury
        Country = New Zealand
        DataSource = Generic profile descriptions provided by Trevor Webb and data for functional horizions based on SWAMP project results
        Comments = Trevor Webb says Eyre soils are not at the extreme end of the possibilities for this soil name.  Based on Eyre stony (less stones).  Bulk density values were measured on the fine earth fraction so values entered into apsim soil are adjusted down to account for stone content (assuming stones are inert from all soil process so their mass and volume is removed from model paramaters).  SAT, DUL, LL15 and Air dry have been adjusted down to account for stone content.  OC has not been adjusted so the model will get the correct carbon and N amounts using the adjusted BD.
        Analysis
          Layer:
            Thickness (mm)  Rocks (%)  PH (1:5 water)  CEC (cmol+/kg)  ParticleSizeSand (%)  ParticleSizeSilt (%)  ParticleSizeClay (%)
            120             10         6               13              12.7966               66.7554               20.448
            50              15         6               9               12.7966               66.7554               20.448
            150             50         6               8               15.796                76.536                7.668
            300             65         6               5               37.7916               57.0964               5.112
            380             75         6               4               39.7912               55.0968               5.112
            500             75         6               4               39.7912               55.0968               5.112
        Water
          Layer:
            Thickness (mm)  KS (mm/day)  BD (g/cc)  Airdry (mm/mm)  LL15 (mm/mm)  DUL (mm/mm)  SAT (mm/mm)
            120             7200         1.17       0.072           0.144         0.342        0.423
            50              7200         1.105      0.068           0.136         0.323        0.3995
            150             12000        0.7        0.03            0.03          0.175        0.215
            300             16800        0.455      0.014           0.014         0.0455       0.14
            380             24000        0.25       0.01            0.01          0.0275       0.125
            500             24000        0.25       0.01            0.01          0.0275       0.125
          SoilCrop Barley
            Layer:
              Thickness (mm)  LL (mm/mm)  kl (/day)  xf (0-1)
              120             0.144       0.304413   1
              50              0.136       0.316452   1
              150             0.03        0.330953   1
              300             0.014       0.525406   1
              380             0.01        0.21174    1
              500             0.01        0.0303872  1
          SoilCrop Canola: same as Ludf.21E.EyreLike.Water.Barley
          SoilCrop Cloverseed
            Layer:
              Thickness (mm)  LL (mm/mm)  kl (/day)   xf (0-1)
              120             0.144       0.233223    1
              50              0.136       0.229006    1
              150             0.03        0.180537    1
              300             0.014       0.172449    1
              380             0.01        0.0412621   1
              500             0.01        0.00339304  1
          SoilCrop Fieldpea
            Layer:
              Thickness (mm)  LL (mm/mm)  kl (/day)   xf (0-1)
              120             0.144       0.295617    1
              50              0.136       0.301008    1
              150             0.03        0.286816    1
              300             0.014       0.328348    1
              380             0.01        0.0819977   0.67032
              500             0.01        0.00678614  0.67032
          SoilCrop Fababean
            Layer:
              Thickness (mm)  LL (mm/mm)  kl (/day)  xf (0-1)
              120             0.144       0.31277    1
              50              0.136       0.330014   1
              150             0.03        0.376275   1
              300             0.014       0.697699   1
              380             0.01        0.442327   1
              500             0.01        0.133242   1
          SoilCrop kale: same as Ludf.21E.EyreLike.Water.Barley
          SoilCrop ItallianRyegrass: same as Ludf.21E.EyreLike.Water.Barley
          SoilCrop Lucerne
            Layer:
              Thickness (mm)  LL (mm/mm)  kl (/day)  xf (0-1)
              120             0.144       0.241856   1
              50              0.136       0.264555   1
              150             0.03        0.341835   1
              300             0.014       0.77884    1
              380             0.01        0.595774   1
              500             0.01        0.348871   1
          SoilCrop Maize
            Layer:
              Thickness (mm)  LL (mm/mm)  kl (/day)  xf (0-1)
              120             0.144       0.316904   1
              50              0.136       0.336154   1
              150             0.03        0.397309   1
              300             0.014       0.775067   1
              380             0.01        0.594207   1
              500             0.01        0.262663   1
          SoilCrop Oats: same as Ludf.21E.EyreLike.Water.Barley
          SoilCrop Potato
            Layer:
              Thickness (mm)  LL (mm/mm)  kl (/day)    xf (0-1)
              120             0.144       0.27597      1
              50              0.136       0.266046     1
              150             0.03        0.191355     1
              300             0.014       0.0966877    1
              380             0.01        0.011188     0.67032
              500             0.01        0.000337847  0.67032
          SoilCrop Grassseed
            Layer:
              Thickness (mm)  LL (mm/mm)  kl (/day)   xf (0-1)
              120             0.144       0.286157    1
              50              0.136       0.283984    1
              150             0.03        0.251558    1
              300             0.014       0.185874    1
              380             0.01        0.0303872   1
              500             0.01        0.00151415  1
          SoilCrop Triticale: same as Ludf.21E.EyreLike.Water.Barley
          SoilCrop Wheat: same as Ludf.21E.EyreLike.Water.Barley
          SoilCrop ryegrass_clover: same as Ludf.21E.EyreLike.Water.Grassseed
          SoilCrop ryegrass: same as Ludf.21E.EyreLike.Water.Grassseed
          SoilCrop whiteclover: same as Ludf.21E.EyreLike.Water.Fieldpea
        SoilWat: SummerCona=4.4; SummerU=9; SummerDate=1-Oct; WinterCona=3; WinterU=6; WinterDate=1-Apr; DiffusConst=88; DiffusSlope=35; Salb=0.13; Cn2Bare=73; CnRed=20; CnCov=0.8
          Layer:
            Thickness (mm)  SWCON (0-1)
            120             0.457632
            50              0.520003
            150             0.650583
            300             0.650598
            380             0.6506
            500             0.6506
        SoilOrganicMatter: RootCn=40; RootWt=1000; SoilCn=11; EnrACoeff=7.4; EnrBCoeff=0.2
          Layer:
            Thickness (mm)  OC (Total %)  FBIOM (0-1)  FINERT (0-1)
            120             2.45608       0.0379071    0.350351
            50              2.45608       0.0267581    0.496576
            150             1.36156       0.019197     0.627055
            300             0.558945      0.0123842    0.810112
            380             0.41047       0.01031      0.931528
            500             0.40031       0.0100221    0.981709
        InitWater
          percentmethod: percent=1; distributed=filled from top
        Sample Initial nitrogen
          Layer:
            Thickness  no3 (kg/ha)  nh4 (kg/ha)
            200        30           5
            1800       20           1
    area Lanes
      AgPasture ryegrass_clover: same as Ludf.01T.ryegrass_clover
      micromet
        soilalbedo = 0.23
        a_interception = 0
        b_interception = 0
        c_interception = 0
        d_interception = 0
      fertiliser
      surfaceom Surface Organic Matter
        PoolName = AgPasture  # Organic Matter pool name
        type = grass  # Organic Matter type
        mass = 1000  # Initial surface residue (kg/ha)
        cnr = 15  # C:N ratio of initial residue
        standing_fraction = 0  # Fraction of residue standing
      irrigation: same as Ludf.01T.Irrigation
      outputfile: filename=Ludf Lanes.out; title=Ludf Lanes
        variables
          variables: dd/mmm/yyyy as Date, AboveGroundWt, HerbageGrowthWt, AboveGroundLiveWt, AboveGroundDeadWt, stemsenescedwt, StolonWt, no3, nh4, urea, fertiliser
        events Reporting Frequency: event=end_day
      soil EyreLike: same as Ludf.21E.EyreLike
    memo
      	Note: If you have Observered data for some samplings but not others, then in the .out file (for the observations) you can use * or ?  for those missing values instead of using 0

      	This allows you to tell the difference between data you did not collect, and data that actually had a value of 0

      	Data with a * or ? is not plotted on the graph (hence neither is its predicted value) whereas data with 0 is.
    memo: same as Ludf.memo
    memo: same as Ludf.memo
    memo: same as Ludf.memo
    manager ValidationManager
      on init:
```
Nitrogen_Cum = 0
MS_ha_day_cum = 0
Irrigation_Cum = 0
DM_Growth_Cum = 0
Silage_Cut_Cum = 0
Silage_Fed_Cum = 0
DM_Eaten_Cum = 0
DM_Eaten_Pasture_Cum = 0
DM_Eaten_Silage_Cum = 0
```
      on start_of_day:
```
if (today = date('01-jul-2004')) then
      Irrigation_Cum = 0
endif
if (today = date('01-jul')) then
   Nitrogen_Cum = 0
   MS_ha_day_cum = 0
   DM_Growth_Cum = 0
   Silage_Cut_Cum = 0
   Silage_Fed_Cum = 0
   DM_Eaten_Cum = 0
   DM_Eaten_Pasture_Cum = 0
   DM_Eaten_Silage_Cum = 0
endif

Nitrogen_Cum = Fertiliser + Nitrogen_Cum
MS_ha_day_cum = MilkSolids_Ha + MS_ha_day_cum
Irrigation_Cum = Irrigation + Irrigation_Cum
```
      on end_of_day:
```
DM_Growth_Cum = AverageGrowthRate + DM_Growth_Cum
Silage_Cut_Cum = Silage_Cut_Cum + SilageCut_kgha
Silage_Fed_Cum = Silage_Fed_Cum + SilageFedOut_kgha
DM_Eaten_Cum = DM_Eaten_Cum + DM_Eaten
DM_Eaten_Pasture_Cum = DM_Eaten_Pasture_Cum + DM_Eaten_Pasture
DM_Eaten_Silage_Cum = DM_Eaten_Silage_Cum + DM_Eaten_Silage
```
    manager Nitrogen Calcs
      on start_of_day:
```
TotalNIn = 0
NIntakeBalance = 0
TotalNOut = 0
NOutBalance = 0
NTotalBalance = 0
```
      on end_of_day:
```
TotalNIn = N_Eaten_Pasture + N_Eaten_Supplement
NIntakeBalance = TotalNIn - N_Eaten

TotalNOut = N_to_BC + N_to_faeces + N_to_milk + N_to_urine
NOutBalance = TotalNOut - N_Out

NTotalBalance = NIntakeBalance - NOutBalance
```
    outputfile ValidationData: filename=Ludf ValidationData.out; title=Ludf ValidationData
      variables
        variable:
          dd/mm/yyyy as Date
          AverageFarmCover as Average_Cover
          AverageGrowthRate as Pasture_growth_Rate
          Irrigation
          Fertiliser
          MilkingCows as Cows_Milked
          TotalCows
          MilkSolids_Ha as MS_Ha_Day
          Nitrogen_Cum
          Irrigation
          Irrigation_Cum
          MS_ha_day_cum
          rain as rainfall
          Irrigation_Cum
          DM_Growth_Cum
      events Reporting Frequency: event=Daily
    outputfile: filename=Ludf.out; title=Ludf
      variables
        variables: dd/mm/yyyy as Date, DM_Eaten_Pasture, Silage_Cut_Cum, Silage_Fed_Cum, DM_Eaten_Pasture_Cum, DM_Eaten_Silage_Cum, DM_Eaten_Cum, FeedSituation
      events Reporting Frequency: event=Daily  # End of daily simulation time step
    outputfile Outputfile Nitrogen: filename=Ludf Outputfile Nitrogen.out; title=Ludf Outputfile Nitrogen
      variables
        variables: dd/mm/yyyy as Date, N_Eaten, N_Eaten_Pasture, N_Eaten_Silage, N_Eaten_Supplement, N_Out, N_to_BC, N_to_faeces, N_to_milk, N_to_urine, NIntakeBalance, NOutBalance, NTotalBalance
      events Reporting Frequency: event=Daily  # End of daily simulation time step
    outputfile Cover: filename=Ludf Cover.out; title=Ludf Cover
      variables
        variable:
          dd/mm/yyyy as Date
          AverageFarmCover
          AverageGrowthRate
          SilageCut_kgha
          SilageFedOut_kgha
          SilageStore_kgha
          SupplementFedOut_kgha
          IdealPreGrazingCover
          IdealAvgGrazingCover
          GrazingResidual
          AverageCoverClicks
          AverageFarmCoverWeekly as Average_Cover
          preGrazeCovers
          postGrazeCovers
      events Reporting Frequency: event=end_week
      memo: same as Ludf.memo
    outputfile Cows: filename=Ludf Cows.out; title=Ludf Cows
      variables
        variables: dd/mm/yyyy as Date, StockingRate, DM_Eaten_Cow, ME_Demand_Cow, ME_Eaten, MilkSolids_Cow
      events Reporting Frequency: event=Daily  # End of daily simulation time step
    memo: same as Ludf.memo
    memo: same as Ludf.memo
    memo: same as Ludf.memo
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