folder simulations: version=28
  simulation testUrine
    manager2 FarmSimOptions
      # FARMSIM
      UI_FarmType = SheepAndBeef  # Choose the farm type
      # Soil type
      UI_SoilType = VeryLight  # Choose the soil type in the farm
      # Fertiliser parameter
      UI_FertLevel = High  # Choose the fertiliser level
      # Dairy farm specific parameters
      UI_StockRate = 3  # Choose the cow stocking rate (2-5cows /ha)
      UI_SuppType = GrainOrConcentrate  # Choose the type of supplement
      # Sheep and beef farm specific parameter
      UI_BeefPercentage = 100  # Choose the percentage of beef stock units on the farm (0, 10, 20, 50 or 100%)
      # Irrigation parameters
      UI_IrrigSeason = Long  # Choose season length - None, Short (Oct-Mar), or Long (Aug-Apr)?
      UI_IrrigAmount_type = Scheduled  # How is the irrigation amount determined?
      UI_IrrigAmount_FixedAmount = 30  # If fixed, what is the amount applied at each irrigation?
      UI_IrrigAmount_RefillPercentage = 95  # If sheduled, what is the percentage of PAW after irrigation (80-100%)?
      UI_IrrigInterval_type = Scheduled  # How the irrigation interval is determined?
      UI_IrrigInterval_FixedInterval = 5  # If fixed, what is the interval between irrigations (days)?
      UI_IrrigInterval_TriggerPercentage = 75  # If sheduled, at what percentage of PAW does irrigation start (50-75%)?
```vb
Imports System
Imports ModelFramework

Public Class Script
   Inherits Instance

   <Param()><Output()> Public UI_FarmType As String
   <Param()><Output()> Public UI_SoilType As String
   <Param()><Output()> Public UI_FertLevel As String
   <Param()><Output()> Public UI_StockRate As Single
   <Param()><Output()> Public UI_SuppType As String
   <Param()><Output()> Public UI_BeefPercentage As Single
   
   <Param()><Output()> Public UI_IrrigSeason  As String
   <Param()><Output()> Public UI_IrrigAmount_type As String
   <Param()><Output()> Public UI_IrrigAmount_FixedAmount As Single
   <Param()><Output()> Public UI_IrrigAmount_RefillPercentage As Single
   <Param()><Output()> Public UI_IrrigInterval_type As String
   <Param()><Output()> Public UI_IrrigInterval_FixedInterval As Single
   <Param()><Output()> Public UI_IrrigInterval_TriggerPercentage As Single


   '<EventHandler()> Public Sub OnInit2()

     

   'End Sub
   
End Class
```
    DDRules
    clock
      start_date = 01/07/1988  # Enter the start date of the simulation
      end_date = 30/07/1989  # Enter the end date of the simulation
    metfile met: filename=%apsim%\Examples\MetFiles\WinchmoreMet.met
    summaryfile
    outputfile DDRules Outputs: filename=testUrine DDRules Outputs.out; title=testUrine DDRules Outputs
      variables
        variables: dd/mm/yyyy as Date, DM_Eaten, DM_Eaten_Pasture, DM_Eaten_Supplement, SilageCut, DM_Eaten_Cow, DM_Eaten_Pasture_Cow, DM_Eaten_Supplement_Cow, MilkProduction, BaseStockingRate, sr, DM_Eaten_Pdks, PWO, PaddockStatus, ME_Demand_Maintance, ME_Demand_Lactation, ME_Demand_Pregnancy, ME_Demand_WeightChange, ME_Demand_Walking, Cow_LWt, Cow_BC, Cow_MilkSolids, ME_Demand_WeightChange_Cow, Cow_BC, ME_Demand_Maintance_Cow, ME_Eaten_Cow, ME_Eaten_Pasture_Cow, ME_Eaten_Supplement_Cow, PaddocksClosed
      events Reporting Frequency: event=Daily
    outputfile Cow Model: filename=testUrine Cow Model.out; title=testUrine Cow Model
      variables
        variables: dd/mm/yyyy as Date, ME_Demand_Maintance_Cow, ME_Demand_Lactation_Cow, ME_Demand_Pregnancy_Cow, ME_Demand_WeightChange_Cow, ME_Demand_Walking_Cow, DM_Eaten_Cow, ME_Eaten_Cow, ME_Eaten_Pasture_Cow, DM_Eaten_Pasture_Cow, ME_Eaten_Supplement_Cow, DM_Eaten_Supplement_Cow
      events Reporting Frequency: event=Daily
    area Patch-VL
      SoilTemp2 Soil Temperature (dotNET)
        maxt_time_default = 14  # hours
        bound_layer_cond_source = calc  # boundary layer conductance source (calc/constant)
        bound_layer_cond = 20  # boundary layer conductance
        boundary_layer_conductance_iterations = 1  # Number of iterations to calc boundary layer conductance (0-10)
        net_radn_source = calc  # net radiation source (calc/eos)
        default_wind_speed = 3  # m/s
        default_altitude = 18  # default altitude (m) 275m (700 ft) is approx 980 hPa
        default_instrum_height = 1.2  # default instrument height for wind and temperature (m)
        bare_soil_height = 57  # height of bare soil (mm)
      UrinePatch
      AgPasture ryegrass_clover
        Nspecies = 2  # Number of species
        thisspeciesName = ryegrass_clover  # Crop name shown as on the simulation tree
        speciesName = ryegrass whiteclover  # Species names
        micrometType = grass grass  # crop type for MicroMet
        isAnnual = 0 0  # Annual species? no=0, yes=1
        isLegume = 0 1  # Legume species? no=0, yes=1
        photoPath = 3 3  # C3 or C4 species? C3=3, C4=4
        rootDepth = 900  300
        growthTmin = 3 3  # Minimum temperature for growth
        growthTmax = 32 32  # Maximum temperature for growth
        growthTopt = 20 20  # Optimum temperature for growth
        growthTq = 2 2  # Curvture of growth response to temperature
        massFluxTmin = 2 2  # Minimum temperature for mass flux
        massFluxTopt = 20 20  # Optimum temperature for mass flux
        massFluxW0 = 2 2  # Scale factor for response of mass flux to soil moisture
        massFluxWopt = 0.5 0.5  # Optimum soil moisture for mass flux
        heatOnsetT = 28 28  # Heat effects- Onset temperature
        heatFullT = 35 35  # Heat effects- Full temperature
        heatSumT = 30 30  # Heat effects- Temperature sum for recovery
        coldOnsetT = 0 0  # Cold effects- Onset temperature
        coldFullT = -3 -3  # Cold effects- Full temperature
        coldSumT = 20 20  # Cold effects- Temperature sum for recovery
        Pm = 1 1  # Reference CO2 assimilation rate (mg CO2/m2.s)
        maintRespiration = 3 3  # Maintenance respiration coefficient (%)
        growthEfficiency = 0.75 0.75
        SpecificLeafArea = 20 20
        lightExtCoeff = 0.5 0.8  # Light extinction coefficient
        stockParameter = 0.05 0.05  # Stock influence parameter
        maxRootFraction = 0.25 0.25  # Maximum biomass fraction allocated to root
        leafRate = 3 3  # Reference leaf appearance rate without stress
        fLeaf = 0.7 0.56  # Reference growth partition to leaves
        fStolon = 0 0.2  # Reference growth partition to stolon
        digestLive = 0.6 0.6  # Digestibility of live plant material
        digestDead = 0.2 0.2  # Digestibility of dead plant material
        dmshoot = 1800 350  # Initial shoot dry matter (kg/ha)
        dmlitter = 250 50  # Initial litter dry matter (kg/ha)
        dmgreenmin = 500 80  # Minimum green dry matter (kg/ha)
        NconcOptimum_leaves = 4 4.5  # N concentration - leaf optimum
        NconcMaximum_leaves = 5 5.5  # N concentration - leaf luxary
        NconcMinimum_leaves = 1.2 2.0  # N concentration - leaf scenescent
        RelativeNconc_Stems = 0.5 0.5  # Stem N concentration as fraction of leaf N concentration
        RelativeNconc_Stolons = 0 0.5  # Stolon N concentration as fraction of leaf N concentration
        RelativeNconc_Roots = 0.5 0.5  # Root N concentration as fraction of leaf N concentration
        NMinFix = 0 0.2  # Minimum N fixation (when soil N is sufficient)
        NMaxFix = 0 0.6  # Maximum N fixation (when soil N is unavailable)
        CO2PmaxScale = 700 700  # CO2 - Scale factor for CO2 effect on photosynthesis
        CO2NScale = 600 600  # CO2 - Scale factor for CO2 effects on plant N concentration
        CO2NMin = 0.7 0.7  # CO2 - Minimum fraction that plant N concentration may reduce to uder elevated CO2
        CO2NCurvature = 2 2  # CO2 - Curvature factor of CO2 effect on plant N concentration
        Frgr = 1 1  # Relative growth factor
        rlvp = 1 0.2 0.1 0.05 0 0 0 0  # Root distribution of swards (relative to each soil layer)
      micromet
        soilalbedo = 0.23
        a_interception = 0
        b_interception = 0
        c_interception = 0
        d_interception = 0
      fertiliser
      surfaceom Surface Organic Matter
        PoolName = AgPasture  # Organic Matter pool name
        type = grass  # Organic Matter type
        mass = 1000  # Initial surface residue (kg/ha)
        cnr = 15  # C:N ratio of initial residue
        standing_fraction = 0  # Fraction of residue standing
      irrigation
        automatic_irrigation = on
        asw_depth = 600  # Depth to which ASW is calculated. (mm)
        crit_fr_asw = 0.5  # Fraction of ASW below which irrigation is applied (0-1.0)
        irrigation_efficiency = 1  # Efficiency of the irrigation. (0-1.0)
        irrigation_allocation = off  # Allocation limits
        allocation = 0  # Allocation in mm
        default_no3_conc = 0  # Nitrate concentration (ppm N)
        default_nh4_conc = 0  # Ammonium concentration (ppm N)
        default_cl_conc = 0  # Chloride concentration (ppm Cl)
      outputfile: filename=testUrine Patch-VL.out; title=testUrine Patch-VL
        variables
          variables: dd/mmm/yyyy as Date, HerbageGrowthWt, SpeciesLiveWt, LAI_total, LeafLiveWt, leafgreenwt, surfaceom_wt, surfaceom_n, surfaceom_c, AboveGroundWt, AboveGroundLiveWt, AboveGroundDeadWt, UrineN_Leached, Leach_NO3, TotalLeached, HarvestWt, surfaceom_wt, surfaceom_n, surfaceom_c, TotalCover, HarvestWt, HarvestN
        events Reporting Frequency: event=end_day
      soil Canterbury_VL: Country=New Zealand; Region=Plains; SoilType=NZ_sedementary; State=Canterbury
        DataSource=Generic profile descriptions provided by Trevor Webb and data for functional horizions based on SWAMP project results
        Comments=Bulk density values were measured on the fine earth fraction so values entered into apsim soil are adjusted down to account for stone content (assuming stones are inert from all soil process so their mass and volume is removed from model paramaters).  SAT, DUL, LL15 and Air dry have been adjusted down to account for stone content.  OC has not been adjusted so the model will get the correct carbon and N amounts using the adjusted BD.
        Water
          Layer:
            Thickness (mm)  KS (mm/day)  BD (g/cc)  Airdry (mm/mm)  LL15 (mm/mm)  DUL (mm/mm)  SAT (mm/mm)
            180             12000        1.04       0.064           0.128         0.304        0.376
            150             12000        0.975      0.12            0.12          0.285        0.3525
            200             1920         0.595      0.0255          0.0255        0.14875      0.18275
            300             16800        0.39       0.012           0.012         0.039        0.12
            170             24000        0.2        0.008           0.008         0.022        0.1
            500             24000        0.2        0.008           0.008         0.022        0.1
          SoilCrop Barley
            Layer:
              Thickness (mm)  LL (mm/mm)  kl (/day)  xf (0-1)
              180             0.128       0.0875     1
              150             0.12        0.0875     1
              200             0.0255      0.07875    1
              300             0.012       0.0695217  1
              170             0.008       0.058653   1
              500             0.008       0.0355748  1
          SoilCrop Canola
            Layer:
              Thickness (mm)  LL (mm/mm)  kl (/day)  xf (0-1)
              180             0.128       0.075      1
              150             0.12        0.075      1
              200             0.0255      0.0675     1
              300             0.012       0.0531165  1
              170             0.008       0.0411609  1
              500             0.008       0.019443   1
          SoilCrop Cloverseed
            Layer:
              Thickness (mm)  LL (mm/mm)  kl (/day)   xf (0-1)
              180             0.128       0.065       1
              150             0.12        0.065       1
              200             0.0255      0.0585      1
              300             0.012       0.0259037   1
              170             0.008       0.0131233   1
              500             0.008       0.00177604  1
          SoilCrop Fieldpea
            Layer:
              Thickness (mm)  LL (mm/mm)  kl (/day)    xf (0-1)
              180             0.128       0.1          1
              150             0.12        0.1          1
              200             0.0255      0.0469841    1
              300             0.012       0.0116484    1
              170             0.008       0.00497871   0.67032
              500             0.008       0.000408677  0.67032
          SoilCrop Fababean
            Layer:
              Thickness (mm)  LL (mm/mm)  kl (/day)  xf (0-1)
              180             0.128       0.1        1
              150             0.12        0.1        1
              200             0.0255      0.09       1
              300             0.012       0.1        1
              170             0.008       0.0904837  1
              500             0.008       0.0548812  1
          SoilCrop kale: same as testUrine.Patch-VL.Canterbury_VL.Water.Canola
          SoilCrop ItallianRyegrass
            Layer:
              Thickness (mm)  LL (mm/mm)  kl (/day)  xf (0-1)
              180             0.128       0.075      1
              150             0.12        0.075      1
              200             0.0255      0.0675     1
              300             0.012       0.05959    1
              170             0.008       0.050274   1
              500             0.008       0.0304927  1
          SoilCrop Lucerne
            Layer:
              Thickness (mm)  LL (mm/mm)  kl (/day)  xf (0-1)
              180             0.128       0.0375     1
              150             0.12        0.0375     1
              200             0.0255      0.0316198  1
              300             0.012       0.0202184  1
              170             0.008       0.0161361  1
              500             0.008       0.0113691  1
          SoilCrop Maize: same as testUrine.Patch-VL.Canterbury_VL.Water.Canola
          SoilCrop Oats: same as testUrine.Patch-VL.Canterbury_VL.Water.Canola
          SoilCrop Potato
            Layer:
              Thickness (mm)  LL (mm/mm)  kl (/day)    xf (0-1)
              180             0.128       0.1          1
              150             0.12        0.0810584    1
              200             0.0255      0.0179899    1
              300             0.012       0.00244775   1
              170             0.008       0.000744658  0.67032
              500             0.008       2.24867e-05  0.67032
          SoilCrop Grassseed
            Layer:
              Thickness (mm)  LL (mm/mm)  kl (/day)   xf (0-1)
              180             0.128       0.065       1
              150             0.12        0.065       1
              200             0.0255      0.0305397   1
              300             0.012       0.00757147  1
              170             0.008       0.00323616  1
              500             0.008       0.00026564  1
          SoilCrop Triticale
            Layer:
              Thickness (mm)  LL (mm/mm)  kl (/day)  xf (0-1)
              180             0.128       0.0875     1
              150             0.12        0.0875     1
              200             0.0255      0.07875    1
              300             0.012       0.0552373  1
              170             0.008       0.0393163  1
              500             0.008       0.0144637  1
          SoilCrop Wheat: same as testUrine.Patch-VL.Canterbury_VL.Water.Canola
          SoilCrop ryegrass_clover
            Layer:
              Thickness (mm)  LL (mm/mm)  kl (/day)    xf (0-1)
              180             0.128       0.05         1
              150             0.12        0.05         1
              200             0.0255      0.0206283    1
              300             0.012       0.0037887    1
              170             0.008       0.00136619   1
              500             0.008       6.80184e-05  1
          SoilCrop ryegrass: same as testUrine.Patch-VL.Canterbury_VL.Water.ryegrass_clover
          SoilCrop whiteclover: same as testUrine.Patch-VL.Canterbury_VL.Water.Fieldpea
        Analysis
          Layer:
            Thickness (mm)  Rocks (%)  PH (1:5 water)  CEC (cmol+/kg)  ParticleSizeSand (%)  ParticleSizeSilt (%)  ParticleSizeClay (%)
            180             20         6               13              12.7966               66.7554               20.448
            150             25         6               9               12.7966               66.7554               20.448
            200             57.5       6               8               15.796                76.536                7.668
            300             70         6               5               37.7916               57.0964               5.112
            170             80         6               4               39.7912               55.0968               5.112
            500             80         6               4               39.7912               55.0968               5.112
        SoilWat: SummerCona=4.4; SummerU=9; SummerDate=1-Oct; WinterCona=3; WinterU=6; WinterDate=1-Apr; DiffusConst=88; DiffusSlope=35; Salb=0.13; Cn2Bare=73; CnRed=20; CnCov=0.8
          Layer:
            Thickness (mm)  SWCON (0-1)
            180             0.517917
            150             0.581307
            200             0.581307
            300             0.650598
            170             0.6506
            500             0.6506
        SoilOrganicMatter: RootCn=40; RootWt=1000; SoilCn=11; EnrACoeff=7.4; EnrBCoeff=0.2
          Layer:
            Thickness (mm)  OC (Total %)  FBIOM (0-1)  FINERT (0-1)
            180             2.88977       0.0333099    0.478186
            150             1.05591       0.0186614    0.681918
            200             0.807728      0.013031     0.811837
            300             0.800052      0.0106763    0.911118
            170             0.8           0.0101651    0.956083
            500             0.8           0.0100221    0.983924
        InitWater
          percentmethod: percent=1; distributed=filled from top
        Sample Initial nitrogen
          Layer:
            Thickness (mm)  NO3 (kg/ha)  NH4 (kg/ha)
            80              25           1
            5               20           1
            20              15           1
            67              10           1
      folder Manager folder
        manager2 FarmSimIrrigate
```vb
Imports System
Imports ModelFramework

Public Class Script 
   Inherits Instance

   '<Input()> Private A as Double
   '<Output()><Units("oC")> Public C as Double

   <Input()> Private UI_IrrigSeason As String

   <Input()> Private UI_IrrigAmount_type As String
   <Input()> Private UI_IrrigAmount_FixedAmount As Double
   <Input()> Private UI_IrrigAmount_RefillPercentage As Double

   <Input()> Private UI_IrrigInterval_type As String
   <Input()> Private UI_IrrigInterval_FixedInterval As Double
   <Input()> Private UI_IrrigInterval_TriggerPercentage As Double

   <Input()> Private month As Integer
   <Input()> Private dlayer As Single()                       'Thickness of soil layers (mm)


   Private IrrigSeason As Integer
   Private PAW_depth As Single 'mm depth for calculations
   Private DaysSinceIrrig As Integer 
   
   Private SoilPAW As Single
   Private SoilAvailWater As Single

   
   
   <EventHandler()> Public Sub OnInit2()
      

      PAW_depth = 600.0 'soil depth for calculations
      DaysSinceIrrig = 1000
      SoilPAW = 0.0
      SoilAvailWater = 0.0

      Dim MyPaddock As New PaddockType(Me)
      Dim DUL As Single() = MyPaddock.SoilWater.dul_dep        'sw at DUL
      Dim LL15 As Single() = MyPaddock.SoilWater.ll15_dep        'sw at LL15 
      Dim SW As Single() = MyPaddock.SoilWater.sw_dep        'sw today
      Dim DepthFromSurface As Single = 0
      
      For z As Integer = 0 To dlayer.length - 1
         DepthFromSurface += dlayer(z)
         If DepthFromSurface <= PAW_depth Then
            SoilPAW += dul(z) - LL15(z)
            SoilAvailWater += sw(z) - LL15(z)
            '***** add in something for partial layers here *******
         End If
      Next
      
   End Sub
   
   
   <EventHandler()> Public Sub OnPrepare()
      
      
      Dim MyPaddock As New PaddockType(Me)
      Dim LL15 As Single() = MyPaddock.SoilWater.ll15_dep        'sw at LL15 
      Dim SW As Single() = MyPaddock.SoilWater.sw_dep        'sw today
      Dim DepthFromSurface As Single = 0
      SoilAvailWater = 0.0
      
      For z As Integer = 0 To dlayer.length - 1
         DepthFromSurface += dlayer(z)
         If DepthFromSurface <= PAW_depth Then
            SoilAvailWater += sw(z) - LL15(z)
            '***** add in something for partial layers here *******
         End If
      Next

      Dim Stage As Single
      Dim StageOK As Integer = 0
      
      For Each crop As CropType In MyPaddock.Crops
         If (crop.name = "ryegrass_clover") Then
            Stage = 4.0   
         Else
            Stage = crop.stage
         End If

         If Stage >= 3.0 And Stage < 8.0 Then
            StageOk += 1
         Else
            'do nothing
         End If
      Next

      

      

      If UI_IrrigSeason = "None" Then
         IrrigSeason = 0
      ElseIf UI_IrrigSeason = "Short" Then
         If isBetween(month, 10, 3) Then
            IrrigSeason = 1
         Else
            IrrigSeason = 0
         End If         
         
      ElseIf UI_IrrigSeason = "Long" Then
         If isBetween(month, 9, 4) Then
            IrrigSeason = 1
         Else
            IrrigSeason = 0
         End If         
      Else
         Throw New Exception("Irrigation season value not allowed")
      End If
         
      
      If IrrigSeason = 0 Then
         'do nothing - not in irrigation season so no action needed
      ElseIf StageOK = 0 Then
         'do nothing - crop is too young or too near harvest (or fallow)   
      Else
         If UI_IrrigInterval_type = "Fixed" Then
            If DaysSinceIrrig >= UI_IrrigInterval_FixedInterval Then
               If UI_IrrigAmount_type = "Fixed" Then
                  MyPaddock.Irrigation.Apply(UI_IrrigAmount_FixedAmount)
                  DaysSinceIrrig = 1
               ElseIf UI_IrrigAmount_type = "Scheduled" Then
                  'current amt water is SoilAvailWater - calculated above
                  Dim SoilWaterTarget As Single = UI_IrrigAmount_RefillPercentage / 100.0 * SoilPAW
                  Dim AmountToApply As Single = SoilWaterTarget - SoilAvailWater                  
                  MyPaddock.Irrigation.Apply(math.Max(AmountToApply, 0.0))
                  DaysSinceIrrig = 1
               Else
                  Throw New Exception("Irrigation amount option not allowed")
               End If
            Else
               DaysSinceIrrig = DaysSinceIrrig + 1
            End If 
                        
         ElseIf UI_IrrigInterval_type = "Scheduled" Then
            'current amt water is SoilAvailWater - calculated above
            Dim TriggerAmt As Single = UI_IrrigInterval_TriggerPercentage / 100 * SoilPAW

            If SoilAvailWater <= TriggerAmt Then
               If UI_IrrigAmount_type = "Fixed" Then
                  MyPaddock.Irrigation.Apply(UI_IrrigAmount_FixedAmount)
                  DaysSinceIrrig = 1
               ElseIf UI_IrrigAmount_type = "Scheduled" Then
                  'current amt water is SoilAvailWater - calculated above
                  Dim SoilWaterTarget As Single = UI_IrrigAmount_RefillPercentage / 100.0 * SoilPAW
                  Dim AmountToApply As Single = SoilWaterTarget - SoilAvailWater
                  MyPaddock.Irrigation.Apply(math.Max(AmountToApply, 0.0))
                  DaysSinceIrrig = 1
               Else
                  Throw New Exception("Irrigation amount option not allowed")
               End If
            Else
               'do nothing - see if trigger this tommorrow
            End If
            
            
         Else
            Throw New Exception("Irrigation schedualling option not allowed")
         End If
         
      End If         'IrrigationSeason


   End Sub


   <EventHandler()> Public Sub OnPost()

   End Sub
   
   
   Private Function isBetween(ByVal mth As Integer, ByVal start As Integer, ByVal finish As Integer) As Boolean
      If (start > finish) Then
         Return (mth >= start Or mth <= finish)
      Else
         Return (mth >= start And mth <= finish)
      End If
   End Function

End Class
```
      manager Empty manager
        on init:
```
TotalLeached = 0
TotalCover = 0
```
        on end_of_day:
```
TotalLeached = TotalLeached + Leach_NO3 + UrineN_Leached
TotalCover = (leafgreenwt + stemgreenwt + leafsenescedwt + stemsenescedwt) * 10
```
    area Base-VL -> /simulations/testUrine/Patch-VL
      outputfile: filename=testUrine Base-VL.out; title=testUrine Base-VL
        variables -> /simulations/testUrine/Patch-VL/outputfile/Variables
        events Reporting Frequency -> /simulations/testUrine/Patch-VL/outputfile/Reporting Frequency
    area Patch-M -> /simulations/testUrine/Patch-VL
      outputfile: filename=testUrine Patch-M.out; title=testUrine Patch-M
        variables -> /simulations/testUrine/Patch-VL/outputfile/Variables
        events Reporting Frequency -> /simulations/testUrine/Patch-VL/outputfile/Reporting Frequency
      soil Canterbury_M: Country=New Zealand; Region=Plains; SoilType=NZ_sedementary; State=Canterbury
        DataSource=Generic profile descriptions provided by Trevor Webb and data for functional horizions based on SWAMP project results
        Comments=Bulk density values were measured on the fine earth fraction so values entered into apsim soil are adjusted down to account for stone content (assuming stones are inert from all soil process so their mass and volume is removed from model paramaters).  SAT, DUL, LL15 and Air dry have been adjusted down to account for stone content.  OC has not been adjusted so the model will get the correct carbon and N amounts using the adjusted BD.
        Water
          Layer:
            Thickness (mm)  KS (mm/day)  BD (g/cc)  Airdry (mm/mm)  LL15 (mm/mm)  DUL (mm/mm)  SAT (mm/mm)
            250             4832.04      1.3105     0.07675         0.1535        0.3735       0.456165
            300             389.229      1.524      0.201           0.201         0.332        0.39432
            300             16.3619      1.65       0.201           0.201         0.3375       0.358515
            300             16800        0.39       0.012           0.012         0.039        0.12
            350             16800        0.39       0.012           0.012         0.039        0.12
          SoilCrop Barley
            Layer:
              Thickness (mm)  LL (mm/mm)  kl (/day)  xf (0-1)
              250             0.1535      0.0875     1
              300             0.201       0.07875    1
              300             0.201       0.0340725  0.301194
              300             0.012       0.0504831  1
              350             0.012       0.0355748  1
          SoilCrop Canola
            Layer:
              Thickness (mm)  LL (mm/mm)  kl (/day)  xf (0-1)
              250             0.1535      0.075      1
              300             0.201       0.0675     0.825307
              300             0.201       0.0257733  0.120996
              300             0.012       0.0328676  1
              350             0.012       0.019443   1
          SoilCrop Cloverseed
            Layer:
              Thickness (mm)  LL (mm/mm)  kl (/day)   xf (0-1)
              250             0.1535      0.065       1
              300             0.201       0.0585      1
              300             0.201       0.0119561   0.153816
              300             0.012       0.00720221  1
              350             0.012       0.00177604  1
          SoilCrop Fieldpea
            Layer:
              Thickness (mm)  LL (mm/mm)  kl (/day)    xf (0-1)
              250             0.1535      0.1          1
              300             0.201       0.042513     0.449329
              300             0.201       0.00526996   0.090718
              300             0.012       0.00235177   1
              350             0.012       0.000408677  1
          SoilCrop Fababean
            Layer:
              Thickness (mm)  LL (mm/mm)  kl (/day)  xf (0-1)
              250             0.1535      0.1        1
              300             0.201       0.09       0.825307
              300             0.201       0.05       0.120996
              300             0.012       0.0778801  1
              350             0.012       0.0548812  1
          SoilCrop kale: same as testUrine.Patch-M.Canterbury_M.Water.Canola
          SoilCrop ItallianRyegrass
            Layer:
              Thickness (mm)  LL (mm/mm)  kl (/day)  xf (0-1)
              250             0.1535      0.075      1
              300             0.201       0.0675     0.825307
              300             0.201       0.029205   0.120996
              300             0.012       0.0432712  1
              350             0.012       0.0304927  1
          SoilCrop Lucerne
            Layer:
              Thickness (mm)  LL (mm/mm)  kl (/day)   xf (0-1)
              250             0.1535      0.0375      1
              300             0.201       0.0303025   1
              300             0.201       0.00981164  0.301194
              300             0.012       0.0139125   1
              350             0.012       0.0113691   1
          SoilCrop Maize: same as testUrine.Patch-M.Canterbury_M.Water.Canola
          SoilCrop Oats
            Layer:
              Thickness (mm)  LL (mm/mm)  kl (/day)  xf (0-1)
              250             0.1535      0.075      1
              300             0.201       0.0675     1
              300             0.201       0.0257733  0.153816
              300             0.012       0.0328676  1
              350             0.012       0.019443   1
          SoilCrop Potato
            Layer:
              Thickness (mm)  LL (mm/mm)  kl (/day)    xf (0-1)
              250             0.1535      0.1          1
              300             0.201       0.0156397    0.449329
              300             0.201       0.00106399   0.090718
              300             0.012       0.000260584  1
              350             0.012       2.24867e-05  1
          SoilCrop Grassseed
            Layer:
              Thickness (mm)  LL (mm/mm)  kl (/day)   xf (0-1)
              250             0.1535      0.065       1
              300             0.201       0.0276334   0.825307
              300             0.201       0.00342547  0.120996
              300             0.012       0.00152865  1
              350             0.012       0.00026564  1
          SoilCrop Triticale
            Layer:
              Thickness (mm)  LL (mm/mm)  kl (/day)  xf (0-1)
              250             0.1535      0.0875     1
              300             0.201       0.07875    1
              300             0.201       0.0265357  0.153816
              300             0.012       0.0291262  1
              350             0.012       0.0144637  1
          SoilCrop Wheat: same as testUrine.Patch-M.Canterbury_M.Water.Oats
          SoilCrop ryegrass_clover
            Layer:
              Thickness (mm)  LL (mm/mm)  kl (/day)    xf (0-1)
              250             0.1535      0.05         1
              300             0.201       0.0182956    0.825307
              300             0.201       0.00168014   0.120996
              300             0.012       0.00055545   1
              350             0.012       6.80184e-05  1
          SoilCrop ryegrass: same as testUrine.Patch-M.Canterbury_M.Water.ryegrass_clover
          SoilCrop whiteclover: same as testUrine.Patch-M.Canterbury_M.Water.Fieldpea
        Analysis
          Layer:
            Thickness (mm)  Rocks (%)  PH (1:5 water)  CEC (cmol+/kg)  ParticleSizeSand (%)  ParticleSizeSilt (%)  ParticleSizeClay (%)
            250             0          6               13              14.5                  65.5                  20
            300             0          6               9               18                    58                    24
            300             0          6               9               14                    63                    23
            300             70         6               5               37.7916               57.0964               5.112
            350             70         6               5               37.7916               57.0964               5.112
        SoilWat: SummerCona=4.4; SummerU=9; SummerDate=1-Oct; WinterCona=3; WinterU=6; WinterDate=1-Apr; DiffusConst=88; DiffusSlope=35; Salb=0.13; Cn2Bare=73; CnRed=20; CnCov=0.8
          Layer:
            Thickness (mm)  SWCON (0-1)
            250             0.496442
            300             0.365575
            300             0.0968316
            300             0.650598
            350             0.650598
        SoilOrganicMatter: RootCn=40; RootWt=1000; SoilCn=11; EnrACoeff=7.4; EnrBCoeff=0.2
          Layer:
            Thickness (mm)  OC (Total %)  FBIOM (0-1)  FINERT (0-1)
            250             2.36763       0.0288947    0.449328
            300             0.493357      0.0136287    0.758676
            300             0.226613      0.0105998    0.901885
            300             0.202414      0.0100992    0.960109
            350             0.200179      0.0100141    0.984954
        InitWater
          percentmethod: percent=1; distributed=filled from top
        Sample Initial nitrogen
          Layer:
            Thickness (mm)  NO3 (kg/ha)  NH4 (kg/ha)
            80              25           1
            5               20           1
            20              15           1
            67              10           1
    area Base-M -> /simulations/testUrine/Base-VL
      outputfile: filename=testUrine Base-M.out; title=testUrine Base-M
        variables -> /simulations/testUrine/Base-VL/outputfile/Variables
        events Reporting Frequency -> /simulations/testUrine/Base-VL/outputfile/Reporting Frequency
      soil Canterbury_M: same as testUrine.Patch-M.Canterbury_M
  simulation simple
    manager2 FarmSimOptions: same as testUrine.FarmSimOptions
    DDRules
    clock
      start_date = 01/07/1988  # Enter the start date of the simulation
      end_date = 30/07/1989  # Enter the end date of the simulation
    metfile met: filename=%apsim%\Examples\MetFiles\WinchmoreMet.met
    summaryfile
    outputfile DDRules Outputs: filename=simple DDRules Outputs.out; title=simple DDRules Outputs
      variables
        variables: dd/mm/yyyy as Date, DM_Eaten, DM_Eaten_Pasture, DM_Eaten_Supplement, SilageCut, DM_Eaten_Cow, DM_Eaten_Pasture_Cow, DM_Eaten_Supplement_Cow, MilkProduction, BaseStockingRate, sr, DM_Eaten_Pdks, PWO, PaddockStatus, ME_Demand_Maintance, ME_Demand_Lactation, ME_Demand_Pregnancy, ME_Demand_WeightChange, ME_Demand_Walking, Cow_LWt, Cow_BC, Cow_MilkSolids, ME_Demand_WeightChange_Cow, Cow_BC, ME_Demand_Maintance_Cow, ME_Eaten_Cow, ME_Eaten_Pasture_Cow, ME_Eaten_Supplement_Cow, PaddocksClosed, SilageCut
      events Reporting Frequency: event=Daily
    outputfile Cow Model: filename=simple Cow Model.out; title=simple Cow Model
      variables
        variables: dd/mm/yyyy as Date, ME_Demand_Maintance_Cow, ME_Demand_Lactation_Cow, ME_Demand_Pregnancy_Cow, ME_Demand_WeightChange_Cow, ME_Demand_Walking_Cow, DM_Eaten_Cow, ME_Eaten_Cow, ME_Eaten_Pasture_Cow, DM_Eaten_Pasture_Cow, ME_Eaten_Supplement_Cow, DM_Eaten_Supplement_Cow
      events Reporting Frequency: event=Daily
    area Base-VL -> /simulations/testUrine/Patch-VL
      outputfile: filename=simple Base-VL.out; title=simple Base-VL
        variables -> /simulations/testUrine/Patch-VL/outputfile/Variables
        events Reporting Frequency -> /simulations/testUrine/Patch-VL/outputfile/Reporting Frequency
    area Base-M -> /simulations/testUrine/Base-VL
      outputfile: filename=simple Base-M.out; title=simple Base-M
        variables -> /simulations/testUrine/Base-VL/outputfile/Variables
        events Reporting Frequency -> /simulations/testUrine/Base-VL/outputfile/Reporting Frequency
      soil Canterbury_M: same as testUrine.Patch-M.Canterbury_M
    manager Empty manager
      on init:
```
UI_StockRate = 1.5
UI_SuppType = Grain
```
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