simulations untitled: version=2
  simulation Continuous Wheat Simulation
    clock
      start_date = 1/01/1940  # Select the start date of the simulation
      end_date = 31/12/1989  # Select the end date of the simulation
    summaryfile: filename=ContinuousWheat.sum
    metfile met: filename=%apsuite\apsim\met\sample\goond.met
    area paddock
      registrations global
      manager
        rule Sowing rule
          condition start_of_day:
            if ([crop].plant_status = 'out') then
                     if (date_within('[date1], [date2]') = 1) then
                        surface_moist = (sw(1) - ll15(1)) / (dul(1)- ll15(1))
                        if ((esw >= [esw_amount] AND
                              (surface_moist <= [surface_up] and surface_moist >= [surface_low])) OR
                            ('[must_sow]' = 'yes' AND today = date('[date2]'))) THEN
                           [crop] sow plants =[density], sowing_depth = [depth], cultivar = [cultivar], row_spacing = [row_spacing]

                        endif
                     endif
                  endif
          category Sowing criteria
          category Sowing parameters
        rule Harvesting rule
          condition end_of_day:
            if [crop].stage_name = 'harvest_ripe' or [crop].plant_status = 'dead' then
                          [crop]  harvest
                          [crop]  end_crop
                       endif
          category Harvesting criteria
        rule Sowing fertiliser
          condition [modulename].[eventname]=[fertmodule] apply amount = [fert_amount_sow] (kg/ha), depth = 50 (mm), type = [fert_type_sow]
          category When should fertiliser be applied
          category Fertiliser application details
      fertiliser
      surfaceom wheat residue: PoolName=wheat; type=wheat; mass=1000.; cnr=80.0; standing_fraction=0.0
      wheat
      outputfile: filename=ContinuousWheat.out
        outputfiledescription My Variables
          variables
            variables: Date, biomass, yield, grain_protein, grain_size, esw
          events: event=harvesting
      soil Jimbour,Waco (#016): Site=Jimbour; Region=South East Queensland; LocalName=Waco; SoilType=Black Vertosol; NearestTown=Jimbour, Q 4352; NaturalVegetation=Grassland, mainly Qld bluegrass
        Water: Cona=3.5; DiffusConst=40; DiffusSlope=16; U=6; Salb=0.13; Cn2Bare=73; CnRed=20; CnCov=0.8
          layer:
            thickness  bd    ll15  airdry  dul   sat   swcon
            150        1.02  0.29  0.145   0.54  0.59  0.3
            150        1.03  0.29  0.26    0.53  0.58  0.3
            300        1.02  0.29  0.29    0.54  0.59  0.3
            300        1.02  0.29  0.29    0.54  0.58  0.3
            300        1.06  0.3   0.3     0.52  0.57  0.3
            300        1.11  0.31  0.31    0.5   0.55  0.3
            300        1.12  0.32  0.32    0.5   0.55  0.3
            300        1.15  0.33  0.33    0.48  0.53  0.3
            300        1.18  0.34  0.34    0.47  0.52  0.3
            300        1.2   0.35  0.35    0.46  0.51  0.3
            300        1.25  0.36  0.36    0.44  0.49  0.3
        Nitrogen: CnCanopyFact=1; RootCn=40; RootWt=200; SoilCn=12.5; EnrACoeff=7.4; EnrBCoeff=0.2
          layer:
            oc    ph   fbiom  finert
            1.04  8.4  0.025  0.4
            0.89  8.8  0.02   0.6
            0.89  9    0.015  0.8
            0.89  9.2  0.01   0.9
            0.77  9.2  0.01   0.95
            0.45  9.1  0.01   0.95
            0.27  9    0.01   0.95
            0.22  9    0.01   0.95
            0.16  8.9  0.01   0.95
            0.13  8.9  0.01   0.95
            0.12  8.9  0.01   0.95
        other
          ec=[0.2, 0.25, 0.31, 0.4, 0.59, 0.84, 0.93, 1.01, 1.06, 1.05, 1.01]
        InitWater
          layeredmethod: sw=0.54; sw sw{2}=0.53; sw sw{3}=0.54; sw sw{4}=0.54; sw sw{5}=0.52; sw sw{6}=0.50; sw sw{7}=0.50; sw sw{8}=0.48; sw sw{9}=0.47; sw sw{10}=0.46; sw sw{11}=0.44
        SoilCrop Barley
          layer:
            ll    kl    xf
            0.29  0.1   1
            0.29  0.1   1
            0.32  0.08  1
            0.38  0.06  1
            0.39  0.04  1
            0.39  0.02  1
            0.41  0.01  1
            0.48  0     0
            0.47  0     0
            0.46  0     0
            0.44  0     0
        SoilCrop Chickpea
          layer:
            ll    kl    xf
            0.29  0.1   1
            0.29  0.1   1
            0.36  0.08  1
            0.43  0.06  1
            0.51  0.04  1
            0.5   0.02  1
            0.5   0.01  1
            0.48  0     0
            0.47  0     0
            0.46  0     0
            0.44  0     0
        SoilCrop Lucerne
          layer:
            ll    kl    xf
            0.29  0.1   1
            0.29  0.1   1
            0.29  0.1   1
            0.29  0.1   1
            0.3   0.09  1
            0.31  0.09  1
            0.32  0.09  1
            0.33  0.09  1
            0.34  0.09  1
            0.35  0.09  1
            0.36  0.09  1
        SoilCrop Maize
          layer:
            ll    kl    xf
            0.29  0.1   1
            0.29  0.1   1
            0.34  0.1   1
            0.34  0.08  1
            0.37  0.06  1
            0.4   0.04  1
            0.42  0.02  1
            0.48  0     0
            0.47  0     0
            0.46  0     0
            0.44  0     0
        SoilCrop Perennial Grass
          layer:
            ll    kl    xf
            0.29  0.1   1
            0.29  0.1   1
            0.39  0.1   1
            0.41  0.1   1
            0.4   0.09  1
            0.4   0.07  1
            0.41  0.05  1
            0.41  0     0
            0.4   0     0
            0.4   0     0
            0.42  0     0
        SoilCrop Sorghum
          layer:
            ll    kl    xf
            0.29  0.1   1
            0.29  0.1   1
            0.35  0.1   1
            0.38  0.08  1
            0.4   0.06  1
            0.4   0.04  1
            0.4   0.02  1
            0.48  0     0
            0.47  0     0
            0.46  0     0
            0.44  0     0
        SoilCrop Wheat
          layer:
            ll    kl    xf
            0.29  0.1   1
            0.29  0.1   1
            0.32  0.08  1
            0.32  0.06  1
            0.35  0.04  1
            0.38  0.02  1
            0.41  0.01  1
            0.48  0     0
            0.47  0     0
            0.46  0     0
            0.44  0     0
        SoilSample Soil sample 1: swunit=gravimetric
          water
            layer:
              thickness  sw
              100        0.14324
              300        0.18717
              300        0.24527
              300        0.2608
          nitrogen
            layer:
              no3  nh4  oc   ph
              28   1    1.2  7
              10   1    1.0  6.9
              5    1    0.8  6.9
              3    1    0.6  6.8
        InitNitrogen
          layer:
            no3  nh4
            6.5  0.6
            2.1  0.1
            2.1  0.1
            1.7  0.1
            1.7  0.1
            1.7  0.1
            1.7  0.1
            1.7  0.1
            1.7  0.1
            1.7  0.1
            1.7  0.1
  shared
