simulations untitled: version=5
  simulation Continuous Wheat Simulation
    clock
      start_date = 1/01/1940  # Select the start date of the simulation
      end_date = 31/12/1989  # Select the end date of the simulation
    summaryfile: filename=Continuous Wheat Simulation.sum
    metfile met: filename=%apsuite\apsim\met\sample\goond.met
    area paddock
      registrations global
      manager
        rule Sowing rule
          condition start_of_day:
            if (paddock_is_fallow() = 1 and FallowIn <> 'yes' and (NextCrop = 0 or NextCrop = '[crop]')) then
                     if (date_within('[date1], [date2]') = 1) then
                        if (rain[[rainnumdays]] >= [raincrit] AND esw >= [esw_amount]) OR
                            ('[must_sow]' = 'yes' AND today = date('[date2]'))) THEN
                           ChooseNextCrop = 'yes'   ! for rotations
                           [crop] sow plants =[density], sowing_depth = [depth], cultivar = [cultivar], row_spacing = [row_spacing]
                        endif
                        if today = date('[date2]') then
                           ChooseNextCrop = 'yes'
                        endif
                     endif
                  endif
          category Sowing criteria
            date1 = 15-may  # Enter sowing window START date (dd-mmm)
            date2 = 10-jul  # Enter sowing window END date (dd-mmm)
            must_sow = no  # Must sow?
            raincrit = 30  # Amount of rainfall
            rainnumdays = 3  # Number of days of rainfall
            esw_amount = 200  # Enter minimum allowable available soil water (mm)
          category Sowing parameters
            crop = wheat  # Enter name of crop to sow
            density = 100  # Enter sowing density (plants/m2)
            depth = 30  # Enter sowing depth (mm)
            cultivar = hartog  # Enter cultivar
            row_spacing = 250  # Enter row spacing (mm)
        rule Harvesting rule
          condition end_of_day:
            if [crop].stage_name = 'harvest_ripe' or [crop].plant_status = 'dead' then
                          [crop]  harvest
                          [crop]  end_crop
                       endif
          category Harvesting criteria
            crop = wheat  # Enter name of crop to harvest when ripe
        rule Sowing fertiliser
          condition [modulename].[eventname]=[fertmodule] apply amount = [fert_amount_sow] (kg/ha), depth = 50 (mm), type = [fert_type_sow]
          category When should fertiliser be applied
            modulename = wheat  # On which module should the event come from
            eventname = sowing  # On which event should fertiliser be applied
          category Fertiliser application details
            fertmodule = fertiliser  # Module used to apply the fertiliser
            fert_amount_sow = 150  # Amount of starter fertiliser at sowing (kg/ha)
            fert_type_sow = urea_N  # Sowing fertiliser type
      fertiliser
      surfaceom surface organic matter
        PoolName = wheat  # Organic Matter pool name
        type = wheat  # Organic Matter type
        mass = 1000.  # Initial surface residue (kg/ha)
        cnr = 80.0  # C:N ratio of initial residue
        standing_fraction = 0.0  # Fraction of residue standing
      wheat
      outputfile
        variables My Variables -> My Variables
        events My Variables Events -> My Variables Events
      soil Jimbour,Waco (#016): Site=Jimbour; Region=South East Queensland; LocalName=Waco; SoilType=Black Vertosol; NearestTown=Jimbour, Q 4352; NaturalVegetation=Grassland, mainly Qld bluegrass
        Water: Cona=3.5; DiffusConst=40; DiffusSlope=16; U=6; Salb=0.13; Cn2Bare=73; CnRed=20; CnCov=0.8
          layer:
            thickness  bd    ll15  airdry  dul   sat   sw       swcon
            150        1.02  0.29  0.15    0.54  0.59  9999.99  0.3
            150        1.03  0.29  0.26    0.53  0.58  9999.99  0.3
            300        1.02  0.29  0.29    0.54  0.59  9999.99  0.3
            300        1.02  0.29  0.29    0.54  0.58  9999.99  0.3
            300        1.06  0.3   0.3     0.52  0.57  9999.99  0.3
            300        1.11  0.31  0.31    0.5   0.55  9999.99  0.3
            300        1.12  0.32  0.32    0.5   0.55  9999.99  0.3
            300        1.15  0.33  0.33    0.48  0.53  9999.99  0.3
            300        1.18  0.34  0.34    0.47  0.52  9999.99  0.3
            300        1.2   0.35  0.35    0.46  0.51  9999.99  0.3
            300        1.25  0.36  0.36    0.44  0.49  9999.99  0.3
        Nitrogen: CnCanopyFact=1; RootCn=40; RootWt=200; SoilCn=12.5; EnrACoeff=7.4; EnrBCoeff=0.2
          layer:
            oc    ph   fbiom  finert  no3  nh4
            1.04  8.4  0.025  0.4     6.5  0.6
            0.89  8.8  0.02   0.6     2.1  0.1
            0.89  9    0.015  0.8     2.1  0.1
            0.89  9.2  0.01   0.9     1.7  0.1
            0.77  9.2  0.01   0.95    1.7  0.1
            0.45  9.1  0.01   0.95    1.7  0.1
            0.27  9    0.01   0.95    1.7  0.1
            0.22  9    0.01   0.95    1.7  0.1
            0.16  8.9  0.01   0.95    1.7  0.1
            0.13  8.9  0.01   0.95    1.7  0.1
            0.12  8.9  0.01   0.95    1.7  0.1
        other
          ec=[0.2, 0.25, 0.31, 0.4, 0.59, 0.84, 0.93, 1.01, 1.06, 1.05, 1.01]
        InitWater
          sw=[0.29, 0.29, 0.29, 0.29, 0.3, 0.31, 0.32, 0.33, 0.34, 0.35, 0.36]
        SoilCrop Barley
          layer:
            ll    kl    xf
            0.29  0.1   1
            0.29  0.1   1
            0.32  0.08  1
            0.38  0.06  1
            0.39  0.04  1
            0.39  0.02  1
            0.41  0.01  1
            0.48  0     0
            0.47  0     0
            0.46  0     0
            0.44  0     0
        SoilCrop Chickpea
          layer:
            ll    kl    xf
            0.29  0.1   1
            0.29  0.1   1
            0.36  0.08  1
            0.43  0.06  1
            0.51  0.04  1
            0.5   0.02  1
            0.5   0.01  1
            0.48  0     0
            0.47  0     0
            0.46  0     0
            0.44  0     0
        SoilCrop Lucerne
          layer:
            ll    kl    xf
            0.29  0.1   1
            0.29  0.1   1
            0.29  0.1   1
            0.29  0.1   1
            0.3   0.09  1
            0.31  0.09  1
            0.32  0.09  1
            0.33  0.09  1
            0.34  0.09  1
            0.35  0.09  1
            0.36  0.09  1
        SoilCrop Maize
          layer:
            ll    kl    xf
            0.29  0.1   1
            0.29  0.1   1
            0.34  0.1   1
            0.34  0.08  1
            0.37  0.06  1
            0.4   0.04  1
            0.42  0.02  1
            0.48  0     0
            0.47  0     0
            0.46  0     0
            0.44  0     0
        SoilCrop Perennial Grass
          layer:
            ll    kl    xf
            0.29  0.1   1
            0.29  0.1   1
            0.39  0.1   1
            0.41  0.1   1
            0.4   0.09  1
            0.4   0.07  1
            0.41  0.05  1
            0.41  0     0
            0.4   0     0
            0.4   0     0
            0.42  0     0
        SoilCrop Sorghum
          layer:
            ll    kl    xf
            0.29  0.1   1
            0.29  0.1   1
            0.35  0.1   1
            0.38  0.08  1
            0.4   0.06  1
            0.4   0.04  1
            0.4   0.02  1
            0.48  0     0
            0.47  0     0
            0.46  0     0
            0.44  0     0
        SoilCrop Wheat
          layer:
            ll    kl    xf
            0.29  0.1   1
            0.29  0.1   1
            0.32  0.08  1
            0.32  0.06  1
            0.35  0.04  1
            0.38  0.02  1
            0.41  0.01  1
            0.48  0     0
            0.47  0     0
            0.46  0     0
            0.44  0     0
        InitNitrogen
          layer:
            no3      nh4
            6.50251  0.599196
            2.10081  0.099866
            2.10081  0.099866
            1.70066  0.099866
            1.70066  0.099866
            1.70066  0.099866
            1.70066  0.099866
            1.70066  0.099866
            1.70066  0.099866
            1.70066  0.099866
            1.70066  0.099866
        SoilSample Soil sample 1: WaterFormat=GravimetricPercent
          water
            layer:
              thickness  sw
              100        0.14324
              300        0.18717
              300        0.24527
              300        0.2608
          nitrogen
            layer:
              no3  nh4
              28   1
              10   1
              5    1
              3    1
          Other
            layer:
              oc   ph
              1.2  7
              1.0  6.9
              0.8  6.9
              0.6  6.8
      logic
        on startofday:
```
 AvTemp = (MaxT + MinT) / 2
```
        on endofday:
```
 if (day = 1) then
    outputfile do_output
 endif
```
      StockHerbageConverter: debug=off; conversion_model=herbage; herbage_model=plant; herbage_module_name=lablab; proportion_legume=1.0; dmdValue=0.8 0.7 0.6 0.5 0.4 0.3; p_conc_green_leaf_default=0.004; p_conc_green_stem_default=0.003; p_conc_senesced_leaf_default=0.004; p_conc_senesced_stem_default=0.003; p_conc_dead_leaf_default=0.004; p_conc_dead_stem_default=0.003; ash_alk_green_leaf_default=254.0; ash_alk_green_stem_default=96.0; ash_alk_senesced_leaf_default=254.0; ash_alk_senesced_stem_default=96.0; ash_alk_dead_leaf_default=254.0; ash_alk_dead_stem_default=96.0; ns_ratio_green_leaf_default=19.0; ns_ratio_green_stem_default=11.0; ns_ratio_senesced_leaf_default=19.0; ns_ratio_senesced_stem_default=11.0; ns_ratio_dead_leaf_default=19.0; ns_ratio_dead_stem_default=11.0; np_ratio_green_leaf_default=8.0; np_ratio_green_stem_default=8.0; np_ratio_senesced_leaf_default=8.0; np_ratio_senesced_stem_default=8.0; np_ratio_dead_leaf_default=8.0; np_ratio_dead_stem_default=8.0; dmd_green_leaf=0.80 0.65 0.60; dmd_green_stem=0.60 0.55 0.50; dmd_senesced_leaf=0.60 0.50 0.40; dmd_senesced_stem=0.50 0.35 0.30; dmd_dead_leaf=0.40 0.40 0.40; dmd_dead_stem=0.30 0.30 0.30; KQ5Leaf=0.008; KQ5Stem=0.004; KQ4=200; cp_n_ratio=6.25
  folder shared
    variables My Variables
      variables: dd/mm/yyyy as Date, wheat.biomass, wheat.yield, wheat.grain_protein, wheat.grain_size, esw
    events My Variables Events: event=wheat.harvesting
