folder Simulations: version=36; creator=Apsim 7.6-r3449
  simulation PasturePaddockSoilWat
    clock
      start_date = 1/07/1980  # Enter the start date of the simulation
      end_date = 30/06/1981  # Enter the end date of the simulation
    metfile met: filename=%apsim%\Examples\MetFiles\Goond.met
    summaryfile
    area pad1
      manager Regular harvest or grazing (with return)
        # Regular harvest or grazing
        AgPasture = agpasture  # Enter pasture type
        date1 = 01/07/1900  # Enter the first harvest or grazing date
        amount_type = residue  # Select the amount type
        amount = 1000  # Enter herbage amount (kg/ha)
        interval = 21  # Enter the intervals between harvest or grazing (days)
        # Material returns
        dm_frac = 0.85  # Fraction of nitrogen returned as excreta
        urine_n_frac = 0.6  # Fraction of returned nitrogen in urine
        urine_depth = 150  # Urine deposit depth (mm)
        on end_of_day:
```
account = account + 1
dm_som = 0
dm_removed = 0
n_returned =0
n_removed =0
n_som = 0
n_urine = 0
n_urine1 = 0
n_urine2 = 0
if ( (today = date('[date1]')) or
     (today >date('[date1]') and account = [interval] )) then
              account = 0
              '[AgPasture]' graze type = '[amount_type]', amount = [amount] (kg/ha)
              digest = DefoliatedDigestibility                 
              dm_som = HarvestWt * (1-digest)
                        
              n_removed  = HarvestN *(1.0-[dm_frac])
              n_returned = HarvestN * [dm_frac]
              n_som      = n_returned * ( 1.0 - [urine_n_frac] )
              n_urine    = n_returned *  [urine_n_frac]  
              n_urine1 = 0.6 * n_urine
              n_urine2 = 0.4 * n_urine
               'Surface Organic Matter' add_surfaceom name = '[AgPasture]', type =  grass, mass = dm_som (kg/ha), n = n_som (kg/ha)
              'fertiliser' apply amount =  n_urine1  (kg/ha), depth = 50  (mm), type = urea_n ()
              'fertiliser' apply amount =  n_urine2  (kg/ha), depth = 150 (mm), type = urea_n ()
 endif
```
        on init:
```
account = 0
```
      micromet
        soilalbedo = 0.23
        a_interception = 0
        b_interception = 0
        c_interception = 0
        d_interception = 0
      fertiliser
      irrigation
        automatic_irrigation = on
        asw_depth = 600  # Depth to which ASW is calculated. (mm)
        crit_fr_asw = 0.5  # Fraction of ASW below which irrigation is applied (0-1.0)
        irrigation_efficiency = 1  # Efficiency of the irrigation. (0-1.0)
        irrigation_allocation = off  # Allocation limits
        allocation = 0  # Allocation in mm
        default_no3_conc = 0  # Nitrate concentration (ppm N)
        default_nh4_conc = 0  # Ammonium concentration (ppm N)
        default_cl_conc = 0  # Chloride concentration (ppm Cl)
      surfaceom Surface Organic Matter
        PoolName = AgPasture  # Organic Matter pool name
        type = grass  # Organic Matter type
        mass = 1000  # Initial surface residue (kg/ha)
        cnr = 15  # C:N ratio of initial residue
        standing_fraction = 0  # Fraction of residue standing
      Soil SoilLismore: SoilType=0; Site=Winchmore; NearestTown=Winchmore; Region=Canterbury; State=New Zealand; NaturalVegetation=0; ApsoilNumber=0; Latitude=0; Longitude=0; LocationAccuracy=0; DataSource=published soil profile description (as an example)
        InitialWater Initial water: FractionFull=0.99; PercentMethod=FilledFromTop
        Water
          Thickness  BD    AirDry  LL15  DUL   SAT
          100        1.25  0.06    0.14  0.32  0.45
          200        1.31  0.06    0.14  0.32  0.45
          300        1.23  0.03    0.03  0.07  0.15
          300        1.24  0.03    0.03  0.05  0.08
          300        1.25  0.03    0.03  0.05  0.08
          300        1.26  0.03    0.03  0.05  0.08
          300        1.29  0.03    0.03  0.05  0.08
          SoilCrop ryegrass_clover: LL=[0.14, 0.14, 0.03, 0.03, 0.03, 0.03, 0.03]; KL=[0.1, 0.1, 0.1, 0.02, 0, 0, 0]; XF=[1, 1, 1, 1, 0, 0, 0]
          SoilCrop agpasture: LL=[0.14, 0.14, 0.03, 0.03, 0.03, 0.03, 0.03]; KL=[0.1, 0.1, 0.1, 0.02, 0, 0, 0]; XF=[1, 1, 1, 1, 0, 0, 0]
          SoilCrop ryegrass: LL=[0.14, 0.14, 0.03, 0.03, 0.03, 0.03, 0.03]; KL=[0.1, 0.1, 0.1, 0.02, 0, 0, 0]; XF=[1, 1, 1, 1, 0, 0, 0]
          SoilCrop clover: LL=[0.14, 0.14, 0.03, 0.03, 0.03, 0.03, 0.03]; KL=[0.1, 0.1, 0.1, 0.02, 0, 0, 0]; XF=[1, 1, 1, 1, 0, 0, 0]
          SoilCrop maize: LL=[0.14, 0.14, 0.03, 0.02, 0.02, 0.02, 0.02]; KL=[0.06, 0.06, 0.06, 0.06, 0.06, 0.06, 0.06]; XF=[1, 1, 1, 1, 1, 1, 1]
          SoilCrop cotton: LL=[0.14, 0.14, 0.03, 0.02, 0.02, 0.02, 0.02]; KL=[0.1, 0.1, 0.1, 0.1, 0.09, 0.07, 0.05]; XF=[1, 1, 1, 1, 1, 1, 1]
          SoilCrop sorghum: LL=[0.14, 0.14, 0.03, 0.02, 0.02, 0.02, 0.02]; KL=[0.07, 0.07, 0.07, 0.05, 0.05, 0.04, 0.03]; XF=[1, 1, 1, 1, 1, 1, 0.9]
          SoilCrop slurp: LL=[0.14, 0.14, 0.03, 0.02, 0.02, 0.02, 0.02]; KL=[0.06, 0.06, 0.06, 0.06, 0.06, 0.06, 0.06]; XF=[1, 1, 1, 1, 1, 1, 1]
        SoilWater: SummerCona=3.5; SummerU=6; SummerDate=1-Nov; WinterCona=2; WinterU=2; WinterDate=1-apr; DiffusConst=88; DiffusSlope=35; Salb=0.13; CN2Bare=73; CNRed=20; CNCov=0.8; Thickness=[100, 200, 300, 300, 300, 300, 300]; SWCON=[0.4, 0.5, 0.6, 0.6, 0.8, 0.8, 0.8]
        SoilOrganicMatter: RootCN=40; RootWt=800; SoilCN=11.3; EnrACoeff=7.4; EnrBCoeff=0.2
          Thickness  OC   FBiom  FInert
          100        4    0.04   0.3
          200        2.5  0.02   0.5
          300        0.5  0.02   0.6
          300        0.1  0.01   0.8
          300        0.1  0.01   1
          300        0    0      1
          300        0    0      1
        Analysis: Thickness=[100, 200, 300, 300, 300, 300, 300]; PH=[5.9, 5.9, 5.9, 5.9, 5.9, 5.9, 5.9]
        Sample Initial nitrogen
          Thickness  NO3      NH4
          100        7.61905  0.132451
          200        7.27008  0.132451
          300        3.87147  0.132451
          300        3.84025  0.132451
          300        3.80952  0.132451
          300        3.77929  0.132451
          300        3.6914   0.132451
      AgPasture
        Nspecies = 2  # Number of species
        thisCropName = AgPasture  # Crop name shown as on the simulation tree
        cropName = ryegrass whiteclover  # Species names
        dmshoot = 1500      350  # Initial shoot dry matter (kg/ha)
        dmlitter = 250        50  # Initial litter dry matter (kg/ha)
        dmgreenmin = 500        50  # Minimum green dry matter (kg/ha)
        rootDepth = 900        400  # Root depth (mm)
        RootDistributionMethod = Homogeneous  # Method to define the root distribution over the soil profile
        rlvp = 1.0 1.0  # Root distribution of swards (relative to each soil layer)
        WaterUptakeSource = calc  # Water uptake done by AgPasture (calc) or by apsim?
      outputfile: filename=PasturePaddockSoilWat pad1.out; title=PasturePaddockSoilWat pad1
        variables
          variable:
            dd/mmm/yyyy as Date
            runoff
            drain
            es as evaporation
            HarvestWt
            TotalPlantWt
            AboveGroundWt
            StandingPlantWt
            HerbageGrowthWt
            SpeciesAboveGroundWt(1) as RyegrassWt
            SpeciesAboveGroundWt(2) as WhiteCloverWt
            LAI_total
            surfaceom_wt
            sw_dep()
            dlayer
            NitrogenUptakeLayers
            rlvp
        events Reporting Frequency: event=end_day
    area pad2
      manager Regular harvest or grazing (with return): same as PasturePaddockSoilWat.pad1.Regular harvest or grazing (with return)
      micromet
        soilalbedo = 0.23
        a_interception = 0
        b_interception = 0
        c_interception = 0
        d_interception = 0
      fertiliser
      irrigation: same as PasturePaddockSoilWat.pad1.Irrigation
      surfaceom Surface Organic Matter
        PoolName = AgPasture  # Organic Matter pool name
        type = grass  # Organic Matter type
        mass = 1000  # Initial surface residue (kg/ha)
        cnr = 15  # C:N ratio of initial residue
        standing_fraction = 0  # Fraction of residue standing
      Soil SoilLismore: SoilType=0; Site=Winchmore; NearestTown=Winchmore; Region=Canterbury; State=New Zealand; NaturalVegetation=0; ApsoilNumber=0; Latitude=0; Longitude=0; LocationAccuracy=0; DataSource=published soil profile description (as an example)
        InitialWater Initial water: FractionFull=0.99; PercentMethod=FilledFromTop
        Water: same as PasturePaddockSoilWat.pad1.SoilLismore.Water
        SoilWater: SummerCona=3.5; SummerU=6; SummerDate=1-Nov; WinterCona=2; WinterU=2; WinterDate=1-apr; DiffusConst=88; DiffusSlope=35; Salb=0.13; CN2Bare=73; CNRed=20; CNCov=0.8; Thickness=[100, 200, 300, 300, 300, 300, 300]; SWCON=[0.4, 0.5, 0.6, 0.6, 0.8, 0.8, 0.8]
        SoilOrganicMatter: RootCN=40; RootWt=800; SoilCN=11.3; EnrACoeff=7.4; EnrBCoeff=0.2
          Thickness  OC   FBiom  FInert
          100        4    0.04   0.3
          200        2.5  0.02   0.5
          300        0.5  0.02   0.6
          300        0.1  0.01   0.8
          300        0.1  0.01   1
          300        0    0      1
          300        0    0      1
        Analysis: Thickness=[100, 200, 300, 300, 300, 300, 300]; PH=[5.9, 5.9, 5.9, 5.9, 5.9, 5.9, 5.9]
        Sample Initial nitrogen: same as PasturePaddockSoilWat.pad1.SoilLismore.Initial nitrogen
      AgPasture
        Nspecies = 2  # Number of species
        thisCropName = AgPasture  # Crop name shown as on the simulation tree
        cropName = ryegrass whiteclover  # Species names
        dmshoot = 1500      350  # Initial shoot dry matter (kg/ha)
        dmlitter = 250        50  # Initial litter dry matter (kg/ha)
        dmgreenmin = 500        50  # Minimum green dry matter (kg/ha)
        rootDepth = 900        400  # Root depth (mm)
        RootDistributionMethod = UserDefined  # Method to define the root distribution over the soil profile
        rlvp = 1 0.2 0.1 0.05 0 0 0  # Root distribution of swards (relative to each soil layer)
        WaterUptakeSource = calc  # Water uptake done by AgPasture (calc) or by apsim?
      outputfile: filename=PasturePaddockSoilWat pad2.out; title=PasturePaddockSoilWat pad2
        variables
          variable:
            dd/mmm/yyyy as Date
            runoff
            drain
            es as evaporation
            HarvestWt
            TotalPlantWt
            AboveGroundWt
            StandingPlantWt
            HerbageGrowthWt
            SpeciesAboveGroundWt(1) as RyegrassWt
            SpeciesAboveGroundWt(2) as WhiteCloverWt
            LAI_total
            surfaceom_wt
            sw_dep()
            dlayer
            NitrogenUptakeLayers
            rlvp
        events Reporting Frequency: event=end_day
    area pad3
      manager Regular harvest or grazing (with return): same as PasturePaddockSoilWat.pad1.Regular harvest or grazing (with return)
      micromet
        soilalbedo = 0.23
        a_interception = 0
        b_interception = 0
        c_interception = 0
        d_interception = 0
      fertiliser
      irrigation: same as PasturePaddockSoilWat.pad1.Irrigation
      surfaceom Surface Organic Matter
        PoolName = AgPasture  # Organic Matter pool name
        type = grass  # Organic Matter type
        mass = 1000  # Initial surface residue (kg/ha)
        cnr = 15  # C:N ratio of initial residue
        standing_fraction = 0  # Fraction of residue standing
      Soil SoilLismore: same as PasturePaddockSoilWat.pad2.SoilLismore
      AgPasture
        Nspecies = 2  # Number of species
        thisCropName = AgPasture  # Crop name shown as on the simulation tree
        cropName = ryegrass whiteclover  # Species names
        dmshoot = 1500      350  # Initial shoot dry matter (kg/ha)
        dmlitter = 250        50  # Initial litter dry matter (kg/ha)
        dmgreenmin = 500        50  # Minimum green dry matter (kg/ha)
        rootDepth = 900        400  # Root depth (mm)
        RootDistributionMethod = ExpoLinear  # Method to define the root distribution over the soil profile
        rlvp = 0.2  0.2  # Root distribution of swards (relative to each soil layer)
        WaterUptakeSource = calc  # Water uptake done by AgPasture (calc) or by apsim?
      outputfile: filename=PasturePaddockSoilWat pad3.out; title=PasturePaddockSoilWat pad3
        variables
          variable:
            dd/mmm/yyyy as Date
            runoff
            drain
            es as evaporation
            HarvestWt
            TotalPlantWt
            AboveGroundWt
            StandingPlantWt
            HerbageGrowthWt
            SpeciesAboveGroundWt(1) as RyegrassWt
            SpeciesAboveGroundWt(2) as WhiteCloverWt
            LAI_total
            surfaceom_wt
            sw_dep()
            dlayer
            NitrogenUptakeLayers
            rlvp
        events Reporting Frequency: event=end_day
    area pad4
      manager Regular harvest or grazing (with return): same as PasturePaddockSoilWat.pad1.Regular harvest or grazing (with return)
      micromet
        soilalbedo = 0.23
        a_interception = 0
        b_interception = 0
        c_interception = 0
        d_interception = 0
      fertiliser
      irrigation: same as PasturePaddockSoilWat.pad1.Irrigation
      surfaceom Surface Organic Matter
        PoolName = AgPasture  # Organic Matter pool name
        type = grass  # Organic Matter type
        mass = 1000  # Initial surface residue (kg/ha)
        cnr = 15  # C:N ratio of initial residue
        standing_fraction = 0  # Fraction of residue standing
      Soil SoilLismore: same as PasturePaddockSoilWat.pad2.SoilLismore
      AgPasture
        Nspecies = 2  # Number of species
        thisCropName = AgPasture  # Crop name shown as on the simulation tree
        cropName = ryegrass whiteclover  # Species names
        dmshoot = 1500      350  # Initial shoot dry matter (kg/ha)
        dmlitter = 250        50  # Initial litter dry matter (kg/ha)
        dmgreenmin = 500        50  # Minimum green dry matter (kg/ha)
        rootDepth = 900        400  # Root depth (mm)
        RootDistributionMethod = ExpoLinear  # Method to define the root distribution over the soil profile
        ExpoLinearDepthParam = 0.2  # Root distribution parameter, fraction of root depth to decrease root proportion (0-1)
        ExpoLinearCurveParam = 3  # Root distribution parameter, exponent for decreasing phase of root poportion
        WaterUptakeSource = calc  # Water uptake done by AgPasture (calc) or by apsim?
      outputfile: filename=PasturePaddockSoilWat pad4.out; title=PasturePaddockSoilWat pad4
        variables
          variable:
            dd/mmm/yyyy as Date
            runoff
            drain
            es as evaporation
            HarvestWt
            TotalPlantWt
            AboveGroundWt
            StandingPlantWt
            HerbageGrowthWt
            SpeciesAboveGroundWt(1) as RyegrassWt
            SpeciesAboveGroundWt(2) as WhiteCloverWt
            LAI_total
            surfaceom_wt
            sw_dep()
            dlayer
            NitrogenUptakeLayers
            rlvp
        events Reporting Frequency: event=end_day
  simulation PasturePaddockWithSWIM3
    clock
      start_date = 1/07/1980  # Enter the start date of the simulation
      end_date = 30/06/1981  # Enter the end date of the simulation
    metfile met: filename=%apsim%\Examples\MetFiles\Goond.met
    summaryfile
    area pad1
      manager Regular harvest or grazing (with return): same as PasturePaddockSoilWat.pad1.Regular harvest or grazing (with return)
      micromet
        soilalbedo = 0.23
        a_interception = 0
        b_interception = 0
        c_interception = 0
        d_interception = 0
      fertiliser
      irrigation: same as PasturePaddockSoilWat.pad1.Irrigation
      surfaceom Surface Organic Matter
        PoolName = AgPasture  # Organic Matter pool name
        type = grass  # Organic Matter type
        mass = 1000  # Initial surface residue (kg/ha)
        cnr = 15  # C:N ratio of initial residue
        standing_fraction = 0  # Fraction of residue standing
      Soil SoilLismore: SoilType=0; Site=Winchmore; NearestTown=Winchmore; Region=Canterbury; State=New Zealand; NaturalVegetation=0; ApsoilNumber=0; Latitude=0; Longitude=0; LocationAccuracy=0; DataSource=published soil profile description (as an example)
        InitialWater Initial water: FractionFull=0.99; PercentMethod=FilledFromTop
        Water
          Thickness  KS     BD    AirDry  LL15  DUL   SAT
          100        14000  1.25  0.06    0.14  0.32  0.45
          200        14000  1.31  0.06    0.14  0.32  0.45
          300        14000  1.23  0.03    0.03  0.07  0.15
          300        14000  1.24  0.03    0.03  0.05  0.08
          300        14000  1.25  0.03    0.03  0.05  0.08
          300        14000  1.26  0.03    0.03  0.05  0.08
          300        14000  1.29  0.03    0.03  0.05  0.08
          SoilCrop ryegrass_clover: LL=[0.14, 0.14, 0.03, 0.03, 0.03, 0.03, 0.03]; KL=[0.1, 0.1, 0.1, 0.02, 0, 0, 0]; XF=[1, 1, 1, 1, 0, 0, 0]
          SoilCrop agpasture: LL=[0.14, 0.14, 0.03, 0.03, 0.03, 0.03, 0.03]; KL=[0.1, 0.1, 0.1, 0.02, 0, 0, 0]; XF=[1, 1, 1, 1, 0, 0, 0]
          SoilCrop ryegrass: LL=[0.14, 0.14, 0.03, 0.03, 0.03, 0.03, 0.03]; KL=[0.1, 0.1, 0.1, 0.02, 0, 0, 0]; XF=[1, 1, 1, 1, 0, 0, 0]
          SoilCrop clover: LL=[0.14, 0.14, 0.03, 0.03, 0.03, 0.03, 0.03]; KL=[0.1, 0.1, 0.1, 0.02, 0, 0, 0]; XF=[1, 1, 1, 1, 0, 0, 0]
          SoilCrop maize: LL=[0.14, 0.14, 0.03, 0.02, 0.02, 0.02, 0.02]; KL=[0.06, 0.06, 0.06, 0.06, 0.06, 0.06, 0.06]; XF=[1, 1, 1, 1, 1, 1, 1]
          SoilCrop cotton: LL=[0.14, 0.14, 0.03, 0.02, 0.02, 0.02, 0.02]; KL=[0.1, 0.1, 0.1, 0.1, 0.09, 0.07, 0.05]; XF=[1, 1, 1, 1, 1, 1, 1]
          SoilCrop sorghum: LL=[0.14, 0.14, 0.03, 0.02, 0.02, 0.02, 0.02]; KL=[0.07, 0.07, 0.07, 0.05, 0.05, 0.04, 0.03]; XF=[1, 1, 1, 1, 1, 1, 0.9]
          SoilCrop slurp: LL=[0.14, 0.14, 0.03, 0.02, 0.02, 0.02, 0.02]; KL=[0.06, 0.06, 0.06, 0.06, 0.06, 0.06, 0.06]; XF=[1, 1, 1, 1, 1, 1, 1]
        SoilOrganicMatter: RootCN=40; RootWt=800; SoilCN=11.3; EnrACoeff=7.4; EnrBCoeff=0.2; OCUnits=Total
          Thickness  OC   FBiom  FInert
          100        4    0.04   0.3
          200        2.5  0.02   0.5
          300        0.5  0.02   0.6
          300        0.1  0.01   0.8
          300        0.1  0.01   1
          300        0    0      1
          300        0    0      1
        Analysis: Thickness=[100, 200, 300, 300, 300, 300, 300]; PH=[5.9, 5.9, 5.9, 5.9, 5.9, 5.9, 5.9]
        Sample Initial nitrogen: same as PasturePaddockSoilWat.pad1.SoilLismore.Initial nitrogen
        Swim: Salb=0.13; CN2Bare=73; CNRed=20; CNCov=0.8; KDul=0.1; PSIDul=-100; VC=true; DTmin=0; DTmax=1440; MaxWaterIncrement=10; SpaceWeightingFactor=0; SoluteSpaceWeightingFactor=0; Diagnostics=false
          SwimSoluteParameters: ThicknessUnits=mm
            Thickness  NO3Exco  NO3FIP  NH4Exco  NH4FIP  UreaExco  UreaFIP  ClExco  ClFIP
            1000       0        1.0     100.0    1.0     0.0       1.0      0.0     1.0
            1000       0        1.0     100.0    1.0     0.0       1.0      0.0     1.0
            1000       0.0      1.0     100.0    1.0     0.0       1.0      0.0     1.0
            Dis = 15  # Dispersivity - dis ((cm^2/h)/(cm/h)^p)
            Disp = 1  # Dispersivity Power - disp
            A = 1.0  # Tortuosity Constant - a
            DTHC = 0.0  # Tortuoisty Offset - dthc
            DTHP = 1.0  # Tortuoisty Power - dthp
            WaterTableCl = 0.0  # Water Table Cl Concentration (ppm)
            WaterTableNO3 = 0.0  # Water Table NO3 Concentration (ppm)
            WaterTableNH4 = 0.0  # Water Table NH4 Concentration (ppm)
            WaterTableUrea = 0.0  # Water Table Urea Concentration (ppm)
        LayerStructure: Thickness=[10, 20, 30, 40, 100, 200, 200, 200, 300, 300, 300, 100]
      AgPasture
        Nspecies = 2  # Number of species
        thisCropName = AgPasture  # Crop name shown as on the simulation tree
        cropName = ryegrass whiteclover  # Species names
        dmshoot = 1500      350  # Initial shoot dry matter (kg/ha)
        dmlitter = 250        50  # Initial litter dry matter (kg/ha)
        dmgreenmin = 500        50  # Minimum green dry matter (kg/ha)
        rootDepth = 900        400  # Root depth (mm)
        RootDistributionMethod = Homogeneous  # Method to define the root distribution over the soil profile
        rlvp = 1.0 1.0  # Root distribution of swards (relative to each soil layer)
        WaterUptakeSource = apsim  # Water uptake done by AgPasture (calc) or by apsim?
      outputfile: filename=PasturePaddockWithSWIM3 pad1.out; title=PasturePaddockWithSWIM3 pad1
        variables
          variable:
            dd/mmm/yyyy as Date
            runoff
            drain
            es as evaporation
            HarvestWt
            TotalPlantWt
            AboveGroundWt
            StandingPlantWt
            HerbageGrowthWt
            SpeciesAboveGroundWt(1) as RyegrassWt
            SpeciesAboveGroundWt(2) as WhiteCloverWt
            LAI_total
            surfaceom_wt
            sw_dep()
            dlayer
            NitrogenUptakeLayers
            rlvp
        events Reporting Frequency: event=end_day
    area pad2
      manager Regular harvest or grazing (with return): same as PasturePaddockSoilWat.pad1.Regular harvest or grazing (with return)
      micromet
        soilalbedo = 0.23
        a_interception = 0
        b_interception = 0
        c_interception = 0
        d_interception = 0
      fertiliser
      irrigation: same as PasturePaddockSoilWat.pad1.Irrigation
      surfaceom Surface Organic Matter
        PoolName = AgPasture  # Organic Matter pool name
        type = grass  # Organic Matter type
        mass = 1000  # Initial surface residue (kg/ha)
        cnr = 15  # C:N ratio of initial residue
        standing_fraction = 0  # Fraction of residue standing
      Soil SoilLismore: SoilType=0; Site=Winchmore; NearestTown=Winchmore; Region=Canterbury; State=New Zealand; NaturalVegetation=0; ApsoilNumber=0; Latitude=0; Longitude=0; LocationAccuracy=0; DataSource=published soil profile description (as an example)
        InitialWater Initial water: FractionFull=0.99; PercentMethod=FilledFromTop
        Water: same as PasturePaddockWithSWIM3.pad1.SoilLismore.Water
        SoilOrganicMatter: RootCN=40; RootWt=800; SoilCN=11.3; EnrACoeff=7.4; EnrBCoeff=0.2
          Thickness  OC   FBiom  FInert
          100        4    0.04   0.3
          200        2.5  0.02   0.5
          300        0.5  0.02   0.6
          300        0.1  0.01   0.8
          300        0.1  0.01   1
          300        0    0      1
          300        0    0      1
        Analysis: Thickness=[100, 200, 300, 300, 300, 300, 300]; PH=[5.9, 5.9, 5.9, 5.9, 5.9, 5.9, 5.9]
        Sample Initial nitrogen: same as PasturePaddockSoilWat.pad1.SoilLismore.Initial nitrogen
        Swim
          Salb = 0.13  # Bare Soil Albedo
          CN2Bare = 73  # Bare Soil Runoff Curve Number
          CNRed = 20  # Max. Reduction in Curve Number due to cover
          CNCov = 0.8  # Cover for max Curve Number reduction
          KDul = .1  # Hydraulic Conductivity at DUL (mm/d)
          PSIDul = -100  # Matric Potential at DUL (cm)
          VC = true  # Vapour Conductivity Calculations (on/off)
          DTmin = 0.0  # Minimum Timestep (min)
          DTmax = 1440.  # Maximum Timestep (min)
          MaxWaterIncrement = 10  # Maximum Water Increment (mm)
          SpaceWeightingFactor = 0
          SoluteSpaceWeightingFactor = 0.0
          Diagnostics = false  # Diagnostic Information?
          SwimSoluteParameters: same as PasturePaddockWithSWIM3.pad1.SoilLismore.Swim.SwimSoluteParameters
        LayerStructure: Thickness=[10, 20, 30, 40, 100, 200, 200, 200, 300, 300, 300, 100]
      AgPasture
        Nspecies = 2  # Number of species
        thisCropName = AgPasture  # Crop name shown as on the simulation tree
        cropName = ryegrass whiteclover  # Species names
        dmshoot = 1500      350  # Initial shoot dry matter (kg/ha)
        dmlitter = 250        50  # Initial litter dry matter (kg/ha)
        dmgreenmin = 500        50  # Minimum green dry matter (kg/ha)
        rootDepth = 900        400  # Root depth (mm)
        RootDistributionMethod = UserDefined  # Method to define the root distribution over the soil profile
        rlvp = 1 1 1 1 0.2 0.15 0.1 0.1 0.05 0 0 0  # Root distribution of swards (relative to each soil layer)
        WaterUptakeSource = apsim  # Water uptake done by AgPasture (calc) or by apsim?
      outputfile: filename=PasturePaddockWithSWIM3 pad2.out; title=PasturePaddockWithSWIM3 pad2
        variables
          variable:
            dd/mmm/yyyy as Date
            runoff
            drain
            es as evaporation
            HarvestWt
            TotalPlantWt
            AboveGroundWt
            StandingPlantWt
            HerbageGrowthWt
            SpeciesAboveGroundWt(1) as RyegrassWt
            SpeciesAboveGroundWt(2) as WhiteCloverWt
            LAI_total
            surfaceom_wt
            sw_dep()
            dlayer
            NitrogenUptakeLayers
            rlvp
        events Reporting Frequency: event=end_day
    area pad3
      manager Regular harvest or grazing (with return): same as PasturePaddockSoilWat.pad1.Regular harvest or grazing (with return)
      micromet
        soilalbedo = 0.23
        a_interception = 0
        b_interception = 0
        c_interception = 0
        d_interception = 0
      fertiliser
      irrigation: same as PasturePaddockSoilWat.pad1.Irrigation
      surfaceom Surface Organic Matter
        PoolName = AgPasture  # Organic Matter pool name
        type = grass  # Organic Matter type
        mass = 1000  # Initial surface residue (kg/ha)
        cnr = 15  # C:N ratio of initial residue
        standing_fraction = 0  # Fraction of residue standing
      Soil SoilLismore: same as PasturePaddockWithSWIM3.pad2.SoilLismore
      AgPasture
        Nspecies = 2  # Number of species
        thisCropName = AgPasture  # Crop name shown as on the simulation tree
        cropName = ryegrass whiteclover  # Species names
        dmshoot = 1500      350  # Initial shoot dry matter (kg/ha)
        dmlitter = 250        50  # Initial litter dry matter (kg/ha)
        dmgreenmin = 500        50  # Minimum green dry matter (kg/ha)
        rootDepth = 900        400  # Root depth (mm)
        RootDistributionMethod = ExpoLinear  # Method to define the root distribution over the soil profile
        rlvp = 0.2  0.2  # Root distribution of swards (relative to each soil layer)
        WaterUptakeSource = apsim  # Water uptake done by AgPasture (calc) or by apsim?
      outputfile: filename=PasturePaddockWithSWIM3 pad3.out; title=PasturePaddockWithSWIM3 pad3
        variables
          variable:
            dd/mmm/yyyy as Date
            runoff
            drain
            es as evaporation
            HarvestWt
            TotalPlantWt
            AboveGroundWt
            StandingPlantWt
            HerbageGrowthWt
            SpeciesAboveGroundWt(1) as RyegrassWt
            SpeciesAboveGroundWt(2) as WhiteCloverWt
            LAI_total
            surfaceom_wt
            sw_dep()
            dlayer
            NitrogenUptakeLayers
            rlvp
        events Reporting Frequency: event=end_day
    area pad4
      manager Regular harvest or grazing (with return): same as PasturePaddockSoilWat.pad1.Regular harvest or grazing (with return)
      micromet
        soilalbedo = 0.23
        a_interception = 0
        b_interception = 0
        c_interception = 0
        d_interception = 0
      fertiliser
      irrigation: same as PasturePaddockSoilWat.pad1.Irrigation
      surfaceom Surface Organic Matter
        PoolName = AgPasture  # Organic Matter pool name
        type = grass  # Organic Matter type
        mass = 1000  # Initial surface residue (kg/ha)
        cnr = 15  # C:N ratio of initial residue
        standing_fraction = 0  # Fraction of residue standing
      Soil SoilLismore: same as PasturePaddockWithSWIM3.pad2.SoilLismore
      AgPasture
        Nspecies = 2  # Number of species
        thisCropName = AgPasture  # Crop name shown as on the simulation tree
        cropName = ryegrass whiteclover  # Species names
        dmshoot = 1500      350  # Initial shoot dry matter (kg/ha)
        dmlitter = 250        50  # Initial litter dry matter (kg/ha)
        dmgreenmin = 500        50  # Minimum green dry matter (kg/ha)
        rootDepth = 900        400  # Root depth (mm)
        RootDistributionMethod = ExpoLinear  # Method to define the root distribution over the soil profile
        ExpoLinearDepthParam = 0.2  # Root distribution parameter, fraction of root depth to decrease root proportion (0-1)
        ExpoLinearCurveParam = 3  # Root distribution parameter, exponent for decreasing phase of root poportion
        WaterUptakeSource = apsim  # Water uptake done by AgPasture (calc) or by apsim?
      outputfile: filename=PasturePaddockWithSWIM3 pad4.out; title=PasturePaddockWithSWIM3 pad4
        variables
          variable:
            dd/mmm/yyyy as Date
            runoff
            drain
            es as evaporation
            HarvestWt
            TotalPlantWt
            AboveGroundWt
            StandingPlantWt
            HerbageGrowthWt
            SpeciesAboveGroundWt(1) as RyegrassWt
            SpeciesAboveGroundWt(2) as WhiteCloverWt
            LAI_total
            surfaceom_wt
            sw_dep()
            dlayer
            NitrogenUptakeLayers
            rlvp
        events Reporting Frequency: event=end_day
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