folder simulations: version=36; creator=Apsim 7.6-r3467
  simulation TestGrazeParams
    clock
      start_date = 01/10/1990  # Enter the start date of the simulation
      end_date = 31/10/1990  # Enter the end date of the simulation
    metfile met: filename=%apsim%\Examples\MetFiles\lincoln.met
    memo Info
       Test for Graze method with preferences set for green and dead material (per species)           -    RCichota, May 2014

         This test compares the original graze method in AgPasture with a new version which considers weights (preferences) for the various pools.
       The original AgPasture method partition the requested amount of DM between species considering only their standing DM; whenever the
       amounts are low (with respect to 'dmgreenmin') the partition tends to be biased, wich might cause problems of mass balance. The code does
       not have enough checking points to ensure that the amount reported as harvested and the amount actually removed are the same.
          The new method computes the partition considering weights (preferences) as well as the available amounts for each species and then for
       each pool (stem and leaf, green or dead). The preferences are are set in the xml file, with default values of one (equal preference for all pools).
       To use the new method the parameter 'BiomassRemovalMethod' has to be set to 'SetGenericPreferences' (the default is 'AgP_original' and
       means that the original method is used).

          Here, the idea is highlight the differences, so two paddocks are set with identical setup.  In them pasture is being cut twice, but the method
       used to compute the amounts to be removed for each pool of each plant species is different; in paddck01 the original AgPasture method is
       used while the new method is used in the second paddock.
          Note that for the first cut the DM available is sufficient to allow all the requested DM amount (1100 kg/ha) to be removed. Even with the
       same amount removed, it can already be seen that the partition of this amount amongst the two plant species is already slightly different for
       the two methods. For the second cut, the total amount cut is smaller than the requested (this is because the trigger to cut uses total green DM
       while the actual amount takes into account 'dmgreenmin'), and the differences between the two methods are much bigger. These differences
       are caused by the differences on the methods, but also due to slight differences in partition in the first cut.

          In paddock 03, it is shown all the variables that are related to the new method. It is possible to set a minimum value for dead DM,which is used
       to compute available DM, and the preferences for green or dead biomass. Note that the values are used as weights, so the preference for green
       DM is four times higher than the preference for dead material. Also the preference for clover is twice of that for ryegrass - the sum of preferences
       for green and dead are used to express the preferences for each species.
    summaryfile
    area Paddock01
      folder ManagerFolder
        manager2 Cut rotation for AgPasture
          # Setup cut rotation for AgPasture
          CutPasture_StartDate = 5/10/1990  # Enter date to start rotation (dd/mm/yyyy)
          CutPasture_EndDate = 31/12/2100  # Enter date to end rotation (dd/mm/yyyy)
          AgPasture_type = AgPasture  # Enter pasture module
          CutTrigger_type = Fixed interval  # Enter the cut trigger type
          CutInterval = 20  # If trigger is interval between cuttings, enter its value (days)
          UpperThreshold = 1500  # If trigger is the sward standing mass, enter the amount (kgDM/ha)
          CoverTarget = 2500  2300  2100  1900  1600  1400  1200  1200  1400  1600  1900  2400  2500  # If targeting a cover, enter the values over the year [Jan-Dec] (kgDM/ha)
          RemoveAmount_type = Set amount  # Enter how removed amount is computed
          Amount2Remove = 1100  # If targeting amount or cover, enter the value to remove at each cut (kgDM/ha)
          FractAboveTarget = 0.75  # If targeting cover, enter the fraction above target to trigger cut (0-1)
          LowerThreshold = 1000  # If not targeting cover, enter the minimum residual after cut (kgDM/ha)
          # Management of cut material
          ResidueTreatment_type = Return as residue  # Enter the treatment type for the cut material
          DMRemovalOption = 1.0  # Enter fraction of DM that is removed from field (0-1)
          FracN2Remove = 1.0  # Enter fraction of N that is removed from field (0-1)
          # If returning as dung & urine
          FracN2Dung = 0.0  # Enter proportion of N returned in dung (0-1)
          Dummy4 =
```vb
Imports System
Imports ModelFramework

'This manager sets up a cutting rotation for AgPasture. The rotation is bounded between two dates. Cuts happens in the first day,
' if possible, and thereof can follow various rotation types. Cut is done on above ground stem and leaf DM (dead and green).
' + Cut trigger types:
'  - Fixed interval:
'     Cut is allowed at given days only (set by start rotation date and then at regular intervals)
'     Cut happens if amount to remove is set or if existing DM is greater than LowerTheshold
'  - Target interval: 
'     Cut is allowed from given days (begins at start rotation date and at regular intervals after last cut)
'     Cut happens if amount to remove is set or if existing DM is greater than LowerTheshold
'  - Target standing mass:
'     Cut is allowed when existing DM reaches the target value (UpperThreshold)
'     Cut always happens (unless UpperThreshold is bellow LowerTheshold
'  - Target mass above residual to cut:
'     Cut is allowed when existing DM is larger than the LowerTheshold plus the given amount to remove
'     Cut allways happens, (this option is not only valid with remove amount option 'Set interval')
'  - Target DM cover: Cut when DM is above target cover (trigger based on interval or amount)
'     Cut is allowed:
'        1) When existing DM is larger than the target cover DM plus a given amount to remove (times fraction above target)
'        2) From given dates (begins at start rotation date and at regular intervals after last cut)
'     Cut happens if existing DM is above target cover DM
'
' + Remove amount options:
'  - Set amount: The amount to remove is fixed, if this amount is not available, no cut is performed
'  - Target amount: The amount is the smallest of a given value and difference between existing DM and a target (LowerTheshold of CoverTarget)
'  - Down to residual DM: Amount to remove is the difference between existing DM and LowerTheshold (option is not valid if CutTrigger is 'Target DM cover')
'  - Set interval: Amount to remove is computed, any time DM is above target ([existing DM - target cover]/fraction above target)
'     (option only valid if CutTrigger is 'Target DM cover'
'
' + Manage residues options:
'  - 
'  - Return as residue: A fraction of the DM cut is added as grass residue to the surfaceOM module;
'  - Return as dung & urine: A fraction of the amount cut is returned to the soil as evenly distributed urine and dung. 
'     This is a very simplified approach where the fractions of DM (C) and N to be removed are set separately. Also,
'      the partition of N between urine and dung is set by the user. 
'     N urine is added as urea fertiliser (top 10cm) and teh rmaining DM and N are added to surfaceOM as dung (RuminantDung_PastureFed).


'-->  Last uptaded in: 7/Aug/2012 ..................


Public Class Script 
   
   'Parameter variables:
   <param> Private CutPasture_StartDate As String        'Date to start the cutting rotation
   <param> Private CutPasture_EndDate As String          'Date to end cutting rotation
   <param> Private AgPasture_type As String              'The pasture module

   <param> Private CutTrigger_type As String             'The cut trigger type
   <param> Private CutInterval As Integer                'The interval between cuts, if cut type is fixed intervals (days)
   <param> Private UpperThreshold As Double              'The DM amount to trigger a cut, if cut type is target DM (kg/ha, DM above ground)
   <param> Private CoverTarget As String                 'The target cover over the year (values will be interpolated using DoY)

   <param> Private RemoveAmount_type As String           'The way to compute how much pasture is cut
   <param> Private Amount2Remove As Double               'The amount of DM to be removed at each cut, limited to residual DM (LowerThreshold) (kg/ha, DM above ground)
   <param> Private FractAboveTarget As Double                  'The fraction of the target amount to remove above the target cover that triggers a cut
   <param> Private LowerThreshold As Double              'The residual DM amount left after cut  (kg/ha, DM above ground); cut only happens if DM is greater than this

   <param> Private ResidueTreatment_type As String       'The treatment to the material cut
   <param> Private DMRemovalOption As String             'The option to remove DM, based on digestibility of a fraction (0-1)
   <param> Private FracN2Remove As Double                'Fraction of the N in the material cut that is removed from simulation (0-1)
   <param> Private FracN2Dung As Double                  'The fraction of returned N that goes into dung, if return is as dung and urine (0-1)
     
         
   'Links and events:
   <Link> Private MyAgPasture As AgPasture
   <Link> Private MySelf As Component
   <[Event]()> Public Event Graze As GrazeDelegate
   <[Event]()> Public Event BiomassRemoved As BiomassRemovedDelegate   
   <[Event]()> Public Event FertiliserApplication As FertiliserApplicationDelegate

   
   'Variables read from other modules
   <Input> Private today As DateTime                     'Today's date
   <Input> Private day As Integer                        'Today's day of year
   <input> Private StemWt As Double                      'The DM of stems (above ground DM)
   <input> Private LeafWt As Double                      'The DM of leaves (above ground DM)
   <input> Private StemN As Double                       'The N amount in stems (above ground N)
   <input> Private LeafN As Double                       'The N amount in leaves (above ground N)
   <input> Private HarvestWt As Double                   'The DM harvested (kg/ha)
   <input> Private HarvestN As Double                    'The N amount harvested (kgN/ha)
   <input> Private DefoliatedDigestibility As Double     'The pasture digestibility (0-1)
   
   'Outputs
   <output><units("")> Public Can_Cut As String                  'Whether todays is a cutting day
   <output><units("")> Public Has_Cut As String                  'Whether todays cut was done
   <output><units("kg/ha")> Public harvested_dm As Double        'Pasture DM harvested today (kg/ha)
   <output><units("kgN/ha")> Public harvested_n As Double        'N harvested today
   <output><units("kg/ha")> Public removed_dm As Double          'DM removed from the simulation
   <output><units("kgN/ha")> Public removed_n As Double          'N removed from the simulation
   <output><units("kgN/ha")> Public returned_dm As Double        'DM returned to the paddock
   <output><units("kgN/ha")> Public returned_n As Double         'N returned to the paddock
   <output><units("kgN/ha")> Public NReturn_asDung As Double     'N returned as dung (SurfOM)
   <output><units("kgN/ha")> Public NReturn_asUrine As Double    'N returned as urine (urea)
   <output><units("kg/ha/day")> Public GrowthRateCalc As Double  'Average growth rate for this cut
   <output><units("%")> Public Nconc_inRemoved As Double         'N concentration on the cut material
   <output><units("days")> Public DaysAfterCut As Integer        'Number of days after last cut
   <output><units("kg/ha")> Public TodaysCoverTarget As Double   'Todays cover target
   <output><units("kg/ha")> Public StandingWt As Double          'Total standing DM (Stem + Leaf)
   <output><units("kg/ha")> Public PostHarvestDM As Double       'Total standing DM (Stem + Leaf) after cut

   'Internal variables
   Private StartDate As DateTime             'The date when cutting starts (in date format)
   Private EndDate As DateTime               'The date when cuttings finish (in date format)
   Private FracDM2Remove As Double           'The fraction of DM to be removed from the simulation (0-1)
   Private TargetCoverDays() As Integer
   Private TargetCoverValues() As Double
   Private Allow_Cut As String
   
   <EventHandler()> Public Sub OnInit2()

      'Put the dates into date format:
      StartDate = DateTime.Parse(CutPasture_StartDate & " 06:00:00 am")
      EndDate = DateTime.Parse(CutPasture_EndDate & " 06:00:00 pm")
      
      'Verify that fractions are within limits
      If FractAboveTarget < 0 Or FractAboveTarget > 1 Then
         Throw New Exception("Fraction above target is out of bounds")
      End If
            
      'Set the target cover arrays
      TargetCoverValues = makeArray(CoverTarget)
      TargetCoverDays = setDays(TargetCoverValues)
      
      'Reset variables
      DaysAfterCut = CutInterval - 1
      Allow_Cut = "no" 
      Can_Cut = Allow_Cut
      Has_Cut = "no"
      TodaysCoverTarget = 0.0
  
      'The fraction of DM to remove
      ' - DMRemovalOption can be a value (0-1 = FracDM2Remove) or a string, which tell us that FracDM2Remove is based on digestibility
      If DMRemovalOption.ToLower = "based on digestibility" Then
         FracDM2Remove = 1 - DefoliatedDigestibility
      Else
         Try
            FracDM2Remove = DMRemovalOption
            If (FracDM2Remove < 0) Or FracDM2Remove > 1 Then
               Throw New Exception("Fraction of DM to remove is out of bounds")
            End If
         Catch
            Throw New Exception("Fraction of DM to remove is not valid")
         End Try
      End If
      If (FracN2Remove < 0) Or FracN2Remove > 1 Then
         Throw New Exception("Fraction of N to remove is out of bounds")
      End If
      If ResidueTreatment_type.Contains("urine") And ((FracN2Dung < 0) Or FracN2Dung > 1) Then
         Throw New Exception("Proportion of N to return as dung is out of bounds")
      End If
      
      'Check whether choices are allowed and prepare messages     
      Dim myMessage1 As String
      Dim myMessage2 As String
      Select Case CutTrigger_type.ToLower
         Case "fixed interval"
            If RemoveAmount_type.ToLower.Contains("interval") Then
               Throw New Exception("Fixed interval trigger is not valid with Cut amount defined by 'set interval'")
            ElseIf RemoveAmount_type.ToLower.Contains("amount") Then
               myMessage2 = "   remove " & RemoveAmount_type.ToLower & " = " & Amount2Remove.ToString("#0") & " kg/ha"
            Else
               myMessage2 = "   remove " & RemoveAmount_type.ToLower & " = " & LowerThreshold.ToString("#0") & " kg/ha"
            End If
            myMessage1 = ", cut only every " & CutInterval.ToString & " days"
         Case "target interval"
            If RemoveAmount_type.ToLower.Contains("interval") Then
               Throw New Exception("Target interval trigger is not valid with cut amount defined by 'set interval'")
            ElseIf RemoveAmount_type.ToLower.Contains("amount") Then
               myMessage2 = "   remove " & RemoveAmount_type.ToLower & " = " & Amount2Remove.ToString("#0") & " kg/ha"
            Else
               myMessage2 = "   remove " & RemoveAmount_type.ToLower & " = " & LowerThreshold.ToString("#0") & " kg/ha"
            End If
            myMessage1 = ", cut every " & CutInterval.ToString & " days, or when possible"
         Case "target standing mass" 
            If RemoveAmount_type.ToLower.Contains("interval") Then
               Throw New Exception("Target standing mass trigger is not valid with cut amount defined by 'set interval'")
            ElseIf RemoveAmount_type.ToLower.Contains("amount") Then
               myMessage2 = "   remove " & RemoveAmount_type.ToLower & " = " & Amount2Remove.ToString("#0") & " kg/ha"
            Else
               myMessage2 = "   remove " & RemoveAmount_type.ToLower & " = " & LowerThreshold.ToString("#0") & " kg/ha"
            End If
            myMessage1 = ", cut when DM reaches " & UpperThreshold.ToString("#0") & " kgDM/ha"
         Case "target mass above residual to cut"
            If RemoveAmount_type.ToLower.Contains("interval") Then
               Throw New Exception("Target cut mass trigger is only valid with a set interval")
            End If
            Dim myValue As Double = Amount2Remove + LowerThreshold
            myMessage1 = ", cut whenever DM is higher than " & myValue.ToString("#0") & " kgDM/ha"
            myMessage2 = "   remove " & RemoveAmount_type.ToLower & " ~ " & Amount2Remove.ToString("#0") & " kg/ha"
         Case "target dm cover"
            If RemoveAmount_type.ToLower.Contains("amount") Then
               Dim myValue As Double = Amount2Remove * FractAboveTarget
               myMessage1 = ", cut when standing DM is " & myValue.ToString("#0") & " kgDM/ha above the target cover"
               myMessage2 = "   remove given amount (" & Amount2Remove.ToString("#0") & " kg/ha) at variable interval"
            ElseIf RemoveAmount_type.ToLower.Contains("interval") Then
               myMessage1 = ", cut every " & CutInterval.ToString & " days, if standing DM is above the target cover"
               myMessage2 = "   remove variable amount at set interval"
            Else
               Throw New Exception("Target DM cover cannot be selected with amount to cut 'down to residual DM'")
            End If
         Case Else
            Throw New Exception("Cut trigger type is not valid")
      End Select
      
      'write messages on summary file
      Console.WriteLine("")
      Console.WriteLine("  Cut rotation for AgPasture initialised")
      Console.WriteLine("   rotation rule valid between " & StartDate.ToString("dd/MM/yyyy") & " and " & EndDate.ToString("dd/MM/yyyy"))
      Console.WriteLine("   cut type: " & CutTrigger_type & myMessage1)
      Console.WriteLine(myMessage2)
      Dim myValue1 As Double = (1 - FracDM2Remove) * 100
      Console.WriteLine("   fraction to " & ResidueTreatment_type.ToLower & ": " & myValue1.ToString("#0.0") & "%")
      Console.WriteLine("")
      
   End Sub
      
   <EventHandler()> Public Sub OnPrepare()
      
      StandingWt = StemWt + LeafWt
      Dim preharvest_dm As Double = StandingWt
      Dim preharvest_n As Double = StemN + LeafN
      Dim Amount2Cut As Double
      Dim AmountCuttable As Double
      
      'Reset variables:
      Has_Cut = "no"
      harvested_dm = 0.0
      harvested_n = 0.0
      removed_dm = 0.0
      removed_n = 0.0
      returned_dm = 0.0
      returned_n = 0.0
      GrowthRateCalc = 0.0
      Nconc_inRemoved = 0.0
      NReturn_asDung = 0.0
      NReturn_asUrine = 0.0
      DaysAfterCut = DaysAfterCut + 1

      'Decide whether cut is allowed:
      If (Today.Date >= StartDate.Date And Today.Date <= EndDate.Date) Then
         Select Case CutTrigger_type.ToLower
            Case "fixed interval"
               'Allways send an Allow_Cut if interval is right, it will be reset in the end of the day
               If DaysAfterCut >= CutInterval Then
                  Allow_Cut = "yes"
               Else
                  Allow_Cut = "no"  'always reset allow_cut
               End If
            Case "target interval" 
               'Allways send an Allow_Cut if interval is right, it will be reset only if cut actually happens (depends on amount type)
               If DaysAfterCut >= CutInterval Then
                  Allow_Cut = "yes"
               End If
            Case "target standing mass"
               'Send an Allow_Cut if DM amount is above the target (UpperThreshold), it will be reset if cut actually happens
               If preharvest_dm >= UpperThreshold Then
                  Allow_Cut = "yes"
               End If
            Case "target mass above residual to cut"
               'Send an Allow_Cut if mass above residual is higher than residual (LowerThreshold) plus target, will be reset after cut
               If preharvest_dm >= LowerThreshold + Amount2Remove Then
                  Allow_Cut = "yes"
               End If            
            Case "target dm cover"
               TodaysCoverTarget = InterpolateVals(day, TargetCoverDays, TargetCoverValues)
               If RemoveAmount_type.ToLower.Contains("amount") Then
                  'Send an Allow_Cut if mass above cover target is higher than a threshold, will be reset after cut
                  If preharvest_dm >= TodaysCoverTarget + Amount2Remove * FractAboveTarget Then
                     Allow_Cut = "yes"
                     LowerThreshold = preharvest_dm - Amount2Remove
                  End If
               Else
                  'Send an Allow_Cut if interval between cuts is reached and standing mass is above cover target, will be reset after cut
                  If DaysAfterCut >= CutInterval And preharvest_dm > TodaysCoverTarget Then 
                     Allow_Cut = "yes"
                  End If
               End If
         End Select

         Console.WriteLine("Cut allowed:" + Allow_Cut)
         'The use of these avoid (or reduces) problems when two managers are used in the same simulation
         Can_Cut = Allow_Cut
         
         'Decide how much to cut:
         If Allow_Cut = "yes" Then
            Select Case RemoveAmount_type.ToLower
               Case "set amount"
                  Amount2Cut = Amount2Remove
                  If CutTrigger_type.ToLower = "fixed interval" Then
                     AmountCuttable = preharvest_dm
                  else
                     AmountCuttable = math.Max(0, preharvest_dm - LowerThreshold)
                  End If
               Case "target amount"
                  Amount2Cut = math.Min(math.Max(0, preharvest_dm - LowerThreshold), Amount2Remove)
                  AmountCuttable = math.Max(0, preharvest_dm - LowerThreshold)
               Case "down to residual dm"
                  Amount2Cut = math.Max(0, preharvest_dm - LowerThreshold)
                  AmountCuttable = math.Max(0, preharvest_dm - LowerThreshold)
               Case "set interval (for target cover only)"
                  Amount2Cut = (preharvest_dm - TodaysCoverTarget) / FractAboveTarget
                  AmountCuttable = preharvest_dm
               Case Else
                  Throw New Exception("Option to compute DM amount to remove is not valid")
            End Select  
            
            Console.WriteLine("Amount2Cut:" + Amount2Cut.ToString())
            Console.WriteLine("AmountCuttable:" + AmountCuttable.ToString())

            'Decide whether cut actually happens:
            If (AmountCuttable >= Amount2Cut) Then
               Call CutPasture(Amount2Cut)
               'reset cut variables
               DaysAfterCut = 0
               Has_Cut = "yes"
               Allow_Cut = "no"
               PostHarvestDM = MyAgPasture.StemWt + MyAgPasture.LeafWt
            End If
         Else
            Amount2Cut = 0
            AmountCuttable = 0
         End If         
      End If

   End Sub 
   
  
   Sub CutPasture(ByVal Amount2Cut As Double) 
       
      ' --------------------------------------------------------------------------------------------
      ' Cutting pasture
      ' --------------------------------------------------------------------------------------------
            
      Dim CutData As New GrazeType
      CutData.sender = AgPasture_type
      CutData.amount = Amount2Cut
      Cutdata.type = "removal"
      RaiseEvent Graze(CutData)
      harvested_dm = MyAgPasture.HarvestWt
      harvested_n = MyAgPasture.HarvestN

      GrowthRateCalc = harvested_dm / DaysAfterCut
      If harvested_dm > 0 Then
         Nconc_inRemoved = harvested_n * 100 / harvested_dm
      End If
                  
      'Let user know (via summary) that a cut was made
      Console.WriteLine(Today.ToString("dd MMMM yyyy") + " (Day of year=" + Today.DayOfYear.ToString + "), " & MySelf.Name & ":")
      Console.WriteLine("     Removing " + harvested_dm.ToString("#0") + "kg DM/ha, with " & harvested_n.ToString("#0.0") & "kg N/ha")

      ' -- Residue management -------------------------------------------------------------------------
      If DMRemovalOption.ToLower = "based on digestibility" Then
         FracDM2Remove = 1 - DefoliatedDigestibility
      End If
      removed_dm = harvested_dm * FracDM2Remove
      removed_n = harvested_n * FracN2Remove
      returned_dm = harvested_dm - removed_dm 
      returned_n = harvested_n - removed_n 
      
      console.WriteLine("ResidueTreatment_type: " & ResidueTreatment_type)
      If ResidueTreatment_type.ToLower = "return as residue" Then
         If FracDM2Remove < 1 Then
            Dim SOMData As New BiomassRemovedType
            SOMData.crop_type = "grass"
            SOMData.dm_type = New String() {"grass"}
            SOMData.dlt_crop_dm = New Single() {returned_dm}
            SOMData.dlt_dm_n = New Single() {returned_n}
            SOMData.dlt_dm_p = New Single() {0.0}
            SOMData.fraction_to_residue = New Single() {1.0}
            RaiseEvent BiomassRemoved(SOMData)     'this works
         End If
         
      ElseIf ResidueTreatment_type.ToLower = "return as dung & urine" Then
         ' It is advised that dung and urine return should be done using another manager or modules, such as 'UrinePatch' 
         
         NReturn_asDung = returned_n * FracN2Dung
         NReturn_asUrine = math.Max(0, returned_n - NReturn_asDung)
         Dim SOMData As New BiomassRemovedType
         SOMData.crop_type = "RuminantDung_PastureFed"
         SOMData.dm_type = New String() {"dung"}
         SOMData.dlt_crop_dm = New Single() {returned_dm}
         SOMData.dlt_dm_n = New Single() {NReturn_asDung}
         SOMData.dlt_dm_p = New Single() {0.0}
         SOMData.fraction_to_residue = New Single() {1.0}
         RaiseEvent BiomassRemoved(SOMData)
         
         If NReturn_asUrine > 0 Then
            Dim UrineData As New FertiliserApplicationType
            UrineData.Amount = NReturn_asUrine
            UrineData.Depth = 10
            UrineData.Type = "urea"
            RaiseEvent FertiliserApplication(UrineData)
         End If
         
      Else
         Throw New Exception("Residue management type is not valid")
      End If
      
   End Sub
 
   Function makeArray(ByVal ArrayString As String) As Double()
      
      'Get the string with values from the user interface and put the values in an numeric array
      
      Dim MyArray_string As String()
      Dim MyArray_numeric As Double()
      Dim Separator As Char() = " "
      
      '1-Split string into array
      MyArray_string = ArrayString.Split(Separator, StringSplitOptions.RemoveEmptyEntries)
      
      '2-convert array into type single
      ReDim MyArray_numeric(MyArray_string.Length - 1)      
      For i As Integer = 0 To MyArray_numeric.length - 1
         MyArray_numeric(i) = CDbl(MyArray_string(i))
      Next
      Return MyArray_numeric
      
   End Function
   
   Function setDays(ByVal yArray As Double()) As Integer()
      
      'Define the day of year for each value on yArray - first value, day=1; last value day = 365; dates in between spread evenly (rounded)
      Dim NumDates = yArray.Length
      Dim xArray(yArray.Length - 1) As Integer
      xArray(0) = 1
      If NumDates < 366 Then
         If yArray.Length > 1 Then
            xArray(yArray.Length - 1) = 365
            If yArray.Length > 2 Then
               For i As Integer = 0 To yArray.Length - 1
                  xArray(i) = 365 * i / (yArray.Length - 1)
               Next
            End If
         End If
      Else
         Throw New Exception("Number of items on CoverTarget greater than maximum allowed (365)")
      End If
      Return xArray
      
   End Function

   Function InterpolateVals(ByVal my_x As Integer, ByVal xArray As Integer(), ByVal yArray As Double()) As Double
      
      'Find out the value correspondig to my_x in the function described by the x and y arrays
      Dim my_y As Double
      If my_x <= xArray(0) Then
         'values below x(0) are set to y(0)
         my_y = yArray(0)
      ElseIf my_x >= xArray(xArray.length - 1) Then
         'value above x(n) are set to y(n)
         my_y = yArray(yArray.length - 1)
      Else
         'find the nearest neighbours and interpolate (linear)
         For i As Integer = 1 To xArray.length - 1
            If my_x <= xArray(i) Then
               my_y = yArray(i - 1) + ((my_x - xArray(i - 1)) * (yArray(i) - yArray(i - 1)) / (xArray(i) - xArray(i - 1)))
               i = xArray.length 
            End If
         Next
      End If
      Return my_y
      
   End Function

End Class
```
          memo Info
             * * *   Cut rotation for AgPasture   * * *

            > Created in 15/Jul/2011
            >> Last modified: 07/Aug/2012

            > Author: Rogerio Cichota
            >> Modified by: check notes on code

            > General description:
                This script allows to set up a cut/graze rotation for AgPasture. It will only cut between the two dates give (a cut will happen on the first simulation day if the start date is prior to simulation date).
             The user can choose how the rotation is set, how much is to be cut, how much is to be removed from field and how the remaining is returned. Although return as dung and urine is allowe it is not
             recommended, it should be done using the UrinePatch module.  The cuts happen on Prepare event.

            > Specific details:
               + Cut trigger types:
                  - Fixed interval:
                     Cut is allowed at given days only (set by start rotation date and then at regular intervals)
                     Cut happens if amount to remove is set or if existing DM is greater than minimum residual
                  - Target interval:
                     Cut is allowed from given days (begins at start rotation date and at regular intervals after last cut)
                     Cut happens if amount to remove is set or if existing DM is greater than minimum residual
                  - Target standing mass:
                     Cut is allowed when existing DM reaches the target value
                     Cut always happens (unless the target value is below the minimum residual)
                   - Target mass above residual to cut:
                     Cut is allowed when existing DM is larger than the minimum residual plus the given amount to remove
                     Cut allways happens, (this option is not only valid with remove amount option 'Set interval')
                  - Target DM cover: Cut when DM is above target cover (trigger based on interval or amount)
                      Cut is allowed:
                         1) When existing DM is larger than the target cover DM plus a given amount to remove (times fraction above target)
                         2) From given dates (begins at start rotation date and at regular intervals after last cut)
                     Cut happens if existing DM is above target cover DM

                + Remove amount options:
                  - Set amount: The amount to remove is fixed, if this amount is not available, no cut is performed
                  - Target amount: The amount is the smallest of a given value and difference between existing DM and a target (minimum residual DM of CoverTarget)
                  - Down to residual DM: Amount to remove is the difference between existing DM and LowerTheshold (option is not valid if CutTrigger is 'Target DM cover')
                  - Set interval: Amount to remove is computed, based on any DM above target ([existing DM - target cover]/fraction above target)
                     (option only valid if CutTrigger is 'Target DM cover'

                + Manage residues options:
                  - Return as residue: A fraction of the DM cut is added as grass residue to the surfaceOM module;
                  - Return as dung & urine: A fraction of the amount cut is returned to the soil as evenly distributed urine and dung.
                    This is a very simplified approach where the fractions of DM (C) and N to be removed are set separately. Also,
                      the partition of N between urine and dung is set by the user.
                    N urine is added as urea fertiliser (top 10cm) and the remaining DM and N are added to surfaceOM as dung (RuminantDung_PastureFed).

            > Notes on modifications:
                + RCichota, Aug/2012: added target DM cover and cleared separate actions for 'set' and 'target' values
      micromet
        soilalbedo = 0.23
        a_interception = 0
        b_interception = 0
        c_interception = 0
        d_interception = 0
      fertiliser
      surfaceom SurfaceOrganicMatter
        PoolName = Residue  # Organic Matter pool name
        type = grass  # Organic Matter type
        mass = 0  # Initial surface residue (kg/ha)
        cnr = 15  # C:N ratio of initial residue
        standing_fraction = 0  # Fraction of residue standing
      Soil MedLightModDeepSoil: SoilType=0; State=South Island; Country=New Zealand; NaturalVegetation=0; ApsoilNumber=0; Latitude=0; Longitude=0; LocationAccuracy=0
        DataSource=Data adapted from New Zealand's National Soils Database / S-Map
        Comments=Generic soil type - Medium-light, moderately deep and non-stony; typical of relativelly good land (LUC class 2, limited by soil)
        LayerStructure
          Thickness=[10, 10, 20, 20, 20, 20, 25, 25, 25, 25, 50, 50, 50, 50, 50, 50, 50, 50, 50, 50, 50, 50, 50, 50, 50, 50]
        Analysis: PHUnits=Water; BoronUnits=HotWater
          Thickness  Rocks  PH  CEC   ParticleSizeSand  ParticleSizeSilt  ParticleSizeClay
          100        0      6   14.4  30                55                15
          100        0      6   13    33                52.5              14.5
          150        0      6   10.4  37                49                14
          150        0      6   8.2   42                45                13
          200        0      6   6     50                40                10
          300        0      6   2.1   90                5                 5
        Water
          Thickness  BD    AirDry  LL15   DUL    SAT    KS
          100        1.1   0.069   0.115  0.262  0.477  500
          100        1.15  0.12    0.134  0.277  0.486  300
          150        1.2   0.138   0.14   0.286  0.484  500
          150        1.25  0.139   0.139  0.264  0.463  500
          200        1.33  0.136   0.136  0.23   0.418  1500
          300        1.4   0.122   0.122  0.174  0.348  10000
          SoilCrop agpasture: LL=[0.115, 0.134, 0.14, 0.139, 0.136, 0.122]; KL=[0.12, 0.12, 0.08, 0.05, 0.02, 0.01]; XF=[1, 1, 1, 1, 1, 0]
          SoilCrop wheat: LL=[0.115, 0.134, 0.14, 0.139, 0.136, 0.122]; KL=[0.12, 0.12, 0.08, 0.05, 0.02, 0.01]; XF=[1, 1, 1, 1, 1, 0]
        Swim: Salb=0.2; CN2Bare=63; CNRed=3; CNCov=0.8; KDul=0.25; PSIDul=-100; VC=true; DTmin=0; DTmax=1440; MaxWaterIncrement=10; SpaceWeightingFactor=0; SoluteSpaceWeightingFactor=0; Diagnostics=false
          SwimSoluteParameters: Dis=6; Disp=1; DTHP=1
            zero: A, DTHC, WaterTableCl, WaterTableNO3, WaterTableNH4, WaterTableUrea, WaterTableTracer, WaterTableMineralisationInhibitor, WaterTableUreaseInhibitor, WaterTableNitrificationInhibitor, WaterTableDenitrificationInhibitor
            Thickness  NO3Exco  NO3FIP  NH4Exco  NH4FIP  UreaExco  UreaFIP
            100        0        1       30.5     0.56    0         1
            100        0        1       37.3     0.48    0         1
            150        0        1       38       0.47    0         1
            150        0        1       37.6     0.47    0         1
            200        0        1       35.6     0.47    0         1
            300        0        1       34.3     0.46    0         1
        SoilOrganicMatter: RootCN=40; RootWt=0; SoilCN=12.5; EnrACoeff=7.4; EnrBCoeff=0.2; OCUnits=Total
          Thickness  OC  FBiom  FInert
          100        0   0.12   0.4
          100        0   0.015  0.6
          150        0   0.014  0.75
          150        0   0.013  0.85
          200        0   0.011  0.93
          300        0   0.01   0.98
        SoilTemperature2: MaxTTimeDefault=14; BoundaryLayerConductanceSource=calc; BoundaryLayerConductance=20; BoundaryLayerConductanceIterations=1; NetRadiationSource=calc; DefaultWindSpeed=3; DefaultAltitude=18; DefaultInstrumentHeight=1.2; BareSoilHeight=57
        Sample Initial nitrogen: NO3Units=ppm; NH4Units=ppm; SWUnits=Volumetric; OCUnits=Total; PHUnits=Water
          Thickness  NO3   NH4
          100        1.25  0.5
          100        0.25  0.1
          150        0.15  0.07
          150        0.1   0.05
          200        0.05  0.05
          300        0.05  0.05
        InitialWater Initial water: FractionFull=0.95; PercentMethod=EvenlyDistributed; RelativeTo=ll15
      AgPasture
        Nspecies = 2  # Number of species
        thisCropName = AgPasture  # Crop name shown as on the simulation tree
        speciesName = ryegrass   whiteclover  # Species names
        dmshoot = 1300        350  # Initial shoot dry matter (kg/ha)
        dmlitter = 250          50  # Initial litter dry matter (kg/ha)
        dmgreenmin = 500          100  # Minimum green dry matter (kg/ha)
        rootDepth = 700          350  # Root depth (mm)
        RootDistributionMethod = ExpoLinear  # Method to define the root distribution over the soil profile
        rlvp = 0.1  0.1  # Root distribution parameter ([0-1] relative to Root depth)
        WaterUptakeSource = swim  # Water uptake done by AgPasture (calc) or by apsim?
        BiomassRemovalMethod = AgP_original  # Method used to compute partition of DM
      outputfile Pasture: filename=TestGrazeParams Paddock01 Pasture.out; title=TestGrazeParams Paddock01 Pasture
        variables
          variables: dd/mmm/yyyy as Date, TotalPlantWt, AboveGroundWt format 5, StandingPlantWt, StandingWt, HarvestableWt, HarvestWt, AboveGroundDeadWt, PlantPotentialGrowthWt, PlantGrowthNoNLimit, PlantGrowthWt, HerbageGrowthWt, GrowthRateCalc, SpeciesHarvestFraction, SpeciesTotalWt, SpeciesHarvestPct, StolonWt, SpeciesStandingWt, SpeciesHarvestWt, SpeciesStandingLiveWt, SpeciesStandingDeadWt
        events Reporting Frequency: event=end_day
    area Paddock02 -> /simulations/TestGrazeParams/Paddock01
      AgPasture
        Nspecies = 2  # Number of species
        thisCropName = AgPasture  # Crop name shown as on the simulation tree
        speciesName = ryegrass   whiteclover  # Species names
        dmshoot = 1300        350  # Initial shoot dry matter (kg/ha)
        dmlitter = 250          50  # Initial litter dry matter (kg/ha)
        dmgreenmin = 500          100  # Minimum green dry matter (kg/ha)
        rootDepth = 700          350  # Root depth (mm)
        RootDistributionMethod = ExpoLinear  # Method to define the root distribution over the soil profile
        rlvp = 0.1  0.1  # Root distribution parameter ([0-1] relative to Root depth)
        WaterUptakeSource = swim  # Water uptake done by AgPasture (calc) or by apsim?
        BiomassRemovalMethod = SetGenericPreferences  # Method used to compute partition of DM
      outputfile Pasture -> /simulations/TestGrazeParams/Paddock01/Pasture: filename=TestGrazeParams Paddock02 Pasture.out; title=TestGrazeParams Paddock02 Pasture
        variables -> /simulations/TestGrazeParams/Paddock01/Pasture/Variables
        events Reporting Frequency -> /simulations/TestGrazeParams/Paddock01/Pasture/Reporting Frequency
    area Paddock03 -> /simulations/TestGrazeParams/Paddock01
      AgPasture
        Nspecies = 2  # Number of species
        thisCropName = AgPasture  # Crop name shown as on the simulation tree
        speciesName = ryegrass   whiteclover  # Species names
        dmshoot = 1300        350  # Initial shoot dry matter (kg/ha)
        dmlitter = 250          50  # Initial litter dry matter (kg/ha)
        dmgreenmin = 500          100  # Minimum green dry matter (kg/ha)
        rootDepth = 700          350  # Root depth (mm)
        RootDistributionMethod = ExpoLinear  # Method to define the root distribution over the soil profile
        rlvp = 0.1  0.1  # Root distribution parameter ([0-1] relative to Root depth)
        WaterUptakeSource = swim  # Water uptake done by AgPasture (calc) or by apsim?
        BiomassRemovalMethod = SetGenericPreferences  # Method used to compute partition of DM
        dmdeadmin = 50         10  # Minimum allowable amount for dead DM (kg/ha)
        PreferenceForGreenDM = 4            8  # Preference level for green DM. per species
        PreferenceForDeadDM = 1            2  # Preference level for dead DM. per species
      outputfile Pasture -> /simulations/TestGrazeParams/Paddock01/Pasture: filename=TestGrazeParams Paddock03 Pasture.out; title=TestGrazeParams Paddock03 Pasture
        variables -> /simulations/TestGrazeParams/Paddock01/Pasture/Variables
        events Reporting Frequency -> /simulations/TestGrazeParams/Paddock01/Pasture/Reporting Frequency
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