folder Simulations: version=36; creator=Apsim 7.8-r4017
  simulation TestSim
    clock
      start_date = 01/07/1980  # Enter the start date of the simulation
      end_date = 30/06/1981  # Enter the end date of the simulation
    metfile met: filename=%apsim%\Examples\MetFiles\lincoln.met
    memo
      This simulations demonstrates and tests the addition of 'extra' species to AgPasture.
        In the xml file only ryegrass, white clover and paspalum are parameterised. Here a set of extra species are given, tentatively. Parameters for these species have not been tested.
        To use a species already set up the user has to write its name (plus initial values for DM and root depth) in the first few lines of the AgPasture UI. Only species to be simulated need to be entered and order is not important.
        To add more species, the user need to add a value for each of the parameters in the Agpasture UI (below the second blue line). Species can also be deleted if they're not going to be used.
        NOTE: order is important for the set of parameters below the second blue line, the first is reserved for ryegrass, the second for white clover and the third for paspalum. This is only important if one of them is going to be used.
    summaryfile
    area Paddock1
      manager2 Grazing
        # Setting up a harvesting rotation for AgPasture
        CutPasture_StartDate = 01/01/1900  # Enter the date to start the rotation (dd/mm/yyyy)
        CutPasture_EndDate = 31/12/2100  # Enter the date to end the rotation (dd/mm/yyyy)
        Interval2Cut = 21  # Enter the interval between harvests (days)
        RemoveAmountType = Setting residual DM amount  # Choose what amount is being defined
        HerbageAmount = 1500  # Enter the herbage amount (kgDM/ha)
        # Settings for dung/urine
        FracN2Remove = 0.15  # Enter fraction of N that is removed from the field (0-1)
        UrineDepth = 300  # Enter the depth down to which urine will apllied (mm)
        FracN2Dung = 0.4  # Enter the proportion of N returned in dung (0-1)
```csharp
using System;
using ModelFramework;

//This manager sets up a cut/grazing rotation for AgPasture. It also handles the return of harvested material, as dung and urine.
// The rotation is valid between two given dates only, these don't need to be bounded to the simulation dates (start date is set to simulation start date, if prior to it).
// Harvest is done on above ground standing DM, i.e. leaves plus stem/sheath (dead and green).
// This manager allows harvest on fixed intervals:
//   Cut is allowed at given days only (set by start rotation date and then at regular intervals);
//   Cut happens if amount to remove is set and/or if existing DM is greater than ResidualDM;
//   Cut is only allowed on the date selected, 'Can_Cut' is set to "no" at the end of the day;
//
// Removal of DM (carbon) is based on digestibility, while for N a fraction is removed
// The DM and N to be returned as dung are added to surfaceOM 'RuminantDung_PastureFed'.
// The partition of N between urine and dung is set by the user.
// N urine is added as urea fertiliser, distributed from surface down to  a given depth. The proportion per layer decreases linearly with depth.

//-->  Last uptaded in: 05/Oct/2015 ..................

public class Script
{
   //Parameter variables:
   [Param] private DateTime CutPasture_StartDate;  //Date to start the cutting rotation
   [Param] private DateTime CutPasture_EndDate;    //Date to end cutting rotation
   [Param] private int Interval2Cut;               //The interval between cuts, used if cut trigger type is by interval (days), (values will be interpolated using DoY)
   [Param] private string RemoveAmountType;        //The type of amount being defined (Setting DM amount to remove,Setting residual DM amount)
   [Param] private double HerbageAmount ;          //The DM amount (kg/ha, DM above ground)

   [Param] private double FracN2Remove;            //Fraction of the N in the material cut that is removed from simulation (0-1)
   [Param] private double UrineDepth;              //The depth down to which urine will be applied (mm), proportion applied per layer decrease with depth
   [Param] private double FracN2Dung;              //The fraction of returned N that goes into dung, if return is as dung & urine (0-1)

   //Links and events:
   [Link] private Component MySelf;
   [Link] private AgPasture MyAgPasture;
   [Link] private Fertiliser MyFertiliser;
   [Link] private SurfaceOM MySurfaceOM;

   //Variables read from other modules
   [Input] private DateTime Today;     //Today's date
   [Input] private double[] dlayer;    //Today's day of year
   private double LowerThreshold;      //Minimum residual DM
   private double MinimumFraction;     //Minimum fraction of given amount that still triggers a harvest
   private int CutInterval;
   private double ResidualDM;
   private double AmountWanted;

   //Outputs
   [Output][Units("")] public string Can_Cut;                  //Whether today is a harvesting day
   [Output][Units("")] public string Has_Cut;                  //Whether today's harvest was done
   [Output][Units("kg/ha")] public double harvested_dm;        //Pasture DM harvested today (kg/ha)
   [Output][Units("kgN/ha")] public double harvested_n;        //N harvested today
   [Output][Units("kg/ha")] public double removed_dm;          //DM removed from the paddock
   [Output][Units("kgN/ha")] public double removed_n;          //N removed from the paddock
   [Output][Units("kgN/ha")] public double returned_dm;        //DM returned to the paddock
   [Output][Units("kgN/ha")] public double returned_n;         //N returned to the paddock
   [Output][Units("kgN/ha")] public double NReturnedInDung;    //N returned as dung (SurfaceOM)
   [Output][Units("kgN/ha")] public double NReturnedInUrine;   //N returned as urine (urea)
   [Output][Units("kg/ha/day")] public double GrowthRateCalc;  //Average growth rate for this cut
   [Output][Units("days")] public int DaysAfterCut;            //Number of days after last harvest
   [Output][Units("kg/ha")] public double PreHarvestDM;        //Total standing DM (Leaf + Stem/Sheath) before cut
   [Output][Units("kg/ha")] public double PostHarvestDM;       //Total standing DM (Leaf + Stem/Sheath) after cut

   //Internal variables
   private double FracDM2Remove;       //The fraction of DM to be removed from the simulation (0-1)
   private bool CutIsAllowed;          //Whether cutting are allowed
   private double[] FracLayer;         //The fraction of urine to be applied in each layer

   [EventHandler()]
   public void OnInitialised()
   {
      //Reset variables
      CutInterval = Interval2Cut;
      DaysAfterCut = CutInterval - 1;
      CutIsAllowed = false;
      Can_Cut = "no";
      Has_Cut = "no";
      LowerThreshold = 500;   // assume a minimum of 500kgDM/ha
      MinimumFraction = 0.5;  // assume that at least 50% of required amount should be available to trigger a harvest

      //Check the fractions of DM ad N to remove
      FracDM2Remove = MyAgPasture.HarvestedDigestibility;
      if ((FracN2Remove < 0.0) || (FracN2Remove > 1.0))
      {
         throw new Exception("Fraction of N to remove is out of bounds");
      }
      if ((FracN2Dung < 0.0) || (FracN2Dung > 1.0))
      {
         throw new Exception("Proportion of N to return as dung is out of bounds");
      }

      //compute the fraction of urine to be aplied per layer
      FracLayer = new double[dlayer.Length];
      double DepthFromSurface = 0.0;
      double dltZ = 0.0;
      for (int z = 0; z < dlayer.Length;z++)
      {
         if(DepthFromSurface < UrineDepth)
         {
            dltZ = Math.Min(dlayer[z], UrineDepth - DepthFromSurface);
            FracLayer[z] = 2 * dltZ * (1 - ((DepthFromSurface + 0.5 * dltZ) / UrineDepth)) / UrineDepth;
         }
         DepthFromSurface += dlayer[z];
      }

      //write messages on summary file
      string myMessage1 = ", every " + CutInterval.ToString() + " days";
      string myMessage2 = "     remove ";
      if (RemoveAmountType.Contains("residual"))
      {
         ResidualDM = HerbageAmount;
         AmountWanted = 0.0;
         myMessage2 += "all biomass down to residual DM (" + ResidualDM.ToString("#0") + " kgDM/ha)";
      }
      else if (RemoveAmountType.Contains("remove"))
      {
         ResidualDM = LowerThreshold;
         AmountWanted = HerbageAmount;
         myMessage2 += "a given amount (" + AmountWanted.ToString("#0") + " kgDM/ha)";
      }
      Console.WriteLine("");
      Console.WriteLine("   Harvest rotation for AgPasture initialised");
      Console.WriteLine("     rotation rule valid between " + CutPasture_StartDate.ToString("dd/MM/yyyy") + " and " + CutPasture_EndDate.ToString("dd/MM/yyyy"));
      Console.WriteLine("     rotation type: harvest at regular intervals" + myMessage1);
      Console.WriteLine(myMessage2);
      Console.WriteLine("     fraction of harvested DM to return as dung: based on herbage digestibility");
      myMessage2 = ((1.0 - FracN2Remove) * 100).ToString("#0.0") + "% (" + ((1.0 - FracN2Dung) * 100).ToString("#0.0") + "% of it as urine)";
      Console.WriteLine("     fraction of harvested N to return as dung & urine: " + myMessage2);
      Console.WriteLine("     proportion of urine N to be added in each layer:");
      myMessage1 = FracLayer[0].ToString("0.000");
      for (int z = 1;z < dlayer.Length;z++)
      {
         myMessage1 += ", " + FracLayer[z].ToString("0.000");
      }
      Console.WriteLine("      " + myMessage1);
      Console.WriteLine("");
   }

   [EventHandler()]
   public void OnPrepare()
   {
      double Amount2Harvest = 0.0;
      double AmountHarvestable = 0.0;

      //Reset variables:
      Has_Cut = "no";
      harvested_dm = 0.0;
      harvested_n = 0.0;
      removed_dm = 0.0;
      removed_n = 0.0;
      returned_dm = 0.0;
      returned_n = 0.0;
      GrowthRateCalc = 0.0;
      NReturnedInDung = 0.0;
      NReturnedInUrine = 0.0;
      DaysAfterCut = DaysAfterCut + 1;
      CutInterval = Interval2Cut;
      PreHarvestDM = MyAgPasture.StandingHerbageWt;
      if (RemoveAmountType.Contains("residual"))
      {
         ResidualDM = HerbageAmount;
         AmountWanted = Math.Max(0.0, PreHarvestDM - ResidualDM);
      }
      else if (RemoveAmountType.Contains("remove"))
      {
         ResidualDM = LowerThreshold;
         AmountWanted = HerbageAmount;
      }

      //Decide whether cut is allowed:
      if ((Today.Date >= CutPasture_StartDate.Date) && (Today.Date <= CutPasture_EndDate.Date))
      {
         if (DaysAfterCut >= CutInterval)
         {
            CutIsAllowed = true;
            Can_Cut = "yes";
         }
         else
         {
            CutIsAllowed = false;
            Can_Cut = "no";
            //always reset CutIsAllowed
         }

         //Decide how much to cut:
         if (CutIsAllowed)
         {
            AmountHarvestable = Math.Max(0.0, PreHarvestDM - ResidualDM);
            if (AmountHarvestable >= AmountWanted * MinimumFraction)
               Amount2Harvest = Math.Min(AmountWanted, AmountHarvestable);
            else
               Amount2Harvest = AmountWanted;

            //Decide whether cut actually happens:
            if ((AmountHarvestable >= Amount2Harvest))
            {
               CutPasture(Amount2Harvest);
               HandleResidues();
               //reset cut variables
               DaysAfterCut = 0;
               Has_Cut = "yes";
               GrowthRateCalc = harvested_dm / DaysAfterCut;
               PostHarvestDM = MyAgPasture.StandingHerbageWt;
            }
         }
         else
         {
            Amount2Harvest = 0.0;
            AmountHarvestable = 0.0;
         }
      }
   }


   private void CutPasture(double Amount2Harvest)
   {
      // -- Cutting pasture ----------------------------------------------------------------------------

      GrazeType CutData = new GrazeType();
      CutData.sender = MySelf.Name;
      CutData.amount = (float) Amount2Harvest;
      CutData.type = "SetRemoveAmount";
      MyAgPasture.Graze(CutData);
      harvested_dm = MyAgPasture.HarvestedWt;
      harvested_n = MyAgPasture.HarvestedN;

      //Let user know (via summary) that a cut was made
      Console.WriteLine(Today.ToString("dd MMMM yyyy") + " (Day of year=" + Today.DayOfYear.ToString() + "), " + MySelf.Name + ":");
      Console.WriteLine("     Removing " + harvested_dm.ToString("#0") + "kg DM/ha, with " + harvested_n.ToString("#0.0") + "kg N/ha");
   }


   private void HandleResidues()
   {
      // -- Residue management -------------------------------------------------------------------------

      FracDM2Remove = MyAgPasture.HarvestedDigestibility;
      removed_dm = harvested_dm * FracDM2Remove;
      removed_n = harvested_n * FracN2Remove;
      returned_dm = harvested_dm - removed_dm;
      returned_n = harvested_n - removed_n;

      if (returned_dm < 0.0)
      {
         throw new Exception("Return_DM value is negative");
      }
      if (returned_n < 0.0)
      {
         throw new Exception("Return_N value is negative");
      }

      NReturnedInDung = returned_n * FracN2Dung;
      NReturnedInUrine = Math.Max(0.0, returned_n - (returned_n * FracN2Dung));

      if (NReturnedInDung > returned_n)
      {
         throw new Exception("Amount of N to return as dung is larger than total return, check proportion or CN ratio");
      }

      if ((returned_dm > 0.0) || (NReturnedInDung > 0.0))
      {
         BiomassRemovedType SOMData = new BiomassRemovedType();
         SOMData.crop_type = "RuminantDung_PastureFed";
         SOMData.dm_type = new string[] { SOMData.crop_type };
         SOMData.dlt_crop_dm = new float[] { (float) returned_dm };
         SOMData.dlt_dm_n = new float[] { (float) NReturnedInDung };
         SOMData.fraction_to_residue = new float[] { 1.0F };
         MySurfaceOM.BiomassRemoved(SOMData);
      }

      if (NReturnedInUrine > 0.0)
      {
         FertiliserApplicationType UrineData = new FertiliserApplicationType();
         UrineData.Amount = (float) NReturnedInUrine;
         UrineData.Depth = 10;   // mm
         UrineData.Type = "urea_n";
         MyFertiliser.Apply(UrineData);
      }
   }
}
```
      micromet
        soilalbedo = 0.23
        a_interception = 0
        b_interception = 0
        c_interception = 0
        d_interception = 0
      fertiliser
      irrigation
        automatic_irrigation = on
        asw_depth = 600  # Depth to which ASW is calculated. (mm)
        crit_fr_asw = 0.5  # Fraction of ASW below which irrigation is applied (0-1.0)
        irrigation_efficiency = 1  # Efficiency of the irrigation. (0-1.0)
        irrigation_allocation = off  # Allocation limits
        allocation = 0  # Allocation in mm
        default_no3_conc = 0  # Nitrate concentration (ppm N)
        default_nh4_conc = 0  # Ammonium concentration (ppm N)
        default_cl_conc = 0  # Chloride concentration (ppm Cl)
      surfaceom SurfaceOrganicMatter
        PoolName = AgPasture  # Organic Matter pool name
        type = grass  # Organic Matter type
        mass = 1000  # Initial surface residue (kg/ha)
        cnr = 15  # C:N ratio of initial residue
        standing_fraction = 0  # Fraction of residue standing
      Soil LightGenericSoil: SoilType=NZ_Sedimentary, Silt Loam; LocalName=Generic light soil; Region=Canterbury Plains; State=South Island; Country=New Zealand; Latitude=0; Longitude=0; YearOfSampling=0
        DataSource=Generic profile descriptions based on data for functional horizions provided by Trevor Webb
        Comments=Bulk density, SAT, DUL, LL15 and AirDry have been adjusted down to account for stone content.
        Analysis: PHUnits=Water; BoronUnits=HotWater
          Thickness  Rocks  PH  CEC   ParticleSizeSand  ParticleSizeSilt  ParticleSizeClay
          150        10     6   12.5  15                67.5              17.5
          200        15     6   10    20                65                15
          200        40     6   8     20                70                10
          250        65     6   5     35                57.5              7.5
          300        70     6   4     40                55                5
          400        75     6   4     40                55                5
        Water
          Thickness  BD    AirDry  LL15   DUL    SAT    KS
          150        1.2   0.05    0.135  0.3    0.42   6000
          200        1.15  0.12    0.125  0.275  0.38   4800
          200        0.85  0.075   0.075  0.175  0.265  3600
          250        0.45  0.013   0.013  0.06   0.15   12000
          300        0.35  0.003   0.003  0.03   0.12   18000
          400        0.25  0.002   0.002  0.025  0.1    24000
          SoilCrop Wheat: LL=[0.135, 0.125, 0.075, 0.013, 0.003, 0.002]; KL=[0.2, 0.2, 0.12, 0.03, 0.01, 0.01]; XF=[1, 1, 1, 1, 1, 1]
          SoilCrop Canola: LL=[0.135, 0.125, 0.075, 0.013, 0.003, 0.002]; KL=[0.2, 0.2, 0.12, 0.03, 0.01, 0.01]; XF=[1, 1, 1, 1, 1, 1]
          SoilCrop Agpasture: LL=[0.135, 0.125, 0.075, 0.013, 0.003, 0.002]; KL=[0.2, 0.2, 0.12, 0.03, 0.01, 0.01]; XF=[1, 1, 1, 1, 1, 1]
        SoilWater: SummerCona=4.4; SummerU=9; SummerDate=1-Oct; WinterCona=3; WinterU=6; WinterDate=1-Apr; DiffusConst=88; DiffusSlope=35; Salb=0.13; CN2Bare=73; CNRed=20; CNCov=0.8; Thickness=[150, 200, 200, 250, 300, 400]; SWCON=[0.45, 0.5, 0.45, 0.6, 0.65, 0.65]
        SoilOrganicMatter: RootCN=40; RootWt=1000; SoilCN=12; EnrACoeff=7.4; EnrBCoeff=0.2; OCUnits=Total
          Thickness  OC    FBiom  FInert
          150        3.5   0.08   0.5
          200        1.75  0.03   0.700441
          200        0.75  0.01   0.85
          250        0.5   0.008  0.9
          300        0.2   0.008  0.95
          400        0.1   0.008  0.98
          OC source: Estimated based on local knowledge
        InitialWater Initial water: FractionFull=1; PercentMethod=FilledFromTop
        Sample Initial nitrogen: NO3Units=ppm; NH4Units=ppm; SWUnits=Volumetric; OCUnits=Total; PHUnits=Water
          Thickness  NO3  NH4
          350        5    1
          450        2    0.5
          700        1    0.1
      AgPasture
        # Initial values for each species to be simulated
        SpeciesToSimulate = Ryegrass  WhiteClover  TallFescue  Cocksfoot  # Name of the species to be simulated
        InitialShootDM = 1000   300   300   300  # Initial above ground DM weight for each species (kg/ha)
        InitialRootDM = 350     100   100   100  # Initial below ground DM weight for each species (kg/ha)
        InitialRootDepth = 750     350   550   450  # Initial rooting depth for each species (mm)
        WaterUptakeSource = calc  # Water uptake done by AgPasture (calc) or by apsim?
        # Detailed parameters for each species (overwrites the xml file)
        speciesName = Ryegrass Whiteclover Paspalum Kikuyu Rhodes Phalaris Lucerne TallFescue BrownTop Cocksfoot RedClover  # Name of each parameterised species
        micrometType = grass grass grass grass grass grass grass grass grass grass grass  # Plant type descriptor, for MicroMet/SWIM
        PhotosyntheticPathway = 3 3 4 4 4 3 3 3 3 3 3  # Metabolic pathway for C fixation during photosynthesis (C3 or C4)
        isLegume = 0 1 0 0 0 0 1 0 0 0 1  # Whether the plant is a legume species (1=yes, 0=no)
        ReferencePhotosyntheticRate = 1.0 1.0 1.2 1.2 1.2 1.0 1.0 1.0 1.0 1.0 1.0  # Reference leaf CO2 assimilation rate for photosynthesis (mgCO2/m^2 leaf/s)
        PhotosyntheticEfficiency = 0.01 0.01 0.01 0.01 0.01 0.01 0.01 0.01 0.01 0.01 0.01  # Leaf photosynthetic efficiency (mg CO2/J)
        PhotosynthesisCurveFactor = 0.8 0.8 0.8 0.8 0.8 0.8 0.8 0.8 0.8 0.8 0.8  # Photosynthesis curvature parameter (J/kg/s)
        LightPartitioningFactor = 1.0 1.0 1.0 1.0 1.0 1.0 1.0 1.0 1.0 1.0 1.0  # Relative factor for light partition between species
        FractionPAR = 0.5 0.5 0.5 0.5 0.5 0.5 0.5 0.5 0.5 0.5 0.5  # Fraction of radiation that is photosynthetic active (0-1)
        LightExtinctionCoefficients = 0.5 0.8 0.6 0.5 0.7 0.5 0.8 0.5 0.5 0.5 0.8  # Light extinction coefficient (0-1)
        ReferenceCO2 = 380 380 380 380 380 380 380 380 380 380 380  # Reference CO2 concentration for photosynthesis (ppm)
        CO2EffectScaleFactor = 700 700 150 150 150 700 700 700 700 700 700  # Scaling parameter for the CO2 effect on photosynthesis (ppm)
        CO2EffectOffsetFactor = 600 600 600 600 600 600 600 600 600 600 600  # Scaling parameter for the CO2 effects on N requirements (ppm)
        CO2EffectMinimum = 0.7 0.7 0.7 0.6 0.6 0.6 0.6 0.6 0.7 0.7 0.7  # Minimum value for the CO2 effect on N requirements (0-1)
        CO2EffectExponent = 2.0 2.0 2.0 2.0 2.0 2.0 2.0 2.0 2.0 2.0 2.0  # Exponent controlling the CO2 effect on N requirements (>0.75)
        GrowthTminimum = 1.0 2.0 10.0 10.0 10.0 1.0 1.0 1.0 1.0 1.0 2.0  # Minimum temperature for growth (oC)
        GrowthToptimum = 20.0 22.0 32.0 21.0 32.0 20.0 25.0 20.0 20.0 20.0 22.0  # Optimum temperature for growth (oC)
        GrowthTEffectExponent = 1.7 1.7 1.25 1.25 1.25 1.7 1.7 1.7 1.7 1.7 1.7  # Curve parameter for growth response to temperature (>0.75)
        UseHeatStressFactor = yes yes yes yes yes yes yes yes yes yes yes  # Whether heat damage stress is enabled (yes/no)
        HeatOnsetTemperature = 28.0 30.0 35.0 38.0 35.0 28.0 28.0 28.0 26.0 26.0 30.0  # Onset temperature for heat effects on photosynthesis (oC)
        HeatFullTemperature = 35.0 36.0 40.0 48.0 42.0 35.0 35.0 35.0 35.0 35.0 37.0  # Temperature for full heat effect on photosynthesis (oC)
        HeatRecoverySumDD = 30.0 20.0 20.0 30.0 30.0 30.0 25.0 20.0 20.0 20.0 20.0  # Cumulative degrees-day for recovery from heat stress (oCd)
        HeatRecoveryTReference = 25.0 25.0 30.0 38.0 35.0 30.0 27.0 28.0 25.0 25.0 30.0  # Reference temperature for recovery from heat stress (oC)
        UseColdStressFactor = yes yes yes yes yes yes yes yes yes yes yes  # Whether cold damage stress is enabled (yes/no)
        ColdOnsetTemperature = 1.0 2.0 8.0 6.0 8.0 2.0 3.0 2.0 1.0 1.0 3.0  # Onset temperature for cold effects on photosynthesis (oC)
        ColdFullTemperature = -5.0 -5.0 0.0 2.0 0.0 -3.0 -2.0 -3.0 -3.0 -3.0 -3.0  # Temperature for full cold effect on photosynthesis (oC)
        ColdRecoverySumDD = 25.0 20.0 50.0 50.0 50.0 20.0 20.0 30.0 20.0 20.0 30.0  # Cumulative degrees for recovery from cold stress (oCd)
        ColdRecoveryTReference = 0.0 0.0 5.0 4.0 5.0 1.5 0.0 0.0 0.0 0.0 0.0  # Reference temperature for recovery from cold stress (oC)
        GrowthRespirationCoefficient = 0.75 0.75 0.75 0.75 0.75 0.75 0.75 0.75 0.75 0.75 0.75  # Growth respiration coefficient (0-1)
        MaintenanceRespirationCoefficient = 3.0 4.0 3.0 3.0 3.0 3.0 4.0 3.0 3.0 3.0 4.0  # Maintenance respiration coefficient (%)
        RespirationTReference = 20.0 20.0 20.0 20.0 20.0 20.0 20.0 20.0 20.0 20.0 20.0  # Reference temperature for maintenance respiration (oC)
        RespirationExponent = 1.5 1.5 1.5 1.5 1.5 1.5 1.5 1.5 1.5 1.5 1.5  # Exponent controlling the effect of temperature on respiration (>0.75)
        NconcOptimumForLeaves = 4.0 4.5 3.0 4.0 4.0 4.0 4.5 4.0 4.0 4.0 4.5  # Optimum N concentration of leaves (no stress) (%)
        NconcMaximumForLeaves = 5.0 5.5 3.5 5.0 5.0 5.0 5.5 5.0 5.0 5.0 5.5  # Maximum N concentration of leaves (luxury uptake) (%)
        NconcMinimumForLeaves = 1.2 2.0 0.5 1.2 1.2 1.2 2.0 1.2 1.2 1.2 2.0  # Minimum N concentration of leaves (dead leaves) (%)
        RelativeNconcForStems = 0.5 0.5 0.5 0.5 0.5 0.5 0.5 0.5 0.5 0.5 0.5  # N concentration for stems, relative to leaves (0-1)
        RelativeNconcForStolons = 0.0 0.5 0.0 0.0 0.0 0.0 0.5 0.0 0.0 0.0 0.5  # N concentration for stolons, relative to leaves (0-1)
        RelativeNconcForRoots = 0.5 0.5 0.5 0.5 0.5 0.5 0.5 0.5 0.5 0.5 0.5  # N concentration for roots, relative to leaves (0-1)
        RelativeNconcStage2 = 1.0 1.0 1.0 1.0 1.0 1.0 1.0 1.0 1.0 1.0 1.0  # N concentration for plants at stage 2 (developing), relative to optimum (0-1)
        RelativeNconcStage3 = 1.0 1.0 1.0 1.0 1.0 1.0 1.0 1.0 1.0 1.0 1.0  # N concentration for plants at stage 3 (mature), relative to optimum (0-1)
        DegreesDayForGermination = 125 100 150 150 150 125 125 125 125  125 110  # Cumulative degrees-day needed for seed germination (oCd)
        TargetShootRootRatio = 4.0 4.0 4.0 4.0 4.0 4.0 4.0 4.0 4.0 4.0 4.0  # Target or ideal plant's shoot:root ratio at vegetative stage
        MaxRootAllocation = 0.25 0.25 0.25 0.25 0.25 0.25 0.25 0.25 0.25 0.25 0.25  # Maximum fraction of DM growth that can be allocated to roots (0-1)
        ShootRootGlfFactor = 0.5 0.5 0.6 0.6 0.6 0.5 0.5 0.5 0.5 0.5 0.5  # Maximum effect that soil GLFs have on Shoot-Root ratio (0-1)
        UseReproSeasonFactor = yes yes yes yes yes yes yes yes yes yes yes  # Whether Shoot:Root ratio should be adjusted mimicking reproductive season (perennial species) (yes/no)
        ReproSeasonReferenceLatitude = 41.0 41.0 41.0 41.0 41.0 41.0 41.0 41.0 41.0 41.0 41.0  # Reference latitude determining timing for reproductive season (degrees)
        ReproSeasonTimingCoeff = 0.14 0.14 0.14 0.14 0.14 0.14 0.14 0.14 0.14 0.14 0.14  # Coefficient controlling the time to start the reproductive season as function of latitude
        ReproSeasonDurationCoeff = 2.0 2.0 2.0 2.0 2.0 2.0 2.0 2.0 2.0 2.0 2.0  # Coefficient controlling the duration of the reproductive season as function of latitude
        ReproSeasonShouldersLengthFactor = 1.0 1.0 1.0 1.0 1.0 1.0 1.0 1.0 1.0 1.0 1.0  # Ratio between the length of shoulders and the period with full reproductive growth effect
        ReproSeasonOnsetDurationFactor = 0.6 0.6 0.6 0.6 0.6 0.6 0.6 0.6 0.6 0.6 0.6  # The proportion of the length of shoulder before the period with full reproductive growth effect (0-1)
        ReproSeasonMaxAllocationIncrease = 0.5 0.5 0.5 0.5 0.5 0.5 0.5 0.5 0.5 0.5 0.5  # Maximum increase in DM allocation to shoot during reproductive growth (0-1)
        ReproSeasonAllocationCoeff = 0.1 0.1 0.1 0.1 0.1 0.1 0.1 0.1 0.1 0.1 0.1  # Coefficient controlling the increase in shoot allocation during reproductive growth as function of latitude
        FractionLeafMaximum = 0.70 0.56 0.60 0.60 0.60 0.60 0.70 0.70 0.70 0.70 0.56  # Maximum target allocation of new growth to leaves (0-1)
        FractionLeafMinimum = 0.70 0.28 0.60 0.60 0.60 0.60 0.70 0.70 0.70 0.70 0.28  # Minimum target allocation of new growth to leaves (0-1)
        FractionLeafDMThreshold = 500 500 500 500 500 500 500 500 500 500 500  # Shoot DM at which allocation of new growth to leaves start to decrease (kgDM/ha)
        FractionLeafDMFactor = 2000 2000 2000 2000 2000 2000 2000 2000 2000 2000 2000  # Shoot DM when allocation to leaves is midway maximum and minimum (kgDM/ha)
        FractionLeafExponent = 3.0 3.0 3.0 3.0 3.0 3.0 3.0 3.0 3.0 3.0 3.0  # Exponent of function describing DM allocation to leaves (>0.0)
        FractionToStolon = 0.0 0.2 0.0 0.0 0.0 0.0 0.1 0.0 0.0 0.0 0.2  # Fraction of new growth to be allocated to stolon (0-1)
        LiveLeavesPerTiller = 3.0 3.0 3.5 6.0 3.5 4.0 5.0 3.0 3.0 3.0 3.0  # Number of live leaves per tiller
        SpecificLeafArea = 25 30 20 20 20 20 25 20 20 20 30  # Specific leaf area, per dry matter weight (m^2/kgDM)
        SpecificRootLength = 100 45 75 75 75 75 55 75 75 75 50  # Specific root length, per dry matter weight (m/gDM)
        StolonEffectOnLAI = 0.0 0.3 0.0 0.0 0.0 0.0 0.2 0.0 0.0 0.0 0.3  # Fraction of stolon tissue used when computing green LAI (0-1)
        ShootMaxEffectOnLAI = 1000 500 1000 1000 1000 1000 1000 1000 1000 1000 500  # Maximum aboveground biomass for using stems when computing LAI (kg/ha)
        MaxStemEffectOnLAI = 1.00 0.50 0.75 0.75 0.75 1.00 0.75 1.00 1.00 1.00 0.50  # Maximum effect of stems when computing green LAI (0-1)
        TissueTurnoverRateShoot = 0.05 0.05 0.05 0.04 0.05 0.05 0.03 0.05 0.05 0.05 0.05  # Reference daily DM turnover rate for shoot tissues (/day)
        TissueTurnoverRateRoot = 0.02 0.02 0.02 0.02 0.02 0.02 0.02 0.02 0.02 0.02 0.02  # Reference daily DM turnover rate for root tissues (/day)
        RelativeTurnoverEmerging = 2.0 2.0 2.0 2.0 2.0 2.0 2.0 2.0 2.0 2.0 2.0  # Relative turnover rate for emerging tissues (>0.0)
        DetachmentRateShoot = 0.08 0.08 0.07 0.10 0.05 0.01 0.01 0.05 0.08 0.08 0.08  # Reference daily detachment rate for dead tissues (/day)
        TurnoverTemperatureMin = 2.0 2.0 5.0 5.0 5.0 0.0 0.0 0.0 2.0 2.0 2.0  # Minimum temperature for tissue turnover (oC)
        TurnoverTemperatureRef = 20.0 20.0 20.0 20.0 20.0 20.0 20.0 20.0 20.0 20.0 20.0  # Reference temperature for tissue turnover (oC)
        TurnoverTemperatureExponent = 1.0 1.0 1.0 1.0 1.0 1.0 1.0 1.0 1.0 1.0 1.0  # Exponent of function for temperature effect on tissue turnover
        TurnoverDroughtEffectMax = 2.0 2.0 2.0 2.0 2.0 2.0 2.0 2.0 2.0 2.0 2.0  # Maximum increase in tissue turnover due to water deficit
        TurnoverDroughtThreshold = 0.5 0.5 0.5 0.5 0.5 0.5 0.5 0.5 0.5 0.5 0.5  # Minimum GLFwater without effect on tissue turnover (0-1)
        DetachmentDroughtCoefficient = 3.0 3.0 3.0 3.0 3.0 3.0 3.0 3.0 3.0 3.0 3.0  # Coefficient controlling detachment rate as function of moisture (>0.75)
        DetachmentDroughtEffectMin = 0.1 0.1 0.1 0.1 0.1 0.1 0.1 0.1 0.1 0.1 0.1  # Minimum effect of drought on detachment rate (0-1)
        TurnoverStockFactor = 0.01 0.01 0.01 0.01 0.01 0.01 0.01 0.01 0.01 0.01 0.01  # Factor increasing tissue turnover rate due to stock trampling (0-1)
        TurnoverDefoliationCoefficient = 0.5 0.5 0.5 0.5 0.5 0.5 0.5 0.5 0.5 0.5 0.5  # Coefficient of function increasing the turnover rate due to defoliation (>0.0)
        TurnoverDefoliationEffectMin = 0.025 0.025 0.025 0.025 0.025 0.025 0.025 0.025 0.025 0.025 0.025  # Minimum significant daily effect of defoliation on tissue turnover rate (>0.0)
        TurnoverDefoliationRootEffect = 0.1 0.2 0.1 0.1 0.1 0.1 0.2 0.1 0.1 0.1 0.2  # Effect of defoliation on root turnover relative to stolons (0-1)
        FractionNLuxuryRemobStage1 = 0.1 0.1 0.1 0.1 0.1 0.1 0.1 0.1 0.1 0.1 0.1  # Fraction of luxury N remobilisable from tissue 1 each day (0-1)
        FractionNLuxuryRemobStage2 = 0.1 0.1 0.1 0.1 0.1 0.1 0.1 0.1 0.1 0.1 0.1  # Fraction of luxury N remobilisable from tissue 2 each day (0-1)
        FractionNLuxuryRemobStage3 = 0.1 0.1 0.1 0.1 0.1 0.1 0.1 0.1 0.1 0.1 0.1  # Fraction of luxury N remobilisable from tissue 3 each day (0-1)
        MinimumNFixation = 0.0 0.2 0.0 0.0 0.0 0.0 0.4 0.0 0.0 0.0 0.2  # Minimum fraction of N demand supplied by biologic N fixation (0-1)
        MaximumNFixation = 0.0 0.6 0.0 0.0 0.0 0.0 0.6 0.0 0.0 0.0 0.6  # Maximum fraction of N demand supplied by biologic N fixation (0-1)
        SymbiontCostFactor = 0.0 0.01 0.0 0.0 0.0 0.0 0.01 0.0 0.0 0.0 0.01  # Respiration cost factor due to the presence of symbiont bacteria (kgC/kgCroots)
        NFixingCostFactor = 0.0 4.0 0.0 0.0 0.0 0.0 4.0 0.0 0.0 0.0 4.0  # Respiration cost factor due to the activity of symbiont bacteria (kgC/kgNfixed)
        SoilSaturationEffectMax = 0.1 0.1 0.2 0.15 0.1 0.1 0.1 0.1 0.1 0.2 0.15  # Maximum reduction in plant growth due to water logging (saturated soil) (0-1)
        MinimumWaterFreePorosity = -1 -1 -1 -1 -1 -1 -1 -1 -1 -1 -1  # Minimum water-free pore space for growth with no limitations (0-1)
        SoilSaturationRecoveryFactor = 0.25 0.25 0.20 0.25 0.25 0.25 0.25 0.25 0.15 0.25 0.20  # Daily recovery rate from water logging (0-1)
        NDillutionCoefficient = 0.5 1.0 0.5 0.5 0.5 0.5 0.5 0.5 0.5 0.5 1.0  # Exponent for modifying the effect of N deficiency on plant growth
        GenericGLF = 1.0 1.0 1.0 1.0 1.0 1.0 1.0 1.0 1.0 1.0 1.0  # Generic factor affecting potential plant growth (0-1)
        SoilFertilityGLF = 1.0 1.0 1.0 1.0 1.0 1.0 1.0 1.0 1.0 1.0 1.0  # Generic growth limiting factor due to soil fertility (0-1)
        PlantHeightMinimum = 25 25 25 25 25 25 25 25 25 25 25  # Minimum plant height, for each species in the sward (mm)
        PlantHeightMaximum = 600 350 750 750 750 500 900 500 600 500 500  # Maximum plant height, for each species in the sward (mm)
        PlantHeightMassForMax = 10000 7500 12000 10000 12000 10000 10000 9000 10000 9000 7000  # DM weight above ground for maximum plant height (kgDM/ha)
        PlantHeightExponent = 2.8 2.5 2.6 2.6 2.7 2.7 2.6 2.6 2.6 2.6 2.5  # Exponent controlling shoot height as function of DM weight (>0.75)
        rootDistributionDepthParam = 90.0 70.0 95.0 100.0 80.0 75.0 100.0 72.0 90.0 90.0 70.0  # Depth from surface where root proportion starts to decrease (mm)
        rootDistributionExponent = 3.20 2.50 3.20 3.70 3.50 3.70 3.70 3.60 3.20 3.20 2.50  # Exponent controlling the root distribution as function of depth (>0.0)
        RootDepthMinimum = 50 30 50 50 50 50 50 50 50 50 50  # Minimum rooting depth, at emergence (mm)
        RootElongationRate = 25 25 30 30 30 30 25 30 25 25 25  # Daily root elongation rate at optimum temperature (mm/day)
        DigestibilityCellWallLive = 0.6 0.6 0.6 0.6 0.6 0.6 0.7 0.6 0.6 0.6 0.6  # Digestibility of cell wall in live plant tissues (0-1)
        DigestibilityCellWallDead = 0.2 0.2 0.2 0.2 0.2 0.2 0.2 0.2 0.2 0.2 0.2  # Digestibility of cell wall in dead plant tissues (0-1)
        SugarFractionNewGrowth = 0.5 0.5 0.5 0.5 0.5 0.5 0.5 0.5 0.5 0.5 0.5  # Fraction of soluble carbohydrates in newly grown tissues (0-1) (0-1)
        MinimumGreenWt = 100 50 50 50 50 50 50 50 50 50 50  # Minimum above ground green DM (kgDM/ha)
        FractionStolonsStanding = 0.0 0.0 0.0 0.0 0.0 0.0 0.0 0.0 0.0 0.0 0.1  # Proportion of stolon DM standing, available for removal (0-1)
        PreferenceForGreenOverDead = 1 1 1 1 1 1 1 1 1 1 1  # Relative preference for live over dead material during graze
        PreferenceForLeafOverStems = 1 1 1 1 1 1 1 1 1 1 1  # Relative preference for leaf over stem-stolon material during graze
        ReferenceRLD = 5.0 5.0 5.0 5.0 5.0 5.0 5.0 5.0 5.0 5.0 5.0  # Reference root length density for water and N uptake (cm/cm3)
        ReferenceKSuptake = 15.0 15.0 15.0 15.0 15.0 15.0 15.0 15.0 15.0 15.0 15.0  # Reference hydraulic conductivity for water and N uptake (mm/day)
        ExponentSWCUptake = 0.25 0.25 0.25 0.25 0.25 0.25 0.25 0.25 0.25 0.25 0.25  # Exponent of water content factor for water and N uptake
        MaximumUptakeRateNH4 = 0.5 0.5 0.5 0.5 0.5 0.5 0.5 0.5 0.5 0.5 0.5  # Maximum NH4 uptake rate for each species (ppm/day)
        MaximumUptakeRateNO3 = 0.5 0.5 0.5 0.5 0.5 0.5 0.5 0.5 0.5 0.5 0.5  # Maximum NO3 uptake rate for each species (ppm/day)
      outputfile: filename=TestSim Paddock1.out; title=TestSim Paddock1
        variables
          variables: dd/mmm/yyyy as Date, Species_name, TotalWt, StandingHerbageWt, HerbageGrowthWt, HarvestedWt, SpeciesProportionStanding
        events Frequency: event=end_day
    area Paddock2 -> /Simulations/TestSim/Paddock1
      AgPasture
        # Initial values for each species to be simulated
        SpeciesToSimulate = Ryegrass RedClover  Paspalum  kikuyu  BrownTop  # Name of the species to be simulated
        InitialShootDM = 1000   300   300   300   200  # Initial above ground DM weight for each species (kg/ha)
        InitialRootDM = 350     100   100   100   100  # Initial below ground DM weight for each species (kg/ha)
        InitialRootDepth = 750     350   850   650   600  # Initial rooting depth for each species (mm)
        WaterUptakeSource = calc  # Water uptake done by AgPasture (calc) or by apsim?
        # Detailed parameters for each species (overwrites the xml file)
        speciesName = Ryegrass Whiteclover Paspalum Kikuyu Rhodes Phalaris Lucerne TallFescue BrownTop Cocksfoot RedClover  # Name of each parameterised species
        micrometType = grass grass grass grass grass grass grass grass grass grass grass  # Plant type descriptor, for MicroMet/SWIM
        PhotosyntheticPathway = 3 3 4 4 4 3 3 3 3 3 3  # Metabolic pathway for C fixation during photosynthesis (C3 or C4)
        isLegume = 0 1 0 0 0 0 1 0 0 0 1  # Whether the plant is a legume species (1=yes, 0=no)
        ReferencePhotosyntheticRate = 1.0 1.0 1.2 1.2 1.2 1.0 1.0 1.0 1.0 1.0 1.0  # Reference leaf CO2 assimilation rate for photosynthesis (mgCO2/m^2 leaf/s)
        PhotosyntheticEfficiency = 0.01 0.01 0.01 0.01 0.01 0.01 0.01 0.01 0.01 0.01 0.01  # Leaf photosynthetic efficiency (mg CO2/J)
        PhotosynthesisCurveFactor = 0.8 0.8 0.8 0.8 0.8 0.8 0.8 0.8 0.8 0.8 0.8  # Photosynthesis curvature parameter (J/kg/s)
        LightPartitioningFactor = 1.0 1.0 1.0 1.0 1.0 1.0 1.0 1.0 1.0 1.0 1.0  # Relative factor for light partition between species
        FractionPAR = 0.5 0.5 0.5 0.5 0.5 0.5 0.5 0.5 0.5 0.5 0.5  # Fraction of radiation that is photosynthetic active (0-1)
        LightExtinctionCoefficients = 0.5 0.8 0.6 0.5 0.7 0.5 0.8 0.5 0.5 0.5 0.8  # Light extinction coefficient (0-1)
        ReferenceCO2 = 380 380 380 380 380 380 380 380 380 380 380  # Reference CO2 concentration for photosynthesis (ppm)
        CO2EffectScaleFactor = 700 700 150 150 150 700 700 700 700 700 700  # Scaling parameter for the CO2 effect on photosynthesis (ppm)
        CO2EffectOffsetFactor = 600 600 600 600 600 600 600 600 600 600 600  # Scaling parameter for the CO2 effects on N requirements (ppm)
        CO2EffectMinimum = 0.7 0.7 0.7 0.6 0.6 0.6 0.6 0.6 0.7 0.7 0.7  # Minimum value for the CO2 effect on N requirements (0-1)
        CO2EffectExponent = 2.0 2.0 2.0 2.0 2.0 2.0 2.0 2.0 2.0 2.0 2.0  # Exponent controlling the CO2 effect on N requirements (>0.75)
        GrowthTminimum = 1.0 2.0 10.0 10.0 10.0 1.0 1.0 1.0 1.0 1.0 2.0  # Minimum temperature for growth (oC)
        GrowthToptimum = 20.0 22.0 32.0 21.0 32.0 20.0 25.0 20.0 20.0 20.0 22.0  # Optimum temperature for growth (oC)
        GrowthTEffectExponent = 1.7 1.7 1.25 1.25 1.25 1.7 1.7 1.7 1.7 1.7 1.7  # Curve parameter for growth response to temperature (>0.75)
        UseHeatStressFactor = yes yes yes yes yes yes yes yes yes yes yes  # Whether heat damage stress is enabled (yes/no)
        HeatOnsetTemperature = 28.0 30.0 35.0 38.0 35.0 28.0 28.0 28.0 26.0 26.0 30.0  # Onset temperature for heat effects on photosynthesis (oC)
        HeatFullTemperature = 35.0 36.0 40.0 48.0 42.0 35.0 35.0 35.0 35.0 35.0 37.0  # Temperature for full heat effect on photosynthesis (oC)
        HeatRecoverySumDD = 30.0 20.0 20.0 30.0 30.0 30.0 25.0 20.0 20.0 20.0 20.0  # Cumulative degrees-day for recovery from heat stress (oCd)
        HeatRecoveryTReference = 25.0 25.0 30.0 38.0 35.0 30.0 27.0 28.0 25.0 25.0 30.0  # Reference temperature for recovery from heat stress (oC)
        UseColdStressFactor = yes yes yes yes yes yes yes yes yes yes yes  # Whether cold damage stress is enabled (yes/no)
        ColdOnsetTemperature = 1.0 2.0 8.0 6.0 8.0 2.0 3.0 2.0 1.0 1.0 3.0  # Onset temperature for cold effects on photosynthesis (oC)
        ColdFullTemperature = -5.0 -5.0 0.0 2.0 0.0 -3.0 -2.0 -3.0 -3.0 -3.0 -3.0  # Temperature for full cold effect on photosynthesis (oC)
        ColdRecoverySumDD = 25.0 20.0 50.0 50.0 50.0 20.0 20.0 30.0 20.0 20.0 30.0  # Cumulative degrees for recovery from cold stress (oCd)
        ColdRecoveryTReference = 0.0 0.0 5.0 4.0 5.0 1.5 0.0 0.0 0.0 0.0 0.0  # Reference temperature for recovery from cold stress (oC)
        GrowthRespirationCoefficient = 0.75 0.75 0.75 0.75 0.75 0.75 0.75 0.75 0.75 0.75 0.75  # Growth respiration coefficient (0-1)
        MaintenanceRespirationCoefficient = 3.0 4.0 3.0 3.0 3.0 3.0 4.0 3.0 3.0 3.0 4.0  # Maintenance respiration coefficient (%)
        RespirationTReference = 20.0 20.0 20.0 20.0 20.0 20.0 20.0 20.0 20.0 20.0 20.0  # Reference temperature for maintenance respiration (oC)
        RespirationExponent = 1.5 1.5 1.5 1.5 1.5 1.5 1.5 1.5 1.5 1.5 1.5  # Exponent controlling the effect of temperature on respiration (>0.75)
        NconcOptimumForLeaves = 4.0 4.5 3.0 4.0 4.0 4.0 4.5 4.0 4.0 4.0 4.5  # Optimum N concentration of leaves (no stress) (%)
        NconcMaximumForLeaves = 5.0 5.5 3.5 5.0 5.0 5.0 5.5 5.0 5.0 5.0 5.5  # Maximum N concentration of leaves (luxury uptake) (%)
        NconcMinimumForLeaves = 1.2 2.0 0.5 1.2 1.2 1.2 2.0 1.2 1.2 1.2 2.0  # Minimum N concentration of leaves (dead leaves) (%)
        RelativeNconcForStems = 0.5 0.5 0.5 0.5 0.5 0.5 0.5 0.5 0.5 0.5 0.5  # N concentration for stems, relative to leaves (0-1)
        RelativeNconcForStolons = 0.0 0.5 0.0 0.0 0.0 0.0 0.5 0.0 0.0 0.0 0.5  # N concentration for stolons, relative to leaves (0-1)
        RelativeNconcForRoots = 0.5 0.5 0.5 0.5 0.5 0.5 0.5 0.5 0.5 0.5 0.5  # N concentration for roots, relative to leaves (0-1)
        RelativeNconcStage2 = 1.0 1.0 1.0 1.0 1.0 1.0 1.0 1.0 1.0 1.0 1.0  # N concentration for plants at stage 2 (developing), relative to optimum (0-1)
        RelativeNconcStage3 = 1.0 1.0 1.0 1.0 1.0 1.0 1.0 1.0 1.0 1.0 1.0  # N concentration for plants at stage 3 (mature), relative to optimum (0-1)
        DegreesDayForGermination = 125 100 150 150 150 125 125 125 125  125 110  # Cumulative degrees-day needed for seed germination (oCd)
        TargetShootRootRatio = 4.0 4.0 4.0 4.0 4.0 4.0 4.0 4.0 4.0 4.0 4.0  # Target or ideal plant's shoot:root ratio at vegetative stage
        MaxRootAllocation = 0.25 0.25 0.25 0.25 0.25 0.25 0.25 0.25 0.25 0.25 0.25  # Maximum fraction of DM growth that can be allocated to roots (0-1)
        ShootRootGlfFactor = 0.5 0.5 0.6 0.6 0.6 0.5 0.5 0.5 0.5 0.5 0.5  # Maximum effect that soil GLFs have on Shoot-Root ratio (0-1)
        UseReproSeasonFactor = yes yes yes yes yes yes yes yes yes yes yes  # Whether Shoot:Root ratio should be adjusted mimicking reproductive season (perennial species) (yes/no)
        ReproSeasonReferenceLatitude = 41.0 41.0 41.0 41.0 41.0 41.0 41.0 41.0 41.0 41.0 41.0  # Reference latitude determining timing for reproductive season (degrees)
        ReproSeasonTimingCoeff = 0.14 0.14 0.14 0.14 0.14 0.14 0.14 0.14 0.14 0.14 0.14  # Coefficient controlling the time to start the reproductive season as function of latitude
        ReproSeasonDurationCoeff = 2.0 2.0 2.0 2.0 2.0 2.0 2.0 2.0 2.0 2.0 2.0  # Coefficient controlling the duration of the reproductive season as function of latitude
        ReproSeasonShouldersLengthFactor = 1.0 1.0 1.0 1.0 1.0 1.0 1.0 1.0 1.0 1.0 1.0  # Ratio between the length of shoulders and the period with full reproductive growth effect
        ReproSeasonOnsetDurationFactor = 0.6 0.6 0.6 0.6 0.6 0.6 0.6 0.6 0.6 0.6 0.6  # The proportion of the length of shoulder before the period with full reproductive growth effect (0-1)
        ReproSeasonMaxAllocationIncrease = 0.5 0.5 0.5 0.5 0.5 0.5 0.5 0.5 0.5 0.5 0.5  # Maximum increase in DM allocation to shoot during reproductive growth (0-1)
        ReproSeasonAllocationCoeff = 0.1 0.1 0.1 0.1 0.1 0.1 0.1 0.1 0.1 0.1 0.1  # Coefficient controlling the increase in shoot allocation during reproductive growth as function of latitude
        FractionLeafMaximum = 0.70 0.56 0.60 0.60 0.60 0.60 0.70 0.70 0.70 0.70 0.56  # Maximum target allocation of new growth to leaves (0-1)
        FractionLeafMinimum = 0.70 0.28 0.60 0.60 0.60 0.60 0.70 0.70 0.70 0.70 0.28  # Minimum target allocation of new growth to leaves (0-1)
        FractionLeafDMThreshold = 500 500 500 500 500 500 500 500 500 500 500  # Shoot DM at which allocation of new growth to leaves start to decrease (kgDM/ha)
        FractionLeafDMFactor = 2000 2000 2000 2000 2000 2000 2000 2000 2000 2000 2000  # Shoot DM when allocation to leaves is midway maximum and minimum (kgDM/ha)
        FractionLeafExponent = 3.0 3.0 3.0 3.0 3.0 3.0 3.0 3.0 3.0 3.0 3.0  # Exponent of function describing DM allocation to leaves (>0.0)
        FractionToStolon = 0.0 0.2 0.0 0.0 0.0 0.0 0.1 0.0 0.0 0.0 0.2  # Fraction of new growth to be allocated to stolon (0-1)
        LiveLeavesPerTiller = 3.0 3.0 3.5 6.0 3.5 4.0 5.0 3.0 3.0 3.0 3.0  # Number of live leaves per tiller
        SpecificLeafArea = 25 30 20 20 20 20 25 20 20 20 30  # Specific leaf area, per dry matter weight (m^2/kgDM)
        SpecificRootLength = 100 45 75 75 75 75 55 75 75 75 50  # Specific root length, per dry matter weight (m/gDM)
        StolonEffectOnLAI = 0.0 0.3 0.0 0.0 0.0 0.0 0.2 0.0 0.0 0.0 0.3  # Fraction of stolon tissue used when computing green LAI (0-1)
        ShootMaxEffectOnLAI = 1000 500 1000 1000 1000 1000 1000 1000 1000 1000 500  # Maximum aboveground biomass for using stems when computing LAI (kg/ha)
        MaxStemEffectOnLAI = 1.00 0.50 0.75 0.75 0.75 1.00 0.75 1.00 1.00 1.00 0.50  # Maximum effect of stems when computing green LAI (0-1)
        TissueTurnoverRateShoot = 0.05 0.05 0.05 0.04 0.05 0.05 0.03 0.05 0.05 0.05 0.05  # Reference daily DM turnover rate for shoot tissues (/day)
        TissueTurnoverRateRoot = 0.02 0.02 0.02 0.02 0.02 0.02 0.02 0.02 0.02 0.02 0.02  # Reference daily DM turnover rate for root tissues (/day)
        RelativeTurnoverEmerging = 2.0 2.0 2.0 2.0 2.0 2.0 2.0 2.0 2.0 2.0 2.0  # Relative turnover rate for emerging tissues (>0.0)
        DetachmentRateShoot = 0.08 0.08 0.07 0.10 0.05 0.01 0.01 0.05 0.08 0.08 0.08  # Reference daily detachment rate for dead tissues (/day)
        TurnoverTemperatureMin = 2.0 2.0 5.0 5.0 5.0 0.0 0.0 0.0 2.0 2.0 2.0  # Minimum temperature for tissue turnover (oC)
        TurnoverTemperatureRef = 20.0 20.0 20.0 20.0 20.0 20.0 20.0 20.0 20.0 20.0 20.0  # Reference temperature for tissue turnover (oC)
        TurnoverTemperatureExponent = 1.0 1.0 1.0 1.0 1.0 1.0 1.0 1.0 1.0 1.0 1.0  # Exponent of function for temperature effect on tissue turnover
        TurnoverDroughtEffectMax = 2.0 2.0 2.0 2.0 2.0 2.0 2.0 2.0 2.0 2.0 2.0  # Maximum increase in tissue turnover due to water deficit
        TurnoverDroughtThreshold = 0.5 0.5 0.5 0.5 0.5 0.5 0.5 0.5 0.5 0.5 0.5  # Minimum GLFwater without effect on tissue turnover (0-1)
        DetachmentDroughtCoefficient = 3.0 3.0 3.0 3.0 3.0 3.0 3.0 3.0 3.0 3.0 3.0  # Coefficient controlling detachment rate as function of moisture (>0.75)
        DetachmentDroughtEffectMin = 0.1 0.1 0.1 0.1 0.1 0.1 0.1 0.1 0.1 0.1 0.1  # Minimum effect of drought on detachment rate (0-1)
        TurnoverStockFactor = 0.01 0.01 0.01 0.01 0.01 0.01 0.01 0.01 0.01 0.01 0.01  # Factor increasing tissue turnover rate due to stock trampling (0-1)
        TurnoverDefoliationCoefficient = 0.5 0.5 0.5 0.5 0.5 0.5 0.5 0.5 0.5 0.5 0.5  # Coefficient of function increasing the turnover rate due to defoliation (>0.0)
        TurnoverDefoliationEffectMin = 0.025 0.025 0.025 0.025 0.025 0.025 0.025 0.025 0.025 0.025 0.025  # Minimum significant daily effect of defoliation on tissue turnover rate (>0.0)
        TurnoverDefoliationRootEffect = 0.1 0.2 0.1 0.1 0.1 0.1 0.2 0.1 0.1 0.1 0.2  # Effect of defoliation on root turnover relative to stolons (0-1)
        FractionNLuxuryRemobStage1 = 0.1 0.1 0.1 0.1 0.1 0.1 0.1 0.1 0.1 0.1 0.1  # Fraction of luxury N remobilisable from tissue 1 each day (0-1)
        FractionNLuxuryRemobStage2 = 0.1 0.1 0.1 0.1 0.1 0.1 0.1 0.1 0.1 0.1 0.1  # Fraction of luxury N remobilisable from tissue 2 each day (0-1)
        FractionNLuxuryRemobStage3 = 0.1 0.1 0.1 0.1 0.1 0.1 0.1 0.1 0.1 0.1 0.1  # Fraction of luxury N remobilisable from tissue 3 each day (0-1)
        MinimumNFixation = 0.0 0.2 0.0 0.0 0.0 0.0 0.4 0.0 0.0 0.0 0.2  # Minimum fraction of N demand supplied by biologic N fixation (0-1)
        MaximumNFixation = 0.0 0.6 0.0 0.0 0.0 0.0 0.6 0.0 0.0 0.0 0.6  # Maximum fraction of N demand supplied by biologic N fixation (0-1)
        SymbiontCostFactor = 0.0 0.01 0.0 0.0 0.0 0.0 0.01 0.0 0.0 0.0 0.01  # Respiration cost factor due to the presence of symbiont bacteria (kgC/kgCroots)
        NFixingCostFactor = 0.0 4.0 0.0 0.0 0.0 0.0 4.0 0.0 0.0 0.0 4.0  # Respiration cost factor due to the activity of symbiont bacteria (kgC/kgNfixed)
        SoilSaturationEffectMax = 0.1 0.1 0.2 0.15 0.1 0.1 0.1 0.1 0.1 0.2 0.15  # Maximum reduction in plant growth due to water logging (saturated soil) (0-1)
        MinimumWaterFreePorosity = -1 -1 -1 -1 -1 -1 -1 -1 -1 -1 -1  # Minimum water-free pore space for growth with no limitations (0-1)
        SoilSaturationRecoveryFactor = 0.25 0.25 0.20 0.25 0.25 0.25 0.25 0.25 0.15 0.25 0.20  # Daily recovery rate from water logging (0-1)
        NDillutionCoefficient = 0.5 1.0 0.5 0.5 0.5 0.5 0.5 0.5 0.5 0.5 1.0  # Exponent for modifying the effect of N deficiency on plant growth
        GenericGLF = 1.0 1.0 1.0 1.0 1.0 1.0 1.0 1.0 1.0 1.0 1.0  # Generic factor affecting potential plant growth (0-1)
        SoilFertilityGLF = 1.0 1.0 1.0 1.0 1.0 1.0 1.0 1.0 1.0 1.0 1.0  # Generic growth limiting factor due to soil fertility (0-1)
        PlantHeightMinimum = 25 25 25 25 25 25 25 25 25 25 25  # Minimum plant height, for each species in the sward (mm)
        PlantHeightMaximum = 600 350 750 750 750 500 900 500 600 500 500  # Maximum plant height, for each species in the sward (mm)
        PlantHeightMassForMax = 10000 7500 12000 10000 12000 10000 10000 9000 10000 9000 7000  # DM weight above ground for maximum plant height (kgDM/ha)
        PlantHeightExponent = 2.8 2.5 2.6 2.6 2.7 2.7 2.6 2.6 2.6 2.6 2.5  # Exponent controlling shoot height as function of DM weight (>0.75)
        rootDistributionDepthParam = 90.0 70.0 95.0 100.0 80.0 75.0 100.0 72.0 90.0 90.0 70.0  # Depth from surface where root proportion starts to decrease (mm)
        rootDistributionExponent = 3.20 2.50 3.20 3.70 3.50 3.70 3.70 3.60 3.20 3.20 2.50  # Exponent controlling the root distribution as function of depth (>0.0)
        RootDepthMinimum = 50 30 50 50 50 50 50 50 50 50 50  # Minimum rooting depth, at emergence (mm)
        RootElongationRate = 25 25 30 30 30 30 25 30 25 25 25  # Daily root elongation rate at optimum temperature (mm/day)
        DigestibilityCellWallLive = 0.6 0.6 0.6 0.6 0.6 0.6 0.7 0.6 0.6 0.6 0.6  # Digestibility of cell wall in live plant tissues (0-1)
        DigestibilityCellWallDead = 0.2 0.2 0.2 0.2 0.2 0.2 0.2 0.2 0.2 0.2 0.2  # Digestibility of cell wall in dead plant tissues (0-1)
        SugarFractionNewGrowth = 0.5 0.5 0.5 0.5 0.5 0.5 0.5 0.5 0.5 0.5 0.5  # Fraction of soluble carbohydrates in newly grown tissues (0-1) (0-1)
        MinimumGreenWt = 100 50 50 50 50 50 50 50 50 50 50  # Minimum above ground green DM (kgDM/ha)
        FractionStolonsStanding = 0.0 0.0 0.0 0.0 0.0 0.0 0.0 0.0 0.0 0.0 0.1  # Proportion of stolon DM standing, available for removal (0-1)
        PreferenceForGreenOverDead = 1 1 1 1 1 1 1 1 1 1 1  # Relative preference for live over dead material during graze
        PreferenceForLeafOverStems = 1 1 1 1 1 1 1 1 1 1 1  # Relative preference for leaf over stem-stolon material during graze
        ReferenceRLD = 5.0 5.0 5.0 5.0 5.0 5.0 5.0 5.0 5.0 5.0 5.0  # Reference root length density for water and N uptake (cm/cm3)
        ReferenceKSuptake = 15.0 15.0 15.0 15.0 15.0 15.0 15.0 15.0 15.0 15.0 15.0  # Reference hydraulic conductivity for water and N uptake (mm/day)
        ExponentSWCUptake = 0.25 0.25 0.25 0.25 0.25 0.25 0.25 0.25 0.25 0.25 0.25  # Exponent of water content factor for water and N uptake
        MaximumUptakeRateNH4 = 0.5 0.5 0.5 0.5 0.5 0.5 0.5 0.5 0.5 0.5 0.5  # Maximum NH4 uptake rate for each species (ppm/day)
        MaximumUptakeRateNO3 = 0.5 0.5 0.5 0.5 0.5 0.5 0.5 0.5 0.5 0.5 0.5  # Maximum NO3 uptake rate for each species (ppm/day)
      outputfile -> /Simulations/TestSim/Paddock1/outputfile: filename=TestSim Paddock2.out; title=TestSim Paddock2
        variables -> /Simulations/TestSim/Paddock1/outputfile/Variables
        events Frequency -> /Simulations/TestSim/Paddock1/outputfile/Frequency
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