folder simulations: version=32
  simulation Test
    metfile met: FileName=%apsim%\Tests\ApsimX\Goondiwindi.met
    clock
      start_date = 01/01/1900  # Enter the start date of the simulation
      end_date = 31/12/2000  # Enter the end date of the simulation
    summaryfile
    area paddock
      Plant Wheat2: CropType=wheat
        Phenology
          VernalisationCW Vernalisation: StartStageForEffects=Emergence; EndStageForEffects=FloralInitiation; StartStageForCumulativeVD=Germination; EndStageForCumulativeVD=FloralInitiation; VernSens=1.5; PhotopSens=3.0
            AirTemperatureFunction VDModel
              XYPairs: XY=[0 0, 2 1, 15 0]
            PhotoperiodFunction Photoperiod
              Twilight = -6
          AirTemperatureFunction ThermalTime
            XYPairs: XY=[0 0, 26 26, 34 0]
          GerminatingPhase Germinating: Start=Sowing; End=Germination
          EmergingPhase Emerging: Start=Germination; End=Emergence
            ShootLag (oCd) = 40.0  # Time lag before linear coleoptile growth starts
            ShootRate (oCd/mm) = 1.50  # Growing deg day increase with depth for coleoptile
            LinearInterpolationFunction ThermalTime: XProperty=Phenology.Vernalisation.CrownTemperature
              XYPairs: XY=[0 0, 26 26, 34 0]
          GenericPhase Inductive: Start=Emergence; End=FloralInitiation
            Constant:
              {Value=401}
            LinearInterpolationFunction ThermalTime: XProperty=Phenology.Vernalisation.CrownTemperature
              XYPairs: XY=[0 0, 26  26, 34  0]
            MinimumFunction Stress
              Variable
                VariableName = Phenology.Vernalisation.VernEff
                Memo
                  Returns the value of a nominated internal Plant2 numerical variable
              Variable Variable1
                VariableName = Phenology.Vernalisation.PhotopEff
                Memo
                  Returns the value of a nominated internal Plant2 numerical variable
          GenericPhase FloralInitiationToFlagLeaf: Start=FloralInitiation; End=FlagLeaf
            Constant:
              {Value=222}
            LinearInterpolationFunction ThermalTime: XProperty=Phenology.Vernalisation.CrownTemperature
              XYPairs: XY=[0 0, 26  26, 34  0]
            MinimumFunction Stress: same as Test.paddock.Wheat2.Phenology.Inductive.Stress
          GenericPhase FlagLeafToFlowering: Start=FlagLeaf; End=Flowering
            Constant:
              {Value=333}
            LinearInterpolationFunction ThermalTime: XProperty=Phenology.Vernalisation.CrownTemperature
              XYPairs: XY=[0 0, 26  26, 34  0]
            MinimumFunction Stress: same as Test.paddock.Wheat2.Phenology.Inductive.Stress
          GenericPhase FloweringToGrainFilling: Start=Flowering; End=StartGrainFill
            Constant:
              {Value=120}
            LinearInterpolationFunction ThermalTime: XProperty=Phenology.Vernalisation.CrownTemperature
              XYPairs: XY=[0 0, 26  26, 34  0]
          GenericPhase GrainFilling: Start=StartGrainFill; End=EndGrainFill
            Constant:
              {Value=545}
            LinearInterpolationFunction ThermalTime: XProperty=Phenology.Vernalisation.CrownTemperature
              XYPairs: XY=[0 0, 26  26, 34  0]
          GenericPhase Maturing: Start=EndGrainFill; End=Maturity
            Constant:
              {Value=36}
            LinearInterpolationFunction ThermalTime: XProperty=Phenology.Vernalisation.CrownTemperature
              XYPairs: XY=[0 0, 26  26, 34  0]
          GenericPhase MaturityToHarvestRipe: Start=Maturity; End=HarvestRipe
            Constant:
              {Value=1}
            LinearInterpolationFunction ThermalTime: XProperty=Phenology.Vernalisation.CrownTemperature
              XYPairs: XY=[0 0, 26  26, 34  0]
          EndPhase ReadyForHarvesting: Start=HarvestRipe; End=Unused
            LinearInterpolationFunction ThermalTime: XProperty=Phenology.Vernalisation.CrownTemperature
              XYPairs: XY=[0 0, 26  26, 34  0]
        Arbitrator: ArbitrationOption=RelativeAllocation
          Memo
              There are a number of passes involved in the allocation of Weight (Wt).
                    Wt_Step 1. Set up DM supplies and demands.  Each organ may have a demand for Structural, Metabolic and Non-structural Wt.  Each organ may supply Fresh DM from photosynthesis and/or stored DM from retranslocation of its Non-structural pool.
                    Wt_Step 2. In this step freshly fixed Wt is partitioned to organs based on their relative Structural and Metabolic demands such that if there is not enough freshly fixed Wt to meet these demands the organs with the highest demands get the greatest share of the photosynthesis.
                    Wt_Step 3. In the second step any freshly fixed DM that was surplus to Structural and Metabolic demands is partitioned to sink organs.  An organ will be a sink if it is parameterised to have a Non-structural (mobile) component and the capacity of each organ to receive excess DM depends on its structural fraction (which determines the Non-structural Fraction and subsequent sink capacity).  If there is still fresh DM unallocated after the second pass this remains unallocated with the assumption that in this case the plant would down regulate photosynthesis due to lack of sink capacity.
                    Wt_Step 4. In this step, Non-structural DM is reallocated from Non-Structural pools if there was insufficient DM to meet the structural and metabolic DM demands of organs.
                    The arbitrator then sends a potential DM allocation to each organ that they use to calculate their N demands and then steps through N partitioning routines.  The final pass in biomass partitioning comes after N partitioning

                    N_Step 1. Set up N supplies and demands.  Each organ may (or may not) supply N in a number of ways.  Each organ has (potentially) a structural, metabolic and Non-structural N Demand.  The structural N demand is that required to grow immobile biomass components, Metabolic N is that required to produce working biomass such as the photosynthetic mechanism in the leaves.  The Non-structural N demand is considered to be the luxury uptake and storage of highly mobile N compounds such as nitrate.
                     Each of the following 4 steps have a number of processes in common; Firstly the arbitrator determines each organs current N demand (that outstanding after previous N partitioning steps), then it allocates N to each demanding organ (There are three ways that N can be allocated, see below), then it sets for each supplying organ the amount of N that was taken up.
                    N_Step 2. NReallocation.  This is the supply of N within the plant by the reallocation of sensing and/or Non-structural N which is the lowest energy form of N available to the plant so is partitioned first.
                    N_Step 3. NUptake.  This is the supply of mineral N from the environment (typically by roots from the soil). In this step the arbitrator partitions the potential N uptake supply to satisfy all organs N demands (Structural, Metabolic and Non-structural).  If supply is sufficient this will replenish all Non-structural N that was reallocated in the previous step.  If not the N conc of organs with a Non-structural N component will begin to fall.  If total N demand is less than the uptake supply the crop will leave the surplus mineral N in the soil.
                    N_Step 4. NFixation.  This is the supply of symbiotically fixed N and is redundant for Non-fixers!  The arbitrator will asks all N fixing organs (typically nodules) for their potential N fixation supply and then partition this to meet the Structural and Metabolic N demands of organs.  The arbitrator will not fix N to meet Non-structural N demands to minimise the biomass cost of fixation which is metabolically expensive.  Fixation follows uptake to enable the arbitrator to capture the "Lazy" N fixing behaviour of some legumes.  Once fixation is calculated the arbitrator determines the DM cost of this fixation.
                    N_Step 5. NRetranslocation.  This is only invoked under sever N shortage when NReallocation and Uptake (and fixation if appropriate) cannot meet structural and metabolic N demands.  It this step the arbitrator will remove Metabolic N from older leaf cohorts to meet the N demand of new leaves and reproductive organs.

                     In all of these N partitioning steps there are three options the developer may chose for determining the allocation of N between demanding organs.
                    1. RelativeAllocation.  If this option is used all N is partitioned to organs relative to their demand so that the organs with the larger N demand get a larger share of a limited N supply.
                    2. PriorityAllocation.  If this option is used the arbitrator steps through all organs in order of priority (set by the order they appear in the IDE) allocating N to meet all of the first organs structural and metabolic N demands before partitioning any to the next organ in the hierarchy.  Once it has stepped through all organs and allocated their minimum (structural and metabolic) N demands it will then step through them again and allocate their luxury (Non-structural) N demands in the same way.
                    3. PrioritythenRelativeAllocation.  If this option is used the arbitrator steps through all organs in order of priority allocating N to meet minimum N demands.  However on the second pass it allocated N relative to the organs outstanding demands such that the organ with the greatest luxury N demand will get the greatest share of the N allocation.

                    Wt_Step 5. Once N is allocated the arbitrator then reduces the Wt allocation of each organ to account for the metabolic cost of N fixation.  The Wt reduction is spread around all organs and an organ will only have its Wt allocation limited until it reaches maximum N conc.
                    Wt_Step 6. Then the arbitrator determines if the N allocated to each organ is sufficient for that organ to reach its minimum N concentration.  If not the arbitrator will constrain the biomass growth of that organ and discards the surplus biomass.  This assume that under sever N stress photosynthesis would be down regulated due to N inadequacy limiting sink strength.

                    Once these steps are complete the Arbitrator finally communicates to each organ its state changes as a result of arbitration.
        Structure: PrimaryBudNo=1; InitialiseStage=Emergence
          Constant:
            Value
            4
            0
            0
          PhaseLookupValue MainStemPrimordiaInitiationRate: Start=Emergence; End=FloralInitiation
            Constant:
              {Value=95.0}
          PhaseLookupValue MainStemNodeAppearanceRate: Start=Emergence; End=Maturity
            LinearInterpolationFunction Function: XProperty=Structure.MainStemNodeNo
              XYPairs: XY=[1 95, 30 95]
          PhaseLengthFinalNodeNumber MainStemFinalNodeNumber
            MaximumMainStemNodeNumber = 40  # Maximum number of mainstem leaves that the plant can produce
            Memo
                          This Function allows final node number to increase as primordia are initiated and it is fixed at the value or primordia that are initiated when initiation finishes.
          LinearInterpolationFunction Height: XProperty=StageCode.Value
            XYPairs: XY=[3 100, 6 1200]
          LinearInterpolationFunction BranchingRate: XProperty=Structure.MainStemNodeNo
            XYPairs: XY=[4 0.0, 5 0.7, 8 0.0]
          AirTemperatureFunction ThermalTime -> ../../Phenology/ThermalTime
        ReproductiveOrgan Grain: MaximumSize=0.042; RipeStage=Ripe
          Constant:
            Value
            0.03
            0.12
          OnEventFunction NumberFunction
            Constant:
              {Value=0}
            SetEvent = Flowering
            ReSetEvent = never
            LinearInterpolationFunction PostEventValue: XProperty=Stem.Live.Wt
              XYPairs: XY=[0 0, 1000 25000]
          PhaseLookup FillingRate
            PhaseLookupValue EarlyGrainGrowth: Start=Flowering; End=StartGrainFill
              AirTemperatureFunction Function
                XYPairs: XY=[0 0, 26 0.001, 30 0.001, 35 0.001]
            PhaseLookupValue LateGrainGrowth: Start=StartGrainFill; End=Maturity
              AirTemperatureFunction Function
                XYPairs: XY=[0 0, 26 0.002, 30 0.002, 35 0.002]
          PhaseLookup NFillingRate
            PhaseLookupValue EarlyGrainGrowth: Start=Flowering; End=Maturity
              AirTemperatureFunction Function
                XYPairs: XY=[0 0, 25 5.5E-05, 30 5.5E-05, 35 5.5E-05]
          StageBasedInterpolation MaximumNConc
            Stages=[Germination, Emergence, FloralInitiation, FlagLeaf, Flowering, StartGrainFill, EndGrainFill, Maturity, HarvestRipe]
            Values=[0.022, 0.022, 0.022, 0.022, 0.022, 0.022, 0.022, 0.022, 0.022]
          StageBasedInterpolation MinimumNConc
            Stages=[Germination, Emergence, FloralInitiation, FlagLeaf, Flowering, StartGrainFill, EndGrainFill, Maturity, HarvestRipe]
            Values=[0.006, 0.006, 0.006, 0.006, 0.006, 0.006, 0.006, 0.006, 0.006]
        Root: ll=[0.240, 0.290, 0.310, 0.310, 0.310, 0.310, 0.310]; kl=[0.07, 0.07, 0.07, 0.07, 0.05, 0.05, 0.04]; xf=[1.00, 1.00, 1.00, 1.00, 1.00, 1.00, 1.00]
          Constant:
            Value
            0.25
            1.0
            0.01
            6.0
            0.01
            1
          InitialDM = 0.01  # InitialWt
          SpecificRootLength = 40000
          KNO3 = 0.02
          KNH4 = 0.0
          CompositeBiomass Live: Propertys=Root.LayerLive[]
          CompositeBiomass Dead: Propertys=Root.LayerDead[]
          Memo
            Optional paramaters

               1. SenescenceRate.  Default value is 0 which means the organ will not seness.  If senesence is required place a function on the organ named SenescenceRate.  It needs to be a number for 0 - 1 that represents the proportion of total biomass that is senessed each day.
               2.  NitrogenDemandSwitch.  Default value is 1 which means the organ always has a N demand if its N content is below maximum N conc.  If N demand needs to be switched off place a function on the organ named NitrogenDemandSwitch which returns a value of 1 when no demand is expressed.
          LinearInterpolationFunction KLModifier: XProperty=Leaf.LAI
            XYPairs: XY=[0 1, 3 1]
          PhaseLookup RootFrontVelocity
            PhaseLookupValue PreEmergence: Start=Germination; End=Emergence
              Constant:
                {Value=5}
            PhaseLookupValue PostEmergence: Start=Emergence; End=Flowering
              Constant:
                {Value=30}
            PhaseLookupValue PostFlowering: Start=Flowering; End=Maturity
              Constant:
                {Value=0}
          AirTemperatureFunction TemperatureEffect
            XYPairs: XY=[0 0.0, 25 1.0, 35 0.0]
          PhaseLookup SenescenceRate
            PhaseLookupValue PreEmergence: Start=Germination; End=Emergence
              Constant:
                {Value=0}
            PhaseLookupValue PostEmergence: Start=Emergence; End=Flowering
              Constant:
                {Value=0.005}
            PhaseLookupValue PostFlowering: Start=Flowering; End=Maturity
              Constant:
                {Value=0.005}
        GenericAboveGroundOrgan Ear
          Constant:
            Value
            1.0
            0.01
            0.01
          Memo
            The generic organ has 6 optional paramaters.  If you wish to override the defaults values specified below drop a function onto this organ and name and set accordingly
               1. SenescenceRate.  Default value is 0 which means the organ will not seness.  If senesence is required place a function on the organ named SenescenceRate.  It needs to be a number for 0 - 1 that represents the proportion of total biomass that is senessed each day.
               2. NReallocationFactor.  Default value is 0 which means the organ will not allow any of its N to be reallocated as it senesses.  If reallocation of senessing N is required place a function on the organ named NReallocationFactor.  It needs to be a number from 0 - 1 that represents the proportion of senessing N that is available for reallocation
               3. NRetranslocationFactor.  Default value is 0 which means none of the nonstructuralN in this organ is available for retranslocation.  If retranslocation is required place a function on the organ named NRetranslocationFactor. It needs to be a number from 0 -1 that represents the proportion of non-structural N that can be removed from an organ on any day.
               4. NitrogenDemandSwitch.  Default value is 1 which means the organ always has a N demand if its N content is below maximum N conc.  If N demand needs to be switched off place a function on the organ named NitrogenDemandSwitch which returns a value of 1 when no demand is expressed.
               5. DMRetranslocationFactor.  Default value is 0 which means the organ will not retranslocate NonStructural biomass.  If retranslocation is desired turn change this to a value between 0 - 1.  This represents the proportion of NonStructural biomass in the organ that can be retranslocated each day.
               6. StructuralFraction.  Derault value is 1 which means all biomass partitioned to this organ is put into the structrual pool.  If you wish this organ to have NonStructural DM that can be retranslocated set this to a value lower than 1 (between 0 - 1). Also note that making structural fraction less then 1 may influence the biomass partitioning to this organ because biomass is only partitioned to NonStructural Pools after the DM demand from other pools has been met.
          PartitionFractionDemandFunction DMDemandFunction
            StageBasedInterpolation PartitionFraction: Values=[0.0, 0.00, 0.00, 0.0, 0.4, 0.0, 0.0, 0.0, 0.0]
              Stages=[Germination, Emergence, FloralInitiation, FlagLeaf, Flowering, StartGrainFill, EndGrainFill, Maturity, HarvestRipe]
        Leaf: MaxCover=1.0; KDead=0.5
          Constant:
            Value
            1e6
            1e6
            .5
            1
            54000
            20000
            0
            .5
            0
          LeafCohort InitialLeaves[1]: Rank=1; Area=200
          LeafCohort InitialLeaves[2]
            Rank = 2
            Area = 0
          LeafCohort InitialLeaves[3]
            Rank = 3
            Area = 0
          LeafCohort InitialLeaves[4]
            Rank = 4
            Area = 0
          CompositeBiomass Live: Propertys=Leaf.Leaves[].Live
          CompositeBiomass Dead: Propertys=Leaf.Leaves[].Dead
          LinearInterpolationFunction FrostFraction: XProperty=MinT
            XYPairs: XY=[-1 0, 0 0]
          LinearInterpolationFunction ExtinctionCoeff: XProperty=Leaf.LAI
            XYPairs: XY=[0 0.5, 0.45 0.45]
          LinearInterpolationFunction yHeight: XProperty=StageCode.Value
            XYPairs: XY=[3 100, 6 1200]
          RUEModel Photosynthesis
            Constant:
              {Value=1.65}
            WeightedTemperatureFunction FT: MaximumTemperatureWeighting=0.75
              XYPairs: XY=[0 0.0, 10 1.0, 25 1.0, 35 0.0]
            LinearInterpolationFunction FVPD
              XProperty = Leaf.Photosynthesis.VPD
              XYPairs: XY=[0 1.0, 10 1.0, 50 1.0]
            LinearInterpolationFunction FN
              XProperty = Leaf.Fn
              XYPairs: XY=[0 0, 1 1, 1.5 1]
            LinearInterpolationFunction FW
              XProperty = Leaf.Fw
              XYPairs: XY=[0 0, 1 1, 1.5 1]
            RUECO2Function Fco2: PhotosyntheticPathway=C3
          AirTemperatureFunction ThermalTime
            XYPairs: XY=[0 0, 26 26, 34 0]
          LinearInterpolationFunction ExpansionStress: XProperty=WaterSupplyDemandRatio
            XYPairs: XY=[0 0, 1 1]
          LinearInterpolationFunction MaxArea: XProperty=Structure.MainStemNodeNo
            XYPairs: XY=[1  1400.0, 5  3700.0, 8  4800.0, 10  5600.0]
          LinearInterpolationFunction SpecificLeafArea: XProperty=Structure.MainStemNodeNo
            XYPairs: XY=[1 27000.0, 10 22000.0]
          LinearInterpolationFunction GrowthDuration: XProperty=Structure.MainStemNodeNo
            XYPairs: XY=[1   95.0, 10 190.0]
          LinearInterpolationFunction LagDuration: XProperty=Structure.MainStemNodeNo
            XYPairs: XY=[1  400.0, 10 900.0]
          LinearInterpolationFunction SenescenceDuration: XProperty=Structure.MainStemNodeNo
            XYPairs: XY=[5 150.0, 30 150.0]
          StageBasedInterpolation MaximumNConc
            Stages=[Germination, Emergence, FloralInitiation, FlagLeaf, Flowering, StartGrainFill, EndGrainFill, Maturity, HarvestRipe]
            Values=[0.063, 0.063, 0.032, 0.020, 0.015, 0.012, 0.008, 0.008, 0.008]
          StageBasedInterpolation MinimumNConc
            Stages=[Germination, Emergence, FloralInitiation, FlagLeaf, Flowering, StartGrainFill, EndGrainFill, Maturity, HarvestRipe]
            Values=[0.025, 0.025, 0.021, 0.016, 0.010, 0.0075, 0.005, 0.005, 0.005]
          StageBasedInterpolation CriticalNConc
            Stages=[Germination, Emergence, FloralInitiation, FlagLeaf, Flowering, StartGrainFill, EndGrainFill, Maturity, HarvestRipe]
            Values=[0.063, 0.063, 0.032, 0.020, 0.015, 0.012, 0.008, 0.008, 0.008]
          LinearInterpolationFunction ShadeInducedSenescenceRate
            XProperty = Leaf.Leaves[Leaf.CurrentRank].CoverAbove
            XYPairs: XY=[0 0, 0.9 0, 0.900001 0.2]
        GenericAboveGroundOrgan Stem
          Memo: same as Test.paddock.Wheat2.Ear.Memo
          PartitionFractionDemandFunction DMDemandFunction
            StageBasedInterpolation PartitionFraction: Values=[0.0, 0.4, 0.4, 0.6, 0.6, 0.0, 0.0, 0.0, 0.0]
              Stages=[Germination, Emergence, FloralInitiation, FlagLeaf, Flowering, StartGrainFill, EndGrainFill, Maturity, HarvestRipe]
          PhaseLookup StructuralFraction
            PhaseLookupValue Early: Start=Emergence; End=FlagLeaf
              Constant:
                {Value=1.0}
            PhaseLookupValue Middle: Start=FlagLeaf; End=Flowering
              Constant:
                {Value=0.50}
            PhaseLookupValue Late: Start=Flowering; End=Maturity
              Constant:
                {Value=0.5}
          StageBasedInterpolation MinimumNConc
            Stages=[Germination, Emergence, FloralInitiation, FlagLeaf, Flowering, StartGrainFill, EndGrainFill, Maturity, HarvestRipe]
            Values=[0.003, 0.003, 0.003, 0.003, 0.003, 0.003, 0.003, 0.003, 0.003]
          StageBasedInterpolation MaximumNConc
            Stages=[Germination, Emergence, FloralInitiation, FlagLeaf, Flowering, StartGrainFill, EndGrainFill, Maturity, HarvestRipe]
            Values=[0.050, 0.050, 0.020, 0.015, 0.010, 0.0075, 0.005, 0.005, 0.005]
        StageBasedInterpolation StageCode: Values=[1, 2, 3, 4, 5, 6, 7, 8, 9, 10]
          Stages=[Sowing, Germination, Emergence, FloralInitiation, FlagLeaf, Flowering, StartGrainFill, EndGrainFill, Maturity, HarvestRipe]
        StageBasedInterpolation ZadokStage: Values=[0, 5, 10, 30, 37, 65, 70, 85, 90, 90]
          Stages=[Sowing, Germination, Emergence, FloralInitiation, FlagLeaf, Flowering, StartGrainFill, EndGrainFill, Maturity, HarvestRipe]
        CompositeBiomass AboveGround: Propertys=[Organs[AboveGround].Live, Organs[AboveGround].Dead]
        CompositeBiomass BelowGround: Propertys=[Organs[BelowGround]. Live, Organs[BelowGround].Dead]
        CompositeBiomass Total: Propertys=[Organs[].Live, Organs[].Dead]
        CompositeBiomass TotalLive: Propertys=Organs[].Live
        CompositeBiomass TotalDead: Propertys=Organs[].Dead
      soil Black Vertosol-Waco (Jimbour No014)
        SoilWater: hydrol_effective_depth (mm)=450; immobile_solutes=nh4; canopy_fact=[1.0, 1.0, 0.0, 0.0]; canopy_fact_height=[0, 600, 1800, 30000]; act_evap_method=ritchie; SummerCona=3.5; SummerU=6; SummerDate=1-Nov; WinterCona=2.5; WinterU=4; WinterDate=1-Apr; Diffus_Const=40; Diffus_Slope=16; Salb=0.12; Cn2_Bare=73; Cn_Red=20; Cn_Cov=0.8; sat=[0.570, 0.570, 0.550, 0.550, 0.540, 0.530, 0.520]; dul=[0.520, 0.520, 0.500, 0.500, 0.490, 0.480, 0.470]; ll15=[0.240, 0.290, 0.310, 0.310, 0.310, 0.310, 0.310]; air_dry=[0.120, 0.232, 0.310, 0.310, 0.310, 0.310, 0.310]; swcon=[0.300, 0.300, 0.300, 0.300, 0.300, 0.300, 0.300]; bd=[1.050, 1.060, 1.110, 1.120, 1.130, 1.170, 1.200]; sw=[0.520, 0.520, 0.500, 0.500, 0.490, 0.480, 0.470]
          mobile_solutes=[no3, urea, cl, br, org_n, org_c_pool1, org_c_pool2, org_c_pool3]
          dlayer=[150.000, 150.000, 300.000, 300.000, 300.000, 300.000, 300.000]
          min_crit_temp (oC) = 5.0  # temperature below which eeq decreases (oC)
          max_crit_temp (oC) = 35.0  # temperature above which eeq increases (oC)
          max_albedo = 0.23  # albedo at 100% green crop cover (0-1).
          A_to_evap_fact = 0.44  # converts residue specfic area 'A' to
          canopy_eos_coef = 1.7  # coef. in exp effect of canopy on
          sw_top_crit = 0.9  # critical sw ratio in top layer
          sumes1_max (mm) = 100.0  # upper limit of sumes1
          sumes2_max (mm) = 25.0  # upper limit of sumes2
          solute_flow_eff = 1.0  # efficiency of moving solute with flow (0-1)
          solute_flux_eff = 1.0  # efficiency of moving solute with flux (0-1)
          gravity_gradient = 0.00002  # soil water gradient due to gravitational
          specific_bd (g/cc) = 2.65  # specific bulk density
          canopy_fact_default = 0.5  # canopy factor to use if height is missing
          // ****************
          // soilwat2_eeq_fac
          // ****************
          // ******************************
          // soilwat2_pot_evapotranspiration
          // ******************************
          // Bare soil albedo must not exceed this value.
          // ***********************
          // soilwat_evaporation
          // *********************** <dms 7-95>
          // a coef. in exp effect on reducing
          // pot. soil evap for wt. of mixed residues.
          // 0.44 = 0.00022/0.0005 DMS 1st approx. 6/95
          // reducing pot. soil evap.
          // = 1.7 Adams, Arkin & Ritchie 1976
          // ******************
          // soilwat2_evap_init
          // ******************
          // below which stage 2 evaporation occurs
          // ******************
          // soilwat2_nflow
          // ******************
          // ******************
          // soilwat2_nflux
          // ******************
          // ******************
          // soilwat2_unsaturated_flow
          // ******************
          // pressure head
          // ****************
          // soilwat2_check_profile
          // ****************
          // ****************
          // soilwat2_runoff_cover
          // ****************
          // added for SOILWAT2 ver 1.4 Aug-97 DMS & PdV
          // ****************
          // soilwat2_evaporation
          // ****************
          // <8-97 dms&pdv>
          // Ritchie (use with crops),
          // Ken Rickert (use with GRASP),
          // B&S
          // actual soil evaporation methods
          // act_evap_method = rickert
          // act_evap_method = bs_a
          // act_evap_method = bs_b
          // ****************
          // soilwat2_tillage
          // **************** <8-97 dms&pdv>
          // Mark Littleboy's tillage effect on runoff (used in PERFECT v2.0)
          // Littleboy, Cogle, Smith, Yule & Rao (1996)  Soil management and production
          // of alfisols in the SAT's I. Modelling the effects of soil management on runoff
          // and erosion.  Aust. J. Soil Res. 34: 91-102.
          // 
          // Tillage reduces runoff potential (CN2) by g_tillage_cn_red (1st column below).
          // After tillage, CN2 increases linearly with cumulative rain since tillage until
          // g_tillage_cn_rain (column 2 below) has occured, ie roughness is smoothed out by rain.
          // Example parameter values (Littleboy et al) are given below for shallow & deep tillage.
          // Also, Nelsen et al (in press) had to reduce CN2 by 30 for ~ 30 days after tillage
          // during the wet season in wet tropical Philipines to mimic measured runoff.
          // <tillage>
          // ________________________________________
          // tillage         CN2        Cumulative
          // type        reduction        rain to
          // cease reduction
          // (0-100)        (mm)
          // ________________________________________
          // <chisel description="will have no effect - SOILWAT the same as old ver.">0.0           0.   </chisel>
          // <disc>0.0           0.</disc>
          // <planter>0.0           0.</planter>
          // <burn>0.0           0.</burn>
          // </tillage>
        SoilNitrogen: fom_type=[default, manure, mucuna, lablab, shemp, stable]; fract_carb=[0.2, 0.3, 0.54, 0.57, 0.45, 0.0]; fract_cell=[0.7, 0.3, 0.37, 0.37, 0.47, 0.1]; fract_lign=[0.1, 0.4, 0.09, 0.06, 0.08, 0.9]; oc2om_factor=1.7; opt_temp=[32.0, 32.0]; rd_biom=[0.0081, 0.004]; rd_carb=[0.2, 0.1]; rd_cell=[0.05, 0.25]; rd_lign=[0.0095, 0.003]; rd_hum=[0.00015, 0.00007]; nh4ppm_min=0.0; wfmin_index=[0.0, 0.5, 1.0, 2.0]; wfmin_values=[0.0, 1.0, 1.0, 0.5]; wfnit_index=[0.0, 0.25, 1.0, 2.0]; wfnit_values=[0.0, 1.0, 1.0, 0.0]; pHf_nit_pH=[4.5, 6.0, 8.0, 9.0]; pHf_nit_values=[0.0, 1.0, 1.0, 0.0]; dnit_wfps=[21.33333, 100.0]; dnit_n2o_factor=[0.0, 1.18]; dnit_nitrf_loss=0.0; soiltype=Black Vertosol; root_cn=40; root_wt=1000; soil_cn=12; enr_a_coeff=7.4; enr_b_coeff=0.2; profile_reduction=off; oc=[1.560, 1.220, 1.120, 0.930, 0.520, 0.330, 0.290]; ph=[8.200, 8.700, 8.900, 8.100, 8.000, 8.000, 8.000]; fbiom=[0.040, 0.020, 0.020, 0.020, 0.010, 0.010, 0.010]; finert=[0.400, 0.600, 0.800, 1.000, 1.000, 1.000, 1.000]; no3ppm=[0.333, 1.000, 1.000, 1.000, 0.667, 0.000, 0.000]; nh4ppm=[0.067, 0.200, 0.200, 0.200, 0.133, 0.000, 0.000]
          cnrf_coeff = 0.693  # coeff. to determine the magnitude of C:N effects on decomposition of FOM
          cnrf_optcn = 25.0  # C:N above which decomposition rate of FOM declines
          ef_biom = 0.4  # fraction of biomass C mineralized retained in system (0-1)
          ef_fom = 0.4  # fraction of FOM C mineralized retained in system (0-1)
          ef_hum = 0.4  # fraction of humic C mineralized retained in system (0-1)
          ef_res = 0.4  # fraction of residue C mineralized retained in system (0-1)
          fom_min = 0.5  # minimum allowable FOM (kg/ha)
          fr_biom_biom = 0.6  # fraction of retained biomass C returned to biomass (0-1)
          fr_fom_biom = 0.9  # fraction of retained FOM C transferred to biomass (0-1)
          fr_res_biom = 0.9  # fraction of retained residue C transferred to biomass (0-1)
          mcn = 8.0  # C:N ratio of microbes ()
          no3ppm_min = 0.0  # minimum allowable NO3 (ppm)
          min_depth = 100.  # depth of soil from which N can be immobilised by decomposing surface residues (mm)
          nitrification_pot (ppm) = 40.0  # Soil Nitrification potential (ug NH4/g soil)
          nh4_at_half_pot (ppm) = 90  # NH4 concentration at half potential nitrification (Michaelis-Menton kinetics)
          dnit_rate_coeff = 0.0006  # denitrification rate coefficient (kg soil/mg C per day)
          dnit_wf_power = 1  # power term for calculation of water factor for denitrification where wf = ((SW-DUL)/(SAT-DUL))^P
          dnit_k1 = 25.1  # K1 parameter from Thorburn et al(2010) for N2O model
          // dsg 200509 ****** the following constants are for (a) aerobic AND (b)anaerobic conditions *****
          // ______________________________________________________________________-
          // Specifying the water factor for Nitrogen Transformations is
          // by referring to water content via an indexing system and linear interpolation
          // between specified coordinates.
          // (see example)
          // 
          // 1 |    ______
          // |   /.     \                In this example
          // .5 |  / .      -               wf_index = 0.0 0.5 1.0 2.0
          // | /  .        \             wf_values= 0.0 1.0 1.0 0.25
          // |/   .
          // 0 ______________________-
          // LL       DUL   SAT
          // =0       =1    =2
      ReportDb
        variables
          variables: LAI, sw, maxt, surfaceom_wt, interception, no3, CurrentPhaseName
      surfaceom SurfaceOrganicMatter: PoolName=wheat_stubble; type=wheat; mass=1000.; cnr=80.0; standing_fraction=0.0; crit_residue_wt=2000.0
        opt_temp = 20  # temperature at which decomp reaches optimum rate (oC)
        cum_eos_max = 20  # cumeos at which decomp rate becomes zero. (mm H2O)
        cnrf_coeff = 0.277  # coeff. to determine the magnitude
        cnrf_optcn = 25.0  # C:N above which decomposition rate
        c_fract = 0.4  # Fraction of Carbon in plant material (0-1)
        leach_rain_tot = 25.0  # total amount of 'leaching' rain to remove
        min_rain_to_leach = 10.0  # threshold rainfall amount for leaching to occur
        crit_min_surfom_orgC (kg/ha) = 0.004  # critical minimum org C below
        default_cpr = 0.0  # default C:P ratio to use when insufficient information
        default_standing_fraction = 0.0  # fraction of the residues 'standing' ie isolated from the soil
        standing_extinct_coeff = 1.0  # assume all standing stuff is flat (!!??)
        // of C:N effects on decomposition of residue ()
        // of residue declines ()
        // all soluble N from Manure
        // which potential decomposition rate
        // is 100% (to avoid numerical imprecision)
        // is supplied to residue2
        // ______________________________________________________________-
        // Residue type information
        // ______________________________________________________________-
        ResiduesType
          base_type: fom_type=inert; cf_contrib=1; pot_decomp_rate=0.1; fr_c=0.2 0.7 0.1; fr_n=0.2 0.7 0.1; fr_p=0.2 0.7 0.1
            fraction_C = 0.4  # fraction of Carbon in FOM (0-1)
            po4ppm = 0.0  # labile P concentration(ppm)
            nh4ppm = 0.0  # ammonium N concentration (ppm)
            no3ppm = 0.0  # nitrate N concentration (ppm)
            specific_area = 0.0005  # specific area of residue (ha/kg
          inert: derived_from=base_type; fom_type=inert; pot_decomp_rate=0.0
          manure: fom_type=manure; pot_decomp_rate=0.1; fr_c=0.3 0.3 0.4; fr_n=0.3 0.3 0.4; fr_p=0.3 0.3 0.4; cf_contrib=1
            fraction_C = 0.08  # fraction of Carbon in FOM (0-1)
            po4ppm = 10.0  # labile P concentration(ppm)
            nh4ppm = 10.0  # ammonium N concentration (ppm)
            no3ppm = 10.0  # nitrate N concentration (ppm)
            specific_area = 0.0001  # specific area of residue (ha/kg)
          RuminantDung_PastureFed: fom_type=RuminantDung_PastureFed; cf_contrib=1; pot_decomp_rate=0.1; fr_c=0.3 0.5 0.2; fr_n=0.3 0.5 0.2; fr_p=0.3 0.5 0.2
            fraction_C = 0.4  # fraction of Carbon in FOM (0-1)
            po4ppm = 5.0  # labile P concentration(ppm)
            nh4ppm = 1250.0  # ammonium N concentration (ppm)
            no3ppm = 0.0  # nitrate N concentration (ppm)
            specific_area = 0.0001  # specific area of residue (ha/kg
          algae: derived_from=base_type; fom_type=algae; pot_decomp_rate=0.1; cf_contrib=1
            fraction_C = 0.4  # fraction of Carbon in FOM (0-1)
            specific_area = 0.0005  # specific area of residue (ha/kg)
          fym: fom_type=fym; pot_decomp_rate=0.1; fr_c=0.3 0.3 0.4; fr_n=0.3 0.3 0.4; fr_p=0.3 0.3 0.4; cf_contrib=1
            fraction_C = 0.08  # fraction of Carbon in FOM (0-1)
            po4ppm = 40.0  # labile P concentration(ppm)
            nh4ppm = 10.0  # ammonium N concentration (ppm)
            no3ppm = 10.0  # nitrate N concentration (ppm)
            specific_area = 0.0001  # specific area of residue (ha/kg)
          goatmanure: fom_type=goatmanure; pot_decomp_rate=0.1; fr_c=0.3 0.6 0.3; fr_n=0.3 0.6 0.3; fr_p=0.3 0.6 0.34; cf_contrib=1
            fraction_C = 0.08  # fraction of Carbon in FOM (0-1)
            po4ppm = 5.0  # labile P concentration(ppm)
            nh4ppm = 1307.0  # ammonium N concentration (ppm)
            no3ppm = 481.0  # nitrate N concentration (ppm)
            specific_area = 0.0001  # specific area of residue (ha/kg)
          chikenmanure_base: fom_type=cm; pot_decomp_rate=0.1; fr_c=0.0 0.50 0.50; fr_n=0.0 0.50 0.50; fr_p=0.0 0.50 0.50; cf_contrib=1
            fraction_C = 0.374  # fraction of Carbon in FOM (0-1)
            po4ppm = 5.0  # labile P concentration(ppm)
            nh4ppm = 1307.0  # ammonium N concentration (ppm)
            no3ppm = 481.0  # nitrate N concentration (ppm)
            specific_area = 0.0001  # specific area of residue (ha/kg)
          cm: derived_from=chikenmanure_base
            fraction_C = 0.277  # fraction of Carbon in FOM (0-1)
            nh4ppm = 2558.0  # ammonium N concentration (ppm)
            no3ppm = 873.0  # nitrate N concentration (ppm)
          cmA: derived_from=chikenmanure_base
            fraction_C = 0.374  # fraction of Carbon in FOM (0-1)
            nh4ppm = 1307.0  # ammonium N concentration (ppm)
            no3ppm = 481.0  # nitrate N concentration (ppm)
          cmB: derived_from=chikenmanure_base
            fraction_C = 0.240  # fraction of Carbon in FOM (0-1)
            nh4ppm = 3009.0  # ammonium N concentration (ppm)
            no3ppm = 36.0  # nitrate N concentration (ppm)
          manB: fom_type=manB; pot_decomp_rate=0.1; fr_c=0.1 0.01 0.89; fr_n=0.1 0.01 0.89; fr_p=0.1 0.01 0.89; cf_contrib=1
            fraction_C = 0.08  # fraction of Carbon in FOM (0-1)
            po4ppm = 5.0  # labile P concentration(ppm)
            nh4ppm = 1307.0  # ammonium N concentration (ppm)
            no3ppm = 481.0  # nitrate N concentration (ppm)
            specific_area = 0.0001  # specific area of residue (ha/kg)
          tithonia: derived_from=base_type; fom_type=tithonia
            specific_area = 0.0005  # specific area of residue (ha/kg)
          bambatsi: derived_from=base_type; fom_type=bambatsi
            specific_area = 0.0005  # specific area of residue (ha/kg
          barley: derived_from=base_type; fom_type=barley
            specific_area = 0.0005  # specific area of residue (ha/kg
          broccoli: derived_from=base_type; fom_type=broccoli
            specific_area = 0.0004  # specific area of residue (ha/kg
          butterflypea: derived_from=base_type; fom_type=butterflypea
            specific_area = 0.0004  # specific area of residue (ha/kg
          camaldulensis: derived_from=base_type; fom_type=camaldulensis
            specific_area = 0.0002  # specific area of residue (ha/kg
          canola: derived_from=base_type; fom_type=canola
            specific_area = 0.0002  # specific area of residue (ha/kg
          centro: derived_from=base_type; fom_type=centro
            specific_area = 0.0004  # specific area of residue (ha/kg
          chickpea: derived_from=base_type; fom_type=chickpea
            specific_area = 0.0002  # specific area of residue (ha/kg
          cowpea: derived_from=base_type; fom_type=cowpea
            specific_area = 0.0002  # specific area of residue (ha/kg
          danthonia: derived_from=base_type; fom_type=danthonia
            specific_area = 0.0005  # specific area of residue (ha/kg
          nativepasture: derived_from=base_type; fom_type=nativepasture
            specific_area = 0.0005  # specific area of residue (ha/kg
          globulus: derived_from=base_type; fom_type=globulus
            specific_area = 0.0002  # specific area of residue (ha/kg
          grandis: derived_from=base_type; fom_type=grandis
            specific_area = 0.0002  # specific area of residue (ha/kg
          fababean: derived_from=base_type; fom_type=fababean
            specific_area = 0.0002  # specific area of residue (ha/kg
          fieldpea: derived_from=base_type; fom_type=fieldpea
            specific_area = 0.0002  # specific area of residue (ha/kg
          grass: derived_from=base_type; fom_type=grass
            specific_area = 0.0004  # specific area of residue (ha/kg
          lablab: derived_from=base_type; fom_type=lablab
            specific_area = 0.0002  # specific area of residue (ha/kg
          lentil: derived_from=chickpea
          lucerne: derived_from=base_type; fom_type=lucerne
            specific_area = 0.0002  # specific area of residue (ha/kg
          lucerne2: derived_from=lucerne
          lupin: derived_from=base_type; fom_type=lupin
            specific_area = 0.0002  # specific area of residue (ha/kg
          maize: derived_from=base_type; fom_type=maize
            specific_area = 0.0004  # specific area of residue (ha/kg
          medic: derived_from=lucerne
          millet: derived_from=base_type; fom_type=millet
            specific_area = 0.0004  # specific area of residue (ha/kg
          mucuna: derived_from=base_type; fom_type=mucuna
            specific_area = 0.0002  # specific area of residue (ha/kg
          mungbean: derived_from=base_type; fom_type=mungbean
            specific_area = 0.0002  # specific area of residue (ha/kg
          horsegram: derived_from=base_type; fom_type=horsegram
            specific_area = 0.0002  # specific area of residue (ha/kg
          navybean: derived_from=base_type; fom_type=navybean
            specific_area = 0.0002  # specific area of residue (ha/kg
          cotton: derived_from=base_type; fom_type=cotton
            specific_area = 0.0002  # specific area of residue (ha/kg
          oats: derived_from=base_type; fom_type=oats
            specific_area = 0.0005  # specific area of residue (ha/kg
          orobanche: derived_from=base_type; fom_type=orobanche
            specific_area = 0.0002  # specific area of residue (ha/kg
          peanut: derived_from=base_type; fom_type=peanut
            specific_area = 0.0002  # specific area of residue (ha/kg
          pigeonpea: derived_from=base_type; fom_type=pigeonpea
            specific_area = 0.0002  # specific area of residue (ha/kg
          poppies: derived_from=base_type; fom_type=poppies
            specific_area = 0.0005  # specific area of residue (ha/kg
          potato: derived_from=base_type; fom_type=potato
            specific_area = 0.0005  # specific area of residue (ha/kg
          rice: derived_from=base_type; fom_type=rice
            specific_area = 0.0005  # specific area of residue (ha/kg
          soybean: derived_from=base_type; fom_type=soybean
            specific_area = 0.0002  # specific area of residue (ha/kg
          sorghum: derived_from=base_type; fom_type=sorghum
            specific_area = 0.0004  # specific area of residue (ha/kg
          stylo: derived_from=base_type; fom_type=stylo
            specific_area = 0.0002  # specific area of residue (ha/kg
          sugar: derived_from=base_type; fom_type=sugar
            specific_area = 0.0007  # specific area of residue (ha/kg
          sunflower: derived_from=base_type; fom_type=sunflower
            specific_area = 0.0002  # specific area of residue (ha/kg
          sweetcorn: derived_from=base_type; fom_type=sweetcorn
            specific_area = 0.0004  # specific area of residue (ha/kg
          sweetsorghum: derived_from=base_type; fom_type=sweetsorghum
            specific_area = 0.0004  # specific area of residue (ha/kg
          vetch: derived_from=fieldpea
          weed: derived_from=base_type; fom_type=weed
            specific_area = 0.0004  # specific area of residue (ha/kg
          WF_Millet: derived_from=base_type; fom_type=WF_Millet
            specific_area = 0.0004  # specific area of residue (ha/kg
          wheat: derived_from=base_type; fom_type=wheat
            specific_area = 0.0005  # specific area of residue (ha/kg
        SOMTillageType: chisel=0.5           100.; disc=0.5           200.; planter=0.1            50.; burn=1.0             0.; bw_chisel=1.0           100.; herbinc=0.1            50.; burn_95=.95            0.; graze=0.75            0.; scarifier=0.30          100.; pits=0.5           100.; rip=0.3           300.; blade=0.30          100.; Cool_burn=0.7             0.; burn_90=0.9             0.; tine=1.0           100.; default_tillage=1.0             1.; decomp=0.75           100.; mix=1.0           100.; hoe=1.0           100.; MTT_Plough=1.0          200.; MTT_Disc=0.8          100.; MTT_Drill=0.05          50.; MTT_Bale=0.8           0.; Tread=0.5          100; bale_cereal_straw=0.5          0; bale_grass_straw=0.7          0; bale_legume_straw=0.9          0; graze_cereal_forage=0.9         0; graze_kale_forage=0.85         0; carry_cereal_forage=0.95          0
          sweep = 0.30          100.  # Pdev
      micromet: soil_albedo=0.23; a_interception=0.0; b_interception=0.0; c_interception=0.0; d_interception=0.0
      manager2 Script(C#)
```csharp
using System;
using ModelFramework;
using System.Xml;

public class Script 
{      
   [Link] Paddock MyPaddock;
   [Link] Plant Wheat2; 
   [Input] DateTime Today;   
   [Input] string CurrentPhaseName; 

   string Checkpoint;

   // The following event handler will be called once at the beginning of the simulation
   [EventHandler] public void OnInitialised()
   {
      MyPaddock.Deactivate("wheat2");
      Checkpoint = MyPaddock.Checkpoint("wheat2");
      Console.Write(Checkpoint);
      MyPaddock.OutputDiagnostics();
   }

   // The following event handler will be called each day at the beginning of the day
   [EventHandler] public void OnPrepare()
   {
      if (Today.Day == 1 && Today.Month == 6) 
      {
         Console.WriteLine("Sowing");
         MyPaddock.Activate("wheat2");
         SowPlant2Type Sow = new SowPlant2Type {Cultivar = "Hartog", Population = 150, Depth = 50, RowSpacing = 500, MaxCover = 1, BudNumber = 1};
         Wheat2.OnSow(Sow);
      }

   }

   // The following event handler will be called each day at the beginning of the day
   [EventHandler] public void OnPost()
   {
      if (CurrentPhaseName == "ReadyForHarvesting")
      {
         Console.WriteLine("Harvesting");
         Wheat2.OnHarvest();
         Wheat2.OnEndCrop();
         MyPaddock.InitialiseFromCheckpoint("wheat2", Checkpoint);
         MyPaddock.Deactivate("wheat2");
      }

   }

}
```
