folder simulations: version=36; creator=Apsim 7.6-r3493
  simulation Banana2
    metfile met: filename=SouthJohnstone.met
    clock
      start_date = 01/11/2010  # Enter the start date of the simulation
      end_date = 20/02/2012  # Enter the end date of the simulation
    summaryfile
    area paddock
      Soil: SoilType=Black Vertosol; LocalName=Waco; Site=Jimbour; NearestTown=Jimbour, Q 4352; Region=South East Queensland; NaturalVegetation=Grassland, mainly Qld bluegrass; Latitude=0; Longitude=0; YearOfSampling=0
        Water
          Thickness  BD    AirDry  LL15  DUL   SAT   KS
          150        1.02  0.15    0.29  0.54  0.59  100
          150        1.03  0.26    0.29  0.53  0.58  100
          300        1.02  0.29    0.29  0.54  0.59  100
          300        1.02  0.29    0.29  0.54  0.58  100
          300        1.06  0.3     0.3   0.52  0.57  100
          300        1.11  0.31    0.31  0.5   0.55  100
          300        1.12  0.32    0.32  0.5   0.55  100
          300        1.15  0.33    0.33  0.48  0.53  100
          300        1.18  0.34    0.34  0.47  0.52  100
          300        1.2   0.35    0.35  0.46  0.51  100
          300        1.25  0.36    0.36  0.44  0.49  100
          SoilCrop Barley
            LL=[0.29, 0.29, 0.32, 0.38, 0.39, 0.39, 0.41, 0.48, 0.47, 0.46, 0.44]
            KL=[0.1, 0.1, 0.08, 0.06, 0.04, 0.02, 0.01, 0, 0, 0, 0]
            XF=[1, 1, 1, 1, 1, 1, 1, 0, 0, 0, 0]
          SoilCrop Chickpea
            LL=[0.29, 0.29, 0.36, 0.43, 0.51, 0.5, 0.5, 0.48, 0.47, 0.46, 0.44]
            KL=[0.1, 0.1, 0.08, 0.06, 0.04, 0.02, 0.01, 0, 0, 0, 0]
            XF=[1, 1, 1, 1, 1, 1, 1, 0, 0, 0, 0]
          SoilCrop Lucerne
            LL=[0.29, 0.29, 0.29, 0.29, 0.3, 0.31, 0.32, 0.33, 0.34, 0.35, 0.36]
            KL=[0.1, 0.1, 0.1, 0.1, 0.09, 0.09, 0.09, 0.09, 0.09, 0.09, 0.09]
            XF=[1, 1, 1, 1, 1, 1, 1, 1, 1, 1, 1]
          SoilCrop Maize
            LL=[0.29, 0.29, 0.34, 0.34, 0.37, 0.4, 0.42, 0.48, 0.47, 0.46, 0.44]
            KL=[0.1, 0.1, 0.1, 0.08, 0.06, 0.04, 0.02, 0, 0, 0, 0]
            XF=[1, 1, 1, 1, 1, 1, 1, 0, 0, 0, 0]
          SoilCrop Perennial Grass
            LL=[0.29, 0.29, 0.39, 0.41, 0.4, 0.4, 0.41, 0.41, 0.4, 0.4, 0.42]
            KL=[0.1, 0.1, 0.1, 0.1, 0.09, 0.07, 0.05, 0, 0, 0, 0]
            XF=[1, 1, 1, 1, 1, 1, 1, 0, 0, 0, 0]
          SoilCrop Sorghum
            LL=[0.29, 0.29, 0.35, 0.38, 0.4, 0.4, 0.4, 0.48, 0.47, 0.46, 0.44]
            KL=[0.1, 0.1, 0.1, 0.08, 0.06, 0.04, 0.02, 0, 0, 0, 0]
            XF=[1, 1, 1, 1, 1, 1, 1, 0, 0, 0, 0]
          SoilCrop Wheat
            LL=[0.29, 0.29, 0.32, 0.32, 0.35, 0.38, 0.41, 0.48, 0.47, 0.46, 0.44]
            KL=[0.1, 0.1, 0.08, 0.06, 0.04, 0.02, 0.01, 0, 0, 0, 0]
            XF=[1, 1, 1, 1, 1, 1, 1, 0, 0, 0, 0]
          SoilCrop wheat2
            LL=[0.29, 0.29, 0.32, 0.32, 0.35, 0.38, 0.41, 0.48, 0.47, 0.46, 0.44]
            KL=[0.1, 0.1, 0.08, 0.06, 0.04, 0.02, 0.01, 0, 0, 0, 0]
            XF=[1, 1, 1, 1, 1, 1, 1, 0, 0, 0, 0]
          SoilCrop Banana2
            LL=[0.29, 0.29, 0.32, 0.32, 0.35, 0.38, 0.41, 0.48, 0.47, 0.46, 0.44]
            KL=[0.1, 0.1, 0.08, 0.06, 0.04, 0.02, 0.01, 0, 0, 0, 0]
            XF=[1, 1, 1, 1, 1, 1, 1, 0, 0, 0, 0]
        SoilWater: SummerCona=5; SummerU=9; SummerDate=1-Nov; WinterCona=5; WinterU=9; WinterDate=1-Apr; DiffusConst=40; DiffusSlope=16; Salb=0.13; CN2Bare=73; CNRed=20; CNCov=0.8; Thickness=[150, 150, 300, 300, 300, 300, 300, 300, 300, 300, 300]; SWCON=[0.3, 0.3, 0.3, 0.3, 0.3, 0.3, 0.3, 0.3, 0.3, 0.3, 0.3]
        SoilOrganicMatter: RootCN=40; RootWt=200; SoilCN=12.5; EnrACoeff=7.4; EnrBCoeff=0.2; OCUnits=Total
          Thickness  OC    FBiom  FInert
          150        1.04  0.025  0.4
          150        0.89  0.02   0.6
          300        0.89  0.015  0.8
          300        0.89  0.01   0.9
          300        0.77  0.01   0.95
          300        0.45  0.01   0.95
          300        0.27  0.01   0.95
          300        0.22  0.01   0.95
          300        0.16  0.01   0.95
          300        0.13  0.01   0.95
          300        0.12  0.01   0.95
        Analysis
          Thickness  EC    PH
          150        0.2   8.4
          150        0.25  8.8
          300        0.31  9
          300        0.4   9.2
          300        0.59  9.2
          300        0.84  9.1
          300        0.93  9
          300        1.01  9
          300        1.06  8.9
          300        1.05  8.9
          300        1.01  8.9
        InitialWater Initial Water: FractionFull=1; PercentMethod=FilledFromTop
        Sample Initial Nitrogen: NO3Units=kgha; NH4Units=kgha
          Thickness  NO3     NH4
          150        56.764  5.226
          150        18.518  0.884
          300        36.677  1.746
          300        29.694  1.746
          300        30.858  1.814
          300        32.313  1.9
          300        32.604  1.917
          300        33.476  1.968
          300        34.355  2.02
          300        34.937  2.054
          300        36.392  2.139
      surfaceom SurfaceOrganicMatter
        PoolName = wheat_stubble  # Organic Matter pool name
        type = wheat  # Organic Matter type
        mass = 0.0  # Initial surface residue (kg/ha)
        cnr = 80.0  # C:N ratio of initial residue
        standing_fraction = 0.0  # Fraction of residue standing
      fertiliser
      banana2
      folder Manager folder
        manager Sow on a fixed date
          # Sowing criteria
          date = 02/11/2010  # Enter sowing date (dd-mmm)
          # Sowing parameters
          crop = Banana2  # Enter name of crop to sow
          density = 0.15  # Enter sowing density (plants/m2)
          depth = 1  # Enter sowing depth (mm)
          cultivar = Cavendish  # Enter cultivar
          class = Plant  # Enter crop growth class
          row_spacing = 3000  # Enter row spacing (mm)
          on start_of_day:
```
        if (today = date('[date]') then
              [crop] sow population =[density], depth = [depth], cultivar = [cultivar], MaxCover = 1.0, BudNumber = 1, row_spacing = [row_spacing], crop_class = [class]
         endif
```
        manager Fertilise incrop on critical NO3 level- top up
          # When should fertiliser be applied
          modulename = Banana2  # In which crop is fertiliser being applied
          fert_criteria = 200  # Maximum Amount of NO3 required in top 3 layers (kg/ha)
          fert_critical = 100  # Critical Amount of NO3 in top 3 layers (kg/ha)
          # Fertiliser application details
          fertmodule = fertiliser  # Module used to apply the fertiliser
          fert_type = NO3_N  # Fertiliser type
          on start_of_day:
```
         if ([modulename].plant_status = 'alive') then
            NO3_available = no3(1) + no3(2) + no3(3)
            if (NO3_available <= [fert_critical]) then
               N_deficit = [fert_criteria] - NO3_available
               '[fertmodule]' apply amount = N_deficit (kg/ha), depth = 50 (mm), type = [fert_type] ()
            endif
         endif
```
        manager Harvesting rule
          # Harvesting criteria
          crop = Banana2  # Enter name of crop to harvest when ripe
          on end_of_day:
```
           if ('[crop]' = 'cotton') then
              if ([crop].ozcot_status > 0) then
                  [crop] harvest
              endif
           elseif ([crop].PhenologyCurrentStageName = 'HarvestRipe' or [crop].plant_status = 'dead') then
              [crop]  harvest
              [crop]  end_crop
           endif
```
      outputfile: filename=Banana2.out; title=Banana2
        variables
          variables: dd/mm/yyyy as Date, StageCodeValue, PhenologyCurrentPhaseName, PhenologyCurrentStageName, LeafLAI, AboveGroundWt, sw_dep(), WaterDemand, LeafFw, LeafTranspiration, LeafWaterDemand, RootWaterUptake, surfaceom_wt, no3(), StructureMainStemNodeNo, LeafExpandedNodeNo, LeafExpandedCohortNo, LeafThermalTimeValue, StemLiveWt, StemLiveStructuralNConc, StemLiveNConc, CormLiveWt, BelowGroundWt, TotalWt, LeafLiveWt, RootLiveWt, FruitLiveWt, Banana2.LeafLiveN
        events Reporting Frequency: event=daily
      micromet: soilalbedo=0.23; a_interception=0.0; b_interception=0.0; c_interception=0.0; d_interception=0.0
      irrigation
        automatic_irrigation = on
        asw_depth = 600  # Depth to which ASW is calculated. (mm)
        crit_fr_asw = 0.5  # Fraction of ASW below which irrigation is applied (0-1.0)
        irrigation_efficiency = 1  # Efficiency of the irrigation. (0-1.0)
        irrigation_allocation = off  # Allocation limits
        allocation = 0  # Allocation in mm
        default_no3_conc = 0.0  # Nitrate concentration (ppm N)
        default_nh4_conc = 0.0  # Ammonium concentration (ppm N)
        default_cl_conc = 0.0  # Chloride concentration (ppm Cl)
      folder Plant2 developers graph suite
        outputfile Plant2 diagnostic variables: Title=Banana2 Plant2 diagnostic variables; filename=Banana2 Plant2 diagnostic variables.out
          events Reporting Frequency: event=Daily
          variables
            variables: dd/mmm/yyyy, no3(), nh4(), urea(), surfaceom_n, biom_n(), fom_n(), hum_n(), dnit(), leach, AccumPlantN, AccumMineralisation, AccumDenit, AccumFert, AccumLeach, AccumDetach, DeltaSoilOMN, DeltaSurfaceOMN, DeltaSoilMineralN, RootNUptakeSupply, eo, es, sw_dep(), dul_dep(), drain, runoff, outflow_lat(), pond, AccumEO, AccumEP, AccumES, AccumDrainage, AccumRunoff, AccumRainfall, AccumIrrigation, AccumOutflowLat, SoilWaterDeficit, LeafDeadWt, LeafLiveWt, StemDeadWt2, StemLiveWt, CormDeadWt, CormLiveWt, RootDeadWt, RootLiveWt, FruitLIveWt, FruitDeadWt, FlowerLIveWt, FlowerDeadWt, RootLiveN, RootDeadN, LeafDeadN, LeafLiveN, StemDeadN, StemLiveN, CormDeadN, CormLiveN, FruitLiveN, FruitDeadN, FlowerLiveN, FlowerDeadN, RootWaterSupply, RootWaterUptake, LeafTranspiration, LeafWaterDemand, RootDepth, Cover_green, Cover_tot, Cover_dead, LeafLAI, LeafLAIDead, Height, LeafFn, LeafFw, LeafFrgr, LeafPhotosynthesisFt, LeafPhotosynthesisFvpd, LeafTotalNo, LeafGreenNo, LeafExpandingNodeNo, LeafCohortNo, LeafBranchNo, LeafDeadNodeNo, LeafNodeNo, LeafSenescingNodeNo, LeafDeadN, LeafDeadWt, LeafLeafSizeValue, LeafLiveN, StemLiveN, TotalNonStructuralN, TotalStructuralN, Yield
        manager Diagnostic variables
          CropType = Banana2  # Select crop type to report variables for
          on init:
```
SimDay = 1

AccumPlantN = 0
AccumMineralisation = 0
AccumDenit = 0
AccumFert = 0
AccumLeach = 0
AccumDetach = 0
DeltaSoilOMN = 0
DeltaSurfaceOMN = 0
DeltaSoilMineralN = 0

AccumEO = 0
AccumEP = 0
AccumES = 0
AccumDrainage = 0
AccumRunoff = 0
AccumIrrigation = 0
AccumRainfall = 0
SoilWaterDeficit = 0
```
          on start_of_day:
```
if simday = 1 then
InitialSoilOMN = biom_n() + fom_n() + hum_n()
InitialSurfaceOMN = surfaceom_n
InitialMineralN = no3() + nh4() + urea()
endif

!!!!!! Nitrogen balance components !!!!!!
!!!!!!^^^^^^^^^^^^^^^^^^^^^^^^^^^^^!!!!!!
AccumPlantN =  ([CropType].LeafLiveN + [CropType].LeafDeadN + [CropType].StemLiveN + [CropType].StemDeadN + [CropType].CormLiveN + [CropType].CormDeadN ) * 10 ![CropType].RootLiveN + [CropType].RootDeadN
AccumMineralisation = AccumMineralisation + dlt_n_min() + dlt_n_min_res()
AccumDenit = AccumDenit - dnit() 
AccumFert = AccumFert + fertiliser
AccumLeach = AccumLeach - leach_urea - leach_no3 - leach_nh4 
AccumDetach = 0 !plant2 doesn't detach yet
DeltaSoilOMN = (biom_n() + fom_n() + hum_n()) - InitialSoilOMN
DeltaSurfaceOMN = surfaceom_n - InitialSurfaceOMN
DeltaSoilMineralN = (no3() + nh4() + urea()) - InitialMineralN

!!!!!! Water balance components !!!!!!
!!!!!!^^^^^^^^^^^^^^^^^^^^^^^^^^!!!!!!

AccumEO = AccumEO - eo
AccumEP = AccumEP - [CropType].LeafTranspiration
AccumES = AccumES - es
AccumDrainage = AccumDrainage - drain
AccumRunoff = AccumRunoff - runoff
AccumOutflowLat = AccumOutflowLat - outflow_lat()
AccumIrrigation = AccumIrrigation + Irrigation
AccumRainfall = Accumrainfall + rain
SoilWaterDeficit =  sw_dep() - dul_dep()
```
          on end_of_day:
```
if SimDay = 1 then
SimDay = 2
Else SimDay = 2
endif
```
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