folder Simulations: version=31
  simulation HighWaterHighNitrogen
    metfile met: filename=%apsim%\Examples\MetFiles\lincoln.met
    clock
      start_date = 20/10/2003  # Enter the start date of the simulation
      end_date = 23/05/2004  # Enter the end date of the simulation
    summaryfile
    area paddock
      fertiliser
      surfaceom surface organic matter
        PoolName = wheat  # Organic Matter pool name
        type = wheat  # Organic Matter type
        mass = 2000  # Initial surface residue (kg/ha)
        cnr = 80  # C:N ratio of initial residue
        standing_fraction = 0  # Fraction of residue standing
      folder Manager folder
        manager Harvesting rule
          # Harvesting criteria
          crop = barley2  # Enter name of crop to harvest when ripe
          on end_of_day:
```
        if [crop].plant_status <> 'out' then
           if [crop].PhenologyCurrentPhaseName = 'maturity' or [crop].plant_status = 'dead' then
              [crop]  harvest
              [crop]  endcrop
           endif
        endif
```
        operations
          20/10/2003  fertiliser apply amount= 500 (kg/ha), type= urea_N (), depth= 10 (mm)
          25/11/2003  fertiliser apply amount= 69 (kg/ha), type= urea_N (), depth= 10 (mm)
          26/11/2003  irrigation apply amount= 15 (mm)
          4/12/2003  irrigation apply amount= 50 (mm)
          16/12/2003  irrigation apply amount= 15 (mm)
          22/12/2003  irrigation apply amount= 50 (mm)
          30/12/2003  irrigation apply amount= 50 (mm)
          8/1/2004  irrigation apply amount= 50 (mm)
          21/1/2004  irrigation apply amount= 50 (mm)
          31/1/2004  irrigation apply amount= 50 (mm)
          27/2/2004  irrigation apply amount= 25 (mm)
          25/12/2003  fertiliser apply amount= 0 (kg/ha), type= urea_N (), depth= 10 (mm)
        irrigation
          automatic_irrigation = on
          asw_depth = 600  # Depth to which ASW is calculated. (mm)
          crit_fr_asw = 0.5  # Fraction of ASW below which irrigation is applied (0-1.0)
          irrigation_efficiency = 1  # Efficiency of the irrigation. (0-1.0)
          irrigation_allocation = off  # Allocation limits
          allocation = 0  # Allocation in ML
          default_no3_conc = 0  # Nitrate concentration (ppm N)
          default_nh4_conc = 0  # Ammonium concentration (ppm N)
          default_cl_conc = 0  # Chloride concentration (ppm Cl)
          default_no3_conc = 0  # Nitrate concentration (ppm N)
          default_nh4_conc = 0  # Ammonium concentration (ppm N)
          default_cl_conc = 0  # Chloride concentration (ppm Cl)
        manager Barley Sowing Rule
          sowing_date = 20/10/2003
          emergence_date = 12/11/2003
          row_width = 150  # Row width (mm)
          population = 300  # Emerged population (/m2)
          stem_number = 1  # Stem number per plant
          cultivar = Dash
          sowing_depth = 30  # Sowing depth (mm)
          Harvest_date = 03/06/2000
          on start_of_day:
```
if today = date('[sowing_date]') then
   barley2 sow population = [population], depth = [sowing_depth], cultivar = [cultivar], maxcover = 1.0, budnumber = [stem_number], row_spacing = [row_width], crop_class = plant  
 endif
```
          on Init:
```
Plant_population = 0
```
      soil Templeton
        Analysis
          Layer:
            Thickness (mm)  PH (1:5 water)  ParticleSizeClay (%)
            100             6.6             30
            200             6.2             30
            300             5.7             30
            300             5.5             30
            300             5.5             30
            300             5.5             30
        InitWater Initial water
          PercentMethod: Percent=1.00; Distributed=Evenly distributed
        Water
          Layer:
            Thickness (mm)  BD (g/cc)  AirDry (mm/mm)  LL15 (mm/mm)  DUL (mm/mm)  SAT (mm/mm)
            100             1.2        0.08            0.16          0.33         0.5
            200             1.2        0.16            0.16          0.33         0.5
            300             1.2        0.15            0.15          0.31         0.44
            300             1.2        0.13            0.13          0.27         0.46
            300             1.2        0.15            0.15          0.3          0.44
            300             1.2        0.15            0.15          0.3          0.44
          SoilCrop wheat
            Layer:
              Thickness (mm)  LL (mm/mm)  KL (/day)  XF (0-1)
              100             0.13        0.06       1
              200             0.13        0.06       1
              300             0.1         0.06       1
              300             0.08        0.06       1
              300             0.11        0.06       1
              300             0.11        0.06       1
          SoilCrop potato2
            Layer:
              Thickness (mm)  LL (mm/mm)  KL (/day)  XF (0-1)
              100             0.13        0.1        1
              200             0.13        0.06       1
              300             0.1         0.04       0.5
              300             0.15        0.01       1
              300             0.3         0          0
              300             0.3         0          0
          SoilCrop potato21
            Layer:
              Thickness (mm)  LL (mm/mm)  KL (/day)  XF (0-1)
              100             0.13        0.1        1
              200             0.13        0.1        1
              300             0.1         0.07       1
              300             0.15        0.05       1
              300             0.3         0.05       0
              300             0.3         0.05       0
          SoilCrop barley2
            Layer:
              Thickness (mm)  LL (mm/mm)  KL (/day)  XF (0-1)
              100             0.13        0.2        1
              200             0.13        0.1        1
              300             0.1         0.1        1
              300             0.15        0.1        1
              300             0.3         0.1        0
              300             0.3         0          0
        SoilWat: SummerCona=4.4; SummerU=9; SummerDate=1-Nov; WinterCona=4.4; WinterU=9; WinterDate=1-Apr; DiffusConst=88; DiffusSlope=35.4; Salb=0.18; CN2Bare=68; CNRed=20; CNCov=0.8
          Layer:
            Thickness (mm)  SWCON (0-1)
            100             0.55
            200             0.55
            300             0.55
            300             0.55
            300             0.55
            300             0.55
        SoilOrganicMatter: RootCN=30; RootWT=3000; SoilCN=11.5; EnrACoeff=7.4; EnrBCoeff=0.2
          Layer:
            Thickness (mm)  OC (Total %)  FBiom (0-1)  FInert (0-1)
            100             3.5           0.025        0.3
            200             2.5           0.025        0.4
            300             1.2           0.015        0.75
            300             1.03          0.01         0.9
            300             0.47          0.01         0.96
            300             0.47          0.01         0.96
        Sample Initial nitrogen
          Layer:
            Thickness (mm)  NO3 (kg/ha)  NH4 (kg/ha)
            100             140          0.1
            200             30           0.1
            300             14           0.1
            300             14           0.1
            300             1.38889      0.1
            300             1.38889      0.1
      barley2
      micromet
        soilalbedo = 0.23
        a_interception = 0
        b_interception = 0
        c_interception = 0
        d_interception = 0
        ini: filename=%apsim%\Model\MicroMet_NZ_adjustment.xml
      folder Barley2 Analysis
        outputfile Plant2: filename=HighWaterHighNitrogen Plant2.out; title=HighWaterHighNitrogen Plant2
          events Reporting Frequency: event=Daily
          variables
            variable:
              dd/mmm/yyyy
              AccumTtemerg
              StageCodeValue
              no3()
              nh4()
              urea()
              surfaceom_n
              biom_n()
              fom_n()
              hum_n()
              dnit()
              leach_no3
              AccumPlantN
              AccumMineralisation
              AccumDenit
              AccumFert
              AccumLeach
              AccumDetach
              DeltaSoilOMN
              DeltaSurfaceOMN
              DeltaSoilMineralN
              RootNSupplyUptake
              eo
              es
              sw_dep()
              dul_dep()
              drain
              runoff
              outflow_lat()
              pond
              AccumEO
              AccumEP
              AccumES
              AccumDrainage
              AccumRunoff
              AccumRainfall
              AccumIrrigation
              AccumOutflowLat
              SoilWaterDeficit
              AboveGroundWt
              BelowGroundWt
              TotalWt
              LeafDeadWt
              LeafLiveWt
              StemDeadWt
              StemLiveWt
              RootDeadWt
              RootLiveWt
              GrainLiveWt
              GrainDeadWt
              FloretLiveWt
              FloretDeadWt
              AboveGroundN
              BelowGroundN
              TotalN
              TotalLiveN
              TotalDeadN
              LeafDeadN
              LeafLiveN
              StemDeadN
              StemLiveN
              RootLiveN
              RootDeadN
              GrainLiveN
              GrainDeadN
              FloretLiveN
              FloretDeadN
              LeafLiveNConc
              LeafDeadNConc
              StemLiveNConc
              TuberLiveNConc
              RootLiveNConc
              GrainLiveNConc
              FloretLiveNConc
              RootWaterSupply
              RootWaterUptake
              LeafTranspiration
              LeafWaterDemand
              RootDepth
              Cover_green
              Cover_tot
              Cover_dead
              LeafLAI
              LeafLAIDead
              Height
              LeafFn
              LeafFw
              LeafPhotosynthesisFtValue
              LeafPhotosynthesisFvpdValue
              StructurePlantMainStemNodeNo
              LeafPlantAppearedGreenLeafNo
              LeafExpandingCohortNo
              LeafAppearedCohortNo
              StructureTotalStemPopn
              LeafDeadCohortNo
              StructureMainStemNodeNo
              LeafSenescingCohortNo
              StructurePrimaryBudMainStemNodeNo
              sw
              no3
              LeafPartitionFractionValue
              StemPartitionFractionValue
              TuberPartitionFractionValue
              GrainPartitionFractionValue
              FloretPartitionFractionValue
              RootPartitionFractionValue
              GrainMinimumNConcValue
              FloretMinimumNConcValue
              LeafMinimumNConcValue
              StemMinimumNConcValue
              TuberMinimumNConcValue
              RootMinimumNConcValue
              GrainMaximumNConcValue
              FloretMaximumNConcValue
              LeafMaximumNConcValue
              StemMaximumNConcValue
              TuberMaximumNConcValue
              RootMaximumNConcValue
              leavesPerStem
              PhenologyEarlyTuberTargetValue
              StemLiveNonStructuralN
              StemLiveStructuralN
              StemLiveStructuralWt
              StemLiveNonStructuralWt
              LeafLiveNonStructuralN
              LeafLiveNonStructuralWt
              LeafLiveStructuralN
              LeafLiveStructuralWt
              LeafTotalStructuralN
              LeafTotalNonStructuralN
              LeafTotalStructuralWt
              LeafTotalNonStructuralWt
              LeafLiveMetabolicWt
              RootNSupplyUptake
              ArbitratorNDemand
              LeafSpecificArea
              maxt_soil_surface
        manager Diagnostic variables
          CropType = barley2  # Select crop type to report variables for
          on init:
```
SimDay = 1

AccumPlantN = 0
AccumMineralisation = 0
AccumDenit = 0
AccumFert = 0
AccumLeach = 0
AccumDetach = 0
DeltaSoilOMN = 0
DeltaSurfaceOMN = 0
DeltaSoilMineralN = 0

AccumEO = 0
AccumEP = 0
AccumES = 0
AccumDrainage = 0
AccumRunoff = 0
AccumOutflowLat = 0
AccumIrrigation = 0
AccumRainfall = 0
SoilWaterDeficit = 0

LeafLiveNConc3 = 0
LeafDeadNConc3 = 0
StemLiveNConc3 = 0
TuberLiveNConc3 = 0

AccumTtemerg = 0

leavesPerStem = 0
```
          on start_of_day:
```
if simday = 1 then
InitialSoilOMN = biom_n() + fom_n() + hum_n()
InitialSurfaceOMN = surfaceom_n
InitialMineralN = no3() + nh4() + urea()
endif

!!!!!! Nitrogen balance components !!!!!!
!!!!!!^^^^^^^^^^^^^^^^^^^^^^^^^^^^^!!!!!!
AccumPlantN =  AccumPlantN - [CropType].RootNuptake
AccumMineralisation = AccumMineralisation + dlt_n_min() + dlt_n_min_res()
AccumDenit = AccumDenit - dnit() 
AccumFert = AccumFert + fertiliser
AccumLeach = AccumLeach - leach_urea - leach_no3 - leach_nh4 
AccumDetach = 0 !plant2 doesn't detach yet
DeltaSoilOMN = (biom_n() + fom_n() + hum_n()) - InitialSoilOMN
DeltaSurfaceOMN = surfaceom_n - InitialSurfaceOMN
DeltaSoilMineralN = (no3() + nh4() + urea()) - InitialMineralN

!!!!!! Water balance components !!!!!!
!!!!!!^^^^^^^^^^^^^^^^^^^^^^^^^^!!!!!!
AccumEO = AccumEO - eo
AccumEP = AccumEP - [CropType].LeafTranspiration
AccumES = AccumES - es
AccumDrainage = AccumDrainage - drain
AccumRunoff = AccumRunoff - runoff
AccumOutflowLat = AccumOutflowLat - outflow_lat()
AccumIrrigation = AccumIrrigation + Irrigation
AccumRainfall = Accumrainfall + rain
SoilWaterDeficit =  sw_dep() - dul_dep()

!!!!!! Thermal time calculation !!!!!!
!!!!!! ^^^^^^^^^^^^^^^^^^^^^^^^ !!!!!!
If [CropType].StageCodeValue >= 3 Then
AccumTtemerg = AccumTtemerg + [CropType].PhenologyThermalTimeValue
Endif
```
          on end_of_day:
```
if SimDay = 1 then
SimDay = 2
Else SimDay = 2
endif
```
      outputfile SIRIUS phenology analysis: filename=HighWaterHighNitrogen SIRIUS phenology analysis.out; title=HighWaterHighNitrogen SIRIUS phenology analysis
        events Reporting Frequency: event=Daily
        variables
          variable:
            dd/mm/yyyy as Date
            StructurePlantMainStemNodeNo
            LeafPlantAppearedGreenLeafNo
            LeafExpandingCohortNo
            LeafAppearedCohortNo
            StructureTotalStemPopn
            LeafDeadCohortNo
            StructureMainStemNodeNo
            LeafSenescingCohortNo
            StructurePrimaryBudMainStemNodeNo
            StructureMainStemPrimordiaNo
            LeafFinalNodeNo
            LeafPhotoPeriodValue
            StageCodeValue
            PhenologyVernalisationIndexValue
            LeafFinalNodeNumberTerminateFinalNodeNumberVernalisationIndex as VernalisationIndex
            LeafFinalNodeNumberTerminateFinalNodeNumberVernalisationFinalNodeNumber as VFNN
            LeafFinalNodeNumberTerminateFinalNodeNumberPhotoperiodFinalNodeNumber as PPFNN
            LeafFinalNodeNumberTerminateFinalNodeNumberCommitPrimordia as Commit
            LeafFinalNodeNumberTerminateFinalNodeNumberTerminatedFinalNodeNumber as TFNN
            LeafFinalNodeNumberTerminateFinalNodeNumberTargetFinalNodeNumber as FLN
            MaxT
            MinT
            maxt_soil_surface
            mint_soil_surface
            LeafThermalTimeValue
      SoilTemp2 Soil Temperature (dotNET)
        maxt_time_default = 14  # hours
        bound_layer_cond_source = calc  # boundary layer conductance source (calc/constant)
        bound_layer_cond = 20  # boundary layer conductance
        boundary_layer_conductance_iterations = 1  # Number of iterations to calc boundary layer conductance (0-10)
        net_radn_source = calc  # net radiation source (calc/eos)
        default_wind_speed = 3  # m/s
        default_altitude = 18  # default altitude (m) 275m (700 ft) is approx 980 hPa
        default_instrum_height = 1.2  # default instrument height for wind and temperature (m)
        bare_soil_height = 57  # height of bare soil (mm)
  simulation HighWaterLowNitrogen -> /Simulations/HighWaterHighNitrogen
    area paddock -> /Simulations/HighWaterHighNitrogen/paddock
      folder Manager folder -> /Simulations/HighWaterHighNitrogen/paddock/Manager folder
        operations
          20/10/2003  fertiliser apply amount= 20 (kg/ha), type= urea_N (), depth= 10 (mm)
          25/11/2003  fertiliser apply amount= 20 (kg/ha), type= urea_N (), depth= 10 (mm)
          26/11/2003  irrigation apply amount= 15 (mm)
          4/12/2003  irrigation apply amount= 50 (mm)
          16/12/2003  irrigation apply amount= 15 (mm)
          22/12/2003  irrigation apply amount= 50 (mm)
          30/12/2003  irrigation apply amount= 50 (mm)
          8/1/2004  irrigation apply amount= 50 (mm)
          21/1/2004  irrigation apply amount= 50 (mm)
          31/1/2004  irrigation apply amount= 50 (mm)
          27/2/2004  irrigation apply amount= 25 (mm)
          25/12/2003  fertiliser apply amount= 0 (kg/ha), type= urea_N (), depth= 10 (mm)
      soil Templeton -> /Simulations/HighWaterHighNitrogen/paddock/Templeton
        Sample Initial nitrogen
          Layer:
            Thickness (mm)  NO3 (kg/ha)  NH4 (kg/ha)
            100             10           0.1
            200             6            0.1
            300             4            0.1
            300             4            0.1
            300             1.38889      0.1
            300             1.38889      0.1
      folder Barley2 Analysis
        outputfile Plant2: filename=HighWaterLowNitrogen Plant2.out; title=HighWaterLowNitrogen Plant2
          events Reporting Frequency: event=Daily
          variables
            variable:
              dd/mmm/yyyy
              AccumTtemerg
              StageCodeValue
              no3()
              nh4()
              urea()
              surfaceom_n
              biom_n()
              fom_n()
              hum_n()
              dnit()
              leach_no3
              AccumPlantN
              AccumMineralisation
              AccumDenit
              AccumFert
              AccumLeach
              AccumDetach
              DeltaSoilOMN
              DeltaSurfaceOMN
              DeltaSoilMineralN
              RootNSupplyUptake
              eo
              es
              sw_dep()
              dul_dep()
              drain
              runoff
              outflow_lat()
              pond
              AccumEO
              AccumEP
              AccumES
              AccumDrainage
              AccumRunoff
              AccumRainfall
              AccumIrrigation
              AccumOutflowLat
              SoilWaterDeficit
              AboveGroundWt
              BelowGroundWt
              TotalWt
              LeafDeadWt
              LeafLiveWt
              StemDeadWt
              StemLiveWt
              RootDeadWt
              RootLiveWt
              GrainLiveWt
              GrainDeadWt
              FloretLiveWt
              FloretDeadWt
              AboveGroundN
              BelowGroundN
              TotalN
              TotalLiveN
              TotalDeadN
              LeafDeadN
              LeafLiveN
              StemDeadN
              StemLiveN
              RootLiveN
              RootDeadN
              GrainLiveN
              GrainDeadN
              FloretLiveN
              FloretDeadN
              LeafLiveNConc
              LeafDeadNConc
              StemLiveNConc
              TuberLiveNConc
              RootLiveNConc
              GrainLiveNConc
              FloretLiveNConc
              RootWaterSupply
              RootWaterUptake
              LeafTranspiration
              LeafWaterDemand
              RootDepth
              Cover_green
              Cover_tot
              Cover_dead
              LeafLAI
              LeafLAIDead
              Height
              LeafFn
              LeafFw
              LeafPhotosynthesisFtValue
              LeafPhotosynthesisFvpdValue
              StructurePlantMainStemNodeNo
              LeafPlantAppearedGreenLeafNo
              LeafExpandingCohortNo
              LeafAppearedCohortNo
              StructureTotalStemPopn
              LeafDeadCohortNo
              StructureMainStemNodeNo
              LeafSenescingCohortNo
              StructurePrimaryBudMainStemNodeNo
              sw
              no3
              LeafPartitionFractionValue
              StemPartitionFractionValue
              TuberPartitionFractionValue
              GrainPartitionFractionValue
              FloretPartitionFractionValue
              RootPartitionFractionValue
              GrainMinimumNConcValue
              FloretMinimumNConcValue
              LeafMinimumNConcValue
              StemMinimumNConcValue
              TuberMinimumNConcValue
              RootMinimumNConcValue
              GrainMaximumNConcValue
              FloretMaximumNConcValue
              LeafMaximumNConcValue
              StemMaximumNConcValue
              TuberMaximumNConcValue
              RootMaximumNConcValue
              leavesPerStem
              PhenologyEarlyTuberTargetValue
              StemLiveNonStructuralN
              StemLiveStructuralN
              StemLiveStructuralWt
              StemLiveNonStructuralWt
              LeafLiveNonStructuralN
              LeafLiveNonStructuralWt
              LeafLiveStructuralN
              LeafLiveStructuralWt
              LeafTotalStructuralN
              LeafTotalNonStructuralN
              LeafTotalStructuralWt
              LeafTotalNonStructuralWt
              LeafLiveMetabolicWt
              RootNSupplyUptake
              ArbitratorNDemand
        manager Diagnostic variables: same as HighWaterHighNitrogen.paddock.Barley2 Analysis.Diagnostic variables
      outputfile Leaf Cohort Analysis: filename=HighWaterLowNitrogen Leaf Cohort Analysis.out; title=HighWaterLowNitrogen Leaf Cohort Analysis
        variables
          variables: dd/mm/yyyy as Date, LeafCohortLiveStructuralWt, LeafCohortLiveNonStructuralWt, LeafCohortLiveMetabolicWt, LeafCohortLiveStructuralN, LeafCohortLiveMetabolicN, LeafCohortLiveNonStructuralN, LeafCohortStructuralFrac, LeafStructuralFractionValue, LeafCohortLiveStructuralNConc, LeafCohortLiveMetabolicNconc, LeafCohortLiveNconc, LeafMaximumNConcValue, LeafMinimumNConcValue, LeafCohortSLA, LeafSpecificLeafAreaMaxValue, LeafSpecificLeafAreaMinValue, LeafCohortSize, LeafCohortArea
        events Reporting Frequency: event=Daily
      SoilTemp2 Soil Temperature (dotNET): same as HighWaterHighNitrogen.paddock.Soil Temperature (dotNET)
  simulation HighWaterLowRadn -> /Simulations/HighWaterHighNitrogen
    area paddock -> /Simulations/HighWaterHighNitrogen/paddock
      folder Manager folder -> /Simulations/HighWaterHighNitrogen/paddock/Manager folder
        manager ClimateControl
          # Climate Control Window
          date1 = 1-jan  # Enter window START date (dd-mmm)
          date2 = 31-dec  # Enter window END date (dd-mmm)
          # Climate Change Parameters
          MaxtChange = 0  # Change in maximum temperature (oC)
          MintChange = 0  # Change in minimum temperature (oC)
          RainChange = 0  # Relative change in daily rainfall (%)
          RadnChange = -70  # Relative change in daily radiation (%)
          CO2 = 350  # Atmospheric CO2 Concentration (ppm)
          on prenewmet:
```
!  Adjust daily temperatures, rainfall and radiation up or down according to user-defined amounts
! To apply different levels of climate control to different times of year add multiple copies of this logic into your simulation and change the window.

if (date_within('[date1], [date2]') = 1) then
   maxt = maxt + [MaxtChange]
   mint = mint + [MintChange]
   rain = rain + rain * [RainChange] / 100
   radn = radn + radn * [RadnChange] / 100
   co2 = [CO2]
 endif
```
          on Init:
```
co2 = [CO2]
```
      folder Barley2 Analysis -> /Simulations/HighWaterHighNitrogen/paddock/Barley2 Analysis
        outputfile Plant2: filename=HighWaterLowRadn Plant2.out; title=HighWaterLowRadn Plant2
          events Reporting Frequency -> /Simulations/HighWaterHighNitrogen/paddock/Barley2 Analysis/Plant2/Reporting Frequency
          variables -> /Simulations/HighWaterHighNitrogen/paddock/Barley2 Analysis/Plant2/Variables
      outputfile Leaf Cohort Analysis: filename=HighWaterLowRadn Leaf Cohort Analysis.out; title=HighWaterLowRadn Leaf Cohort Analysis
        variables
          variable:
            dd/mm/yyyy as Date
            StructurePlantMainStemNodeNo
            LeafPlantAppearedGreenLeafNo
            LeafExpandingCohortNo
            LeafAppearedCohortNo
            StructureTotalStemPopn
            LeafDeadCohortNo
            StructureMainStemNodeNo
            LeafSenescingCohortNo
            StructurePrimaryBudMainStemNodeNo
            StructureMainStemPrimordiaNo
        events Reporting Frequency: event=Daily
      SoilTemp2 Soil Temperature (dotNET): same as HighWaterHighNitrogen.paddock.Soil Temperature (dotNET)
  simulation HighWaterHighCO2 -> /Simulations/HighWaterHighNitrogen
    area paddock -> /Simulations/HighWaterHighNitrogen/paddock
      folder Manager folder -> /Simulations/HighWaterHighNitrogen/paddock/Manager folder
        manager ClimateControl
          # Climate Control Window
          date1 = 1-jan  # Enter window START date (dd-mmm)
          date2 = 31-dec  # Enter window END date (dd-mmm)
          # Climate Change Parameters
          MaxtChange = 0  # Change in maximum temperature (oC)
          MintChange = 0  # Change in minimum temperature (oC)
          RainChange = 0  # Relative change in daily rainfall (%)
          RadnChange = 0  # Relative change in daily radiation (%)
          CO2 = 700  # Atmospheric CO2 Concentration (ppm)
          on prenewmet:
          script: same as in HighWaterLowRadn.paddock.Manager folder.ClimateControl
          on Init:
```
co2 = [CO2]
```
      folder Barley2 Analysis -> /Simulations/HighWaterHighNitrogen/paddock/Barley2 Analysis
        outputfile Plant2: filename=HighWaterHighCO2 Plant2.out; title=HighWaterHighCO2 Plant2
          events Reporting Frequency -> /Simulations/HighWaterHighNitrogen/paddock/Barley2 Analysis/Plant2/Reporting Frequency
          variables -> /Simulations/HighWaterHighNitrogen/paddock/Barley2 Analysis/Plant2/Variables
      outputfile Leaf Cohort Analysis: filename=HighWaterHighCO2 Leaf Cohort Analysis.out; title=HighWaterHighCO2 Leaf Cohort Analysis
        variables
          variable:
            dd/mm/yyyy as Date
            StructurePlantMainStemNodeNo
            LeafPlantAppearedGreenLeafNo
            LeafExpandingCohortNo
            LeafAppearedCohortNo
            StructureTotalStemPopn
            LeafDeadCohortNo
            StructureMainStemNodeNo
            LeafSenescingCohortNo
            StructurePrimaryBudMainStemNodeNo
            StructureMainStemPrimordiaNo
        events Reporting Frequency: event=Daily
      SoilTemp2 Soil Temperature (dotNET): same as HighWaterHighNitrogen.paddock.Soil Temperature (dotNET)
  simulation LowWaterHighNitrogen -> /Simulations/HighWaterHighNitrogen
    area paddock -> /Simulations/HighWaterHighNitrogen/paddock
      folder Manager folder -> /Simulations/HighWaterHighNitrogen/paddock/Manager folder
        irrigation
          automatic_irrigation = off
          asw_depth = 600  # Depth to which ASW is calculated. (mm)
          crit_fr_asw = 0.5  # Fraction of ASW below which irrigation is applied (0-1.0)
          irrigation_efficiency = 1  # Efficiency of the irrigation. (0-1.0)
          irrigation_allocation = off  # Allocation limits
          allocation = 0  # Allocation in ML
          default_no3_conc = 0  # Nitrate concentration (ppm N)
          default_nh4_conc = 0  # Ammonium concentration (ppm N)
          default_cl_conc = 0  # Chloride concentration (ppm Cl)
          default_no3_conc = 0  # Nitrate concentration (ppm N)
          default_nh4_conc = 0  # Ammonium concentration (ppm N)
          default_cl_conc = 0  # Chloride concentration (ppm Cl)
        manager ClimateControl
          # Climate Control Window
          date1 = 1-jan  # Enter window START date (dd-mmm)
          date2 = 31-dec  # Enter window END date (dd-mmm)
          # Climate Change Parameters
          MaxtChange = 0  # Change in maximum temperature (oC)
          MintChange = 0  # Change in minimum temperature (oC)
          RainChange = -100  # Relative change in daily rainfall (%)
          RadnChange = 0  # Relative change in daily radiation (%)
          CO2 = 350  # Atmospheric CO2 Concentration (ppm)
          on prenewmet:
          script: same as in HighWaterLowRadn.paddock.Manager folder.ClimateControl
          on Init:
```
co2 = [CO2]
```
      folder Barley2 Analysis -> /Simulations/HighWaterHighNitrogen/paddock/Barley2 Analysis
        outputfile Plant2: filename=LowWaterHighNitrogen Plant2.out; title=LowWaterHighNitrogen Plant2
          events Reporting Frequency -> /Simulations/HighWaterHighNitrogen/paddock/Barley2 Analysis/Plant2/Reporting Frequency
          variables -> /Simulations/HighWaterHighNitrogen/paddock/Barley2 Analysis/Plant2/Variables
      outputfile Leaf Cohort Analysis: filename=LowWaterHighNitrogen Leaf Cohort Analysis.out; title=LowWaterHighNitrogen Leaf Cohort Analysis
        variables
          variable:
            dd/mm/yyyy as Date
            StructurePlantMainStemNodeNo
            LeafPlantAppearedGreenLeafNo
            LeafExpandingCohortNo
            LeafAppearedCohortNo
            StructureTotalStemPopn
            LeafDeadCohortNo
            StructureMainStemNodeNo
            LeafSenescingCohortNo
            StructurePrimaryBudMainStemNodeNo
            StructureMainStemPrimordiaNo
        events Reporting Frequency: event=Daily
      SoilTemp2 Soil Temperature (dotNET): same as HighWaterHighNitrogen.paddock.Soil Temperature (dotNET)
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