folder Simulations: version=27
  simulation Barley2_test
    metfile met: filename=lincoln.met
    clock
      start_date = 20/10/2003  # Enter the start date of the simulation
      end_date = 23/05/2004  # Enter the end date of the simulation
    summaryfile: filename=Continuous Wheat Simulation.sum
    area paddock
      fertiliser
      surfaceom surface organic matter
        PoolName = wheat  # Organic Matter pool name
        type = wheat  # Organic Matter type
        mass = 2000  # Initial surface residue (kg/ha)
        cnr = 80  # C:N ratio of initial residue
        standing_fraction = 0  # Fraction of residue standing
      folder Manager folder
        manager Harvesting rule
          # Harvesting criteria
          crop = barley2  # Enter name of crop to harvest when ripe
          on end_of_day:
```
           if [crop].PhenologyCurrentPhaseName = 'maturity' or [crop].plant_status = 'dead' then
              [crop]  harvest
              [crop]  endcrop
           endif
```
        operations
          20/10/2003  fertiliser apply amount= 100 (kg/ha), type= urea_N (), depth= 10 (mm)
          25/11/2003  fertiliser apply amount= 69 (kg/ha), type= urea_N (), depth= 10 (mm)
          26/11/2003  irrigation apply amount= 15 (mm)
          4/12/2003  irrigation apply amount= 50 (mm)
          16/12/2003  irrigation apply amount= 15 (mm)
          22/12/2003  irrigation apply amount= 50 (mm)
          30/12/2003  irrigation apply amount= 50 (mm)
          8/1/2004  irrigation apply amount= 50 (mm)
          21/1/2004  irrigation apply amount= 50 (mm)
          31/1/2004  irrigation apply amount= 50 (mm)
          27/2/2004  irrigation apply amount= 25 (mm)
          25/12/2003  fertiliser apply amount= 0 (kg/ha), type= urea_N (), depth= 10 (mm)
        irrigation
          automatic_irrigation = off
          asw_depth = 600  # Depth to which ASW is calculated. (mm)
          crit_fr_asw = 0.5  # Fraction of ASW below which irrigation is applied (0-1.0)
          irrigation_efficiency = 1  # Efficiency of the irrigation. (0-1.0)
          irrigation_allocation = off  # Allocation limits
          allocation = 0  # Allocation in ML
          default_no3_conc = 0  # Nitrate concentration (ppm N)
          default_nh4_conc = 0  # Ammonium concentration (ppm N)
          default_cl_conc = 0  # Chloride concentration (ppm Cl)
          default_no3_conc = 0  # Nitrate concentration (ppm N)
          default_nh4_conc = 0  # Ammonium concentration (ppm N)
          default_cl_conc = 0  # Chloride concentration (ppm Cl)
        manager Potato Sowing Rule
          sowing_date = 20/10/2003
          emergence_date = 12/11/2003
          row_width = 770  # Row width (mm)
          inrow_spacing = 280  # In-row plant spacing (mm)
          stem_number = 3  # Stem number per plant
          cultivar = Dash
          sowing_depth = 120  # Sowing depth (mm)
          Harvest_date = 03/06/2000
          tt_planting = 700  # Accumulated tt before planting
          on start_of_day:
```
Plant_population = 1/(([row_width]/1000)*([inrow_spacing]/1000))

stemnumber2 = 2 + [tt_planting] * .02 

if today = date('[sowing_date]') then
   barley2 sow population = Plant_population, depth = [sowing_depth], cultivar = [cultivar], maxcover = 1.0, budnumber = [stem_number], row_spacing = [row_width], crop_class = plant  
   !potato2 sow population = 4, depth = 200, cultivar = russet, maxcover = 1.0, budnumber = 6, row_spacing = 650, crop_class = plant  
endif
```
          on Init:
```
Plant_population = 0
```
          memo Stem # note
            Measured stem number was 2.4 but I have increased this to account for the likelyhood the the 3 stem subsample favored large stems so the mean stem weight was over prediced and stem number under
      soil Templeton
        Analysis
          Layer:
            Thickness (mm)  PH (1:5 water)
            100             6.6
            200             6.2
            300             5.7
            300             5.5
            300             5.5
            300             5.5
        InitWater Initial water
          PercentMethod: Percent=1.00; Distributed=Evenly distributed
        Water
          Layer:
            Thickness (mm)  BD (g/cc)  AirDry (mm/mm)  LL15 (mm/mm)  DUL (mm/mm)  SAT (mm/mm)
            100             1.2        0.08            0.16          0.33         0.5
            200             1.2        0.16            0.16          0.33         0.5
            300             1.2        0.15            0.15          0.31         0.44
            300             1.2        0.13            0.13          0.27         0.46
            300             1.2        0.15            0.15          0.3          0.44
            300             1.2        0.15            0.15          0.3          0.44
          SoilCrop wheat
            Layer:
              Thickness (mm)  LL (mm/mm)  KL (/day)  XF (0-1)
              100             0.13        0.06       1
              200             0.13        0.06       1
              300             0.1         0.06       1
              300             0.08        0.06       1
              300             0.11        0.06       1
              300             0.11        0.06       1
          SoilCrop potato2
            Layer:
              Thickness (mm)  LL (mm/mm)  KL (/day)  XF (0-1)
              100             0.13        0.1        1
              200             0.13        0.06       1
              300             0.1         0.04       0.5
              300             0.15        0.01       1
              300             0.3         0          0
              300             0.3         0          0
          SoilCrop potato21
            Layer:
              Thickness (mm)  LL (mm/mm)  KL (/day)  XF (0-1)
              100             0.13        0.1        1
              200             0.13        0.1        1
              300             0.1         0.07       1
              300             0.15        0.05       1
              300             0.3         0.05       0
              300             0.3         0.05       0
          SoilCrop barley2: same as Barley2_test.paddock.Templeton.Water.potato2
        SoilWat: SummerCona=4.4; SummerU=9; SummerDate=1-Nov; WinterCona=4.4; WinterU=9; WinterDate=1-Apr; DiffusConst=88; DiffusSlope=35.4; Salb=0.18; CN2Bare=68; CNRed=20; CNCov=0.8
          Layer:
            Thickness (mm)  SWCON (0-1)
            100             0.55
            200             0.55
            300             0.55
            300             0.55
            300             0.55
            300             0.55
        SoilOrganicMatter: RootCN=30; RootWT=3000; SoilCN=11.5; EnrACoeff=7.4; EnrBCoeff=0.2
          Layer:
            Thickness (mm)  OC (Total %)  FBiom (0-1)  FInert (0-1)
            100             3.5           0.025        0.3
            200             2.5           0.025        0.4
            300             1.2           0.015        0.75
            300             1.03          0.01         0.9
            300             0.47          0.01         0.96
            300             0.47          0.01         0.96
        Sample Initial nitrogen
          Layer:
            Thickness (mm)  NO3 (kg/ha)  NH4 (kg/ha)
            100             40           0.1
            200             30           0.1
            300             14           0.1
            300             14           0.1
            300             1.38889      0.1
            300             1.38889      0.1
      micromet
        soilalbedo = 0.23
        a_interception = 0
        b_interception = 0
        c_interception = 0
        d_interception = 0
        ini: filename=%apsim%\Model\MicroMet_NZ_adjustment.xml
      outputfile
        variables
          variable:
            dd/mm/yyyy as Date
            LeafCohortLiveStructuralNConc
            LeafCohortLiveNonStructuralNConc
            LeafCohortLiveNconc
            LeafMaximumNConcValue
            LeafMinimumNConcValue
            LeafCohortliveStructuralWt
            LeafCohortlivenonStructuralWt
        events Reporting Frequency: event=Daily
      barley2
      folder Plant2 diagnostics
        outputfile Plant2
          events Reporting Frequency: event=Daily
          variables
            variable:
              dd/mmm/yyyy
              AccumTtemerg
              StageCodeValue
              no3()
              nh4()
              urea()
              surfaceom_n
              biom_n()
              fom_n()
              hum_n()
              dnit()
              leach_no3
              AccumPlantN
              AccumMineralisation
              AccumDenit
              AccumFert
              AccumLeach
              AccumDetach
              DeltaSoilOMN
              DeltaSurfaceOMN
              DeltaSoilMineralN
              RootNUptakeSupply
              eo
              es
              sw_dep()
              dul_dep()
              drain
              runoff
              outflow_lat()
              pond
              AccumEO
              AccumEP
              AccumES
              AccumDrainage
              AccumRunoff
              AccumRainfall
              AccumIrrigation
              AccumOutflowLat
              SoilWaterDeficit
              AboveGroundWt
              BelowGroundWt
              TotalWt
              LeafDeadWt
              LeafLiveWt
              StemDeadWt
              StemLiveWt
              TuberDeadWt
              TuberLiveWt
              RootDeadWt
              RootLiveWt
              GrainLiveWt
              GrainDeadWt
              FloretLiveWt
              FloretDeadWt
              AboveGroundN
              BelowGroundN
              TotalN
              TotalLiveN
              TotalDeadN
              LeafDeadN
              LeafLiveN
              StemDeadN
              StemLiveN
              TuberDeadN
              TuberLiveN
              RootLiveN
              RootDeadN
              GrainLiveN
              GrainDeadN
              FloretLiveN
              FloretDeadN
              LeafLiveNConc3
              LeafDeadNConc3
              StemLiveNConc3
              TuberLiveNConc3
              RootLiveNConc
              GrainLiveNConc
              FloretLiveNConc
              RootWaterSupply
              RootWaterUptake
              LeafTranspiration
              LeafWaterDemand
              RootDepth
              Cover_green
              Cover_tot
              Cover_dead
              LeafLAI
              LeafLAIDead
              Height
              LeafFn
              LeafFw
              LeafPhotosynthesisFtValue
              LeafPhotosynthesisFvpdValue
              LeafTotalNo
              LeafGreenNo
              LeafExpandingNodeNo
              LeafCohortNo
              LeafBranchNo
              LeafDeadNodeNo
              LeafNodeNo
              LeafSenescingNodeNo
              LeafLeafNo
              sw
              no3
              LeafPartitionFractionValue
              StemPartitionFractionValue
              TuberPartitionFractionValue
              GrainPartitionFractionValue
              FloretPartitionFractionValue
              RootPartitionFractionValue
              GrainMinimumNConcValue
              FloretMinimumNConcValue
              LeafMinimumNConcValue
              StemMinimumNConcValue
              TuberMinimumNConcValue
              RootMinimumNConcValue
              GrainMaximumNConcValue
              FloretMaximumNConcValue
              LeafMaximumNConcValue
              StemMaximumNConcValue
              TuberMaximumNConcValue
              RootMaximumNConcValue
              leavesPerStem
              PhenologyEarlyTuberTargetValue
              StemLiveNonStructuralN
              StemLiveStructuralN
              StemLiveStructuralWt
              StemLiveNonStructuralWt
              LeafLiveNonStructuralN
              LeafLiveNonStructuralWt
              LeafLiveStructuralN
              LeafLiveStructuralWt
              LeafTotalStructuralN
              LeafTotalNonStructuralN
              LeafTotalStructuralWt
              LeafTotalNonStructuralWt
        manager Diagnostic variables
          CropType = potato2  # Select crop type to report variables for
          on init:
```
SimDay = 1

AccumPlantN = 0
AccumMineralisation = 0
AccumDenit = 0
AccumFert = 0
AccumLeach = 0
AccumDetach = 0
DeltaSoilOMN = 0
DeltaSurfaceOMN = 0
DeltaSoilMineralN = 0

AccumEO = 0
AccumEP = 0
AccumES = 0
AccumDrainage = 0
AccumRunoff = 0
AccumOutflowLat = 0
AccumIrrigation = 0
AccumRainfall = 0
SoilWaterDeficit = 0

LeafLiveNConc3 = 0
LeafDeadNConc3 = 0
StemLiveNConc3 = 0
TuberLiveNConc3 = 0

AccumTtemerg = 0

leavesPerStem = 0
```
          on start_of_day:
```
if simday = 1 then
InitialSoilOMN = biom_n() + fom_n() + hum_n()
InitialSurfaceOMN = surfaceom_n
InitialMineralN = no3() + nh4() + urea()
endif

!!!!!! Nitrogen balance components !!!!!!
!!!!!!^^^^^^^^^^^^^^^^^^^^^^^^^^^^^!!!!!!
AccumPlantN =  (0 - [CropType].LeafLiveN2 - [CropType].LeafDeadN2 - [CropType].StemLiveN - [CropType].stemdeadn - [CropType].TuberLiveN - [CropType].tuberdeadN ) * 10 !+ [CropType].RootLiveN + [CropType].RootDeadN
AccumMineralisation = AccumMineralisation + dlt_n_min() + dlt_n_min_res()
AccumDenit = AccumDenit - dnit() 
AccumFert = AccumFert + fertiliser
AccumLeach = AccumLeach - leach_urea - leach_no3 - leach_nh4 
AccumDetach = 0 !plant2 doesn't detach yet
DeltaSoilOMN = (biom_n() + fom_n() + hum_n()) - InitialSoilOMN
DeltaSurfaceOMN = surfaceom_n - InitialSurfaceOMN
DeltaSoilMineralN = (no3() + nh4() + urea()) - InitialMineralN

!!!!!! Water balance components !!!!!!
!!!!!!^^^^^^^^^^^^^^^^^^^^^^^^^^!!!!!!
AccumEO = AccumEO - eo
AccumEP = AccumEP - [CropType].LeafTranspiration
AccumES = AccumES - es
AccumDrainage = AccumDrainage - drain
AccumRunoff = AccumRunoff - runoff
AccumOutflowLat = AccumOutflowLat - outflow_lat()
AccumIrrigation = AccumIrrigation + Irrigation
AccumRainfall = Accumrainfall + rain
SoilWaterDeficit =  sw_dep() - dul_dep()

!!!!!! Organ N % !!!!!!
!!!!!!^^^^^^^^^^^^^^^^^^^^^!!!!!!
!FIXME These variables are created because those reported by biomass object only have 2dp
if [CropType].LeafLiveWt > 0 then
LeafLiveNConc3 = ([CropType].LeafLiveN/[CropType].LeafLiveWt)
endif
if [CropType].LeafDeadWt > 0 then
LeafDeadNConc3 = ([CropType].LeafDeadN/[CropType].LeafDeadWt)
endif
if [CropType].tuberlivewt > 0 then
TuberLiveNConc3 = ([CropType].tuberliveN/[CropType].tuberlivewt)
endif
if [CropType].stemlivewt > 0 then
StemLiveNConc3 = ([CropType].stemliveN/[CropType].stemlivewt)
endif


!!!!!! Thermal time calculation !!!!!!
!!!!!! ^^^^^^^^^^^^^^^^^^^^^^^^ !!!!!!
If [CropType].StageCodeValue >= 3 Then
AccumTtemerg = AccumTtemerg + [CropType].PhenologyThermalTimeValue
Endif

leavesPerStem = [croptype].leaftotalno / 3
```
          on end_of_day:
```
if SimDay = 1 then
SimDay = 2
Else SimDay = 2
endif
```
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