folder Simulations: version=37; creator=Apsim 7.9-r4046
  simulation cassava2_Fiji Nadelei Calibration
    metfile met: filename=Koronivia.met
    clock
      start_date = 01/09/2010  # Enter the start date of the simulation
      end_date = 14/03/2012  # Enter the end date of the simulation
    summaryfile
    area paddock
      cassava2
      fertiliser
      surfaceom SurfaceOrganicMatter
        PoolName = wheat  # Organic Matter pool name
        type = wheat  # Organic Matter type
        mass = 0  # Initial surface residue (kg/ha)
        cnr = 80  # C:N ratio of initial residue
        standing_fraction = 0  # Fraction of residue standing
      folder Manager folder
        manager Sowing rule
          on start_of_day:
```
!population based on measured main-stem numbers

      if today = date('20-oct-2010') then
               cassava2 sow population = 2, depth = 2, cultivar = Nadelei, maxcover = 1.0, budnumber = 1, row_spacing = 750, crop_class = plant
      endif
```
        manager Harvesting rule
          # Harvesting criteria
          crop = cassava2  # Enter name of crop to harvest when ripe
          on end_of_day:
```
if ([crop].plant_status <> 'out') then  
         if [crop].PhenologyCurrentPhaseName = 'maturity' or [crop].plant_status = 'dead' then
              [crop]  harvest
              [crop]  end_crop
           endif
Endif
```
        manager Fertilise incrop on critical NO3 level- top up
          # When should fertiliser be applied
          modulename = cassava2  # In which crop is fertiliser being applied
          fert_criteria = 12  # Maximum Amount of NO3 required in top 1 layers (kg/ha)
          fert_critical = 10  # Critical Amount of NO3 in top 1 layers (kg/ha)
          # Fertiliser application details
          fertmodule = fertiliser  # Module used to apply the fertiliser
          fert_type = NO3_N  # Fertiliser type
          on start_of_day:
```
!         if ([modulename].plant_status = 'alive') then
!          if ((today > date('1-feb-2011') AND today < date('1-jun-2011')) OR today > date('15-jul-2011')) then
          if ((today > date('1-jan-2011')  AND today < date('1-jun-2011')) then
            NO3_available = no3(1) 
            if (NO3_available <= [fert_critical]) then
               N_deficit = [fert_criteria] - NO3_available
               '[fertmodule]' apply amount = N_deficit (kg/ha), depth = 50 (mm), type = [fert_type] ()
            endif
         endif
```
        irrigation
          automatic_irrigation = on
          asw_depth = 600  # Depth to which ASW is calculated. (mm)
          crit_fr_asw = 0.5  # Fraction of ASW below which irrigation is applied (0-1.0)
          irrigation_efficiency = 1  # Efficiency of the irrigation. (0-1.0)
          irrigation_allocation = off  # Allocation limits
          allocation = 0  # Allocation in mm
          default_no3_conc = 0.0  # Nitrate concentration (ppm N)
          default_nh4_conc = 0.0  # Ammonium concentration (ppm N)
          default_cl_conc = 0.0  # Chloride concentration (ppm Cl)
        operations Operations Schedule
          20/10/2010  fertiliser apply amount = 70 (kg/ha), depth = 40 (mm), type = urea ()
          15/12/2010  fertiliser apply amount = 200 (kg/ha), depth = 40 (mm), type = urea ()
      micromet
        soilalbedo = 0.23
        a_interception = 0
        b_interception = 0
        c_interception = 0
        d_interception = 0
      Soil Loam: LocalName=Waco; Site=Jimbour; Region=South East Queensland
        SoilType = Loam  # Soil description
        NearestTown = Jimbour, Q 4352
        NaturalVegetation = Grassland, mainly Qld bluegrass
        InitialWater Initial water: FractionFull=0.5; PercentMethod=FilledFromTop; RelativeTo=ll15
        Water
          Thickness  BD    AirDry  LL15  DUL    SAT
          150        1.14  0.15    0.29  0.465  0.489
          150        1.24  0.26    0.29  0.431  0.454
          300        1     0.29    0.29  0.514  0.542
          300        1.05  0.29    0.29  0.497  0.523
          300        1.01  0.3     0.3   0.512  0.539
          300        1.01  0.31    0.31  0.512  0.539
          SoilCrop Potato: LL=[0.29, 0.29, 0.29, 0.29, 0.3, 0.31]; KL=[0.06, 0.06, 0.06, 0.06, 0.06, 0.06]; XF=[1, 1, 1, 1, 1, 1]
          SoilCrop Wheat: LL=[0.29, 0.29, 0.29, 0.29, 0.3, 0.31]; KL=[0.06, 0.06, 0.06, 0.06, 0.06, 0.06]; XF=[1, 1, 1, 1, 1, 1]
          SoilCrop cassava2: LL=[0.29, 0.29, 0.29, 0.29, 0.3, 0.31]; KL=[0.06, 0.06, 0.06, 0.06, 0.06, 0.06]; XF=[1, 1, 1, 1, 1, 1]
          SoilCrop Weed: LL=[0.29, 0.29, 0.29, 0.29, 0.3, 0.31]; KL=[0.06, 0.06, 0.06, 0.06, 0.06, 0.06]; XF=[1, 1, 1, 1, 1, 1]
          SoilCrop Weed1: LL=[0.29, 0.29, 0.29, 0.29, 0.3, 0.31]; KL=[0.06, 0.06, 0.06, 0.06, 0.06, 0.06]; XF=[1, 1, 1, 1, 1, 1]
        SoilWater: SummerCona=3.5; SummerU=6; SummerDate=1-Nov; WinterCona=3.5; WinterU=6; WinterDate=1-Apr; DiffusConst=40; DiffusSlope=16; Salb=0.13; CN2Bare=73; CNRed=20; CNCov=0.8; Thickness=[150, 150, 300, 300, 300, 300]; SWCON=[0.3, 0.3, 0.3, 0.3, 0.3, 0.3]
        SoilOrganicMatter: RootCN=40; RootWt=200; SoilCN=12.5; EnrACoeff=7.4; EnrBCoeff=0.2; OCUnits=Total
          Thickness  OC    FBiom  FInert
          150        1.04  0.025  0.4
          150        0.89  0.02   0.6
          300        0.89  0.015  0.8
          300        0.89  0.01   0.9
          300        0.77  0.01   0.95
          300        0.45  0.01   0.95
        Analysis: PHUnits=Water; BoronUnits=HotWater
          Thickness  EC    PH
          150        0.2   7.5
          150        0.25  7.5
          300        0.31  7.5
          300        0.4   7.5
          300        0.59  7.5
          300        0.84  7.5
        Sample Initial nitrogen: NO3Units=ppm; NH4Units=ppm; SWUnits=Volumetric; OCUnits=Total; PHUnits=Water
          Thickness  NO3    NH4
          150        6.503  0.599
          150        2.101  0.1
          300        2.101  0.1
          300        1.701  0.1
          300        1.701  0.1
          300        1.701  0.1
      folder Cassava Crop Analysis Graphs
        outputfile Outputs: filename=cassava2_Fiji Nadelei Calibration Outputs.out; title=cassava2_Fiji Nadelei Calibration Outputs
          events Reporting Frequency: event=Daily
          variables
            variable:
              dd/mmm/yyyy
              AccumTtemerg
              PhenologyCurrentPhaseName
              StageCodeValue
              AccumPlantN
              AccumMineralisation
              AccumDenit
              AccumFert
              AccumLeach
              AccumDetach
              DeltaSoilOMN
              DeltaSurfaceOMN
              DeltaSoilMineralN
              RootNSupplyUptake format 3
              eo
              es
              sw_dep()
              dul_dep()
              drain
              runoff
              outflow_lat()
              pond
              AccumEO
              AccumEP
              AccumES
              AccumDrainage
              AccumRunoff
              AccumRainfall
              AccumIrrigation
              AccumOutflowLat
              SoilWaterDeficit
              AboveGroundWt  format 3
              BelowGroundWt  format 3
              TotalWt  format 3
              TotalDeadWt  format 3
              TotalLiveWt  format 3
              LeafDeadWt  format 3
              LeafLiveWt  format 3
              StemDeadWt  format 3
              StemLiveWt  format 3
              TuberDeadWt  format 3
              TuberLiveWt  format 3
              RootDeadWt  format 3
              RootLiveWt  format 3
              AboveGroundN  format 3
              BelowGroundN  format 3
              TotalN  format 3
              TotalLiveN  format 3
              TotalDeadN  format 3
              LeafDeadN  format 3
              LeafLiveN  format 3
              StemDeadN  format 3
              StemLiveN  format 3
              TuberDeadN  format 3
              TuberLiveN  format 3
              RootLiveN  format 3
              RootDeadN  format 3
              LeafLiveNConc  format 3
              LeafDeadNConc format 3
              StemLiveNConc format 3
              StemDeadNConc format 3
              TuberLiveNConc format 3
              TuberDeadNConc format 3
              RootLiveNConc format 3
              RootDeadNConc format 3
              RootWaterSupply
              RootWaterUptake
              LeafTranspiration
              LeafWaterDemand
              RootDepth
              Cover_green
              Cover_tot
              Cover_dead
              LeafLAI
              LeafLAIDead
              Height
              LeafFn
              LeafFw
              LeafPhotosynthesisFtValue
              LeafPhotosynthesisFvpdValue
              StructurePlantTotalNodeNo
              StructureTotalStemPopn
              LeafPlantAppearedGreenLeafNo
              LeafExpandingCohortNo
              LeafAppearedCohortNo
              LeafDeadCohortNo
              StructureMainStemNodeNo
              LeafSenescingCohortNo
              StructurePrimaryBudTotalNodeNo
              LeafMinimumNConcValue
              StemMinimumNConcValue
              TuberMinimumNConcValue
              RootMinimumNConcValue
              LeafMaximumNConcValue
              StemMaximumNConcValue
              TuberMaximumNConcValue
              RootMaximumNConcValue
              StemLiveStructuralWt format 3
              StemLiveNonStructuralWt
              LeafSpecificArea
              LeafExpandedCohortNo
              sw_dep
              no3  format 3
              SoilNitrogenContent
              ArbitratorNDemand
              net_radn
              peta
              petr
              fom_n()  format 3
              hum_n() format 3
              biom_n() format 3
              dlt_n_min_res() format 3
              dlt_n_min_tot()  format 3
              plant_status
              LeafLiveWtKgHa
              StemLiveWtKgHa
              TuberLiveWtKgHa
              RootLiveWtKgHa
              TotalDWtKgHa
        manager Diagnostic variables
          CropType = cassava2  # Select crop type to report variables for
          on init:
```
SimDay = 1

AccumPlantN = 0
AccumMineralisation = 0
AccumDenit = 0
AccumFert = 0
AccumLeach = 0
AccumDetach = 0
DeltaSoilOMN = 0
DeltaSurfaceOMN = 0
DeltaSoilMineralN = 0
SoilNitrogenContent = 0;

AccumEO = 0
AccumEP = 0
AccumES = 0
AccumDrainage = 0
AccumRunoff = 0
AccumOutflowLat = 0
AccumIrrigation = 0
AccumRainfall = 0
SoilWaterDeficit = 0

AccumTtemerg = 0


StemLiveWtKgHa = 0.0
LeafLiveWtKgHa = 0.0
TuberLiveWtKgHa = 0.0
RootLiveWtKgHa = 0.0
TotalDWtKgHa = 0.0
```
          on start_of_day:
```
if (Cassava2.plant_status <> 'out') then
if simday = 1 then
InitialSoilOMN = biom_n() + fom_n() + hum_n()
InitialSurfaceOMN = surfaceom_n
InitialMineralN = no3() + nh4() + urea()
endif

!!!!!! Nitrogen balance components !!!!!!
!!!!!!^^^^^^^^^^^^^^^^^^^^^^^^^^^^^!!!!!!
AccumPlantN =  AccumPlantN - [CropType].RootNuptake
AccumMineralisation = AccumMineralisation + dlt_n_min()!! + dlt_n_min_res()
AccumDenit = AccumDenit - dnit() 
AccumFert = AccumFert + fertiliser
AccumLeach = AccumLeach - leach_urea - leach_no3 - leach_nh4 
AccumDetach = 0 !plant2 doesn't detach yet
DeltaSoilOMN = (biom_n() + fom_n() + hum_n()) - InitialSoilOMN
DeltaSurfaceOMN = surfaceom_n - InitialSurfaceOMN
DeltaSoilMineralN = (no3() + nh4() + urea()) - InitialMineralN
SoilNitrogenContent = (no3() + nh4() + urea())

!!!!!! Water balance components !!!!!!
!!!!!!^^^^^^^^^^^^^^^^^^^^^^^^^^!!!!!!
AccumEP = AccumEP - [CropType].LeafTranspiration
AccumDrainage = AccumDrainage - drain
AccumRunoff = AccumRunoff - runoff
AccumOutflowLat = AccumOutflowLat - outflow_lat()
AccumIrrigation = AccumIrrigation + Irrigation
AccumRainfall = Accumrainfall + rain
SoilWaterDeficit =  sw_dep() - dul_dep()
AccumEO = AccumEO - eo
AccumES = AccumES - es

!!!!!! Thermal time calculation !!!!!!
!!!!!! ^^^^^^^^^^^^^^^^^^^^^^^^ !!!!!!
If [CropType].StageCodeValue >= 3 Then
AccumTtemerg = AccumTtemerg + [CropType].PhenologyThermalTimeValue
Endif
Endif
```
          on end_of_day:
```
if (Cassava2.plant_status <> 'out') then
if SimDay = 1 then
SimDay = 2
Else SimDay = 2
endif

StemLiveWtKgHa = [CropType].StemLiveWt * 10.0
LeafLiveWtKgHa = [CropType].LeafLiveWt * 10.0
TuberLiveWtKgHa = [CropType].TuberLiveWt * 10.0
RootLiveWtKgHa = [CropType].RootLiveWt * 10.0
TotalDWtKgHa = StemLiveWtKgHa + LeafLiveWtKgHa + TuberLiveWtKgHa + RootLiveWtKgHa

Endif
```
      outputfile: filename=cassava2_Fiji Nadelei Calibration.out; title=cassava2_Fiji Nadelei Calibration
        events Reporting Frequency: event=Daily
        variables
          variable:
            dd/mmm/yyyy
            AboveGroundWt
            TotalLiveWt
            BelowGroundWt
            leaflivewt
            leafliven
            leafdeadwt
            stemlivewt
            stemliven
            tuberlivewt
            TuberliveN
            nfact_expan
            nfact_photo
            LeafLAI
            Cover_tot
            PhenologyCurrentPhaseName
            PhenologyThermalTimeValue
            StructureMainStemNodeNo
            StructureHeightValue
            LeafGreenCohortNo
            LeafSenescingCohortNo
            LeafDeadCohortNo
            PhenologyAccumulatedTT
            LeafFn
            LeafPotentialGrowth
            LeafFw
            LeafLivePotentialDMAllocation
            no3()
            swdef_photo
            rootdepth
            no3_demand
            LeafFw
            leafFn
            PhenologyThermalTimeValue
            PhenologyCurrentPhaseName
            PhenologyDormantTTinPhase
            PhenologyEarlyTuberTTinPhase
            PhenologyLateTuberTTinPhase
            PhenologyMaturityTTinPhase
            PhenologySenescedTTinPhase
            PhenologySproutingTTinPhase
            StructureMainStemNodeNo
            PhenologyVegetativeTTInPhase
            LeafThermalTimeValue
            ReadyForHarvest
            StageCodeValue
            StructurePrimaryBudNo
            StructurePrimaryBudTotalNodeNo
            radn
            maxt
            mint
            tav
            LeafPhotosynthesisFNValue
            LeafPhotosynthesisFTValue
            LeafPhotosynthesisFVPDValue
            LeafPhotosynthesisFWValue
            LeafPhotosynthesisRUEValue
            LeafPhotosynthesisVPD
            StructureRelativeNodeApperance
            LeafExpandedNodeNo
  simulation cassava2_Fiji Merelesita Calibration -> /Simulations/cassava2_Fiji Nadelei Calibration
    area paddock -> /Simulations/cassava2_Fiji Nadelei Calibration/paddock
      folder Manager folder -> /Simulations/cassava2_Fiji Nadelei Calibration/paddock/Manager folder
        manager Sowing rule
          on start_of_day:
```
!population based on measured main-stem numbers

      if today = date('20-oct-2010') then
               cassava2 sow population = 2, depth = 2, cultivar = merelesita, maxcover = 1.0, budnumber = 1, row_spacing = 750, crop_class = plant
      endif
```
      Soil Loam -> /Simulations/cassava2_Fiji Nadelei Calibration/paddock/Loam
        InitialWater Initial water: FractionFull=0.5; PercentMethod=FilledFromTop; RelativeTo=ll15
        SoilWater: same as cassava2_Fiji Nadelei Calibration.paddock.Loam.SoilWater
      folder Cassava Crop Analysis Graphs -> /Simulations/cassava2_Fiji Nadelei Calibration/paddock/Cassava Crop Analysis Graphs
        outputfile Outputs: filename=cassava2_Fiji Merelesita Calibration Outputs.out; title=cassava2_Fiji Merelesita Calibration Outputs
          events Reporting Frequency -> /Simulations/cassava2_Fiji Nadelei Calibration/paddock/Cassava Crop Analysis Graphs/Outputs/Reporting Frequency
          variables: same as cassava2_Fiji Nadelei Calibration.paddock.Cassava Crop Analysis Graphs.Outputs.Variables
      outputfile: filename=cassava2_Fiji Merelesita Calibration.out; title=cassava2_Fiji Merelesita Calibration
        events Reporting Frequency -> /Simulations/cassava2_Fiji Nadelei Calibration/paddock/outputfile/Reporting Frequency
        variables: same as cassava2_Fiji Nadelei Calibration.paddock.outputfile.Variables
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