folder simulations: version=37; creator=Apsim 7.10
  simulation Continuous Wheat with DCaPST
    metfile met: filename=%apsim%/Examples/MetFiles/Goond.met
    clock
      start_date = 01/01/1940  # Enter the start date of the simulation
      end_date = 31/12/1950  # Enter the end date of the simulation
    summaryfile
    area paddock
      Soil: LocalName=Waco; Site=Jimbour; Region=South East Queensland
        SoilType = Black Vertosol  # Soil description
        NearestTown = Jimbour, Q 4352
        NaturalVegetation = Grassland, mainly Qld bluegrass
        InitialWater Initial water: FractionFull=1; PercentMethod=FilledFromTop
        Water
          Thickness  BD    AirDry  LL15  DUL   SAT
          150        1.02  0.15    0.29  0.54  0.59
          150        1.03  0.26    0.29  0.53  0.58
          300        1.02  0.29    0.29  0.54  0.59
          300        1.02  0.29    0.29  0.54  0.58
          300        1.06  0.3     0.3   0.52  0.57
          300        1.11  0.31    0.31  0.5   0.55
          300        1.12  0.32    0.32  0.5   0.55
          300        1.15  0.33    0.33  0.48  0.53
          300        1.18  0.34    0.34  0.47  0.52
          300        1.2   0.35    0.35  0.46  0.51
          300        1.25  0.36    0.36  0.44  0.49
          SoilCrop Barley
            LL=[0.29, 0.29, 0.32, 0.38, 0.39, 0.39, 0.41, 0.48, 0.47, 0.46, 0.44]
            KL=[0.1, 0.1, 0.08, 0.06, 0.04, 0.02, 0.01, 0, 0, 0, 0]
            XF=[1, 1, 1, 1, 1, 1, 1, 0, 0, 0, 0]
          SoilCrop Chickpea
            LL=[0.29, 0.29, 0.36, 0.43, 0.51, 0.5, 0.5, 0.48, 0.47, 0.46, 0.44]
            KL=[0.1, 0.1, 0.08, 0.06, 0.04, 0.02, 0.01, 0, 0, 0, 0]
            XF=[1, 1, 1, 1, 1, 1, 1, 0, 0, 0, 0]
          SoilCrop Lucerne
            LL=[0.29, 0.29, 0.29, 0.29, 0.3, 0.31, 0.32, 0.33, 0.34, 0.35, 0.36]
            KL=[0.1, 0.1, 0.1, 0.1, 0.09, 0.09, 0.09, 0.09, 0.09, 0.09, 0.09]
            XF=[1, 1, 1, 1, 1, 1, 1, 1, 1, 1, 1]
          SoilCrop Maize
            LL=[0.29, 0.29, 0.34, 0.34, 0.37, 0.4, 0.42, 0.48, 0.47, 0.46, 0.44]
            KL=[0.1, 0.1, 0.1, 0.08, 0.06, 0.04, 0.02, 0, 0, 0, 0]
            XF=[1, 1, 1, 1, 1, 1, 1, 0, 0, 0, 0]
          SoilCrop Perennial Grass
            LL=[0.29, 0.29, 0.39, 0.41, 0.4, 0.4, 0.41, 0.41, 0.4, 0.4, 0.42]
            KL=[0.1, 0.1, 0.1, 0.1, 0.09, 0.07, 0.05, 0, 0, 0, 0]
            XF=[1, 1, 1, 1, 1, 1, 1, 0, 0, 0, 0]
          SoilCrop Sorghum
            LL=[0.29, 0.29, 0.35, 0.38, 0.4, 0.4, 0.4, 0.48, 0.47, 0.46, 0.44]
            KL=[0.1, 0.1, 0.1, 0.08, 0.06, 0.04, 0.02, 0, 0, 0, 0]
            XF=[1, 1, 1, 1, 1, 1, 1, 0, 0, 0, 0]
          SoilCrop Wheat
            LL=[0.29, 0.29, 0.32, 0.32, 0.35, 0.38, 0.41, 0.48, 0.47, 0.46, 0.44]
            KL=[0.1, 0.1, 0.08, 0.06, 0.04, 0.02, 0.01, 0, 0, 0, 0]
            XF=[1, 1, 1, 1, 1, 1, 1, 0, 0, 0, 0]
        SoilWater: SummerCona=3.5; SummerU=6; SummerDate=1-Nov; WinterCona=3.5; WinterU=6; WinterDate=1-Apr; DiffusConst=40; DiffusSlope=16; Salb=0.13; CN2Bare=73; CNRed=20; CNCov=0.8; Thickness=[150, 150, 300, 300, 300, 300, 300, 300, 300, 300, 300]; SWCON=[0.3, 0.3, 0.3, 0.3, 0.3, 0.3, 0.3, 0.3, 0.3, 0.3, 0.3]
        SoilOrganicMatter: RootCN=40; RootWt=200; SoilCN=12.5; EnrACoeff=7.4; EnrBCoeff=0.2
          Thickness  OC    FBiom  FInert
          150        1.04  0.025  0.4
          150        0.89  0.02   0.6
          300        0.89  0.015  0.8
          300        0.89  0.01   0.9
          300        0.77  0.01   0.95
          300        0.45  0.01   0.95
          300        0.27  0.01   0.95
          300        0.22  0.01   0.95
          300        0.16  0.01   0.95
          300        0.13  0.01   0.95
          300        0.12  0.01   0.95
        Analysis
          Thickness  EC    PH
          150        0.2   8.4
          150        0.25  8.8
          300        0.31  9
          300        0.4   9.2
          300        0.59  9.2
          300        0.84  9.1
          300        0.93  9
          300        1.01  9
          300        1.06  8.9
          300        1.05  8.9
          300        1.01  8.9
        Sample Initial nitrogen
          Thickness  NO3    NH4
          150        6.503  0.599004
          150        2.101  0.100001
          300        2.101  0.100001
          300        1.701  0.100001
          300        1.701  0.100001
          300        1.701  0.100001
          300        1.701  0.100001
          300        1.701  0.100001
          300        1.701  0.100001
          300        1.701  0.100001
          300        1.701  0.100001
      surfaceom SurfaceOrganicMatter
        PoolName = wheat  # Organic Matter pool name
        type = wheat  # Organic Matter type
        mass = 1000  # Initial surface residue (kg/ha)
        cnr = 80  # C:N ratio of initial residue
        standing_fraction = 0  # Fraction of residue standing
      fertiliser
      wheat
      folder Manager folder
        manager2 Crop Management
          # Crop properties
          crop = wheat  # Name of this crop
          # Sowing criteria
          date1 = 15-may  # Enter sowing window START date (dd-mmm)
          date3 = na  # Enter cultivar change date (na if not in use)
          date2 = 10-jul  # Enter sowing window END date (dd-mmm)
          must_sow = no
          rain_amount = 25  # Enter amount of cumulative rainfall (mm)
          rain_days = 7  # Enter number of days to accumulate rainfall (days)
          esw_amount = 100  # Enter amount of soil water (mm)
          # Sowing Parameters
          cultivar1 = hartog  # Enter cultivar
          cultivar2 = na  # Enter 2nd Cultivar (na if not using a second cultivar)
          density1 = 100  # Enter sowing density (plants/m2)
          depth1 = 30  # Enter sowing depth (mm)
          row_spacing1 = 250  # Enter row spacing (mm)
          # Extra Parameters
          ftn1 = na  # Enter Fertile Tiller Number (na for auto)
          skiprow1 = solid  # Skip row
          tillageImplement = na  # Name of tillage implement (na if not in use)
```csharp
using System;
using ModelFramework;
using CSGeneral;

// Basic crop management: sowing & harvesting.
// Multi-paddock aware.
// This component DOES NOT require a trigger from the sequencer.
// It will assume it is the only crop in the system if it doesnt find a sequencer.
// If it does find a sequencer, it will do nothing until told to (via Enter/Leave).
public class Script 
{      
   [Link()]  public Simulation MySimulation;
   
   [Param()] private string crop;         // The module name of this crop
   [Param()] private string date1;         //Start of sowing window
   [Param()] private string date2;         //End of sowing window
   [Param()] private string date3;         //date to change to different cultivar
   [Param()] int esw_amount;
   [Param()] private string must_sow;

   [Input()] private DateTime today;

   // Rainfall accumulator
   [Param()] int rain_days;              //check for rain over this period
   [Param()] int rain_amount;            //this much rain over that period

   // Daily rainfall from the system
   [Input] private double rain;
   private ManagerUtility.Tracker<double> rainTracker; 

   private bool inWindow = false;
   private bool endOfWindow = false;
   private bool ChangeCultivar = false;

   //initialise tracker, telling it how many days to track
   [EventHandler] public void OnInitialised()
   {
      rainTracker = new ManagerUtility.Tracker<double>(rain_days); 
   }

   // Daily tests common to all paddocks
   [EventHandler] public void OnPrepare()
   {
      bool startOfWindow = DateUtility.DatesEqual(date1, today);

      inWindow = DateUtility.WithinDates(date1, today, date2);
      ChangeCultivar = false;
      if(date3 != "na")  
         ChangeCultivar = DateUtility.WithinDates(date3, today, date2);
      endOfWindow = DateUtility.DatesEqual(date2, today);

      rainTracker.Add(rain);
      string currentPaddock = "";
      if (MySimulation.Get("currentPaddock", out currentPaddock) == false) 
      {
         // If there is no sequencer plugged in then we are it..
         if (canEnter > 0) {
            OnEnter();
         }
         if (canLeave > 0) {
            OnLeave();
         }
      }
   }
   // Test whether we can sow a crop today
   // +ve number - yes
   // 0          - no
   // -ve number - no, out of scope (planting window)
   [Output, Description("Test whether we can sow a crop today")] public int canEnter  {
      get {
         bool isPossibleToday = false;
         
         string currentPaddock;
         MySimulation.Get("currentPaddock", out currentPaddock);
         //Console.WriteLine("1. '" + currentPaddock + "'");

         Component paddockModule;
         if (currentPaddock != "")
            paddockModule = (Component) MySimulation.LinkByName(currentPaddock);
         else
            paddockModule = (Component) MySimulation.ChildPaddocks[0];
         //Console.WriteLine("2. " + paddockModule.Name);

         Component cropModule = (Component) paddockModule.LinkByName( crop );

         //Console.WriteLine("3. " + cropModule.Name);
         string plantStatus = "";
         cropModule.Get("plant_status", out plantStatus);

         double esw = 0.0;
         Component soilModule = (Component) paddockModule.LinkByType("SoilWat");
         soilModule.Get("esw", out esw);
         if (plantStatus == "out" &&
             inWindow &&
             rainTracker.Sum() >= rain_amount &&
             esw > esw_amount) 
         {
             isPossibleToday = true;
         } 

	     if (isPossibleToday)
            return 1;
         
         if (plantStatus == "out" && endOfWindow && must_sow == "yes")
            return 1;

         if (plantStatus == "out" && !inWindow)
            return -1;
         
         return 0;
      }
   }  
   
   
   // Sow a crop
   [Param()] private string cultivar1;
   [Param()] private string cultivar2;
   [Param()] private double density1;
   [Param()] private double depth1;
   [Param()] private double row_spacing1;
   [Param()] private string ftn1;
   [Param()] private string skiprow1;
   [Param()] private string tillageImplement;
   
   [EventHandler, Description("Sow the crop")] public void OnEnter()
   {
      Console.WriteLine(today + " Sowing Crop");
      SowType data = new SowType();
      data.Cultivar = cultivar1;
      if(ChangeCultivar)
         data.Cultivar = cultivar2;

      data.plants = density1;
      data.sowing_depth = depth1;
      data.row_spacing = row_spacing1;
      data.tiller_no_fertile = (ftn1 == "na") ? "" : ftn1;
      data.SkipRow = 0 ;
      if (skiprow1 == "single")
         data.SkipRow = 1;
      else if (skiprow1 == "double")
         data.SkipRow = 2;

      string currentPaddock;
      MySimulation.Get("currentPaddock", out currentPaddock);
      Component cropModule;
      if (currentPaddock != "")
         cropModule = (Component) MySimulation.LinkByName(currentPaddock + "." + crop);
      else 
         cropModule = (Component) MySimulation.ChildPaddocks[0].LinkByName(crop);

      cropModule.Publish("Sow", data);

      if (tillageImplement.ToLower() != "na") 
	  {
         TillageType t = new TillageType();
         t.type = tillageImplement;
         Component paddockModule;
         if (currentPaddock != "")
            paddockModule = (Component) MySimulation.LinkByName(currentPaddock);
         else
            paddockModule = MySimulation.ChildPaddocks[0];
         paddockModule.Publish("tillage", t);
      }		 
   }

   // Test whether we can harvest a crop today
   // +ve number - yes
   // 0          - no
   // -ve        - out of scope
   [Output] public int canLeave  
   {
      get 
      {
         string currentPaddock;
         MySimulation.Get("currentPaddock", out currentPaddock);

         string plantStatus = "";
         MySimulation.Get((currentPaddock != "" ? currentPaddock + "." : "") + crop + ".plant_status", out plantStatus);
         if (plantStatus == "out")
            return -1;

         string StageName = "";
         MySimulation.Get((currentPaddock != "" ? currentPaddock + "." : "") + crop + ".StageName", out StageName);
         if (StageName == "harvest_ripe" || plantStatus == "dead")
            return 1;
         return 0;
      }
   }

   [EventHandler] public void OnLeave()
   {
      Console.WriteLine(today + " Harvesting Crop");
      HarvestType hdata = new HarvestType();
      hdata.Remove = 0.0;
      string currentPaddock;
      MySimulation.Get("currentPaddock", out currentPaddock);
      Component cropModule;
      if (currentPaddock != "")
         cropModule = (Component) MySimulation.LinkByName(currentPaddock + "." + crop);
      else 
         cropModule = (Component) MySimulation.ChildPaddocks[0].LinkByName(crop);

      cropModule.Publish("harvest", hdata);

      KillCropType kdata = new KillCropType();
      kdata.KillFraction = 0.0F;
      cropModule.Publish("killcrop", kdata);
      cropModule.Publish("end_crop");
   } 
}
```
        manager2 Fertilise at Sowing
          # When should fertiliser be applied
          ModuleName = wheat  # On which module should the event come from
          EventName = sowing  # On which event should spraying be triggered
          # Event details
          fertType = urea_N  # The type of fertiliser
          fertAmt = 150  # Amount of fertiliser to apply (kg/ha)
```csharp
using System;
using System.Linq;
using System.Collections.Generic;
using ModelFramework;

// Crop management: fertilise at sowing
// Multi-paddock aware.
// This component DOES NOT require a trigger from the sequencer.

public class Script 
{      
   [Link]  public Simulation MySimulation;
   [Param] string fertType;
   [Param] float fertAmt;
   [Param] string ModuleName;
   [Param] string EventName;
   
   [EventHandler] public void OnStart_Simulation()
   {
      foreach (Paddock paddock in MySimulation.ChildPaddocks) 
      {
         foreach (Component child in paddock.Children) {
            if(child.Name == ModuleName){
               RuntimeEventHandler.NullFunction curried = () => OnTrigger(paddock.Name);
               MySimulation.Subscribe(child.FullName + "." + EventName, curried);
               //Console.WriteLine("Subscribed '" + child.FullName + "." + EventName + " => " + paddock.Name + "'"); 
            }
         }
      }
   }

   public void OnTrigger(string paddock)
   {
      Console.WriteLine("Fertiliser OnTrigger called, paddock='" + paddock + "'"); 
      if (fertAmt > 0) 
      {         
         Component paddockModule;
         if (paddock != "")
            paddockModule = (Component) MySimulation.LinkByName(paddock);
         else
            paddockModule = (Component) MySimulation.ChildPaddocks[0];
         //Console.WriteLine("2. " + paddockModule.Name);

         Fertiliser fertModule = (Fertiliser) paddockModule.LinkByName("Fertiliser");
         fertModule.Apply(fertAmt, 50, fertType);
      }
   }
}
```
        manager2 DCaPS-C3
```csharp
using System;
using ModelFramework;
using LayerCanopyPhotosynthesis;
 
public class Script 
{      
   [Link]  public Simulation MySimulation;
   [Link] Paddock MyPaddock; // Can be used to dynamically get access to simulation structure and variables
   [Input] DateTime Today;   // Equates to the value of the current simulation date - value comes from CLOCK
   [Output] public double[] dcapst = new double[5];
   
   //Additional Outputs
   [Output] public double BIOtotalDAY;
   [Output] public double BIOshootDAY;
   [Output] public double RootShoot;
   [Output] public double EcanDemand; 
   [Output] public double EcanSupply;
   [Output] public double RUE;
   [Output] public double TE; 
   [Output] public double RadIntDcapst; 
   [Output] public double BIOshootDAYPot;
   
   public PhotosynthesisModel PM;
   
   public string Shift2PsModel = "dcapst"; //The photosynthesis module to which you want to witch when LAI>LAITrigger
   public double LAITrigger = 0.5; //reduced from 1 (AW, 2019.09.12)
   public double PsiFactor = 1.0; //psiFactor-Psi Reduction Factor  
   
   public bool DCaPSTTriggered = false;
   public string PsModelName1;
   
   int DOY = 0;
   int iter = 0;
   double latitude = 0;
   double maxT = 0;
   double minT = 0;
   double radn = 0;
   double RootShootRatio = 0;
   double SLN = 0;
   double SWAvailable = 0;
   double SWAvailablePrev = 0;
   double lai = 0;   
   
   // (Ben, 2019.07.20): Set this to TRUE to use APSIM internal CO2
   bool APSIMCO2 = false;
   public double CO2 = 370;
      
   // The following event handler will be called once at the beginning of the simulation
   [EventHandler] public void OnInitialised()
   {
     
      PM = new PhotosynthesisModelC3();
      PM.photoPathway = PhotosynthesisModel.PhotoPathway.C3;
      PM.Initialised = false;
      PM.Canopy.NLayers = 1;

      //Set the parameters
      PM.EnvModel.Initialised = false;
      
      PM.Canopy.U0 = 1.5;     //U0 - wind speed just above the canopy

      PM.EnvModel.RPAR = 0.5;     //RPAR - Fraction of PAR energy to that of the total solar

      if (APSIMCO2) { MyPaddock.Get("CO2", out CO2); }
      
      PM.Canopy.Ca = CO2;     //Ca - Atmsopheric CO2 partial pressure
      PM.Canopy.OxygenPartialPressure = 210000;     //OxygenPartialPressure - Atmsopheric O2 partial pressure
      PM.EnvModel.ATM = 1.01325;     //Air pressure - Air pressure

      //////// Canopy level ////////
      PM.B = 0.409;     //BiomassConversionCoefficient - CO2-to-biomass conversion efficiency

      PM.Canopy.LeafAngle = 60;     //LeafAngle - Leaf angle (with respect to the horizontal plane)
      PM.Canopy.CPath.SLNRatioTop = 1.3;     //SLNRatioTop - Ratio of the specific leaf nitrogen at the top of the canopy to that of the canopy average
      PM.Canopy.CPath.StructuralN = 14;     //StructuralN - Specific leaf nitrogen below which Vcamx, Jmax and Vpmax are zero
      PM.Canopy.DiffuseExtCoeff = 0.78;     //DiffuseExtCoeff - 
      PM.Canopy.DiffuseExtCoeffNIR = 0.8;     //DiffuseExtCoeffNIR - 
      PM.Canopy.LeafScatteringCoeff = 0.15;     //LeafScatteringCoeff - leaf-level scattering coefficient for PAR
      PM.Canopy.LeafScatteringCoeffNIR = 0.8;     //LeafScatteringCoeffNIR - leaf-level scattering coefficient for NIR
      PM.Canopy.DiffuseReflectionCoeff = 0.036;     //DiffuseReflectionCoeff - canopy-level reflection coefficient for diffuse radiation for PAR
      PM.Canopy.DiffuseReflectionCoeffNIR = 0.389;     //DiffuseReflectionCoeffNIR - canopy-level reflection coefficient for diffuse radiation for NIR
      PM.Canopy.LeafWidth = 0.05;     //LeafWidth - Leaf width
      PM.Canopy.Ku = 1.5;     //Ku - canopy wind speed profile coefficient

      //////// Photosynthesis ////////
      PM.Canopy.CPath.PsiVc = 1.1;     //PsiVc - Slope of linear relationship between Vcmax per leaf area at 25°C and specific leaf nitrogen
      PM.Canopy.CPath.PsiJ = 1.85;     //PsiJ - Slope of linear relationship between Jmax per leaf area at 25°C and specific leaf nitrogen
      PM.Canopy.CPath.PsiRd = 0;     //PsiRd - Slope of linear relationship between Rd per leaf area at 25°C and specific leaf nitrogen

      PM.Canopy.Vpr_l = 0;     //Vpr_l - PEP regeneration rate per unit leaf
      PM.Canopy.Theta = 0.7;     //theta - Empirical curvature factor
      PM.Canopy.F = 0.15;     //F - Spectral correction factor
      PM.Canopy.Alpha = 0;     //Alpha - Fraction of PS II activity in the bundle sheath
      PM.Canopy.CPath.Phi = 2;     //Phi - extra energy (ATP) cost required from processes other than the C3 cycle
      PM.Canopy.CPath.X = 0.4;     //X - Fraction of electron transport partitioned to mesophyll chloroplasts
      PM.Canopy.Constant = 0.047;     //Constant - 

      //////// Leaf gas diffusion ////////
      PM.Canopy.CPath.CiCaRatio = 0.7;     //CiCaRatio - ratio of intercellular to air CO2 partial pressure
      PM.Canopy.CPath.PsiGm = 0.00412;     //PsiGm - Slope of linear relationship between gm per leaf area at 25°C and specific leaf nitrogen
      //reduced to 0.00412 (AW, 2019.09.12)
      PM.Canopy.Gbs_CO2 = 0.003;     //Gbs_CO2 - Bundle-sheath conductance for CO2 per leaf area

      //////// Temperature response ////////
      PM.Canopy.CPath.KcP25 = 273.422964228666;     //KcP25
      PM.Canopy.CPath.KcTEa = 93720;     //KcEa
      PM.Canopy.CPath.KoP25 = 165824.064155384;     //KoP25
      PM.Canopy.CPath.KoTEa = 33600;     //KoEa

      PM.Canopy.CPath.VcTEa = 65330;     //VcmaxEa
      PM.Canopy.CPath.VcMax_VoMaxP25 = 4.59217066521612;     //Vcmax_VomaxP25
      PM.Canopy.CPath.VcMax_VoMaxTEa = 35713.1987127717;     //Vcmax_VomaxEa

      PM.Canopy.CPath.RdTEa = 46390;     //RdEa

      PM.Canopy.CPath.JTMin = 0;     //JTMin
      PM.Canopy.CPath.JTOpt = 30;     //JTOpt
      PM.Canopy.CPath.JTMax = 45;     //JTMax
      PM.Canopy.CPath.JMaxC = 0.911017958600129;     //JMaxC
      PM.Canopy.CPath.JBeta = 1;     //Jbeta

      PM.Canopy.CPath.GmTMin = 0;     //GmTMin
      PM.Canopy.CPath.GmTOpt = 29.2338417788683;     //GmTOpt
      PM.Canopy.CPath.GmTMax = 45;     //GmTMax
      PM.Canopy.CPath.GmC = 0.875790608584141;     //GmMaxC
      PM.Canopy.CPath.GmBeta = 1;     //Gmbeta

      //////// Constants ////////
      PM.Canopy.Sigma = 0.0000000567;     //
      PM.Canopy.Rcp = 1200;     //Volumetric heat capacity of air

      PM.Canopy.G = 0.066;     //Psychrometric constant
      PM.Canopy.Lambda = 2447000;     //Latent heat of vapourisation of water

      //Set the Psi values using PsiFactor
      PM.Canopy.CPath.PsiVc *= PsiFactor;
      PM.Canopy.CPath.PsiJ *= PsiFactor;
      PM.Canopy.CPath.PsiRd *= PsiFactor;
      PM.Canopy.CPath.PsiVp *= PsiFactor;

      PM.EnvModel.Initialised = true;
      PM.Initialised = true;

      //Set the LAI trigger and keep initial Ps model name    
      MyPaddock.Set("DCaPSTTriggerLAI", LAITrigger);
      MyPaddock.Get("PsModelName1", out PsModelName1);       
   }
   
   [EventHandler] public void OnPrepare()
   {    
      RootShoot = 0;
      BIOshootDAY = 0;
      BIOtotalDAY = 0;
      EcanDemand = 0; 
      EcanSupply = 0;
      RadIntDcapst = 0;
      RUE = 0;
      TE = 0;
      BIOshootDAYPot = 0;
      iter = 0;
      
      for(int i = 0; i < 5; i++) { dcapst[i] = -1.0f;}      
              
      if (!DCaPSTTriggered) {
         if (Shift2PsModel == "dcapstold") {
            DCaPSTTriggered = true;
            MyPaddock.Set("PsModelName", Shift2PsModel); 
         
         } else {
         
            MyPaddock.Get("lai", out lai);          
            if (lai >= LAITrigger) {
               DCaPSTTriggered = true;
               MyPaddock.Set("PsModelName", Shift2PsModel); 
            }           
         }  
      }
   }
   
   // This routine is called when the plant model wants us to do the calculation
   [EventHandler] public void Ondodcapst() {
      //      ApsimC3PhotoLink p = new ApsimC3PhotoLink();
     
      MyPaddock.Get("latitude", out latitude);
      MyPaddock.Get("maxT", out maxT);
      MyPaddock.Get("minT", out minT);
      MyPaddock.Get("radn", out radn);
      MyPaddock.Get("lai", out lai); 
      
      if (Shift2PsModel == "dcapst") {
         MyPaddock.Get("DCAPSTDOY", out DOY);      
         MyPaddock.Get("DCAPSTsln", out SLN);
         MyPaddock.Get("DCAPSTRootShootRatio", out RootShootRatio);
         MyPaddock.Get("DCAPSTswAvail", out SWAvailable);
         
      } else {
         MyPaddock.Get("DCAPSTOldDOY", out DOY);      
         MyPaddock.Get("DCAPSTOldsln", out SLN);
         MyPaddock.Get("DCAPSTOldRootShootRatio", out RootShootRatio);
         MyPaddock.Get("DCAPSTOldswAvail", out SWAvailable);
      }
 
              
      //Check
      //Console.WriteLine("DCaps Input Manager--------------");
      //Console.WriteLine("DOY = " + DOY.ToString());
      //Console.WriteLine("latitude = " + latitude.ToString());
      //Console.WriteLine("maxT = " + maxT.ToString());
      //Console.WriteLine("minT = " + minT.ToString());
      //Console.WriteLine("radn = " + radn.ToString());
      //Console.WriteLine("RootShootRatio = " + RootShootRatio.ToString());
      //Console.WriteLine("SLN = " + SLN.ToString());
      //Console.WriteLine("SWAvailable = " + SWAvailable.ToString());
      //Console.WriteLine("lai = " + lai.ToString());
      //Console.WriteLine("DCaps Input Manager--------------");      
        
      dcapst = PM.RunApsim(DOY, latitude, maxT, minT, radn, lai, SLN, SWAvailable, RootShootRatio);
      
      //Additional outputs
      RootShoot = RootShootRatio;
      BIOshootDAY = dcapst[0];
      BIOtotalDAY = BIOshootDAY * (1 + RootShoot);
      EcanDemand = dcapst[1]; 
      EcanSupply = dcapst[2];
      RadIntDcapst = dcapst[3];
      RUE = (RadIntDcapst == 0 ? 0 : BIOshootDAY / RadIntDcapst);
      TE = (EcanSupply == 0 ? 0 : BIOshootDAY / EcanSupply); 
      BIOshootDAYPot = dcapst[4];
      
      //Check Outputs
      //      Console.WriteLine("DCapst Out Manager--------------");
      //      Console.WriteLine("1 = " + dcapst[0].ToString());
      //      Console.WriteLine("2 = " + dcapst[1].ToString());
      //      Console.WriteLine("3 = " + dcapst[2].ToString());
      //      Console.WriteLine("4 = " + dcapst[3].ToString());
      //      Console.WriteLine("DCapst Out Manager--------------");
      //      
   }      
   
   [EventHandler] public void OnSowing() {
      DCaPSTTriggered = false;
      MyPaddock.Set("PsModelName", PsModelName1); 
   }
}
```
          Reference
            ref = %apsim%/Model/DCaPST.dll  # Path to assembly
      outputfile: filename=Continuous Wheat with DCaPST.out; title=Continuous Wheat with DCaPST
        variables
          variable:
            dd/mm/yyyy as Date  # Date (dd/mm/yyyy)
            biomass  # Biomass
            yield  # Yield
            grain_protein  # grain protein content
            grain_size  # Size of each grain
            esw  # Extractable Soil Water (mm)
        events Reporting Frequency: event=harvesting
