folder simulations: version=36; creator=Apsim 7.6-r3574
  simulation Default
    clock
      start_date = 01/07/1989  # Enter the start date of the simulation
      end_date = 30/07/1990  # Enter the end date of the simulation
    metfile met: filename=%apsim%\Examples\MetFiles\WinchmoreMet.met
    summaryfile
    DDRules
    area paddock01
      AgPasture ryegrass_clover
        # Initial values for each species to be simulated
        SpeciesToSimulate = ryegrass  whiteclover  # Name of the species to be simulated
        InitialShootDM = 1600   400  # Initial above ground dry matter weight (kgDM/ha)
        InitialRootDM = 400     100  # Initial root dry matter weight (kgDM/ha)
        InitialRootDepth = 900     400  # Initial rooting depth (mm)
        WaterUptakeSource = calc  # Water uptake done by AgPasture (calc) or by apsim?
      micromet
        soilalbedo = 0.23
        a_interception = 0
        b_interception = 0
        c_interception = 0
        d_interception = 0
      fertiliser
      surfaceom Surface Organic Matter
        PoolName = AgPasture  # Organic Matter pool name
        type = grass  # Organic Matter type
        mass = 1000  # Initial surface residue (kg/ha)
        cnr = 15  # C:N ratio of initial residue
        standing_fraction = 0  # Fraction of residue standing
      irrigation
        automatic_irrigation = on
        asw_depth = 600  # Depth to which ASW is calculated. (mm)
        crit_fr_asw = 0.5  # Fraction of ASW below which irrigation is applied (0-1.0)
        irrigation_efficiency = 1  # Efficiency of the irrigation. (0-1.0)
        irrigation_allocation = off  # Allocation limits
        allocation = 0  # Allocation in mm
        default_no3_conc = 0  # Nitrate concentration (ppm N)
        default_nh4_conc = 0  # Ammonium concentration (ppm N)
        default_cl_conc = 0  # Chloride concentration (ppm Cl)
      outputfile: filename=Default paddock01.out; title=Default paddock01
        variables
          variables: dd/mmm/yyyy as Date, HerbageGrowthWt, SpeciesStandingLiveHerbageWt, LAITotal, LeafLiveWt, leafgreenwt, surfaceom_wt, surfaceom_n, surfaceom_c, AboveGroundWt, AboveGroundLiveWt, AboveGroundDeadWt, GLFWaterSupply, CoverGreen, AboveGroundNConc, fertiliser, dlt_nh4, surfaceom_nh4, nh4
        events Reporting Frequency: event=end_day
      Soil Canterbury_M: Region=Plains; State=Canterbury; Country=New Zealand
        DataSource=Generic profile descriptions provided by Trevor Webb and data for functional horizions based on SWAMP project results
        Comments=Bulk density values were measured on the fine earth fraction so values entered into apsim soil are adjusted down to account for stone content (assuming stones are inert from all soil process so their mass and volume is removed from model paramaters).  SAT, DUL, LL15 and Air dry have been adjusted down to account for stone content.  OC has not been adjusted so the model will get the correct carbon and N amounts using the adjusted BD.
        SoilType = NZ_sedementary  # Soil description
        SoilWater: SummerCona=4.4; SummerU=9; SummerDate=1-Oct; WinterCona=3; WinterU=6; WinterDate=1-Apr; DiffusConst=88; DiffusSlope=35; Salb=0.13; CN2Bare=73; CNRed=20; CNCov=0.8; Thickness=[250, 300, 300, 300, 350]; SWCON=[0.496442, 0.365575, 0.0968316, 0.650598, 0.650598]
        InitialWater: FractionFull=1; PercentMethod=FilledFromTop
        Water
          Thickness  KS       BD      AirDry   LL15    DUL     SAT
          250        4832.04  1.3105  0.07675  0.1535  0.3735  0.456165
          300        389.229  1.524   0.201    0.201   0.332   0.39432
          300        16.3619  1.65    0.201    0.201   0.3375  0.358515
          300        16800    0.39    0.012    0.012   0.039   0.12
          350        16800    0.39    0.012    0.012   0.039   0.12
          SoilCrop Barley: LL=[0.1535, 0.201, 0.201, 0.012, 0.012]; KL=[0.15, 0.1, 0.1, 0.05, 0.05]; XF=[1, 1, 0.301194, 1, 1]
            LL source: Estimated based on local knowledge
          SoilCrop Canola: LL=[0.1535, 0.201, 0.201, 0.012, 0.012]; KL=[0.15, 0.1, 0.1, 0.05, 0.05]; XF=[1, 0.825307, 0.120996, 1, 1]
            LL source: Estimated based on local knowledge
          SoilCrop Cloverseed: LL=[0.1535, 0.201, 0.201, 0.012, 0.012]; KL=[0.15, 0.1, 0.1, 0.05, 0.05]; XF=[1, 1, 0.153816, 1, 1]
            LL source: Estimated based on local knowledge
          SoilCrop Fieldpea: LL=[0.1535, 0.201, 0.201, 0.012, 0.012]; KL=[0.15, 0.1, 0.1, 0.05, 0.05]; XF=[1, 0.449329, 0.090718, 1, 1]
            LL source: Estimated based on local knowledge
          SoilCrop Fababean: same as Default.paddock01.Canterbury_M.Water.Canola
          SoilCrop kale: same as Default.paddock01.Canterbury_M.Water.Canola
          SoilCrop ItallianRyegrass: same as Default.paddock01.Canterbury_M.Water.Canola
          SoilCrop Lucerne: same as Default.paddock01.Canterbury_M.Water.Barley
          SoilCrop Maize: same as Default.paddock01.Canterbury_M.Water.Canola
          SoilCrop Oats: same as Default.paddock01.Canterbury_M.Water.Cloverseed
          SoilCrop Potato: same as Default.paddock01.Canterbury_M.Water.Fieldpea
          SoilCrop Grassseed: same as Default.paddock01.Canterbury_M.Water.Canola
          SoilCrop Triticale: same as Default.paddock01.Canterbury_M.Water.Cloverseed
          SoilCrop Wheat: same as Default.paddock01.Canterbury_M.Water.Cloverseed
          SoilCrop ryegrass_clover: same as Default.paddock01.Canterbury_M.Water.Canola
          SoilCrop ryegrass: same as Default.paddock01.Canterbury_M.Water.Canola
          SoilCrop whiteclover: same as Default.paddock01.Canterbury_M.Water.Fieldpea
        Analysis
          Thickness  Rocks  PH  CEC  ParticleSizeSand  ParticleSizeSilt  ParticleSizeClay
          250        0      6   13   14.5              65.5              20
          300        0      6   9    18                58                24
          300        0      6   9    14                63                23
          300        70     6   5    37.7916           57.0964           5.112
          350        70     6   5    37.7916           57.0964           5.112
        SoilOrganicMatter: RootCN=40; RootWt=1000; SoilCN=11; EnrACoeff=7.4; EnrBCoeff=0.2
          Thickness  OC        FBiom      FInert
          250        2.36763   0.0288947  0.449328
          300        0.493357  0.0136287  0.758676
          300        0.226613  0.0105998  0.901885
          300        0.202414  0.0100992  0.960109
          350        0.200179  0.0100141  0.984954
        Sample Initial nitrogen: NO3Units=kgha; NH4Units=kgha
          Thickness  NO3  NH4
          80         25   1
          5          20   1
          20         15   1
          67         10   1
    area paddock02
      AgPasture ryegrass_clover: same as Default.paddock01.ryegrass_clover
      micromet
        soilalbedo = 0.23
        a_interception = 0
        b_interception = 0
        c_interception = 0
        d_interception = 0
      fertiliser
      surfaceom Surface Organic Matter
        PoolName = AgPasture  # Organic Matter pool name
        type = grass  # Organic Matter type
        mass = 1000  # Initial surface residue (kg/ha)
        cnr = 15  # C:N ratio of initial residue
        standing_fraction = 0  # Fraction of residue standing
      irrigation: same as Default.paddock01.Irrigation
      Soil Canterbury_M: same as Default.paddock01.Canterbury_M
      outputfile: filename=Default paddock02.out; title=Default paddock02
        variables
          variables: dd/mm/yyyy as Date, HerbageGrowthWt, SpeciesStandingLiveHerbageWt, LAITotal, LeafLiveWt, leafgreenwt, surfaceom_wt, surfaceom_n, surfaceom_c, AboveGroundWt, AboveGroundLiveWt, AboveGroundDeadWt, GLFWaterSupply, CoverGreen, AboveGroundNConc, fertiliser, dlt_nh4, surfaceom_nh4, nh4
        events Reporting Frequency: event=Daily  # End of daily simulation time step
    outputfile: filename=Default.out; title=Default
      variables
        variables: dd/mm/yyyy as Date, Cow_LWt, Cow_BC, PeakStockingRate, StockingRate, MilkSolids_Cow, MilkSolids_Ha, SilageCutWastage
      events Reporting Frequency: event=Daily  # End of daily simulation time step
    outputfile Outputfile Nitrogen: filename=Default Outputfile Nitrogen.out; title=Default Outputfile Nitrogen
      variables
        variables: dd/mm/yyyy as Date, N_Eaten, N_Eaten_Pasture, N_Eaten_Supplement, N_Out, N_to_BC, N_to_faeces, N_to_milk, N_to_urine, NIntakeBalance, NOutBalance, NTotalBalance
      events Reporting Frequency: event=Daily  # End of daily simulation time step
    manager Nitrogen Calcs
      on start_of_day:
```
TotalNIn = N_Eaten_Pasture + N_Eaten_Supplement
NIntakeBalance = TotalNIn - N_Eaten

TotalNOut = N_to_BC + N_to_faeces + N_to_milk + N_to_urine
NOutBalance = TotalNOut - N_Out

NTotalBalance = NIntakeBalance - NOutBalance
```
  simulation DefaultPlusGraze0
    clock
      start_date = 01/07/1989  # Enter the start date of the simulation
      end_date = 30/07/1990  # Enter the end date of the simulation
    metfile met: filename=%apsim%\Examples\MetFiles\WinchmoreMet.met
    summaryfile
    DDRules
    area paddock01
      micromet
        soilalbedo = 0.23
        a_interception = 0
        b_interception = 0
        c_interception = 0
        d_interception = 0
      fertiliser
      surfaceom Surface Organic Matter
        PoolName = AgPasture  # Organic Matter pool name
        type = grass  # Organic Matter type
        mass = 1000  # Initial surface residue (kg/ha)
        cnr = 15  # C:N ratio of initial residue
        standing_fraction = 0  # Fraction of residue standing
      irrigation: same as Default.paddock01.Irrigation
      Soil Canterbury_M: SoilType=NZ_sedementary; Region=Plains; State=Canterbury; Country=New Zealand; Latitude=0; Longitude=0; YearOfSampling=0
        DataSource=Generic profile descriptions provided by Trevor Webb and data for functional horizions based on SWAMP project results
        Comments=Bulk density values were measured on the fine earth fraction so values entered into apsim soil are adjusted down to account for stone content (assuming stones are inert from all soil process so their mass and volume is removed from model paramaters).  SAT, DUL, LL15 and Air dry have been adjusted down to account for stone content.  OC has not been adjusted so the model will get the correct carbon and N amounts using the adjusted BD.
        SoilWater: same as Default.paddock01.Canterbury_M.SoilWater
        InitialWater: FractionFull=1; PercentMethod=FilledFromTop
        Water: same as Default.paddock01.Canterbury_M.Water
        Analysis
          Thickness  Rocks  PH  CEC  ParticleSizeSand  ParticleSizeSilt  ParticleSizeClay
          250        0      6   13   14.5              65.5              20
          300        0      6   9    18                58                24
          300        0      6   9    14                63                23
          300        70     6   5    37.7916           57.0964           5.112
          350        70     6   5    37.7916           57.0964           5.112
        SoilOrganicMatter: same as Default.paddock01.Canterbury_M.SoilOrganicMatter
        Sample Initial nitrogen: NO3Units=kgha; NH4Units=kgha
          Thickness  NO3  NH4
          80         25   1
          5          20   1
          20         15   1
          67         10   1
      AgPasture ryegrass_clover: same as Default.paddock01.ryegrass_clover
      outputfile: filename=DefaultPlusGraze0 paddock01.out; title=DefaultPlusGraze0 paddock01
        variables
          variables: dd/mmm/yyyy as Date, HerbageGrowthWt, SpeciesStandingLiveHerbageWt, LAITotal, LeafLiveWt, leafgreenwt, surfaceom_wt, surfaceom_n, surfaceom_c, AboveGroundWt, AboveGroundLiveWt, AboveGroundDeadWt, GLFWaterSupply, CoverGreen, AboveGroundNConc, fertiliser, dlt_nh4, surfaceom_nh4, nh4
        events Reporting Frequency: event=end_day
    area paddock02
      micromet
        soilalbedo = 0.23
        a_interception = 0
        b_interception = 0
        c_interception = 0
        d_interception = 0
      fertiliser
      surfaceom Surface Organic Matter
        PoolName = AgPasture  # Organic Matter pool name
        type = grass  # Organic Matter type
        mass = 1000  # Initial surface residue (kg/ha)
        cnr = 15  # C:N ratio of initial residue
        standing_fraction = 0  # Fraction of residue standing
      irrigation: same as Default.paddock01.Irrigation
      Soil Canterbury_M: same as DefaultPlusGraze0.paddock01.Canterbury_M
      AgPasture ryegrass_clover: same as Default.paddock01.ryegrass_clover
      outputfile: filename=DefaultPlusGraze0 paddock02.out; title=DefaultPlusGraze0 paddock02
        variables
          variables: dd/mmm/yyyy as Date, HerbageGrowthWt, SpeciesStandingLiveHerbageWt, LAITotal, LeafLiveWt, leafgreenwt, surfaceom_wt, surfaceom_n, surfaceom_c, AboveGroundWt, AboveGroundLiveWt, AboveGroundDeadWt, GLFWaterSupply, CoverGreen, AboveGroundNConc, fertiliser, dlt_nh4, surfaceom_nh4, nh4
        events Reporting Frequency: event=end_day
    outputfile: filename=DefaultPlusGraze0.out; title=DefaultPlusGraze0
      variables
        variables: dd/mm/yyyy as Date, Cow_LWt, Cow_BC, PeakStockingRate, StockingRate, MilkSolids_Cow, MilkSolids_Ha, SilageCutWastage
      events Reporting Frequency: event=Daily  # End of daily simulation time step
    outputfile Outputfile Nitrogen: filename=DefaultPlusGraze0 Outputfile Nitrogen.out; title=DefaultPlusGraze0 Outputfile Nitrogen
      variables
        variables: dd/mm/yyyy as Date, N_Eaten, N_Eaten_Pasture, N_Eaten_Supplement, N_Out, N_to_BC, N_to_faeces, N_to_milk, N_to_urine, NIntakeBalance, NOutBalance, NTotalBalance
      events Reporting Frequency: event=Daily  # End of daily simulation time step
    manager Nitrogen Calcs
      on start_of_day:
      script: same as in Default.Nitrogen Calcs
    manager Farm Settings
      #
      farm_area = 10  # Effective Farm Area (ha)
      stocking_rate = 2.7  # Stocking Rate at Peak Milk (cows/ha)
      alloc = 0  # Allocation Type [0,1]
      on init:
```
DDRules.FarmArea = [farm_area]
DDRules.StockingRate = [stocking_rate]
DDRules.AllocationType = [alloc]
DDRules.SilageCutWastage__ = 1.0
```
    manager Grazing Settings
      #
      date = 01-aug  # Enter date (dd-mmm)
      #
      residual = 1480  # Grazing Residual [kgDM/ha]
      length = 30  # Rotation Length [days]
      on start_of_day:
```
if (today = date('[date]')) then
   DDRules.GrazingResidual = [residual]
   DDRules.GrazingInterval = [length]
endif
```
  simulation DefaultPlusGraze1
    clock
      start_date = 01/07/1989  # Enter the start date of the simulation
      end_date = 30/07/1990  # Enter the end date of the simulation
    metfile met: filename=%apsim%\Examples\MetFiles\WinchmoreMet.met
    summaryfile
    DDRules
    area paddock01
      micromet
        soilalbedo = 0.23
        a_interception = 0
        b_interception = 0
        c_interception = 0
        d_interception = 0
      fertiliser
      surfaceom Surface Organic Matter
        PoolName = AgPasture  # Organic Matter pool name
        type = grass  # Organic Matter type
        mass = 1000  # Initial surface residue (kg/ha)
        cnr = 15  # C:N ratio of initial residue
        standing_fraction = 0  # Fraction of residue standing
      irrigation: same as Default.paddock01.Irrigation
      Soil Canterbury_M: same as Default.paddock01.Canterbury_M
      AgPasture ryegrass_clover
        WaterUptakeSource = calc  # Water uptake done by AgPasture (calc) or by apsim?
        # Initial values for each species to be simulated
        SpeciesToSimulate = ryegrass  whiteclover  # Name of the species to be simulated
        InitialShootDM = 1600   400  # Initial above ground dry matter weight (kgDM/ha)
        InitialRootDM = 400     100  # Initial root dry matter weight (kgDM/ha)
        InitialRootDepth = 900     400  # Initial rooting depth (mm)
      outputfile: filename=DefaultPlusGraze1 paddock01.out; title=DefaultPlusGraze1 paddock01
        variables
          variables: dd/mmm/yyyy as Date, HerbageGrowthWt, SpeciesStandingLiveHerbageWt, LAITotal, LeafLiveWt, leafgreenwt, surfaceom_wt, surfaceom_n, surfaceom_c, AboveGroundWt, AboveGroundLiveWt, AboveGroundDeadWt, GLFWaterSupply, CoverGreen, AboveGroundNConc, fertiliser, dlt_nh4, surfaceom_nh4, nh4
        events Reporting Frequency: event=end_day
    area paddock02
      micromet
        soilalbedo = 0.23
        a_interception = 0
        b_interception = 0
        c_interception = 0
        d_interception = 0
      fertiliser
      surfaceom Surface Organic Matter
        PoolName = AgPasture  # Organic Matter pool name
        type = grass  # Organic Matter type
        mass = 1000  # Initial surface residue (kg/ha)
        cnr = 15  # C:N ratio of initial residue
        standing_fraction = 0  # Fraction of residue standing
      irrigation: same as Default.paddock01.Irrigation
      Soil Canterbury_M: same as DefaultPlusGraze0.paddock01.Canterbury_M
      AgPasture ryegrass_clover: same as Default.paddock01.ryegrass_clover
      outputfile: filename=DefaultPlusGraze1 paddock02.out; title=DefaultPlusGraze1 paddock02
        variables
          variables: dd/mmm/yyyy as Date, HerbageGrowthWt, SpeciesStandingLiveHerbageWt, LAITotal, LeafLiveWt, leafgreenwt, surfaceom_wt, surfaceom_n, surfaceom_c, AboveGroundWt, AboveGroundLiveWt, AboveGroundDeadWt, GLFWaterSupply, CoverGreen, AboveGroundNConc, fertiliser, dlt_nh4, surfaceom_nh4, nh4
        events Reporting Frequency: event=end_day
    outputfile: filename=DefaultPlusGraze1.out; title=DefaultPlusGraze1
      variables
        variables: dd/mm/yyyy as Date, Cow_LWt, Cow_BC, PeakStockingRate, StockingRate, MilkSolids_Cow, MilkSolids_Ha, SilageCutWastage
      events Reporting Frequency: event=Daily  # End of daily simulation time step
    outputfile Outputfile Nitrogen: filename=DefaultPlusGraze1 Outputfile Nitrogen.out; title=DefaultPlusGraze1 Outputfile Nitrogen
      variables
        variables: dd/mm/yyyy as Date, N_Eaten, N_Eaten_Pasture, N_Eaten_Supplement, N_Out, N_to_BC, N_to_faeces, N_to_milk, N_to_urine, NIntakeBalance, NOutBalance, NTotalBalance
      events Reporting Frequency: event=Daily  # End of daily simulation time step
    manager Nitrogen Calcs
      on start_of_day:
      script: same as in Default.Nitrogen Calcs
    manager Farm Settings
      #
      farm_area = 10  # Effective Farm Area (ha)
      stocking_rate = 2.7  # Stocking Rate at Peak Milk (cows/ha)
      alloc = 1  # Allocation Type [0,1]
      on init:
      script: same as in DefaultPlusGraze0.Farm Settings
    manager Grazing Settings
      #
      date = 01-aug  # Enter date (dd-mmm)
      #
      residual = 1480  # Grazing Residual [kgDM/ha]
      length = 30  # Rotation Length [days]
      on start_of_day:
      script: same as in DefaultPlusGraze0.Grazing Settings
  simulation 10 paddocks
    clock
      start_date = 01/07/1989  # Enter the start date of the simulation
      end_date = 30/07/1990  # Enter the end date of the simulation
    metfile met: filename=%apsim%\Examples\MetFiles\WinchmoreMet.met
    summaryfile
    DDRules
    area paddock01
      AgPasture ryegrass_clover: same as Default.paddock01.ryegrass_clover
      micromet
        soilalbedo = 0.23
        a_interception = 0
        b_interception = 0
        c_interception = 0
        d_interception = 0
      fertiliser
      surfaceom Surface Organic Matter
        PoolName = AgPasture  # Organic Matter pool name
        type = grass  # Organic Matter type
        mass = 1000  # Initial surface residue (kg/ha)
        cnr = 15  # C:N ratio of initial residue
        standing_fraction = 0  # Fraction of residue standing
      irrigation: same as Default.paddock01.Irrigation
      outputfile: filename=10 paddocks paddock01.out; title=10 paddocks paddock01
        variables
          variables: dd/mmm/yyyy as Date, AboveGroundWt, AboveGroundLiveWt, AboveGroundDeadWt, GLFWaterSupply, GLFN, fertiliser, nh4
        events Reporting Frequency: event=end_day
      Soil Canterbury_M: same as Default.paddock01.Canterbury_M
    area paddock02
      AgPasture ryegrass_clover: same as Default.paddock01.ryegrass_clover
      micromet
        soilalbedo = 0.23
        a_interception = 0
        b_interception = 0
        c_interception = 0
        d_interception = 0
      fertiliser
      surfaceom Surface Organic Matter
        PoolName = AgPasture  # Organic Matter pool name
        type = grass  # Organic Matter type
        mass = 1000  # Initial surface residue (kg/ha)
        cnr = 15  # C:N ratio of initial residue
        standing_fraction = 0  # Fraction of residue standing
      irrigation: same as Default.paddock01.Irrigation
      outputfile: filename=10 paddocks paddock02.out; title=10 paddocks paddock02
        variables
          variables: dd/mmm/yyyy as Date, AboveGroundWt, AboveGroundLiveWt, AboveGroundDeadWt, GLFWaterSupply, GLFN, fertiliser, nh4
        events Reporting Frequency: event=end_day
      Soil Canterbury_M: same as Default.paddock01.Canterbury_M
    area paddock03 -> /simulations/10 paddocks/paddock01
      outputfile: filename=10 paddocks paddock03.out; title=10 paddocks paddock03
        variables -> /simulations/10 paddocks/paddock01/outputfile/Variables
        events Reporting Frequency -> /simulations/10 paddocks/paddock01/outputfile/Reporting Frequency
    area paddock04 -> /simulations/10 paddocks/paddock01
      outputfile: filename=10 paddocks paddock04.out; title=10 paddocks paddock04
        variables -> /simulations/10 paddocks/paddock01/outputfile/Variables
        events Reporting Frequency -> /simulations/10 paddocks/paddock01/outputfile/Reporting Frequency
    area paddock05 -> /simulations/10 paddocks/paddock01
      outputfile: filename=10 paddocks paddock05.out; title=10 paddocks paddock05
        variables -> /simulations/10 paddocks/paddock01/outputfile/Variables
        events Reporting Frequency -> /simulations/10 paddocks/paddock01/outputfile/Reporting Frequency
    area paddock06 -> /simulations/10 paddocks/paddock01
      outputfile: filename=10 paddocks paddock06.out; title=10 paddocks paddock06
        variables -> /simulations/10 paddocks/paddock01/outputfile/Variables
        events Reporting Frequency -> /simulations/10 paddocks/paddock01/outputfile/Reporting Frequency
    area paddock07 -> /simulations/10 paddocks/paddock01
      outputfile: filename=10 paddocks paddock07.out; title=10 paddocks paddock07
        variables -> /simulations/10 paddocks/paddock01/outputfile/Variables
        events Reporting Frequency -> /simulations/10 paddocks/paddock01/outputfile/Reporting Frequency
    area paddock08 -> /simulations/10 paddocks/paddock01
      outputfile: filename=10 paddocks paddock08.out; title=10 paddocks paddock08
        variables -> /simulations/10 paddocks/paddock01/outputfile/Variables
        events Reporting Frequency -> /simulations/10 paddocks/paddock01/outputfile/Reporting Frequency
    area paddock09 -> /simulations/10 paddocks/paddock01
      outputfile: filename=10 paddocks paddock09.out; title=10 paddocks paddock09
        variables -> /simulations/10 paddocks/paddock01/outputfile/Variables
        events Reporting Frequency -> /simulations/10 paddocks/paddock01/outputfile/Reporting Frequency
    area paddock10 -> /simulations/10 paddocks/paddock01
      outputfile: filename=10 paddocks paddock10.out; title=10 paddocks paddock10
        variables -> /simulations/10 paddocks/paddock01/outputfile/Variables
        events Reporting Frequency -> /simulations/10 paddocks/paddock01/outputfile/Reporting Frequency
    outputfile DDRules Outputs: filename=10 paddocks DDRules Outputs.out; title=10 paddocks DDRules Outputs
      variables
        variables: dd/mm/yyyy as Date, MilkSolids, PeakStockingRate, StockingRate, PWO, PaddockStatus, Cow_LWt, Cow_BC, MilkSolids_Cow, Cow_BC, SilageCut, SilageCut_kgha, TotalFeedDemand, RemainingFeedDemand, TotalCows
      events Reporting Frequency: event=Daily  # End of daily simulation time step
    outputfile Cow Model: filename=10 paddocks Cow Model.out; title=10 paddocks Cow Model
      variables
        variables: dd/mm/yyyy as Date, ME_Demand_Maintance_Cow, ME_Demand_Lactation_Cow, ME_Demand_Pregnancy_Cow, ME_Demand_WeightChange_Cow, ME_Demand_Walking_Cow, WinterOffDryStock, Cow_IsDry, PeakStockingRate, StockingRate, ME_Demand_Cow
      events Reporting Frequency: event=Daily
    outputfile DDRules Conservation: filename=10 paddocks DDRules Conservation.out; title=10 paddocks DDRules Conservation
      variables
        variables: dd/mm/yyyy as Date, SilageCut_kg, SilageCut_kgha, SilageStore, SilageStoreEnable, SilageStore_kgha, DM_Eaten_Silage
      events Reporting Frequency: event=Daily
    outputfile Supplements: filename=10 paddocks Supplements.out; title=10 paddocks Supplements
      variables
        variables: dd/mm/yyyy as Date, SupplementME, SupplementN, SupplementDigestability, SilageME, SilageN, SilageDigestability, SupplementWastage, SilageWastage, SilageCut_kg, SilageStore, SilageCut_kgha, SilageStore_kgha, SilageFedOut, SilageFedOut_kgha
      events Reporting Frequency: event=Daily
    outputfile Removal: filename=10 paddocks Removal.out; title=10 paddocks Removal
      variables
        variables: dd/mm/yyyy as Date, PeakStockingRate, TotalCows, DM_Eaten_Pdks, DM_Eaten_Pdks_Ha, GrazingResidual, GrazingInterval, AverageGrowthRate
      events Reporting Frequency: event=Daily
    outputfile Intake: filename=10 paddocks Intake.out; title=10 paddocks Intake
      variables
        variables: dd/mm/yyyy as Date, DM_Eaten, DM_Eaten_Pasture, DM_Eaten_Silage, DM_Eaten_Supplement, ME_Eaten, ME_Eaten_Pasture, ME_Eaten_Silage, ME_Eaten_Supplement, ME_Demand
      events Reporting Frequency: event=Daily  # End of daily simulation time step
    manager Farm Settings
      #
      farm_area = 10  # Effective Farm Area (ha)
      stocking_rate = 2.7  # Stocking Rate at Peak Milk (cows/ha)
      on init:
```
DDRules.FarmArea = [farm_area]
DDRules.StockingRate = [stocking_rate]
```
    manager Conservation Settings
      #
      start_date = 15-sep  # Enter start date (dd-mmm)
      finish_date = 1-mar  # Enter finish date (dd-mmm)
      trigger_mass = 3500  # Close paddock if pasture mass exceeds (kg/ha)
      residual = 1600  # Pasture residual after cut (kgDM/ha)
      silage_store = yes  # Store conserved feed for later use
      energy_content = 10.5  # Energy content of conversed feed (ME/kgDM)
      silage_on_hand = 250  # Feed stored on farm at start of simulation (kgDM/ha)
      cutting_waste = 2.5  # cutting_waste [%]
      on init:
```
ConservationStart = '[start_date]'
ConservationFinish = '[finish_date]'
ConservationTrigger = [trigger_mass]
ConservationResidual = [residual]
SilageCutWastage = [cutting_waste]

if '[silage_store]' = 'yes' then
   SilageStoreEnable = 1
   SilageME = [energy_content]
   SilageStore = [silage_on_hand]
else
   SilageStoreEnable = 0
   SilageStore = 0
endif
```
    manager Winter Dry Cows
      # Drying off details
      module = DDRules  # Module used to apply the irrigation
      dry_prop = 1.0  # Proportion of cows to dry off [0-1]
      on start_of_day:
```
            if (DDRules.Cow_IsDry) then
               DDRules.DryOffProportion = [dry_prop]
            else
               DDRules.DryOffProportion = 0.0
            endif
```
  simulation Conservation (disabled)
    clock -> /simulations/Default/clock
    metfile met -> /simulations/Default/met
    summaryfile -> /simulations/Default/summaryfile
    DDRules -> /simulations/Default/DDRules
    area paddock01 -> /simulations/Default/paddock01
      AgPasture ryegrass_clover
        # Initial values for each species to be simulated
        SpeciesToSimulate = ryegrass  whiteclover  # Name of the species to be simulated
        InitialShootDM = 1600   400  # Initial above ground dry matter weight (kgDM/ha)
        InitialRootDM = 400     100  # Initial root dry matter weight (kgDM/ha)
        WaterUptakeSource = calc  # Water uptake done by AgPasture (calc) or by apsim?
        InitialRootDepth = 900     400  # Initial rooting depth (mm)
      outputfile: filename=Conservation paddock01.out; title=Conservation paddock01
        variables -> /simulations/Default/paddock01/outputfile/Variables
        events Reporting Frequency -> /simulations/Default/paddock01/outputfile/Reporting Frequency
    area paddock02
      AgPasture ryegrass_clover: same as Default.paddock01.ryegrass_clover
      micromet
        soilalbedo = 0.23
        a_interception = 0
        b_interception = 0
        c_interception = 0
        d_interception = 0
      fertiliser
      surfaceom Surface Organic Matter
        PoolName = AgPasture  # Organic Matter pool name
        type = grass  # Organic Matter type
        mass = 1000  # Initial surface residue (kg/ha)
        cnr = 15  # C:N ratio of initial residue
        standing_fraction = 0  # Fraction of residue standing
      irrigation: same as Default.paddock01.Irrigation
      outputfile: filename=Conservation paddock02.out; title=Conservation paddock02
        variables
          variables: dd/mmm/yyyy as Date, HerbageGrowthWt, SpeciesStandingLiveHerbageWt, LAITotal, LeafLiveWt, leafgreenwt, surfaceom_wt, surfaceom_n, surfaceom_c, AboveGroundWt, AboveGroundLiveWt, AboveGroundDeadWt, GLFWaterSupply, CoverGreen, AboveGroundNConc, fertiliser, dlt_nh4, surfaceom_nh4, nh4
        events Reporting Frequency: event=end_day
      Soil Canterbury_M: same as Default.paddock01.Canterbury_M
    outputfile: filename=Conservation.out; title=Conservation
      variables -> /simulations/Default/Outputfile/Variables
      events Reporting Frequency -> /simulations/Default/Outputfile/Reporting Frequency
    outputfile Outputfile Nitrogen: filename=Conservation Outputfile Nitrogen.out; title=Conservation Outputfile Nitrogen
      variables -> /simulations/Default/Outputfile Nitrogen/Variables
      events Reporting Frequency -> /simulations/Default/Outputfile Nitrogen/Reporting Frequency
    manager Nitrogen Calcs -> /simulations/Default/Nitrogen Calcs
    manager Farm Settings
      #
      farm_area = 1  # Effective Farm Area (ha)
      stocking_rate = 0  # Stocking Rate at Peak Milk (cows/ha)
      alloc = 1  # Allocation Type [0,1]
      on init:
```
DDRules.FarmArea = [farm_area]
DDRules.StockingRate = [stocking_rate]
DDRules.AllocationType = [alloc]
```
    manager Conservation Settings
      #
      start_date = 1-sep  # Enter start date (dd-mmm)
      finish_date = 20-mar  # Enter finish date (dd-mmm)
      trigger_mass = 3500  # Close paddock if pasture mass exceeds (kg/ha)
      residual = 1600  # Pasture residual after cut (kgDM/ha)
      silage_store = yes  # Store conserved feed for later use
      energy_content = 10.5  # Energy content of conversed feed (ME/kgDM)
      silage_on_hand = 250  # Feed stored on farm at start of simulation (kgDM/ha)
      on init:
```
DDRules.ConservationStart = '[start_date]'
DDRules.ConservationFinish = '[finish_date]'
DDRules.ConservationTrigger = [trigger_mass]
DDRules.ConservationResidual = [residual]
if '[silage_store]' = 'yes' then
   DDRules.SilageStoreEnable = 1
   DDRules.SilageStore = [silage_on_hand]
   DDRules.SilageME = [energy_content]
else
   DDRules.SilageStoreEnable = 0
   DDRules.SilageStore = 0
endif
```
    manager Stop storing silage on a fixed date
      # Sowing criteria
      date = 1-jan  # Enter date (dd-mmm)
      on start_of_day:
```
        if (today = date('[date]') then
              DDRules.SilageStoreEnable = 0
         endif
```
    outputfile Conservation Data: filename=Conservation Conservation Data.out; title=Conservation Conservation Data
      variables
        variables: dd/mm/yyyy as Date, SilageCut_kgha, SilageStore_kgha, SilageFedOut_kgha, SupplementFedOut_kgha, SilageStoreEnable
      events Reporting Frequency: event=Daily  # End of daily simulation time step
  simulation Inputs (disabled)
    clock -> /simulations/Default/clock
    metfile met -> /simulations/Default/met
    summaryfile -> /simulations/Default/summaryfile
    DDRules -> /simulations/Default/DDRules
    area paddock01 -> /simulations/Default/paddock01
      AgPasture ryegrass_clover: same as Default.paddock01.ryegrass_clover
      outputfile: filename=Inputs paddock01.out; title=Inputs paddock01
        variables -> /simulations/Default/paddock01/outputfile/Variables
        events Reporting Frequency -> /simulations/Default/paddock01/outputfile/Reporting Frequency
    area paddock02
      AgPasture ryegrass_clover: same as Default.paddock01.ryegrass_clover
      micromet
        soilalbedo = 0.23
        a_interception = 0
        b_interception = 0
        c_interception = 0
        d_interception = 0
      fertiliser
      surfaceom Surface Organic Matter
        PoolName = AgPasture  # Organic Matter pool name
        type = grass  # Organic Matter type
        mass = 1000  # Initial surface residue (kg/ha)
        cnr = 15  # C:N ratio of initial residue
        standing_fraction = 0  # Fraction of residue standing
      irrigation: same as Default.paddock01.Irrigation
      outputfile: filename=Inputs paddock02.out; title=Inputs paddock02
        variables
          variables: dd/mmm/yyyy as Date, HerbageGrowthWt, SpeciesStandingLiveHerbageWt, LAITotal, LeafLiveWt, leafgreenwt, surfaceom_wt, surfaceom_n, surfaceom_c, AboveGroundWt, AboveGroundLiveWt, AboveGroundDeadWt, GLFWaterSupply, CoverGreen, AboveGroundNConc, fertiliser, dlt_nh4, surfaceom_nh4, nh4
        events Reporting Frequency: event=end_day
      Soil Canterbury_M: same as Default.paddock01.Canterbury_M
    outputfile: filename=Inputs.out; title=Inputs
      variables -> /simulations/Default/Outputfile/Variables
      events Reporting Frequency -> /simulations/Default/Outputfile/Reporting Frequency
    outputfile Outputfile Nitrogen: filename=Inputs Outputfile Nitrogen.out; title=Inputs Outputfile Nitrogen
      variables -> /simulations/Default/Outputfile Nitrogen/Variables
      events Reporting Frequency -> /simulations/Default/Outputfile Nitrogen/Reporting Frequency
    manager Nitrogen Calcs -> /simulations/Default/Nitrogen Calcs
    manager Farm Settings
      #
      farm_area = 1.0  # Effective Farm Area (ha)
      stocking_rate = 0  # Stocking Rate at Peak Milk (cows/ha)
      on init:
```
DDRules.PeakStockingRate = [stocking_rate]
DDRules.FarmArea = [farm_area]
DDRules.PorportionOfFarmInLaneWays = 0.00
DDRules.HoursOnLaneWays = 0
DDRules.HoursInDairyShed = 0
DDRules.EffluentPaddocksPercentage = 0.0
```
    manager Conservation Settings
      #
      start_date = 1-sep  # Enter start date (dd-mmm)
      finish_date = 1-apr  # Enter finish date (dd-mmm)
      trigger_mass = 3000  # Close paddock if pasture mass exceeds (kg/ha)
      residual = 2000  # Pasture residual after cut (kgDM/ha)
      silage_store = yes  # Store conserved feed for later use
      energy_content = 10.5  # Energy content of conversed feed (ME/kgDM)
      silage_on_hand = 0  # Feed stored on farm at start of simulation (kgDM/ha)
      cutting_waste = 0  # cutting_waste [%]
      on init:
      script: same as in 10 paddocks.Conservation Settings
    manager Irrigate at SW deficit
      trigger = 0.8  # Enter sw deficit to irrigate at (mm)
      mmAmount = 10.0  # Application Amount (mm)
      on start_of_day:
```
if PlantAvalibleWater < [trigger] then        
        DDRules ApplyIrrigation amount = [mmAmount]
endif
```
    manager Fertilise on fixed date
      # When should fertiliser be applied
      fert_date = 01-Oct  # Enter fertiliser date (dd-mmm)
      # Fertiliser application details
      fertmodule = DDRules  # Module used to apply the fertiliser
      fert_amount = 150  # Amount of fertiliser to apply (kg/ha)
      fert_type = urea_N  # Fertiliser type
      on start_of_day:
```
         if (today = date('[fert_date]') then
               [fertmodule] ApplyFertiliser amount = [fert_amount] (kg/ha), depth = 50 (mm), type = [fert_type] ()
!               [fertmodule] Apply amount = [fert_amount] (kg/ha), depth = 50 (mm), type = [fert_type] ()
         endif
```
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