folder simulations: version=37; creator=Apsim 7.9-r4096
  simulation dymex
    metfile met: filename=waggawagga.met
    clock
      start_date = 01/01/1984  # Enter the start date of the simulation
      end_date = 31/12/1984  # Enter the end date of the simulation
      ini: filename=%apsim%\Model\Clock.xml
    summaryfile
    area paddock
      Soil: LocalName=Waco; Site=Jimbour; Region=South East Queensland
        SoilType = Black Vertosol  # Soil description
        NearestTown = Jimbour, Q 4352
        NaturalVegetation = Grassland, mainly Qld bluegrass
        InitialWater Initial water: FractionFull=1; PercentMethod=FilledFromTop
        Water
          Thickness  BD    AirDry  LL15  DUL   SAT
          150        1.02  0.15    0.29  0.54  0.59
          150        1.03  0.26    0.29  0.53  0.58
          300        1.02  0.29    0.29  0.54  0.59
          300        1.02  0.29    0.29  0.54  0.58
          300        1.06  0.3     0.3   0.52  0.57
          300        1.11  0.31    0.31  0.5   0.55
          300        1.12  0.32    0.32  0.5   0.55
          300        1.15  0.33    0.33  0.48  0.53
          300        1.18  0.34    0.34  0.47  0.52
          300        1.2   0.35    0.35  0.46  0.51
          300        1.25  0.36    0.36  0.44  0.49
          SoilCrop Barley
            LL=[0.29, 0.29, 0.32, 0.38, 0.39, 0.39, 0.41, 0.48, 0.47, 0.46, 0.44]
            KL=[0.1, 0.1, 0.08, 0.06, 0.04, 0.02, 0.01, 0, 0, 0, 0]
            XF=[1, 1, 1, 1, 1, 1, 1, 0, 0, 0, 0]
          SoilCrop Chickpea
            LL=[0.29, 0.29, 0.36, 0.43, 0.51, 0.5, 0.5, 0.48, 0.47, 0.46, 0.44]
            KL=[0.1, 0.1, 0.08, 0.06, 0.04, 0.02, 0.01, 0, 0, 0, 0]
            XF=[1, 1, 1, 1, 1, 1, 1, 0, 0, 0, 0]
          SoilCrop Lucerne
            LL=[0.29, 0.29, 0.29, 0.29, 0.3, 0.31, 0.32, 0.33, 0.34, 0.35, 0.36]
            KL=[0.1, 0.1, 0.1, 0.1, 0.09, 0.09, 0.09, 0.09, 0.09, 0.09, 0.09]
            XF=[1, 1, 1, 1, 1, 1, 1, 1, 1, 1, 1]
          SoilCrop Maize
            LL=[0.29, 0.29, 0.34, 0.34, 0.37, 0.4, 0.42, 0.48, 0.47, 0.46, 0.44]
            KL=[0.1, 0.1, 0.1, 0.08, 0.06, 0.04, 0.02, 0, 0, 0, 0]
            XF=[1, 1, 1, 1, 1, 1, 1, 0, 0, 0, 0]
          SoilCrop Perennial Grass
            LL=[0.29, 0.29, 0.39, 0.41, 0.4, 0.4, 0.41, 0.41, 0.4, 0.4, 0.42]
            KL=[0.1, 0.1, 0.1, 0.1, 0.09, 0.07, 0.05, 0, 0, 0, 0]
            XF=[1, 1, 1, 1, 1, 1, 1, 0, 0, 0, 0]
          SoilCrop Sorghum
            LL=[0.29, 0.29, 0.35, 0.38, 0.4, 0.4, 0.4, 0.48, 0.47, 0.46, 0.44]
            KL=[0.1, 0.1, 0.1, 0.08, 0.06, 0.04, 0.02, 0, 0, 0, 0]
            XF=[1, 1, 1, 1, 1, 1, 1, 0, 0, 0, 0]
          SoilCrop Wheat
            LL=[0.29, 0.29, 0.32, 0.32, 0.35, 0.38, 0.41, 0.48, 0.47, 0.46, 0.44]
            KL=[0.1, 0.1, 0.08, 0.06, 0.04, 0.02, 0.01, 0, 0, 0, 0]
            XF=[1, 1, 1, 1, 1, 1, 1, 0, 0, 0, 0]
        SoilWater: SummerCona=3.5; SummerU=6; SummerDate=1-Nov; WinterCona=3.5; WinterU=6; WinterDate=1-Apr; DiffusConst=40; DiffusSlope=16; Salb=0.13; CN2Bare=73; CNRed=20; CNCov=0.8; Thickness=[150, 150, 300, 300, 300, 300, 300, 300, 300, 300, 300]; SWCON=[0.3, 0.3, 0.3, 0.3, 0.3, 0.3, 0.3, 0.3, 0.3, 0.3, 0.3]
        SoilOrganicMatter: RootCN=40; RootWt=200; SoilCN=12.5; EnrACoeff=7.4; EnrBCoeff=0.2
          Thickness  OC    FBiom  FInert
          150        1.04  0.025  0.4
          150        0.89  0.02   0.6
          300        0.89  0.015  0.8
          300        0.89  0.01   0.9
          300        0.77  0.01   0.95
          300        0.45  0.01   0.95
          300        0.27  0.01   0.95
          300        0.22  0.01   0.95
          300        0.16  0.01   0.95
          300        0.13  0.01   0.95
          300        0.12  0.01   0.95
        Analysis
          Thickness  EC    PH
          150        0.2   8.4
          150        0.25  8.8
          300        0.31  9
          300        0.4   9.2
          300        0.59  9.2
          300        0.84  9.1
          300        0.93  9
          300        1.01  9
          300        1.06  8.9
          300        1.05  8.9
          300        1.01  8.9
        Sample Initial nitrogen
          Thickness  NO3    NH4
          150        6.503  0.599004
          150        2.101  0.100001
          300        2.101  0.100001
          300        1.701  0.100001
          300        1.701  0.100001
          300        1.701  0.100001
          300        1.701  0.100001
          300        1.701  0.100001
          300        1.701  0.100001
          300        1.701  0.100001
          300        1.701  0.100001
      surfaceom surface organic matter
        PoolName = wheat  # Organic Matter pool name
        type = wheat  # Organic Matter type
        mass = 1000  # Initial surface residue (kg/ha)
        cnr = 80  # C:N ratio of initial residue
        standing_fraction = 0  # Fraction of residue standing
      fertiliser
      wheat
        ini: filename=Wheat.xml
      folder Manager folder
        manager Sowing rule
          # Sowing criteria
          date1 = 8-may  # Enter sowing window START date (dd-mmm)
          date2 = 8-may  # Enter sowing window END date (dd-mmm)
          must_sow = yes  # Must sow?
          raincrit = 25  # Amount of rainfall
          rainnumdays = 7  # Number of days of rainfall
          esw_amount = 100  # Enter minimum allowable available soil water (mm)
          # Sowing parameters
          crop = wheat  # Enter name of crop to sow
          density = 100  # Enter sowing density (plants/m2)
          depth = 30  # Enter sowing depth (mm)
          cultivar = hartog  # Enter cultivar
          class = plant  # Enter crop growth class
          row_spacing = 250  # Enter row spacing (mm)
          on start_of_day:
```
      if (paddock_is_fallow() = 1 and FallowIn <> 'yes' and (NextCrop = 0 or NextCrop = '[crop]')) then
         if (date_within('[date1], [date2]') = 1) then
            if (rain[[rainnumdays]] >= [raincrit] AND esw >= [esw_amount]) OR
                ('[must_sow]' = 'yes' AND today = date('[date2]'))) THEN
               ChooseNextCrop = 'yes'   ! for rotations
               [crop] sow plants =[density], sowing_depth = [depth], cultivar = [cultivar], row_spacing = [row_spacing], crop_class = [class]
            endif
            if today = date('[date2]') then
               ChooseNextCrop = 'yes'
            endif
         endif
      endif
```
          on init:
```
            nextcrop = 0
            fallowin = 0
```
        manager Sowing fertiliser
          # When should fertiliser be applied
          modulename = wheat  # On which module should the event come from
          eventname = sowing  # On which event should fertiliser be applied
          # Fertiliser application details
          fertmodule = fertiliser  # Module used to apply the fertiliser
          fert_amount_sow = 150  # Amount of starter fertiliser at sowing (kg/ha)
          fert_type_sow = urea_N  # Sowing fertiliser type
          on [modulename].[eventname]:
```
        [fertmodule] apply amount = [fert_amount_sow] (kg/ha), depth = 50 (mm), type = [fert_type_sow]
```
        manager Harvesting rule
          # Harvesting criteria
          crop = wheat  # Enter name of crop to harvest when ripe
          on end_of_day:
```
           if [crop].StageName = 'harvest_ripe' or [crop].plant_status = 'dead' then
              [crop]  harvest
              [crop]  end_crop
           endif
```
      outputfile: filename=dymex.out; title=dymex
        variables
          variable:
            dd/mm/yyyy as Date
            biomass
            yield
            lai
            slai
            dymex_LAI
            dymex_new_LAI
            dymex_Spore:_Total_Number
            dymex_Infective_Stage:_Total_Number
            dymex_Lesion:_Total_Number
            dymex_Lesion:_Total_lesa
            dymex_Rm
        events Reporting Frequency: event=daily
      Dymex_StripeRust
        initsection
          init constants
            DR = 5
            LE = 4E-06
            lesionLifeTime = 12
            sporprodrate = 1000000
            slope_RLS_Modifyer = -20
          init SporeImmigrat
            Factor = 10000
          init dxcropDen
            Factor = 100
          init dxStage
            Factor = 6
          init dxLAI
            Factor = 4
          init dxSLAI
            Factor = 0.01
          init lat
            Latitude = -25
          init Disease_Resistance_Converted_to_Mortality_(Rm)
            field Factor
              Line_1_X-intercept = 11.11
              Line_1_Slope = -0.09
              X-value_at_intersection_of_lines_1_2 = 1
              Line_2_Slope = -0.03
              X-value_at_intersection_of_lines_2_3 = 4
              Line_3_Slope = -0.1
          init Weather1
            Midday-Tmax_lag = 3
            Sunrise-Tmin_lag = -1
            Night_temperature_coefficient = 2.5
          init Lifecycle1
            field Spore
              field Mortality
                mortality_rate = 0.5
                field Maximum_Temperature
                  heat_induced_mortality = 30
                  Slope = 0.2
                field Minimum_Temperature
                  cold_induced_mortality = 0
                  Slope = -0.5
                field stage
                  Threshold = 10
                  Step_Height = 0.5
              field Mortality_-_Establishment
                field PlantLA
                  Threshold = 0
                  Step_Height_Initial = 1
                  Step_Height_Final = 0
              field Transfer
                field Rainfall
                  leaf_wetness_due_to_rainfall__threshold = 1.6
                  Step_Height = 1
            field Infective_Stage
              field Mortality
                field PlantLA
                  Threshold = 0
                  Step_Height_Initial = 1
                  Step_Height_Final = 0
                field 9am_Atmospheric_Moisture
                  RH_mortality_Threshold = 70
                  9am_RH_mortality_Slope = -0.1
                field stage
                  Threshold = 10
                  Step_Height = 1
              field Development
                field Daily_Temperature_Cycle
                  Threshold = 5
                  Slope = 0.02
              field Mortality_-_Establishment
                field PlantLA
                  Threshold = 0
                  Step_Height_Initial = 1
                  Step_Height_Final = 0
              field Transfer
                field Physiological_Age
                  Threshold = 1
                  Step_Height = 1
            field Lesion
              field Mortality
                field stage
                  APSIM_crop_maturity_Threshold = 10
                  Step_Height = 1
                field PlantLA
                  Threshold = 0
                  Step_Height_Initial = 1
                  Step_Height_Final = 0
              field Fecundity
                Spore_Fecundity = 30000000
      AusFarmManager
        initsection
          rules = [define location = (Latitude :-28.3), define M_stage = (factor:4.1), define M_lai = (factor:4.1), define M_slai = (factor:4.1), , , define real pre_dymex_lai ! LAI after wheat.process and before dymex.process, define real post_dymex_lai, , on START, {, ! set lat = location:Latitude, reset dymex_striperust.lat=location, }, , from start, {, set pre_dymex_lai = wheat.lai, set M_stage:factor=wheat.stage, set M_lai:factor=wheat.lai, set M_slai:factor=wheat.slai, , reset dymex_striperust.dxStage= M_stage, reset dymex_striperust.dxLAI= M_lai, reset dymex_striperust.dxSLAI= M_slai, }, , ! Clock sends a "post" event. Dymex has computed a new value of LAI, , define delta_wheat_dm, , on_event process(), {, define green_loss = [(pool:'green'; part:['leaf']; dlt:[0.0]),, (pool:'senesced'; part:['leaf']; dlt:[0.0])], , if pre_dymex_lai > 0, {, set post_dymex_lai = dymex_striperust.dymex_new_LAI, if post_dymex_lai < pre_dymex_lai, {, set delta_wheat_dm = wheat.LeafGreenWt * (1.0 - post_dymex_lai / pre_dymex_lai), set green_loss[1]:dlt[1] = delta_wheat_dm, set green_loss[2]:dlt[1] = -delta_wheat_dm, , wheat.remove_crop_biomass dm=green_loss, }, }, }]
          logfile =
          log_set = false
          text =
      TextOutput dymexOut
        initsection
          filename = dymex paddock_dymexOut.out
          interval = 1
          intervalunit = day
          summary_file =
          apsim_format = true
          title = ApsimVersion = 7.7 Title = dymex paddock_dymexOut.out
          outputfrequency = post
          dateformat = dd/MM/yyyy
          init outputs: array=T
            element
              varname = wheat.lai
              alias = lai
              aggreg =
              decplaces = 3
            element
              varname = AusFarmManager.M_lai
              alias = M_lai
              aggreg =
              decplaces = 3
            element
              varname = dymex_lai
              alias = dymex_lai
              aggreg =
              decplaces = 3
            element
              varname = AusFarmManager.pre_dymex_lai
              alias = pre_lai
              aggreg =
              decplaces = 5
            element
              varname = AusFarmManager.post_dymex_lai
              alias = post_lai
              aggreg =
              decplaces = 5
  simulation wheat
    metfile met: filename=waggawagga.met
    clock
      start_date = 01/01/1985  # Enter the start date of the simulation
      end_date = 31/12/1985  # Enter the end date of the simulation
    summaryfile
    area paddock
      surfaceom surface organic matter
        PoolName = wheat  # Organic Matter pool name
        type = wheat  # Organic Matter type
        mass = 1000  # Initial surface residue (kg/ha)
        cnr = 80  # C:N ratio of initial residue
        standing_fraction = 0  # Fraction of residue standing
      fertiliser
      wheat
      folder Manager folder
        manager Sowing rule
          # Sowing criteria
          date1 = 9-may  # Enter sowing window START date (dd-mmm)
          date2 = 9-may  # Enter sowing window END date (dd-mmm)
          must_sow = yes  # Must sow?
          raincrit = 25  # Amount of rainfall
          rainnumdays = 7  # Number of days of rainfall
          esw_amount = 100  # Enter minimum allowable available soil water (mm)
          # Sowing parameters
          crop = wheat  # Enter name of crop to sow
          density = 100  # Enter sowing density (plants/m2)
          depth = 30  # Enter sowing depth (mm)
          cultivar = janz  # Enter cultivar
          class = plant  # Enter crop growth class
          row_spacing = 250  # Enter row spacing (mm)
          on start_of_day:
          script: same as in dymex.paddock.Manager folder.Sowing rule
          on init:
```
            nextcrop = 0
            fallowin = 0
```
        manager Sowing fertiliser: same as dymex.paddock.Manager folder.Sowing fertiliser
        manager Harvesting rule
          # Harvesting criteria
          crop = wheat  # Enter name of crop to harvest when ripe
          on end_of_day:
          script: same as in dymex.paddock.Manager folder.Harvesting rule
        manager calc
          on start_of_day:
```
green_stover = GreenWt * 10

leaf = green_biomass - yield
```
      outputfile: filename=wheat.out; title=wheat
        variables
          variable:
            dd/mm/yyyy as Date
            StageName
            biomass
            yield
            lai
            slai
            dymex_LAI
            dymex_new_LAI
            dymex_Spore:_Total_Number
            dymex_Infective_Stage:_Total_Number
            dymex_Lesion:_Total_Number
            dymex_Lesion:_Total_lesa
            dymex_Rm
            green_biomass
            GreenWt
            green_stover
            leaf
        events Reporting Frequency: event=daily
      Soil Red Sodosol (Wagga Wagga No550-YP): ASCOrder=Sodosol; ASCSubOrder=Red; SoilType=?; Site=Wagga Wagga; NearestTown=Wagga Wagga; Region=Riverina; State=New South Wales; Country=Australia; ApsoilNumber=550-YP; Latitude=-35.123; Longitude=147.354; LocationAccuracy=Regional Soil Type
        DataSource=PAWC estimated by A. Peake, CSIRO Sustainable Ecosystems (2005)
        Water
          Thickness  BD    AirDry  LL15  DUL   SAT
          100        1.55  0.06    0.12  0.24  0.38
          100        1.55  0.08    0.1   0.22  0.39
          200        1.5   0.12    0.12  0.24  0.4
          200        1.5   0.12    0.12  0.34  0.4
          300        1.55  0.12    0.12  0.34  0.4
          300        1.55  0.12    0.12  0.34  0.4
          300        1.55  0.12    0.12  0.34  0.4
          BD, AirDry, LL15, DUL, SAT source: Estimated based on local knowledge
          SoilCrop wheat: LL=[0.12, 0.1, 0.12, 0.17, 0.18, 0.22, 0.29]; KL=[0.06, 0.06, 0.04, 0.04, 0.03, 0.02, 0.02]; XF=[1, 1, 1, 1, 1, 1, 1]
            LL source: Estimated based on local knowledge
          SoilCrop barley: LL=[0.12, 0.1, 0.12, 0.17, 0.18, 0.22, 0.29]; KL=[0.07, 0.07, 0.07, 0.07, 0.05, 0.05, 0.03]; XF=[1, 1, 1, 1, 1, 1, 1]
            LL source: Estimated based on local knowledge
          SoilCrop oats: same as wheat.paddock.Red Sodosol (Wagga Wagga No550-YP).Water.wheat
        SoilWater: SummerCona=3.5; SummerU=6; SummerDate=1-Nov; WinterCona=2; WinterU=2; WinterDate=1-Apr; DiffusConst=88; DiffusSlope=35; Salb=0.13; CN2Bare=78; CNRed=20; CNCov=0.8; Thickness=[100, 100, 200, 200, 300, 300, 300]; SWCON=[0.6, 0.5, 0.5, 0.4, 0.3, 0.3, 0.3]
        SoilOrganicMatter: RootCN=45; RootWt=1500; SoilCN=12.5; EnrACoeff=7.4; EnrBCoeff=0.2; OCUnits=WalkleyBlack
          Thickness  OC         FBiom  FInert
          100        1.23077    0.03   0.4
          100        0.615385   0.02   0.5
          200        0.307692   0.02   0.7
          200        0.153846   0.01   0.8
          300        0.0769231  0.01   0.9
          300        0.0769231  0.01   1
          300        0.0769231  0.01   1
          OC source: Estimated based on local knowledge
        Analysis: PHUnits=Water; BoronUnits=HotWater
          Thickness  EC   PH   CL   ESP
          100        0.1  6.6  0.1  1
          100        0.1  5.3  0.1  2
          200        0.1  6    0.1  4
          200        0.1  6.6  0.1  8
          300        0.1  9    0.1  16
          300        0.1  9    0.1  32
          300        0.1  9    0.1  32
          EC, PH, CL, ESP source: Estimated based on local knowledge
        Sample Initial nitrogen: Thickness=[600]; NO3=[70]; NH4=[10]; NO3Units=kgha; NH4Units=kgha; SWUnits=Volumetric; OCUnits=Total; PHUnits=Water
        InitialWater: FractionFull=0.32; PercentMethod=FilledFromTop; RelativeTo=wheat
  simulation DYMEX2
    metfile met: filename=waggawagga.met
    clock
      start_date = 01/01/1985  # Enter the start date of the simulation
      end_date = 31/12/1985  # Enter the end date of the simulation
    summaryfile
    area paddock
      surfaceom surface organic matter
        PoolName = wheat  # Organic Matter pool name
        type = wheat  # Organic Matter type
        mass = 1000  # Initial surface residue (kg/ha)
        cnr = 80  # C:N ratio of initial residue
        standing_fraction = 0  # Fraction of residue standing
      fertiliser
      wheat
      folder Manager folder: same as wheat.paddock.Manager folder
      outputfile: filename=DYMEX2.out; title=DYMEX2
        variables
          variable:
            dd/mm/yyyy as Date
            StageName
            biomass
            yield
            lai
            dymex_Spore:_Total_Number
            dymex_Infective_Stage:_Total_Number
            dymex_Lesion_Total_Number
            dymex_Lesion_Total_lesa
            dymex_Spore:_Total_Stage_Mortality
            dymex_Infective_Stage:_Total_Stage_Mortality
            dymex_Lesion:_Total_Stage_Mortality
            dymex_Rls
            dymex_PpnLeafDis
            dymex_Rm format 4
            dymex_LE
            dymex_RlsMod
            dymex_Lesion:_Average_LesionLimiter
            dymex_CropDen
            dymex_PlantLA
            dymex_lesionLifeTime
            dymex_Lesion_Average_Physiological_Age
        events Reporting Frequency: event=daily
      Soil Red Sodosol (Wagga Wagga No550-YP): same as wheat.paddock.Red Sodosol (Wagga Wagga No550-YP)
      Dymex_StripeRust
        initsection
          init constants
            DR = 2
            LE = 0.04
            lesionLifeTime = 12
            sporprodrate = 1000000
            slope_RLS_Modifyer = -20
          init SporeImmigrat
            Factor = 30000
          init dxcropDen
            Factor = 100
          init dxStage
            Factor = 6
          init dxLAI
            Factor = 4
          init dxSLAI
            Factor = 0.01
          init lat
            Latitude = -25
          init Disease_Resistance_Converted_to_Mortality_(Rm)
            field Factor
              Line_1_X-intercept = 11.11
              Line_1_Slope = -0.09
              X-value_at_intersection_of_lines_1_2 = 1
              Line_2_Slope = -0.03
              X-value_at_intersection_of_lines_2_3 = 4
              Line_3_Slope = -0.1
          init Weather1
            Midday-Tmax_lag = 3
            Sunrise-Tmin_lag = -1
            Night_temperature_coefficient = 2.5
          init Lifecycle1
            field Spore: same as dymex.paddock.Dymex_StripeRust.initsection.Lifecycle1.Spore
            field Infective_Stage: same as dymex.paddock.Dymex_StripeRust.initsection.Lifecycle1.Infective_Stage
            field Lesion
              field Mortality
                field stage
                  APSIM_crop_maturity_Threshold = 10
                  Step_Height = 1
                field PlantLA
                  Threshold = 0
                  Step_Height_Initial = 1
                  Step_Height_Final = 0
              field Fecundity
                Spore_Fecundity = 1
      AusFarmManager
        initsection
          rules = [define location = (Latitude :-28.3), define M_stage = (factor:4.1), define M_lai = (factor:4.1), define M_slai = (factor:4.1), define M_cropD = (factor:4), , define real pre_dymex_lai ! LAI after wheat.process and before dymex.process, define real post_dymex_lai, , on START, {, ! set lat = location:Latitude, reset dymex_striperust.lat=location, , }, , from start, {, set pre_dymex_lai = wheat.lai, set M_stage:factor=wheat.stage, set M_lai:factor=wheat.lai, set M_slai:factor=wheat.slai, set M_cropD:factor=wheat.plants, reset dymex_striperust.dxStage= M_stage, reset dymex_striperust.dxLAI= M_lai, reset dymex_striperust.dxSLAI= M_slai, reset dymex_striperust.dxcropDen= M_cropD, }, , ! Clock sends a "post" event. Dymex has computed a new value of LAI, , define delta_wheat_dm, , on_event process(), {, define green_loss = [(pool:'green'; part:['leaf']; dlt:[0.0]),, (pool:'senesced'; part:['leaf']; dlt:[0.0])], , if pre_dymex_lai > 0, { set post_dymex_lai = dymex_striperust.dymex_new_LAI, if post_dymex_lai < pre_dymex_lai, {, set delta_wheat_dm = wheat.LeafGreenWt * (1.0 - post_dymex_lai / pre_dymex_lai), set green_loss[1]:dlt[1] = delta_wheat_dm, set green_loss[2]:dlt[1] = -delta_wheat_dm, , wheat.remove_crop_biomass dm=green_loss, }, }, }]
          logfile =
          log_set = false
          text =
      TextOutput dymexOut
        initsection
          filename = DYMEX2 paddock_dymexOut.out
          interval = 1
          intervalunit = day
          summary_file =
          apsim_format = true
          title = ApsimVersion = 7.5 Title = DYMEX2 paddock_dymexOut.out
          outputfrequency = post
          dateformat = dd/MM/yyyy
          init outputs: array=T
            element
              varname = wheat.lai
              alias = lai
              aggreg =
              decplaces = 3
            element
              varname = AusFarmManager.M_lai
              alias = M_lai
              aggreg =
              decplaces = 3
            element
              varname = dymex_lai
              alias = dymex_lai
              aggreg =
              decplaces = 3
            element
              varname = AusFarmManager.pre_dymex_lai
              alias = pre_lai
              aggreg =
              decplaces = 5
            element
              varname = AusFarmManager.post_dymex_lai
              alias = post_lai
              aggreg =
              decplaces = 5
            element
              varname = dymex_Rm
              alias = dymex_Rm
              aggreg =
              decplaces = 5
            element
              varname = dymex_Lesion_Average_Physiological_Age
              alias = dymex_Lesion_Average_Physiological_Age
              aggreg =
              decplaces = 2
            element
              varname = day_of_year
              alias = day_of_year
              aggreg =
              decplaces = 0
  simulation DYMEX21
    metfile met: filename=waggawagga.met
    clock
      start_date = 01/01/1985  # Enter the start date of the simulation
      end_date = 31/12/1985  # Enter the end date of the simulation
    summaryfile
    area paddock
      surfaceom surface organic matter
        PoolName = wheat  # Organic Matter pool name
        type = wheat  # Organic Matter type
        mass = 1000  # Initial surface residue (kg/ha)
        cnr = 80  # C:N ratio of initial residue
        standing_fraction = 0  # Fraction of residue standing
      fertiliser
      wheat
      folder Manager folder: same as wheat.paddock.Manager folder
      outputfile: filename=DYMEX21.out; title=DYMEX21
        variables: same as DYMEX2.paddock.outputfile.Variables
        events Reporting Frequency: event=daily
      Soil Red Sodosol (Wagga Wagga No550-YP): same as wheat.paddock.Red Sodosol (Wagga Wagga No550-YP)
      Dymex_StripeRust: same as DYMEX2.paddock.Dymex_StripeRust
      AusFarmManager: same as DYMEX2.paddock.AusFarmManager
      TextOutput dymexOut
        initsection
          filename = DYMEX21 paddock_dymexOut.out
          interval = 1
          intervalunit = day
          summary_file =
          apsim_format = true
          title = ApsimVersion = 7.5 Title = DYMEX21 paddock_dymexOut.out
          outputfrequency = post
          dateformat = dd/MM/yyyy
          init outputs: array=T
            element
              varname = wheat.lai
              alias = lai
              aggreg =
              decplaces = 3
            element
              varname = AusFarmManager.M_lai
              alias = M_lai
              aggreg =
              decplaces = 3
            element
              varname = dymex_lai
              alias = dymex_lai
              aggreg =
              decplaces = 3
            element
              varname = AusFarmManager.pre_dymex_lai
              alias = pre_lai
              aggreg =
              decplaces = 5
            element
              varname = AusFarmManager.post_dymex_lai
              alias = post_lai
              aggreg =
              decplaces = 5
            element
              varname = dymex_Rm
              alias = dymex_Rm
              aggreg =
              decplaces = 5
            element
              varname = dymex_Lesion_Average_Physiological_Age
              alias = dymex_Lesion_Average_Physiological_Age
              aggreg =
              decplaces = 2
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