folder Simulations: version=27
  simulation 0N
    metfile met: filename=%apsim%\Examples\MetFiles\lincoln.met
    micromet
      soilalbedo = 0.23
      a_interception = 0
      b_interception = 0
      c_interception = 0
      d_interception = 0
    clock
      start_date = 16/12/1997  # Enter the start date of the simulation
      end_date = 31/03/1998  # Enter the end date of the simulation
    summaryfile: filename=Blank Simulation.sum
    area paddock
      soil Wakanui
        InitWater Initial water
          PercentMethod: Percent=1.00; Distributed=Filled from top
        Water
          Layer:
            Thickness (mm)  BD (g/cc)  AirDry (mm/mm)  LL15 (mm/mm)  DUL (mm/mm)  SAT (mm/mm)
            200             1.13       0.1             0.13          0.363        0.549
            100             1.28       0.1             0.128         0.335        0.496
            100             1.46       0.1             0.127         0.294        0.432
            100             1.58       0.1             0.123         0.295        0.389
            100             1.49       0.09            0.094         0.298        0.42
            100             1.4        0.06            0.067         0.316        0.451
            100             1.37       0.05            0.06          0.337        0.464
            100             1.41       0.07            0.072         0.351        0.448
            100             1.38       0.1             0.106         0.346        0.462
            100             1.43       0.1             0.12          0.35         0.455
            100             1.43       0.1             0.128         0.351        0.455
            100             1.43       0.1             0.132         0.358        0.455
            100             1.39       0.1             0.13          0.357        0.456
            100             1.39       0.1             0.145         0.355        0.455
            100             1.39       0.1             0.179         0.35         0.455
            100             1.39       0.1             0.236         0.338        0.455
            100             1.39       0.1             0.211         0.333        0.455
            100             1.39       0.1             0.231         0.338        0.455
            100             1.39       0.1             0.232         0.337        0.455
            100             1.39       0.1             0.18          0.338        0.455
            100             1.39       0.1             0.131         0.351        0.455
            100             1.39       0.1             0.143         0.362        0.455
          SoilCrop lucerne
            Layer:
              Thickness (mm)  LL (mm/mm)  KL (/day)  XF (0-1)
              200             0.13        0.014      1
              100             0.128       0.014      1
              100             0.127       0.021      1
              100             0.123       0.025      1
              100             0.094       0.041      1
              100             0.067       0.027      1
              100             0.06        0.028      1
              100             0.072       0.041      1
              100             0.106       0.031      1
              100             0.12        0.022      1
              100             0.128       0.022      1
              100             0.132       0.033      1
              100             0.13        0.019      1
              100             0.145       0.022      1
              100             0.179       0.019      1
              100             0.236       0.027      1
              100             0.211       0.023      1
              100             0.231       0.018      1
              100             0.232       0.028      1
              100             0.18        0.027      1
              100             0.131       0.03       1
              100             0.143       0.077      1
          SoilCrop wheat
            Layer:
              Thickness (mm)  LL (mm/mm)  KL (/day)  XF (0-1)
              200             0.13        0.06       1
              100             0.128       0.06       1
              100             0.127       0.06       1
              100             0.123       0.06       1
              100             0.094       0.06       1
              100             0.067       0.06       1
              100             0.06        0.06       1
              100             0.072       0.06       1
              100             0.106       0.06       1
              100             0.12        0.06       1
              100             0.128       0.06       1
              100             0.132       0.06       1
              100             0.13        0.06       1
              100             0.145       0.06       1
              100             0.179       0.06       1
              100             0.236       0.06       1
              100             0.211       0.06       1
              100             0.231       0.06       1
              100             0.232       0.06       1
              100             0.18        0.06       1
              100             0.131       0.06       1
              100             0.143       0.06       1
          SoilCrop barley: same as 0N.paddock.Wakanui.Water.wheat
          SoilCrop fieldpea
            Layer:
              Thickness (mm)  LL (mm/mm)  KL (/day)  XF (0-1)
              200             0.13        0.06       1
              100             0.128       0.06       1
              100             0.127       0.06       1
              100             0.123       0.06       1
              100             0.094       0.06       1
              100             0.067       0.06       1
              100             0.337       0.06       1
              100             0.351       0.06       1
              100             0.346       0.06       1
              100             0.35        0.06       1
              100             0.351       0.06       1
              100             0.358       0.06       1
              100             0.357       0.06       1
              100             0.355       0.06       1
              100             0.35        0.06       1
              100             0.338       0.06       1
              100             0.333       0.06       1
              100             0.338       0.06       1
              100             0.337       0.06       1
              100             0.338       0.06       1
              100             0.351       0.06       1
              100             0.362       0.06       1
          SoilCrop oats: same as 0N.paddock.Wakanui.Water.wheat
          SoilCrop canola: same as 0N.paddock.Wakanui.Water.wheat
          SoilCrop fieldpea2: same as 0N.paddock.Wakanui.Water.fieldpea
        SoilWat: SummerCona=3.5; SummerU=6; SummerDate=1-Nov; WinterCona=3.5; WinterU=6; WinterDate=1-Apr; DiffusConst=88; DiffusSlope=35.4; Salb=0.18; CN2Bare=68; CNRed=20; CNCov=0.8
          Layer:
            Thickness (mm)  SWCON (0-1)
            200             0.55
            100             0.55
            100             0.55
            100             0.55
            100             0.55
            100             0.55
            100             0.55
            100             0.55
            100             0.55
            100             0.55
            100             0.55
            100             0.55
            100             0.65
            100             0.65
            100             0.65
            100             0.65
            100             0.65
            100             0.65
            100             0.65
            100             0.65
            100             0.65
            100             0.65
        SoilOrganicMatter
          Layer:
            Thickness (mm)  OC (Total %)  FBiom (0-1)  FInert (0-1)
            200             0.05          0.025        0.45
            100             0.05          0.025        0.6
            100             0.05          0.015        0.75
            100             0.05          0.01         0.9
            100             0.05          0.01         0.96
            100             0.05          0.01         0.96
            100             0.47          0.01         0.96
            100             0.47          0.01         0.96
            100             0.47          0.01         0.96
            100             0.47          0.01         0.96
            100             0.47          0.01         0.96
            100             0.47          0.01         0.96
            100             0.47          0.01         0.96
            100             0.47          0.01         0.96
            100             0.47          0.01         0.96
            100             0.47          0.01         0.96
            100             0.47          0.01         0.96
            100             0.47          0.01         0.96
            100             0.47          0.01         0.96
            100             0.47          0.01         0.96
            100             0.47          0.01         0.96
            100             0.47          0.01         0.96
          RootCN = 50
          RootWT = 0
          SoilCN = 14.5
          EnrACoeff = 7.4
          EnrBCoeff = 0.2
        Analysis
          Layer:
            Thickness (mm)  PH (1:5 water)
            200             6.6
            100             6.2
            100             5.7
            100             5.5
            100             5.5
            100             5.5
            100             5.5
            100             5.5
            100             5.5
            100             5.5
            100             5.5
            100             5.5
            100             5.5
            100             5.5
            100             5.5
            100             5.5
            100             5.5
            100             5.5
            100             5.5
            100             5.5
            100             5.5
            100             5.5
        Sample Initial nitrogen
          Layer:
            Thickness (mm)  NO3 (ppm)  NH4 (ppm)
            200             1          0.1
            100             1          0.1
            100             1          0.1
            100             1          0.1
            100             1          0.1
            100             1          0.1
            100             1          0.1
            100             1          0.1
            100             1          0.1
            100             1          0.1
            100             1          0.1
            100             1          0.1
            100             1          0.1
            100             1          0.1
            100             1          0.1
            100             1          0.1
            100             1          0.1
            100             1          0.1
            100             1          0.1
            100             1          0.1
            100             1          0.1
            100             1          0.1
      surfaceom Surface Organic Matter
        PoolName = wheat_stubble  # Organic Matter pool name
        type = wheat  # Organic Matter type
        mass = 1000  # Initial surface residue (kg/ha)
        cnr = 80  # C:N ratio of initial residue
        standing_fraction = 0  # Fraction of residue standing
      fertiliser
      folder Manager folder
        manager Sow on a fixed date
          # Sowing criteria
          date = 16-dec  # Enter sowing date (dd-mmm)
          # Sowing parameters
          crop = FieldPea2  # Enter name of crop to sow
          density = 50  # Enter sowing density (plants/m2)
          depth = 30  # Enter sowing depth (mm)
          cultivar = Primo  # Enter cultivar
          class = plant  # Enter crop growth class
          row_spacing = 200  # Enter row spacing (mm)
          on start_of_day:
```
        if (today = date('[date]') then
        !      [crop] sow plants =[density], sowing_depth = [depth], cultivar = [cultivar],                              row_spacing = [row_spacing], crop_class = [class]
               [crop] sow population =[density], depth = [depth], cultivar = [cultivar], MaxCover = 1.0, BudNumber = 1, row_spacing = [row_spacing], crop_class = [class]
         endif
```
        manager Harvesting rule
          # Harvesting criteria
          crop = FieldPea2  # Enter name of crop to harvest when ripe
          on end_of_day:
```
           if ('[crop]' = 'cotton') then
              if ([crop].ozcot_status > 0) then
                  [crop] harvest
              endif
           elseif ([crop].StageName = 'harvest_ripe' or [crop].plant_status = 'dead') then
              [crop]  harvest
              [crop]  end_crop
           endif
```
        irrigation
          automatic_irrigation = on
          asw_depth = 500  # Depth to which ASW is calculated. (mm)
          crit_fr_asw = 0.6  # Fraction of ASW below which irrigation is applied (0-1.0)
          irrigation_efficiency = 1  # Efficiency of the irrigation. (0-1.0)
          irrigation_allocation = off  # Allocation limits
          allocation = 0  # Allocation in ML
          default_no3_conc = 0  # Nitrate concentration (ppm N)
          default_nh4_conc = 0  # Ammonium concentration (ppm N)
          default_cl_conc = 0  # Chloride concentration (ppm Cl)
          default_no3_conc = 0  # Nitrate concentration (ppm N)
          default_nh4_conc = 0  # Ammonium concentration (ppm N)
          default_cl_conc = 0  # Chloride concentration (ppm Cl)
      FieldPea2
      folder Plant2 diagnostics
        outputfile Plant2 diagnostic variables
          events Reporting Frequency: event=Daily
          variables
            variable:
              dd/mmm/yyyy
              AccumTtemerg
              StageCodeValue
              no3()
              nh4()
              urea()
              surfaceom_n
              biom_n()
              fom_n()
              hum_n()
              dnit()
              leach_no3
              AccumPlantN
              AccumMineralisation
              AccumDenit
              AccumFert
              AccumLeach
              AccumDetach
              DeltaSoilOMN
              DeltaSurfaceOMN
              DeltaSoilMineralN
              RootNUptakeSupply
              eo
              es
              sw_dep()
              dul_dep()
              drain
              runoff
              outflow_lat()
              pond
              AccumEO
              AccumEP
              AccumES
              AccumDrainage
              AccumRunoff
              AccumRainfall
              AccumIrrigation
              AccumOutflowLat
              SoilWaterDeficit
              AboveGroundWt
              BelowGroundWt
              TotalWt
              LeafDeadWt
              LeafLiveWt
              StemDeadWt
              StemLiveWt
              PodDeadWt
              PodLiveWt
              RootDeadWt
              RootLiveWt
              GrainLiveWt
              GrainDeadWt
              PodwallLiveWt
              PodwallDeadWt
              AboveGroundN
              BelowGroundN
              TotalN
              TotalLiveN
              TotalDeadN
              LeafDeadN
              LeafLiveN
              StemDeadN
              StemLiveN
              PodDeadN
              PodLiveN
              RootLiveN
              RootDeadN
              GrainLiveN
              GrainDeadN
              FloretLiveN
              FloretDeadN
              LeafLiveNConc
              LeafDeadNConc
              StemLiveNConc
              PodLiveNConc
              RootLiveNConc
              GrainLiveNConc
              PodwallLiveNConc
              RootWaterSupply
              RootWaterUptake
              LeafTranspiration
              LeafWaterDemand
              RootDepth
              Cover_green
              Cover_tot
              Cover_dead
              LeafLAI
              LeafLAIDead
              Height
              LeafFn
              LeafFw
              LeafPhotosynthesisFtValue
              LeafPhotosynthesisFvpdValue
              LeafTotalNo
              LeafGreenNo
              LeafExpandingNodeNo
              LeafCohortNo
              LeafBranchNo
              LeafDeadNodeNo
              LeafNodeNo
              LeafSenescingNodeNo
              LeafLeafNo
              sw
              no3
              LeafPartitionFractionValue
              StemPartitionFractionValue
              PodPartitionFractionValue
              GrainPartitionFractionValue
              PodwallPartitionFractionValue
              RootPartitionFractionValue
              GrainMinimumNConcValue
              PodwallMinimumNConcValue
              LeafMinimumNConcValue
              StemMinimumNConcValue
              PodMinimumNConcValue
              RootMinimumNConcValue
              GrainMaximumNConcValue
              PodwallMaximumNConcValue
              LeafMaximumNConcValue
              StemMaximumNConcValue
              PodMaximumNConcValue
              RootMaximumNConcValue
              leavesPerStem
              PhenologyEarlyTuberTargetValue
              StemLiveNonStructuralN
              StemLiveStructuralN
              StemLiveStructuralWt
              StemLiveNonStructuralWt
              LeafLiveNonStructuralN
              LeafLiveNonStructuralWt
              LeafLiveStructuralN
              LeafLiveStructuralWt
              LeafTotalStructuralN
              LeafTotalNonStructuralN
              LeafTotalStructuralWt
              LeafTotalNonStructuralWt
              NoduleRespiredWtFixation
              NoduleNfixed
        manager Diagnostic variables
          CropType = potato2  # Select crop type to report variables for
          on init:
```
SimDay = 1

AccumPlantN = 0
AccumMineralisation = 0
AccumDenit = 0
AccumFert = 0
AccumLeach = 0
AccumDetach = 0
DeltaSoilOMN = 0
DeltaSurfaceOMN = 0
DeltaSoilMineralN = 0

AccumEO = 0
AccumEP = 0
AccumES = 0
AccumDrainage = 0
AccumRunoff = 0
AccumOutflowLat = 0
AccumIrrigation = 0
AccumRainfall = 0
SoilWaterDeficit = 0

LeafLiveNConc3 = 0
LeafDeadNConc3 = 0
StemLiveNConc3 = 0
TuberLiveNConc3 = 0

AccumTtemerg = 0

leavesPerStem = 0
```
          on start_of_day:
```
if simday = 1 then
InitialSoilOMN = biom_n() + fom_n() + hum_n()
InitialSurfaceOMN = surfaceom_n
InitialMineralN = no3() + nh4() + urea()
endif

!!!!!! Nitrogen balance components !!!!!!
!!!!!!^^^^^^^^^^^^^^^^^^^^^^^^^^^^^!!!!!!
AccumPlantN =  (0 - [CropType].LeafLiveN - [CropType].LeafDeadN - [CropType].StemLiveN - [CropType].stemdeadn - [CropType].TuberLiveN - [CropType].tuberdeadN ) * 10 !+ [CropType].RootLiveN + [CropType].RootDeadN
AccumMineralisation = AccumMineralisation + dlt_n_min() + dlt_n_min_res()
AccumDenit = AccumDenit - dnit() 
AccumFert = AccumFert + fertiliser
AccumLeach = AccumLeach - leach_urea - leach_no3 - leach_nh4 
AccumDetach = 0 !plant2 doesn't detach yet
DeltaSoilOMN = (biom_n() + fom_n() + hum_n()) - InitialSoilOMN
DeltaSurfaceOMN = surfaceom_n - InitialSurfaceOMN
DeltaSoilMineralN = (no3() + nh4() + urea()) - InitialMineralN

!!!!!! Water balance components !!!!!!
!!!!!!^^^^^^^^^^^^^^^^^^^^^^^^^^!!!!!!
AccumEO = AccumEO - eo
AccumEP = AccumEP - [CropType].LeafTranspiration
AccumES = AccumES - es
AccumDrainage = AccumDrainage - drain
AccumRunoff = AccumRunoff - runoff
AccumOutflowLat = AccumOutflowLat - outflow_lat()
AccumIrrigation = AccumIrrigation + Irrigation
AccumRainfall = Accumrainfall + rain
SoilWaterDeficit =  sw_dep() - dul_dep()

!!!!!! Organ N % !!!!!!
!!!!!!^^^^^^^^^^^^^^^^^^^^^!!!!!!
!FIXME These variables are created because those reported by biomass object only have 2dp
if [CropType].LeafLiveWt > 0 then
LeafLiveNConc3 = ([CropType].LeafLiveN/[CropType].LeafLiveWt)
endif
if [CropType].LeafDeadWt > 0 then
LeafDeadNConc3 = ([CropType].LeafDeadN/[CropType].LeafDeadWt)
endif
if [CropType].tuberlivewt > 0 then
TuberLiveNConc3 = ([CropType].tuberliveN/[CropType].tuberlivewt)
endif
if [CropType].stemlivewt > 0 then
StemLiveNConc3 = ([CropType].stemliveN/[CropType].stemlivewt)
endif


!!!!!! Thermal time calculation !!!!!!
!!!!!! ^^^^^^^^^^^^^^^^^^^^^^^^ !!!!!!
If [CropType].StageCodeValue >= 3 Then
AccumTtemerg = AccumTtemerg + [CropType].PhenologyThermalTimeValue
Endif

leavesPerStem = [croptype].leaftotalno / 3
```
          on end_of_day:
```
if SimDay = 1 then
SimDay = 2
Else SimDay = 2
endif
```
  simulation 100kg -> /Simulations/0N
    area paddock -> /Simulations/0N/paddock
      folder Manager folder -> /Simulations/0N/paddock/Manager folder
        manager Sow on a fixed date
          # Sowing criteria
          date = 16-dec  # Enter sowing date (dd-mmm)
          # Sowing parameters
          crop = FieldPea2  # Enter name of crop to sow
          density = 100  # Enter sowing density (plants/m2)
          depth = 30  # Enter sowing depth (mm)
          cultivar = Primo  # Enter cultivar
          class = plant  # Enter crop growth class
          row_spacing = 200  # Enter row spacing (mm)
          on start_of_day:
```
        if (today = date('[date]') then
        !      [crop] sow plants =[density], sowing_depth = [depth], cultivar = [cultivar],                              row_spacing = [row_spacing], crop_class = [class]
               [crop] sow population =[density], depth = [depth], cultivar = [cultivar], MaxCover = 1.0, BudNumber = 1, row_spacing = [row_spacing], crop_class = [class]
         fertiliser apply amount = 100 (kg/ha), depth = 50 (mm), type = urea_n ()
         endif
```
        operations (disabled)
          16/12/1997  irrigation apply amount=200 (mm)
          23/12/1997  irrigation apply amount=200 (mm)
          31/12/1997  irrigation apply amount=200(mm)
          7/01/1998  irrigation apply amount=200 (mm)
          15/01/1998  irrigation apply amount=100 (mm)
          22/01/1998  irrigation apply amount=100 (mm)
          30/01/1998  irrigation apply amount=100 (mm)
          7/02/1998  irrigation apply amount=100 (mm)
          15/02/1998  irrigation apply amount=100 (mm)
          28/02/1998  irrigation apply amount=100 (mm)
          7/03/1998  irrigation apply amount=100 (mm)
      folder Plant2 diagnostics
        outputfile Plant2 diagnostic variables
          events Reporting Frequency: event=Daily
          variables
            variable:
              dd/mmm/yyyy
              AccumTtemerg
              StageCodeValue
              no3()
              nh4()
              urea()
              surfaceom_n
              biom_n()
              fom_n()
              hum_n()
              dnit()
              leach_no3
              AccumPlantN
              AccumMineralisation
              AccumDenit
              AccumFert
              AccumLeach
              AccumDetach
              DeltaSoilOMN
              DeltaSurfaceOMN
              DeltaSoilMineralN
              RootNUptakeSupply
              eo
              es
              sw_dep()
              dul_dep()
              drain
              runoff
              outflow_lat()
              pond
              AccumEO
              AccumEP
              AccumES
              AccumDrainage
              AccumRunoff
              AccumRainfall
              AccumIrrigation
              AccumOutflowLat
              SoilWaterDeficit
              AboveGroundWt
              BelowGroundWt
              TotalWt
              LeafDeadWt
              LeafLiveWt
              StemDeadWt
              StemLiveWt
              PodDeadWt
              PodLiveWt
              RootDeadWt
              RootLiveWt
              GrainLiveWt
              GrainDeadWt
              PodwallLiveWt
              PodwallDeadWt
              AboveGroundN
              BelowGroundN
              TotalN
              TotalLiveN
              TotalDeadN
              LeafDeadN
              LeafLiveN
              StemDeadN
              StemLiveN
              PodDeadN
              PodLiveN
              RootLiveN
              RootDeadN
              GrainLiveN
              GrainDeadN
              FloretLiveN
              FloretDeadN
              LeafLiveNConc
              LeafDeadNConc
              StemLiveNConc
              PodLiveNConc
              RootLiveNConc
              GrainLiveNConc
              PodwallLiveNConc
              RootWaterSupply
              RootWaterUptake
              LeafTranspiration
              LeafWaterDemand
              RootDepth
              Cover_green
              Cover_tot
              Cover_dead
              LeafLAI
              LeafLAIDead
              Height
              LeafFn
              LeafFw
              LeafPhotosynthesisFtValue
              LeafPhotosynthesisFvpdValue
              LeafTotalNo
              LeafGreenNo
              LeafExpandingNodeNo
              LeafCohortNo
              LeafBranchNo
              LeafDeadNodeNo
              LeafNodeNo
              LeafSenescingNodeNo
              LeafLeafNo
              sw
              no3
              LeafPartitionFractionValue
              StemPartitionFractionValue
              PodPartitionFractionValue
              GrainPartitionFractionValue
              PodwallPartitionFractionValue
              RootPartitionFractionValue
              GrainMinimumNConcValue
              PodwallMinimumNConcValue
              LeafMinimumNConcValue
              StemMinimumNConcValue
              PodMinimumNConcValue
              RootMinimumNConcValue
              GrainMaximumNConcValue
              PodwallMaximumNConcValue
              LeafMaximumNConcValue
              StemMaximumNConcValue
              PodMaximumNConcValue
              RootMaximumNConcValue
              leavesPerStem
              PhenologyEarlyTuberTargetValue
              StemLiveNonStructuralN
              StemLiveStructuralN
              StemLiveStructuralWt
              StemLiveNonStructuralWt
              LeafLiveNonStructuralN
              LeafLiveNonStructuralWt
              LeafLiveStructuralN
              LeafLiveStructuralWt
              LeafTotalStructuralN
              LeafTotalNonStructuralN
              LeafTotalStructuralWt
              LeafTotalNonStructuralWt
        manager Diagnostic variables: same as 0N.paddock.Plant2 diagnostics.Diagnostic variables
  simulation 300kg -> /Simulations/0N
    area paddock -> /Simulations/0N/paddock
      folder Manager folder -> /Simulations/0N/paddock/Manager folder
        manager Sow on a fixed date
          # Sowing criteria
          date = 16-dec  # Enter sowing date (dd-mmm)
          # Sowing parameters
          crop = FieldPea2  # Enter name of crop to sow
          density = 150  # Enter sowing density (plants/m2)
          depth = 30  # Enter sowing depth (mm)
          cultivar = Primo  # Enter cultivar
          class = plant  # Enter crop growth class
          row_spacing = 200  # Enter row spacing (mm)
          on start_of_day:
```
        if (today = date('[date]') then
        !      [crop] sow plants =[density], sowing_depth = [depth], cultivar = [cultivar],                              row_spacing = [row_spacing], crop_class = [class]
               [crop] sow population =[density], depth = [depth], cultivar = [cultivar], MaxCover = 1.0, BudNumber = 1, row_spacing = [row_spacing], crop_class = [class]
         fertiliser apply amount = 600 (kg/ha), depth = 50 (mm), type = urea_n ()
         endif
```
        operations (disabled): same as 100kg.paddock.Manager folder.operations
      folder Plant2 diagnostics: same as 100kg.paddock.Plant2 diagnostics
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