folder simulations: version=27
  simulation Fieldpea2
    metfile met: filename=%apsim%\Examples\MetFiles\lincoln.met
    clock
      start_date = 01/09/1990  # Enter the start date of the simulation
      end_date = 31/05/1991  # Enter the end date of the simulation
    summaryfile: filename=Continuous Wheat Simulation.sum
    area paddock
      surfaceom surface organic matter
        PoolName = wheat  # Organic Matter pool name
        type = wheat  # Organic Matter type
        mass = 1000  # Initial surface residue (kg/ha)
        cnr = 80  # C:N ratio of initial residue
        standing_fraction = 0  # Fraction of residue standing
      fertiliser
      folder Manager folder
        manager Sow on a fixed date
          # Sowing criteria
          date = 1-sep  # Enter sowing date (dd-mmm)
          # Sowing parameters
          crop = FieldPea2  # Enter name of crop to sow
          density = 30  # Enter sowing density (plants/m2)
          depth = 50  # Enter sowing depth (mm)
          cultivar = Primo  # Enter cultivar
          class = Plant  # Enter crop growth class
          row_spacing = 500  # Enter row spacing (mm)
          on start_of_day:
```
        if (today = date('[date]') then
              [crop] sow population =[density], depth = [depth], cultivar = [cultivar], MaxCover = 1.0, BudNumber = 1, row_spacing = [row_spacing], crop_class = [class]
         endif
```
        manager Harvesting rule
          # Harvesting criteria
          crop = chickpea2  # Enter name of crop to harvest when ripe
          on end_of_day:
```
           if [crop].PhenologyCurrentPhaseName = 'ReadyForHarvesting'  then
              [crop]  Harvest
              [crop]  EndCrop
           endif
```
      outputfile
        variables
          variables: dd/mm/yyyy as Date, PhenologyCurrentPhaseName, AboveGroundWt, StemLiveWt, PodLiveWt, PodHI, PodHIIncrementValue, phenologythermaltimevalue, RootDepth, LeafNodeNo, LeafGreenNo, LeafCohortNo, LeafDeadNodeNo, LeafFullyExpandedNodeNo, LeafFinalNodeNo, LeafTotalNo, LeafLAI, LeafBranchNo, AboveGroundWt, leafLiveWt, stemLiveWt, Height, LeafFw, StemLiveWt, GrainLiveWt, GrainHI, sw_dep(), LeafTranspiration, LeafPhotosynthesisFtValue
        events Reporting Frequency: event=daily
      micromet: soilalbedo=0.23; a_interception=0.0; b_interception=0.0; c_interception=0.0; d_interception=0.0
      folder Plant2 diagnostics
        outputfile Plant2
          events Reporting Frequency: event=Daily
          variables
            variable:
              dd/mmm/yyyy
              AccumTtemerg
              StageCodeValue
              no3()
              nh4()
              urea()
              surfaceom_n
              biom_n()
              fom_n()
              hum_n()
              dnit()
              leach_no3
              AccumPlantN
              AccumMineralisation
              AccumDenit
              AccumFert
              AccumLeach
              AccumDetach
              DeltaSoilOMN
              DeltaSurfaceOMN
              DeltaSoilMineralN
              RootNUptakeSupply
              eo
              es
              sw_dep()
              dul_dep()
              drain
              runoff
              outflow_lat()
              pond
              AccumEO
              AccumEP
              AccumES
              AccumDrainage
              AccumRunoff
              AccumRainfall
              AccumIrrigation
              AccumOutflowLat
              SoilWaterDeficit
              AboveGroundDM
              BelowGroundDM
              TotalDM
              LeafDeadWt2
              LeafLiveWt2
              StemDeadWt
              StemLiveWt
              TuberDeadWt
              TuberLiveWt
              RootDeadWt
              RootLiveWt
              GrainLiveWt
              GrainDeadWt
              FloretLiveWt
              FloretDeadWt
              AboveGroundN
              BelowGroundN
              TotalN
              TotalLiveN
              TotalDeadN
              LeafDeadN2
              LeafLiveN2
              StemDeadN
              StemLiveN
              TuberDeadN
              TuberLiveN
              RootLiveN
              RootDeadN
              GrainLiveN
              GrainDeadN
              FloretLiveN
              FloretDeadN
              LeafLiveNConc3
              LeafDeadNConc3
              StemLiveNConc3
              TuberLiveNConc3
              RootLiveNConc
              GrainLiveNConc
              FloretLiveNConc
              RootWaterSupply
              RootWaterUptake
              LeafTranspiration
              LeafWaterDemand
              RootDepth
              Cover_green
              Cover_tot
              Cover_dead
              LeafLAI
              LeafLAIDead
              Height
              LeafFn
              LeafFw
              LeafPhotosynthesisFtValue
              LeafPhotosynthesisFvpdValue
              LeafTotalNo
              LeafGreenNo
              LeafExpandingNodeNo
              LeafCohortNo
              LeafBranchNo
              LeafDeadNodeNo
              LeafNodeNo
              LeafSenescingNodeNo
              LeafLeafNo
              sw
              no3
              LeafPartitionFractionValue
              StemPartitionFractionValue
              TuberPartitionFractionValue
              GrainPartitionFractionValue
              FloretPartitionFractionValue
              RootPartitionFractionValue
              GrainMinimumNConcValue
              FloretMinimumNConcValue
              LeafMinimumNConcValue
              StemMinimumNConcValue
              TuberMinimumNConcValue
              RootMinimumNConcValue
              GrainMaximumNConcValue
              FloretMaximumNConcValue
              LeafMaximumNConcValue
              StemMaximumNConcValue
              TuberMaximumNConcValue
              RootMaximumNConcValue
              leavesPerStem
              PhenologyEarlyTuberTargetValue
              StemLiveNonStructuralN
              StemLiveStructuralN
              StemLiveStructuralWt
              StemLiveNonStructuralWt
              LeafLiveNonStructuralN2
              LeafLiveNonStructuralWt2
              LeafLiveStructuralN2
              LeafLiveStructuralWt2
              LeafTotalStructuralN2
              LeafTotalNonStructuralN2
              LeafTotalStructuralWt2
              LeafTotalNonStructuralWt2
              NoduleLiveWt
              NoduleLiveN
              NoduleNFixation
              NoduleLiveNconc
        manager Diagnostic variables
          CropType = FieldPea2  # Select crop type to report variables for
          on init:
```
SimDay = 1

AccumPlantN = 0
AccumMineralisation = 0
AccumDenit = 0
AccumFert = 0
AccumLeach = 0
AccumDetach = 0
DeltaSoilOMN = 0
DeltaSurfaceOMN = 0
DeltaSoilMineralN = 0

AccumEO = 0
AccumEP = 0
AccumES = 0
AccumDrainage = 0
AccumRunoff = 0
AccumOutflowLat = 0
AccumIrrigation = 0
AccumRainfall = 0
SoilWaterDeficit = 0

LeafLiveNConc3 = 0
LeafDeadNConc3 = 0
StemLiveNConc3 = 0
TuberLiveNConc3 = 0

AccumTtemerg = 0

leavesPerStem = 0
```
          on start_of_day:
```
if simday = 1 then
InitialSoilOMN = biom_n() + fom_n() + hum_n()
InitialSurfaceOMN = surfaceom_n
InitialMineralN = no3() + nh4() + urea()
endif

!!!!!! Nitrogen balance components !!!!!!
!!!!!!^^^^^^^^^^^^^^^^^^^^^^^^^^^^^!!!!!!
AccumPlantN =  (0 - [CropType].LeafLiveN2 - [CropType].LeafDeadN2 - [CropType].StemLiveN - [CropType].stemdeadn - [CropType].TuberLiveN - [CropType].tuberdeadN ) * 10 !+ [CropType].RootLiveN + [CropType].RootDeadN
AccumMineralisation = AccumMineralisation + dlt_n_min() + dlt_n_min_res()
AccumDenit = AccumDenit - dnit() 
AccumFert = AccumFert + fertiliser
AccumLeach = AccumLeach - leach_urea - leach_no3 - leach_nh4 
AccumDetach = 0 !plant2 doesn't detach yet
DeltaSoilOMN = (biom_n() + fom_n() + hum_n()) - InitialSoilOMN
DeltaSurfaceOMN = surfaceom_n - InitialSurfaceOMN
DeltaSoilMineralN = (no3() + nh4() + urea()) - InitialMineralN

!!!!!! Water balance components !!!!!!
!!!!!!^^^^^^^^^^^^^^^^^^^^^^^^^^!!!!!!
AccumEO = AccumEO - eo
AccumEP = AccumEP - [CropType].LeafTranspiration
AccumES = AccumES - es
AccumDrainage = AccumDrainage - drain
AccumRunoff = AccumRunoff - runoff
AccumOutflowLat = AccumOutflowLat - outflow_lat()
AccumIrrigation = AccumIrrigation + Irrigation
AccumRainfall = Accumrainfall + rain
SoilWaterDeficit =  sw_dep() - dul_dep()

!!!!!! Organ N % !!!!!!
!!!!!!^^^^^^^^^^^^^^^^^^^^^!!!!!!
!FIXME These variables are created because those reported by biomass object only have 2dp
if [CropType].LeafLiveWt2 > 0 then
LeafLiveNConc3 = ([CropType].LeafLiveN2/[CropType].LeafLiveWt2)
endif
if [CropType].LeafDeadWt2 > 0 then
LeafDeadNConc3 = ([CropType].LeafDeadN2/[CropType].LeafDeadWt2)
endif
if [CropType].tuberlivewt > 0 then
TuberLiveNConc3 = ([CropType].tuberliveN/[CropType].tuberlivewt)
endif
if [CropType].stemlivewt > 0 then
StemLiveNConc3 = ([CropType].stemliveN/[CropType].stemlivewt)
endif


!!!!!! Thermal time calculation !!!!!!
!!!!!! ^^^^^^^^^^^^^^^^^^^^^^^^ !!!!!!
If [CropType].StageCodeValue >= 3 Then
AccumTtemerg = AccumTtemerg + [CropType].PhenologyThermalTimeValue
Endif

leavesPerStem = [croptype].leaftotalno / 3
```
          on end_of_day:
```
if SimDay = 1 then
SimDay = 2
Else SimDay = 2
endif
```
      FieldPea2
      soil Templeton deep 1: Country=New Zealand; Region=Plains; SoilType=NZ_sedementary; State=Canterbury
        DataSource=Generic profile descriptions provided by Trevor Webb and data for functional horizions based on SWAMP project results
        Comments=Bulk density values were measured on the fine earth fraction so values entered into apsim soil are adjusted down to account for stone content (assuming stones are inert from all soil process so their mass and volume is removed from model paramaters).  SAT, DUL, LL15 and Air dry have been adjusted down to account for stone content.  OC has not been adjusted so the model will get the correct carbon and N amounts using the adjusted BD.
        Analysis
          Layer:
            Thickness (mm)  Rocks (%)  PH (1:5 water)  CEC (cmol+/kg)  ParticleSizeSand (%)  ParticleSizeSilt (%)  ParticleSizeClay (%)
            180             0          6               13              14.5                  65.5                  20
            150             0          6               9               18                    58                    24
            400             0          6               9               14                    63                    23
            270             0          6               9               15                    66                    19
            500             0          6               9               15                    66                    19
        Water
          Layer:
            Thickness (mm)  KS (mm/day)  BD (g/cc)  Airdry (mm/mm)  LL15 (mm/mm)  DUL (mm/mm)  SAT (mm/mm)
            180             4832.04      1.3105     0.07675         0.1535        0.3735       0.456165
            150             389.229      1.524      0.201           0.201         0.332        0.39432
            400             16.3619      1.65       0.201           0.201         0.3375       0.358515
            270             97.995       1.601      0.162           0.162         0.325        0.37572
            500             97.995       1.601      0.162           0.162         0.325        0.37572
          SoilCrop Barley
            Layer:
              Thickness (mm)  LL (mm/mm)  kl (/day)   xf (0-1)
              180             0.1535      0.242629    1
              150             0.201       0.36744     1
              400             0.201       0.0472522   0.301194
              270             0.162       0.0293168   1
              500             0.162       0.00528755  1
          SoilCrop Canola
            Layer:
              Thickness (mm)  LL (mm/mm)  kl (/day)   xf (0-1)
              180             0.1535      0.242629    1
              150             0.201       0.36744     0.825307
              400             0.201       0.0472522   0.120996
              270             0.162       0.0293168   0.510686
              500             0.162       0.00528755  0.510686
          SoilCrop Cloverseed
            Layer:
              Thickness (mm)  LL (mm/mm)  kl (/day)    xf (0-1)
              180             0.1535      0.173413     1
              150             0.201       0.193986     1
              400             0.201       0.0143601    0.153816
              270             0.162       0.00706269   0.731982
              500             0.162       0.000616139  0.731982
          SoilCrop Fieldpea
            Layer:
              Thickness (mm)  LL (mm/mm)  kl (/day)   xf (0-1)
              180             0.1535      0.22882     1
              150             0.201       0.330128    0.449329
              400             0.201       0.0241696   0.090718
              270             0.162       0.0132411   0.301194
              500             0.162       0.00122552  0.301194
          SoilCrop Fababean
            Layer:
              Thickness (mm)  LL (mm/mm)  kl (/day)  xf (0-1)
              180             0.1535      0.255792   1
              150             0.201       0.420882   0.825307
              400             0.201       0.120698   0.120996
              270             0.162       0.0591381  0.510686
              500             0.162       0.020134   0.510686
          SoilCrop kale: same as Fieldpea2.paddock.Templeton deep 1.Water.Canola
          SoilCrop ItallianRyegrass: same as Fieldpea2.paddock.Templeton deep 1.Water.Canola
          SoilCrop Lucerne
            Layer:
              Thickness (mm)  LL (mm/mm)  kl (/day)  xf (0-1)
              180             0.1535      0.20426    1
              150             0.201       0.386305   1
              400             0.201       0.1589     0.301194
              270             0.162       0.106638   1
              500             0.162       0.0441555  1
          SoilCrop Maize
            Layer:
              Thickness (mm)  LL (mm/mm)  kl (/day)  xf (0-1)
              180             0.1535      0.262296   1
              150             0.201       0.446104   0.825307
              400             0.201       0.159359   0.120996
              270             0.162       0.105964   0.510686
              500             0.162       0.0347419  0.510686
          SoilCrop Oats
            Layer:
              Thickness (mm)  LL (mm/mm)  kl (/day)   xf (0-1)
              180             0.1535      0.242629    1
              150             0.201       0.36744     1
              400             0.201       0.0472522   0.153816
              270             0.162       0.0293168   0.731982
              500             0.162       0.00528755  0.731982
          SoilCrop Potato
            Layer:
              Thickness (mm)  LL (mm/mm)  kl (/day)    xf (0-1)
              180             0.1535      0.199694     1
              150             0.201       0.201525     0.449329
              400             0.201       0.00753395   0.090718
              270             0.162       0.00200619   0.301194
              500             0.162       6.16568e-05  0.301194
          SoilCrop Grassseed
            Layer:
              Thickness (mm)  LL (mm/mm)  kl (/day)    xf (0-1)
              180             0.1535      0.214378     1
              150             0.201       0.27165      0.825307
              400             0.201       0.0139479    0.120996
              270             0.162       0.00528755   0.510686
              500             0.162       0.000275799  0.510686
          SoilCrop Triticale: same as Fieldpea2.paddock.Templeton deep 1.Water.Oats
          SoilCrop Wheat: same as Fieldpea2.paddock.Templeton deep 1.Water.Oats
          SoilCrop ryegrass_clover: same as Fieldpea2.paddock.Templeton deep 1.Water.Grassseed
          SoilCrop ryegrass: same as Fieldpea2.paddock.Templeton deep 1.Water.Grassseed
          SoilCrop whiteclover: same as Fieldpea2.paddock.Templeton deep 1.Water.Fieldpea
          SoilCrop Fieldpea2: same as Fieldpea2.paddock.Templeton deep 1.Water.Fieldpea
        SoilWat: SummerCona=4.4; SummerU=9; SummerDate=1-Oct; WinterCona=3; WinterU=6; WinterDate=1-Apr; DiffusConst=88; DiffusSlope=35; Salb=0.13; Cn2Bare=73; CnRed=20; CnCov=0.8
          Layer:
            Thickness (mm)  SWCON (0-1)
            180             0.496442
            150             0.365575
            400             0.0968316
            270             0.306273
            500             0.306273
        SoilOrganicMatter: RootCn=40; RootWt=1000; SoilCn=11; EnrACoeff=7.4; EnrBCoeff=0.2
          Layer:
            Thickness (mm)  OC (Total %)  FBIOM (0-1)  FINERT (0-1)
            180             2.6251        0.0333099    0.437121
            150             1.24694       0.0186614    0.656885
            400             0.316004      0.0116634    0.849635
            270             0.207954      0.0102229    0.94496
            500             0.200366      0.0100221    0.982659
        InitWater
          percentmethod: percent=1; distributed=filled from top
        Sample Initial nitrogen
          Layer:
            Thickness  no3 (kg/ha)  nh4 (kg/ha)
            200        30           5
            1800       20           1
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