folder simulations: version=32
  shared
  folder Gatton
    simulation GattonOct08
      metfile met: filename=Gatton0809.met
      clock
        start_date = 1/10/2008  # Enter the start date of the simulation
        end_date = 30/5/2009  # Enter the end date of the simulation
      summaryfile
      area paddock
        soil: LocalName=Waco; Site=Jimbour; Region=South East Queensland
          SoilType = Black Vertosol  # Soil description
          NearestTown = Jimbour, Q 4352
          NaturalVegetation = Grassland, mainly Qld bluegrass
          Water
            Layer:
              Thickness (mm)  BD (g/cc)  AirDry (mm/mm)  LL15 (mm/mm)  DUL (mm/mm)  SAT (mm/mm)
              150             1.38       0.25            0.3           0.4          0.43
              150             1.28       0.25            0.3           0.48         0.5
              300             1.28       0.25            0.3           0.46         0.5
            SoilCrop frenchbean
              Layer:
                Thickness (mm)  LL (mm/mm)  KL (/day)  XF (0-1)
                150             0.3         0.2        1
                150             0.35        0.2        1
                300             0.35        0.2        1
          SoilWat: SummerCona=3.5; SummerU=6; SummerDate=1-Nov; WinterCona=3.5; WinterU=6; WinterDate=1-Apr; DiffusConst=40; DiffusSlope=16; Salb=0.13; Cn2Bare=73; CnRed=20; CnCov=0.8
            Layer:
              Thickness (mm)  SWCON (0-1)
              150             0.3
              150             0.3
              300             0.3
          SoilOrganicMatter: RootCn=40; RootWt=200; SoilCn=12.5; EnrACoeff=7.4; EnrBCoeff=0.2
            Layer:
              Thickness (mm)  OC (Total %)  FBiom (0-1)  FInert (0-1)
              150             1.04          0.025        0.4
              150             0.89          0.02         0.6
              300             0.89          0.015        0.8
          Analysis
            Layer:
              Thickness (mm)  EC (1:5 dS/m)  PH (1:5 water)
              150             0.2            8.4
              150             0.25           8.8
              300             0.31           9
          Sample Initial nitrogen
            Layer:
              Thickness (mm)  NO3 (ppm)  NH4 (ppm)
              150             6.50301    0.599023
              150             2.101      0.100004
              300             2.101      0.100004
          Sample Initial water
            Layer:
              Thickness (mm)  SW (mm/mm)
              150             0.31
              150             0.448
              300             0.448
        surfaceom surface organic matter
          PoolName = wheat  # Organic Matter pool name
          type = wheat  # Organic Matter type
          mass = 1000  # Initial surface residue (kg/ha)
          cnr = 80  # C:N ratio of initial residue
          standing_fraction = 0  # Fraction of residue standing
        fertiliser
        folder Manager folder
          manager Sow on a fixed date
            # Sowing criteria
            date = 1-oct  # Enter sowing date (dd-mmm)
            # Sowing parameters
            crop = frenchbean  # Enter name of crop to sow
            density = 27  # Enter sowing density (plants/m2)
            depth = 50  # Enter sowing depth (mm)
            cultivar = simba  # Enter cultivar
            row_spacing = 750  # Enter row spacing (mm)
            class = frenchbean  # Enter Crop Class
            on start_of_day:
```
      if (today = date('[date]') then
                    [crop] sow population =[density], depth = [depth], cultivar = [cultivar], MaxCover = 1.0, BudNumber = 1, row_spacing = [row_spacing], crop_class = [class]
        endif
```
          manager Sowing fertiliser
            # When should fertiliser be applied
            modulename = frenchbean  # On which module should the event come from
            eventname = sowing  # On which event should fertiliser be applied
            # Fertiliser application details
            fertmodule = fertiliser  # Module used to apply the fertiliser
            fert_amount_sow = 200  # Amount of starter fertiliser at sowing (kg/ha)
            fert_type_sow = urea_N  # Sowing fertiliser type
            on [modulename].[eventname]:
```
        [fertmodule] apply amount = [fert_amount_sow] (kg/ha), depth = 50 (mm), type = [fert_type_sow]
```
          manager Harvesting rule
            # Harvesting criteria
            crop = frenchbean  # Enter name of crop to harvest when ripe
            on end_of_day:
```
        if [crop].plant_status <> 'out' then
           if [crop].PhenologyCurrentPhaseName = 'HarvestRipe' then

              [crop]  harvest
              [crop]  EndCrop
           endif
        endif
```
        micromet
          soilalbedo = 0.23
          a_interception = 0
          b_interception = 0
          c_interception = 0
          d_interception = 0
        outputfile: filename=GattonOct08.out; title=GattonOct08
          variables
            variables: dd/mm/yyyy as Date, esw, LeafLAI, StructureMainStemNodeNo, StructurePlantMainStemNodeNo, LeafPlantAppearedGreenLeafNo, LeafExpandedCohortNo, LeafDeadCohortNo, AboveGroundWt, LeafWaterDemand, LeafTranspiration, LeafFW, LeafPhotosynthesisFtValue, LeafLiveWt, StemLiveWt, cover_green, PodLiveWt, LeafLiveWt, PhenologyThermalTimeValue, StageCodeValue, sw_dep(), sw, RootDepth, Height, eo, dul_dep(), ll15_dep(), rain, irrigation, LeafFn, NO3(), NH4(), Urea(), es, windspeed, vp, Height, drain, RootWaterSupply, pan, PodNumber, LeafFn, LeafLiveN, StemLiveN, PodLiveN, RootLiveN, LeafDMSupplyPhotosynthesis, TotalLiveN, flow_no3(3)
          events Reporting Frequency: event=end_step
        frenchbean
        irrigation
          automatic_irrigation = on
          asw_depth = 600  # Depth to which ASW is calculated. (mm)
          crit_fr_asw = 0.95  # Fraction of ASW below which irrigation is applied (0-1.0)
          irrigation_efficiency = 1  # Efficiency of the irrigation. (0-1.0)
          irrigation_allocation = off  # Allocation limits
          allocation = 0  # Allocation in ML
          default_no3_conc = 0  # Nitrate concentration (ppm N)
          default_nh4_conc = 0  # Ammonium concentration (ppm N)
          default_cl_conc = 0  # Chloride concentration (ppm Cl)
          default_no3_conc = 0  # Nitrate concentration (ppm N)
          default_nh4_conc = 0  # Ammonium concentration (ppm N)
          default_cl_conc = 0  # Chloride concentration (ppm Cl)
    simulation GattonDec08 -> /simulations/Gatton/GattonOct08
      area paddock -> /simulations/Gatton/GattonOct08/paddock
        folder Manager folder -> /simulations/Gatton/GattonOct08/paddock/Manager folder
          manager Sow on a fixed date
            # Sowing criteria
            date = 16-dec  # Enter sowing date (dd-mmm)
            # Sowing parameters
            crop = frenchbean  # Enter name of crop to sow
            density = 27  # Enter sowing density (plants/m2)
            depth = 50  # Enter sowing depth (mm)
            cultivar = simba  # Enter cultivar
            row_spacing = 750  # Enter row spacing (mm)
            class = frenchbean  # Enter Crop Class
            on start_of_day:
            script: same as in Gatton.GattonOct08.paddock.Manager folder.Sow on a fixed date
        outputfile: filename=GattonDec08.out; title=GattonDec08
          variables -> /simulations/Gatton/GattonOct08/paddock/outputfile/Variables
          events Reporting Frequency -> /simulations/Gatton/GattonOct08/paddock/outputfile/Reporting Frequency
    simulation GattonJan09 -> /simulations/Gatton/GattonOct08
      area paddock -> /simulations/Gatton/GattonOct08/paddock
        folder Manager folder -> /simulations/Gatton/GattonOct08/paddock/Manager folder
          manager Sow on a fixed date
            # Sowing criteria
            date = 5-jan  # Enter sowing date (dd-mmm)
            # Sowing parameters
            crop = frenchbean  # Enter name of crop to sow
            density = 27  # Enter sowing density (plants/m2)
            depth = 50  # Enter sowing depth (mm)
            cultivar = simba  # Enter cultivar
            row_spacing = 750  # Enter row spacing (mm)
            class = frenchbean  # Enter Crop Class
            on start_of_day:
            script: same as in Gatton.GattonOct08.paddock.Manager folder.Sow on a fixed date
        outputfile: filename=GattonJan09.out; title=GattonJan09
          variables -> /simulations/Gatton/GattonOct08/paddock/outputfile/Variables
          events Reporting Frequency -> /simulations/Gatton/GattonOct08/paddock/outputfile/Reporting Frequency
    simulation GattonROS1 -> /simulations/Gatton/GattonROS4
      clock
        start_date = 24/2/2009  # Enter the start date of the simulation
        end_date = 21/4/2009  # Enter the end date of the simulation
      area paddock -> /simulations/Gatton/GattonROS4/paddock
        soil -> /simulations/Gatton/GattonROS4/paddock/Soil
          Sample Initial water
            Layer:
              Thickness (mm)  SW (mm/mm)
              150             0.265
              150             0.48
              300             0.457
        folder Manager folder -> /simulations/Gatton/GattonROS4/paddock/Manager folder
          operations
            24/02/2009  irrigation apply amount = 11.05
            2/03/2009  irrigation apply amount = 10.39
            6/03/2009  irrigation apply amount = 10.44
            10/03/2009  irrigation apply amount = 12.58
            13/03/2009  irrigation apply amount = 8.050
            16/03/2009  irrigation apply amount = 12.28
            20/03/2009  irrigation apply amount = 11.14
            20/04/2009  frenchbean harvest
            20/04/2009  frenchbean endcrop
        outputfile: filename=GattonROS1.out; title=GattonROS1
          variables -> /simulations/Gatton/GattonROS4/paddock/outputfile/Variables
          events Reporting Frequency -> /simulations/Gatton/GattonROS4/paddock/outputfile/Reporting Frequency
        irrigation
          automatic_irrigation = off
          asw_depth = 600  # Depth to which ASW is calculated. (mm)
          crit_fr_asw = 0.95  # Fraction of ASW below which irrigation is applied (0-1.0)
          irrigation_efficiency = 1  # Efficiency of the irrigation. (0-1.0)
          irrigation_allocation = off  # Allocation limits
          allocation = 0  # Allocation in ML
          default_no3_conc = 0  # Nitrate concentration (ppm N)
          default_nh4_conc = 0  # Ammonium concentration (ppm N)
          default_cl_conc = 0  # Chloride concentration (ppm Cl)
          default_no3_conc = 0  # Nitrate concentration (ppm N)
          default_nh4_conc = 0  # Ammonium concentration (ppm N)
          default_cl_conc = 0  # Chloride concentration (ppm Cl)
    simulation GattonROS2 -> /simulations/Gatton/GattonROS4
      clock
        start_date = 24/02/2009  # Enter the start date of the simulation
        end_date = 21/04/2009  # Enter the end date of the simulation
      area paddock -> /simulations/Gatton/GattonROS4/paddock
        soil -> /simulations/Gatton/GattonROS4/paddock/Soil
          Sample Initial water
            Layer:
              Thickness (mm)  SW (mm/mm)
              150             0.25
              150             0.48
              300             0.448
        folder Manager folder -> /simulations/Gatton/GattonROS4/paddock/Manager folder
          operations
            24/02/2009  irrigation apply amount = 11.05
            2/03/2009  irrigation apply amount = 10.39
            6/03/2009  irrigation apply amount = 10.44
            10/03/2009  irrigation apply amount = 12.58
            13/03/2009  irrigation apply amount = 8.050
            16/03/2009  irrigation apply amount = 12.28
            20/03/2009  irrigation apply amount = 11.14
            31/03/2009  irrigation apply amount = 16.82
            3/04/2009  irrigation apply amount = 7.196
            8/04/2009  irrigation apply amount = 4.393
            9/04/2009  irrigation apply amount = 3.045
            9/04/2009  irrigation apply amount = 4.222
            15/04/2009  irrigation apply amount = 4.356
            17/04/2009  irrigation apply amount = 6.341
            20/04/2009  frenchbean harvest
            20/04/2009  frenchbean endcrop
        outputfile: filename=GattonROS2.out; title=GattonROS2
          variables -> /simulations/Gatton/GattonROS4/paddock/outputfile/Variables
          events Reporting Frequency -> /simulations/Gatton/GattonROS4/paddock/outputfile/Reporting Frequency
        irrigation: same as Gatton.GattonROS1.paddock.Irrigation
    simulation GattonROS3 -> /simulations/Gatton/GattonROS4
      clock
        start_date = 24/02/2009  # Enter the start date of the simulation
        end_date = 21/04/2009  # Enter the end date of the simulation
      area paddock -> /simulations/Gatton/GattonROS4/paddock
        soil -> /simulations/Gatton/GattonROS4/paddock/Soil
          Sample Initial water
            Layer:
              Thickness (mm)  SW (mm/mm)
              150             0.28
              150             0.45
              300             0.46
        folder Manager folder -> /simulations/Gatton/GattonROS4/paddock/Manager folder
          operations
            24/02/2009  irrigation apply amount = 11.05
            2/03/2009  irrigation apply amount = 10.39
            6/03/2009  irrigation apply amount = 10.44
            10/03/2009  irrigation apply amount = 12.58
            13/03/2009  irrigation apply amount = 8.050
            16/03/2009  irrigation apply amount = 12.28
            20/03/2009  irrigation apply amount = 11.14
            23/03/2009  irrigation apply amount = 16.83
            26/03/2009  irrigation apply amount = 17.62
            30/03/2009  irrigation apply amount = 17.04
            20/04/2009  frenchbean harvest
            20/04/2009  frenchbean endcrop
        outputfile: filename=GattonROS3.out; title=GattonROS3
          variables -> /simulations/Gatton/GattonROS4/paddock/outputfile/Variables
          events Reporting Frequency -> /simulations/Gatton/GattonROS4/paddock/outputfile/Reporting Frequency
        irrigation: same as Gatton.GattonROS1.paddock.Irrigation
    simulation GattonROS4 -> /simulations/Gatton/GattonOct08
      patchinput PatchTemp: filename=ROSPatchTempVP.met
      patchinput PatchRadn: filename=ROSPatchRadn.met
      patchinput PatchRain: filename=ROSPatchRain.met
      clock
        start_date = 24/02/2009  # Enter the start date of the simulation
        end_date = 21/04/2009  # Enter the end date of the simulation
      area paddock -> /simulations/Gatton/GattonOct08/paddock
        soil -> /simulations/Gatton/GattonOct08/paddock/Soil
          Sample Initial water
            Layer:
              Thickness (mm)  SW (mm/mm)
              150             0.28
              150             0.455
              300             0.46
        folder Manager folder -> /simulations/Gatton/GattonOct08/paddock/Manager folder
          manager Sow on a fixed date
            # Sowing criteria
            date = 25-feb  # Enter sowing date (dd-mmm)
            # Sowing parameters
            crop = frenchbean  # Enter name of crop to sow
            density = 31  # Enter sowing density (plants/m2)
            depth = 30  # Enter sowing depth (mm)
            cultivar = simba  # Enter cultivar
            row_spacing = 750  # Enter row spacing (mm)
            class = frenchbean  # Enter Crop Class
            on start_of_day:
            script: same as in Gatton.GattonOct08.paddock.Manager folder.Sow on a fixed date
          operations
            24/02/2009  irrigation apply amount = 11.05
            2/03/2009  irrigation apply amount = 10.39
            6/03/2009  irrigation apply amount = 10.44
            10/03/2009  irrigation apply amount = 12.58
            13/03/2009  irrigation apply amount = 8.050
            16/03/2009  irrigation apply amount = 12.28
            20/03/2009  irrigation apply amount = 11.14
            23/03/2009  irrigation apply amount = 16.83
            26/03/2009  irrigation apply amount = 17.62
            30/03/2009  irrigation apply amount = 17.04
            3/04/2009  irrigation apply amount = 7.196
            9/04/2009  irrigation apply amount = 4.222
            20/04/2009  frenchbean harvest
            20/04/2009  frenchbean endcrop
        outputfile: filename=GattonROS4.out; title=GattonROS4
          variables -> /simulations/Gatton/GattonOct08/paddock/outputfile/Variables
          events Reporting Frequency -> /simulations/Gatton/GattonOct08/paddock/outputfile/Reporting Frequency
        irrigation: same as Gatton.GattonROS1.paddock.Irrigation
    simulation GattonMar09 -> /simulations/Gatton/GattonOct08
      memo
        Possible salt burning after irrigation event on 25 March
        Some visible salt damage on photo from 29-apr
      area paddock -> /simulations/Gatton/GattonOct08/paddock
        folder Manager folder -> /simulations/Gatton/GattonOct08/paddock/Manager folder
          manager Sow on a fixed date
            # Sowing criteria
            date = 9-mar  # Enter sowing date (dd-mmm)
            # Sowing parameters
            crop = frenchbean  # Enter name of crop to sow
            density = 27  # Enter sowing density (plants/m2)
            depth = 50  # Enter sowing depth (mm)
            cultivar = simba  # Enter cultivar
            row_spacing = 750  # Enter row spacing (mm)
            class = frenchbean  # Enter Crop Class
            on start_of_day:
            script: same as in Gatton.GattonOct08.paddock.Manager folder.Sow on a fixed date
          operations IrrigationData
            11-mar  Irrigation apply amount = 15.3
            25-mar  Irrigation apply amount = 28.3
            31-mar  Irrigation apply amount = 23.3
            4-apr  Irrigation apply amount = 6.66
            25-apr  Irrigation apply amount = 22.66
            2-may  Irrigation apply amount = 31.6
            14-may  Irrigation apply amount = 20
            25-mar  frenchbean KillLeaf KillFraction = 0.2
            31-mar  frenchbean KillLeaf KillFraction = 0.2
        outputfile: filename=GattonMar09.out; title=GattonMar09
          variables -> /simulations/Gatton/GattonOct08/paddock/outputfile/Variables
          events Reporting Frequency -> /simulations/Gatton/GattonOct08/paddock/outputfile/Reporting Frequency
        irrigation: same as Gatton.GattonROS1.paddock.Irrigation
    memo
      	Note: If you have Observered data for some samplings but not others, then in the .out file (for the observations) you can use * or ?  for those missing values instead of using 0

      	This allows you to tell the difference between data you did not collect, and data that actually had a value of 0

      	Data with a * or ? is not plotted on the graph (hence neither is its predicted value) whereas data with 0 is.
    memo: same as Gatton.memo
  folder RedlandBay
    simulation RBExp1_15
      metfile met: filename=Redlands7980.met
      clock
        start_date = 1/03/1979  # Enter the start date of the simulation
        end_date = 30/12/1979  # Enter the end date of the simulation
      summaryfile
      area paddock
        soil: LocalName=Waco; Site=Jimbour; Region=South East Queensland
          SoilType = Black Vertosol  # Soil description
          NearestTown = Jimbour, Q 4352
          NaturalVegetation = Grassland, mainly Qld bluegrass
          InitWater Initial water
            percentmethod: percent=1; distributed=filled from top
          Water
            Layer:
              Thickness (mm)  BD (g/cc)  AirDry (mm/mm)  LL15 (mm/mm)  DUL (mm/mm)  SAT (mm/mm)
              150             1.02       0.15            0.29          0.54         0.59
              150             1.03       0.26            0.29          0.53         0.58
              300             1.02       0.29            0.29          0.54         0.59
              300             1.02       0.29            0.29          0.54         0.58
              300             1.06       0.3             0.3           0.52         0.57
              300             1.11       0.31            0.31          0.5          0.55
              300             1.12       0.32            0.32          0.5          0.55
              300             1.15       0.33            0.33          0.48         0.53
              300             1.18       0.34            0.34          0.47         0.52
              300             1.2        0.35            0.35          0.46         0.51
              300             1.25       0.36            0.36          0.44         0.49
            SoilCrop frenchbean
              Layer:
                Thickness (mm)  LL (mm/mm)  KL (/day)  XF (0-1)
                150             0.29        0.06       1
                150             0.29        0.06       1
                300             0.29        0.06       1
                300             0.29        0.06       1
                300             0.3         0.06       1
                300             0.31        0.06       1
                300             0.32        0.06       1
                300             0.33        0.06       1
                300             0.34        0.06       1
                300             0.35        0.06       1
                300             0.36        0.06       1
          SoilWat: SummerCona=3.5; SummerU=6; SummerDate=1-Nov; WinterCona=3.5; WinterU=6; WinterDate=1-Apr; DiffusConst=40; DiffusSlope=16; Salb=0.13; Cn2Bare=73; CnRed=20; CnCov=0.8
            Layer:
              Thickness (mm)  SWCON (0-1)
              150             0.3
              150             0.3
              300             0.3
              300             0.3
              300             0.3
              300             0.3
              300             0.3
              300             0.3
              300             0.3
              300             0.3
              300             0.3
          SoilOrganicMatter: RootCn=40; RootWt=200; SoilCn=12.5; EnrACoeff=7.4; EnrBCoeff=0.2
            Layer:
              Thickness (mm)  OC (Total %)  FBiom (0-1)  FInert (0-1)
              150             1.04          0.025        0.4
              150             0.89          0.02         0.6
              300             0.89          0.015        0.8
              300             0.89          0.01         0.9
              300             0.77          0.01         0.95
              300             0.45          0.01         0.95
              300             0.27          0.01         0.95
              300             0.22          0.01         0.95
              300             0.16          0.01         0.95
              300             0.13          0.01         0.95
              300             0.12          0.01         0.95
          Analysis
            Layer:
              Thickness (mm)  EC (1:5 dS/m)  PH (1:5 water)
              150             0.2            8.4
              150             0.25           8.8
              300             0.31           9
              300             0.4            9.2
              300             0.59           9.2
              300             0.84           9.1
              300             0.93           9
              300             1.01           9
              300             1.06           8.9
              300             1.05           8.9
              300             1.01           8.9
          Sample Initial nitrogen
            Layer:
              Thickness (mm)  NO3 (ppm)  NH4 (ppm)
              150             6.503      0.599004
              150             2.101      0.100001
              300             2.101      0.100001
              300             1.701      0.100001
              300             1.701      0.100001
              300             1.701      0.100001
              300             1.701      0.100001
              300             1.701      0.100001
              300             1.701      0.100001
              300             1.701      0.100001
              300             1.701      0.100001
        surfaceom surface organic matter
          PoolName = wheat  # Organic Matter pool name
          type = wheat  # Organic Matter type
          mass = 1000  # Initial surface residue (kg/ha)
          cnr = 80  # C:N ratio of initial residue
          standing_fraction = 0  # Fraction of residue standing
        fertiliser
        folder Manager folder
          manager Sow on a fixed date
            # Sowing criteria
            date = 9-mar  # Enter sowing date (dd-mmm)
            # Sowing parameters
            crop = frenchbean  # Enter name of crop to sow
            density = 15  # Enter sowing density (plants/m2)
            depth = 50  # Enter sowing depth (mm)
            cultivar = simba  # Enter cultivar
            row_spacing = 750  # Enter row spacing (mm)
            class = frenchbean  # Enter Crop Class
            on start_of_day:
            script: same as in Gatton.GattonOct08.paddock.Manager folder.Sow on a fixed date
          manager Sowing fertiliser: same as Gatton.GattonOct08.paddock.Manager folder.Sowing fertiliser
          manager Harvesting rule
            # Harvesting criteria
            crop = frenchbean  # Enter name of crop to harvest when ripe
            on end_of_day:
            script: same as in Gatton.GattonOct08.paddock.Manager folder.Harvesting rule
        micromet
          soilalbedo = 0.23
          a_interception = 0
          b_interception = 0
          c_interception = 0
          d_interception = 0
        outputfile: filename=RBExp1_15.out; title=RBExp1_15
          variables
            variable:
              dd/mm/yyyy as Date  # Date (dd/mm/yyyy)
              esw
              LeafLAI
              StructureMainStemNodeNo
              StructurePlantMainStemNodeNo
              LeafPlantAppearedGreenLeafNo
              LeafExpandedCohortNo
              LeafDeadCohortNo
              AboveGroundWt
              LeafWaterDemand
              LeafTranspiration
              LeafFW
              LeafPhotosynthesisFtValue
              LeafLiveWt
              StemLiveWt
              cover_green
              PodLiveWt
              LeafLiveWt
          events Reporting Frequency: event=end_step
        frenchbean
        irrigation
          automatic_irrigation = on
          asw_depth = 600  # Depth to which ASW is calculated. (mm)
          crit_fr_asw = 0.8  # Fraction of ASW below which irrigation is applied (0-1.0)
          irrigation_efficiency = 1  # Efficiency of the irrigation. (0-1.0)
          irrigation_allocation = off  # Allocation limits
          allocation = 0  # Allocation in ML
          default_no3_conc = 0  # Nitrate concentration (ppm N)
          default_nh4_conc = 0  # Ammonium concentration (ppm N)
          default_cl_conc = 0  # Chloride concentration (ppm Cl)
          default_no3_conc = 0  # Nitrate concentration (ppm N)
          default_nh4_conc = 0  # Ammonium concentration (ppm N)
          default_cl_conc = 0  # Chloride concentration (ppm Cl)
    simulation RBExp1_30 -> /simulations/RedlandBay/RBExp1_15
      area paddock -> /simulations/RedlandBay/RBExp1_15/paddock
        folder Manager folder -> /simulations/RedlandBay/RBExp1_15/paddock/Manager folder
          manager Sow on a fixed date
            # Sowing criteria
            date = 9-mar  # Enter sowing date (dd-mmm)
            # Sowing parameters
            crop = frenchbean  # Enter name of crop to sow
            density = 30  # Enter sowing density (plants/m2)
            depth = 50  # Enter sowing depth (mm)
            cultivar = simba  # Enter cultivar
            row_spacing = 750  # Enter row spacing (mm)
            class = frenchbean  # Enter Crop Class
            on start_of_day:
            script: same as in Gatton.GattonOct08.paddock.Manager folder.Sow on a fixed date
        outputfile: filename=RBExp1_30.out; title=RBExp1_30
          variables -> /simulations/RedlandBay/RBExp1_15/paddock/outputfile/Variables
          events Reporting Frequency -> /simulations/RedlandBay/RBExp1_15/paddock/outputfile/Reporting Frequency
    simulation RBExp1_60 -> /simulations/RedlandBay/RBExp1_15
      area paddock -> /simulations/RedlandBay/RBExp1_15/paddock
        folder Manager folder -> /simulations/RedlandBay/RBExp1_15/paddock/Manager folder
          manager Sow on a fixed date
            # Sowing criteria
            date = 9-mar  # Enter sowing date (dd-mmm)
            # Sowing parameters
            crop = frenchbean  # Enter name of crop to sow
            density = 60  # Enter sowing density (plants/m2)
            depth = 50  # Enter sowing depth (mm)
            cultivar = simba  # Enter cultivar
            row_spacing = 750  # Enter row spacing (mm)
            class = frenchbean  # Enter Crop Class
            on start_of_day:
            script: same as in Gatton.GattonOct08.paddock.Manager folder.Sow on a fixed date
        outputfile: filename=RBExp1_60.out; title=RBExp1_60
          variables -> /simulations/RedlandBay/RBExp1_15/paddock/outputfile/Variables
          events Reporting Frequency -> /simulations/RedlandBay/RBExp1_15/paddock/outputfile/Reporting Frequency
    simulation RBExp1_100 -> /simulations/RedlandBay/RBExp1_15
      area paddock -> /simulations/RedlandBay/RBExp1_15/paddock
        folder Manager folder -> /simulations/RedlandBay/RBExp1_15/paddock/Manager folder
          manager Sow on a fixed date
            # Sowing criteria
            date = 9-mar  # Enter sowing date (dd-mmm)
            # Sowing parameters
            crop = frenchbean  # Enter name of crop to sow
            density = 100  # Enter sowing density (plants/m2)
            depth = 50  # Enter sowing depth (mm)
            cultivar = simba  # Enter cultivar
            row_spacing = 750  # Enter row spacing (mm)
            class = frenchbean  # Enter Crop Class
            on start_of_day:
            script: same as in Gatton.GattonOct08.paddock.Manager folder.Sow on a fixed date
        outputfile: filename=RBExp1_100.out; title=RBExp1_100
          variables -> /simulations/RedlandBay/RBExp1_15/paddock/outputfile/Variables
          events Reporting Frequency -> /simulations/RedlandBay/RBExp1_15/paddock/outputfile/Reporting Frequency
    simulation RBExp2_15 -> /simulations/RedlandBay/RBExp1_15
      area paddock -> /simulations/RedlandBay/RBExp1_15/paddock
        folder Manager folder -> /simulations/RedlandBay/RBExp1_15/paddock/Manager folder
          manager Sow on a fixed date
            # Sowing criteria
            date = 4-sep  # Enter sowing date (dd-mmm)
            # Sowing parameters
            crop = frenchbean  # Enter name of crop to sow
            density = 15  # Enter sowing density (plants/m2)
            depth = 50  # Enter sowing depth (mm)
            cultivar = simba  # Enter cultivar
            row_spacing = 750  # Enter row spacing (mm)
            class = frenchbean  # Enter Crop Class
            on start_of_day:
            script: same as in Gatton.GattonOct08.paddock.Manager folder.Sow on a fixed date
        outputfile: filename=RBExp2_15.out; title=RBExp2_15
          variables -> /simulations/RedlandBay/RBExp1_15/paddock/outputfile/Variables
          events Reporting Frequency -> /simulations/RedlandBay/RBExp1_15/paddock/outputfile/Reporting Frequency
    simulation RBExp2_25 -> /simulations/RedlandBay/RBExp1_15
      area paddock -> /simulations/RedlandBay/RBExp1_15/paddock
        folder Manager folder -> /simulations/RedlandBay/RBExp1_15/paddock/Manager folder
          manager Sow on a fixed date
            # Sowing criteria
            date = 4-sep  # Enter sowing date (dd-mmm)
            # Sowing parameters
            crop = frenchbean  # Enter name of crop to sow
            density = 25  # Enter sowing density (plants/m2)
            depth = 50  # Enter sowing depth (mm)
            cultivar = simba  # Enter cultivar
            row_spacing = 750  # Enter row spacing (mm)
            class = frenchbean  # Enter Crop Class
            on start_of_day:
            script: same as in Gatton.GattonOct08.paddock.Manager folder.Sow on a fixed date
        outputfile: filename=RBExp2_25.out; title=RBExp2_25
          variables -> /simulations/RedlandBay/RBExp1_15/paddock/outputfile/Variables
          events Reporting Frequency -> /simulations/RedlandBay/RBExp1_15/paddock/outputfile/Reporting Frequency
    simulation RBExp2_40 -> /simulations/RedlandBay/RBExp1_15
      area paddock -> /simulations/RedlandBay/RBExp1_15/paddock
        folder Manager folder -> /simulations/RedlandBay/RBExp1_15/paddock/Manager folder
          manager Sow on a fixed date
            # Sowing criteria
            date = 4-sep  # Enter sowing date (dd-mmm)
            # Sowing parameters
            crop = frenchbean  # Enter name of crop to sow
            density = 40  # Enter sowing density (plants/m2)
            depth = 50  # Enter sowing depth (mm)
            cultivar = simba  # Enter cultivar
            row_spacing = 750  # Enter row spacing (mm)
            class = frenchbean  # Enter Crop Class
            on start_of_day:
            script: same as in Gatton.GattonOct08.paddock.Manager folder.Sow on a fixed date
        outputfile: filename=RBExp2_40.out; title=RBExp2_40
          variables -> /simulations/RedlandBay/RBExp1_15/paddock/outputfile/Variables
          events Reporting Frequency -> /simulations/RedlandBay/RBExp1_15/paddock/outputfile/Reporting Frequency
    simulation RBExp2_65 -> /simulations/RedlandBay/RBExp1_15
      area paddock -> /simulations/RedlandBay/RBExp1_15/paddock
        folder Manager folder -> /simulations/RedlandBay/RBExp1_15/paddock/Manager folder
          manager Sow on a fixed date
            # Sowing criteria
            date = 4-sep  # Enter sowing date (dd-mmm)
            # Sowing parameters
            crop = frenchbean  # Enter name of crop to sow
            density = 65  # Enter sowing density (plants/m2)
            depth = 50  # Enter sowing depth (mm)
            cultivar = simba  # Enter cultivar
            row_spacing = 750  # Enter row spacing (mm)
            class = frenchbean  # Enter Crop Class
            on start_of_day:
            script: same as in Gatton.GattonOct08.paddock.Manager folder.Sow on a fixed date
        outputfile: filename=RBExp2_65.out; title=RBExp2_65
          variables -> /simulations/RedlandBay/RBExp1_15/paddock/outputfile/Variables
          events Reporting Frequency -> /simulations/RedlandBay/RBExp1_15/paddock/outputfile/Reporting Frequency
    simulation RBExp2_100 -> /simulations/RedlandBay/RBExp1_15
      area paddock -> /simulations/RedlandBay/RBExp1_15/paddock
        folder Manager folder -> /simulations/RedlandBay/RBExp1_15/paddock/Manager folder
          manager Sow on a fixed date
            # Sowing criteria
            date = 4-sep  # Enter sowing date (dd-mmm)
            # Sowing parameters
            crop = frenchbean  # Enter name of crop to sow
            density = 100  # Enter sowing density (plants/m2)
            depth = 50  # Enter sowing depth (mm)
            cultivar = simba  # Enter cultivar
            row_spacing = 750  # Enter row spacing (mm)
            class = frenchbean  # Enter Crop Class
            on start_of_day:
            script: same as in Gatton.GattonOct08.paddock.Manager folder.Sow on a fixed date
        outputfile: filename=RBExp2_100.out; title=RBExp2_100
          variables -> /simulations/RedlandBay/RBExp1_15/paddock/outputfile/Variables
          events Reporting Frequency -> /simulations/RedlandBay/RBExp1_15/paddock/outputfile/Reporting Frequency
  folder Yanco
    simulation Yanco
      metfile met: filename=Yanco0809.met
      clock
        start_date = 9/2/2009  # Enter the start date of the simulation
        end_date = 30/4/2009  # Enter the end date of the simulation
      summaryfile
      area paddock
        soil: LocalName=Waco; Site=Jimbour; Region=South East Queensland; Longitude=0
          NearestTown = Jimbour, Q 4352
          NaturalVegetation = Grassland, mainly Qld bluegrass
          Latitude = 0  # Latitude (WGS84)
          Water
            Layer:
              Thickness (mm)  BD (g/cc)  AirDry (mm/mm)  LL15 (mm/mm)  DUL (mm/mm)  SAT (mm/mm)
              100             1.682      0.068           0.12          0.26         0.335
              100             1.6        0.09            0.12          0.28         0.365
              100             1.524      0.108           0.12          0.299        0.395
              300             1.422      0.148           0.2           0.354        0.434
              300             1.523      0.148           0.31          0.314        0.395
              300             1.555      0.148           0.32          0.327        0.383
              300             1.461      0.148           0.32          0.328        0.419
            SoilCrop frenchbean
              Layer:
                Thickness (mm)  LL (mm/mm)  KL (/day)  XF (0-1)
                100             0.12        0.2        1
                100             0.12        0.2        1
                100             0.12        0.2        1
                300             0.148       0.2        1
                300             0.148       0          0
                300             0.148       0          0
                300             0.148       0          0
          SoilWat: SummerCona=3.5; SummerU=10; SummerDate=1-Nov; WinterCona=3.5; WinterU=10; WinterDate=1-Apr; DiffusConst=80; DiffusSlope=35; Salb=0.13; Cn2Bare=78; CnRed=20; CnCov=0.8
            Layer:
              Thickness (mm)  SWCON (0-1)
              100             0.3
              100             0.3
              100             0.3
              300             0.3
              300             0.3
              300             0.3
              300             0.3
          SoilOrganicMatter: RootCn=40; RootWt=200; SoilCn=12.5; EnrACoeff=7.4; EnrBCoeff=0.2
            Layer:
              Thickness (mm)  OC (Total %)  FBiom (0-1)  FInert (0-1)
              100             1.04          0.025        0.4
              100             0.89          0.02         0.6
              100             0.89          0.015        0.8
              300             0.89          0.01         0.9
              300             0.77          0.01         0.95
              300             0.45          0.01         0.95
              300             0.45          0.01         0.95
          Analysis
            Layer:
              Thickness (mm)  EC (1:5 dS/m)  PH (1:5 water)
              100             0.2            8.4
              100             0.25           8.8
              100             0.31           9
              300             0.4            9.2
              300             0.59           9.2
              300             0.84           9.1
              300             0.84           9.1
          Sample Initial nitrogen
            Layer:
              Thickness (mm)  NO3 (ppm)  NH4 (ppm)
              100             6.50306    0.598958
              100             2.10102    0.099993
              100             2.10102    0.099993
              300             1.70102    0.099993
              300             1.70102    0.099993
              300             1.70102    0.099993
              300             1.70102    0.099993
          Sample Initial water
            Layer:
              Thickness (mm)  SW (mm/mm)
              100             0.07
              100             0.09
              100             0.12
              300             0.2
              300             0.31
              300             0.32
              300             0.32
        surfaceom surface organic matter
          PoolName = wheat  # Organic Matter pool name
          type = wheat  # Organic Matter type
          mass = 10  # Initial surface residue (kg/ha)
          cnr = 80  # C:N ratio of initial residue
          standing_fraction = 0  # Fraction of residue standing
        fertiliser
        folder Manager folder
          operations
            12-feb  fertiliser apply amount = 49, type = urea_n, depth = 50
            16-feb  frenchbean sow population =25, depth = 50, cultivar = simba, MaxCover = 1.0, BudNumber = 1, row_spacing = 750, crop_class = frenchbean
            27-mar  fertiliser apply amount = 180, type = urea_n, depth = 50
            28-apr  frenchbean harvest
            28-apr  frenchbean EndCrop
            16/02/2009  Irrigation apply amount = 25.56
            17/02/2009  Irrigation apply amount = 25.56
            23/02/2009  Irrigation apply amount = 19.17
            24/02/2009  Irrigation apply amount = 12.78
            26/02/2009  Irrigation apply amount = 12.78
            27/02/2009  Irrigation apply amount = 25.56
            2/03/2009  Irrigation apply amount = 25.56
            9/03/2009  Irrigation apply amount = 12.78
            11/03/2009  Irrigation apply amount = 19.17
            13/03/2009  Irrigation apply amount = 38.34
            19/03/2009  Irrigation apply amount = 25.56
            20/03/2009  Irrigation apply amount = 25.56
            24/03/2009  Irrigation apply amount = 25.56
            27/03/2009  Irrigation apply amount = 38.34
            29/03/2009  Irrigation apply amount = 12.78
            30/03/2009  Irrigation apply amount = 12.78
            1/04/2009  Irrigation apply amount = 25.56
            3/04/2009  Irrigation apply amount = 25.56
            7/04/2009  Irrigation apply amount = 19.17
            10/04/2009  Irrigation apply amount = 19.17
            13/04/2009  Irrigation apply amount = 19.17
            16/04/2009  Irrigation apply amount = 19.17
            19/04/2009  Irrigation apply amount = 19.17
            22/04/2009  Irrigation apply amount = 19.17
            24/04/2009  Irrigation apply amount = 19.17
            27/04/2009  Irrigation apply amount = 19.17
            9-feb  'Soil Water' set eo_source = pan
          manager Calcs
            on end_of_day:
```
SWtot = sw_dep(1) + sw_dep(2) + sw_dep(3)
```
        micromet
          soilalbedo = 0.13
          a_interception = 0
          b_interception = 0
          c_interception = 0.1
          d_interception = 0
        outputfile: filename=Yanco.out; title=Yanco
          variables
            variable:
              dd/mm/yyyy as Date  # Date (dd/mm/yyyy)
              es
              runoff
              interception
              esw
              LeafLAI
              StructureMainStemNodeNo
              StructurePlantMainStemNodeNo
              LeafPlantAppearedGreenLeafNo
              LeafExpandedCohortNo
              LeafDeadCohortNo
              AboveGroundWt
              LeafWaterDemand
              LeafTranspiration
              LeafFW
              LeafFn
              LeafPhotosynthesisFtValue
              LeafPhotosynthesisFvpdValue
              LeafLiveWt
              StemLiveWt
              cover_green
              PodLiveWt
              LeafLiveWt
              StageCodeValue
              sw_dep(1) as sw10
              sw_dep(2) as sw20
              sw_dep(3) as sw30
              RootDepth
              RootWaterSupply
              PodSize
              PodNumber
              eo
              pan
              no3()
              nh4()
              urea()
              AboveGroundN
              SWtot
              irrigation
              rain
          events Reporting Frequency: event=end_step
        frenchbean
        irrigation: same as Gatton.GattonROS1.paddock.Irrigation
  folder Griffith
    simulation Griffith76T
      metfile met: filename=Griffith7679.met
      clock
        start_date = 1/12/1976  # Enter the start date of the simulation
        end_date = 10/02/1977  # Enter the end date of the simulation
      summaryfile
      area paddock
        soil: LocalName=Waco; Site=Jimbour; Region=South East Queensland
          SoilType = Black Vertosol  # Soil description
          NearestTown = Jimbour, Q 4352
          NaturalVegetation = Grassland, mainly Qld bluegrass
          InitWater Initial water
            percentmethod: percent=1; distributed=filled from top
          Water
            Layer:
              Thickness (mm)  BD (g/cc)  AirDry (mm/mm)  LL15 (mm/mm)  DUL (mm/mm)  SAT (mm/mm)
              150             1.02       0.15            0.29          0.54         0.59
              150             1.03       0.26            0.29          0.53         0.58
              300             1.02       0.29            0.29          0.54         0.59
              300             1.02       0.29            0.29          0.54         0.58
              300             1.06       0.3             0.3           0.52         0.57
              300             1.11       0.31            0.31          0.5          0.55
              300             1.12       0.32            0.32          0.5          0.55
              300             1.15       0.33            0.33          0.48         0.53
              300             1.18       0.34            0.34          0.47         0.52
              300             1.2        0.35            0.35          0.46         0.51
              300             1.25       0.36            0.36          0.44         0.49
            SoilCrop frenchbean
              Layer:
                Thickness (mm)  LL (mm/mm)  KL (/day)  XF (0-1)
                150             0.29        0.06       1
                150             0.29        0.06       1
                300             0.29        0.06       1
                300             0.54        0.06       0
                300             0.52        0.06       0
                300             0.5         0.06       0
                300             0.5         0.06       0
                300             0.48        0.06       0
                300             0.47        0.06       0
                300             0.46        0.06       0
                300             0.44        0.06       0
          SoilWat: same as RedlandBay.RBExp1_15.paddock.Soil.SoilWat
          SoilOrganicMatter: same as RedlandBay.RBExp1_15.paddock.Soil.SoilOrganicMatter
          Analysis: same as RedlandBay.RBExp1_15.paddock.Soil.Analysis
          Sample Initial nitrogen: same as RedlandBay.RBExp1_15.paddock.Soil.Initial nitrogen
        surfaceom surface organic matter
          PoolName = wheat  # Organic Matter pool name
          type = wheat  # Organic Matter type
          mass = 1000  # Initial surface residue (kg/ha)
          cnr = 80  # C:N ratio of initial residue
          standing_fraction = 0  # Fraction of residue standing
        fertiliser
        folder Manager folder
          operations
            1-dec  frenchbean sow population =14.4, depth = 50, cultivar = simba, MaxCover = 1.0, BudNumber = 1, row_spacing = 750, crop_class = frenchbean
            2-feb  frenchbean harvest  (end_of_day)
            2-feb  frenchbean EndCrop  (end_of_day)
        micromet
          soilalbedo = 0.23
          a_interception = 0
          b_interception = 0
          c_interception = 0
          d_interception = 0
        outputfile: filename=Griffith76T.out; title=Griffith76T
          variables: same as RedlandBay.RBExp1_15.paddock.outputfile.Variables
          events Reporting Frequency: event=end_step
        frenchbean
        irrigation
          automatic_irrigation = on
          asw_depth = 600  # Depth to which ASW is calculated. (mm)
          crit_fr_asw = 0.9  # Fraction of ASW below which irrigation is applied (0-1.0)
          irrigation_efficiency = 1  # Efficiency of the irrigation. (0-1.0)
          irrigation_allocation = off  # Allocation limits
          allocation = 0  # Allocation in ML
          default_no3_conc = 0  # Nitrate concentration (ppm N)
          default_nh4_conc = 0  # Ammonium concentration (ppm N)
          default_cl_conc = 0  # Chloride concentration (ppm Cl)
          default_no3_conc = 0  # Nitrate concentration (ppm N)
          default_nh4_conc = 0  # Ammonium concentration (ppm N)
          default_cl_conc = 0  # Chloride concentration (ppm Cl)
    simulation Griffith77T -> /simulations/Griffith/Griffith76T
      clock
        start_date = 11/11/1977  # Enter the start date of the simulation
        end_date = 20/01/1978  # Enter the end date of the simulation
      area paddock -> /simulations/Griffith/Griffith76T/paddock
        folder Manager folder -> /simulations/Griffith/Griffith76T/paddock/Manager folder
          operations
            11-nov  frenchbean sow population =22.7, depth = 50, cultivar = simba, MaxCover = 1.0, BudNumber = 1, row_spacing = 750, crop_class = frenchbean
            20-jan  frenchbean harvest  (end_of_day)
            20-jan  frenchbean EndCrop  (end_of_day)
        outputfile: filename=Griffith77T.out; title=Griffith77T
          variables -> /simulations/Griffith/Griffith76T/paddock/outputfile/Variables
          events Reporting Frequency -> /simulations/Griffith/Griffith76T/paddock/outputfile/Reporting Frequency
    memo: same as Gatton.memo
  memo: same as Gatton.memo
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