folder Simulations: version=34
  simulation GenericPlantTest
    metfile met: filename=%apsim%\Examples\MetFiles\lincoln.met
    clock
      start_date = 20/10/2003  # Enter the start date of the simulation
      end_date = 23/05/2004  # Enter the end date of the simulation
    summaryfile
    area paddock
      fertiliser
      surfaceom surface organic matter
        PoolName = wheat  # Organic Matter pool name
        type = wheat  # Organic Matter type
        mass = 2000  # Initial surface residue (kg/ha)
        cnr = 80  # C:N ratio of initial residue
        standing_fraction = 0  # Fraction of residue standing
      folder Manager folder
        manager Harvesting rule
          # Harvesting criteria
          crop = barley2  # Enter name of crop to harvest when ripe
          on end_of_day:
```
        if [crop].PlantStatus <> 'out' then
           if [crop].PhenologyCurrentPhaseName = 'maturity' or [crop].PlantStatus = 'dead' then
              [crop]  harvest
              [crop]  endcrop
           endif
        endif
```
        operations
          20/10/2003  fertiliser apply amount= 500 (kg/ha), type= urea_N (), depth= 10 (mm)
          25/11/2003  fertiliser apply amount= 69 (kg/ha), type= urea_N (), depth= 10 (mm)
          26/11/2003  irrigation apply amount= 15 (mm)
          4/12/2003  irrigation apply amount= 50 (mm)
          16/12/2003  irrigation apply amount= 15 (mm)
          22/12/2003  irrigation apply amount= 50 (mm)
          30/12/2003  irrigation apply amount= 50 (mm)
          8/1/2004  irrigation apply amount= 50 (mm)
          21/1/2004  irrigation apply amount= 50 (mm)
          31/1/2004  irrigation apply amount= 50 (mm)
          27/2/2004  irrigation apply amount= 25 (mm)
          25/12/2003  fertiliser apply amount= 0 (kg/ha), type= urea_N (), depth= 10 (mm)
        irrigation
          automatic_irrigation = on
          asw_depth = 600  # Depth to which ASW is calculated. (mm)
          crit_fr_asw = 0.5  # Fraction of ASW below which irrigation is applied (0-1.0)
          irrigation_efficiency = 1  # Efficiency of the irrigation. (0-1.0)
          irrigation_allocation = off  # Allocation limits
          allocation = 0  # Allocation in ML
          default_no3_conc = 0  # Nitrate concentration (ppm N)
          default_nh4_conc = 0  # Ammonium concentration (ppm N)
          default_cl_conc = 0  # Chloride concentration (ppm Cl)
          default_no3_conc = 0  # Nitrate concentration (ppm N)
          default_nh4_conc = 0  # Ammonium concentration (ppm N)
          default_cl_conc = 0  # Chloride concentration (ppm Cl)
        manager Sowing Rule
          sowingdate = 20/10/2003
          emergence_date = 12/11/2003
          row_width = 150  # Row width (mm)
          population = 300  # Emerged population (/m2)
          stem_number = 1  # Stem number per plant
          cultivar = Dash
          sowing_depth = 30  # Sowing depth (mm)
          Harvest_date = 03/06/2000
          on start_of_day:
```
if today = date('[SowingDate]') then
   GenericPlant sow population = [population], depth = [sowing_depth], cultivar = [cultivar], maxcover = 1.0, budnumber = [stem_number], row_spacing = [row_width], crop_class = plant  
 endif
```
          on Init:
```
Plant_population = 0
```
      Soil Templeton: Latitude=0; Longitude=0
        Analysis
          Thickness  PH   ParticleSizeClay
          100        6.6  30
          200        6.2  30
          300        5.7  30
          300        5.5  30
          300        5.5  30
          300        5.5  30
        InitialWater Initial water: FractionFull=1.00; PercentMethod=EvenlyDistributed
        Water
          Thickness  BD   AirDry  LL15  DUL   SAT
          100        1.2  0.08    0.16  0.33  0.5
          200        1.2  0.16    0.16  0.33  0.5
          300        1.2  0.15    0.15  0.31  0.44
          300        1.2  0.13    0.13  0.27  0.46
          300        1.2  0.15    0.15  0.3   0.44
          300        1.2  0.15    0.15  0.3   0.44
          SoilCrop GenericPlant: LL=[0.13, 0.13, 0.1, 0.08, 0.11, 0.11]; KL=[0.06, 0.06, 0.06, 0.06, 0.06, 0.06]; XF=[1, 1, 1, 1, 1, 1]
        SoilWater: SummerCona=4.4; SummerU=9; SummerDate=1-Nov; WinterCona=4.4; WinterU=9; WinterDate=1-Apr; DiffusConst=88; DiffusSlope=35.4; Salb=0.18; CN2Bare=68; CNRed=20; CNCov=0.8; Slope=0; DischargeWidth=0; CatchmentArea=0; MaxPond=0; Thickness=[100, 200, 300, 300, 300, 300]; SWCON=[0.55, 0.55, 0.55, 0.55, 0.55, 0.55]
        SoilOrganicMatter: RootCN=30; RootWt=3000; SoilCN=11.5; EnrACoeff=7.4; EnrBCoeff=0.2
          Thickness  OC    FBiom  FInert
          100        3.5   0.025  0.3
          200        2.5   0.025  0.4
          300        1.2   0.015  0.75
          300        1.03  0.01   0.9
          300        0.47  0.01   0.96
          300        0.47  0.01   0.96
        Sample Initial nitrogen: NO3Units=kgha; NH4Units=kgha
          Thickness  NO3      NH4
          100        140      0.1
          200        30       0.1
          300        14       0.1
          300        14       0.1
          300        1.38889  0.1
          300        1.38889  0.1
      micromet
        soilalbedo = 0.23
        a_interception = 0
        b_interception = 0
        c_interception = 0
        d_interception = 0
        ini: filename=%apsim%\Model\MicroMet_NZ_adjustment.xml
      SoilTemp2 Soil Temperature (dotNET)
        maxt_time_default = 14  # hours
        bound_layer_cond_source = calc  # boundary layer conductance source (calc/constant)
        bound_layer_cond = 20  # boundary layer conductance
        boundary_layer_conductance_iterations = 1  # Number of iterations to calc boundary layer conductance (0-10)
        net_radn_source = calc  # net radiation source (calc/eos)
        default_wind_speed = 3  # m/s
        default_altitude = 18  # default altitude (m) 275m (700 ft) is approx 980 hPa
        default_instrum_height = 1.2  # default instrument height for wind and temperature (m)
        bare_soil_height = 57  # height of bare soil (mm)
      GenericPlant
      folder
        outputfile: filename=GenericPlantTest.out; title=GenericPlantTest
          variables
            variable:
              dd/mm/yyyy as date
              TotalWt
              RootLiveWt
              LeafLiveWt
              ProductLiveWt
              PhenologyAccumulatedThermalTimeValue
          events Reporting Frequency: event=daily
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