folder simulations: version=32
  simulation Input test 1
    clock
      start_date = 1/1/2009  # Enter the start date of the simulation
      end_date = 31/12/2009  # Enter the end date of the simulation
    summaryfile
    metfile met: filename=input1.met
    outputfile: filename=Input test 1.out; title=Input test 1; events=My Variables Events
      variables My Variables: variable=dd/mm/yyyy as Date  # Date (dd/mm/yyyy)
  simulation Input test 2
    clock
      start_date = 1/1/2009  # Enter the start date of the simulation
      end_date = 31/12/2009  # Enter the end date of the simulation
    summaryfile
    metfile met: filename=input2.met
    outputfile: filename=Input test 2.out; title=Input test 2; events=My Variables Events
      variables My Variables: variable=dd/mm/yyyy as Date  # Date (dd/mm/yyyy)
