folder Biloela: version=19
  shared
  shared
  shared
  simulation Biloela05
    clock
      start_date = 1/01/2006  # Select the start date of the simulation
      end_date = 31/05/2006  # Select the end date of the simulation
    summaryfile: filename=Sorghum_Biloela.sum
    metfile met: filename=Biloela.met
    area paddock
      folder Manager folder
        manager Sow SkipRow on a fixed date
          category =  # Sowing criteria
          date = 26/01/2006  # Enter sowing date (d/m/yyyy)
          category =  # Sowing parameters
          crop = Sorghum  # Enter name of crop to sow
          density = 6.5  # Enter sowing density (plants/m2)
          depth = 30  # Enter sowing depth (mm)
          cultivar = Buster  # Enter cultivar
          row_spacing = 1  # Enter row spacing (m)
          RowConfiguration = solid  # Enter skip row configuration
          ftn = 0.7  # Enter Fertile Tiller No.
          on start_of_day:
```
     if (biomass > 0) then
         harvIndx = yield / biomass
      else
         harvIndx = 0
      endif


      if (day > 152) then
        current_season = year
      else
        current_season = year -1
      endif

            if (paddock_is_fallow() = 1 and today = date('[date]')) then
              season = current_season
              SowDay = day
               SowYear = year
ftn = 0

              [crop] sow plants =[density], sowing_depth = [depth], cultivar = [cultivar], row_spacing = [row_spacing], skip = [RowConfiguration], tiller_no_fertile = [ftn] ()
            endif
            if (paddock_is_fallow() = 0) then
               outputfile do_output
            endif
```
        manager Harvesting rule
          crop = Sorghum  # Enter name of crop to harvest when ripe
          on end_of_day:
```
           if [crop].StageName = 'harvest_ripe' or [crop].plant_status = 'dead' then
              [crop]  harvest
              [crop]  end_crop
           endif
```
      Soil Biloela (avg): region=Central Queensland; site=Banana; nearesttown=Banana, Q 4702; comment=oc and ph estimated; U=6; Cona=3.5; Salb=0.13; DiffusConst=40; DiffusSlope=16; CN2Bare=73; CNRed=20; CNCov=0.8; RootCN=40; RootWT=200; SoilCN=12.5; EnrACoeff=7.4; EnrBCoeff=0.2
        DataSource=Data provided by D. Lack, Queensland Department of Primary Industries
        profile
          layer:
            thickness  bd     ll15   airdry  dul    sat    swcon  fbiom  finert  oc     ph  ll Sorghum  kl Sorghum  xf Sorghum
            150        1.260  0.150  0.075   0.450  0.490  0.300  0.030  0.400   1.240  7   0.150       0.100       1
            150        1.290  0.230  0.207   0.440  0.480  0.300  0.020  0.600   1.240  7   0.230       0.100       1
            300        1.320  0.250  0.250   0.430  0.470  0.300  0.010  0.800   1.250  7   0.250       0.100       1
            300        1.330  0.250  0.250   0.430  0.470  0.300  0.010  0.900   1.100  7   0.250       0.080       1
            300        1.400  0.230  0.230   0.400  0.440  0.300  0.010  0.950   0.710  7   0.230       0.060       1
            300        1.570  0.270  0.270   0.340  0.380  0.300  0.010  0.950   0.340  7   0.270       0.040       1
            300        1.620  0.300  0.300   0.330  0.360  0.300  0.010  0.950   0.260  7   0.300       0.020       1
        InitWater
          PercentMethod: Percent=1.00; Distributed=Filled from top
        InitNitrogen
          profile
            layer:
              no3     nh4    thickness
              30.198  0.600  150
              9.756   0.100  150
              9.756   0.100  300
              7.898   0.100  300
              7.898   0.100  300
              7.898   0.100  300
              7.898   0.100  300
      manager Logic
        on end_of_day:
```
  if (sw_demand > 0) then
     sdr = sw_supply / sw_demand
     if (sdr > 1) then
        sdr = 1
     endif
  else
     sdr = 1
  endif
```
      outputfile
        variables
          variables: dd/mm/yyyy as date, DaysAfterSowing, sw_dep(), ll15_dep(), dul_dep(), WaterSD, Biomass, yield, lai, GrainNo, stage, biomass_wt, GrainGreenWt, RachisGreenWt, StemGreenWt, GrainSize, LeafSenescedWt, LeafGreenWt, TillerNoFertile
      sorghum
