folder Dysart: version=19
  simulation Dysart_Buster04
    clock
      start_date = 21/01/2005  # Select the start date of the simulation
      end_date = 30/05/2005  # Select the end date of the simulation
    summaryfile: filename=Sorghum_Dysart_Buster_S_100RS.sum
    metfile met: filename=C:\People\IanBroad\2004\Dysart\Dysart.met
    area paddock
      folder Manager folder
        manager Sow SkipRow on a fixed date
          category =  # Sowing criteria
          date = 21/01/2005  # Enter sowing date (d/m/yyyy)
          category =  # Sowing parameters
          crop = Sorghum  # Enter name of crop to sow
          density = 5.8  # Enter sowing density (plants/m2)
          depth = 30  # Enter sowing depth (mm)
          cultivar = Buster  # Enter cultivar
          row_spacing = 1  # Enter row spacing (m)
          RowConfiguration = solid  # Enter skip row configuration
          ftn = 0  # Enter Fertile Tiller No.
          on start_of_day:
```
     if (biomass > 0) then
         harvIndx = yield / biomass
      else
         harvIndx = 0
      endif

      if (day > 152) then
        current_season = year
      else
        current_season = year -1
      endif

            if (paddock_is_fallow() = 1 and today = date('[date]')) then
              season = current_season
              SowDay = day
               SowYear = year
ftn = 0

              [crop] sow plants =[density], sowing_depth = [depth], cultivar = [cultivar], row_spacing = [row_spacing], skip = [RowConfiguration], tiller_no_fertile = [ftn] ()
            endif
            if (paddock_is_fallow() = 0) then
               Outputfile do_output
            endif
```
        manager Harvesting rule
          category =  # Harvesting criteria
          crop = Sorghum  # Enter name of crop to harvest when ripe
          on end_of_day:
```
           if [crop].StageName = 'harvest_ripe' or [crop].plant_status = 'dead' then
              [crop]  harvest
              [crop]  end_crop
           endif
```
      soil Dysart2004: Site=Dysart; Region=Central Queensland; LocalName=Dysart; SoilType=Dysart; NearestTown=Unknown; NaturalVegetation=Unknown; Cona=3.5; DiffusConst=40; DiffusSlope=16; U=6; Salb=0.11; Cn2Bare=85; CnRed=0.8; CnCov=0.2; CnCanopyFact=0.2; RootCn=45; RootWt=1000; SoilCn=14.5; EnrACoeff=7.4; EnrBCoeff=0.2
        profile
          layer:
            thickness  bd     ll15   airdry  dul    sat    swcon  oc     ph     fbiom  finert  ll Sorghum  kl Sorghum  xf Sorghum
            150        1.140  0.300  0.190   0.480  0.540  0      1.560  7.600  0.050  0.390   0.300       0.070       1.000
            150        1.170  0.310  0.190   0.470  0.530  0      0.450  8      0.020  0.470   0.310       0.070       1.000
            300        1.180  0.320  0.210   0.460  0.520  0      0.320  8.200  0.010  0.520   0.320       0.070       1.000
            300        1.210  0.350  0.240   0.450  0.510  0      0.290  8.400  0.010  0.620   0.350       0.050       1.000
            300        1.270  0.360  0.280   0.430  0.490  0      0.230  8.400  0.010  0.740   0.360       0.050       1.000
            300        1.350  0.380  0.310   0.400  0.460  0      0.270  8.300  0.010  0.830   0.380       0.040       1.000
            300        1.380  0.390  0.290   0.400  0.450  0      0.300  8.300  0.010  0.930   0.390       0.040       1.000
        InitWater
          profile
            layer:
              sw     thickness
              0.460  150
              0.450  150
              0.440  300
              0.420  300
              0.410  300
              0.390  300
              0.380  300
        InitNitrogen
          profile
            layer:
              no3     nh4    thickness
              20.914  0.100  150
              34.151  0.100  150
              13.679  0.100  300
              8.396   0.100  300
              5.283   0.100  300
              1.981   0.100  300
              7.358   0.100  300
      manager Logic
        on init:
```
 sdr = 1
```
        on end_of_day:
```
  if (sw_demand > 0) then
     sdr = sw_supply / sw_demand
     if (sdr > 1) then
        sdr = 1
     endif
  else
     sdr = 1
  endif
```
      irrigation
        automatic_irrigation = off  # switch
        asw_depth = 600.0  # Depth to which ASW is calculated. (mm)
        crit_fr_asw = 0.5  # Fraction of ASW below which irrigation is applied (0-1.0)
        irrigation_efficiency = 1.0  # Efficiency of the irrigation. (0-1.0)
        default_no3_conc = 0.0  # Nitrate concentration (ppm N)
        default_nh4_conc = 0.0  # Ammonium concentration (ppm N)
        default_cl_conc = 0.0  # Chloride concentration (ppm Cl)
      fertiliser
      operations
      sorghum
      outputfile
        variables
          variables: dd/mm/yyyy as date, DaysAfterSowing, sw_dep(), ll15_dep(), dul_dep(), WaterSD, Biomass, yield, lai, GrainNo, stage, biomass_wt, GrainGreenWt, RachisGreenWt, StemGreenWt, GrainSize, LeafSenescedWt, LeafGreenWt, TillerNoFertile
