folder Moree: version=19
  shared
  shared
  shared
  shared
  simulation Moree05
    clock
      start_date = 1/12/2005  # Select the start date of the simulation
      end_date = 30/04/2006  # Select the end date of the simulation
    summaryfile: filename=MoreeAV.sum
    metfile met: filename=Moree.met
    area paddock
      outputfile: events=My Variables Events
        variables
          variables: dd/mm/yyyy as date, DaysAfterSowing, sw_dep(), ll15_dep(), dul_dep(), WaterSD, Biomass, yield, lai, GrainNo, stage, biomass_wt, GrainGreenWt, RachisGreenWt, StemGreenWt, GrainSize, LeafSenescedWt, LeafGreenWt, TillerNoFertile
      folder Manager folder
        manager Sow SkipRow on a fixed date
          category =  # Sowing criteria
          date = 7/12/2005  # Enter sowing date (d/m/yyyy)
          category =  # Sowing parameters
          crop = Sorghum  # Enter name of crop to sow
          density = 14  # Enter sowing density (plants/m2)
          depth = 30  # Enter sowing depth (mm)
          cultivar = Buster  # Enter cultivar
          row_spacing = 0.75  # Enter row spacing (m)
          RowConfiguration = solid  # Enter skip row configuration
          ftn = 0.4  # Enter Fertile Tiller No.
          on start_of_day:
```
    if (biomass > 0) then
         harvIndx = yield / biomass
      else
         harvIndx = 0
      endif


      if (day > 152) then
        current_season = year
      else
        current_season = year -1
      endif

            if (paddock_is_fallow() = 1 and today = date('[date]')) then
              season = current_season
              SowDay = day
               SowYear = year
ftn = 0

              [crop] sow plants =[density], sowing_depth = [depth], cultivar = [cultivar], row_spacing = [row_spacing], skip = [RowConfiguration], tiller_no_fertile = [ftn] ()
            endif
            if (paddock_is_fallow() = 0) then
               outputfile do_output
         
            endif
```
        manager Harvesting rule
          crop = Sorghum  # Enter name of crop to harvest when ripe
          on end_of_day:
```
           if [crop].StageName = 'harvest_ripe' or [crop].plant_status = 'dead' then
              [crop]  harvest
              [crop]  end_crop
           endif
```
      Soil Moree (avg): region=New South Wales; site=Croppa Creek; SoilType=Grey Vertosol; nearesttown=Croppa Creek, NSW 2411; comment=oc and ph estimated; naturalvegetation=Brigalow; U=6; Cona=3.5; Salb=0.13; DiffusConst=40; DiffusSlope=16; CN2Bare=73; CNRed=20; CNCov=0.8; RootCN=40; RootWT=200; SoilCN=12.5; EnrACoeff=7.4; EnrBCoeff=0.2
        profile
          layer:
            thickness  bd     ll15   airdry  dul    sat    swcon  fbiom  finert  oc     ph  kl Sorghum  xf Sorghum  ll Sorghum  ll wheat  kl wheat  xf wheat  ll Chickpea  kl Chickpea  xf Chickpea  ll Fababean  kl Fababean  xf Fababean  ll Cotton  kl Cotton  xf Cotton
            150        1.300  0.260  0.165   0.430  0.480  0.300  0.020  0.600   1.200  7   0.080       1.000       0.260       0.340     0.100     1         0.420        0.100        1            0.430        0.100        1            0.330      0.100      1
            150        1.270  0.240  0.216   0.440  0.490  0.300  0.010  0.800   1.200  7   0.080       1.000       0.240       0.240     0.100     1         0.240        0.100        1            0.240        0.100        1            0.240      0.100      1
            300        1.290  0.240  0.240   0.430  0.480  0.300  0.010  0.900   1.200  7   0.080       1.000       0.240       0.240     0.080     1         0.240        0.080        1            0.240        0.080        1            0.240      0.100      1
            300        1.270  0.250  0.250   0.440  0.490  0.300  0.010  0.950   1.100  7   0.080       1.000       0.250       0.250     0.060     1         0.280        0.060        1            0.290        0.060        1            0.250      0.100      1
            300        1.280  0.270  0.270   0.440  0.490  0.300  0.010  0.950   0.700  7   0.060       1.000       0.270       0.270     0.040     1         0.300        0.040        1            0.300        0.040        1            0.270      0.090      1
            300        1.240  0.290  0.290   0.450  0.500  0.300  0.010  0.950   0.300  7   0.040       1.000       0.290       0.290     0.020     1         0.340        0.020        1            0.340        0.020        1            0.290      0.070      1
            300        1.250  0.300  0.300   0.450  0.500  0.300  0.030  0.400   0.300  7   0.020       1.000       0.300       0.300     0.010     1         0.380        0.010        1            0.380        0.010        1            0.300      0.050      1
        InitWater
          PercentMethod: Percent=1.00; Distributed=Filled from top
        InitNitrogen
          profile
            layer:
              no3      nh4       thickness
              19.888   0.100012  150
              20.357   0.100012  150
              10.855   0.100012  300
              11.027   0.100012  300
              7.57499  0.100012  300
              8.68699  0.100012  300
              10.503   0.600072  300
      manager Logic
        on end_of_day:
```
  if (sw_demand > 0) then
     sdr = sw_supply / sw_demand
     if (sdr > 1) then
        sdr = 1
     endif
  else
     sdr = 1
  endif
```
      sorghum
      fertiliser
