folder Dalby Box Skip Row: version=19
  simulation DalbyBoxDoubleHD04
    clock
      start_date = 26/11/2004  # Select the start date of the simulation
      end_date = 31/3/2005  # Select the end date of the simulation
    summaryfile: filename=Sorghum_Dalby Box Skip Row_MR Buster_DS_HD.sum
    metfile met: filename=Dalby Box Skip Row.met
    area paddock
      folder Manager folder
        manager Sow SkipRow on a fixed date
          category =  # Sowing criteria
          date = 26/11/2004  # Enter sowing date (d/m/yyyy)
          category =  # Sowing parameters
          crop = Sorghum  # Enter name of crop to sow
          density = 5  # Enter sowing density (plants/m2)
          depth = 30  # Enter sowing depth (mm)
          cultivar = Buster  # Enter cultivar
          row_spacing = 1  # Enter row spacing (m)
          RowConfiguration = double  # Enter skip row configuration
          ftn = 0  # Enter Fertile Tiller No.
          on start_of_day:
```
     if (biomass > 0) then
         harvIndx = yield / biomass
      else
         harvIndx = 0
      endif

      if (day > 152) then
        current_season = year
      else
        current_season = year -1
      endif

            if (paddock_is_fallow() = 1 and today = date('[date]')) then
              season = current_season
              SowDay = day
               SowYear = year
ftn = 0

              [crop] sow plants =[density], sowing_depth = [depth], cultivar = [cultivar], row_spacing = [row_spacing], skip = [RowConfiguration], tiller_no_fertile = [ftn] ()
            endif
            if (paddock_is_fallow() = 0) then
               outputfile do_output
            endif
```
        manager Harvesting rule
          crop = Sorghum  # Enter name of crop to harvest when ripe
          on end_of_day:
```
           if [crop].StageName = 'harvest_ripe' or [crop].plant_status = 'dead' then
              [crop]  harvest
              [crop]  end_crop
           endif
```
      manager Logic
        on init:
```
 sdr = 1
```
        on end_of_day:
```
if (sw_demand > 0) then
   sdr = sw_supply / sw_demand
   if (sdr > 1) then
      sdr = 1
   endif
else
   sdr = 1
endif
```
      soil Box2004: Site=Dalby Box; Region=Darling Downs; LocalName=Dalby Box; SoilType=DalbyBox; NearestTown=Unknown; NaturalVegetation=Unknown; Cona=3.5; DiffusConst=40; DiffusSlope=16; U=6; Salb=0.11; Cn2Bare=85; CnRed=0.8; CnCov=0.2; CnCanopyFact=0.2; RootCn=45; RootWt=1000; SoilCn=14.5; EnrACoeff=7.4; EnrBCoeff=0.2
        profile
          layer:
            thickness  bd     ll15   airdry  dul    sat    sw     swcon  oc     ph     fbiom  finert  ll Sorghum  kl Sorghum  xf Sorghum
            150        1.230  0.250  0.180   0.460  0.510  0.338  0      0.920  7.400  0.050  0.390   0.250       0.070       1
            150        1.190  0.250  0.180   0.470  0.520  0.397  0      0.450  8      0.020  0.470   0.250       0.070       1
            300        1.150  0.290  0.200   0.490  0.540  0.458  0      0.320  8.100  0.010  0.520   0.290       0.070       1
            300        1.200  0.350  0.240   0.470  0.520  0.453  0      0.290  8.200  0.010  0.620   0.350       0.050       1
            300        1.230  0.370  0.260   0.450  0.500  0.444  0      0.230  8.300  0.010  0.740   0.370       0.050       1
            300        1.250  0.380  0.270   0.450  0.500  0.433  0      0.270  8.100  0.010  0.830   0.380       0.040       1
            300        1.300  0.400  0.280   0.430  0.480  0.429  0      0.300  8.300  0.010  0.930   0.400       0.040       1
        InitWater
          profile
            layer:
              sw     thickness
              0.310  150
              0.400  150
              0.430  300
              0.420  300
              0.410  300
              0.400  300
              0.400  300
        InitNitrogen
          profile
            layer:
              no3       nh4  thickness
              49.8001   0.1  150
              13.704    0.1  150
              6.75901   0.1  300
              2.778     0.1  300
              0.833001  0.1  300
              0         0.1  300
              0         0.1  300
      sorghum
      outputfile
        variables
          variables: dd/mm/yyyy as date, DaysAfterSowing, sw_dep(), ll15_dep(), dul_dep(), WaterSD, Biomass, yield, lai, GrainNo, stage, biomass_wt, GrainGreenWt, RachisGreenWt, StemGreenWt, GrainSize, LeafSenescedWt, TillerNoFertile
  simulation DalbyBoxDoubleLD04 -> /Dalby Box Skip Row/DalbyBoxDoubleHD04
    area paddock -> /Dalby Box Skip Row/DalbyBoxDoubleHD04/paddock
      folder Manager folder -> /Dalby Box Skip Row/DalbyBoxDoubleHD04/paddock/Manager folder
        manager Sow SkipRow on a fixed date
          category =  # Sowing criteria
          date = 26/11/2004  # Enter sowing date (d/m/yyyy)
          category =  # Sowing parameters
          crop = Sorghum  # Enter name of crop to sow
          density = 2.5  # Enter sowing density (plants/m2)
          depth = 30  # Enter sowing depth (mm)
          cultivar = Buster  # Enter cultivar
          row_spacing = 1  # Enter row spacing (m)
          RowConfiguration = double  # Enter skip row configuration
          ftn = 0.2  # Enter Fertile Tiller No.
          on start_of_day:
          script: same as in DalbyBoxDoubleHD04.paddock.Manager folder.Sow SkipRow on a fixed date
  simulation DalbyBoxSolidHD04 -> /Dalby Box Skip Row/DalbyBoxDoubleHD04
    area paddock -> /Dalby Box Skip Row/DalbyBoxDoubleHD04/paddock
      folder Manager folder -> /Dalby Box Skip Row/DalbyBoxDoubleHD04/paddock/Manager folder
        manager Sow SkipRow on a fixed date
          category =  # Sowing criteria
          date = 26/11/2004  # Enter sowing date (d/m/yyyy)
          category =  # Sowing parameters
          crop = Sorghum  # Enter name of crop to sow
          density = 5  # Enter sowing density (plants/m2)
          depth = 30  # Enter sowing depth (mm)
          cultivar = Buster  # Enter cultivar
          row_spacing = 1  # Enter row spacing (m)
          RowConfiguration = solid  # Enter skip row configuration
          ftn = 0.2  # Enter Fertile Tiller No.
          on start_of_day:
          script: same as in DalbyBoxDoubleHD04.paddock.Manager folder.Sow SkipRow on a fixed date
      soil Box2004 -> /Dalby Box Skip Row/DalbyBoxDoubleHD04/paddock/Box2004
        InitWater
          profile
            layer:
              sw       thickness
              0.33807  150
              0.39661  150
              0.45758  300
              0.45302  300
              0.44368  300
              0.43253  300
              0.42905  300
