folder Simulations: version=19
  simulation DalbyBox2007
    metfile met: filename=Dalby Box 2007.met
    clock
      start_date = 1/10/2007  # Select the start date of the simulation
      end_date = 18/3/2008  # Select the end date of the simulation
    summaryfile: filename=Sorghum_Dalby Box 2007_Buster.sum
    area paddock
      folder Manager folder
        manager Sow on a fixed date
          category =  # Sowing criteria
          date = 18/10/2007  # Enter sowing date (d/m/yyyy)
          category =  # Sowing parameters
          crop = Sorghum  # Enter name of crop to sow
          density = 7  # Enter sowing density (plants/m2)
          depth = 30  # Enter sowing depth (mm)
          cultivar = Buster  # Enter cultivar
          row_spacing = 0.75  # Enter row spacing (mm)
          RowConfiguration = solid  # Enter skip row configuration
          ftn = 0.6  # Enter Fertile Tiller Number
          on start_of_day:
```
if (today = date('[date]') then
    if (day > 152) then
        season  = year
    else
        season  = year -1
    endif

    SowDay = day
     SowYear = year
    [crop] sow plants =[density], sowing_depth = [depth], cultivar = [cultivar], row_spacing = [row_spacing], skip = [RowConfiguration], tiller_no_fertile = [ftn]
endif
```
        manager Harvesting rule
          category =  # Harvesting criteria
          crop = sorghum  # Enter name of crop to harvest when ripe
          on end_of_day:
```
           if [crop].StageName = 'harvest_ripe' or [crop].plant_status = 'dead' then
              [crop]  harvest
              [crop]  end_crop
           endif
```
      fertiliser
      surfaceom surface organic matter
        PoolName = wheat  # Organic Matter pool name
        type = wheat  # Organic Matter type
        mass = 1000  # Initial surface residue (kg/ha)
        cnr = 80  # C:N ratio of initial residue
        standing_fraction = 0  # Fraction of residue standing
      soil Dalby Box: Site=Dalby Box; Region=Darling Downs; LocalName=Dalby Box; SoilType=DalbyBox; NearestTown=Unknown; NaturalVegetation=Unknown; Cona=3.5; DiffusConst=88; DiffusSlope=35.4; U=6; Salb=0.13; Cn2Bare=91; CnRed=20; CnCov=0.8; CnCanopyFact=0.8; RootCn=30; RootWt=1500; SoilCn=12.5; EnrACoeff=7.4; EnrBCoeff=0.2
        profile
          layer:
            thickness  bd    ll15  airdry  dul   sat   sw    swcon  oc    ph   fbiom  finert  no3    nh4  ll Sorghum  kl Sorghum  xf Sorghum
            150        1.25  0.25  0.2     0.45  0.5   0.45  0.5    1.28  7.6  0.04   0.4     19.01  0.1  0.25        0.07        1
            150        1.26  0.25  0.22    0.45  0.5   0.45  0.5    0.64  7.8  0.02   0.6     24.86  0.1  0.25        0.06        1
            300        1.26  0.29  0.28    0.44  0.49  0.44  0.5    0.32  8    0.02   0.8     23.98  0.1  0.29        0.06        1
            300        1.26  0.34  0.33    0.45  0.5   0.45  0.5    0.16  8.4  0.02   1       9.37   0.1  0.34        0.06        1
            300        1.27  0.37  0.36    0.44  0.49  0.44  0.5    0.16  8.3  0.01   1       2.81   0.1  0.37        0.05        1
            300        1.29  0.38  0.38    0.43  0.48  0.43  0.5    0.16  8.2  0.01   1       1.68   0.1  0.38        0.05        1
            300        1.29  0.4   0.4     0.43  0.48  0.43  0.5    0.16  8.3  0.01   1       1.31   0.1  0.4         0.04        1
        InitWater
          profile
            layer:
              thickness  sw
              150        0.415
              150        0.448
              300        0.447
              300        0.427
              300        0.39
              300        0.38
              300        0.4
        InitNitrogen
          profile
            layer:
              thickness  NO3      nh4
              150        19.01    0.100022
              150        24.86    0.100022
              300        23.98    0.100022
              300        9.37002  0.100022
              300        2.81001  0.100022
              300        1.68     0.100022
              300        1.31     0.100022
      manager Calculator
        on end_of_day:
```
if (paddock_is_fallow() = 0) then
   outputfile do_output
endif
```
      outputfile: events=My Variables Events
        variables
          variables: dd/mm/yyyy as date, DaysAfterSowing, sw_dep(), ll15_dep(), dul_dep(), WaterSD, Biomass, yield, lai, GrainNo, stage, biomass_wt, GrainGreenWt, RachisGreenWt, StemGreenWt, GrainSize, LeafSenescedWt, LeafGreenWt, TillerNoFertile
      sorghum
