folder Dalby Box Skip: version=19
  shared
  shared
  shared
  shared
  shared
  shared
  shared
  shared
  shared
  shared
  shared
  simulation DalbyBox05SkipDSLD
    clock
      start_date = 1/12/2005  # Select the start date of the simulation
      end_date = 30/04/2006  # Select the end date of the simulation
    summaryfile: filename=Sorghum_Dalby Box Skip_MR Buster_DS_LD.sum
    metfile met: filename=Dalby Box Skip.met
    area paddock
      folder Manager folder
        manager Sow SkipRow on a fixed date
          category =  # Sowing criteria
          date = 21/12/2005  # Enter sowing date (d/m/yyyy)
          category =  # Sowing parameters
          crop = Sorghum  # Enter name of crop to sow
          density = 2.5  # Enter sowing density (plants/m2)
          depth = 30  # Enter sowing depth (mm)
          cultivar = Buster  # Enter cultivar
          row_spacing = 1  # Enter row spacing (m)
          RowConfiguration = double  # Enter skip row configuration
          ftn = 0.3  # Enter Fertile Tiller No.
          on start_of_day:
```
     if (biomass > 0) then
         harvIndx = yield / biomass
      else
         harvIndx = 0
      endif

      if (day > 152) then
        current_season = year
      else
        current_season = year -1
      endif

            if (paddock_is_fallow() = 1 and today = date('[date]')) then
              season = current_season
              SowDay = day
               SowYear = year
ftn = 0

              [crop] sow plants =[density], sowing_depth = [depth], cultivar = [cultivar], row_spacing = [row_spacing], skip = [RowConfiguration], tiller_no_fertile = [ftn] ()
            endif
            if (paddock_is_fallow() = 0) then
               outputfile do_output
            endif
```
        manager Harvesting rule
          crop = Sorghum  # Enter name of crop to harvest when ripe
          on end_of_day:
```
           if [crop].StageName = 'harvest_ripe' or [crop].plant_status = 'dead' then
              [crop]  harvest
              [crop]  end_crop
           endif
```
      manager Logic
        on end_of_day:
```
  if (sw_demand > 0) then
     sdr = sw_supply / sw_demand
     if (sdr > 1) then
        sdr = 1
     endif
  else
     sdr = 1
  endif
```
      soil Dalby Box (avg): Site=Dalby Box; Region=Darling Downs; LocalName=Dalby Box; SoilType=DalbyBox(avg); NearestTown=Unknown; NaturalVegetation=Unknown; Cona=3.5; DiffusConst=88; DiffusSlope=35.4; U=6; Salb=0.13; Cn2Bare=91; CnRed=20; CnCov=0.8; CnCanopyFact=0.8; RootCn=30; RootWt=1500; SoilCn=12.5; EnrACoeff=7.4; EnrBCoeff=0.2
        profile
          layer:
            thickness  bd     ll15   airdry  dul    sat    sw     swcon  oc     ph     fbiom  finert  ll Sorghum  kl Sorghum  xf Sorghum
            150        1.230  0.250  0       0.460  0.510  0.382  0.500  1.310  7.800  0.030  0.400   0.250       0.080       1
            150        1.190  0.250  0       0.470  0.520  0.485  0.500  1.240  8.050  0.020  0.600   0.250       0.080       1
            300        1.150  0.290  0       0.490  0.540  0.511  0.500  1.250  7.950  0.010  0.800   0.290       0.080       1
            300        1.200  0.350  0       0.470  0.520  0.465  0.500  1.100  8      0.010  0.900   0.350       0.080       1
            300        1.230  0.370  0       0.450  0.500  0.431  0.500  0.710  8.050  0.010  1       0.370       0.060       1
            300        1.250  0.380  0       0.450  0.500  0.380  0.500  0.340  8.100  0.010  1       0.380       0.040       1
            300        1.300  0.400  0       0.430  0.480  0.397  0.500  0.260  8.050  0.010  1       0.400       0.020       1
        InitWater
          PercentMethod: Percent=0.66; Distributed=Filled from top
        InitNitrogen
          profile
            layer:
              no3    nh4    thickness
              4.832  0.100  150
              5.577  0.100  150
              5.329  0.100  300
              0      0.100  300
              0      0.100  300
              0      0.100  300
              0      0.100  300
      irrigation
        automatic_irrigation = off  # switch
        asw_depth = 600.0  # Depth to which ASW is calculated. (mm)
        crit_fr_asw = 0.5  # Fraction of ASW below which irrigation is applied (0-1.0)
        irrigation_efficiency = 1.0  # Efficiency of the irrigation. (0-1.0)
        default_no3_conc = 0.0  # Nitrate concentration (ppm N)
        default_nh4_conc = 0.0  # Ammonium concentration (ppm N)
        default_cl_conc = 0.0  # Chloride concentration (ppm Cl)
      fertiliser
      operations
        21/12/2005  fertiliser apply amount = 3 (kg/ha), depth = 50 (mm), type = NO3_N ()
      sorghum
      outputfile
        variables
          variables: dd/mm/yyyy as date, DaysAfterSowing, sw_dep(), ll15_dep(), dul_dep(), WaterSD, Biomass, yield, lai, GrainNo, stage, biomass_wt, GrainGreenWt, RachisGreenWt, StemGreenWt, GrainSize, LeafSenescedWt, LeafGreenWt, TillerNoFertile
  simulation DalbyBox05SkipSHD -> /Dalby Box Skip/DalbyBox05SkipDSLD
    area paddock -> /Dalby Box Skip/DalbyBox05SkipDSLD/paddock
      folder Manager folder -> /Dalby Box Skip/DalbyBox05SkipDSLD/paddock/Manager folder
        manager Sow SkipRow on a fixed date
          category =  # Sowing criteria
          date = 21/12/2005  # Enter sowing date (d/m/yyyy)
          category =  # Sowing parameters
          crop = Sorghum  # Enter name of crop to sow
          density = 5  # Enter sowing density (plants/m2)
          depth = 30  # Enter sowing depth (mm)
          cultivar = Buster  # Enter cultivar
          row_spacing = 1  # Enter row spacing (m)
          RowConfiguration = solid  # Enter skip row configuration
          ftn = 0  # Enter Fertile Tiller No.
          on start_of_day:
          script: same as in DalbyBox05SkipDSLD.paddock.Manager folder.Sow SkipRow on a fixed date
      soil Dalby Box (avg) -> /Dalby Box Skip/DalbyBox05SkipDSLD/paddock/Dalby Box (avg)
        InitWater
          PercentMethod: Percent=1.00; Distributed=Filled from top
