folder Dalby Racecourse Skip row: version=19
  simulation DalbyRaceDSHD04
    clock
      start_date = 16/11/2004  # Select the start date of the simulation
      end_date = 31/3/2005  # Select the end date of the simulation
    summaryfile: filename=Sorghum_Dalby Racecourse Skip row_MR Buster_DS_HD.sum
    metfile met: filename=Dalby Racecourse Skip row.met
    area paddock
      folder Manager folder
        manager Sow SkipRow on a fixed date
          category =  # Sowing criteria
          date = 16/11/2004  # Enter sowing date (d/m/yyyy)
          category =  # Sowing parameters
          crop = Sorghum  # Enter name of crop to sow
          density = 5  # Enter sowing density (plants/m2)
          depth = 30  # Enter sowing depth (mm)
          cultivar = Buster  # Enter cultivar
          row_spacing = 1  # Enter row spacing (m)
          RowConfiguration = double  # Enter skip row configuration
          ftn = 0  # Enter Fertile Tiller No.
          on start_of_day:
```
     if (biomass > 0) then
         harvIndx = yield / biomass
      else
         harvIndx = 0
      endif


      if (day > 152) then
        current_season = year
      else
        current_season = year -1
      endif

            if (paddock_is_fallow() = 1 and today = date('[date]')) then
              season = current_season
              SowDay = day
               SowYear = year
ftn = 0

              [crop] sow plants =[density], sowing_depth = [depth], cultivar = [cultivar], row_spacing = [row_spacing], skip = [RowConfiguration], tiller_no_fertile = [ftn] ()
            endif
            if (paddock_is_fallow() = 0) then
               outputfile do_output
            endif
```
        manager Harvesting rule
          crop = Sorghum  # Enter name of crop to harvest when ripe
          on end_of_day:
```
           if [crop].StageName = 'harvest_ripe' or [crop].plant_status = 'dead' then
              [crop]  harvest
              [crop]  end_crop
           endif
```
      soil Racecourse2004: Site=Dalby Racecourse; Region=Darling Downs; LocalName=Dalby Racecourse; SoilType=DalbyRacecourseBox; NearestTown=Unknown; NaturalVegetation=Unknown; Cona=3.5; DiffusConst=40; DiffusSlope=16; U=6; Salb=0.11; Cn2Bare=85; CnRed=0.8; CnCov=0.2; CnCanopyFact=0.2; RootCn=45; RootWt=1000; SoilCn=14.5; EnrACoeff=7.4; EnrBCoeff=0.2
        profile
          layer:
            thickness  bd     ll15   airdry  dul    sat    sw     swcon  oc     ph     fbiom  finert  ll Sorghum  kl Sorghum  xf Sorghum
            150        1.490  0.260  0.190   0.370  0.420  0.355  0      0.910  7.100  0.050  0.390   0.260       0.070       1
            150        1.520  0.260  0.190   0.350  0.400  0.341  0      0.450  7.600  0.020  0.470   0.260       0.070       1
            300        1.360  0.230  0.160   0.410  0.460  0.418  0      0.320  8.500  0.010  0.520   0.230       0.070       1
            300        1.340  0.250  0.180   0.410  0.460  0.439  0      0.290  7.900  0.010  0.620   0.250       0.050       1
            300        1.420  0.260  0.180   0.390  0.440  0.350  0      0.230  7.900  0.010  0.740   0.260       0.050       1
            300        1.400  0.290  0.200   0.400  0.450  0.363  0      0.270  7.600  0.010  0.830   0.290       0.040       1
            300        1.400  0.280  0.190   0.390  0.440  0.368  0      0.300  7.400  0.010  0.930   0.280       0.040       1
        InitWater
          profile
            layer:
              sw     thickness
              0.320  150
              0.310  150
              0.310  300
              0.310  300
              0.320  300
              0.330  300
              0.340  300
        InitNitrogen
          profile
            layer:
              no3     nh4      thickness
              28.113  0.10002  150
              19.906  0.10002  150
              10.377  0.10002  300
              9.528   0.10002  300
              5.755   0.10002  300
              21.944  0.10002  300
              0       0.10002  300
      manager Logic
        on init:
```
 sdr = 1
```
        on end_of_day:
```
  if (sw_demand > 0) then
     sdr = sw_supply / sw_demand
     if (sdr > 1) then
        sdr = 1
     endif
  else
     sdr = 1
  endif
```
      outputfile
        variables
          variables: dd/mm/yyyy as date, DaysAfterSowing, sw_dep(), ll15_dep(), dul_dep(), WaterSD, Biomass, yield, lai, GrainNo, stage, biomass_wt, GrainGreenWt, RachisGreenWt, StemGreenWt, GrainSize, LeafSenescedWt, TillerNoFertile
      sorghum
  simulation DalbyRaceDSLD04 -> /Dalby Racecourse Skip row/DalbyRaceDSHD04
    area paddock -> /Dalby Racecourse Skip row/DalbyRaceDSHD04/paddock
      folder Manager folder -> /Dalby Racecourse Skip row/DalbyRaceDSHD04/paddock/Manager folder
        manager Sow SkipRow on a fixed date
          category =  # Sowing criteria
          date = 16/11/2004  # Enter sowing date (d/m/yyyy)
          category =  # Sowing parameters
          crop = Sorghum  # Enter name of crop to sow
          density = 2.5  # Enter sowing density (plants/m2)
          depth = 30  # Enter sowing depth (mm)
          cultivar = Buster  # Enter cultivar
          row_spacing = 1  # Enter row spacing (m)
          RowConfiguration = double  # Enter skip row configuration
          ftn = 0.3  # Enter Fertile Tiller No.
          on start_of_day:
          script: same as in DalbyRaceDSHD04.paddock.Manager folder.Sow SkipRow on a fixed date
  simulation DalbyRaceSHD04 -> /Dalby Racecourse Skip row/DalbyRaceDSHD04
    area paddock -> /Dalby Racecourse Skip row/DalbyRaceDSHD04/paddock
      folder Manager folder -> /Dalby Racecourse Skip row/DalbyRaceDSHD04/paddock/Manager folder
        manager Sow SkipRow on a fixed date
          category =  # Sowing criteria
          date = 16/11/2004  # Enter sowing date (d/m/yyyy)
          category =  # Sowing parameters
          crop = Sorghum  # Enter name of crop to sow
          density = 5  # Enter sowing density (plants/m2)
          depth = 30  # Enter sowing depth (mm)
          cultivar = Buster  # Enter cultivar
          row_spacing = 1  # Enter row spacing (m)
          RowConfiguration = solid  # Enter skip row configuration
          ftn = 0.3  # Enter Fertile Tiller No.
          on start_of_day:
          script: same as in DalbyRaceDSHD04.paddock.Manager folder.Sow SkipRow on a fixed date
