folder Breeders: version=19
  simulation Hermitage06
    clock
      start_date = 1/11/2006  # Select the start date of the simulation
      end_date = 15/04/2007  # Select the end date of the simulation
    summaryfile: filename=Buster.sum
    metfile met: filename=HermitageDGP.met
    area paddock
      folder Manager folder
        manager Sow SkipRow on a fixed date
          category =  # Sowing criteria
          date = 21/11/2006  # Enter sowing date (d/m/yyyy)
          category =  # Sowing parameters
          crop = Sorghum  # Enter name of crop to sow
          density = 7.3  # Enter sowing density (plants/m2)
          depth = 30  # Enter sowing depth (mm)
          cultivar = Buster  # Enter cultivar
          row_spacing = 0.75  # Enter row spacing (m)
          RowConfiguration = solid  # Enter skip row configuration
          ftn = 0.9  # Enter Fertile Tiller No.
          TillerFactor = 1  # Enter Tiller Factor
          DensityFactor = 1  # Enter Density Factor
          on start_of_day:
```
if (paddock_is_fallow() = 0) then
   outputfile do_output
endif
if (paddock_is_fallow() = 1 and today = date('[date]')) then
     season = current_season
     SowDay = day
     SowYear = year

     adjFtn = [ftn] * [TillerFactor]
     adjDensity = [density] * [DensityFactor]

     [crop] sow plants =adjDensity , sowing_depth = [depth], cultivar = [cultivar], row_spacing = [row_spacing], skip = [RowConfiguration], tiller_no_fertile = adjFtn  ()
endif
```
        manager Harvesting rule
          crop = Sorghum  # Enter name of crop to harvest when ripe
          on end_of_day:
```
           if [crop].StageName = 'harvest_ripe' or [crop].plant_status = 'dead' then
              [crop]  harvest
              [crop]  end_crop
           endif
```
      outputfile: events=My Variables Events
        variables
          variables: dd/mm/yyyy as date, DaysAfterSowing, sw_dep(), ll15_dep(), dul_dep(), WaterSD, Biomass, yield, lai, GrainNo, stage, biomass_wt, GrainGreenWt, RachisGreenWt, StemGreenWt, GrainSize, LeafSenescedWt, LeafGreenWt, TillerNoFertile
      sorghum
      soil Hermitage: Site=Hermitage; Region=Darling Downs; LocalName=Hermitage; SoilType=Hermitage; NearestTown=Unknown; NaturalVegetation=Unknown; Cona=3.5; DiffusConst=88; DiffusSlope=35.4; U=6; Salb=0.13; Cn2Bare=91; CnRed=20; CnCov=0.8; CnCanopyFact=0.8; RootCn=30; RootWt=1500; SoilCn=12.5; EnrACoeff=7.4; EnrBCoeff=0.2
        profile
          layer:
            thickness  bd     ll15   airdry  dul    sat    sw     swcon  oc     fbiom  finert  ph     ll sorghum  kl sorghum  xf sorghum
            150        1.030  0.160  0.100   0.560  0.610  0.241  0.500  1.310  0.030  0.400   7.800  0.160       0.080       1
            150        1.060  0.180  0.150   0.550  0.600  0.294  0.500  1.240  0.020  0.600   8.100  0.180       0.080       1
            300        1.060  0.270  0.250   0.550  0.600  0.341  0.500  1.250  0.010  0.800   8      0.270       0.060       1
            300        1.080  0.290  0.280   0.540  0.590  0.360  0.500  1.100  0.010  0.900   8      0.290       0.040       1
            300        1.110  0.340  0.330   0.530  0.580  0.353  0.500  0.710  0.010  1       8.100  0.340       0.040       1
            300        1.140  0.370  0.370   0.520  0.530  0.355  0.500  0.340  0.010  1       8.100  0.370       0.040       1
            300        1.170  0.390  0.390   0.510  0.530  0.366  0.500  0.260  0.010  1       8.100  0.390       0.040       1
        InitWater
          PercentMethod: Percent=0.66; Distributed=Filled from top
        InitNitrogen
          profile
            layer:
              no3ppm  no3    nh4    thickness
              81.800  8.832  0.050  150
              55.906  8.832  0.050  150
              54.206  8.832  0.050  300
              38.229  8.832  0.050  300
              25.849  8.832  0.050  300
              18.562  8.832  0.050  300
              13.524  8.832  0.050  300
