folder Breeders: version=19
  simulation HermitageDGP04
    clock
      start_date = 5/11/2004  # Select the start date of the simulation
      end_date = 30/04/2005  # Select the end date of the simulation
    summaryfile: filename=Buster.sum
    metfile met: filename=Hermitage DGP.met
    area paddock
      folder Manager folder
        manager Sow SkipRow on a fixed date
          category =  # Sowing criteria
          date = 5/11/2004  # Enter sowing date (d/m/yyyy)
          category =  # Sowing parameters
          crop = Sorghum  # Enter name of crop to sow
          density = 10  # Enter sowing density (plants/m2)
          depth = 30  # Enter sowing depth (mm)
          cultivar = Buster  # Enter cultivar
          row_spacing = 0.75  # Enter row spacing (m)
          RowConfiguration = solid  # Enter skip row configuration
          ftn = 0.9  # Enter Fertile Tiller No.
          TillerFactor = 1  # Enter Tiller Factor
          DensityFactor = 1  # Enter Density Factor
          on start_of_day:
```
if (paddock_is_fallow() = 1 and today = date('[date]')) then
     season = current_season
     SowDay = day
     SowYear = year

     adjFtn = [ftn] * [TillerFactor]
     adjDensity = [density] * [DensityFactor]

     [crop] sow plants =adjDensity , sowing_depth = [depth], cultivar = [cultivar], row_spacing = [row_spacing], skip = [RowConfiguration], tiller_no_fertile = adjFtn  ()
endif
```
        manager Harvesting rule
          category =  # Harvesting criteria
          crop = Sorghum  # Enter name of crop to harvest when ripe
          on end_of_day:
```
           if [crop].StageName = 'harvest_ripe' or [crop].plant_status = 'dead' then
              [crop]  harvest
              [crop]  end_crop
           endif
```
      manager Calculator
        on init:
```
 head_wt = 0
root_n = 0
head_n = 0
leaf_n = 0
sd = 0
     if (day > 152) then
        current_season = year
      else
        current_season = year -1
      endif
```
        on start_of_day:
```
     if (day > 152) then
        current_season = year
      else
        current_season = year -1
      endif
```
        on end_of_day:
```
 
if (biomass > 0) then
     harvIndx = yield / biomass
else
     harvIndx = 0
endif


if (sw_demand > 0) then
   sdr = sw_supply / sw_demand
   if (sdr > 1) then
      sdr = 1
   endif
else
   sdr = 1
endif


if (paddock_is_fallow() = 0) then
    outputfile do_output

endif
```
      soil HRS2004: Site=Hermitage; Region=Darling Downs; LocalName=Hermitage; SoilType=Hermitage; NearestTown=Unknown; NaturalVegetation=Unknown; Cona=3.5; DiffusConst=40; DiffusSlope=16; U=6; Salb=0.11; Cn2Bare=85; CnRed=0.8; CnCov=0.2; CnCanopyFact=0.2; RootCn=45; RootWt=1000; SoilCn=14.5; EnrACoeff=7.4; EnrBCoeff=0.2
        profile
          layer:
            thickness  bd     ll15   airdry  dul    sat    sw     swcon  oc     ph     fbiom  finert  ll Sorghum  kl Sorghum  xf Sorghum
            150        1.030  0.210  0.150   0.560  0.580  0.561  0      1.560  7.600  0.050  0.390   0.21        0.06        1
            150        1.060  0.290  0.200   0.550  0.570  0.548  0      0.450  7.700  0.020  0.470   0.29        0.06        1
            300        1.060  0.310  0.190   0.550  0.570  0.548  0      0.320  8.200  0.010  0.520   0.31        0.06        1
            300        1.080  0.310  0.190   0.540  0.560  0.540  0      0.290  8.500  0.010  0.620   0.31        0.06        1
            300        1.110  0.320  0.200   0.530  0.550  0.527  0      0.230  8.600  0.010  0.740   0.32        0.06        1
            300        1.140  0.330  0.210   0.520  0.530  0.522  0      0.270  8.600  0.010  0.830   0.33        0.06        1
            300        1.170  0.340  0.210   0.510  0.520  0.507  0      0.300  8.500  0.010  0.930   0.34        0.06        1
        InitWater
          PercentMethod: Percent=0.75; Distributed=Filled from top
        InitNitrogen
          profile
            layer:
              no3      nh4       thickness
              37.1011  0.100025  150
              26.1601  0.100025  150
              6.28901  0.100025  300
              8.70902  0.100025  300
              6.00601  0.100025  300
              8.56102  0.100025  300
              10.781   0.100025  300
      sorghum
      outputfile
        variables
          variables: dd/mm/yyyy as date, DaysAfterSowing, sw_dep(), ll15_dep(), dul_dep(), WaterSD, Biomass, yield, lai, GrainNo, stage, biomass_wt, GrainGreenWt, RachisGreenWt, StemGreenWt, GrainSize, LeafSenescedWt, LeafGreenWt, TillerNoFertile
  simulation Hermitage AYT04
    clock
      start_date = 27/10/2004  # Select the start date of the simulation
      end_date = 30/04/2005  # Select the end date of the simulation
    summaryfile: filename=Sorghum_Hermitage AYT_Buster_S_75RS.sum
    metfile met: filename=Hermitage AYT.met
    area paddock
      folder Manager folder
        manager Sow SkipRow on a fixed date
          category =  # Sowing criteria
          date = 27/10/2004  # Enter sowing date (d/m/yyyy)
          category =  # Sowing parameters
          crop = Sorghum  # Enter name of crop to sow
          density = 10  # Enter sowing density (plants/m2)
          depth = 30  # Enter sowing depth (mm)
          cultivar = Buster  # Enter cultivar
          row_spacing = 0.75  # Enter row spacing (m)
          RowConfiguration = solid  # Enter skip row configuration
          ftn = 1.6  # Enter Fertile Tiller No.
          on start_of_day:
```
     if (biomass > 0) then
         harvIndx = yield / biomass
      else
         harvIndx = 0
      endif

      if (day > 152) then
        current_season = year
      else
        current_season = year -1
      endif

            if (paddock_is_fallow() = 1 and today = date('[date]')) then
              season = current_season
              SowDay = day
               SowYear = year
ftn = 0

              [crop] sow plants =[density], sowing_depth = [depth], cultivar = [cultivar], row_spacing = [row_spacing], skip = [RowConfiguration], tiller_no_fertile = [ftn] ()
            endif
            if (paddock_is_fallow() = 0) then
               outputfile do_output
            endif
```
        manager Harvesting rule
          crop = Sorghum  # Enter name of crop to harvest when ripe
          on end_of_day:
          script: same as in HermitageDGP04.paddock.Manager folder.Harvesting rule
      soil HRS2004: Site=Hermitage; Region=Darling Downs; LocalName=Hermitage; SoilType=Hermitage; NearestTown=Unknown; NaturalVegetation=Unknown; Cona=3.5; DiffusConst=40; DiffusSlope=16; U=6; Salb=0.11; Cn2Bare=85; CnRed=0.8; CnCov=0.2; CnCanopyFact=0.2; RootCn=45; RootWt=1000; SoilCn=14.5; EnrACoeff=7.4; EnrBCoeff=0.2
        profile
          layer:
            thickness  bd     ll15   airdry  dul    sat    sw     swcon  oc     ph     fbiom  finert  ll Sorghum  kl Sorghum  xf Sorghum
            150        1.030  0.210  0.150   0.560  0.610  0.561  0      1.560  7.600  0.050  0.390   0.210       0.070       1.000
            150        1.060  0.280  0.200   0.550  0.600  0.548  0      0.450  7.700  0.020  0.470   0.280       0.070       1.000
            300        1.060  0.300  0.190   0.550  0.600  0.548  0      0.320  8.200  0.010  0.520   0.300       0.070       1.000
            300        1.080  0.300  0.190   0.540  0.590  0.540  0      0.290  8.500  0.010  0.620   0.300       0.050       1.000
            300        1.110  0.310  0.200   0.530  0.580  0.527  0      0.230  8.600  0.010  0.740   0.310       0.050       1.000
            300        1.140  0.320  0.210   0.520  0.570  0.522  0      0.270  8.600  0.010  0.830   0.320       0.040       1.000
            300        1.170  0.330  0.210   0.510  0.560  0.507  0      0.300  8.500  0.010  0.930   0.330       0.040       1.000
        InitWater
          PercentMethod: Percent=1.00; Distributed=Filled from top
        InitNitrogen
          profile
            layer:
              no3      nh4  thickness
              25.984   0.1  150
              20.056   0.1  150
              8.38001  0.1  300
              8.55401  0.1  300
              6.77101  0.1  300
              6.58201  0.1  300
              6.77901  0.1  300
      manager Logic
        on init:
```
 sdr = 1
```
        on end_of_day:
```
  if (sw_demand > 0) then
     sdr = sw_supply / sw_demand
     if (sdr > 1) then
        sdr = 1
     endif
  else
     sdr = 1
  endif
```
      irrigation
        automatic_irrigation = off  # switch
        asw_depth = 600.0  # Depth to which ASW is calculated. (mm)
        crit_fr_asw = 0.5  # Fraction of ASW below which irrigation is applied (0-1.0)
        irrigation_efficiency = 1.0  # Efficiency of the irrigation. (0-1.0)
        default_no3_conc = 0.0  # Nitrate concentration (ppm N)
        default_nh4_conc = 0.0  # Ammonium concentration (ppm N)
        default_cl_conc = 0.0  # Chloride concentration (ppm Cl)
      fertiliser
      operations
        27/10/2004  fertiliser apply amount = 4 (kg/ha), depth = 50 (mm), type = NO3_N ()
      sorghum
      outputfile -> /Breeders/HermitageDGP04/paddock/Outputfile
