folder Hermitage: version=19
  shared
  shared
  shared
  shared
  simulation HRS05
    clock
      start_date = 28/11/2005  # Select the start date of the simulation
      end_date = 30/4/2006  # Select the end date of the simulation
    summaryfile: filename=HRSav.sum
    metfile met: filename=hermitage.met
    area paddock
      folder Manager folder
        manager Sow SkipRow on a fixed date
          category =  # Sowing criteria
          date = 29/11/2005  # Enter sowing date (d/m/yyyy)
          category =  # Sowing parameters
          crop = Sorghum  # Enter name of crop to sow
          density = 9.1  # Enter sowing density (plants/m2)
          depth = 30  # Enter sowing depth (mm)
          cultivar = Buster  # Enter cultivar
          row_spacing = 0.75  # Enter row spacing (m)
          RowConfiguration = solid  # Enter skip row configuration
          ftn = 1.6  # Enter Fertile Tiller No.
          on start_of_day:
```
     if (biomass > 0) then
         harvIndx = yield / biomass
      else
         harvIndx = 0
      endif



      if (day > 152) then
        current_season = year
      else
        current_season = year -1
      endif

            if (paddock_is_fallow() = 1 and today = date('[date]')) then
              season = current_season
              SowDay = day
               SowYear = year
ftn = 0

              [crop] sow plants =[density], sowing_depth = [depth], cultivar = [cultivar], row_spacing = [row_spacing], skip = [RowConfiguration], tiller_no_fertile = [ftn] ()
            endif
            if (paddock_is_fallow() = 0) then
               outputfile do_output
            endif
```
        manager Harvesting rule
          category =  # Harvesting criteria
          crop = Sorghum  # Enter name of crop to harvest when ripe
          on end_of_day:
```
           if [crop].StageName = 'harvest_ripe' or [crop].plant_status = 'dead' then
              [crop]  harvest
              [crop]  end_crop
           endif
```
        manager Fertilise at sowing
          category =  # When should fertiliser be applied
          modulename = Sorghum  # On which module should the event come from
          eventname = sowing  # On which event should fertiliser be applied
          category =  # Fertiliser application details
          fertmodule = fertiliser  # Module used to apply the fertiliser
          fert_amount_sow = 120  # Amount of starter fertiliser at sowing (kg/ha)
          fert_type_sow = urea_N  # Sowing fertiliser type
          on [modulename].[eventname]:
```
        [fertmodule] apply amount = [fert_amount_sow] (kg/ha), depth = 50 (mm), type = [fert_type_sow]
```
      soil Hermitage (avg): Site=Hermitage; Region=Darling Downs; LocalName=Hermitage; SoilType=Hermitage(avg); NearestTown=Unknown; NaturalVegetation=Unknown; Cona=3.5; DiffusConst=88; DiffusSlope=35.4; U=6; Salb=0.13; Cn2Bare=91; CnRed=20; CnCov=0.8; CnCanopyFact=0.8; RootCn=30; RootWt=1500; SoilCn=12.5; EnrACoeff=7.4; EnrBCoeff=0.2
        profile
          layer:
            thickness  bd     ll15   airdry  dul    sat    sw     swcon  fbiom  finert  oc     ph     ll Sorghum  kl Sorghum  xf Sorghum
            150        1.030  0.210  0.150   0.560  0.580  0.282  0.500  0.030  0.400   1.310  7.800  0.210       0.080       1.000
            150        1.060  0.290  0.250   0.550  0.570  0.331  0.500  0.020  0.600   1.240  8.100  0.290       0.080       1.000
            300        1.060  0.280  0.270   0.550  0.570  0.386  0.500  0.010  0.800   1.250  8.000  0.280       0.080       1.000
            300        1.080  0.280  0.270   0.540  0.560  0.435  0.500  0.010  0.900   1.100  8.000  0.280       0.080       1.000
            300        1.110  0.280  0.270   0.530  0.550  0.437  0.500  0.010  1.000   0.710  8.100  0.280       0.060       1.000
            300        1.140  0.300  0.290   0.520  0.540  0.418  0.500  0.010  1.000   0.340  8.100  0.300       0.040       1.000
            300        1.170  0.300  0.290   0.510  0.520  0.411  0.500  0.010  1.000   0.260  8.100  0.300       0.020       1.000
        InitNitrogen
          profile
            layer:
              no3ppm  no3      nh4        thickness
              81.800  13.8787  0.0500126  150
              55.906  13.8787  0.0500126  150
              54.206  13.8787  0.0500126  300
              38.229  13.8787  0.0500126  300
              25.849  13.8787  0.0500126  300
              18.562  13.8787  0.0500126  300
              13.524  13.8787  0.0500126  300
        InitWater
          profile
            layer:
              sw    thickness
              0.4   150
              0.42  150
              0.45  300
              0.47  300
              0.48  300
              0.48  300
              0.48  300
      irrigation
        automatic_irrigation = off  # switch
        asw_depth = 600.0  # Depth to which ASW is calculated. (mm)
        crit_fr_asw = 0.9  # Fraction of ASW below which irrigation is applied (0-1.0)
        irrigation_efficiency = 1.0  # Efficiency of the irrigation. (0-1.0)
        default_no3_conc = 0.0  # Nitrate concentration (ppm N)
        default_nh4_conc = 0.0  # Ammonium concentration (ppm N)
        default_cl_conc = 0.0  # Chloride concentration (ppm Cl)
      fertiliser
      manager Logic
        on end_of_day:
```
  if (sw_demand > 0) then
     sdr = sw_supply / sw_demand
     if (sdr > 1) then
        sdr = 1
     endif
  else
     sdr = 1
  endif
```
      outputfile
        variables
          variables: dd/mm/yyyy as date, DaysAfterSowing, sw_dep(), ll15_dep(), dul_dep(), WaterSD, Biomass, yield, lai, GrainNo, stage, biomass_wt, GrainGreenWt, RachisGreenWt, StemGreenWt, GrainSize, LeafSenescedWt, LeafGreenWt, TillerNoFertile
      sorghum
