folder Hermitage DGP 2008: version=19
  simulation Hermitage_DGP_2008
    clock
      start_date = 17/11/2008  # Select the start date of the simulation
      end_date = 30/04/2009  # Select the end date of the simulation
    summaryfile: filename=Sorghum_Hermitage_DGP_2008_Buster.sum
    metfile met: filename=C:\Sorghum\EnvClass\2008\data\Met\HRS.met
    area paddock
      folder Manager folder
        manager Sow SkipRow on a fixed date
          category =  # Sowing criteria
          date = 2/12/2008  # Enter sowing date (d/m/yyyy)
          category =  # Sowing parameters
          crop = Sorghum  # Enter name of crop to sow
          density = 7.3  # Enter sowing density (plants/m2)
          depth = 30  # Enter sowing depth (mm)
          cultivar = Buster  # Enter cultivar
          row_spacing = 0.75  # Enter row spacing (m)
          RowConfiguration = solid  # Enter skip row configuration
          ftn = 0.6  # Enter Fertile Tiller No.
          on start_of_day:
```
            if (paddock_is_fallow() = 1 and today = date('[date]')) then
              [crop] sow plants =[density], sowing_depth = [depth], cultivar = [cultivar], row_spacing = [row_spacing], skip = [RowConfiguration], tiller_no_fertile = [ftn] ()
            endif
            if (paddock_is_fallow() = 0) then
               outputfile do_output
            endif
```
        manager Harvesting rule
          category =  # Harvesting criteria
          crop = Sorghum  # Enter name of crop to harvest when ripe
          on end_of_day:
```
           if [crop].StageName = 'harvest_ripe' or [crop].plant_status = 'dead' then
              [crop]  harvest
              [crop]  end_crop
           endif
```
        manager Fertilise at sowing
          category =  # When should fertiliser be applied
          modulename = Sorghum  # On which module should the event come from
          eventname = sowing  # On which event should fertiliser be applied
          category =  # Fertiliser application details
          fertmodule = fertiliser  # Module used to apply the fertiliser
          fert_amount_sow = 150  # Amount of starter fertiliser at sowing (kg/ha)
          fert_type_sow = urea_N  # Sowing fertiliser type
          on [modulename].[eventname]:
```
        [fertmodule] apply amount = [fert_amount_sow] (kg/ha), depth = 50 (mm), type = [fert_type_sow]
```
      irrigation
        automatic_irrigation = off  # switch
        asw_depth = 1800  # Depth to which ASW is calculated. (mm)
        crit_fr_asw = 1  # Fraction of ASW below which irrigation is applied (0-1.0)
        irrigation_efficiency = 1  # Efficiency of the irrigation. (0-1.0)
        default_no3_conc = 0  # Nitrate concentration (ppm N)
        default_nh4_conc = 0  # Ammonium concentration (ppm N)
        default_cl_conc = 0  # Chloride concentration (ppm Cl)
      fertiliser
      operations
      soil Hermitage: Site=Hermitage; Region=Darling Downs; LocalName=Hermitage; SoilType=Hermitage; NearestTown=Unknown; NaturalVegetation=Unknown; Cona=3.5; DiffusConst=88; DiffusSlope=35.4; U=6; Salb=0.13; Cn2Bare=91; CnRed=20; CnCov=0.8; CnCanopyFact=0.8; RootCn=30; RootWt=1500; SoilCn=12.5; EnrACoeff=7.4; EnrBCoeff=0.2
        profile
          layer:
            thickness  bd     ll15  airdry  dul    sat    sw     swcon  oc     fbiom  finert  ph     ll sorghum  kl sorghum  xf sorghum
            150        1.030  0.23  0.17    0.560  0.610  0.241  0.500  1.310  0.030  0.400   7.800  0.23        0.08        1
            150        1.060  0.25  0.22    0.550  0.600  0.294  0.500  1.240  0.020  0.600   8.100  0.25        0.08        1
            300        1.060  0.34  0.32    0.550  0.600  0.341  0.500  1.250  0.010  0.800   8      0.34        0.06        1
            300        1.080  0.36  0.35    0.540  0.590  0.360  0.500  1.100  0.010  0.900   8      0.36        0.04        1
            300        1.110  0.41  0.4     0.530  0.580  0.353  0.500  0.710  0.010  1       8.100  0.41        0.04        1
            300        1.140  0.44  0.44    0.520  0.530  0.355  0.500  0.340  0.010  1       8.100  0.44        0.04        1
            300        1.170  0.46  0.46    0.510  0.530  0.366  0.500  0.260  0.010  1       8.100  0.46        0.04        1
        InitWater
          PercentMethod: Percent=0.82; Distributed=Filled from top
        InitNitrogen
          profile
            layer:
              no3ppm  no3    nh4      thickness
              81.800  8.832  4.59203  150
              55.906  8.832  4.59203  150
              54.206  8.832  4.59203  300
              38.229  8.832  4.59203  300
              25.849  8.832  4.59203  300
              18.562  8.832  4.59203  300
              13.524  8.832  4.59203  300
      outputfile: events=My Variables Events
        variables
          variables: dd/mm/yyyy as date, DaysAfterSowing, sw_dep(), ll15_dep(), dul_dep(), WaterSD, Biomass, yield, lai, GrainNo, stage, biomass_wt, GrainGreenWt, RachisGreenWt, StemGreenWt, GrainSize, LeafSenescedWt, LeafGreenWt, TillerNoFertile
      sorghum
