folder Jimbour Breeders: version=19
  simulation Jimbour04
    clock
      start_date = 15/11/2004  # Select the start date of the simulation
      end_date = 31/03/2005  # Select the end date of the simulation
    summaryfile: filename=Sorghum_Jimbour Breeders_Buster_S_75RS.sum
    metfile met: filename=Jimbour Breeders.met
    area paddock
      folder Manager folder
        manager Sow SkipRow on a fixed date
          category =  # Sowing criteria
          date = 15/11/2004  # Enter sowing date (d/m/yyyy)
          category =  # Sowing parameters
          crop = Sorghum  # Enter name of crop to sow
          density = 10  # Enter sowing density (plants/m2)
          depth = 30  # Enter sowing depth (mm)
          cultivar = Buster  # Enter cultivar
          row_spacing = 0.75  # Enter row spacing (m)
          RowConfiguration = solid  # Enter skip row configuration
          ftn = 0.25  # Enter Fertile Tiller No.
          on start_of_day:
```
     if (biomass > 0) then
         harvIndx = yield / biomass
      else
         harvIndx = 0
      endif



      if (day > 152) then
        current_season = year
      else
        current_season = year -1
      endif

            if (paddock_is_fallow() = 1 and today = date('[date]')) then
              season = current_season
              SowDay = day
               SowYear = year
ftn = 0

              [crop] sow plants =[density], sowing_depth = [depth], cultivar = [cultivar], row_spacing = [row_spacing], skip = [RowConfiguration], tiller_no_fertile = [ftn] ()
            endif
            if (paddock_is_fallow() = 0) then
               outputfile do_output
            endif
```
        manager Harvesting rule
          crop = Sorghum  # Enter name of crop to harvest when ripe
          on end_of_day:
```
           if [crop].StageName = 'harvest_ripe' or [crop].plant_status = 'dead' then
              [crop]  harvest
              [crop]  end_crop
           endif
```
      soil Jimbour2004: Site=Jimbour; Region=Darling Downs; LocalName=Jimbour; SoilType=JimbourBlack; NearestTown=Unknown; NaturalVegetation=Unknown; Cona=3.5; DiffusConst=40; DiffusSlope=16; U=6; Salb=0.11; Cn2Bare=85; CnRed=0.8; CnCov=0.2; CnCanopyFact=0.2; RootCn=45; RootWt=1000; SoilCn=14.5; EnrACoeff=7.4; EnrBCoeff=0.2
        profile
          layer:
            thickness  bd     ll15   airdry  dul    sat    sw     swcon  oc     ph     fbiom  finert  ll Sorghum  kl Sorghum  xf Sorghum
            150        1.070  0.320  0.220   0.520  0.570  0.507  0      1.570  7.600  0.050  0.390   0.320       0.070       1
            150        1.080  0.320  0.220   0.510  0.560  0.501  0      0.450  8      0.020  0.470   0.320       0.070       1
            300        1.080  0.330  0.230   0.510  0.560  0.506  0      0.320  8.200  0.010  0.520   0.330       0.070       1
            300        1.070  0.330  0.230   0.510  0.560  0.473  0      0.290  8.400  0.010  0.620   0.330       0.050       1
            300        1.080  0.330  0.230   0.510  0.560  0.381  0      0.230  8.400  0.010  0.740   0.330       0.050       1
            300        1.130  0.370  0.260   0.500  0.550  0.367  0      0.270  8.300  0.010  0.830   0.370       0.040       1
            300        1.170  0.380  0.270   0.480  0.530  0.381  0      0.300  8.300  0.010  0.930   0.380       0.040       1
        InitWater
          PercentMethod: Percent=1.00; Distributed=Filled from top
        InitNitrogen
          profile
            layer:
              no3     nh4    thickness
              20.914  0.100  150
              34.151  0.100  150
              13.679  0.100  300
              8.396   0.100  300
              5.283   0.100  300
              1.981   0.100  300
              7.358   0.100  300
      manager Logic
        on init:
```
 sdr = 1
```
        on end_of_day:
```
  if (sw_demand > 0) then
     sdr = sw_supply / sw_demand
     if (sdr > 1) then
        sdr = 1
     endif
  else
     sdr = 1
  endif
```
      irrigation
        automatic_irrigation = off  # switch
        asw_depth = 600  # Depth to which ASW is calculated. (mm)
        crit_fr_asw = 0.5  # Fraction of ASW below which irrigation is applied (0-1.0)
        irrigation_efficiency = 1  # Efficiency of the irrigation. (0-1.0)
        default_no3_conc = 0  # Nitrate concentration (ppm N)
        default_nh4_conc = 0  # Ammonium concentration (ppm N)
        default_cl_conc = 0  # Chloride concentration (ppm Cl)
      fertiliser
      operations
        15/11/2004  fertiliser apply amount = 4 (kg/ha), depth = 50 (mm), type = NO3_N ()
      outputfile
        variables
          variables: dd/mm/yyyy as date, DaysAfterSowing, sw_dep(), ll15_dep(), dul_dep(), WaterSD, Biomass, yield, lai, GrainNo, stage, biomass_wt, GrainGreenWt, RachisGreenWt, StemGreenWt, GrainSize, LeafSenescedWt, TillerNoFertile
      sorghum
