folder Jimbour: version=19
  shared
  shared
  shared
  shared
  simulation Jimbour05
    clock
      start_date = 1/12/2005  # Select the start date of the simulation
      end_date = 30/04/2006  # Select the end date of the simulation
    summaryfile: filename=JimbourAv.sum
    metfile met: filename=Jimbour.met
    area paddock
      folder Manager folder
        manager Sow SkipRow on a fixed date
          category =  # Sowing criteria
          date = 12/12/2005  # Enter sowing date (d/m/yyyy)
          category =  # Sowing parameters
          crop = Sorghum  # Enter name of crop to sow
          density = 10.1  # Enter sowing density (plants/m2)
          depth = 30  # Enter sowing depth (mm)
          cultivar = Buster  # Enter cultivar
          row_spacing = 0.75  # Enter row spacing (m)
          RowConfiguration = solid  # Enter skip row configuration
          ftn = 0.64  # Enter Fertile Tiller No.
          on start_of_day:
```
    if (biomass > 0) then
         harvIndx = yield / biomass
      else
         harvIndx = 0
      endif



      if (day > 152) then
        current_season = year
      else
        current_season = year -1
      endif

            if (paddock_is_fallow() = 1 and today = date('[date]')) then
              season = current_season
              SowDay = day
               SowYear = year
ftn = 0

              [crop] sow plants =[density], sowing_depth = [depth], cultivar = [cultivar], row_spacing = [row_spacing], skip = [RowConfiguration], tiller_no_fertile = [ftn] ()
            endif
            if (paddock_is_fallow() = 0) then
               outputfile do_output
            endif
```
        manager Harvesting rule
          crop = Sorghum  # Enter name of crop to harvest when ripe
          on end_of_day:
```
           if [crop].StageName = 'harvest_ripe' or [crop].plant_status = 'dead' then
              [crop]  harvest
              [crop]  end_crop
           endif
```
      soil Jimbour (avg): Site=Jimbour; Region=Darling Downs; LocalName=Jimbour; SoilType=Jimbour(avg); NearestTown=Unknown; NaturalVegetation=Unknown; Cona=3.5; DiffusConst=88; DiffusSlope=35.4; U=6; Salb=0.13; Cn2Bare=91; CnRed=20; CnCov=0.8; CnCanopyFact=0.8; RootCn=30; RootWt=1500; SoilCn=12.5; EnrACoeff=7.4; EnrBCoeff=0.2
        profile
          layer:
            thickness  bd     ll15   airdry  dul    sat    sw     swcon  oc     ph     fbiom  finert  ll Sorghum  kl Sorghum  xf Sorghum
            150        1.150  0.220  0.170   0.450  0.540  0.361  0.500  1.240  7.150  0.020  0.600   0.220       0.080       1.000
            150        1.170  0.220  0.210   0.440  0.530  0.419  0.500  1.250  7.900  0.010  0.800   0.220       0.080       1.000
            300        1.160  0.250  0.240   0.440  0.530  0.397  0.500  1.100  8.250  0.010  0.900   0.250       0.080       1.000
            300        1.200  0.270  0.260   0.430  0.520  0.325  0.500  0.710  8.400  0.010  1       0.270       0.080       1.000
            300        1.220  0.310  0.300   0.420  0.510  0.339  0.500  0.340  8.350  0.010  1       0.310       0.060       1.000
            300        1.250  0.330  0.320   0.410  0.500  0.346  0.500  0.260  8.300  0.010  1       0.330       0.040       1.000
            300        1.250  0.340  0.320   0.410  0.500  0.338  0.500  1.640  8.400  0.010  1       0.340       0.020       1.000
        InitWater
          PercentMethod: Percent=0.74; Distributed=Filled from top
        InitNitrogen
          profile
            layer:
              no3      nh4    thickness
              138.065  0.100  150
              18.385   0.100  150
              20.387   0.100  300
              19.278   0.100  300
              4.272    0.100  300
              0        0.100  300
              0        0.100  300
      manager Logic
        on end_of_day:
```
  if (sw_demand > 0) then
     sdr = sw_supply / sw_demand
     if (sdr > 1) then
        sdr = 1
     endif
  else
     sdr = 1
  endif
```
      outputfile
        variables
          variables: dd/mm/yyyy as date, DaysAfterSowing, sw_dep(), ll15_dep(), dul_dep(), WaterSD, Biomass, yield, lai, GrainNo, stage, biomass_wt, GrainGreenWt, RachisGreenWt, StemGreenWt, GrainSize, LeafSenescedWt, LeafGreenWt, TillerNoFertile
      sorghum
