folder simulations: version=25
  simulation Sow1_IRR1
    clock
      start_date = 01/03/2000  # Enter the start date of the simulation
      end_date = 01/03/2001  # Enter the end date of the simulation
    summaryfile: filename=Continuous Wheat Simulation.sum
    metfile met: filename=%apsim%\Tests\Itallianryegrass2\lincoln.met
    area paddock
      surfaceom surface organic matter
        PoolName = wheat  # Organic Matter pool name
        type = wheat  # Organic Matter type
        mass = 1000  # Initial surface residue (kg/ha)
        cnr = 80  # C:N ratio of initial residue
        standing_fraction = 0  # Fraction of residue standing
      fertiliser
      folder Manager folder
        manager Sowing rule
          on start_of_day:
```
if today = date_of_sowing  then
!Itallianryegrass sow plants = 500, crop_class = plant, sowing_depth = 10, cultivar = moata, row_spacing = 300 !sets plant number at 500
Itallianryegrass2 sow population = 500, depth = 10, cultivar = Moata, MaxCover = 1.0, BudNumber = 1, row_spacing = 150, crop_class = plant
!wheat2 sow population = 500, depth = 10, cultivar = Hartog, MaxCover = 1.0, BudNumber = 1, row_spacing = 150, crop_class = plant
endif
```
        irrigation
          automatic_irrigation = off
          asw_depth = 600  # Depth to which ASW is calculated. (mm)
          crit_fr_asw = 0.5  # Fraction of ASW below which irrigation is applied (0-1.0)
          irrigation_efficiency = 1  # Efficiency of the irrigation. (0-1.0)
          irrigation_allocation = off  # Allocation limits
          allocation = 0  # Allocation in mm
          default_no3_conc = 0  # Nitrate concentration (ppm N)
          default_nh4_conc = 0  # Ammonium concentration (ppm N)
          default_cl_conc = 0  # Chloride concentration (ppm Cl)
        manager sowing date
          on init:
```
date_of_sowing = date('01-mar-2000')
```
        manager Irrigator rule
          number_of_paddocks = 10  # Number of paddocks irrigator must rotate around
          rain_event_trigger = 20  # rainfall amount (mm) to trigger irrigation pause (mm)
          rain_event_pause_time = 3  # number of days to pause after trigger rainfall event (d)
          Irrigation_amount = 50  # Amount of irrigation applied (mm)
          trigger_deficit = 0.5  # Fraction of available water in the top layer below which irrigation is allowed (0-1)
          Season_start = 1-oct  # Date irrigation season opens (dd-mmm)
          Season_finish = 1-Jan  # Date irrigation season closes (dd-mmm)
          Min_depth = 300  # Minimum depth for calculating SWD (mm)
          on init:
```
irrigation_season = 1 !period when we forbid irrigation 
irrigation_season_open = 1 !period when we forbid irrigation
paddock = 0 !start in paddock 0
days_since_rain_event = 0 ! counter to pause irrigation after rainfall event
FASW_top = 1
depth = 0
```
          on start_of_day:
```
FASW_top = (sw(1)-ll15(1))/(dul(1) - ll15(1))
depth = dlayer(1)

if depth < [Min_depth] then
   FASW_top = ((sw(1) +sw(2)) - (ll15(1) + ll15(2)))/((dul(1) + dul(2)) - (ll15(1) + ll15(2)))
   depth = depth + dlayer(2)
endif
if depth < [Min_depth] then
   FASW_top = ((sw(1) +sw(2) +sw(3)) - (ll15(1) + ll15(2) +ll15(3)))/((dul(1) + dul(2) + dul(3)) - (ll15(1) + ll15(2) +ll15(3)))
   depth = depth + dlayer(3)
endif
if depth < [Min_depth] then
   FASW_top = ((sw(1) +sw(2) +sw (3) + sw(4)) - (ll15(1) + ll15(2) +ll15(3) + 1115(4)))/((dul(1) + dul(2) + dul(3) + dul(4)) - (ll15(1) + ll15(2) +ll15(3) + ll15(4)))
   depth = depth + dlayer(4)
endif
if depth < [Min_depth] then
   FASW_top = ((sw(1) +sw(2) +sw (3) + sw(4) + sw(5)) - (ll15(1) + ll15(2) +ll15(3) + 1115(4) + ll15(5)))/((dul(1) + dul(2) =  dul(3) + dul(4) + dul(5)) - (ll15(1) + ll15(2) + ll15(3) + ll15(4) + ll15(5)))
endif

!!!!!!!!!!!Specify irrigation season start time!!!!!!!!!
irrigation_season =  (date_within('[Season_start], [Season_finish]')

if       (Irrigation_season = 0) then      !!!!This rule prevents irrigation in June and July
            irrigation_season_open = 0
            paddock = 0
elseif   (Irrigation_season = 1) and (FASW_top < [trigger_deficit]) then
            irrigation_season_open = 1
endif

!!!!!!!!!!!Count days since last rainfall event!!!!!!!!!

if        (rain >= [rain_event_trigger]) then               !!!!This rule pauses the irrigators rotation for a given number of days following a defined size of rainfall event
              days_since_rain_event = 0
else     days_since_rain_event = days_since_rain_event + 1
endif             

!!!!!!!!!!Rotate irrigator around paddocks and apply irrigation when it gets back to this paddock!!!!!!!!!!!!!

if           (irrigation_season_open = 1) and (paddock = 0) and (days_since_rain_event > [rain_event_pause_time]) then    !!!!This rule applies irrigation when the irrigator returns to this paddock if the SWD is below a given trigger
              paddock = 2                                                            !I This is 2 because it is skipping this paddock so the irrigator will return sooner than if it spend a day here irrigating
                  if  (FASW_top < [trigger_deficit]) and (paddock_is_fallow()=0) then
                         irrigation apply amount = [irrigation_amount]
                         paddock = 1                                                  !If an irrigation event is triggered in this paddock subtract 1 so that this paddock is considered in the irrigation rotation counter
                  endif
elseif  (irrigation_season_open = 1) and (paddock = [number_of_paddocks]) and (days_since_rain_event > [rain_event_pause_time]) then    !!This rule finishes the irrigators rotation and sends it back to the start (to water this paddock)
               paddock = 0 
elseif  (irrigation_season_open = 1) and (paddock > 0) and (days_since_rain_event > [rain_event_pause_time]) then    !!!!This rule moves the irrigator around one paddock in the rotation each day 
               paddock = paddock + 1
endif
```
      soil Temuka mod deep less stones: Region=Generic soil types; State=Canterbury; Longitude=999999
        SoilType = Sedementary  # Classification
        Latitude = 999999  # Latitude (WGS84)
        DataSource = Profile descriptions provided by Trevor Webb and data for functional horizions based on SWAMP project results
        Comment = Bulk density values were measured on the fine earth fraction so values entered into apsim soil are adjusted down to account for stone content (assuming stones are inert from all soil process so their mass and volume is removed from model paramaters).  SAT, DUL, LL15 and Air dry have been adjusted down to account for stone content.  OC has not been adjusted so the model will get the correct carbon and N amounts using the adjusted BD.  # Comments
        InitNitrogen Initial nitrogen
          PercentMethod: Percent=0
        InitWater Initial water
          PercentMethod: Percent=0
        Water
          Layer:
            Thickness (mm)  KS (mm/day)  BD (g/cc)  AirDry (mm/mm)  LL15 (mm/mm)  DUL (mm/mm)  SAT (mm/mm)
            200             4832.04      1.311      0.077           0.154         0.374        0.456
            200             389.23       1.524      0.201           0.201         0.332        0.394
            350             19.05        1.424      0.308           0.308         0.446        0.456
            250             98           1.601      0.162           0.162         0.325        0.376
            200             16800        0.52       0.016           0.016         0.052        0.212
            500             16800        0.52       0.016           0.016         0.052        0.212
          SoilCrop Barley
            Layer:
              Thickness (mm)  LL (mm/mm)  KL (/day)  XF (0-1)
              200             0.154       0.088      1
              200             0.201       0.079      1
              350             0.308       0.053      1
              250             0.162       0.047      1
              200             0.016       0.048      1
              500             0.016       0.036      1
          SoilCrop Canola
            Layer:
              Thickness (mm)  LL (mm/mm)  KL (/day)  XF (0-1)
              200             0.154       0.075      1
              200             0.201       0.068      0.83
              350             0.308       0.042      0.32
              250             0.162       0.033      0.51
              200             0.016       0.03       1
              500             0.016       0.019      1
          SoilCrop Cloverseed
            Layer:
              Thickness (mm)  LL (mm/mm)  KL (/day)  XF (0-1)
              200             0.154       0.05       1
              200             0.201       0.045      1
              350             0.308       0.019      0.44
              250             0.162       0.008      0.73
              200             0.016       0.005      1
              500             0.016       0.001      1
          SoilCrop Fieldpea
            Layer:
              Thickness (mm)  LL (mm/mm)  KL (/day)  XF (0-1)
              200             0.154       0.1        1
              200             0.201       0.09       0.45
              350             0.308       0.012      0.2
              250             0.162       0.004      0.3
              200             0.016       0.002      1
              500             0.016       0          1
          SoilCrop Fababean
            Layer:
              Thickness (mm)  LL (mm/mm)  KL (/day)  XF (0-1)
              200             0.154       0.1        1
              200             0.201       0.09       0.83
              350             0.308       0.07       0.32
              250             0.162       0.072      0.51
              200             0.016       0.074      1
              500             0.016       0.055      1
          SoilCrop Foragebrassica: same as Sow1_IRR1.paddock.Temuka mod deep less stones.Water.Canola
          SoilCrop Itallianryegrass
            Layer:
              Thickness (mm)  LL (mm/mm)  KL (/day)  XF (0-1)
              200             0.154       0.075      1
              200             0.201       0.068      0.83
              350             0.308       0.045      0.32
              250             0.162       0.04       0.51
              200             0.016       0.041      1
              500             0.016       0.03       1
          SoilCrop Lucerne
            Layer:
              Thickness (mm)  LL (mm/mm)  KL (/day)  XF (0-1)
              200             0.154       0.038      1
              200             0.201       0.034      1
              350             0.308       0.016      1
              250             0.162       0.013      1
              200             0.016       0.013      1
              500             0.016       0.011      1
          SoilCrop Maize: same as Sow1_IRR1.paddock.Temuka mod deep less stones.Water.Canola
          SoilCrop Oats
            Layer:
              Thickness (mm)  LL (mm/mm)  KL (/day)  XF (0-1)
              200             0.154       0.075      1
              200             0.201       0.068      1
              350             0.308       0.042      0.44
              250             0.162       0.033      0.73
              200             0.016       0.03       1
              500             0.016       0.019      1
          SoilCrop Potato
            Layer:
              Thickness (mm)  LL (mm/mm)  KL (/day)  XF (0-1)
              200             0.154       0.1        1
              200             0.201       0.045      0.45
              350             0.308       0.003      0.2
              250             0.162       0.001      0.3
              200             0.016       0          1
              500             0.016       0          1
          SoilCrop Grassseed
            Layer:
              Thickness (mm)  LL (mm/mm)  KL (/day)  XF (0-1)
              200             0.154       0.05       1
              200             0.201       0.045      0.83
              350             0.308       0.004      0.32
              250             0.162       0.001      0.51
              200             0.016       0          1
              500             0.016       0          1
          SoilCrop Triticale
            Layer:
              Thickness (mm)  LL (mm/mm)  KL (/day)  XF (0-1)
              200             0.154       0.088      1
              200             0.201       0.079      1
              350             0.308       0.045      0.44
              250             0.162       0.031      0.73
              200             0.016       0.026      1
              500             0.016       0.014      1
          SoilCrop Wheat: same as Sow1_IRR1.paddock.Temuka mod deep less stones.Water.Oats
          SoilCrop Itallianryegrass2: same as Sow1_IRR1.paddock.Temuka mod deep less stones.Water.Itallianryegrass
          SoilCrop Wheat2: same as Sow1_IRR1.paddock.Temuka mod deep less stones.Water.Oats
        SoilWat: SummerCona=4.4; SummerU=9; SummerDate=1-Nov; WinterCona=3; WinterU=6; WinterDate=1-Apr; DiffusConst=88; DiffusSlope=35; Salb=0.13; CN2Bare=73; CNRed=20; CNCov=0.8
          Layer:
            Thickness (mm)  SWCON (0-1)
            200             0.5
            200             0.37
            350             0.08
            250             0.31
            200             0.65
            500             0.65
        SoilOrganicMatter: RootCN=40; RootWT=1000; SoilCN=11; EnrACoeff=7.4; EnrBCoeff=0.2
          Layer:
            Thickness (mm)  OC (Total %)  FBiom (0-1)  FInert (0-1)
            200             4.3           0.03         0.4
            200             0.8           0.02         0.7
            350             0.4           0.01         0.9
            250             0.3           0.01         0.9
            200             0.2           0.01         1
            500             0.2           0.01         1
        Analysis
          Layer:
            Thickness (mm)  Rocks (%)  PH (1:5 water)
            200             0          5.8
            200             0          5.8
            350             0          5.8
            250             0          5.8
            200             60         5.8
            500             60         5.8
        Sample Soil sample
          Layer:
            {Thickness (mm)=30000, NO3 (ppm)=0, NH4 (ppm)=0, SW (mm/mm)=0}
      outputfile
        variables
          variables: dd/mmm/yyyy, AboveGroundWt, Cover_green, Height, LeafGreenNo, LeafLAI, LeafNodeNo, StemLiveWt, FloretLiveWt, BelowGroundWt, RootDepth, RootLengthDensity, StageCodeValue, irrigation
        events Reporting Frequency: event=Daily
      ItallianRyegrass2
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