folder simulations: version=37; creator=Apsim 7.10-r4176
  folder Soils
    Soil Nepal-sandy-clay: LocalName=Nepal Sandy Clay; YearOfSampling=0; DataSource=SAARC Nepal simulations (PLP's version)
      Water
        Thickness  BD    AirDry  LL15  DUL   SAT   KS
        150        1.45  0.05    0.2   0.33  0.41  60
        150        1.65  0.2     0.2   0.33  0.34  7
        300        1.5   0.2     0.2   0.33  0.39  25
        300        1.52  0.2     0.2   0.33  0.38  50
        300        1.55  0.2     0.2   0.33  0.37  50
        SoilCrop wheat: LL=[0.2, 0.2, 0.21, 0.25, 0.33]; KL=[0.06, 0.06, 0.04, 0.04, 0.03]; XF=[1, 1, 1, 1, 1]
        SoilCrop canola: LL=[0.2, 0.2, 0.21, 0.25, 0.33]; KL=[0.06, 0.06, 0.04, 0.04, 0.03]; XF=[1, 1, 1, 1, 1]
        SoilCrop grasspea
      SoilWater: SummerCona=3; SummerU=4; SummerDate=1-Apr; WinterCona=2.5; WinterU=3.5; WinterDate=1-Oct; DiffusConst=40; DiffusSlope=16; Salb=0.14; CN2Bare=94; CNRed=20; CNCov=0.8
        Thickness  SWCON  MWCON
        150        0.3    1
        150        0.1    1
        300        0.3    1
        300        0.3    1
        300        0.3    1
        300        0.3    1
      SoilOrganicMatter: RootCN=40; RootWt=1500; SoilCN=12.5; EnrACoeff=7.4; EnrBCoeff=0.2; OCUnits=Total
        Thickness  OC    FBiom  FInert
        150        1     0.04   0.4
        150        0.3   0.02   0.6
        300        0.2   0.02   0.8
        300        0.1   0.02   0.9
        300        0.05  0.01   1
        OC source: Unknown source or quality of data
      Analysis: Thickness=[150, 150, 300, 300, 300]; PH=[7.4, 7.3, 7.2, 6.9, 6.8]; PHUnits=Water; BoronUnits=HotWater
        PH source: Unknown source or quality of data
      InitialWater: FractionFull=0.73; PercentMethod=FilledFromTop; RelativeTo=ll15
      Sample Initial nitrogen: NO3Units=kgha; NH4Units=kgha; SWUnits=Volumetric; OCUnits=Total; PHUnits=Water
        Thickness  NO3  NH4
        150        25   5
        150        10   1
        300        5    0
        300        5    0
        300        5    0
    Soil 1-Inceptisol_Typic_Ustochrept: SoilType=Inceptisol; LocalName=Typic_Ustochrepts; YearOfSampling=0
      DataSource=Ravender et.al., 2009 Research Bulletin 44 Charactersation of Dominant Soil Subgroups of Eastern India
      Water
        Thickness  BD    AirDry  LL15   DUL    SAT    KS
        150        1.39  0.12    0.24   0.42   0.47   60
        150        1.39  0.183   0.245  0.435  0.472  40
        300        1.4   0.255   0.255  0.45   0.474  5
        300        1.41  0.286   0.286  0.445  0.467  3
        300        1.41  0.286   0.286  0.445  0.467  3
        SoilCrop wheat: LL=[0.24, 0.245, 0.255, 0.286, 0.286]; KL=[0.06, 0.06, 0.04, 0.04, 0.03]; XF=[1, 1, 1, 1, 1]
        SoilCrop canola: LL=[0.24, 0.245, 0.255, 0.286, 0.286]; KL=[0.06, 0.06, 0.04, 0.04, 0.03]; XF=[1, 1, 1, 1, 1]
        SoilCrop grasspea: LL=[0.24, 0.245, 0.255, 0.286, 0.286]; KL=[0.06, 0.06, 0.04, 0.04, 0.03]; XF=[1, 1, 1, 1, 1]
        SoilCrop chickpea: LL=[0.24, 0.245, 0.255, 0.286, 0.286]; KL=[0.06, 0.06, 0.04, 0.04, 0.03]; XF=[1, 1, 1, 1, 1]
      SoilWater: SummerCona=3; SummerU=4; SummerDate=1-Apr; WinterCona=2.5; WinterU=3.5; WinterDate=1-Oct; DiffusConst=40; DiffusSlope=16; Salb=0.14; CN2Bare=73; CNRed=20; CNCov=0.8
        Thickness  SWCON  MWCON
        150        0.3    1
        150        0.1    1
        300        0.3    1
        300        0.3    1
        300        0.3    1
        300        0.3    1
      SoilOrganicMatter: RootCN=40; RootWt=1500; SoilCN=12.5; EnrACoeff=7.4; EnrBCoeff=0.2; OCUnits=Total
        Thickness  OC    FBiom  FInert
        150        0.32  0.04   0.4
        150        0.32  0.02   0.6
        300        0.09  0.02   0.8
        300        0.06  0.02   0.9
        300        0.05  0.01   1
        OC source: Unknown source or quality of data
      Analysis: PHUnits=Water; BoronUnits=HotWater
        Thickness  EC    PH
        150        0.15  5.9
        150        0.15  5.9
        300        0.26  6.9
        300        0.43  7.1
        300        0.43  7.1
        PH source: Unknown source or quality of data
      InitialWater: FractionFull=0.73; PercentMethod=FilledFromTop; RelativeTo=ll15
      Sample Initial nitrogen: NO3Units=kgha; NH4Units=kgha; SWUnits=Volumetric; OCUnits=Total; PHUnits=Water
        Thickness  NO3   NH4
        150        5     5
        150        2     1
        300        1     0
        300        1     0
        300        0.05  0
    Soil 2-Entisol_Typic_Ustipsamment: SoilType=Entisol; LocalName=Typic_Ustipsamment; YearOfSampling=0
      DataSource=Ravender et.al., 2009 Research Bulletin 44 Charactersation of Dominant Soil Subgroups of Eastern India
      Water
        Thickness  BD    AirDry  LL15   DUL    SAT    KS
        150        1.53  0.026   0.053  0.125  0.395  600
        150        1.53  0.039   0.053  0.129  0.391  40
        300        1.54  0.09    0.09   0.186  0.415  7
        300        1.55  0.104   0.104  0.194  0.415  7
        300        1.55  0.104   0.104  0.194  0.415  7
        SoilCrop wheat: LL=[0.053, 0.053, 0.09, 0.104, 0.104]; KL=[0.06, 0.06, 0.04, 0.04, 0.03]; XF=[1, 1, 1, 1, 1]
        SoilCrop canola: LL=[0.053, 0.053, 0.09, 0.104, 0.104]; KL=[0.06, 0.06, 0.04, 0.04, 0.03]; XF=[1, 1, 1, 1, 1]
        SoilCrop grasspea: LL=[0.053, 0.053, 0.09, 0.104, 0.104]; KL=[0.06, 0.06, 0.04, 0.04, 0.03]; XF=[1, 1, 1, 1, 1]
        SoilCrop maize: LL=[0.053, 0.053, 0.09, 0.104, 0.104]; KL=[0.06, 0.06, 0.04, 0.04, 0.03]; XF=[1, 1, 1, 1, 1]
        SoilCrop chickpea: LL=[0.053, 0.053, 0.09, 0.104, 0.104]; KL=[0.06, 0.06, 0.04, 0.04, 0.03]; XF=[1, 1, 1, 1, 1]
      SoilWater: SummerCona=3; SummerU=4; SummerDate=1-Apr; WinterCona=2.5; WinterU=3.5; WinterDate=1-Oct; DiffusConst=220; DiffusSlope=40; Salb=0.14; CN2Bare=62; CNRed=20; CNCov=0.8
        Thickness  SWCON  MWCON
        150        0.7    1
        150        0.7    1
        300        0.7    1
        300        0.7    1
        300        0.6    1
        300        0.5    1
      SoilOrganicMatter: RootCN=40; RootWt=1500; SoilCN=12.5; EnrACoeff=7.4; EnrBCoeff=0.2; OCUnits=Total
        Thickness  OC    FBiom  FInert
        150        0.39  0.04   0.4
        150        0.39  0.02   0.6
        300        0.21  0.02   0.8
        300        0.15  0.02   0.9
        300        0.05  0.01   1
        OC source: Unknown source or quality of data
      Analysis: PHUnits=Water; BoronUnits=HotWater
        Thickness  EC    PH
        150        0.05  5.6
        150        0.05  5.6
        300        0.04  5.9
        300        0.04  6
        300        0.04  6
        PH source: Unknown source or quality of data
      InitialWater: FractionFull=0.73; PercentMethod=FilledFromTop; RelativeTo=ll15
      Sample Initial nitrogen: NO3Units=kgha; NH4Units=kgha; SWUnits=Volumetric; OCUnits=Total; PHUnits=Water
        Thickness  NO3   NH4
        150        5     5
        150        2     1
        300        1     0
        300        1     0
        300        0.05  0
    Soil 3-Inceptisol_Aeric Haplaquept: SoilType=Inceptisol; LocalName=Aeric Haplaquept; YearOfSampling=0
      DataSource=Ravender et.al., 2009 Research Bulletin 44 Charactersation of Dominant Soil Subgroups of Eastern India
      Water
        Thickness  BD    AirDry  LL15   DUL    SAT    KS
        150        1.46  0.051   0.102  0.224  0.401  254
        150        1.46  0.09    0.102  0.244  0.405  254
        300        1.48  0.13    0.13   0.328  0.421  44.16
        300        1.48  0.173   0.173  0.327  0.428  44
        300        1.48  0.173   0.173  0.327  0.428  44
        SoilCrop wheat: LL=[0.102, 0.102, 0.13, 0.173, 0.173]; KL=[0.06, 0.06, 0.04, 0.04, 0.03]; XF=[1, 1, 1, 1, 1]
        SoilCrop canola: LL=[0.102, 0.102, 0.13, 0.173, 0.173]; KL=[0.06, 0.06, 0.04, 0.04, 0.03]; XF=[1, 1, 1, 1, 1]
        SoilCrop grasspea: LL=[0.102, 0.102, 0.13, 0.173, 0.173]; KL=[0.06, 0.06, 0.04, 0.04, 0.03]; XF=[1, 1, 1, 1, 1]
        SoilCrop chickpea: LL=[0.102, 0.102, 0.13, 0.173, 0.173]; KL=[0.06, 0.06, 0.04, 0.04, 0.03]; XF=[1, 1, 1, 1, 1]
      SoilWater: SummerCona=3; SummerU=4; SummerDate=1-Apr; WinterCona=2.5; WinterU=3.5; WinterDate=1-Oct; DiffusConst=220; DiffusSlope=40; Salb=0.14; CN2Bare=62; CNRed=20; CNCov=0.8
        Thickness  SWCON  MWCON
        150        0.7    1
        150        0.7    1
        300        0.5    1
        300        0.3    1
        300        0.3    1
      SoilOrganicMatter: RootCN=40; RootWt=1500; SoilCN=12.5; EnrACoeff=7.4; EnrBCoeff=0.2; OCUnits=Total
        Thickness  OC    FBiom  FInert
        150        0.8   0.04   0.4
        150        0.8   0.02   0.6
        300        0.39  0.02   0.8
        300        0.22  0.02   0.9
        300        0.1   0.01   1
        OC source: Unknown source or quality of data
      Analysis: PHUnits=Water; BoronUnits=HotWater
        Thickness  EC    PH
        150        0.1   6
        150        0.1   6
        300        0.09  6.1
        300        0.09  6.4
        300        0.09  6.4
        PH source: Unknown source or quality of data
      InitialWater: FractionFull=0.73; PercentMethod=FilledFromTop; RelativeTo=ll15
      Sample Initial nitrogen: NO3Units=kgha; NH4Units=kgha; SWUnits=Volumetric; OCUnits=Total; PHUnits=Water
        Thickness  NO3   NH4
        150        5     5
        150        2     1
        300        1     0
        300        1     0
        300        0.05  0
  simulation Variety-Simal
    metfile met: filename=%apsim%\Tests\Lentil\Tarahara_2001-2002.met
    manager ClimateControl
      # Climate Control Window
      date1 = 1-jan  # Enter window START date (dd-mmm)
      date2 = 31-dec  # Enter window END date (dd-mmm)
      # Climate Change Parameters
      MaxtChange = -3  # Change in maximum temperature (oC)
      MintChange = -2.2  # Change in minimum temperature (oC)
      RainChange = 0  # Relative change in daily rainfall (%)
      RadnChange = 0  # Relative change in daily radiation (%)
      CO2 = 400  # Atmospheric CO2 Concentration (ppm)
      on prenewmet:
```
!  Adjust daily temperatures, rainfall and radiation up or down according to user-defined amounts
! To apply different levels of climate control to different times of year add multiple copies of this logic into your simulation and change the window.

if (date_within('[date1], [date2]') = 1) then
   maxt = maxt + [MaxtChange]
   mint = mint + [MintChange]
   rain = rain + rain * [RainChange] / 100
   radn = radn + radn * [RadnChange] / 100
   co2 = [CO2]
 endif
```
      on Init:
```
co2 = [CO2]
tav = tav + ([MaxtChange] + [MintChange]) / 2
```
    clock
      start_date = 01/10/2001  # Select the start date of the simulation
      end_date = 30/06/2002  # Select the end date of the simulation
    summaryfile: filename=Continuous Wheat Simulation.sum
    area Field1
      manager Harvesting rule
        # Harvesting criteria
        crop = lentil  # Enter name of crop to harvest when ripe
        on end_of_day:
```
! Harvest rule for wheat

           if ('[crop]' = 'cotton') then
              if ([crop].ozcot_status > 0) then
                  [crop] harvest
              endif
           elseif ([crop].StageName = 'harvest_ripe' or [crop].plant_status = 'dead') then
              [crop]  harvest
              [crop]  end_crop

! remove some stubble for animal feed
               surfaceom tillage type = user_defined, f_incorp = 0.6 (), tillage_depth = 0.0
           endif
```
      fertiliser
      surfaceom
        PoolName = Soybean  # Organic Matter pool name
        type = soybean  # Organic Matter type
        mass = 1500  # Initial surface residue (kg/ha)
        cnr = 80  # C:N ratio of initial residue
        standing_fraction = 0.15  # Fraction of residue standing (0-1)
      irrigation
        automatic_irrigation = off
        asw_depth = 600  # Depth to which ASW is calculated. (mm)
        crit_fr_asw = .5  # Fraction of ASW below which irrigation is applied (0-1.0)
        irrigation_efficiency = 1  # Efficiency of the irrigation. (0-1.0)
        irrigation_allocation = off  # Allocation limits
        allocation = 800  # Allocation in mm
        default_no3_conc = 0.0  # Nitrate concentration (ppm N)
        default_nh4_conc = 0.0  # Ammonium concentration (ppm N)
        default_cl_conc = 0.0  # Chloride concentration (ppm Cl)
      lentil
      Soil 1-Inceptisol_Typic_Ustochrept: SoilType=Inceptisol; LocalName=Typic_Ustochrepts; YearOfSampling=0
        DataSource=Ravender et.al., 2009 Research Bulletin 44 Charactersation of Dominant Soil Subgroups of Eastern India
        Water
          Thickness  BD    AirDry  LL15   DUL    SAT    KS
          150        1.39  0.12    0.24   0.42   0.47   120
          150        1.39  0.183   0.245  0.435  0.472  80
          300        1.4   0.255   0.255  0.45   0.474  10
          300        1.41  0.286   0.286  0.445  0.467  10
          300        1.41  0.286   0.286  0.445  0.467  10
          300        1.41  0.286   0.286  0.445  0.467  10
          SoilCrop wheat: LL=[0.24, 0.245, 0.255, 0.286, 0.35, 0.445]; KL=[0.06, 0.06, 0.04, 0.04, 0.03, 0.03]; XF=[1, 1, 1, 1, 1, 1]
          SoilCrop canola: LL=[0.24, 0.245, 0.255, 0.286, 0.286, 0.286]; KL=[0.06, 0.06, 0.04, 0.04, 0.03, 0.03]; XF=[1, 1, 1, 1, 1, 1]
          SoilCrop grasspea: LL=[0.24, 0.245, 0.255, 0.286, 0.286, 0.286]; KL=[0.06, 0.06, 0.04, 0.04, 0.03, 0.03]; XF=[1, 1, 1, 1, 1, 1]
          SoilCrop maize: LL=[0.24, 0.245, 0.255, 0.286, 0.35, 0.445]; KL=[0.06, 0.06, 0.04, 0.04, 0.03, 0.03]; XF=[1, 1, 1, 1, 1, 1]
          SoilCrop lentil: LL=[0.24, 0.245, 0.255, 0.335, 0.445, 0.445]; KL=[0.06, 0.04, 0.02, 0.01, 0.01, 0.01]; XF=[1, 1, 1, 1, 0, 0]
        SoilWater: SummerCona=4; SummerU=4.5; SummerDate=1-Apr; WinterCona=2.5; WinterU=3.5; WinterDate=1-Oct; DiffusConst=40; DiffusSlope=16; Salb=0.14; CN2Bare=73; CNRed=20; CNCov=0.8
          Thickness  SWCON  MWCON
          150        0.3    1
          150        0.1    1
          300        0.3    1
          300        0.3    1
          300        0.3    1
          300        0.3    1
        SoilOrganicMatter: RootCN=40; RootWt=1500; SoilCN=12.5; EnrACoeff=7.4; EnrBCoeff=0.2; OCUnits=Total
          Thickness  OC    FBiom  FInert
          150        0.79  0.035  0.3
          150        0.58  0.02   0.4
          300        0.09  0.02   0.8
          300        0.06  0.02   0.9
          300        0.05  0.01   1
          300        0.05  0.01   1
          OC source: Unknown source or quality of data (layer 1, 2, 3, 4, 5)
        Analysis: PHUnits=Water; BoronUnits=HotWater
          Thickness  EC    PH
          150        0.15  5.9
          150        0.15  5.9
          300        0.26  6.9
          300        0.43  7.1
          300        0.43  7.1
          300        0.43  7.1
          PH source: Unknown source or quality of data (layer 1, 2, 3, 4, 5)
        InitialWater: FractionFull=0.4; PercentMethod=FilledFromTop; RelativeTo=ll15
        Sample Initial nitrogen: NO3Units=kgha; NH4Units=kgha; SWUnits=Volumetric; OCUnits=Total; PHUnits=Water
          Thickness  NO3   NH4
          150        5     5
          150        2     1
          300        1     0
          300        1     0
          300        0.05  0
          300        0     0
      folder Rabi
        manager Cultivate_Rabi
          # When should tillage be done
          tillage_date = 14-Oct  # Enter tillage date (dd-mmm)
          # Tillage application details
          surfaceommodule = surfaceOM  # Module used to apply the tillage
          tillage_type = user_defined
          tillage_depth = 200  # User_defined depth of seedbed preparation (mm)
          tillage_f_incorp = 1.0  # User_defined fraction of surface residues to incorporate (0-1)
          on start_of_day:
```
         if (today = date('[tillage_date]') then
            if ('[tillage_type]' = 'user_defined') then
                '[surfaceommodule]' tillage type = [tillage_type], f_incorp = [tillage_f_incorp] (), tillage_depth = [tillage_depth]
            else
                '[surfaceommodule]' tillage type = [tillage_type]
            endif
            ready_to_till_pre_sow = 0
            till_day_pre_sow = 0
         endif
```
        manager Sow_Lentil
          # Sowing criteria
          date1 = 21-Oct  # Enter sowing window START date (dd-mmm)
          date2 = 21-oct  # Enter sowing window END date (dd-mmm)
          must_sow = yes  # Must sow?
          raincrit = 30  # Amount of rainfall
          rainnumdays = 3  # Number of days of rainfall
          esw_amount = 200  # Enter minimum allowable available soil water (mm)
          # Sowing parameters
          crop = lentil  # Enter name of crop to sow
          density = 151  # Enter sowing density (plants/m2)
          depth = 50  # Enter sowing depth (mm)
          cultivar = Simal  # Enter cultivar
          class = plant  # Enter crop growth class
          row_spacing = 200  # Enter row spacing (mm)
          on start_of_day:
```
      if (paddock_is_fallow() = 1 and FallowIn <> 'yes' and (NextCrop = 0 or NextCrop = '[crop]')) then
         if (date_within('[date1], [date2]') = 1) then
            if (rain[[rainnumdays]] >= [raincrit] AND esw >= [esw_amount]) OR
                ('[must_sow]' = 'yes' AND today = date('[date2]'))) THEN
               ChooseNextCrop = 'yes'   ! for rotations
               [crop] sow plants =[density], sowing_depth = [depth], cultivar = [cultivar], row_spacing = [row_spacing], crop_class = [class]
 ! irrigation apply amount = 20
                  crop = 'Lentil'
                  CWU = 0
            endif
            if today = date('[date2]') then
               ChooseNextCrop = 'yes'
            endif
         endif
      endif
            

CWU = CWU + es + ep

if daysaftersowing > 10 then
   Root_shoot = RootTotalWt/(leafTotalWt + StemTotalWt + PodTotalWt + GrainTotalWt) 
endif
```
          on init:
```
Root_shoot = 0
```
        manager Irrigate DAS1
          # When should fertiliser be applied
          modulename = lentil  # On which crop is fertiliser being applied
          irrig_das = 129  # Enter days after sowing to irrigate
          # Irrigation application details
          irrig_module = Irrigation  # Module used to apply the irrigation
          irrig_amount = 50  # Irrigation amount (mm)
          on start_of_day:
```
         if ([modulename].DaysAfterSowing = [irrig_das]) then
            irrigation apply amount = [irrig_amount]
         endif
```
        manager Fertilise DAS1
          # When should fertiliser be applied
          modulename = lentil  # On which crop is fertiliser being applied
          fert_das = 1  # Enter fertiliser days after sowing
          fert_criteria = 1000  # Amount of N required in top 3 layers (kg/ha)
          # Fertiliser application details
          fertmodule = fertiliser  # Module used to apply the fertiliser
          fert_amount = 10  # Amount of fertiliser to apply (kg/ha)
          fert_type = urea_N  # Fertiliser type
          on start_of_day:
```
         if ([modulename].DaysAfterSowing = [fert_das]) then
            '[fertmodule]' apply amount = [fert_amount] (kg/ha), depth = 50 (mm), type = [fert_type] ()
         endif
```
      outputfile: filename=Variety-Simal Field1.out; title=Variety-Simal Field1
        memo
           *NOTE:
          1. Have adjusted the climate flie for an area to the SE of Kathmandu to reduce max and min temperatures to reflect temperatures at the altitude of Kathmandu. This seems to work as the observed degree-days to flowering are simulated correctly.

          2. 2001-02 was a wetter season than normal so have added one irrigation during the period of increased rainfall (ie. rainfall of 159 mm 86-164 DAS)

          3. Only measured values for Green Area Index (GAI) to compare with lentil LAI

          4. There is a difference between the sum of the partitioned components (leaf,stem,pod wall and seed) based on figure 5 (Shrestha et al., 2005) and biomass and seed yield values given in Table 2 (Shrestha et al., 2005).
           *NOTE:
          1. Have adjusted the climate flie for an area to the SE of Kathmandu to reduce max and min temperatures to reflect temperatures at the altitude of Kathmandu. This seems to work as the observed degree-days to flowering are simulated correctly.
          2. 2001-02 was a wetter season than normal so have

          There is a difference between the sum of the partitioned components (leaf,stem,pod wall and seed) based on figure 5 (Shrestha et al., 2005) and biomass and seed yield values given in Table 2 (Shrestha et al., 2005).
        events Reporting Frequency: event=daily
        variables
          variables: dd/mm/yyyy as Date, Day, Month, Year, DaysAftersowing, Stage, TT, day_length, biomass, green_biomass, yield, yieldwet, biomass_wt, leafGreenWt, leafTotalWt, StemGreenWt, StemTotalWt, PodTotalWt, PodGreenWt, GrainTotalWt, grain_wt, PodSenescedWt, RootTotalWt, Root_shoot, node_no, leaf_no, lai, rain, irrigation, runoff, drain, esw, surfaceom_wt, dul(1), sw(1), sw(2), sw(3), ep, es, CWU, NO3(), Nh4(), dlt_n_min(), fertiliser, sw_stress_expan, sw_stress_pheno, sw_stress_photo, nfact_expan, nfact_pheno, nfact_photo
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