folder simulations: version=27
  memo
    Plant Release: Original Plant module as per March 2010
    PlantModifiedPFR: Optional modifications at Plant and Food Research New Zealand (PFR): empirical LAI as function of thermal-time; photoperiod at start of cycle for phenology, total RUE and partitioning of biomass to roots using external driver (photoperiod in this case)
    Plant2PFR: Same as PlantModifiedPFR but trying to use Plant2 structure and new math functions to  (e.g. cohort model did not give same results than the LAI in Plant)

    - We are using this to test the new math functions included with John Hargreaves at PFR

    File naming:

    - Location: lincoln (Lincoln University paddock at Field Service Centre)

    Year: 2000-04

    Paddock: Iversen 9 (obs: this was called Iversen 7 until 2001)

    Treatments: refer to the length of grazing cycle.

    Grasslands Kaituna Lucerne

    Grazing cycle length treatments - as in publications and simulations:

    (i) LL (graze each 42 days all year round) - 42days

    Publications that it relates to:

    2000-2002:

    Brown HE, Moot DJ, Teixeira EI (2005). The components of lucerne (Medicago sativa) leaf area index respond to temperature and photoperiod in a temperate climate. European Journal of Agronomy 23(4), 348-358.

    2002-2004:

    Teixeira EI, Moot DJ, Mickelbart MV (2007a). Seasonal patterns of root C and N reserves of lucerne crops (Medicago sativa L.) grown in a temperate climate were affected by defoliation regime. European Journal of Agronomy 26 (1), 10-20.

    OBSERVATION:

    We had to move observed data 2 days before actual to avoid datapoints colected after the grazing date

    Location: Lincoln University site (Iversen 9 at Field Service Centre)

    Obs: Data 2000-02 for this padock still needs to be organized and added from Brown et al 2005
  simulation PlantRelease
    memo
      This includes changes to Plant in phenology parameterization (e.g. photoperiod at start of phase) and phyllochron as caibration for Kaituna.
    clock
      start_date = 24/10/2000  # Enter the start date of the simulation
      end_date = 01/11/2004  # Enter the end date of the simulation
    summaryfile: filename=Continuous Wheat Simulation.sum
    metfile met: filename=lincoln.met
    area paddock
      surfaceom surface organic matter
        PoolName = wheat  # Organic Matter pool name
        type = wheat  # Organic Matter type
        mass = 1000  # Initial surface residue (kg/ha)
        cnr = 80  # C:N ratio of initial residue
        standing_fraction = 0  # Fraction of residue standing
      fertiliser
      folder Manager folder
        manager Sowing rule
          on start_of_day:
```
if today = date('24-oct-2000')  then
lucerne sow plants = 850, crop_class = plant, sowing_depth = 20, cultivar = kaituna !sets plant number at 850
endif
```
        operations grazingLL
          24/01/2001  lucerne harvest height = 0.0 (mm) , remove = 1.00 ()
          7/03/2001  lucerne harvest height = 0.0 (mm) , remove = 1.00 ()
          2/05/2001  lucerne harvest height = 0.0 (mm) , remove = 1.00 ()
          4/07/2001  lucerne harvest height = 0.0 (mm) , remove = 1.00 ()
          29/09/2001  lucerne harvest height = 0.0 (mm) , remove = 1.00 ()
          14/11/2001  lucerne harvest height = 0.0 (mm) , remove = 1.00 ()
          21/12/2001  lucerne harvest height = 0.0 (mm) , remove = 1.00 ()
          31/01/2002  lucerne harvest height = 0.0 (mm) , remove = 1.00 ()
          4/04/2002  lucerne harvest height = 0.0 (mm) , remove = 1.00 ()
          14/06/2002  lucerne harvest height = 0.0 (mm) , remove = 1.00 ()
          6/10/2002  lucerne harvest height = 0.0 (mm) , remove = 1.00 ()
          17/11/2002  lucerne harvest height = 0.0 (mm) , remove = 1.00 ()
          28/12/2002  lucerne harvest height = 0.0 (mm) , remove = 1.00 ()
          11/02/2003  lucerne harvest height = 0.0 (mm) , remove = 1.00 ()
          23/03/2003  lucerne harvest height = 0.0 (mm) , remove = 1.00 ()
          5/05/2003  lucerne harvest height = 0.0 (mm) , remove = 1.00 ()
          13/06/2003  lucerne harvest height = 0.0 (mm) , remove = 1.00 ()
          6/10/2003  lucerne harvest height = 0.0 (mm) , remove = 1.00 ()
          13/11/2003  lucerne harvest height = 0.0 (mm) , remove = 1.00 ()
          29/12/2003  lucerne harvest height = 0.0 (mm) , remove = 1.00 ()
          8/02/2004  lucerne harvest height = 0.0 (mm) , remove = 1.00 ()
          20/03/2004  lucerne harvest height = 0.0 (mm) , remove = 1.00 ()
          3/05/2004  lucerne harvest height = 0.0 (mm) , remove = 1.00 ()
          12/06/2004  lucerne harvest height = 0.0 (mm) , remove = 1.00 ()
          3/10/2004  lucerne harvest height = 0.0 (mm) , remove = 1.00 ()
        irrigation
          automatic_irrigation = off
          asw_depth = 600  # Depth to which ASW is calculated. (mm)
          crit_fr_asw = 0.5  # Fraction of ASW below which irrigation is applied (0-1.0)
          irrigation_efficiency = 1  # Efficiency of the irrigation. (0-1.0)
          irrigation_allocation = off  # Allocation limits
          allocation = 0  # Allocation in mm
          default_no3_conc = 0  # Nitrate concentration (ppm N)
          default_nh4_conc = 0  # Ammonium concentration (ppm N)
          default_cl_conc = 0  # Chloride concentration (ppm Cl)
        operations irrigation_applic
          20/12/2000  irrigation apply amount= 25 (mm)
          29/12/2000  irrigation apply amount= 30 (mm)
          28/01/2001  irrigation apply amount= 36 (mm)
          17/02/2001  irrigation apply amount= 45 (mm)
          7/03/2001  irrigation apply amount= 55 (mm)
          30/03/2001  irrigation apply amount= 80 (mm)
          29/04/2001  irrigation apply amount= 52 (mm)
          6/10/2001  irrigation apply amount= 70 (mm)
          6/12/2001  irrigation apply amount= 70 (mm)
          20/12/2001  irrigation apply amount= 80 (mm)
          12/09/2002  irrigation apply amount= 42 (mm)
          11/10/2002  irrigation apply amount= 40 (mm)
          31/12/2002  irrigation apply amount= 47 (mm)
          19/01/2003  irrigation apply amount= 40 (mm)
          12/02/2003  irrigation apply amount= 45 (mm)
          28/02/2003  irrigation apply amount= 45 (mm)
          14/03/2003  irrigation apply amount= 50 (mm)
          27/03/2003  irrigation apply amount= 40 (mm)
          27/11/2003  irrigation apply amount= 35 (mm)
          2/01/2004  irrigation apply amount= 40 (mm)
          14/01/2004  irrigation apply amount= 40 (mm)
          15/02/2004  irrigation apply amount= 40 (mm)
        manager Aux_Variable
          on init:
```
treat = 'LL'

rue_day = 0

tmean = 0

test = 0

phyl = 51

crop_class_no = 0

season = 0

stage_counter = 0

shootDM = 0

leafDM = 0

stemDM = 0

rootDM = 0

intRad = 0 ! intercepted radiation in MJ/m2/day (total solar)

phyllochron = 0.0 ! Calculated to compare with Plant 2
```
          on start_of_day:
```
if ( today >= date('1-Mar')) then

   season = 3

endif 

if ( today >= date('1-Jun')) then

   season = 4

endif 

if ( today >= date('1-Sep')) then

   season = 1
   
endif
   
if ( today >= date('1-Dec')) then

   season = 2

endif
```
          on end_of_day:
```
! ------------ calculates daily RUE (g DM/MJ total radiation) ------------

 intRad = cover_green * radn

 if cover_green > 0 then

      rue_day = dlt_dm / intRad
      
else

      rue_day = 0 
      
endif

! --------------  calculates average temperature ----------------

tmean = ( maxt + mint ) * 0.5

! -------------- change class to delay at photoperiod < 12.5 h (Lincoln site!) --------

if ( today > date('04-Apr') AND today < date('09-Sep')) then

!      lucerne delay

!      lucerne reduce
   
else
   
!      lucerne regrowth ! I had to create the regrowth action into delayed class in the ini file for that
        
endif


! ------ report class as a number - doing that because when I report names graphs do not work!---------

if (crop_class = ('plant') then

      crop_class_no = 1

elseif (crop_class = ('regrowth') then 

      crop_class_no = 2

elseif (crop_class = ('delayed') then 

      crop_class_no = 3
   
elseif (crop_class = ('reduced') then
   
      crop_class_no = 4
   
else 
      crop_class_no = 5

endif


! -----

! ---- Stage counter

if ( stage >= 1) then

   stage_counter = 1

endif 

if ( stage >= 2) then

   stage_counter = 2

endif 

if ( stage >= 3) then

   stage_counter = 3

endif 

if ( stage >= 4) then

   stage_counter = 4

endif 

if ( stage >= 5) then

   stage_counter = 5

endif 


if ( stage >= 6) then

   stage_counter = 6

endif 

if ( stage >= 7) then

   stage_counter = 7

endif 

if ( stage >= 8) then

   stage_counter = 8

endif 

if ( stage >= 9) then

   stage_counter = 9

endif 

if ( stage >= 10) then

   stage_counter = 10

endif 

if ( stage >= 11) then

   stage_counter = 11

endif 


!-------------------------

!--- Read state variables and convert from g/m2 to kg/ha


leafDM = leaftotalwt * 10

stemDM = stemtotalwt * 10

rootDM = roottotalwt * 10

shootDM = leafDM + stemDM
```
          on end_of_day:
```
if (dlt_node_no = 0) then

   phyllochron = 0

else

   phyllochron =  tt / dlt_node_no

endif
```
      soil Iversen 7 Wakanui silt loam: Region=Generic soil types; State=Canterbury; Longitude=999999
        SoilType = Sedementary  # Classification
        Latitude = 999999  # Latitude (WGS84)
        DataSource = From soil measurements made in field
        Water
          Layer:
            Thickness (mm)  KS (mm/day)  BD (g/cc)  AirDry (mm/mm)  LL15 (mm/mm)  DUL (mm/mm)  SAT (mm/mm)
            200             58.99        1.334      0.05            0.1           0.343        0.47
            100             58.99        1.334      0.05            0.1           0.333        0.47
            100             6.41         1.526      0.1             0.1           0.279        0.4
            100             6.41         1.526      0.1             0.1           0.272        0.4
            100             6.23         1.566      0.086           0.086         0.292        0.38
            100             6.23         1.566      0.06            0.06          0.288        0.38
            100             9.49         1.441      0.03            0.03          0.272        0.43
            100             9.49         1.441      0.03            0.03          0.284        0.43
            100             33.26        1.372      0.06            0.06          0.3          0.45
            100             33.26        1.372      0.1             0.1           0.32         0.45
            100             33.26        1.372      0.1             0.1           0.316        0.45
            100             33.26        1.372      0.1             0.1           0.341        0.45
            100             33.26        1.372      0.1             0.1           0.348        0.45
            100             33.26        1.372      0.1             0.1           0.343        0.45
            100             33.26        1.372      0.1             0.1           0.345        0.45
            100             33.26        1.372      0.1             0.1           0.333        0.45
            100             33.26        1.372      0.1             0.1           0.326        0.45
            100             33.26        1.372      0.1             0.1           0.341        0.45
            100             33.26        1.372      0.1             0.1           0.343        0.45
            100             33.26        1.372      0.1             0.1           0.345        0.45
            100             33.26        1.372      0.1             0.1           0.357        0.45
            100             33.26        1.372      0.1             0.1           0.358        0.45
          SoilCrop Barley
            Layer:
              Thickness (mm)  LL (mm/mm)  KL (/day)  XF (0-1)
              200             0.1         0.088      1
              100             0.1         0.088      1
              100             0.1         0.079      1
              100             0.1         0.079      1
              100             0.086       0.044      1
              100             0.06        0.044      1
              100             0.03        0.035      1
              100             0.03        0.035      1
              100             0.06        0.07       1
              100             0.1         0.07       1
              100             0.1         0.07       1
              100             0.1         0.07       1
              100             0.1         0.07       1
              100             0.1         0.07       1
              100             0.1         0.07       1
              100             0.1         0.07       1
              100             0.1         0.07       1
              100             0.1         0.07       1
              100             0.1         0.07       1
              100             0.1         0.07       1
              100             0.1         0.07       1
              100             0.1         0.07       1
          SoilCrop Canola
            Layer:
              Thickness (mm)  LL (mm/mm)  KL (/day)  XF (0-1)
              200             0.1         0.075      1
              100             0.1         0.075      1
              100             0.1         0.068      0.83
              100             0.1         0.068      0.83
              100             0.086       0.038      0.51
              100             0.06        0.038      0.51
              100             0.03        0.03       0.32
              100             0.03        0.03       0.32
              100             0.06        0.06       0.51
              100             0.1         0.06       0.51
              100             0.1         0.06       0.51
              100             0.1         0.06       0.51
              100             0.1         0.06       0.51
              100             0.1         0.06       0.51
              100             0.1         0.06       0.51
              100             0.1         0.06       0.51
              100             0.1         0.06       0.51
              100             0.1         0.06       0.51
              100             0.1         0.06       0.51
              100             0.1         0.06       0.51
              100             0.1         0.06       0.51
              100             0.1         0.06       0.51
          SoilCrop Cloverseed
            Layer:
              Thickness (mm)  LL (mm/mm)  KL (/day)  XF (0-1)
              200             0.1         0.05       1
              100             0.1         0.05       1
              100             0.1         0.045      1
              100             0.1         0.045      1
              100             0.086       0.025      0.73
              100             0.06        0.025      0.73
              100             0.03        0.02       0.44
              100             0.03        0.02       0.44
              100             0.06        0.04       0.73
              100             0.1         0.04       0.73
              100             0.1         0.04       0.73
              100             0.1         0.04       0.73
              100             0.1         0.04       0.73
              100             0.1         0.04       0.73
              100             0.1         0.04       0.73
              100             0.1         0.04       0.73
              100             0.1         0.04       0.73
              100             0.1         0.04       0.73
              100             0.1         0.04       0.73
              100             0.1         0.04       0.73
              100             0.1         0.04       0.73
              100             0.1         0.04       0.73
          SoilCrop Fieldpea
            Layer:
              Thickness (mm)  LL (mm/mm)  KL (/day)  XF (0-1)
              200             0.1         0.1        1
              100             0.1         0.1        1
              100             0.1         0.09       0.45
              100             0.1         0.09       0.45
              100             0.086       0.05       0.3
              100             0.06        0.05       0.3
              100             0.03        0.04       0.2
              100             0.03        0.04       0.2
              100             0.06        0.08       0.3
              100             0.1         0.08       0.3
              100             0.1         0.08       0.3
              100             0.1         0.08       0.3
              100             0.1         0.08       0.3
              100             0.1         0.08       0.3
              100             0.1         0.08       0.3
              100             0.1         0.08       0.3
              100             0.1         0.08       0.3
              100             0.1         0.08       0.3
              100             0.1         0.08       0.3
              100             0.1         0.08       0.3
              100             0.1         0.08       0.3
              100             0.1         0.08       0.3
          SoilCrop Fababean
            Layer:
              Thickness (mm)  LL (mm/mm)  KL (/day)  XF (0-1)
              200             0.1         0.1        1
              100             0.1         0.1        1
              100             0.1         0.09       0.83
              100             0.1         0.09       0.83
              100             0.086       0.05       0.51
              100             0.06        0.05       0.51
              100             0.03        0.04       0.32
              100             0.03        0.04       0.32
              100             0.06        0.08       0.51
              100             0.1         0.08       0.51
              100             0.1         0.08       0.51
              100             0.1         0.08       0.51
              100             0.1         0.08       0.51
              100             0.1         0.08       0.51
              100             0.1         0.08       0.51
              100             0.1         0.08       0.51
              100             0.1         0.08       0.51
              100             0.1         0.08       0.51
              100             0.1         0.08       0.51
              100             0.1         0.08       0.51
              100             0.1         0.08       0.51
              100             0.1         0.08       0.51
          SoilCrop Foragebrassica: same as PlantRelease.paddock.Iversen 7 Wakanui silt loam.Water.Canola
          SoilCrop Itallianryegrass: same as PlantRelease.paddock.Iversen 7 Wakanui silt loam.Water.Canola
          SoilCrop Lucerne
            Layer:
              Thickness (mm)  LL (mm/mm)  KL (/day)  XF (0-1)
              200             0.1         0.038      1
              100             0.1         0.038      1
              100             0.1         0.034      1
              100             0.1         0.034      1
              100             0.086       0.019      1
              100             0.06        0.019      1
              100             0.03        0.015      1
              100             0.03        0.015      1
              100             0.06        0.03       1
              100             0.1         0.03       1
              100             0.1         0.03       1
              100             0.1         0.03       1
              100             0.1         0.03       1
              100             0.1         0.03       1
              100             0.1         0.03       1
              100             0.1         0.03       1
              100             0.1         0.03       1
              100             0.1         0.03       1
              100             0.1         0.03       1
              100             0.1         0.03       1
              100             0.1         0.03       1
              100             0.1         0.03       1
          SoilCrop Maize: same as PlantRelease.paddock.Iversen 7 Wakanui silt loam.Water.Canola
          SoilCrop Oats
            Layer:
              Thickness (mm)  LL (mm/mm)  KL (/day)  XF (0-1)
              200             0.1         0.075      1
              100             0.1         0.075      1
              100             0.1         0.068      1
              100             0.1         0.068      1
              100             0.086       0.038      0.73
              100             0.06        0.038      0.73
              100             0.03        0.03       0.44
              100             0.03        0.03       0.44
              100             0.06        0.06       0.73
              100             0.1         0.06       0.73
              100             0.1         0.06       0.73
              100             0.1         0.06       0.73
              100             0.1         0.06       0.73
              100             0.1         0.06       0.73
              100             0.1         0.06       0.73
              100             0.1         0.06       0.73
              100             0.1         0.06       0.73
              100             0.1         0.06       0.73
              100             0.1         0.06       0.73
              100             0.1         0.06       0.73
              100             0.1         0.06       0.73
              100             0.1         0.06       0.73
          SoilCrop Potato: same as PlantRelease.paddock.Iversen 7 Wakanui silt loam.Water.Fieldpea
          SoilCrop Grassseed
            Layer:
              Thickness (mm)  LL (mm/mm)  KL (/day)  XF (0-1)
              200             0.1         0.05       1
              100             0.1         0.05       1
              100             0.1         0.045      0.83
              100             0.1         0.045      0.83
              100             0.086       0.025      0.51
              100             0.06        0.025      0.51
              100             0.03        0.02       0.32
              100             0.03        0.02       0.32
              100             0.06        0.04       0.51
              100             0.1         0.04       0.51
              100             0.1         0.04       0.51
              100             0.1         0.04       0.51
              100             0.1         0.04       0.51
              100             0.1         0.04       0.51
              100             0.1         0.04       0.51
              100             0.1         0.04       0.51
              100             0.1         0.04       0.51
              100             0.1         0.04       0.51
              100             0.1         0.04       0.51
              100             0.1         0.04       0.51
              100             0.1         0.04       0.51
              100             0.1         0.04       0.51
          SoilCrop Triticale
            Layer:
              Thickness (mm)  LL (mm/mm)  KL (/day)  XF (0-1)
              200             0.1         0.088      1
              100             0.1         0.088      1
              100             0.1         0.079      1
              100             0.1         0.079      1
              100             0.086       0.044      0.73
              100             0.06        0.044      0.73
              100             0.03        0.035      0.44
              100             0.03        0.035      0.44
              100             0.06        0.07       0.73
              100             0.1         0.07       0.73
              100             0.1         0.07       0.73
              100             0.1         0.07       0.73
              100             0.1         0.07       0.73
              100             0.1         0.07       0.73
              100             0.1         0.07       0.73
              100             0.1         0.07       0.73
              100             0.1         0.07       0.73
              100             0.1         0.07       0.73
              100             0.1         0.07       0.73
              100             0.1         0.07       0.73
              100             0.1         0.07       0.73
              100             0.1         0.07       0.73
          SoilCrop Wheat: same as PlantRelease.paddock.Iversen 7 Wakanui silt loam.Water.Oats
          SoilCrop lucerne2: same as PlantRelease.paddock.Iversen 7 Wakanui silt loam.Water.Lucerne
        SoilWat: SummerCona=4.4; SummerU=9; SummerDate=1-Nov; WinterCona=3; WinterU=6; WinterDate=1-Apr; DiffusConst=88; DiffusSlope=35; Salb=0.13; CN2Bare=73; CNRed=20; CNCov=0.8
          Layer:
            Thickness (mm)  SWCON (0-1)
            200             0.49
            100             0.49
            100             0.34
            100             0.34
            100             0.37
            100             0.37
            100             0.1
            100             0.1
            100             0.39
            100             0.39
            100             0.39
            100             0.39
            100             0.39
            100             0.39
            100             0.39
            100             0.39
            100             0.39
            100             0.39
            100             0.39
            100             0.39
            100             0.39
            100             0.39
        SoilOrganicMatter: RootCN=40; RootWT=1000; SoilCN=11; EnrACoeff=7.4; EnrBCoeff=0.2
          Layer:
            Thickness (mm)  OC (Total %)  FBiom (0-1)  FInert (0-1)
            200             2.7           0.03         0.4
            100             1             0.02         0.6
            100             0.45          0.01         0.7
            100             0.3           0.01         0.8
            100             0.2           0.01         0.9
            100             0.2           0.01         0.9
            100             0.2           0.01         0.9
            100             0.2           0.01         0.9
            100             0.2           0.01         1
            100             0.2           0.01         1
            100             0.2           0.01         1
            100             0.2           0.01         1
            100             0.2           0.01         1
            100             0.2           0.01         1
            100             0.2           0.01         0.9
            100             0.2           0.01         1
            100             0.2           0.01         1
            100             0.2           0.01         1
            100             0.2           0.01         1
            100             0.2           0.01         1
            100             0.2           0.01         1
            100             0.2           0.01         1
        Analysis
          Layer:
            Thickness (mm)  Rocks (%)  PH (1:5 water)
            200             0          5.8
            100             0          5.8
            100             0          5.8
            100             0          5.8
            100             0          5.8
            100             0          5.8
            100             0          5.8
            100             0          5.8
            100             0          5.8
            100             0          5.8
            100             0          5.8
            100             0          5.8
            100             0          5.8
            100             0          5.8
            100             0          5.8
            100             0          5.8
            100             0          5.8
            100             0          5.8
            100             0          5.8
            100             0          5.8
            100             0          5.8
            100             0          5.8
        Sample Initial nitrogen
          Layer:
            Thickness (mm)  NO3 (ppm)  NH4 (ppm)
            200             15.4914    0.0929483
            100             15.4914    0.0929483
            100             15.4914    0.0929483
            100             15.4914    0.0929483
            100             15.4914    0.0929483
            100             15.4914    0.0929483
            100             15.4914    0.0929483
            100             15.4914    0.0929483
            100             15.4914    0.0929483
            100             15.4914    0.0929483
            100             15.4914    0.0929483
            100             15.4914    0.0929483
            100             15.4914    0.0929483
            100             15.4914    0.0929483
            100             15.4914    0.0929483
            100             15.4914    0.0929483
            100             15.4914    0.0929483
            100             15.4914    0.0929483
            100             15.4914    0.0929483
            100             15.4914    0.0929483
            100             15.4914    0.0929483
            100             15.4914    0.0929483
        InitWater Initial water
          PercentMethod: Percent=1.00; Distributed=Filled from top
      lucerne
        ini: filename=lucerneRelease.xml
      outputfile TestResults
        variables
          variables: dd/mm/yyyy as Date, tt, stage, node_no, lai, shootDM, leafDM, stemDM, rootDM, esw
        events Reporting Frequency: event=end_day
      micromet: soilalbedo=0.23; a_interception=0.0; b_interception=0.0; c_interception=0.0; d_interception=0.0
  simulation PlantModifiedPFR -> /simulations/PlantRelease
    area paddock -> /simulations/PlantRelease/paddock
      lucerne
        ini: filename=lucernePlantModifiedPFR.xml
      micromet
        soilalbedo = 0.23
        a_interception = 0
        b_interception = 0
        c_interception = 0
        d_interception = 0
  simulation Plant2PFR -> /simulations/PlantRelease
    clock
      start_date = 24/10/2000  # Enter the start date of the simulation
      end_date = 01/11/2004  # Enter the end date of the simulation
    summaryfile: filename=Continuous Wheat Simulation.sum
    area paddock -> /simulations/PlantRelease/paddock
      lucerne2
        ini: filename=LucernePlant2TestPFR.xml
      SoilTemp2 Soil Temperature (.NET)
        maxt_time_default = 14  # hours
        bound_layer_cond_source = calc  # boundary layer conductance source (calc/constant)
        bound_layer_cond = 20  # boundary layer conductance
        boundary_layer_conductance_iterations = 1  # Number of iterations to calc boundary layer conductance (0-10)
        net_radn_source = calc  # net radiation source (calc/eos)
        default_wind_speed = 3  # m/s
        default_altitude = 18  # default altitude (m) 275m (700 ft) is approx 980 hPa
        default_instrum_height = 1.2  # default instrument height for wind and temperature (m)
        bare_soil_height = 57  # height of bare soil (mm)
      soil Iversen 7 Wakanui silt loam: Region=Generic soil types; State=Canterbury; Longitude=999999
        SoilType = Sedementary  # Classification
        Latitude = 999999  # Latitude (WGS84)
        DataSource = From soil measurements made in field
        Water
          Layer:
            Thickness (mm)  KS (mm/day)  BD (g/cc)  AirDry (mm/mm)  LL15 (mm/mm)  DUL (mm/mm)  SAT (mm/mm)
            200             58.99        1.334      0.05            0.1           0.343        0.47
            100             58.99        1.334      0.05            0.1           0.333        0.47
            100             6.41         1.526      0.1             0.1           0.279        0.4
            100             6.41         1.526      0.1             0.1           0.272        0.4
            100             6.23         1.566      0.086           0.086         0.292        0.38
            100             6.23         1.566      0.06            0.06          0.288        0.38
            100             9.49         1.441      0.03            0.03          0.272        0.43
            100             9.49         1.441      0.03            0.03          0.284        0.43
            100             33.26        1.372      0.06            0.06          0.3          0.45
            100             33.26        1.372      0.1             0.1           0.32         0.45
            100             33.26        1.372      0.1             0.1           0.316        0.45
            100             33.26        1.372      0.1             0.1           0.341        0.45
            100             33.26        1.372      0.1             0.1           0.348        0.45
            100             33.26        1.372      0.1             0.1           0.343        0.45
            100             33.26        1.372      0.1             0.1           0.345        0.45
            100             33.26        1.372      0.1             0.1           0.333        0.45
            100             33.26        1.372      0.1             0.1           0.326        0.45
            100             33.26        1.372      0.1             0.1           0.341        0.45
            100             33.26        1.372      0.1             0.1           0.343        0.45
            100             33.26        1.372      0.1             0.1           0.345        0.45
            100             33.26        1.372      0.1             0.1           0.357        0.45
            100             33.26        1.372      0.1             0.1           0.358        0.45
          SoilCrop Lucerne: same as PlantRelease.paddock.Iversen 7 Wakanui silt loam.Water.Lucerne
          SoilCrop lucerne2: same as PlantRelease.paddock.Iversen 7 Wakanui silt loam.Water.Lucerne
        SoilWat: same as PlantRelease.paddock.Iversen 7 Wakanui silt loam.SoilWat
        SoilOrganicMatter: same as PlantRelease.paddock.Iversen 7 Wakanui silt loam.SoilOrganicMatter
        Analysis
          Layer:
            Thickness (mm)  Rocks (%)  PH (1:5 water)  ParticleSizeClay (%)
            200             0          5.8             10
            100             0          5.8             10
            100             0          5.8             10
            100             0          5.8             10
            100             0          5.8             10
            100             0          5.8             10
            100             0          5.8             10
            100             0          5.8             10
            100             0          5.8             10
            100             0          5.8             10
            100             0          5.8             10
            100             0          5.8             10
            100             0          5.8             10
            100             0          5.8             10
            100             0          5.8             10
            100             0          5.8             10
            100             0          5.8             10
            100             0          5.8             10
            100             0          5.8             10
            100             0          5.8             10
            100             0          5.8             10
            100             0          5.8             10
        Sample Initial nitrogen: same as PlantRelease.paddock.Iversen 7 Wakanui silt loam.Initial nitrogen
        InitWater Initial water
          PercentMethod: Percent=1.00; Distributed=Filled from top
      outputfile TestResults
        variables
          variable:
            dd/mm/yyyy as Date
            PhenologyThermalTimeValue as tt
            StageCodeValue as stage
            LeafNodeNo as node_no
            LeafLAI as lai
            shootDM
            leafDM
            stemDM
            rootDM
            esw
        events Reporting Frequency: event=end_day
      folder Manager folder
        manager Sowing rule
          on start_of_day:
```
if today = date('24-oct-2000')  then
lucerne2 sow population = 850, depth = 10, cultivar = kaituna, maxcover = 1.0, budnumber = 1, row_spacing = 500, crop_class =
endif
```
        operations grazingLL
          24/01/2001  lucerne2  cut
          7/03/2001  lucerne2  cut
          2/05/2001  lucerne2  cut
          4/07/2001  lucerne2  cut
          29/09/2001  lucerne2  cut
          14/11/2001  lucerne2  cut
          21/12/2001  lucerne2  cut
          31/01/2002  lucerne2  cut
          4/04/2002  lucerne2  cut
          14/06/2002  lucerne2  cut
          6/10/2002  lucerne2  cut
          17/11/2002  lucerne2  cut
          28/12/2002  lucerne2  cut
          11/02/2003  lucerne2  cut
          23/03/2003  lucerne2  cut
          5/05/2003  lucerne2  cut
          13/06/2003  lucerne2  cut
          6/10/2003  lucerne2  cut
          13/11/2003  lucerne2  cut
          29/12/2003  lucerne2  cut
          8/02/2004  lucerne2  cut
          20/03/2004  lucerne2  cut
          3/05/2004  lucerne2  cut
          12/06/2004  lucerne2  cut
          3/10/2004  lucerne2 cut
        irrigation: same as PlantRelease.paddock.Manager folder.Irrigation
        operations irrigation_applic: same as PlantRelease.paddock.Manager folder.irrigation_applic
        manager Aux_Variable
          on init:
```
treat = 'LL'

rue_day = 0

tmean = 0

test = 0

phyl = 51

crop_class_no = 0

season = 0

stage_counter = 0

shootDM = 0

leafDM = 0

stemDM = 0

rootDM = 0

intRad = 0 ! intercepted radiation in MJ/m2/day (total solar)

EndJuvenilePhotoperiod = 0 ! (h)

NodeAppRate = 0.0 ! Calculated rate for Plant 2

flagLAI = 1.0 ! Flag for stopping LAI developemnt after a high LAI of 5.0
```
          on start_of_day:
```
if ( today >= date('1-Mar')) then

   season = 3

endif 

if ( today >= date('1-Jun')) then

   season = 4

endif 

if ( today >= date('1-Sep')) then

   season = 1
   
endif
   
if ( today >= date('1-Dec')) then

   season = 2

endif 



!---------------- This flag stops LAI develoments when LAI is greater than 5.0 -------------
! It's a multiplyier of MaxArea in Plant2

if (lucerne2.LeafLAI > 5.0) then
   
   flagLAI = 0.001
   
else
         
   flagLAI = 1.0
   
endif
```
          on end_of_day:
```
! ------------ calculates daily RUE (g DM/MJ total radiation) ------------

 intRad = lucerne2.cover_green * radn

if lucerne2.cover_green > 0 then

      rue_day = ArbitratorDMSupply / intRad ! We are guessing this is the dlt_dm from "old" Plant
      
else

      rue_day = 0 
      
endif

! --------------  calculates average temperature ----------------

tmean = ( maxt + mint ) * 0.5

! -------------- change class to delay at photoperiod < 12.5 h (Lincoln site!) --------

if ( today > date('04-Apr') AND today < date('09-Sep')) then

!      lucerne delay

!      lucerne reduce
   
else
   
!      lucerne regrowth ! I had to create the regrowth action into delayed class in the ini file for that
        
endif


! ------ report class as a number - doing that because when I report names graphs do not work!---------

!if (crop_class = ('plant') then

!      crop_class_no = 1

!elseif (crop_class = ('regrowth') then 

!      crop_class_no = 2

!elseif (crop_class = ('delayed') then 

!      crop_class_no = 3
   
!elseif (crop_class = ('reduced') then
   
!      crop_class_no = 4
   
!else 
!      crop_class_no = 5

!endif


! -----

! ---- Stage counter

if ( stage >= 1) then

   stage_counter = 1

endif 

if ( stage >= 2) then

   stage_counter = 2

endif 

if ( stage >= 3) then

   stage_counter = 3

endif 

if ( stage >= 4) then

   stage_counter = 4

endif 

if ( stage >= 5) then

   stage_counter = 5

endif 


if ( stage >= 6) then

   stage_counter = 6

endif 

if ( stage >= 7) then

   stage_counter = 7

endif 

if ( stage >= 8) then

   stage_counter = 8

endif 

if ( stage >= 9) then

   stage_counter = 9

endif 

if ( stage >= 10) then

   stage_counter = 10

endif 

if ( stage >= 11) then

   stage_counter = 11

endif 


!-------------------------

!--- Read state variables and convert from g/m2 to kg/ha


leafDM = lucerne2.LeafLiveWt2 * 10

stemDM = lucerne2.StemLiveWt * 10

rootDM = lucerne2.BelowGroundDM * 10

shootDM = leafDM + stemDM


act_mods end_of_day2 ! This is just an exercise to learn how to create new events
```
          on end_of_day2:
```
if (lucerne2.LeafNodeAppearanceRateValue = 0.0) then
   
   NodeAppRate = 0
   
else
         
   NodeAppRate = lucerne2.PhenologyThermalTimeValue /  lucerne2.LeafNodeAppearanceRateValue
   
endif
```
      micromet
        soilalbedo = 0.23
        a_interception = 0
        b_interception = 0
        c_interception = 0
        d_interception = 0
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