folder simulations: version=27
  simulation ReleasedLucerne
    metfile met: filename=%apsim%\Examples\MetFiles\goond.met
    clock
      start_date = 01/06/1940  # Enter the start date of the simulation
      end_date = 31/12/1941  # Enter the end date of the simulation
    summaryfile: filename=Continuous Wheat Simulation.sum
    area paddock
      soil: Site=Jimbour; Region=South East Queensland; LocalName=Waco
        SoilType = Black Vertosol  # Classification
        NearestTown = Jimbour, Q 4352
        NaturalVegetation = Grassland, mainly Qld bluegrass
        InitWater Initial water
          percentmethod: percent=1; distributed=filled from top
        Water
          Layer:
            Thickness (mm)  BD (g/cc)  AirDry (mm/mm)  LL15 (mm/mm)  DUL (mm/mm)  SAT (mm/mm)
            150             1.02       0.15            0.29          0.54         0.59
            150             1.03       0.26            0.29          0.53         0.58
            300             1.02       0.29            0.29          0.54         0.59
            300             1.02       0.29            0.29          0.54         0.58
            300             1.06       0.3             0.3           0.52         0.57
            300             1.11       0.31            0.31          0.5          0.55
            300             1.12       0.32            0.32          0.5          0.55
            300             1.15       0.33            0.33          0.48         0.53
            300             1.18       0.34            0.34          0.47         0.52
            300             1.2        0.35            0.35          0.46         0.51
            300             1.25       0.36            0.36          0.44         0.49
          SoilCrop Barley
            Layer:
              Thickness (mm)  LL (mm/mm)  KL (/day)  XF (0-1)
              150             0.29        0.1        1
              150             0.29        0.1        1
              300             0.32        0.08       1
              300             0.38        0.06       1
              300             0.39        0.04       1
              300             0.39        0.02       1
              300             0.41        0.01       1
              300             0.48        0          0
              300             0.47        0          0
              300             0.46        0          0
              300             0.44        0          0
          SoilCrop Chickpea
            Layer:
              Thickness (mm)  LL (mm/mm)  KL (/day)  XF (0-1)
              150             0.29        0.1        1
              150             0.29        0.1        1
              300             0.36        0.08       1
              300             0.43        0.06       1
              300             0.51        0.04       1
              300             0.5         0.02       1
              300             0.5         0.01       1
              300             0.48        0          0
              300             0.47        0          0
              300             0.46        0          0
              300             0.44        0          0
          SoilCrop Lucerne
            Layer:
              Thickness (mm)  LL (mm/mm)  KL (/day)  XF (0-1)
              150             0.29        0.1        1
              150             0.29        0.1        1
              300             0.29        0.1        1
              300             0.29        0.1        1
              300             0.3         0.09       1
              300             0.31        0.09       1
              300             0.32        0.09       1
              300             0.33        0.09       1
              300             0.34        0.09       1
              300             0.35        0.09       1
              300             0.36        0.09       1
          SoilCrop Lucerne2: same as ReleasedLucerne.paddock.Soil.Water.Lucerne
          SoilCrop Maize
            Layer:
              Thickness (mm)  LL (mm/mm)  KL (/day)  XF (0-1)
              150             0.29        0.1        1
              150             0.29        0.1        1
              300             0.34        0.1        1
              300             0.34        0.08       1
              300             0.37        0.06       1
              300             0.4         0.04       1
              300             0.42        0.02       1
              300             0.48        0          0
              300             0.47        0          0
              300             0.46        0          0
              300             0.44        0          0
          SoilCrop Perennial Grass
            Layer:
              Thickness (mm)  LL (mm/mm)  KL (/day)  XF (0-1)
              150             0.29        0.1        1
              150             0.29        0.1        1
              300             0.39        0.1        1
              300             0.41        0.1        1
              300             0.4         0.09       1
              300             0.4         0.07       1
              300             0.41        0.05       1
              300             0.41        0          0
              300             0.4         0          0
              300             0.4         0          0
              300             0.42        0          0
          SoilCrop Sorghum
            Layer:
              Thickness (mm)  LL (mm/mm)  KL (/day)  XF (0-1)
              150             0.29        0.1        1
              150             0.29        0.1        1
              300             0.35        0.1        1
              300             0.38        0.08       1
              300             0.4         0.06       1
              300             0.4         0.04       1
              300             0.4         0.02       1
              300             0.48        0          0
              300             0.47        0          0
              300             0.46        0          0
              300             0.44        0          0
          SoilCrop Wheat
            Layer:
              Thickness (mm)  LL (mm/mm)  KL (/day)  XF (0-1)
              150             0.29        0.1        1
              150             0.29        0.1        1
              300             0.32        0.08       1
              300             0.32        0.06       1
              300             0.35        0.04       1
              300             0.38        0.02       1
              300             0.41        0.01       1
              300             0.48        0          0
              300             0.47        0          0
              300             0.46        0          0
              300             0.44        0          0
          SoilCrop wheat2: same as ReleasedLucerne.paddock.Soil.Water.Wheat
        SoilWat: SummerCona=3.5; SummerU=6; SummerDate=1-Nov; WinterCona=3.5; WinterU=6; WinterDate=1-Apr; DiffusConst=40; DiffusSlope=16; Salb=0.13; Cn2Bare=73; CnRed=20; CnCov=0.8
          Layer:
            Thickness (mm)  SWCON (0-1)
            150             0.3
            150             0.3
            300             0.3
            300             0.3
            300             0.3
            300             0.3
            300             0.3
            300             0.3
            300             0.3
            300             0.3
            300             0.3
        SoilOrganicMatter: RootCn=40; RootWt=200; SoilCn=12.5; EnrACoeff=7.4; EnrBCoeff=0.2
          Layer:
            Thickness (mm)  OC (Total %)  FBiom (0-1)  FInert (0-1)
            150             1.04          0.025        0.4
            150             0.89          0.02         0.6
            300             0.89          0.015        0.8
            300             0.89          0.01         0.9
            300             0.77          0.01         0.95
            300             0.45          0.01         0.95
            300             0.27          0.01         0.95
            300             0.22          0.01         0.95
            300             0.16          0.01         0.95
            300             0.13          0.01         0.95
            300             0.12          0.01         0.95
        Analysis
          Layer:
            Thickness (mm)  EC (1:5 dS/m)  PH (1:5 water)
            150             0.2            8.4
            150             0.25           8.8
            300             0.31           9
            300             0.4            9.2
            300             0.59           9.2
            300             0.84           9.1
            300             0.93           9
            300             1.01           9
            300             1.06           8.9
            300             1.05           8.9
            300             1.01           8.9
        Sample Initial nitrogen
          Layer:
            Thickness (mm)  NO3 (ppm)  NH4 (ppm)
            150             10         0.599004
            150             10         0.100001
            300             8          0.100001
            300             6          0.100001
            300             4          0.100001
            300             3          0.100001
            300             2          0.100001
            300             1.701      0.100001
            300             1.701      0.100001
            300             1.701      0.100001
            300             1.701      0.100001
      surfaceom surface organic matter
        PoolName = wheat  # Organic Matter pool name
        type = wheat  # Organic Matter type
        mass = 1000  # Initial surface residue (kg/ha)
        cnr = 80  # C:N ratio of initial residue
        standing_fraction = 0  # Fraction of residue standing
      fertiliser
      lucerne
      folder Manager folder
        manager Sow on a fixed date
          # Sowing criteria
          date = 1-jun-1940  # Enter sowing date (dd-mmm)
          # Sowing parameters
          crop = lucerne  # Enter name of crop to sow
          density = 300  # Enter sowing density (plants/m2)
          depth = 10  # Enter sowing depth (mm)
          cultivar = hunter_river  # Enter cultivar
          class = plant  # Enter crop growth class
          row_spacing = 500  # Enter row spacing (mm)
          on start_of_day:
```
        if (today = date('[date]') then
              [crop] sow plants =[density], sowing_depth = [depth], cultivar = [cultivar], row_spacing = [row_spacing], crop_class = [class]
         endif
```
        manager Harvesting rule
          # Harvesting criteria
          crop = lucerne  # Enter name of crop to harvest when ripe
          on end_of_day:
```
          if stagename = 'flowering' then
!           if day = 270 then
                        [crop]  harvest 
          endif
```
        manager Fertilise incrop on critical NO3 level- top up
          #
          modulename = lucerne  # In which crop is fertiliser being applied
          fert_criteria = 200  # Maximum Amount of NO3 required in top 3 layers (kg/ha)
          fert_critical = 100  # Critical Amount of NO3 in top 3 layers (kg/ha)
          #
          fertmodule = fertiliser  # Module used to apply the fertiliser
          fert_type = NO3_N  # Fertiliser type
          on start_of_day:
```
         if ([modulename].plant_status = 'alive') then
            NO3_available = no3(1) + no3(2) + no3(3)
            if (NO3_available <= [fert_critical]) then
               N_deficit = [fert_criteria] - NO3_available
               '[fertmodule]' apply amount = N_deficit (kg/ha), depth = 50 (mm), type = [fert_type] ()
            endif
         endif
```
        manager greenleafno
          on init:
```
leaf_no_green = 0
repro_dm = 0
```
          on end_of_day:
```
leaf_no_green = leaf_no - leaf_no_sen
repro_dm = podtotalwt + grainwt
```
      outputfile
        variables
          variables: dd/mm/yyyy as Date, stage, stagename, tt, root_depth, rld(), node_no, leaves_per_node, leaf_no, leaf_no_green, leaf_no_sen, lai, biomass_wt, green_biomass_wt, leaftotalwt, leafgreenwt, stemtotalwt, stemgreenwt, roottotalwt, podtotalwt, grain_wt, swdef_expan, swdef_photo, dlt_dm, repro_dm, esw, sw, nfact_expan, nfact_photo, leafsenescedwt, leafdetachingwt, leafsenescingwt, temp_stress_photo, ep
        events Reporting Frequency: event=daily
      micromet: soilalbedo=0.23; a_interception=0.0; b_interception=0.0; c_interception=0.0; d_interception=0.0
  simulation Lucerne2 -> /simulations/ReleasedLucerne
    area paddock -> /simulations/ReleasedLucerne/paddock
      lucerne2
        ini: filename=%apsim%\Model\Lucerne2.xml
      folder Manager folder -> /simulations/ReleasedLucerne/paddock/Manager folder
        manager Sow on a fixed date
          # Sowing criteria
          date = 1-jun-1940  # Enter sowing date (dd-mmm)
          # Sowing parameters
          crop = lucerne2  # Enter name of crop to sow
          density = 300  # Enter sowing density (plants/m2)
          depth = 10  # Enter sowing depth (mm)
          cultivar = hunter_river  # Enter cultivar
          class =  # Enter crop growth class
          row_spacing = 500  # Enter row spacing (mm)
          on start_of_day:
```
        if (today = date('[date]') then
              [crop] sow population =[density], depth = [depth], cultivar = [cultivar], MaxCover = 1.0, BudNumber = 1, row_spacing = [row_spacing], crop_class = [class]
         endif
```
        manager dlt_dm
          on init:
```
PrevDayDM = 0
DltDM = 0
SumDM = 0
PrevDayDeadWt = 0
DltDMold =0
```
          on start_of_day:
```
PrevDayDM = AboveGroundWt
PrevDayDeadWt = LeafDeadWt + StemDeadWt

 !     if PhenologyCurrentPhaseName = 'FloweringToStartGrainFill' then
     if StageCodeValue >= 6.0 then
 !     if day = 270 then
          lucerne2  cut 
      endif
```
          on end_of_day:
```
ShootDeadWt = LeafDeadWt + StemDeadWt
DltDM = (AboveGroundWt - ShootDeadWt)- (PrevDayDM - PrevDayDeadWt)
DltDMold = AboveGroundWt - PrevDayDM
SumDM = BelowGroundWt + StemLiveWt + LeafLiveWt + PodLiveWt

if DltDM <= 0 then
   DltDM = 0
endif

if DltDMold <= 0 then
   DltDMold = 0
endif
```
        manager Fertilise incrop on critical NO3 level- top up
          #
          modulename = lucerne2  # In which crop is fertiliser being applied
          fert_criteria = 200  # Maximum Amount of NO3 required in top 3 layers (kg/ha)
          fert_critical = 100  # Critical Amount of NO3 in top 3 layers (kg/ha)
          #
          fertmodule = fertiliser  # Module used to apply the fertiliser
          fert_type = NO3_N  # Fertiliser type
          on start_of_day:
          script: same as in ReleasedLucerne.paddock.Manager folder.Fertilise incrop on critical NO3 level- top up
      outputfile -> /simulations/ReleasedLucerne/paddock/outputfile
        variables
          variables: dd/mm/yyyy as Date, StageCodeValue, PhenologyThermalTimeValue, StageCodeValue, PhenologyCurrentPhaseName, PhenologyCurrentStageName, RootDepth, LeafNodeNo, LeafFullyExpandedNodeNo, LeafDeadNodeNo, LeafGreenNo, LeafTotalNo, RootLengthDensity(), LeafLAI, TotalWt, BelowGroundWt, AboveGroundWt, StemLiveWt, LeafLiveWt, PodLiveWt, LeafPhotosynthesisFtValue, LeafPhotosynthesisFvpdValue, LeafFw, DltDM, SumDM, RootTemperatureEffectValue, LeafPhotosynthesisFtValue, esw, sw, LeafDeadWt, StemDeadWt, PrevDayDeadWt, ShootDeadWt, DltDMold, RootWaterUptake
      micromet: soilalbedo=0.23; a_interception=0.0; b_interception=0.0; c_interception=0.0; d_interception=0.0
  simulation Plant2PFR
    clock
      start_date = 24/10/2000  # Enter the start date of the simulation
      end_date = 01/11/2004  # Enter the end date of the simulation
    summaryfile: filename=Continuous Wheat Simulation.sum
    metfile met: filename=%apsim%\Examples\MetFiles\lincoln.met
    area paddock
      lucerne2
      fertiliser
      soil Iversen 7 Wakanui silt loam: Region=Generic soil types; State=Canterbury; Longitude=999999
        SoilType = Sedementary  # Classification
        Latitude = 999999  # Latitude (WGS84)
        DataSource = From soil measurements made in field
        Water
          Layer:
            Thickness (mm)  KS (mm/day)  BD (g/cc)  AirDry (mm/mm)  LL15 (mm/mm)  DUL (mm/mm)  SAT (mm/mm)
            200             58.99        1.334      0.05            0.1           0.343        0.47
            100             58.99        1.334      0.05            0.1           0.333        0.47
            100             6.41         1.526      0.1             0.1           0.279        0.4
            100             6.41         1.526      0.1             0.1           0.272        0.4
            100             6.23         1.566      0.086           0.086         0.292        0.38
            100             6.23         1.566      0.06            0.06          0.288        0.38
            100             9.49         1.441      0.03            0.03          0.272        0.43
            100             9.49         1.441      0.03            0.03          0.284        0.43
            100             33.26        1.372      0.06            0.06          0.3          0.45
            100             33.26        1.372      0.1             0.1           0.32         0.45
            100             33.26        1.372      0.1             0.1           0.316        0.45
            100             33.26        1.372      0.1             0.1           0.341        0.45
            100             33.26        1.372      0.1             0.1           0.348        0.45
            100             33.26        1.372      0.1             0.1           0.343        0.45
            100             33.26        1.372      0.1             0.1           0.345        0.45
            100             33.26        1.372      0.1             0.1           0.333        0.45
            100             33.26        1.372      0.1             0.1           0.326        0.45
            100             33.26        1.372      0.1             0.1           0.341        0.45
            100             33.26        1.372      0.1             0.1           0.343        0.45
            100             33.26        1.372      0.1             0.1           0.345        0.45
            100             33.26        1.372      0.1             0.1           0.357        0.45
            100             33.26        1.372      0.1             0.1           0.358        0.45
          SoilCrop Lucerne
            Layer:
              Thickness (mm)  LL (mm/mm)  KL (/day)  XF (0-1)
              200             0.1         0.038      1
              100             0.1         0.038      1
              100             0.1         0.034      1
              100             0.1         0.034      1
              100             0.086       0.019      1
              100             0.06        0.019      1
              100             0.03        0.015      1
              100             0.03        0.015      1
              100             0.06        0.03       1
              100             0.1         0.03       1
              100             0.1         0.03       1
              100             0.1         0.03       1
              100             0.1         0.03       1
              100             0.1         0.03       1
              100             0.1         0.03       1
              100             0.1         0.03       1
              100             0.1         0.03       1
              100             0.1         0.03       1
              100             0.1         0.03       1
              100             0.1         0.03       1
              100             0.1         0.03       1
              100             0.1         0.03       1
          SoilCrop lucerne2: same as Plant2PFR.paddock.Iversen 7 Wakanui silt loam.Water.Lucerne
        SoilWat: SummerCona=4.4; SummerU=9; SummerDate=1-Nov; WinterCona=3; WinterU=6; WinterDate=1-Apr; DiffusConst=88; DiffusSlope=35; Salb=0.13; CN2Bare=73; CNRed=20; CNCov=0.8
          Layer:
            Thickness (mm)  SWCON (0-1)
            200             0.49
            100             0.49
            100             0.34
            100             0.34
            100             0.37
            100             0.37
            100             0.1
            100             0.1
            100             0.39
            100             0.39
            100             0.39
            100             0.39
            100             0.39
            100             0.39
            100             0.39
            100             0.39
            100             0.39
            100             0.39
            100             0.39
            100             0.39
            100             0.39
            100             0.39
        SoilOrganicMatter: RootCN=40; RootWT=1000; SoilCN=11; EnrACoeff=7.4; EnrBCoeff=0.2
          Layer:
            Thickness (mm)  OC (Total %)  FBiom (0-1)  FInert (0-1)
            200             2.7           0.03         0.4
            100             1             0.02         0.6
            100             0.45          0.01         0.7
            100             0.3           0.01         0.8
            100             0.2           0.01         0.9
            100             0.2           0.01         0.9
            100             0.2           0.01         0.9
            100             0.2           0.01         0.9
            100             0.2           0.01         1
            100             0.2           0.01         1
            100             0.2           0.01         1
            100             0.2           0.01         1
            100             0.2           0.01         1
            100             0.2           0.01         1
            100             0.2           0.01         0.9
            100             0.2           0.01         1
            100             0.2           0.01         1
            100             0.2           0.01         1
            100             0.2           0.01         1
            100             0.2           0.01         1
            100             0.2           0.01         1
            100             0.2           0.01         1
        Analysis
          Layer:
            Thickness (mm)  Rocks (%)  PH (1:5 water)  ParticleSizeClay (%)
            200             0          5.8             10
            100             0          5.8             10
            100             0          5.8             10
            100             0          5.8             10
            100             0          5.8             10
            100             0          5.8             10
            100             0          5.8             10
            100             0          5.8             10
            100             0          5.8             10
            100             0          5.8             10
            100             0          5.8             10
            100             0          5.8             10
            100             0          5.8             10
            100             0          5.8             10
            100             0          5.8             10
            100             0          5.8             10
            100             0          5.8             10
            100             0          5.8             10
            100             0          5.8             10
            100             0          5.8             10
            100             0          5.8             10
            100             0          5.8             10
        Sample Initial nitrogen
          Layer:
            Thickness (mm)  NO3 (ppm)  NH4 (ppm)
            200             15.4914    0.0929483
            100             15.4914    0.0929483
            100             15.4914    0.0929483
            100             15.4914    0.0929483
            100             15.4914    0.0929483
            100             15.4914    0.0929483
            100             15.4914    0.0929483
            100             15.4914    0.0929483
            100             15.4914    0.0929483
            100             15.4914    0.0929483
            100             15.4914    0.0929483
            100             15.4914    0.0929483
            100             15.4914    0.0929483
            100             15.4914    0.0929483
            100             15.4914    0.0929483
            100             15.4914    0.0929483
            100             15.4914    0.0929483
            100             15.4914    0.0929483
            100             15.4914    0.0929483
            100             15.4914    0.0929483
            100             15.4914    0.0929483
            100             15.4914    0.0929483
        InitWater Initial water
          PercentMethod: Percent=1.00; Distributed=Filled from top
      outputfile TestResults
        variables
          variable:
            dd/mm/yyyy as Date
            PhenologyThermalTimeValue as tt
            StageCodeValue as stage
            LeafNodeNo as node_no
            LeafLAI as lai
            shootDM
            leafDM
            stemDM
            rootDM
            esw
        events Reporting Frequency: event=end_day
      folder Manager folder
        manager Sowing rule
          on start_of_day:
```
if today = date('24-oct-2000')  then
lucerne2 sow population = 850, depth = 10, cultivar = kaituna, maxcover = 1.0, budnumber = 1, row_spacing = 500, crop_class =
endif
```
        operations grazingLL
          24/01/2001  lucerne2  cut
          7/03/2001  lucerne2  cut
          2/05/2001  lucerne2  cut
          4/07/2001  lucerne2  cut
          29/09/2001  lucerne2  cut
          14/11/2001  lucerne2  cut
          21/12/2001  lucerne2  cut
          31/01/2002  lucerne2  cut
          4/04/2002  lucerne2  cut
          14/06/2002  lucerne2  cut
          6/10/2002  lucerne2  cut
          17/11/2002  lucerne2  cut
          28/12/2002  lucerne2  cut
          11/02/2003  lucerne2  cut
          23/03/2003  lucerne2  cut
          5/05/2003  lucerne2  cut
          13/06/2003  lucerne2  cut
          6/10/2003  lucerne2  cut
          13/11/2003  lucerne2  cut
          29/12/2003  lucerne2  cut
          8/02/2004  lucerne2  cut
          20/03/2004  lucerne2  cut
          3/05/2004  lucerne2  cut
          12/06/2004  lucerne2  cut
          3/10/2004  lucerne2 cut
        irrigation
          automatic_irrigation = off
          asw_depth = 600  # Depth to which ASW is calculated. (mm)
          crit_fr_asw = 0.5  # Fraction of ASW below which irrigation is applied (0-1.0)
          irrigation_efficiency = 1  # Efficiency of the irrigation. (0-1.0)
          irrigation_allocation = off  # Allocation limits
          allocation = 0  # Allocation in mm
          default_no3_conc = 0  # Nitrate concentration (ppm N)
          default_nh4_conc = 0  # Ammonium concentration (ppm N)
          default_cl_conc = 0  # Chloride concentration (ppm Cl)
        operations irrigation_applic
          20/12/2000  irrigation apply amount= 25 (mm)
          29/12/2000  irrigation apply amount= 30 (mm)
          28/01/2001  irrigation apply amount= 36 (mm)
          17/02/2001  irrigation apply amount= 45 (mm)
          7/03/2001  irrigation apply amount= 55 (mm)
          30/03/2001  irrigation apply amount= 80 (mm)
          29/04/2001  irrigation apply amount= 52 (mm)
          6/10/2001  irrigation apply amount= 70 (mm)
          6/12/2001  irrigation apply amount= 70 (mm)
          20/12/2001  irrigation apply amount= 80 (mm)
          12/09/2002  irrigation apply amount= 42 (mm)
          11/10/2002  irrigation apply amount= 40 (mm)
          31/12/2002  irrigation apply amount= 47 (mm)
          19/01/2003  irrigation apply amount= 40 (mm)
          12/02/2003  irrigation apply amount= 45 (mm)
          28/02/2003  irrigation apply amount= 45 (mm)
          14/03/2003  irrigation apply amount= 50 (mm)
          27/03/2003  irrigation apply amount= 40 (mm)
          27/11/2003  irrigation apply amount= 35 (mm)
          2/01/2004  irrigation apply amount= 40 (mm)
          14/01/2004  irrigation apply amount= 40 (mm)
          15/02/2004  irrigation apply amount= 40 (mm)
        manager Aux_Variable
          on init:
```
treat = 'LL'

rue_day = 0

tmean = 0

test = 0

phyl = 51

crop_class_no = 0

season = 0

stage_counter = 0

shootDM = 0

leafDM = 0

stemDM = 0

rootDM = 0

intRad = 0 ! intercepted radiation in MJ/m2/day (total solar)

EndJuvenilePhotoperiod = 0 ! (h)

NodeAppRate = 0.0 ! Calculated rate for Plant 2

flagLAI = 1.0 ! Flag for stopping LAI developemnt after a high LAI of 5.0
```
          on start_of_day:
```
if ( today >= date('1-Mar')) then

   season = 3

endif 

if ( today >= date('1-Jun')) then

   season = 4

endif 

if ( today >= date('1-Sep')) then

   season = 1
   
endif
   
if ( today >= date('1-Dec')) then

   season = 2

endif 



!---------------- This flag stops LAI develoments when LAI is greater than 5.0 -------------
! It's a multiplyier of MaxArea in Plant2

if (lucerne2.LeafLAI > 5.0) then
   
   flagLAI = 0.001
   
else
         
   flagLAI = 1.0
   
endif
```
          on end_of_day:
```
! ------------ calculates daily RUE (g DM/MJ total radiation) ------------

 intRad = lucerne2.cover_green * radn

if lucerne2.cover_green > 0 then

      rue_day = ArbitratorDMSupply / intRad ! We are guessing this is the dlt_dm from "old" Plant
      
else

      rue_day = 0 
      
endif

! --------------  calculates average temperature ----------------

tmean = ( maxt + mint ) * 0.5

! -------------- change class to delay at photoperiod < 12.5 h (Lincoln site!) --------

if ( today > date('04-Apr') AND today < date('09-Sep')) then

!      lucerne delay

!      lucerne reduce
   
else
   
!      lucerne regrowth ! I had to create the regrowth action into delayed class in the ini file for that
        
endif


! ------ report class as a number - doing that because when I report names graphs do not work!---------

!if (crop_class = ('plant') then

!      crop_class_no = 1

!elseif (crop_class = ('regrowth') then 

!      crop_class_no = 2

!elseif (crop_class = ('delayed') then 

!      crop_class_no = 3
   
!elseif (crop_class = ('reduced') then
   
!      crop_class_no = 4
   
!else 
!      crop_class_no = 5

!endif


! -----

! ---- Stage counter

if ( stage >= 1) then

   stage_counter = 1

endif 

if ( stage >= 2) then

   stage_counter = 2

endif 

if ( stage >= 3) then

   stage_counter = 3

endif 

if ( stage >= 4) then

   stage_counter = 4

endif 

if ( stage >= 5) then

   stage_counter = 5

endif 


if ( stage >= 6) then

   stage_counter = 6

endif 

if ( stage >= 7) then

   stage_counter = 7

endif 

if ( stage >= 8) then

   stage_counter = 8

endif 

if ( stage >= 9) then

   stage_counter = 9

endif 

if ( stage >= 10) then

   stage_counter = 10

endif 

if ( stage >= 11) then

   stage_counter = 11

endif 


!-------------------------

!--- Read state variables and convert from g/m2 to kg/ha


leafDM = lucerne2.LeafLiveWt * 10

stemDM = lucerne2.StemLiveWt * 10

rootDM = lucerne2.BelowGroundWt * 10

shootDM = leafDM + stemDM


act_mods end_of_day2 ! This is just an exercise to learn how to create new events
```
          on end_of_day2:
```
if (lucerne2.LeafNodeAppearanceRateValue = 0.0) then
   
   NodeAppRate = 0
   
else
         
   NodeAppRate = lucerne2.PhenologyThermalTimeValue /  lucerne2.LeafNodeAppearanceRateValue
   
endif
```
      micromet
        soilalbedo = 0.23
        a_interception = 0
        b_interception = 0
        c_interception = 0
        d_interception = 0
      surfaceom surface organic matter
        PoolName = wheat  # Organic Matter pool name
        type = wheat  # Organic Matter type
        mass = 1000  # Initial surface residue (kg/ha)
        cnr = 80  # C:N ratio of initial residue
        standing_fraction = 0  # Fraction of residue standing
      SoilTemp2 Soil Temperature (.NET) (disabled)
        maxt_time_default = 14  # hours
        bound_layer_cond_source = calc  # boundary layer conductance source (calc/constant)
        bound_layer_cond = 20  # boundary layer conductance
        boundary_layer_conductance_iterations = 1  # Number of iterations to calc boundary layer conductance (0-10)
        net_radn_source = calc  # net radiation source (calc/eos)
        default_wind_speed = 3  # m/s
        default_altitude = 18  # default altitude (m) 275m (700 ft) is approx 980 hPa
        default_instrum_height = 1.2  # default instrument height for wind and temperature (m)
        bare_soil_height = 57  # height of bare soil (mm)
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