folder RS_Barley_8889: version=36; creator=Apsim 7.6-r3499
  simulation RS_Barley_8889_Control
    metfile met: filename=%apsim%\Examples\MetFiles\lincoln.met
    clock
      start_date = 01/09/1988  # Enter the start date of the simulation
      end_date = 01/03/1989  # Enter the end date of the simulation
    summaryfile
    area paddock
      surfaceom surface organic matter
        PoolName = wheat  # Organic Matter pool name
        type = wheat  # Organic Matter type
        mass = 500  # Initial surface residue (kg/ha)
        cnr = 80  # C:N ratio of initial residue
        standing_fraction = 0  # Fraction of residue standing
      Soil Templeton deep 1: SoilType=NZ_sedementary; Region=Plains; State=Canterbury; Country=New Zealand; Latitude=0; Longitude=0
        DataSource=Generic profile descriptions provided by Trevor Webb and data for functional horizions based on SWAMP project results
        Comments=Bulk density values were measured on the fine earth fraction so values entered into apsim soil are adjusted down to account for stone content (assuming stones are inert from all soil process so their mass and volume is removed from model paramaters).  SAT, DUL, LL15 and Air dry have been adjusted down to account for stone content.  OC has not been adjusted so the model will get the correct carbon and N amounts using the adjusted BD.
        Analysis
          Thickness  Rocks  PH  CEC  ParticleSizeSand  ParticleSizeSilt  ParticleSizeClay
          180        0      6   13   14.5              65.5              20
          150        0      6   9    18                58                24
          400        0      6   9    14                63                23
          270        0      6   9    15                66                19
          500        0      6   9    15                66                19
          Rocks, PH, CEC, ParticleSizeSand, ParticleSizeSilt, ParticleSizeClay source: Estimated based on local knowledge
        Water
          Thickness  BD      AirDry  LL15   DUL   SAT     KS
          100        1.3105  0.05    0.1    0.32  0.419   4832.04
          200        1.524   0.05    0.1    0.3   0.3945  389.229
          200        1.65    0.157   0.157  0.29  0.405   16.3619
          200        1.601   0.189   0.173  0.2   0.366   97.995
          200        1.601   0.173   0.173  0.31  0.3655  97.995
          200        1.601   0.165   0.165  0.3   0.3575  97.995
          200        1.601   0.165   0.165  0.3   0.3575  97.995
          200        1.601   0.115   0.115  0.23  0.3161  97.995
          BD source: Estimated based on local knowledge (layer 1, 2, 3, 4, 5)
          SoilCrop Barley: LL=[0.1, 0.1, 0.157, 0.173, 0.173, 0.165, 0.165, 0.115]; KL=[0.05, 0.09, 0.02, 0.08, 0.04, 0, 0, 0]; XF=[1, 0.5, 1, 1, 1, 1, 1, 1]
          SoilCrop MCSP: LL=[0.1, 0.1, 0.157, 0.173, 0.173, 0.165, 0.165, 0.115]; KL=[0.05, 0.09, 0.02, 0.08, 0.04, 0, 0, 0]; XF=[1, 0.5, 1, 1, 1, 1, 1, 1]
        SoilWater: SummerCona=4.4; SummerU=9; SummerDate=1-oct; WinterCona=1.5; WinterU=2; WinterDate=1-Apr; DiffusConst=88; DiffusSlope=35; Salb=0.13; CN2Bare=73; CNRed=20; CNCov=0.8; Thickness=[200, 200, 200, 200, 200, 200, 200, 200]; SWCON=[0.9, 0.6, 0.4, 0.01, 0.4, 0.9, 0.9, 0.9]
        SoilOrganicMatter: RootCN=40; RootWt=1000; SoilCN=11; EnrACoeff=7.4; EnrBCoeff=0.2
          Thickness  OC        FBiom      FInert
          200        2.6251    0.0333099  0.437121
          200        1.24694   0.0186614  0.656885
          200        0.316004  0.0116634  0.849635
          200        0.207954  0.0102229  0.94496
          200        0.200366  0.0100221  0.982659
          200        -         -          -
          200        -         -          -
          200        -         -          -
          OC source: Estimated based on local knowledge (layer 1, 2, 3, 4, 5)
        Sample Initial nitrogen: NO3Units=kgha; NH4Units=kgha
          Thickness  NO3  NH4  SW
          200        30   5    0.32
          200        15   0.5  0.3
          200        15   0.5  0.29
          200        10   0    0.33
          200        5    0    0.31
          200        5    0    0.3
          200        5    0    0.3
          200        5    0    0.23
      folder Manager folder
        operations
          26/09/1988  fertiliser apply amount= 50 (kg/ha), type= nh4so4_n, depth= 10 (mm)
          6/10/1988  irrigation apply amount= 27 (mm)
          13/10/1988  irrigation apply amount= 10 (mm)
          20/10/1988  irrigation apply amount= 30 (mm)
          27/10/1988  irrigation apply amount= 25 (mm)
          3/11/1988  irrigation apply amount= 25 (mm)
          10/11/1988  irrigation apply amount= 47 (mm)
          17/11/1988  irrigation apply amount= 32 (mm)
          24/11/1988  irrigation apply amount= 18 (mm)
          1/12/1988  irrigation apply amount= 35 (mm)
          8/12/1988  irrigation apply amount= 24 (mm)
          15/12/1988  irrigation apply amount= 43 (mm)
          22/12/1988  irrigation apply amount= 32 (mm)
          29/12/1988  irrigation apply amount= 36 (mm)
          02/11/1988  fertiliser apply amount= 70 (kg/ha), type= nh4so4_n, depth= 10 (mm)
        irrigation
          automatic_irrigation = off
          asw_depth = 600  # Depth to which ASW is calculated. (mm)
          crit_fr_asw = 0.5  # Fraction of ASW below which irrigation is applied (0-1.0)
          irrigation_efficiency = 1  # Efficiency of the irrigation. (0-1.0)
          irrigation_allocation = off  # Allocation limits
          allocation = 0  # Allocation in ML
          default_no3_conc = 0  # Nitrate concentration (ppm N)
          default_nh4_conc = 0  # Ammonium concentration (ppm N)
          default_cl_conc = 0  # Chloride concentration (ppm Cl)
          default_no3_conc = 0  # Nitrate concentration (ppm N)
          default_nh4_conc = 0  # Ammonium concentration (ppm N)
          default_cl_conc = 0  # Chloride concentration (ppm Cl)
        manager ClimateControl
          # Climate Control Window
          date1 = 01/09/1988  # Enter window START date (dd-mmm)
          date2 = 31/12/1989  # Enter window END date (dd-mmm)
          # Climate Change Parameters
          MaxtChange = 0  # Change in maximum temperature (oC)
          MintChange = 0  # Change in minimum temperature (oC)
          RainChange = -100  # Relative change in daily rainfall (%)
          RadnChange = 0  # Relative change in daily radiation (%)
          CO2 = 350  # Atmospheric CO2 Concentration (ppm)
          on prenewmet:
```
!  Adjust daily temperatures, rainfall and radiation up or down according to user-defined amounts
! To apply different levels of climate control to different times of year add multiple copies of this logic into your simulation and change the window.

if (date_within('[date1], [date2]') = 1) then
   maxt = maxt + [MaxtChange]
   mint = mint + [MintChange]
   rain = 0
   radn = radn + radn * [RadnChange] / 100
   co2 = [CO2]
 endif
```
        manager Sow on a fixed date
          #
          date = 07/09/1988  # Enter sowing date (dd-mmm)
          #
          crop = MCSP  # Enter name of crop to sow
          density = 600  # Enter sowing density (plants/m2)
          depth = 60  # Enter sowing depth (mm)
          cultivar = Potato_Medium  # Enter cultivar
          class = plant  # Enter crop growth class
          row_spacing = 150  # Enter row spacing (mm)
          on start_of_day:
```
if today = date('[date]') then
  
   [crop] sow population =[density], depth = [depth], cultivar = [cultivar], MaxCover = 1.0, BudNumber = 1, row_spacing = [row_spacing], crop_class = [class]

endif
```
      fertiliser
      micromet
        soilalbedo = 0.23
        a_interception = 0
        b_interception = 0
        c_interception = 0
        d_interception = 0
        ini: filename=%apsim%\Model\MicroMet_NZ_adjustment.xml
      outputfile: filename=RS_Barley_8889_Control.out; title=RS_Barley_8889_Control
        events Reporting Frequency: event=Daily
        variables
          variable:
            dd/mmm/yyyy as Date
            LeafLAI
            TotalWt
            TotalN
            LeafLiveN
            LeafLiveWt
            ProductLiveWt
            Cover_green
            PhenologyAccumulatedThermalTimeValue
            RootDepth
            LeafLiveNonStructuralN
            LeafLiveStructuralN
            ProductLiveN
            RootNUptake
            RootNSupplyUptake
            RootLiveN
      MCSP
  simulation PeasPlusN
    metfile met: filename=%apsim%\Examples\MetFiles\lincoln.met
    clock
      start_date = 01/09/1988  # Enter the start date of the simulation
      end_date = 01/03/1989  # Enter the end date of the simulation
    summaryfile
    area paddock
      surfaceom surface organic matter
        PoolName = wheat  # Organic Matter pool name
        type = wheat  # Organic Matter type
        mass = 500  # Initial surface residue (kg/ha)
        cnr = 80  # C:N ratio of initial residue
        standing_fraction = 0  # Fraction of residue standing
      Soil Templeton deep 1: SoilType=NZ_sedementary; Region=Plains; State=Canterbury; Country=New Zealand; Latitude=0; Longitude=0; YearOfSampling=0
        DataSource=Generic profile descriptions provided by Trevor Webb and data for functional horizions based on SWAMP project results
        Comments=Bulk density values were measured on the fine earth fraction so values entered into apsim soil are adjusted down to account for stone content (assuming stones are inert from all soil process so their mass and volume is removed from model paramaters).  SAT, DUL, LL15 and Air dry have been adjusted down to account for stone content.  OC has not been adjusted so the model will get the correct carbon and N amounts using the adjusted BD.
        Analysis: same as RS_Barley_8889_Control.paddock.Templeton deep 1.Analysis
        Water
          Thickness  BD      AirDry  LL15   DUL   SAT     KS
          100        1.3105  0.05    0.1    0.32  0.419   4832.04
          200        1.524   0.05    0.1    0.3   0.3945  389.229
          200        1.65    0.157   0.157  0.29  0.36    16.3619
          200        1.601   0.173   0.173  0.2   0.366   97.995
          200        1.601   0.173   0.173  0.31  0.3655  97.995
          200        1.601   0.165   0.165  0.3   0.3575  97.995
          200        1.601   0.165   0.165  0.3   0.3575  97.995
          200        1.601   0.115   0.115  0.23  0.3161  97.995
          BD source: Estimated based on local knowledge (layer 1, 2, 3, 4, 5)
          SoilCrop Barley: LL=[0.1, 0.1, 0.157, 0.173, 0.173, 0.165, 0.165, 0.115]; KL=[0.05, 0.09, 0.02, 0.08, 0.04, 0, 0, 0]; XF=[1, 0.5, 1, 1, 1, 1, 1, 1]
          SoilCrop MCSP: LL=[0.1, 0.1, 0.157, 0.173, 0.173, 0.165, 0.165, 0.115]; KL=[0.05, 0.09, 0.02, 0.08, 0.04, 0, 0, 0]; XF=[1, 0.5, 1, 1, 1, 1, 1, 1]
        SoilWater: same as RS_Barley_8889_Control.paddock.Templeton deep 1.SoilWater
        SoilOrganicMatter: same as RS_Barley_8889_Control.paddock.Templeton deep 1.SoilOrganicMatter
        Sample Initial nitrogen: NO3Units=kgha; NH4Units=kgha; SWUnits=Volumetric; OCUnits=Total; PHUnits=Water
          Thickness  NO3  NH4  SW
          200        300  5    0.32
          200        15   0.5  0.3
          200        15   0.5  0.29
          200        10   0    0.33
          200        5    0    0.31
          200        5    0    0.3
          200        5    0    0.3
          200        5    0    0.23
      folder Manager folder
        operations: same as RS_Barley_8889_Control.paddock.Manager folder.operations
        irrigation: same as RS_Barley_8889_Control.paddock.Manager folder.Irrigation
        manager ClimateControl: same as RS_Barley_8889_Control.paddock.Manager folder.ClimateControl
        manager Sow on a fixed date
          #
          date = 07/09/1988  # Enter sowing date (dd-mmm)
          #
          crop = MCSP  # Enter name of crop to sow
          density = 100  # Enter sowing density (plants/m2)
          depth = 60  # Enter sowing depth (mm)
          cultivar = Dried_Peas  # Enter cultivar
          class = plant  # Enter crop growth class
          row_spacing = 150  # Enter row spacing (mm)
          on start_of_day:
          script: same as in RS_Barley_8889_Control.paddock.Manager folder.Sow on a fixed date
      fertiliser
      micromet
        soilalbedo = 0.23
        a_interception = 0
        b_interception = 0
        c_interception = 0
        d_interception = 0
        ini: filename=%apsim%\Model\MicroMet_NZ_adjustment.xml
      outputfile: filename=PeasPlusN.out; title=PeasPlusN
        events Reporting Frequency: event=Daily
        variables
          variable:
            dd/mmm/yyyy as Date
            LeafLAI
            TotalWt
            TotalN
            LeafLiveN
            LeafLiveWt
            ProductLiveWt
            Cover_green
            PhenologyAccumulatedThermalTimeValue
            RootDepth
            LeafLiveNonStructuralN
            LeafLiveStructuralN
            ProductLiveN
            RootNUptake
            RootNSupplyUptake
            RootLiveN
      MCSP
  simulation PeasLessN
    metfile met: filename=%apsim%\Examples\MetFiles\lincoln.met
    clock
      start_date = 01/09/1988  # Enter the start date of the simulation
      end_date = 01/03/1989  # Enter the end date of the simulation
    summaryfile
    area paddock
      surfaceom surface organic matter
        PoolName = wheat  # Organic Matter pool name
        type = wheat  # Organic Matter type
        mass = 500  # Initial surface residue (kg/ha)
        cnr = 80  # C:N ratio of initial residue
        standing_fraction = 0  # Fraction of residue standing
      Soil Templeton deep 1: SoilType=NZ_sedementary; Region=Plains; State=Canterbury; Country=New Zealand; Latitude=0; Longitude=0; YearOfSampling=0
        DataSource=Generic profile descriptions provided by Trevor Webb and data for functional horizions based on SWAMP project results
        Comments=Bulk density values were measured on the fine earth fraction so values entered into apsim soil are adjusted down to account for stone content (assuming stones are inert from all soil process so their mass and volume is removed from model paramaters).  SAT, DUL, LL15 and Air dry have been adjusted down to account for stone content.  OC has not been adjusted so the model will get the correct carbon and N amounts using the adjusted BD.
        Analysis: same as RS_Barley_8889_Control.paddock.Templeton deep 1.Analysis
        Water: same as PeasPlusN.paddock.Templeton deep 1.Water
        SoilWater: same as RS_Barley_8889_Control.paddock.Templeton deep 1.SoilWater
        SoilOrganicMatter: RootCN=40; RootWt=1000; SoilCN=11; EnrACoeff=7.4; EnrBCoeff=0.2; OCUnits=Total
          Thickness  OC        FBiom      FInert
          200        1         0.0333099  0.437121
          200        0.5       0.0186614  0.656885
          200        0.316004  0.0116634  0.849635
          200        0.207954  0.0102229  0.94496
          200        0.200366  0.0100221  0.982659
          200        -         -          -
          200        -         -          -
          200        -         -          -
          OC source: Estimated based on local knowledge (layer 1, 2, 3, 4, 5)
        Sample Initial nitrogen: NO3Units=kgha; NH4Units=kgha; SWUnits=Volumetric; OCUnits=Total; PHUnits=Water
          Thickness  NO3  NH4  SW
          200        0    5    0.32
          200        0    0.5  0.3
          200        0    0.5  0.29
          200        0    0    0.33
          200        0    0    0.31
          200        0    0    0.3
          200        0    0    0.3
          200        0    0    0.23
      folder Manager folder
        operations
          26/09/1988  fertiliser apply amount= 0 (kg/ha), type= nh4so4_n, depth= 10 (mm)
          6/10/1988  irrigation apply amount= 27 (mm)
          13/10/1988  irrigation apply amount= 10 (mm)
          20/10/1988  irrigation apply amount= 30 (mm)
          27/10/1988  irrigation apply amount= 25 (mm)
          3/11/1988  irrigation apply amount= 25 (mm)
          10/11/1988  irrigation apply amount= 47 (mm)
          17/11/1988  irrigation apply amount= 32 (mm)
          24/11/1988  irrigation apply amount= 18 (mm)
          1/12/1988  irrigation apply amount= 35 (mm)
          8/12/1988  irrigation apply amount= 24 (mm)
          15/12/1988  irrigation apply amount= 43 (mm)
          22/12/1988  irrigation apply amount= 32 (mm)
          29/12/1988  irrigation apply amount= 36 (mm)
          02/11/1988  fertiliser apply amount= 0 (kg/ha), type= nh4so4_n, depth= 10 (mm)
        irrigation: same as RS_Barley_8889_Control.paddock.Manager folder.Irrigation
        manager ClimateControl: same as RS_Barley_8889_Control.paddock.Manager folder.ClimateControl
        manager Sow on a fixed date: same as PeasPlusN.paddock.Manager folder.Sow on a fixed date
      fertiliser
      micromet
        soilalbedo = 0.23
        a_interception = 0
        b_interception = 0
        c_interception = 0
        d_interception = 0
        ini: filename=%apsim%\Model\MicroMet_NZ_adjustment.xml
      outputfile: filename=PeasLessN.out; title=PeasLessN
        events Reporting Frequency: event=Daily
        variables
          variable:
            dd/mmm/yyyy as Date
            LeafLAI
            TotalWt
            TotalN
            LeafLiveN
            LeafLiveWt
            ProductLiveWt
            Cover_green
            PhenologyAccumulatedThermalTimeValue
            RootDepth
            LeafLiveNonStructuralN
            LeafLiveStructuralN
            ProductLiveN
            RootNUptake
            RootNSupplyUptake
            RootLiveN
      MCSP
  simulation BarleyLessN
    metfile met: filename=%apsim%\Examples\MetFiles\lincoln.met
    clock
      start_date = 01/09/1988  # Enter the start date of the simulation
      end_date = 01/03/1989  # Enter the end date of the simulation
    summaryfile
    area paddock
      surfaceom surface organic matter
        PoolName = wheat  # Organic Matter pool name
        type = wheat  # Organic Matter type
        mass = 500  # Initial surface residue (kg/ha)
        cnr = 80  # C:N ratio of initial residue
        standing_fraction = 0  # Fraction of residue standing
      Soil Templeton deep 1: same as PeasLessN.paddock.Templeton deep 1
      folder Manager folder
        operations: same as PeasLessN.paddock.Manager folder.operations
        irrigation: same as RS_Barley_8889_Control.paddock.Manager folder.Irrigation
        manager ClimateControl: same as RS_Barley_8889_Control.paddock.Manager folder.ClimateControl
        manager Sow on a fixed date
          #
          date = 07/09/1988  # Enter sowing date (dd-mmm)
          #
          crop = MCSP  # Enter name of crop to sow
          density = 100  # Enter sowing density (plants/m2)
          depth = 60  # Enter sowing depth (mm)
          cultivar = Barley_Spring  # Enter cultivar
          class = plant  # Enter crop growth class
          row_spacing = 150  # Enter row spacing (mm)
          on start_of_day:
          script: same as in RS_Barley_8889_Control.paddock.Manager folder.Sow on a fixed date
      fertiliser
      micromet
        soilalbedo = 0.23
        a_interception = 0
        b_interception = 0
        c_interception = 0
        d_interception = 0
        ini: filename=%apsim%\Model\MicroMet_NZ_adjustment.xml
      outputfile: filename=BarleyLessN.out; title=BarleyLessN
        events Reporting Frequency: event=Daily
        variables
          variable:
            dd/mmm/yyyy as Date
            LeafLAI
            TotalWt
            TotalN
            LeafLiveN
            LeafLiveWt
            ProductLiveWt
            Cover_green
            PhenologyAccumulatedThermalTimeValue
            RootDepth
            LeafLiveNonStructuralN
            LeafLiveStructuralN
            ProductLiveN
            RootNUptake
            RootNSupplyUptake
            RootLiveN
      MCSP
  simulation BarleyPlusN
    metfile met: filename=%apsim%\Examples\MetFiles\lincoln.met
    clock
      start_date = 01/09/1988  # Enter the start date of the simulation
      end_date = 01/03/1989  # Enter the end date of the simulation
    summaryfile
    area paddock
      surfaceom surface organic matter
        PoolName = wheat  # Organic Matter pool name
        type = wheat  # Organic Matter type
        mass = 500  # Initial surface residue (kg/ha)
        cnr = 80  # C:N ratio of initial residue
        standing_fraction = 0  # Fraction of residue standing
      Soil Templeton deep 1: same as PeasPlusN.paddock.Templeton deep 1
      folder Manager folder
        operations: same as RS_Barley_8889_Control.paddock.Manager folder.operations
        irrigation: same as RS_Barley_8889_Control.paddock.Manager folder.Irrigation
        manager ClimateControl: same as RS_Barley_8889_Control.paddock.Manager folder.ClimateControl
        manager Sow on a fixed date: same as BarleyLessN.paddock.Manager folder.Sow on a fixed date
      fertiliser
      micromet
        soilalbedo = 0.23
        a_interception = 0
        b_interception = 0
        c_interception = 0
        d_interception = 0
        ini: filename=%apsim%\Model\MicroMet_NZ_adjustment.xml
      outputfile: filename=BarleyPlusN.out; title=BarleyPlusN
        events Reporting Frequency: event=Daily
        variables
          variable:
            dd/mmm/yyyy as Date
            LeafLAI
            TotalWt
            TotalN
            LeafLiveN
            LeafLiveWt
            ProductLiveWt
            Cover_green
            PhenologyAccumulatedThermalTimeValue
            RootDepth
            LeafLiveNonStructuralN
            LeafLiveStructuralN
            ProductLiveN
            RootNUptake
            RootNSupplyUptake
            RootLiveN
      MCSP
  simulation BarleyFixedYield
    metfile met: filename=%apsim%\Examples\MetFiles\lincoln.met
    clock
      start_date = 01/09/1988  # Enter the start date of the simulation
      end_date = 01/03/1989  # Enter the end date of the simulation
    summaryfile
    area paddock
      surfaceom surface organic matter
        PoolName = wheat  # Organic Matter pool name
        type = wheat  # Organic Matter type
        mass = 500  # Initial surface residue (kg/ha)
        cnr = 80  # C:N ratio of initial residue
        standing_fraction = 0  # Fraction of residue standing
      Soil Templeton deep 1: same as PeasPlusN.paddock.Templeton deep 1
      folder Manager folder
        operations: same as RS_Barley_8889_Control.paddock.Manager folder.operations
        irrigation: same as RS_Barley_8889_Control.paddock.Manager folder.Irrigation
        manager ClimateControl: same as RS_Barley_8889_Control.paddock.Manager folder.ClimateControl
        manager Sow on a fixed date
          #
          date = 07/09/1988  # Enter sowing date (dd-mmm)
          #
          crop = MCSP  # Enter name of crop to sow
          density = 100  # Enter sowing density (plants/m2)
          depth = 60  # Enter sowing depth (mm)
          cultivar = Barley_Spring  # Enter cultivar
          class = plant  # Enter crop growth class
          row_spacing = 150  # Enter row spacing (mm)
          on start_of_day:
```
if today = date('[date]') then
  
   [crop] sow population =[density], depth = [depth], cultivar = [cultivar], MaxCover = 1.0, BudNumber = 1, row_spacing = [row_spacing], crop_class = [class], SkipPlant = 100

endif
```
      fertiliser
      micromet
        soilalbedo = 0.23
        a_interception = 0
        b_interception = 0
        c_interception = 0
        d_interception = 0
        ini: filename=%apsim%\Model\MicroMet_NZ_adjustment.xml
      outputfile: filename=BarleyFixedYield.out; title=BarleyFixedYield
        events Reporting Frequency: event=Daily
        variables
          variable:
            dd/mmm/yyyy as Date
            LeafLAI
            TotalWt
            TotalN
            LeafLiveN
            LeafLiveWt
            ProductLiveWt
            Cover_green
            PhenologyAccumulatedThermalTimeValue
            RootDepth
            LeafLiveNonStructuralN
            LeafLiveStructuralN
            ProductLiveN
            RootNUptake
            RootNSupplyUptake
            RootLiveN
      MCSP
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