folder simulations: version=37; creator=Apsim 7.10-r4158
  simulation SorghumSoybean_Success
    metfile met: filename=%apsim%/Examples/MetFiles/Goond.met
    clock
      start_date = 1/01/1940  # Enter the start date of the simulation
      end_date = 31/12/1950  # Enter the end date of the simulation
    summaryfile
    area paddock
      cotton
      Soil: SoilType=Grey Vertosol; LocalName=Brigalow; Site=Kupunn; NearestTown=Dalby, Q 4405; Region=South East Queensland; NaturalVegetation=Brigalow, belah, wilga; Latitude=0; Longitude=0; YearOfSampling=0
        InitialWater Initial water: FractionFull=1; PercentMethod=FilledFromTop
        Water
          Thickness  BD    AirDry  LL15  DUL   SAT
          150        1.4   0.105   0.21  0.39  0.44
          150        1.39  0.189   0.21  0.39  0.44
          300        1.37  0.22    0.22  0.4   0.45
          300        1.36  0.25    0.25  0.41  0.46
          300        1.38  0.27    0.27  0.4   0.45
          300        1.39  0.31    0.31  0.39  0.44
          300        1.42  0.36    0.36  0.38  0.43
          SoilCrop Chickpea: LL=[0.21, 0.21, 0.22, 0.27, 0.29, 0.34, 0.38]; KL=[0.1, 0.1, 0.08, 0.06, 0.04, 0.02, 0.01]; XF=[1, 1, 1, 1, 1, 1, 1]
          SoilCrop Cotton: LL=[0.21, 0.21, 0.22, 0.25, 0.27, 0.31, 0.36]; KL=[0.1, 0.1, 0.1, 0.1, 0.09, 0.07, 0.05]; XF=[1, 1, 1, 1, 1, 1, 1]
          SoilCrop Sorghum: LL=[0.21, 0.21, 0.26, 0.26, 0.28, 0.34, 0.36]; KL=[0.1, 0.1, 0.1, 0.08, 0.06, 0.04, 0.02]; XF=[1, 1, 1, 1, 1, 1, 1]
          SoilCrop Wheat: LL=[0.21, 0.21, 0.25, 0.28, 0.31, 0.37, 0.38]; KL=[0.1, 0.1, 0.08, 0.06, 0.04, 0.02, 0.01]; XF=[1, 1, 1, 1, 1, 1, 1]
          SoilCrop Maize: LL=[0.21, 0.21, 0.25, 0.28, 0.31, 0.37, 0.38]; KL=[0.1, 0.1, 0.08, 0.06, 0.04, 0.02, 0.01]; XF=[1, 1, 1, 1, 1, 1, 1]
          SoilCrop Soybean: LL=[0.21, 0.21, 0.25, 0.28, 0.31, 0.37, 0.38]; KL=[0.1, 0.1, 0.08, 0.06, 0.04, 0.02, 0.01]; XF=[1, 1, 1, 1, 1, 1, 1]
        SoilWater: SummerCona=3.5; SummerU=6; SummerDate=1-Nov; WinterCona=3.5; WinterU=6; WinterDate=1-Apr; DiffusConst=40; DiffusSlope=16; Salb=0.13; CN2Bare=73; CNRed=20; CNCov=0.8; Thickness=[150, 150, 300, 300, 300, 300, 300]; SWCON=[0.3, 0.3, 0.3, 0.3, 0.3, 0.3, 0.3]
        SoilOrganicMatter: RootCN=40; RootWt=200; SoilCN=12.5; EnrACoeff=7.4; EnrBCoeff=0.2
          Thickness  OC    FBiom  FInert
          150        1.24  0.03   0.4
          150        1.24  0.02   0.6
          300        1.25  0.01   0.8
          300        1.1   0.01   0.9
          300        0.71  0.01   0.95
          300        0.34  0.01   0.95
          300        0.26  0.01   0.95
        Analysis: Thickness=[150, 150, 300, 300, 300, 300, 300]; PH=[7, 7, 7, 7, 7, 7, 7]
        Sample Initial nitrogen
          Thickness  NO3    NH4
          150        6.500  0.600
          150        2.100  0.100
          300        2.100  0.100
          300        1.700  0.100
          300        1.700  0.100
          300        1.700  0.100
          300        1.700  0.100
      surfaceom SurfaceOrganicMatter
        PoolName = wheat_stubble  # Organic Matter pool name
        type = vetch  # Organic Matter type
        mass = 1000  # Initial surface residue (kg/ha)
        cnr = 80  # C:N ratio of initial residue
        standing_fraction = 0  # Fraction of residue standing
      fertiliser
      maize
      sorghum
      soybean
      folder Manager folder
        rotplot Rotation Management: canvas_height=424; rules_height=149; graph_name=stateGraph; language=C#; detailedLogging=no
          node soybean
          node sorghum
          node summer_fallow
          arc arc6: source=summer_fallow; target=sorghum; actions=[SummerFallow.Leave, Sorghum Management.Enter]; rules=[SummerFallow.canLeave, Sorghum Management.canEnter]
          arc arc8: source=soybean; target=summer_fallow; actions=[Soybean Management.Leave, SummerFallow.Enter]; rules=Soybean Management.canLeave
          arc arc1: source=sorghum; target=soybean; actions=[Sorghum Management.Leave, Soybean Management.Enter]; rules=Sorghum Management.canLeave
          paddock: isManaged=True; initialState=summer_fallow
          component Rotation Management_: executable=%apsim%/Model/Manager2.dll
            initdata
              text:
                using System;
                using System.Collections.Generic;
                using System.Dynamic;
                using System.Text;
                using ModelFramework;
                using CSGeneral;
                public class Script {
                [Link] public Simulation MySimulation;
                private List<string> paddocks = new List<string>();
                private List<dynamic> paddockStates = new List<dynamic>();
                private Graph g = new Graph();
                private Dictionary<string,string> _currentState = new Dictionary<string,string>();
                [Output, Description("Current State of DG")] public string currentState {
                  get {string[] r = new string[_currentState.Count]; _currentState.Values.CopyTo(r,0);
                       return(String.Join(" ", r));}
                }
                private void setState(string p, string s) {
                  _currentState[p] = s;
                }
                private string getState(string p) {
                  return(_currentState[p]);
                }
                [Output, Description("Current paddock")] public string currentPaddock = "";
                [Output] public string [] states = new string[0];
                [EventHandler] public void OnInitialised()
                {
                g = new Graph();
                states = new string[3];
                int i = 0;
                g.AddNode("soybean");
                states[i++] = "soybean";
                g.AddNode("sorghum");
                states[i++] = "sorghum";
                g.AddNode("summer_fallow");
                states[i++] = "summer_fallow";
                ruleAction arc6 = new ruleAction();
                arc6.testCondition.Add("SummerFallow.canLeave");
                arc6.testCondition.Add("Sorghum Management.canEnter");
                arc6.action.Add("SummerFallow.Leave");
                arc6.action.Add("Sorghum Management.Enter");
                g.AddDirectedEdge("summer_fallow","sorghum",arc6);
                ruleAction arc8 = new ruleAction();
                arc8.testCondition.Add("Soybean Management.canLeave");
                arc8.action.Add("Soybean Management.Leave");
                arc8.action.Add("SummerFallow.Enter");
                g.AddDirectedEdge("soybean","summer_fallow",arc8);
                ruleAction arc1 = new ruleAction();
                arc1.testCondition.Add("Sorghum Management.canLeave");
                arc1.action.Add("Sorghum Management.Leave");
                arc1.action.Add("Soybean Management.Enter");
                g.AddDirectedEdge("sorghum","soybean",arc1);
                string title;
                MySimulation.Get("title", out title);
                }
                [Link] public Component MySelf;
                [Input] public DateTime Today;
                [EventHandler] public void OnEnd_Simulation()
                {
                }
                [EventHandler] public void OnStart_Simulation()
                {
                paddocks.Add("paddock");
                setState("paddock","summer_fallow");
                   MySimulation.Publish("transition");
                }
                [Output] public string paddock_state {get {return(getState("paddock"));}}
                private string modname(string x) {
                  if (x.Contains(".")) return(x.Split('.')[0]);
                  return("");
                }
                private string varname(string x) {
                  if (x.Contains(".")) return(x.Split('.')[1]);
                  return(x);
                }
                [EventHandler] public void OnProcess()
                {
                   bool more = true;
                   while (more) {
                      more = false;
                      double bestScore = -1.0; string bestArc = ""; string bestPaddock = "";
                      foreach (string p in paddocks) {
                         Node s = g.FindNode(getState(p));
                         // Console.WriteLine(" state=" + s.Name);
                         foreach (string _arc in s.arcs.Keys) {
                            double score = 1;
                            foreach (string testCondition in s.arcs[_arc].testCondition){
                               double c = 0.0;
                               currentPaddock = p;
                               if (MySimulation.Get(testCondition, out c))
                                  score *= c;
                               else
                                  throw new Exception("Nothing returned from expression '" + testCondition + "'");
                               //Console.WriteLine(" p=" + p +" a=" + _arc + "cond=" + testCondition + " score=" + score);
                            }
                            if (score > bestScore) {
                               bestScore = score;
                               bestArc = _arc;
                               bestPaddock = p;
                            }
                         }
                      }
                      currentPaddock = "";
                      if (bestScore > 0.0) {
                         Node s = g.FindNode(getState(bestPaddock));
                         if( bestPaddock != "")
                            currentPaddock = bestPaddock;
                         if (getState(bestPaddock) != "") MySimulation.Publish("transition_from_" + getState(bestPaddock));
                         MySimulation.Publish("transition");
                         setState (bestPaddock, g.FindArcTarget(bestArc));
                         foreach (string action in s.arcs[bestArc].action ) {
                            try {MySimulation.Publish(action);} catch (Exception e) {Console.WriteLine("Error publishing '" + action + "' to the system"); throw (e);}
                            //Console.WriteLine(" best=" + bestPaddock + " action=" + action);
                         }
                         MySimulation.Publish("transition_to_" + getState(bestPaddock));
                         more = true;
                      }
                   }
                }
                  public class ruleAction
                  {
                     public string Target;
                     public List<string> testCondition = new List<string>();
                     public List<string> action = new List<string>();
                  }
                   public class Node : IEquatable<Node>
                   {
                      private string data /*, alias*/;
                      public Node(string _data) { data = _data; }
                      public Dictionary<string, ruleAction> arcs = new Dictionary<string, ruleAction>();
                      public bool Equals(Node other)
                      {
                         return ( this.data == other.data );
                      }
                      public string Name { get { return (data); } }
                   }

                   class Graph
                   {
                      public List<Node> vertices;
                      public void print() {
                         foreach (Node n in vertices) {
                            Console.WriteLine(n.Name + ":");
                            foreach (string k in n.arcs.Keys) {
                               Console.WriteLine("  " + k);
                            }
                         }
                      }
                      public Graph() { vertices = new List<Node>(); }
                      public Node AddNode(Node node)
                      {
                         if (vertices.Find(delegate(Node n) { return (n.Equals(node)); }) == null)
                            vertices.Add(node);
                         return (vertices.Find(delegate(Node n) { return (n.Equals(node)); }));
                      }
                      public Node AddNode(string value)
                      {
                         return (AddNode(new Node(value)));
                      }
                      public Node FindNode(string value)
                      {
                         return (FindNode(AddNode(value)));
                      }
                      public Node FindNode(Node node)
                      {
                         return (vertices.Find(delegate(Node n) { return (n.Equals(node)); }));
                      }
                      public void AddDirectedEdge(string source, string dest, ruleAction value)
                      {
                         int i = 0;
                         foreach (Node n in vertices) {
                            foreach (string arc in n.arcs.Keys) {
                               i++;
                            }
                         }
                         Node node1 = AddNode(source);
                         AddNode(dest);
                         value.Target = dest;
                         node1.arcs.Add("arc" + i.ToString(), value);
                      }
                      public string FindArcTarget(string arc)
                      {
                         foreach (Node n in vertices) {
                            foreach (string a in n.arcs.Keys) {
                               if (a == arc) { return (n.arcs[a].Target); }
                            }
                         }
                         Console.WriteLine("Aiee - no target for arc " + arc );
                         return("");
                      }
                   }
                }
        manager2 RotationCounter
```csharp
using System; 
using System.Collections.Generic;
using ModelFramework; 

// Counts the number of times a rotation has completed (ie gone back to the starting point)

// Multi-paddock aware.
public class Script 
{ 
   [Link] public Simulation MySimulation;   
   [Output, Description("Number of times the rotation has cycled"), Units("n")] public int rotationNumber {
      get {setup(); return(rotationNumberD[currentPaddock()]);}
      set {}
   }

   private Dictionary<string, int> rotationNumberD = new Dictionary<string, int>();
   private Dictionary<string, bool> needsCheck = new Dictionary<string, bool>();
   private Dictionary<string, string> initialState = new Dictionary<string, string>();
   private void setup() {
      if (initialState.Keys.Count == 0) { OnStart_Simulation(); }
   }
   
   [EventHandler] public void OnStart_Simulation() { 
      if (initialState.Keys.Count == 0) {
         foreach (Paddock paddock in MySimulation.ChildPaddocks) 
         {
            string s = "";
            if (MySimulation.Get(paddock.Name + "_state", out s)) {
               initialState.Add(paddock.Name, s);
            } else {
               MySimulation.Get("currentstate", out s);
               initialState.Add(paddock.Name, s);
            }
            needsCheck.Add(paddock.Name, false);
            rotationNumberD.Add(paddock.Name, 0);
         }
      }
   }    
 
   [EventHandler] public void OnPrepare() { foreach (Paddock paddock in MySimulation.ChildPaddocks) { needsCheck[paddock.Name] = false; }}
   [EventHandler] public void OnTransition() { needsCheck[currentPaddock()] =  true; } 
   [EventHandler] public void OnPost() { 
      foreach (Paddock paddock in MySimulation.ChildPaddocks) {
         if (needsCheck[paddock.Name])  { 
            string currentState = ""; 
            if (! MySimulation.Get(paddock.Name + "_state", out currentState))
               MySimulation.Get("currentstate", out currentState);
            if (currentState == initialState[paddock.Name])  
               rotationNumberD[paddock.Name]++; 
         } 
      }
   } 
   private string currentPaddock() {
      string result = "";
      MySimulation.Get("currentPaddock", out result);
      if (result != "")
         return(result);
      else
         return(MySimulation.ChildPaddocks[0].Name);
   }
}
```
        manager2 SummerFallow
          endDate = 15-mar  # Enter the end date of the pause
```csharp
using System;
using System.Collections.Generic;
using ModelFramework;
using CSGeneral;

// A "blocking" period that waits until a specified date.
// Multi-paddock aware.

public class Script 
{  
   [Link()] public Simulation MySimulation;

   [Input] private DateTime today; 
   [Param] private string endDate; 

   private Dictionary<string,bool> flag = new Dictionary<string,bool>();

   // +ve number - yes
   // 0          - no
   [Output, Description("Test whether we can enter the pause")] public int canEnter  
   {
      get {return (1);}
   }

   // Set the flag to say that we cannot leave until the end of the period is passed
   [EventHandler, Description("Enter the pause period")] public void OnEnter()
   {
      string currentPaddock;
      MySimulation.Get("currentPaddock", out currentPaddock);
      flag[currentPaddock] = false;
   } 
   
   [Output, Description("Test whether we can leave the pause")] public int canLeave  
   {get 
      {
         string currentPaddock;
         MySimulation.Get("currentPaddock", out currentPaddock);
         //Console.WriteLine("CanLeave called, p=" + currentPaddock + ",c=" + counter[currentPaddock]);
         if (flag[currentPaddock]) {
            return (1);
         }   
         return (0);

      }
   }
   
   [EventHandler, Description("Leave the pause")] public void OnLeave()
   {
       // Nothing
   } 

   // Setup
   [EventHandler] public void OnStart_Simulation()
   {
      flag.Add("", true);
      foreach (Paddock paddock in MySimulation.ChildPaddocks) 
         flag.Add(paddock.Name, true);
   }

   // Set the flag to say that the end of the period has passed
   [EventHandler] public void OnPost()
   {
      if (DateUtility.DatesEqual(endDate, today)) {
         List <string> paddocks = new List<string>(flag.Keys);
         foreach (string p in paddocks) 
            flag[p] = true;
      }
   }
}
```
        manager2 PaddockAccumulator
```csharp
using System; 
using System.Collections.Generic;
using ModelFramework; 
using CSGeneral;

// This captures and accumulates the states of several paddock variables
// to be reported on a single report line. 

// Multi-paddock aware.

public class Script 
{ 
   [Link] public Simulation MySimulation;

   // Cumulative Ep
   [Output, Description("The total transpiration since the last transition"), Units("mm")] public double TEp {
      get {setup(); string s = currentPaddock() + "_Ep"; return(me[s]);}
   }
   // Cumulative rain
   [Output, Description("The total rain since the last transition"), Units("mm")] public double TRainfall {
      get {setup(); string s = currentPaddock() + "_rain"; return(me[s]);}
   }
   // Cumulative Drainage
   [Output, Description("The total drainage since the last transition"), Units("mm")] public double TDrainage {
      get {setup(); string s = currentPaddock() + "_drainage"; return(me[s]);}
   }
   // Cumulative Runoff
   [Output, Description("The total runoff since the last transition"), Units("mm")] public double TRunoff {
      get {setup(); string s = currentPaddock() + "_runoff"; return(me[s]);}
   }
   // Cumulative Es
   [Output, Description("The total soil evaporation since the last transition"), Units("mm")] public double TEs {
      get {setup(); string s = currentPaddock() + "_evaporation"; return(me[s]);}
   }
   // Cumulative fertiliser
   [Output, Description("The total fertiliser applied since the last transition"), Units("kg/ha")] public double applied_fert {
      get {setup(); string s = currentPaddock() + "_applied_fert"; return(me[s]);}
   }
   // Instantaneous sw at start
   [Output, Description("The soil water on the first day of a rotation"), Units("mm")] public double swStart {
      get {setup(); string s = currentPaddock() + "_swStart"; return(me[s]);}
   }
   // Instantaneous sw at end
   [Output, Description("The soil water on the last day of a rotation"), Units("mm")] public double swYesterday {
      get {setup(); string s = currentPaddock() + "_swYesterday"; return(me[s]);}
   }
   // Instantaneous no3 at start
   [Output, Description("The soil NO3 on the first day of a rotation"), Units("kg/ha")] public double no3Start {
      get {setup(); string s = currentPaddock() + "_no3Start"; return(me[s]);}
   }
   // Instantaneous no3 at end
   [Output, Description("The soil NO3 on the last day of a rotation"), Units("kg/ha")] public double no3Yesterday {
      get {setup(); string s = currentPaddock() + "_no3Yesterday"; return(me[s]);}
   }
   // Instantaneous carbon at end
   [Output, Description("The soil carbon on the last day of a rotation"), Units("kg/ha")] public double carbonYesterday {
      get {setup(); string s = currentPaddock() + "_carbon"; return(me[s]);}
   }
   // Instantaneous yield of all crops
   [Output, Description("Crop Yield"), Units("kg/ha")] public double yield_kgha {
      get{
         double yld2 = 0;
         Paddock p = (Paddock) MySimulation.LinkByName(currentPaddock());
         foreach (Component crop in p.Crops)
         {
            double yld = 0;
            crop.Get("yield", out yld);
            yld2 = yld2 + yld;
         }
         return yld2 ;}
   }
   // Instantaneous yield of all crops
   [Output, Description("Crop Yield"), Units("kg")] public double yield_kg {
      get{
         double yld2 = 0, area = 1.0;
         Paddock p = (Paddock) MySimulation.LinkByName(currentPaddock());
         MySimulation.Get(p.Name + ".area", out area);
         foreach (Component crop in p.Crops)
         {
            double yld = 0;
            crop.Get("yield", out yld);
            yld2 = yld2 + yld * area;
         }
         return yld2 ;}
   }
   // Instantaneous biomass of all crops
   [Output, Description("Crop biomass"), Units("kg/ha")] public double biomass_kgha {
      get{
         double biomass2 = 0;
         Paddock p = (Paddock) MySimulation.LinkByName(currentPaddock());
         foreach (Component crop in p.Crops)
         {
            double biomass = 0;
            crop.Get("biomass", out biomass);
            biomass2 = biomass2 + biomass;
         }
         return biomass2 ;}
   }
   // Instantaneous yield of all crops
   [Output, Description("Crop Biomass"), Units("kg")] public double biomass_kg {
      get{
         double biomass2 = 0, area = 1.0;
         Paddock p = (Paddock) MySimulation.LinkByName(currentPaddock());
         MySimulation.Get(p.Name + ".area", out area);
         foreach (Component crop in p.Crops)
         {
            double biomass = 0;
            crop.Get("biomass", out biomass);
            biomass2 = biomass2 + biomass * area;
         }
         return biomass2 ;}
   }
   // Instantaneous protein of all crops
   [Output, Description("Grain Protein"), Units("%")] public double protein {
      get{
         double pro2 = 0;
         Paddock p = (Paddock) MySimulation.LinkByName(currentPaddock());
         foreach (Component crop in p.Crops)
         {
            double pro = 0;
            crop.Get("grain_protein", out pro);
            pro2 = pro2 + pro;
         }
        
         return pro2 ;}
   }
   
   // Instantaneous N of all crops
   [Output, Description("Grain N"), Units("g/m2")] public double GrainN_gm2 {
      get{
         double GN2 = 0;
         Paddock p = (Paddock) MySimulation.LinkByName(currentPaddock());
         foreach (Component crop in p.Crops)
         {
            double GN = 0;
            if (crop.Get("grain_N", out GN))
               GN2 = GN2 + GN;
            else if (crop.Get("GrainGreenN", out GN))
               GN2 = GN2 + GN;
         }
         return GN2 ;}
   }
   
   
   [Output, Description("The state of the current paddock"), Units("")] public string paddockState {
      get {
         string cs = "";
         string cp = currentPaddock();
         MySimulation.Get(cp + "_state", out cs);
         return(cs);
      }
   }
   [Output, Description("The number of days in a rotation"), Units("")] public int daysInPhase {
      get {setup(); string s = currentPaddock() + "_daysInPhase"; return((int) me[s]);}
      set {}
   }
   
 
   private string currentPaddock() {
      string result = "";
      MySimulation.Get("currentPaddock", out result);
      if (result != "")
         return(result);
      else
         return(MySimulation.ChildPaddocks[0].Name);
   }


   // An accumulator for each thing in each paddock
   private Dictionary<string, double> me = new Dictionary<string, double>();

   private void setup() {
      if (me.Keys.Count == 0) { OnStart_Simulation(); }
   }
   
   [EventHandler] public void OnStart_Simulation() { 
      if (me.Keys.Count == 0) {
         foreach (Paddock paddock in MySimulation.ChildPaddocks) 
         {
            Component soil = (Component) paddock.LinkByType("soilwat");
            double [] swdep = new double[15];
            soil.Get("sw_dep", out swdep);
            me.Add(paddock.Name + "_swStart", MathUtility.Sum(swdep));
            me.Add(paddock.Name + "_swYesterday", MathUtility.Sum(swdep));
         
            Component soilN = (Component) paddock.LinkByType("soiln");
            double [] no3dep = new double[15];
            soilN.Get("no3", out no3dep);
            me.Add(paddock.Name + "_no3Start", MathUtility.Sum(no3dep));
            me.Add(paddock.Name + "_no3Yesterday", MathUtility.Sum(no3dep));
            me.Add(paddock.Name + "_rain", 0);
            me.Add(paddock.Name + "_Ep", 0);
            me.Add(paddock.Name + "_drainage", 0);
            me.Add(paddock.Name + "_runoff", 0);
            me.Add(paddock.Name + "_evaporation", 0);
            me.Add(paddock.Name + "_applied_fert", 0);
            double[] carbon = new double[15];
            soilN.Get("carbon_tot", out carbon);
            me.Add(paddock.Name + "_carbon", MathUtility.Sum(carbon));
            me.Add(paddock.Name + "_daysInPhase", 0);
         }
      }
   } 
   [EventHandler] public void OnTransition() {
      setup();   
      string s = currentPaddock();
      me[s + "_swStart"] = me[s+"_swYesterday"]; 
      me[s + "_no3Start"] = me[s + "_no3Yesterday"];
      me[s + "_Ep"] = 0;
      me[s + "_rain"] = 0;
      me[s + "_drainage"] = 0;
      me[s + "_runoff"] = 0;
      me[s + "_evaporation"] = 0;
      me[s + "_applied_fert"] = 0;
      me[s + "_carbon"] = 0;
      me[s + "_daysInPhase"] = 0;
   } 
   [EventHandler] public void OnPost() { 
      foreach (Paddock paddock in MySimulation.ChildPaddocks) 
      {
         Component soil = (Component) paddock.LinkByType("soilwat");
         Component soilN = (Component) paddock.LinkByType("soiln");
         Component fertiliser = (Component) paddock.LinkByType("fertiliser");
         double [] swdep = new double[15];
         soil.Get("sw_dep", out swdep);
         me[paddock.Name + "_swYesterday"] = MathUtility.Sum(swdep);

         double [] no3dep = new double[15];
         soilN.Get("no3", out no3dep);
         me[paddock.Name + "_no3Yesterday"] = MathUtility.Sum(no3dep);

         double drain = 0;
         soil.Get("drain", out drain);
         me[paddock.Name + "_drainage"] += drain;

         double runoff = 0;
         soil.Get("runoff", out runoff);
         me[paddock.Name + "_runoff"] += runoff;

         double es = 0;
         soil.Get("es", out es);
         me[paddock.Name + "_evaporation"] += es;

         double applied_fert = 0;
         fertiliser.Get("fertiliser", out applied_fert);
         me[paddock.Name + "_applied_fert"] += applied_fert;

         double[] carbon = new double[15];
         soilN.Get("carbon_tot", out carbon);
         me[paddock.Name + "_carbon"] = MathUtility.Sum(carbon);

         foreach (Component crop in paddock.Crops)
         {
            double Ep = 0.0;
            if(crop.Get("Ep", out Ep))
               me[paddock.Name + "_Ep"] += Ep;
         }
         double rain = 0;
         MySimulation.Get("rain", out rain);
         me[paddock.Name + "_rain"] += rain;

         me[paddock.Name + "_daysInPhase"]++;
      }
   }
}
```
        manager2 Maize Management
          # Crop properties
          crop = maize  # Name of this crop
          # Sowing criteria
          date1 = 15-may  # Enter sowing window START date (dd-mmm)
          date3 = na  # Enter cultivar change date (na if not in use)
          date2 = 10-jul  # Enter sowing window END date (dd-mmm)
          must_sow = no
          rain_amount = 25  # Enter amount of cumulative rainfall (mm)
          rain_days = 3  # Enter number of days to accumulate rainfall (days)
          esw_amount = 50  # Enter amount of soil water (mm)
          # Sowing Parameters
          cultivar1 = Pioneer_3394  # Enter cultivar
          cultivar2 = na  # Enter 2nd Cultivar (na if not using a second cultivar)
          density1 = 25  # Enter sowing density (plants/m2)
          depth1 = 30  # Enter sowing depth (mm)
          row_spacing1 = 500  # Enter row spacing (mm)
          # Extra Parameters
          ftn1 = na  # Enter Fertile Tiller Number (na for auto)
          skiprow1 = solid  # Skip row
          tillageImplement = na  # Name of tillage implement (na if not in use)
```csharp
using System;
using ModelFramework;
using CSGeneral;

// Basic crop management: sowing & harvesting.
// Multi-paddock aware.
// This component DOES NOT require a trigger from the sequencer.
// It will assume it is the only crop in the system if it doesnt find a sequencer.
// If it does find a sequencer, it will do nothing until told to (via Enter/Leave).
public class Script 
{      
   [Link()]  public Simulation MySimulation;
   
   [Param()] private string crop;         // The module name of this crop
   [Param()] private string date1;         //Start of sowing window
   [Param()] private string date2;         //End of sowing window
   [Param()] private string date3;         //date to change to different cultivar
   [Param()] int esw_amount;
   [Param()] private string must_sow;

   [Input()] private DateTime today;

   // Rainfall accumulator
   [Param()] int rain_days;              //check for rain over this period
   [Param()] int rain_amount;            //this much rain over that period

   // Daily rainfall from the system
   [Input] private double rain;
   private ManagerUtility.Tracker<double> rainTracker; 

   private bool inWindow = false;
   private bool endOfWindow = false;
   private bool ChangeCultivar = false;

   //initialise tracker, telling it how many days to track
   [EventHandler] public void OnInitialised()
   {
      rainTracker = new ManagerUtility.Tracker<double>(rain_days); 
   }

   // Daily tests common to all paddocks
   [EventHandler] public void OnPrepare()
   {
      bool startOfWindow = DateUtility.DatesEqual(date1, today);

      inWindow = DateUtility.WithinDates(date1, today, date2);
      ChangeCultivar = false;
      if(date3 != "na")  
         ChangeCultivar = DateUtility.WithinDates(date3, today, date2);
      endOfWindow = DateUtility.DatesEqual(date2, today);

      rainTracker.Add(rain);
      string currentPaddock = "";
      if (MySimulation.Get("currentPaddock", out currentPaddock) == false) 
      {
         // If there is no sequencer plugged in then we are it..
         if (canEnter > 0) {
            OnEnter();
         }
         if (canLeave > 0) {
            OnLeave();
         }
      }
   }
   // Test whether we can sow a crop today
   // +ve number - yes
   // 0          - no
   // -ve number - no, out of scope (planting window)
   [Output, Description("Test whether we can sow a crop today")] public int canEnter  {
      get {
         bool isPossibleToday = false;
         
         string currentPaddock;
         MySimulation.Get("currentPaddock", out currentPaddock);
         //Console.WriteLine("1. '" + currentPaddock + "'");

         Component paddockModule;
         if (currentPaddock != "")
            paddockModule = (Component) MySimulation.LinkByName(currentPaddock);
         else
            paddockModule = (Component) MySimulation.ChildPaddocks[0];
         //Console.WriteLine("2. " + paddockModule.Name);

         Component cropModule = (Component) paddockModule.LinkByName( crop );

         //Console.WriteLine("3. " + cropModule.Name);
         string plantStatus = "";
         cropModule.Get("plant_status", out plantStatus);

         double esw = 0.0;
         Component soilModule = (Component) paddockModule.LinkByType("SoilWat");
         soilModule.Get("esw", out esw);
         if (plantStatus == "out" &&
             inWindow &&
             rainTracker.Sum() >= rain_amount &&
             esw > esw_amount) 
         {
             isPossibleToday = true;
         } 

	     if (isPossibleToday)
            return 1;
         
         if (plantStatus == "out" && endOfWindow && must_sow == "yes")
            return 1;

         if (plantStatus == "out" && !inWindow)
            return -1;
         
         return 0;
      }
   }  
   [Output, Description("Test whether we have passed the end of the window")] public int pastWindow  {
      get {
         return( (DateUtility.CompareDates(date2, today) > 0) ? 1 : 0);
      }
   }

   
   // Sow a crop
   [Param()] private string cultivar1;
   [Param()] private string cultivar2;
   [Param()] private double density1;
   [Param()] private double depth1;
   [Param()] private double row_spacing1;
   [Param()] private string ftn1;
   [Param()] private string skiprow1;
   [Param()] private string tillageImplement;
   
   [EventHandler, Description("Sow the crop")] public void OnEnter()
   {
      Console.WriteLine(today + " Sowing Crop");
      SowType data = new SowType();
      data.Cultivar = cultivar1;
      if(ChangeCultivar)
         data.Cultivar = cultivar2;

      data.plants = density1;
      data.sowing_depth = depth1;
      data.row_spacing = row_spacing1;
      data.tiller_no_fertile = (ftn1 == "na") ? "" : ftn1;
      data.SkipRow = 0 ;
      if (skiprow1 == "single")
         data.SkipRow = 1;
      else if (skiprow1 == "double")
         data.SkipRow = 2;

      string currentPaddock;
      MySimulation.Get("currentPaddock", out currentPaddock);
      Component cropModule;
      if (currentPaddock != "")
         cropModule = (Component) MySimulation.LinkByName(currentPaddock + "." + crop);
      else 
         cropModule = (Component) MySimulation.ChildPaddocks[0].LinkByName(crop);

      cropModule.Publish("Sow", data);
      if (tillageImplement.ToLower() != "na") 
	  {
         TillageType t = new TillageType();
         t.type = tillageImplement;
         Component paddockModule;
         if (currentPaddock != "")
            paddockModule = (Component) MySimulation.LinkByName(currentPaddock);
         else
            paddockModule = MySimulation.ChildPaddocks[0];
         paddockModule.Publish("tillage", t);
      }		 
   }

   // Test whether we can harvest a crop today
   // +ve number - yes
   // 0          - no
   // -ve        - out of scope
   [Output] public int canLeave  
   {
      get 
      {
         string currentPaddock;
         MySimulation.Get("currentPaddock", out currentPaddock);

         string plantStatus = "";
         MySimulation.Get((currentPaddock != "" ? currentPaddock + "." : "") + crop + ".plant_status", out plantStatus);
         if (plantStatus == "out")
            return -1;

         string StageName = "";
         MySimulation.Get((currentPaddock != "" ? currentPaddock + "." : "") + crop + ".StageName", out StageName);
         if (StageName == "harvest_ripe" || plantStatus == "dead")
            return 1;
         return 0;
      }
   }

   [EventHandler] public void OnLeave()
   {
      Console.WriteLine(today + " Harvesting Crop");
      HarvestType hdata = new HarvestType();
      hdata.Remove = 0.0;
      string currentPaddock;
      MySimulation.Get("currentPaddock", out currentPaddock);
      Component cropModule;
      if (currentPaddock != "")
         cropModule = (Component) MySimulation.LinkByName(currentPaddock + "." + crop);
      else 
         cropModule = (Component) MySimulation.ChildPaddocks[0].LinkByName(crop);

      cropModule.Publish("harvest", hdata);

      KillCropType kdata = new KillCropType();
      kdata.KillFraction = 0.0F;
      cropModule.Publish("killcrop", kdata);
      cropModule.Publish("end_crop");
   } 
}
```
        manager2 Sorghum Management
          # Crop properties
          crop = sorghum  # Name of this crop
          # Sowing criteria
          date1 = 15-may  # Enter sowing window START date (dd-mmm)
          date3 = na  # Enter cultivar change date (na if not in use)
          date2 = 10-jul  # Enter sowing window END date (dd-mmm)
          must_sow = no
          rain_amount = 25  # Enter amount of cumulative rainfall (mm)
          rain_days = 3  # Enter number of days to accumulate rainfall (days)
          esw_amount = 50  # Enter amount of soil water (mm)
          # Sowing Parameters
          cultivar1 = Buster  # Enter cultivar
          cultivar2 = na  # Enter 2nd Cultivar (na if not using a second cultivar)
          density1 = 25  # Enter sowing density (plants/m2)
          depth1 = 30  # Enter sowing depth (mm)
          row_spacing1 = 500  # Enter row spacing (mm)
          # Extra Parameters
          ftn1 = na  # Enter Fertile Tiller Number (na for auto)
          skiprow1 = solid  # Skip row
          tillageImplement = na  # Name of tillage implement (na if not in use)
          script: same as in SorghumSoybean_Success.paddock.Manager folder.Maize Management
        manager2 Soybean Management
          # Crop properties
          crop = soybean  # Name of this crop
          # Sowing criteria
          date1 = 1-may  # Enter sowing window START date (dd-mmm)
          date3 = na  # Enter cultivar change date (na if not in use)
          date2 = 30-dec  # Enter sowing window END date (dd-mmm)
          must_sow = no
          rain_amount = 15  # Enter amount of cumulative rainfall (mm)
          rain_days = 3  # Enter number of days to accumulate rainfall (days)
          esw_amount = 20  # Enter amount of soil water (mm)
          # Sowing Parameters
          cultivar1 = MG_0  # Enter cultivar
          cultivar2 = na  # Enter 2nd Cultivar (na if not using a second cultivar)
          density1 = 10  # Enter sowing density (plants/m2)
          depth1 = 30  # Enter sowing depth (mm)
          row_spacing1 = 250  # Enter row spacing (mm)
          # Extra Parameters
          ftn1 = na  # Enter Fertile Tiller Number (na for auto)
          skiprow1 = solid  # Skip row
          tillageImplement = planter  # Name of tillage implement (na if not in use)
```csharp
using System;
using ModelFramework;
using CSGeneral;

// Basic crop management: sowing & harvesting.
// Multi-paddock aware.
// This component DOES NOT require a trigger from the sequencer.
// It will assume it is the only crop in the system if it doesnt find a sequencer.
// If it does find a sequencer, it will do nothing until told to (via Enter/Leave).
public class Script 
{      
   [Link()]  public Simulation MySimulation;
   
   [Param()] private string crop;         // The module name of this crop
   [Param()] private string date1;         //Start of sowing window
   [Param()] private string date2;         //End of sowing window
   [Param()] private string date3;         //date to change to different cultivar
   [Param()] int esw_amount;
   [Param()] private string must_sow;

   [Input()] private DateTime today;

   // Rainfall accumulator
   [Param()] int rain_days;              //check for rain over this period
   [Param()] int rain_amount;            //this much rain over that period

   // Daily rainfall from the system
   [Input] private double rain;
   private ManagerUtility.Tracker<double> rainTracker; 

   private bool inWindow = false;
   private bool endOfWindow = false;
   private bool ChangeCultivar = false;

   //initialise tracker, telling it how many days to track
   [EventHandler] public void OnInitialised()
   {
      rainTracker = new ManagerUtility.Tracker<double>(rain_days); 
   }

   // Daily tests common to all paddocks
   [EventHandler] public void OnPrepare()
   {
      bool startOfWindow = DateUtility.DatesEqual(date1, today);

      inWindow = DateUtility.WithinDates(date1, today, date2);
      ChangeCultivar = false;
      if(date3 != "na")  
         ChangeCultivar = DateUtility.WithinDates(date3, today, date2);
      endOfWindow = DateUtility.DatesEqual(date2, today);

      rainTracker.Add(rain);
      string currentPaddock = "";
      if (MySimulation.Get("currentPaddock", out currentPaddock) == false) 
      {
         // If there is no sequencer plugged in then we are it..
         if (canEnter > 0) {
            OnEnter();
         }
         if (canLeave > 0) {
            OnLeave();
         }
      }
   }
   // Test whether we can sow a crop today
   // +ve number - yes
   // 0          - no
   // -ve number - no, out of scope (planting window)
   [Output, Description("Test whether we can sow a crop today")] public int canEnter  {
      get {
         bool isPossibleToday = false;
         
         string currentPaddock;
         MySimulation.Get("currentPaddock", out currentPaddock);
         //Console.WriteLine("1. '" + currentPaddock + "'");

         Component paddockModule;
         if (currentPaddock != "")
            paddockModule = (Component) MySimulation.LinkByName(currentPaddock);
         else
            paddockModule = (Component) MySimulation.ChildPaddocks[0];
         //Console.WriteLine("2. " + paddockModule.Name);

         Component cropModule = (Component) paddockModule.LinkByName( crop );

         //Console.WriteLine("3. " + cropModule.Name);
         string plantStatus = "";
         cropModule.Get("plant_status", out plantStatus);

         double esw = 0.0;
         Component soilModule = (Component) paddockModule.LinkByType("SoilWat");
         soilModule.Get("esw", out esw);
         if (plantStatus == "out" &&
             inWindow &&
             rainTracker.Sum() >= rain_amount &&
             esw > esw_amount) 
         {
             isPossibleToday = true;
         } 

      if (isPossibleToday)
            return 1;
         
         if (plantStatus == "out" && endOfWindow && must_sow == "yes")
            return 1;

         if (plantStatus == "out" && !inWindow)
            return -1;
         
         return 0;
      }
   }  
   
   [Output, Description("Test whether we have passed the end of the window")] public int pastWindow  {
      get {
         return( (DateUtility.CompareDates(date2, today) < 0) ? 1 : 0);
      }
   }
   
   // Sow a crop
   [Param()] private string cultivar1;
   [Param()] private string cultivar2;
   [Param()] private double density1;
   [Param()] private double depth1;
   [Param()] private double row_spacing1;
   [Param()] private string ftn1;
   [Param()] private string skiprow1;
   [Param()] private string tillageImplement;
   
   [EventHandler, Description("Sow the crop")] public void OnEnter()
   {
      Console.WriteLine(today + " Sowing Crop");
      SowType data = new SowType();
      data.Cultivar = cultivar1;
      if(ChangeCultivar)
         data.Cultivar = cultivar2;

      data.plants = density1;
      data.sowing_depth = depth1;
      data.row_spacing = row_spacing1;
      data.tiller_no_fertile = (ftn1 == "na") ? "" : ftn1;
      data.SkipRow = 0 ;
      if (skiprow1 == "single")
         data.SkipRow = 1;
      else if (skiprow1 == "double")
         data.SkipRow = 2;

      string currentPaddock;
      MySimulation.Get("currentPaddock", out currentPaddock);
      Component cropModule;
      if (currentPaddock != "")
         cropModule = (Component) MySimulation.LinkByName(currentPaddock + "." + crop);
      else 
         cropModule = (Component) MySimulation.ChildPaddocks[0].LinkByName(crop);

      cropModule.Publish("Sow", data);
      if (tillageImplement.ToLower() != "na") 
   {
         TillageType t = new TillageType();
         t.type = tillageImplement;
         Component paddockModule;
         if (currentPaddock != "")
            paddockModule = (Component) MySimulation.LinkByName(currentPaddock);
         else
            paddockModule = MySimulation.ChildPaddocks[0];
         paddockModule.Publish("tillage", t);
      }   
   }

   // Test whether we can harvest a crop today
   // +ve number - yes
   // 0          - no
   // -ve        - out of scope
   [Output] public int canLeave  
   {
      get 
      {
         string currentPaddock;
         MySimulation.Get("currentPaddock", out currentPaddock);

         string plantStatus = "";
         MySimulation.Get((currentPaddock != "" ? currentPaddock + "." : "") + crop + ".plant_status", out plantStatus);
         if (plantStatus == "out")
            return -1;

         string StageName = "";
         MySimulation.Get((currentPaddock != "" ? currentPaddock + "." : "") + crop + ".StageName", out StageName);
         if (StageName == "harvest_ripe" || plantStatus == "dead")
            return 1;
         return 0;
      }
   }

   [EventHandler] public void OnLeave()
   {
      Console.WriteLine(today + " Harvesting Crop");
      HarvestType hdata = new HarvestType();
      hdata.Remove = 0.0;
      string currentPaddock;
      MySimulation.Get("currentPaddock", out currentPaddock);
      Component cropModule;
      if (currentPaddock != "")
         cropModule = (Component) MySimulation.LinkByName(currentPaddock + "." + crop);
      else 
         cropModule = (Component) MySimulation.ChildPaddocks[0].LinkByName(crop);

      cropModule.Publish("harvest", hdata);

      KillCropType kdata = new KillCropType();
      kdata.KillFraction = 0.0F;
      cropModule.Publish("killcrop", kdata);
      cropModule.Publish("end_crop");
   } 
}
```
        tracker
          variable=count of clock.simulation_days on end_of_day from transition to now as days_in_stage
      outputfile Harvest: filename=SorghumSoybean_Success Harvest.out; title=SorghumSoybean_Success Harvest
        variables
          variables: dd/mm/yyyy as Date, yield, biomass
        events Reporting Frequency: event=harvesting
      outputfile Phases: filename=SorghumSoybean_Success Phases.out; title=SorghumSoybean_Success Phases
        variables
          variables: dd/mm/yyyy as Date, currentState, TRainfall as Rainfall, Trunoff as runoff, Tes as evap, Tdrainage as drainage, TEp as Ep, swStart, swYesterday as swEnd, no3Start, no3Yesterday as no3End, biomass_kgha as Biomass, yield_kgha as Yield, GrainN_gm2 as grainN, carbonYesterday as carbon, applied_fert, rotationNumber, simulation_days, daysInPhase
        events Reporting Frequency: event=transition
        RGraphics Rugplot Graph
```r
library(ggplot2)

apsim.input<- inputFiles 
aps1 <- read.table(apsim.input,skip=2,header=T) 
aps.name <- names(aps1)
df <- read.table(apsim.input,skip=3,header=T,col.names=aps.name,na.strings = "?")
df$Date<-as.Date(df$Date, format="%d/%m/%Y")

# sort out the beginning and ending dates of each phase
x1 <- df$Date[-1*nrow(df)]
x2 <- df$Date[-1] 
df <- df[-1,]  # throw away the first - it's from Start_Simulation
df$x1<-x1
df$x2<-x2

#lower bound of rectangles at bottom
df$ymin <- -0.25 * max(df$Yield)
 
jpeg(file=imageFileName, width=width, height=height)
g<- ggplot(df) +
 geom_bar(aes(x=Date, y=Yield, fill= currentState), stat="identity") +
 geom_rect(aes(xmin = x1 , xmax = x2, ymin= ymin, ymax=0, fill= currentState ) ) +
 scale_x_date() + scale_fill_discrete(name="state") + theme(
       axis.line = element_line(colour = "black"),
       panel.grid.major = element_blank(),
       panel.grid.minor = element_blank(),
       panel.border = element_blank(),
       panel.background = element_blank() )
print(g)

dev.off()
```
  simulation MaizeSoybean_Failure
    metfile met: filename=%apsim%/Examples/MetFiles/Goond.met
    clock
      start_date = 1/01/1940  # Enter the start date of the simulation
      end_date = 31/12/1950  # Enter the end date of the simulation
    summaryfile
    area paddock
      cotton
      Soil: same as SorghumSoybean_Success.paddock.Soil
      surfaceom SurfaceOrganicMatter
        PoolName = wheat_stubble  # Organic Matter pool name
        type = vetch  # Organic Matter type
        mass = 1000  # Initial surface residue (kg/ha)
        cnr = 80  # C:N ratio of initial residue
        standing_fraction = 0  # Fraction of residue standing
      fertiliser
      maize
      sorghum
      soybean
      chickpea
      folder Manager folder
        rotplot Rotation Management: canvas_height=424; rules_height=149; graph_name=stateGraph; language=C#; detailedLogging=no
          node soybean
          node maize
          node summer_fallow
          arc arc6: source=summer_fallow; target=maize; actions=[SummerFallow.Leave, Maize Management.Enter]; rules=[SummerFallow.canLeave, Maize Management.canEnter]
          arc arc8: source=soybean; target=summer_fallow; actions=[Soybean Management.Leave, SummerFallow.Enter]; rules=Soybean Management.canLeave
          arc arc1: source=maize; target=soybean; actions=[Maize Management.Leave, Soybean Management.Enter]; rules=Maize Management.canLeave
          paddock: isManaged=True; initialState=summer_fallow
          component Rotation Management_: executable=%apsim%/Model/Manager2.dll
            initdata
              text:
                using System;
                using System.Collections.Generic;
                using System.Dynamic;
                using System.Text;
                using ModelFramework;
                using CSGeneral;
                public class Script {
                [Link] public Simulation MySimulation;
                private List<string> paddocks = new List<string>();
                private List<dynamic> paddockStates = new List<dynamic>();
                private Graph g = new Graph();
                private Dictionary<string,string> _currentState = new Dictionary<string,string>();
                [Output, Description("Current State of DG")] public string currentState {
                  get {string[] r = new string[_currentState.Count]; _currentState.Values.CopyTo(r,0);
                       return(String.Join(" ", r));}
                }
                private void setState(string p, string s) {
                  _currentState[p] = s;
                }
                private string getState(string p) {
                  return(_currentState[p]);
                }
                [Output, Description("Current paddock")] public string currentPaddock = "";
                [Output] public string [] states = new string[0];
                [EventHandler] public void OnInitialised()
                {
                g = new Graph();
                states = new string[3];
                int i = 0;
                g.AddNode("soybean");
                states[i++] = "soybean";
                g.AddNode("maize");
                states[i++] = "maize";
                g.AddNode("summer_fallow");
                states[i++] = "summer_fallow";
                ruleAction arc6 = new ruleAction();
                arc6.testCondition.Add("SummerFallow.canLeave");
                arc6.testCondition.Add("Maize Management.canEnter");
                arc6.action.Add("SummerFallow.Leave");
                arc6.action.Add("Maize Management.Enter");
                g.AddDirectedEdge("summer_fallow","maize",arc6);
                ruleAction arc8 = new ruleAction();
                arc8.testCondition.Add("Soybean Management.canLeave");
                arc8.action.Add("Soybean Management.Leave");
                arc8.action.Add("SummerFallow.Enter");
                g.AddDirectedEdge("soybean","summer_fallow",arc8);
                ruleAction arc1 = new ruleAction();
                arc1.testCondition.Add("Maize Management.canLeave");
                arc1.action.Add("Maize Management.Leave");
                arc1.action.Add("Soybean Management.Enter");
                g.AddDirectedEdge("maize","soybean",arc1);
                string title;
                MySimulation.Get("title", out title);
                }
                [Link] public Component MySelf;
                [Input] public DateTime Today;
                [EventHandler] public void OnEnd_Simulation()
                {
                }
                [EventHandler] public void OnStart_Simulation()
                {
                paddocks.Add("paddock");
                setState("paddock","summer_fallow");
                   MySimulation.Publish("transition");
                }
                [Output] public string paddock_state {get {return(getState("paddock"));}}
                private string modname(string x) {
                  if (x.Contains(".")) return(x.Split('.')[0]);
                  return("");
                }
                private string varname(string x) {
                  if (x.Contains(".")) return(x.Split('.')[1]);
                  return(x);
                }
                [EventHandler] public void OnProcess()
                {
                   bool more = true;
                   while (more) {
                      more = false;
                      double bestScore = -1.0; string bestArc = ""; string bestPaddock = "";
                      foreach (string p in paddocks) {
                         Node s = g.FindNode(getState(p));
                         // Console.WriteLine(" state=" + s.Name);
                         foreach (string _arc in s.arcs.Keys) {
                            double score = 1;
                            foreach (string testCondition in s.arcs[_arc].testCondition){
                               double c = 0.0;
                               currentPaddock = p;
                               if (MySimulation.Get(testCondition, out c))
                                  score *= c;
                               else
                                  throw new Exception("Nothing returned from expression '" + testCondition + "'");
                               //Console.WriteLine(" p=" + p +" a=" + _arc + "cond=" + testCondition + " score=" + score);
                            }
                            if (score > bestScore) {
                               bestScore = score;
                               bestArc = _arc;
                               bestPaddock = p;
                            }
                         }
                      }
                      currentPaddock = "";
                      if (bestScore > 0.0) {
                         Node s = g.FindNode(getState(bestPaddock));
                         if( bestPaddock != "")
                            currentPaddock = bestPaddock;
                         if (getState(bestPaddock) != "") MySimulation.Publish("transition_from_" + getState(bestPaddock));
                         MySimulation.Publish("transition");
                         setState (bestPaddock, g.FindArcTarget(bestArc));
                         foreach (string action in s.arcs[bestArc].action ) {
                            try {MySimulation.Publish(action);} catch (Exception e) {Console.WriteLine("Error publishing '" + action + "' to the system"); throw (e);}
                            //Console.WriteLine(" best=" + bestPaddock + " action=" + action);
                         }
                         MySimulation.Publish("transition_to_" + getState(bestPaddock));
                         more = true;
                      }
                   }
                }
                  public class ruleAction
                  {
                     public string Target;
                     public List<string> testCondition = new List<string>();
                     public List<string> action = new List<string>();
                  }
                   public class Node : IEquatable<Node>
                   {
                      private string data /*, alias*/;
                      public Node(string _data) { data = _data; }
                      public Dictionary<string, ruleAction> arcs = new Dictionary<string, ruleAction>();
                      public bool Equals(Node other)
                      {
                         return ( this.data == other.data );
                      }
                      public string Name { get { return (data); } }
                   }

                   class Graph
                   {
                      public List<Node> vertices;
                      public void print() {
                         foreach (Node n in vertices) {
                            Console.WriteLine(n.Name + ":");
                            foreach (string k in n.arcs.Keys) {
                               Console.WriteLine("  " + k);
                            }
                         }
                      }
                      public Graph() { vertices = new List<Node>(); }
                      public Node AddNode(Node node)
                      {
                         if (vertices.Find(delegate(Node n) { return (n.Equals(node)); }) == null)
                            vertices.Add(node);
                         return (vertices.Find(delegate(Node n) { return (n.Equals(node)); }));
                      }
                      public Node AddNode(string value)
                      {
                         return (AddNode(new Node(value)));
                      }
                      public Node FindNode(string value)
                      {
                         return (FindNode(AddNode(value)));
                      }
                      public Node FindNode(Node node)
                      {
                         return (vertices.Find(delegate(Node n) { return (n.Equals(node)); }));
                      }
                      public void AddDirectedEdge(string source, string dest, ruleAction value)
                      {
                         int i = 0;
                         foreach (Node n in vertices) {
                            foreach (string arc in n.arcs.Keys) {
                               i++;
                            }
                         }
                         Node node1 = AddNode(source);
                         AddNode(dest);
                         value.Target = dest;
                         node1.arcs.Add("arc" + i.ToString(), value);
                      }
                      public string FindArcTarget(string arc)
                      {
                         foreach (Node n in vertices) {
                            foreach (string a in n.arcs.Keys) {
                               if (a == arc) { return (n.arcs[a].Target); }
                            }
                         }
                         Console.WriteLine("Aiee - no target for arc " + arc );
                         return("");
                      }
                   }
                }
        manager2 RotationCounter: same as SorghumSoybean_Success.paddock.Manager folder.RotationCounter
        manager2 SummerFallow: same as SorghumSoybean_Success.paddock.Manager folder.SummerFallow
        manager2 PaddockAccumulator: same as SorghumSoybean_Success.paddock.Manager folder.PaddockAccumulator
        manager2 Maize Management: same as SorghumSoybean_Success.paddock.Manager folder.Maize Management
        manager2 Sorghum Management: same as SorghumSoybean_Success.paddock.Manager folder.Sorghum Management
        manager2 Soybean Management: same as SorghumSoybean_Success.paddock.Manager folder.Soybean Management
        manager2 Chickpea Management
          # Crop properties
          crop = chickpea  # Name of this crop
          # Sowing criteria
          date1 = 15-may  # Enter sowing window START date (dd-mmm)
          date3 = na  # Enter cultivar change date (na if not in use)
          date2 = 10-jul  # Enter sowing window END date (dd-mmm)
          must_sow = no
          rain_amount = 25  # Enter amount of cumulative rainfall (mm)
          rain_days = 3  # Enter number of days to accumulate rainfall (days)
          esw_amount = 50  # Enter amount of soil water (mm)
          # Sowing Parameters
          cultivar1 = amethyst  # Enter cultivar
          cultivar2 = na  # Enter 2nd Cultivar (na if not using a second cultivar)
          density1 = 25  # Enter sowing density (plants/m2)
          depth1 = 30  # Enter sowing depth (mm)
          row_spacing1 = 500  # Enter row spacing (mm)
          # Extra Parameters
          ftn1 = na  # Enter Fertile Tiller Number (na for auto)
          skiprow1 = solid  # Skip row
          tillageImplement = na  # Name of tillage implement (na if not in use)
          script: same as in SorghumSoybean_Success.paddock.Manager folder.Maize Management
        tracker
          variable=count of clock.simulation_days on end_of_day from transition to now as days_in_stage
      outputfile Harvest: filename=MaizeSoybean_Failure Harvest.out; title=MaizeSoybean_Failure Harvest
        variables
          variables: dd/mm/yyyy as Date, yield, biomass
        events Reporting Frequency: event=harvesting
      outputfile Phases: filename=MaizeSoybean_Failure Phases.out; title=MaizeSoybean_Failure Phases
        variables: same as SorghumSoybean_Success.paddock.Phases.Variables
        events Reporting Frequency: event=transition
        RGraphics Rugplot Graph: same as SorghumSoybean_Success.paddock.Phases.Rugplot Graph
