folder Maize2_validation: version=36; creator=Apsim 7.6-r3482
  simulation MaizeTest
    clock
      start_date = 15/10/2000  # Enter the start date of the simulation
      end_date = 01/06/2001  # Enter the end date of the simulation
    metfile met: filename=%apsim%\Examples\MetFiles\lincoln.met
    summaryfile
    area paddock
      fertiliser
      surfaceom surface organic matter
        PoolName = wheat  # Organic Matter pool name
        type = wheat  # Organic Matter type
        mass = 0  # Initial surface residue (kg/ha)
        cnr = 80  # C:N ratio of initial residue
        standing_fraction = 0  # Fraction of residue standing
      folder Manager folder
        manager Sowing rule
          Cultivar = Pioneer_3153
          on start_of_day:
```
Harvest = 0
      if (today = date('15-Oct')) then
          if (paddock_is_fallow() = 1 then
            Maize2 sow population = 12, depth = 20, cultivar = [cultivar], MaxCover = 1.0, BudNumber = 1, row_spacing = 720, crop_class = plant
          endif 
      endif
```
        manager Fertilise incrop on critical NO3 level- top up
          # When should fertiliser be applied
          modulename = Maize2  # In which crop is fertiliser being applied
          fert_criteria = 30  # Maximum Amount of NO3 required in top 3 layers (kg/ha)
          fert_critical = 25  # Critical Amount of NO3 in top 3 layers (kg/ha)
          # Fertiliser application details
          fertmodule = fertiliser  # Module used to apply the fertiliser
          fert_type = NO3_N  # Fertiliser type
          on start_of_day:
```
         if ([modulename].plant_status = 'alive') then
            NO3_available = no3(1) + no3(2) + no3(3)
            if (NO3_available <= [fert_critical]) then
               N_deficit = [fert_criteria] - NO3_available
               '[fertmodule]' apply amount = N_deficit (kg/ha), depth = 50 (mm), type = [fert_type] ()
            endif
         endif
```
        irrigation
          automatic_irrigation = on
          asw_depth = 600  # Depth to which ASW is calculated. (mm)
          crit_fr_asw = 0.5  # Fraction of ASW below which irrigation is applied (0-1.0)
          irrigation_efficiency = 1  # Efficiency of the irrigation. (0-1.0)
          irrigation_allocation = off  # Allocation limits
          allocation = 0  # Allocation in ML
          default_no3_conc = 0  # Nitrate concentration (ppm N)
          default_nh4_conc = 0  # Ammonium concentration (ppm N)
          default_cl_conc = 0  # Chloride concentration (ppm Cl)
          default_no3_conc = 0  # Nitrate concentration (ppm N)
          default_nh4_conc = 0  # Ammonium concentration (ppm N)
          default_cl_conc = 0  # Chloride concentration (ppm Cl)
        micromet
          soilalbedo = 0.23
          a_interception = 0
          b_interception = 0
          c_interception = 0
          d_interception = 0
      Soil Templeton: Latitude=0; Longitude=0; YearOfSampling=0
        SoilTemperature2: MaxTTimeDefault=14; BoundaryLayerConductanceSource=calc; BoundaryLayerConductance=20; BoundaryLayerConductanceIterations=1; NetRadiationSource=calc; DefaultWindSpeed=3; DefaultAltitude=18; DefaultInstrumentHeight=1.2; BareSoilHeight=57
        InitialWater Initial water: FractionFull=1; PercentMethod=EvenlyDistributed
        Water
          Thickness  BD   AirDry  LL15  DUL   SAT
          50         1.3  0.05    0.08  0.31  0.44
          150        1.3  0.05    0.07  0.3   0.44
          200        1.3  0.05    0.07  0.28  0.44
          200        1.3  0.05    0.09  0.31  0.44
          200        1.3  0.05    0.11  0.3   0.44
          100        1.3  0.05    0.16  0.28  0.44
          300        1.3  0.05    0.15  0.3   0.44
          500        1.3  0.05    0.12  0.34  0.44
          SoilCrop Maize2: LL=[0.08, 0.07, 0.07, 0.09, 0.11, 0.16, 0.15, 0.12]; KL=[0.06, 0.06, 0.06, 0.04, 0.03, 0.02, 0.02, 0.02]; XF=[1, 1, 1, 1, 0.6, 0.4, 0.4, 0.4]
        SoilWater: SummerCona=4.4; SummerU=9; SummerDate=1-Nov; WinterCona=4.4; WinterU=9; WinterDate=1-Apr; DiffusConst=88; DiffusSlope=35.4; Salb=0.18; CN2Bare=68; CNRed=20; CNCov=0.8; Thickness=[100, 200, 200, 200, 200, 100, 300, 200]; SWCON=[0.7, 0.7, 0.7, 0.7, 0.7, 0.7, 0.7, 0.7]
        SoilOrganicMatter: RootCN=50; RootWt=1500; SoilCN=10; EnrACoeff=7.4; EnrBCoeff=0.2; OCUnits=Total
          Thickness  OC    FBiom  FInert
          100        1.82  0.025  0.45
          200        1.47  0.025  0.6
          200        1.2   0.015  0.75
          200        1.03  0.01   0.9
          200        0.47  0.01   0.96
          100        0.47  0.01   0.96
          300        0.47  0.01   0.96
          200        0.47  0.01   0.96
        Analysis: PHUnits=Water; BoronUnits=HotWater
          Thickness  PH   ParticleSizeClay
          100        6.6  30
          200        6.2  20
          200        5.7  20
          200        5.5  30
          200        5.5  30
          100        5.5  30
          300        5.5  30
          200        5.5  30
        Sample Initial nitrogen: NO3Units=ppm; NH4Units=ppm; SWUnits=Volumetric; OCUnits=Total; PHUnits=Water
          Thickness  NO3      NH4
          100        30.7692  0.1
          200        11.5385  0.1
          200        7.69231  0.1
          200        3.84615  0.1
          200        0        0.1
          100        0        0.1
          300        0        0.1
          200        0        0.1
      Maize2
      folder Cereal Crop Analysis Graphs
        outputfile Outputs: filename=MaizeTest Outputs.out; title=MaizeTest Outputs
          events Reporting Frequency: event=Daily
          variables
            variable:
              dd/mmm/yyyy as Date
              AccumTtemerg
              PhenologyThermalTimeValue
              StageCodeValue
              no3()
              nh4()
              urea()
              surfaceom_n
              biom_n()
              fom_n()
              hum_n()
              dnit()
              leach_no3
              AccumPlantN
              AccumMineralisation
              AccumDenit
              AccumFert
              AccumLeach
              AccumDetach
              DeltaSoilOMN
              DeltaSurfaceOMN
              DeltaSoilMineralN
              RootNSupplyUptake
              eo
              es
              sw_dep()
              dul_dep()
              drain
              runoff
              outflow_lat()
              pond
              AccumEO
              AccumEP
              AccumES
              AccumDrainage
              AccumRunoff
              AccumRainfall
              AccumIrrigation
              AccumOutflowLat
              SoilWaterDeficit
              AboveGroundLiveWt
              BelowGroundWt
              TotalWt
              LeafDeadWt
              LeafLiveWt
              StemLiveWt
              RootDeadWt
              RootLiveWt
              GrainLiveWt
              GrainDeadWt
              AboveGroundN
              BelowGroundN
              TotalN
              TotalLiveN
              TotalDeadN
              LeafDeadN
              LeafLiveN
              StemLiveN
              RootLiveN
              RootDeadN
              GrainLiveN
              GrainDeadN
              LeafLiveNConc
              LeafDeadNConc
              StemLiveNConc
              TuberLiveNConc
              RootLiveNConc
              GrainLiveNConc
              FloretLiveNConc
              RootWaterSupply
              RootWaterUptake
              LeafTranspiration
              LeafWaterDemand
              RootDepth
              Cover_green
              Cover_tot
              Cover_dead
              LeafLAI
              LeafLAIDead
              Height
              LeafFn
              LeafFw
              LeafPhotosynthesisFtValue
              LeafPhotosynthesisFvpdValue
              sw
              no3
              LeafPartitionFractionValue
              GrainPartitionFractionValue
              RootPartitionFractionValue
              GrainMinimumNConcValue
              LeafMinimumNConcValue
              RootMinimumNConcValue
              GrainMaximumNConcValue
              LeafMaximumNConcValue
              RootMaximumNConcValue
              leavesPerStem
              PhenologyEarlyTuberTargetValue
              StemLiveNonStructuralN
              StemLiveStructuralN
              StemLiveStructuralWt
              StemLiveNonStructuralWt
              LeafLiveNonStructuralN
              LeafLiveNonStructuralWt
              LeafLiveStructuralN
              LeafLiveStructuralWt
              LeafTotalStructuralN
              LeafTotalNonStructuralN
              LeafTotalStructuralWt
              LeafTotalNonStructuralWt
              LeafLiveMetabolicWt
              RootNSupplyUptake
              ArbitratorNDemand
              LeafExpandedCohortNo
              StructurePlantTotalNodeNo
              LeafPlantAppearedGreenLeafNo
              LeafExpandingCohortNo
              LeafAppearedCohortNo
              StructureTotalStemPopn
              LeafDeadCohortNo
              StructureMainStemNodeNo
              LeafSenescingCohortNo
              StructurePrimaryBudTotalNodeNo
              StructureMainStemPrimordiaNo
              LeafFinalNodeNo
              LeafPhotoPeriodValue
              PhenologyVernalisationIndexValue
              PhenologyVernalisationSIRIUSAccumulatedVernalisation as VernalisationIndex
              StructureMainStemFinalNodeNumberVernalisationFinalNodeNumber as VFNN
              StructureMainStemFinalNodeNumberPhotoperiodFinalNodeNumber as PPFNN
              StructureMainStemFinalNodeNumberTerminatedFinalNodeNumber as TFNN
              StructureMainStemFinalNodeNumberTargetFinalNodeNumber as FLN
              MaxT
              MinT
              maxt_soil_surface
              mint_soil_surface
              LeafThermalTimeValue
              StructureMainStemFinalNodeNo
              sw
              LeafSpecificArea
              HuskLiveWt
              RachisLiveWt
              StructureTotalStemPopn
              GrainNumber
              WaterSupplyDemandRatio
              AboveGroundLiveWt
              GrainAccumThermalTimeValue
              GrainSize
              StructureRelativeNodeApperancex
              fertiliser
              irrigation
              StructureMaxNumberOfLeavesValue
              LeafCohortSize
              LeafCohortMaxSize
              LeafPotentialGrowth
              LeafDMSupplyPhotosynthesis
              LeafSpecificArea
              ArbitratorDMSupply
        manager Diagnostic variables
          CropType = Maize2  # Select crop type to report variables for
          on init:
```
SimDay = 1

AccumPlantN = 0
AccumMineralisation = 0
AccumDenit = 0
AccumFert = 0
AccumLeach = 0
AccumDetach = 0
DeltaSoilOMN = 0
DeltaSurfaceOMN = 0
DeltaSoilMineralN = 0

AccumEO = 0
AccumEP = 0
AccumES = 0
AccumDrainage = 0
AccumRunoff = 0
AccumOutflowLat = 0
AccumIrrigation = 0
AccumRainfall = 0
SoilWaterDeficit = 0

AccumTtemerg = 0
```
          on start_of_day:
```
if simday = 1 then
InitialSoilOMN = biom_n() + fom_n() + hum_n()
InitialSurfaceOMN = surfaceom_n
InitialMineralN = no3() + nh4() + urea()
endif

!!!!!! Nitrogen balance components !!!!!!
!!!!!!^^^^^^^^^^^^^^^^^^^^^^^^^^^^^!!!!!!
AccumPlantN =  AccumPlantN - [CropType].RootNuptake
AccumMineralisation = AccumMineralisation + dlt_n_min() + dlt_n_min_res()
AccumDenit = AccumDenit - dnit() 
AccumFert = AccumFert + fertiliser
AccumLeach = AccumLeach - leach_urea - leach_no3 - leach_nh4 
AccumDetach = 0 !plant2 doesn't detach yet
DeltaSoilOMN = (biom_n() + fom_n() + hum_n()) - InitialSoilOMN
DeltaSurfaceOMN = surfaceom_n - InitialSurfaceOMN
DeltaSoilMineralN = (no3() + nh4() + urea()) - InitialMineralN

!!!!!! Water balance components !!!!!!
!!!!!!^^^^^^^^^^^^^^^^^^^^^^^^^^!!!!!!
AccumEO = AccumEO - eo
AccumEP = AccumEP - [CropType].LeafTranspiration
AccumES = AccumES - es
AccumDrainage = AccumDrainage - drain
AccumRunoff = AccumRunoff - runoff
AccumOutflowLat = AccumOutflowLat - outflow_lat()
AccumIrrigation = AccumIrrigation + Irrigation
AccumRainfall = Accumrainfall + rain
SoilWaterDeficit =  sw_dep() - dul_dep()

!!!!!! Thermal time calculation !!!!!!
!!!!!! ^^^^^^^^^^^^^^^^^^^^^^^^ !!!!!!
If [CropType].StageCodeValue >= 3 Then
AccumTtemerg = AccumTtemerg + [CropType].PhenologyThermalTimeValue
Endif
```
          on end_of_day:
```
if SimDay = 1 then
SimDay = 2
Else SimDay = 2
endif
```
  simulation MaizeRelease
    metfile met: filename=%apsim%\Examples\MetFiles\lincoln.met
    summaryfile
    area paddock
      Soil
        InitialWater Initial water: FractionFull=0.00; PercentMethod=FilledFromTop
        Water
          Thickness  BD    AirDry  LL15  DUL   SAT
          100        1.35  0.04    0.11  0.22  0.3
          100        1.35  0.14    0.14  0.25  0.3
          100        1.35  0.15    0.16  0.27  0.32
          200        1.4   0.16    0.17  0.28  0.33
          200        1.4   0.18    0.19  0.3   0.34
          200        1.4   0.18    0.2   0.3   0.35
          200        1.4   0.18    0.2   0.31  0.36
          200        1.4   0.18    0.2   0.32  0.37
          200        1.4   0.18    0.2   0.31  0.37
          200        1.4   0.18    0.2   0.31  0.37
          SoilCrop sorg
            LL=[0.11, 0.14, 0.16, 0.17, 0.19, 0.2, 0.2, 0.2, 0.2, 0.2]
            KL=[0.07, 0.07, 0.07, 0.07, 0.07, 0.07, 0.04, 0.04, 0.04, 0.04]
            XF=[1, 1, 1, 1, 1, 1, 1, 1, 1, 1]
          SoilCrop cowpea
            LL=[0.11, 0.14, 0.16, 0.17, 0.19, 0.2, 0.2, 0.2, 0.2, 0.2]
            KL=[0.08, 0.08, 0.08, 0.08, 0.06, 0.04, 0.03, 0.02, 0.01, 0.01]
            XF=[1, 1, 1, 1, 1, 1, 1, 1, 1, 1]
          SoilCrop maize
            LL=[0.11, 0.14, 0.16, 0.17, 0.19, 0.2, 0.2, 0.2, 0.2, 0.2]
            KL=[0.08, 0.08, 0.08, 0.08, 0.06, 0.04, 0.03, 0.02, 0.01, 0.01]
            XF=[1, 1, 1, 1, 1, 1, 1, 1, 1, 1]
          SoilCrop mucuna
            LL=[0.11, 0.14, 0.16, 0.17, 0.19, 0.2, 0.2, 0.2, 0.2, 0.2]
            KL=[0.08, 0.08, 0.08, 0.08, 0.06, 0.04, 0.03, 0.02, 0.01, 0.01]
            XF=[1, 1, 1, 1, 1, 1, 1, 1, 1, 1]
          SoilCrop peanut
            LL=[0.11, 0.14, 0.16, 0.17, 0.19, 0.2, 0.2, 0.2, 0.2, 0.2]
            KL=[0.08, 0.08, 0.08, 0.08, 0.06, 0.04, 0.03, 0.02, 0.01, 0.01]
            XF=[1, 1, 1, 1, 1, 1, 1, 1, 1, 1]
          SoilCrop pigeonp
            LL=[0.11, 0.14, 0.16, 0.17, 0.19, 0.2, 0.2, 0.2, 0.2, 0.2]
            KL=[0.08, 0.08, 0.08, 0.08, 0.06, 0.04, 0.03, 0.02, 0.01, 0.01]
            XF=[1, 1, 1, 1, 1, 1, 1, 1, 1, 1]
          SoilCrop soybean
            LL=[0.11, 0.14, 0.16, 0.17, 0.19, 0.2, 0.2, 0.2, 0.2, 0.2]
            KL=[0.08, 0.08, 0.08, 0.08, 0.06, 0.04, 0.03, 0.02, 0.01, 0.01]
            XF=[1, 1, 1, 1, 1, 1, 1, 1, 1, 1]
        SoilWater: SummerCona=2.5; SummerU=9; SummerDate=1-Nov; WinterCona=2.5; WinterU=9; WinterDate=1-Apr; DiffusConst=88; DiffusSlope=35.4; Salb=0.13; CN2Bare=75; CNRed=20; CNCov=0.8; Thickness=[100, 100, 100, 200, 200, 200, 200, 200, 200, 200]; SWCON=[0.5, 0.5, 0.5, 0.5, 0.5, 0.5, 0.5, 0.5, 0.5, 0.5]
        SoilOrganicMatter: RootCN=45; RootWt=1000; SoilCN=14.5; EnrACoeff=7.4; EnrBCoeff=0.2
          Thickness  OC    FBiom  FInert
          100        1.2   0.02   0.6
          100        1     0.01   0.65
          100        0.86  0.01   0.7
          200        0.83  0.01   0.75
          200        0.58  0.01   0.8
          200        0.54  0.01   0.85
          200        0.47  0.01   0.93
          200        0.5   0.01   0.93
          200        0.5   0.01   0.93
          200        0.5   0.01   0.93
        Analysis: Thickness=[100, 100, 100, 200, 200, 200, 200, 200, 200, 200]; PH=[6, 6, 6, 6.2, 6.5, 6.7, 6.8, 6.8, 6.8, 6.8]
        Sample Initial nitrogen
          Thickness  NO3    NH4
          100        0.237  0.194
          100        0.712  0.484
          100        0.712  0.290
          200        0.554  0.290
          200        0.395  0.290
          200        0.395  0.290
          200        0.237  0.290
          200        0.237  0.290
          200        0.158  0.290
          200        0.079  0.290
      surfaceom SurfaceOrganicMatter
        PoolName = wheat  # Organic Matter pool name
        type = wheat  # Organic Matter type
        mass = 0  # Initial surface residue (kg/ha)
        cnr = 80.0  # C:N ratio of initial residue
        standing_fraction = 0.0  # Fraction of residue standing
      fertiliser
      maize
      folder Manager folder
        manager Harvesting rule for intercropping
          # Harvesting criteria
          crop = maize  # Enter name of crop to harvest when ripe
          fraction_to_remove = 0.95  # Enter fraction of stover to remove (not for maize)
          on init:
```
          [crop]_to_harvest = 0
```
          on end_of_day:
```
         if ([crop]_to_harvest = 1) then
            [crop] harvest, remove=[fraction_to_remove]
            [crop] kill_crop
            [crop] end_crop
                  crop_in = crop_in - 1
            [crop]_to_harvest = 0
            fert_tot = 0
            sow_year = 0
            if (crop_current = '[crop]') then
               crop_current = crop_current1
               crop_current1 = crop_current2
               crop_current2 = blank
            elseif (crop_current1 = '[crop]') then
               crop_current1 = crop_current2
               crop_current2 = blank
            elseif (crop_current2 = '[crop]') then
               crop_current2 = blank
            endif
         endif

         if ([crop].StageName = 'harvest_ripe' OR [crop].plant_status = 'dead') then
            [crop]_to_harvest = 1
         endif
```
        manager Remove all residues on a fixed date
          # Removal criteria
          date = 1-may  # Date to remove residues (dd-mmm)
          surfaceommodule = SurfaceOrganicMatter  # Name of your surface organic matter module
          on start_of_day:
```
         if today = date('[date]') then
            '[surfaceommodule]' tillage type = user_defined, f_incorp = 1.0 (), tillage_depth = 0.0 ()
         endif
```
        manager Sow on a fixed date
          # Sowing criteria
          date = 15-oct  # Enter sowing date (dd-mmm)
          # Sowing parameters
          crop = maize  # Enter name of crop to sow
          density = 12  # Enter sowing density (plants/m2)
          depth = 20  # Enter sowing depth (mm)
          cultivar = Pioneer_3153  # Enter cultivar
          class = plant  # Enter crop growth class
          row_spacing = 720  # Enter row spacing (mm)
          on start_of_day:
```
        if (today = date('[date]') then
              [crop] sow plants =[density], sowing_depth = [depth], cultivar = [cultivar], row_spacing = [row_spacing], crop_class = [class]
         endif
```
        irrigation
          automatic_irrigation = on
          asw_depth = 600  # Depth to which ASW is calculated. (mm)
          crit_fr_asw = 0.5  # Fraction of ASW below which irrigation is applied (0-1.0)
          irrigation_efficiency = 1  # Efficiency of the irrigation. (0-1.0)
          irrigation_allocation = off  # Allocation limits
          allocation = 0  # Allocation in mm
          default_no3_conc = 0.0  # Nitrate concentration (ppm N)
          default_nh4_conc = 0.0  # Ammonium concentration (ppm N)
          default_cl_conc = 0.0  # Chloride concentration (ppm Cl)
        manager Fertilise incrop on critical NO3 level- top up
          # When should fertiliser be applied
          modulename = maize  # In which crop is fertiliser being applied
          fert_criteria = 30  # Maximum Amount of NO3 required in top 3 layers (kg/ha)
          fert_critical = 25  # Critical Amount of NO3 in top 3 layers (kg/ha)
          # Fertiliser application details
          fertmodule = fertiliser  # Module used to apply the fertiliser
          fert_type = NO3_N  # Fertiliser type
          on start_of_day:
          script: same as in MaizeTest.paddock.Manager folder.Fertilise incrop on critical NO3 level- top up
        manager Report Variables
          on init:
```
! Biomass components (kg dry matter per ha)

   aboveDM = 0
   
   leafDM = 0
   
   stemDM = 0
   
   rootDM = 0

   grainDM = 0
```
          on end_of_day:
```
! --- Plant fractions in kg DM/ha (Units converted Note that maize has variables with different names!)

   aboveDM = biomass

   leafDM = 10 * leafgreenwt
   
   stemDM = 10 * stemgreenwt

   grainDM = 10 * grain_wt
```
      outputfile: filename=MaizeRelease.out; title=MaizeRelease
        variables My Variables
          variables: dd/mm/yyyy as Date, day, year, aboveDM, grainDM, leafDM, stemDM, stover, biomass, esw, fertiliser, irrigation, stage_code, leaf_primodia, leaf_no, leaf_no_final, lai, tt, leaf_area, dlt_dm
        events My Variables Events: event=daily
    clock -> /Maize2_validation/MaizeTest/clock
  memo
    Have set the SLA to very BIG value to avoid C limitation on leaf growth
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