folder simulations: version=28
  simulation ReleasedMaize
    metfile met: filename=%apsim%\Examples\MetFiles\lincoln.met
    clock
      start_date = 01/11/2008  # Enter the start date of the simulation
      end_date = 25/10/2009  # Enter the end date of the simulation
    summaryfile
    area paddock
      soil: Site=Jimbour; Region=South East Queensland; LocalName=Waco
        SoilType = Black Vertosol  # Classification
        NearestTown = Jimbour, Q 4352
        NaturalVegetation = Grassland, mainly Qld bluegrass
        InitWater Initial water
          percentmethod: percent=1; distributed=filled from top
        Water
          Layer:
            Thickness (mm)  BD (g/cc)  AirDry (mm/mm)  LL15 (mm/mm)  DUL (mm/mm)  SAT (mm/mm)
            150             1.02       0.15            0.29          0.54         0.59
            150             1.03       0.26            0.29          0.53         0.58
            300             1.02       0.29            0.29          0.54         0.59
            300             1.02       0.29            0.29          0.54         0.58
            300             1.06       0.3             0.3           0.52         0.57
            300             1.11       0.31            0.31          0.5          0.55
            300             1.12       0.32            0.32          0.5          0.55
            300             1.15       0.33            0.33          0.48         0.53
            300             1.18       0.34            0.34          0.47         0.52
            300             1.2        0.35            0.35          0.46         0.51
            300             1.25       0.36            0.36          0.44         0.49
          SoilCrop Barley
            Layer:
              Thickness (mm)  LL (mm/mm)  KL (/day)  XF (0-1)
              150             0.29        0.1        1
              150             0.29        0.1        1
              300             0.32        0.08       1
              300             0.38        0.06       1
              300             0.39        0.04       1
              300             0.39        0.02       1
              300             0.41        0.01       1
              300             0.48        0          0
              300             0.47        0          0
              300             0.46        0          0
              300             0.44        0          0
          SoilCrop Chickpea
            Layer:
              Thickness (mm)  LL (mm/mm)  KL (/day)  XF (0-1)
              150             0.29        0.1        1
              150             0.29        0.1        1
              300             0.36        0.08       1
              300             0.43        0.06       1
              300             0.51        0.04       1
              300             0.5         0.02       1
              300             0.5         0.01       1
              300             0.48        0          0
              300             0.47        0          0
              300             0.46        0          0
              300             0.44        0          0
          SoilCrop Lucerne
            Layer:
              Thickness (mm)  LL (mm/mm)  KL (/day)  XF (0-1)
              150             0.29        0.1        1
              150             0.29        0.1        1
              300             0.29        0.1        1
              300             0.29        0.1        1
              300             0.3         0.09       1
              300             0.31        0.09       1
              300             0.32        0.09       1
              300             0.33        0.09       1
              300             0.34        0.09       1
              300             0.35        0.09       1
              300             0.36        0.09       1
          SoilCrop Lucerne2: same as ReleasedMaize.paddock.Soil.Water.Lucerne
          SoilCrop Maize
            Layer:
              Thickness (mm)  LL (mm/mm)  KL (/day)  XF (0-1)
              150             0.29        0.1        1
              150             0.29        0.1        1
              300             0.34        0.1        1
              300             0.34        0.08       1
              300             0.37        0.06       1
              300             0.4         0.04       1
              300             0.42        0.02       1
              300             0.48        0          0
              300             0.47        0          0
              300             0.46        0          0
              300             0.44        0          0
          SoilCrop Perennial Grass
            Layer:
              Thickness (mm)  LL (mm/mm)  KL (/day)  XF (0-1)
              150             0.29        0.1        1
              150             0.29        0.1        1
              300             0.39        0.1        1
              300             0.41        0.1        1
              300             0.4         0.09       1
              300             0.4         0.07       1
              300             0.41        0.05       1
              300             0.41        0          0
              300             0.4         0          0
              300             0.4         0          0
              300             0.42        0          0
          SoilCrop Sorghum
            Layer:
              Thickness (mm)  LL (mm/mm)  KL (/day)  XF (0-1)
              150             0.29        0.1        1
              150             0.29        0.1        1
              300             0.35        0.1        1
              300             0.38        0.08       1
              300             0.4         0.06       1
              300             0.4         0.04       1
              300             0.4         0.02       1
              300             0.48        0          0
              300             0.47        0          0
              300             0.46        0          0
              300             0.44        0          0
          SoilCrop Wheat
            Layer:
              Thickness (mm)  LL (mm/mm)  KL (/day)  XF (0-1)
              150             0.29        0.1        1
              150             0.29        0.1        1
              300             0.32        0.08       1
              300             0.32        0.06       1
              300             0.35        0.04       1
              300             0.38        0.02       1
              300             0.41        0.01       1
              300             0.48        0          0
              300             0.47        0          0
              300             0.46        0          0
              300             0.44        0          0
          SoilCrop wheat2: same as ReleasedMaize.paddock.Soil.Water.Wheat
        SoilWat: SummerCona=3.5; SummerU=6; SummerDate=1-Nov; WinterCona=3.5; WinterU=6; WinterDate=1-Apr; DiffusConst=40; DiffusSlope=16; Salb=0.13; Cn2Bare=73; CnRed=20; CnCov=0.8
          Layer:
            Thickness (mm)  SWCON (0-1)
            150             0.3
            150             0.3
            300             0.3
            300             0.3
            300             0.3
            300             0.3
            300             0.3
            300             0.3
            300             0.3
            300             0.3
            300             0.3
        SoilOrganicMatter: RootCn=40; RootWt=200; SoilCn=12.5; EnrACoeff=7.4; EnrBCoeff=0.2
          Layer:
            Thickness (mm)  OC (Total %)  FBiom (0-1)  FInert (0-1)
            150             1.04          0.025        0.4
            150             0.89          0.02         0.6
            300             0.89          0.015        0.8
            300             0.89          0.01         0.9
            300             0.77          0.01         0.95
            300             0.45          0.01         0.95
            300             0.27          0.01         0.95
            300             0.22          0.01         0.95
            300             0.16          0.01         0.95
            300             0.13          0.01         0.95
            300             0.12          0.01         0.95
        Analysis
          Layer:
            Thickness (mm)  EC (1:5 dS/m)  PH (1:5 water)
            150             0.2            8.4
            150             0.25           8.8
            300             0.31           9
            300             0.4            9.2
            300             0.59           9.2
            300             0.84           9.1
            300             0.93           9
            300             1.01           9
            300             1.06           8.9
            300             1.05           8.9
            300             1.01           8.9
        Sample Initial nitrogen
          Layer:
            Thickness (mm)  NO3 (ppm)  NH4 (ppm)
            150             6.503      0.599004
            150             2.101      0.100001
            300             2.101      0.100001
            300             1.701      0.100001
            300             1.701      0.100001
            300             1.701      0.100001
            300             1.701      0.100001
            300             1.701      0.100001
            300             1.701      0.100001
            300             1.701      0.100001
            300             1.701      0.100001
      surfaceom surface organic matter
        PoolName = wheat  # Organic Matter pool name
        type = wheat  # Organic Matter type
        mass = 1000  # Initial surface residue (kg/ha)
        cnr = 80  # C:N ratio of initial residue
        standing_fraction = 0  # Fraction of residue standing
      fertiliser
      maize
      folder Manager folder
        manager Sow on a fixed date
          # Sowing criteria
          date = 1-nov  # Enter sowing date (dd-mmm)
          # Sowing parameters
          crop = maize  # Enter name of crop to sow
          density = 10  # Enter sowing density (plants/m2)
          depth = 30  # Enter sowing depth (mm)
          cultivar = Pioneer_3527  # Enter cultivar
          class = plant  # Enter crop growth class
          row_spacing = 500  # Enter row spacing (mm)
          on start_of_day:
```
        if (today = date('[date]') then
              [crop] sow plants =[density], sowing_depth = [depth], cultivar = [cultivar], row_spacing = [row_spacing], crop_class = [class]
         endif
```
        manager Harvesting rule
          # Harvesting criteria
          crop = maize  # Enter name of crop to harvest when ripe
          on end_of_day:
```
           if ([crop].stage = 11) then
              [crop]  harvest
              [crop]  end_crop
           endif
```
        manager AnalysisVariables
          on init:
```
RadIntTot = 0 ! Total radiation interception (MJ/m2/day)
AboveGroundWt = 0 ! Convert "biomass" (kg/ha) to AboveGroundWt (g/m2) to compare to Plant2
dlt_DM_grams = 0 ! transforming  kg/ha into g/m2
```
          on start_of_day:
```
RadIntTot = cover_green * Radn
AboveGroundWt = biomass / 10
dlt_DM_grams = dlt_DM * 10 ! transforming g/m2 into kg/ha
```
      outputfile: filename=ReleasedMaize.out; title=ReleasedMaize
        variables
          variables: dd/mm/yyyy as Date, stage, stagename, leaf_no_final, node_no, leaf_no_dead(), AboveGroundWt, lai, root_depth, leaf_no, dlt_dm, RadIntTot, tt
        events Reporting Frequency: event=daily
  simulation Maize2 -> /simulations/ReleasedMaize
    memo
      This is a prototype using SIRIUS elements for organs and arbitration
      Status:
      9 Sep 2011: First prototype running - Non "C" constrained LAI works ok. C limited LAI is understimating LAI because very little biomass is going to leaves (check SIRIUS arbitrator wirh Hamish) EIT
    area paddock -> /simulations/ReleasedMaize/paddock
      soil -> /simulations/ReleasedMaize/paddock/Soil
        Water -> /simulations/ReleasedMaize/paddock/Soil/Water
          SoilCrop Maize2: same as ReleasedMaize.paddock.Soil.Water.Maize
      folder Manager folder -> /simulations/ReleasedMaize/paddock/Manager folder
        manager Sow on a fixed date
          # Sowing criteria
          date = 1-nov  # Enter sowing date (dd-mmm)
          # Sowing parameters
          crop = maize2  # Enter name of crop to sow
          density = 10  # Enter sowing density (plants/m2)
          depth = 30  # Enter sowing depth (mm)
          cultivar = ShortHybrid  # Enter cultivar
          class =  # Enter crop growth class
          row_spacing = 500  # Enter row spacing (mm)
          on start_of_day:
```
        if (today = date('[date]') then
              [crop] sow population =[density], depth = [depth], cultivar = [cultivar], MaxCover = 1.0, BudNumber = 1, row_spacing = [row_spacing], crop_class = [class]
         endif
```
        manager Harvesting rule
          # Harvesting criteria
          crop = maize2  # Enter name of crop to harvest when ripe
          on end_of_day:
```
           if (today = date('1-oct')) then
              [crop]  harvest
           endif
```
        manager Fertilise incrop on critical NO3 level- top up
          # When should fertiliser be applied
          modulename = Maize2  # In which crop is fertiliser being applied
          fert_criteria = 200  # Maximum Amount of NO3 required in top 3 layers (kg/ha)
          fert_critical = 100  # Critical Amount of NO3 in top 3 layers (kg/ha)
          # Fertiliser application details
          fertmodule = fertiliser  # Module used to apply the fertiliser
          fert_type = NO3_N  # Fertiliser type
          on start_of_day:
```
         if ([modulename].plant_status = 'alive') then
            NO3_available = no3(1) + no3(2) + no3(3)
            if (NO3_available <= [fert_critical]) then
               N_deficit = [fert_criteria] - NO3_available
               '[fertmodule]' apply amount = N_deficit (kg/ha), depth = 50 (mm), type = [fert_type] ()
            endif
         endif
```
      maize2
        ini: filename=%apsim%\Model\Maize2.xml
      outputfile: filename=Maize2.out; title=Maize2
        variables
          variables: dd/mm/yyyy as Date, PhenologyCurrentPhaseName, LeafFinalNodeNumberValue, LeafNodeNo, LeafDeadNodeNo, LeafTotalNo, LeafFullyExpandedNodeNo, LeafLAI, RootDepth, AboveGroundWt, LeafLAIDead, LeafSize, RueAct, Radn as SolarRadiation, Cover_green, RadIntTot, dlt_DM, ShootDM, PhenologyThermalTimeValue, StageCodeValue, LeafDMSupply
        events Reporting Frequency -> /simulations/ReleasedMaize/paddock/outputfile/Reporting Frequency
      micromet: soilalbedo=0.23; a_interception=0.0; b_interception=0.0; c_interception=0.0; d_interception=0.0
      folder Plant2 developers graph suite
        outputfile Plant2 diagnostic variables: Title=Plant2 diagnostic variables; filename=Maize2 Plant2 diagnostic variables.out
          events Reporting Frequency: event=Daily
          variables
            variables: dd/mmm/yyyy as Date, no3(), nh4(), urea(), surfaceom_n, biom_n(), fom_n(), hum_n(), dnit(), leach, AccumPlantN, AccumMineralisation, AccumDenit, AccumFert, AccumLeach, AccumDetach, DeltaSoilOMN, DeltaSurfaceOMN, DeltaSoilMineralN, RootNUptakeSupply, eo, es, sw_dep(), dul_dep(), drain, runoff, outflow_lat(), pond, AccumEO, AccumEP, AccumES, AccumDrainage, AccumRunoff, AccumRainfall, AccumIrrigation, AccumOutflowLat, SoilWaterDeficit, LeafDeadWt, LeafLiveWt, StemDeadWt2, StemLiveWt, TuberDeadWt, TuberLiveWt, RootDeadWt, RootLiveWt, GrainLIveWt, GrainDeadWt, FloretLIveWt, FloretDeadWt, RootLiveN, RootDeadN, LeafDeadN2, LeafLiveN2, StemDeadN, StemLiveN, TuberDeadN, TuberLiveN, GrainLiveN, GrainDeadN, FloretLiveN, FloretDeadN, RootWaterSupply, RootWaterUptake, LeafTranspiration, LeafWaterDemand, RootDepth, Cover_green, Cover_tot, Cover_dead, LeafLAI, LeafLAIDead, Height, LeafFn, LeafFw, LeafFrgr, LeafPhotosynthesisFt, LeafPhotosynthesisFvpd, LeafTotalNo, LeafGreenNo, LeafExpandingNodeNo, LeafCohortNo, LeafBranchNo, LeafDeadNodeNo, LeafNodeNo, LeafSenescingNodeNo
        manager Diagnostic variables
          CropType = potato2  # Select crop type to report variables for
          on init:
```
SimDay = 1

AccumPlantN = 0
AccumMineralisation = 0
AccumDenit = 0
AccumFert = 0
AccumLeach = 0
AccumDetach = 0
DeltaSoilOMN = 0
DeltaSurfaceOMN = 0
DeltaSoilMineralN = 0

AccumEO = 0
AccumEP = 0
AccumES = 0
AccumDrainage = 0
AccumRunoff = 0
AccumIrrigation = 0
AccumRainfall = 0
SoilWaterDeficit = 0
```
          on start_of_day:
```
if simday = 1 then
InitialSoilOMN = biom_n() + fom_n() + hum_n()
InitialSurfaceOMN = surfaceom_n
InitialMineralN = no3() + nh4() + urea()
endif

!!!!!! Nitrogen balance components !!!!!!
!!!!!!^^^^^^^^^^^^^^^^^^^^^^^^^^^^^!!!!!!
AccumPlantN =  (0 - [CropType].leafliveN2 - [CropType].leafdeadn2 - [CropType].stemliven - [CropType].stemdeadn - [CropType].tuberliveN - [CropType].tuberdeadN ) * 10 ![CropType].RootLiveN + [CropType].RootDeadN
AccumMineralisation = AccumMineralisation + dlt_n_min() + dlt_n_min_res()
AccumDenit = AccumDenit - dnit() 
AccumFert = AccumFert + fertiliser
AccumLeach = AccumLeach - leach_urea - leach_no3 - leach_nh4 
AccumDetach = 0 !plant2 doesn't detach yet
DeltaSoilOMN = (biom_n() + fom_n() + hum_n()) - InitialSoilOMN
DeltaSurfaceOMN = surfaceom_n - InitialSurfaceOMN
DeltaSoilMineralN = (no3() + nh4() + urea()) - InitialMineralN

!!!!!! Water balance components !!!!!!
!!!!!!^^^^^^^^^^^^^^^^^^^^^^^^^^!!!!!!

AccumEO = AccumEO - eo
AccumEP = AccumEP - [CropType].LeafTranspiration
AccumES = AccumES - es
AccumDrainage = AccumDrainage - drain
AccumRunoff = AccumRunoff - runoff
AccumOutflowLat = AccumOutflowLat - outflow_lat()
AccumIrrigation = AccumIrrigation + Irrigation
AccumRainfall = Accumrainfall + rain
SoilWaterDeficit =  sw_dep() - dul_dep()
```
          on end_of_day:
```
if SimDay = 1 then
SimDay = 2
Else SimDay = 2
endif
```
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