folder Simulations: version=37; creator=Apsim 7.10-r0
  simulation maizep-0
    metfile met: filename=%apsim%\Examples\MetFiles\Dalby.met
    clock
      start_date = 1/09/1988  # Enter the start date of the simulation
      end_date = 31/12/1989  # Enter the end date of the simulation
    summaryfile
    area paddock
      Soil: Latitude=0; Longitude=0; YearOfSampling=0
        InitialWater Initial water: FractionFull=0.00; PercentMethod=FilledFromTop
        Water
          Thickness  BD    AirDry  LL15  DUL   SAT
          100        1.35  0.04    0.11  0.22  0.3
          100        1.35  0.14    0.14  0.25  0.3
          100        1.35  0.15    0.16  0.27  0.32
          200        1.4   0.16    0.17  0.28  0.33
          200        1.4   0.18    0.19  0.3   0.34
          200        1.4   0.18    0.2   0.3   0.35
          200        1.4   0.18    0.2   0.31  0.36
          200        1.4   0.18    0.2   0.32  0.37
          200        1.4   0.18    0.2   0.31  0.37
          200        1.4   0.18    0.2   0.31  0.37
          SoilCrop sorg
            LL=[0.11, 0.14, 0.16, 0.17, 0.19, 0.2, 0.2, 0.2, 0.2, 0.2]
            KL=[0.07, 0.07, 0.07, 0.07, 0.07, 0.07, 0.04, 0.04, 0.04, 0.04]
            XF=[1, 1, 1, 1, 1, 1, 1, 1, 1, 1]
          SoilCrop cowpea
            LL=[0.11, 0.14, 0.16, 0.17, 0.19, 0.2, 0.2, 0.2, 0.2, 0.2]
            KL=[0.08, 0.08, 0.08, 0.08, 0.06, 0.04, 0.03, 0.02, 0.01, 0.01]
            XF=[1, 1, 1, 1, 1, 1, 1, 1, 1, 1]
          SoilCrop maize
            LL=[0.11, 0.14, 0.16, 0.17, 0.19, 0.2, 0.2, 0.2, 0.2, 0.2]
            KL=[0.08, 0.08, 0.08, 0.08, 0.06, 0.04, 0.03, 0.02, 0.01, 0.01]
            XF=[1, 1, 1, 1, 1, 1, 1, 1, 1, 1]
          SoilCrop mucuna
            LL=[0.11, 0.14, 0.16, 0.17, 0.19, 0.2, 0.2, 0.2, 0.2, 0.2]
            KL=[0.08, 0.08, 0.08, 0.08, 0.06, 0.04, 0.03, 0.02, 0.01, 0.01]
            XF=[1, 1, 1, 1, 1, 1, 1, 1, 1, 1]
          SoilCrop peanut
            LL=[0.11, 0.14, 0.16, 0.17, 0.19, 0.2, 0.2, 0.2, 0.2, 0.2]
            KL=[0.08, 0.08, 0.08, 0.08, 0.06, 0.04, 0.03, 0.02, 0.01, 0.01]
            XF=[1, 1, 1, 1, 1, 1, 1, 1, 1, 1]
          SoilCrop pigeonp
            LL=[0.11, 0.14, 0.16, 0.17, 0.19, 0.2, 0.2, 0.2, 0.2, 0.2]
            KL=[0.08, 0.08, 0.08, 0.08, 0.06, 0.04, 0.03, 0.02, 0.01, 0.01]
            XF=[1, 1, 1, 1, 1, 1, 1, 1, 1, 1]
          SoilCrop soybean
            LL=[0.11, 0.14, 0.16, 0.17, 0.19, 0.2, 0.2, 0.2, 0.2, 0.2]
            KL=[0.08, 0.08, 0.08, 0.08, 0.06, 0.04, 0.03, 0.02, 0.01, 0.01]
            XF=[1, 1, 1, 1, 1, 1, 1, 1, 1, 1]
        SoilWater: SummerCona=2.5; SummerU=9; SummerDate=1-Nov; WinterCona=2.5; WinterU=9; WinterDate=1-Apr; DiffusConst=88; DiffusSlope=35.4; Salb=0.13; CN2Bare=75; CNRed=20; CNCov=0.8; Thickness=[100, 100, 100, 200, 200, 200, 200, 200, 200, 200]; SWCON=[0.5, 0.5, 0.5, 0.5, 0.5, 0.5, 0.5, 0.5, 0.5, 0.5]
        SoilOrganicMatter: RootCN=45; RootWt=1000; SoilCN=14.5; EnrACoeff=7.4; EnrBCoeff=0.2
          Thickness  OC    FBiom  FInert
          100        1.2   0.02   0.6
          100        1     0.01   0.65
          100        0.86  0.01   0.7
          200        0.83  0.01   0.75
          200        0.58  0.01   0.8
          200        0.54  0.01   0.85
          200        0.47  0.01   0.93
          200        0.5   0.01   0.93
          200        0.5   0.01   0.93
          200        0.5   0.01   0.93
        Analysis: Thickness=[100, 100, 100, 200, 200, 200, 200, 200, 200, 200]; PH=[6, 6, 6, 6.2, 6.5, 6.7, 6.8, 6.8, 6.8, 6.8]
        Phosphorus: RootCP=200; RateDissolRock=0.2; RateLossAvail=0.3; SorptionCoeff=0.7
          Thickness  LabileP  BandedP  RockP  Sorption
          100        5        0        0      50
          100        1        0        0      100
          100        1        0        0      200
          200        1        0        0      200
          200        1        0        0      200
          200        1        0        0      200
          200        1        0        0      200
          200        1        0        0      200
          200        1        0        0      200
          200        1        0        0      200
        Sample Initial nitrogen
          Thickness  NO3    NH4
          100        0.237  0.194
          100        0.712  0.484
          100        0.712  0.290
          200        0.554  0.290
          200        0.395  0.290
          200        0.395  0.290
          200        0.237  0.290
          200        0.237  0.290
          200        0.158  0.290
          200        0.079  0.290
      surfaceom SurfaceOrganicMatter
        PoolName = wheat  # Organic Matter pool name
        type = wheat  # Organic Matter type
        mass = 0  # Initial surface residue (kg/ha)
        cnr = 80  # C:N ratio of initial residue
        standing_fraction = 0  # Fraction of residue standing
      fertiliser
      maize
      folder Manager folder
        manager Sow using a variable rule
          # Sowing criteria
          date1 = 1-oct  # Enter sowing window START date (dd-mmm)
          date2 = 1-feb  # Enter sowing window END date (dd-mmm)
          must_sow = no  # Must sow?
          raincrit = 30  # Amount of rainfall
          rainnumdays = 7  # Number of days of rainfall
          esw_amount = 50  # Enter minimum allowable available soil water (mm)
          # Sowing parameters
          crop = maize  # Enter name of crop to sow
          density = 6  # Enter sowing density (plants/m2)
          depth = 30  # Enter sowing depth (mm)
          cultivar = dekalb_xl82  # Enter cultivar
          class = plant  # Enter crop growth class
          row_spacing = 750  # Enter row spacing (mm)
          on start_of_day:
```
      if (paddock_is_fallow() = 1 and FallowIn <> 'yes' and (NextCrop = 0 or NextCrop = '[crop]')) then
         if (date_within('[date1], [date2]') = 1) then
            if (rain[[rainnumdays]] >= [raincrit] AND esw >= [esw_amount]) OR
                ('[must_sow]' = 'yes' AND today = date('[date2]'))) THEN
               ChooseNextCrop = 'yes'   ! for rotations
               [crop] sow plants =[density], sowing_depth = [depth], cultivar = [cultivar], row_spacing = [row_spacing], crop_class = [class]
            endif
            if today = date('[date2]') then
               ChooseNextCrop = 'yes'
            endif
         endif
      endif
```
        manager Fertilise N at sowing
          # When should fertiliser be applied
          modulename = maize  # On which module should the event come from
          eventname = sowing  # On which event should fertiliser be applied
          # Fertiliser application details
          fertmodule = Fertiliser  # Module used to apply the fertiliser
          fert_amount_sow = 1000  # Amount of starter fertiliser at sowing (kg/ha)
          fert_type_sow = urea_N  # Sowing fertiliser type
          on [modulename].[eventname]:
```
        [fertmodule] apply amount = [fert_amount_sow] (kg/ha), depth = 50 (mm), type = [fert_type_sow]
```
        manager Fertilise with Phosphorus at sowing
          # When should fertiliser be applied
          modulename = maize  # On which module should the event come from
          eventname = sowing  # On which event should fertiliser be applied
          # Fertiliser application details
          fertmodule = fertiliser  # Module used to apply the fertiliser
          fert_amount_sow = 0  # Amount of starter fertiliser at sowing (kg/ha)
          fert_type_sow = broadcast_p  # Sowing fertiliser type
          on [modulename].[eventname]:
          script: same as in maizep-0.paddock.Manager folder.Fertilise N at sowing
        manager Harvesting rule
          # Harvesting criteria
          crop = maize  # Enter name of crop to harvest when ripe
          on end_of_day:
```
           if ('[crop]' = 'cotton') then
              if ([crop].ozcot_status > 0) then
                  [crop] harvest
              endif
           elseif ([crop].StageName = 'harvest_ripe' or [crop].plant_status = 'dead') then
              [crop]  harvest
              [crop]  end_crop
           endif
```
      outputfile: filename=maizep-0.out; title=maizep-0
        variables My Variables
          variables: dd/mm/yyyy as Date, esw, day, year, yield, stover, biomass, lai, pfact_photo, nfact_photo, swdef_photo, pfact_expan, pfact_expansion, pfact_grain
        events My Variables Events: event=Daily  # End of day
      irrigation
        automatic_irrigation = on
        asw_depth = 600  # Depth to which ASW is calculated. (mm)
        crit_fr_asw = 0.5  # Fraction of ASW below which irrigation is applied (0-1.0)
        irrigation_efficiency = 1  # Efficiency of the irrigation. (0-1.0)
        irrigation_allocation = off  # Allocation limits
        allocation = 0  # Allocation in mm
        default_no3_conc = 0.0  # Nitrate concentration (ppm N)
        default_nh4_conc = 0.0  # Ammonium concentration (ppm N)
        default_cl_conc = 0.0  # Chloride concentration (ppm Cl)
  simulation maizep-10 -> /Simulations/maizep-0
    area paddock -> /Simulations/maizep-0/paddock
      folder Manager folder -> /Simulations/maizep-0/paddock/Manager folder
        manager Fertilise with Phosphorus at sowing
          # When should fertiliser be applied
          modulename = maize  # On which module should the event come from
          eventname = sowing  # On which event should fertiliser be applied
          # Fertiliser application details
          fertmodule = fertiliser  # Module used to apply the fertiliser
          fert_amount_sow = 10  # Amount of starter fertiliser at sowing (kg/ha)
          fert_type_sow = broadcast_p  # Sowing fertiliser type
          on [modulename].[eventname]:
          script: same as in maizep-0.paddock.Manager folder.Fertilise N at sowing
      outputfile -> /Simulations/maizep-0/paddock/outputfile: filename=maizep-10.out; title=maizep-10
        variables My Variables -> /Simulations/maizep-0/paddock/outputfile/My Variables
        events My Variables Events -> /Simulations/maizep-0/paddock/outputfile/My Variables Events
  simulation maizep-20 -> /Simulations/maizep-0
    area paddock -> /Simulations/maizep-0/paddock
      folder Manager folder -> /Simulations/maizep-0/paddock/Manager folder
        manager Fertilise with Phosphorus at sowing
          # When should fertiliser be applied
          modulename = maize  # On which module should the event come from
          eventname = sowing  # On which event should fertiliser be applied
          # Fertiliser application details
          fertmodule = fertiliser  # Module used to apply the fertiliser
          fert_amount_sow = 20  # Amount of starter fertiliser at sowing (kg/ha)
          fert_type_sow = broadcast_p  # Sowing fertiliser type
          on [modulename].[eventname]:
          script: same as in maizep-0.paddock.Manager folder.Fertilise N at sowing
      outputfile -> /Simulations/maizep-0/paddock/outputfile: filename=maizep-20.out; title=maizep-20
        variables My Variables -> /Simulations/maizep-0/paddock/outputfile/My Variables
        events My Variables Events -> /Simulations/maizep-0/paddock/outputfile/My Variables Events
  factorial Factorials: active=0
    settings: fn=1
  simulation maizep-30 -> /Simulations/maizep-0
    area paddock -> /Simulations/maizep-0/paddock
      folder Manager folder -> /Simulations/maizep-0/paddock/Manager folder
        manager Fertilise with Phosphorus at sowing
          # When should fertiliser be applied
          modulename = maize  # On which module should the event come from
          eventname = sowing  # On which event should fertiliser be applied
          # Fertiliser application details
          fertmodule = fertiliser  # Module used to apply the fertiliser
          fert_amount_sow = 30  # Amount of starter fertiliser at sowing (kg/ha)
          fert_type_sow = broadcast_p  # Sowing fertiliser type
          on [modulename].[eventname]:
          script: same as in maizep-0.paddock.Manager folder.Fertilise N at sowing
      outputfile -> /Simulations/maizep-0/paddock/outputfile: filename=maizep-30.out; title=maizep-30
        variables My Variables -> /Simulations/maizep-0/paddock/outputfile/My Variables
        events My Variables Events -> /Simulations/maizep-0/paddock/outputfile/My Variables Events
  simulation maizep-40 -> /Simulations/maizep-0
    area paddock -> /Simulations/maizep-0/paddock
      folder Manager folder -> /Simulations/maizep-0/paddock/Manager folder
        manager Fertilise with Phosphorus at sowing
          # When should fertiliser be applied
          modulename = maize  # On which module should the event come from
          eventname = sowing  # On which event should fertiliser be applied
          # Fertiliser application details
          fertmodule = fertiliser  # Module used to apply the fertiliser
          fert_amount_sow = 40  # Amount of starter fertiliser at sowing (kg/ha)
          fert_type_sow = broadcast_p  # Sowing fertiliser type
          on [modulename].[eventname]:
          script: same as in maizep-0.paddock.Manager folder.Fertilise N at sowing
      outputfile -> /Simulations/maizep-0/paddock/outputfile: filename=maizep-40.out; title=maizep-40
        variables My Variables -> /Simulations/maizep-0/paddock/outputfile/My Variables
        events My Variables Events -> /Simulations/maizep-0/paddock/outputfile/My Variables Events
  simulation maizep-50 -> /Simulations/maizep-0
    area paddock -> /Simulations/maizep-0/paddock
      folder Manager folder -> /Simulations/maizep-0/paddock/Manager folder
        manager Fertilise with Phosphorus at sowing
          # When should fertiliser be applied
          modulename = maize  # On which module should the event come from
          eventname = sowing  # On which event should fertiliser be applied
          # Fertiliser application details
          fertmodule = fertiliser  # Module used to apply the fertiliser
          fert_amount_sow = 50  # Amount of starter fertiliser at sowing (kg/ha)
          fert_type_sow = broadcast_p  # Sowing fertiliser type
          on [modulename].[eventname]:
          script: same as in maizep-0.paddock.Manager folder.Fertilise N at sowing
      outputfile -> /Simulations/maizep-0/paddock/outputfile: filename=maizep-50.out; title=maizep-50
        variables My Variables -> /Simulations/maizep-0/paddock/outputfile/My Variables
        events My Variables Events -> /Simulations/maizep-0/paddock/outputfile/My Variables Events
  simulation maizep-60 -> /Simulations/maizep-0
    area paddock -> /Simulations/maizep-0/paddock
      folder Manager folder -> /Simulations/maizep-0/paddock/Manager folder
        manager Fertilise with Phosphorus at sowing
          # When should fertiliser be applied
          modulename = maize  # On which module should the event come from
          eventname = sowing  # On which event should fertiliser be applied
          # Fertiliser application details
          fertmodule = fertiliser  # Module used to apply the fertiliser
          fert_amount_sow = 60  # Amount of starter fertiliser at sowing (kg/ha)
          fert_type_sow = broadcast_p  # Sowing fertiliser type
          on [modulename].[eventname]:
          script: same as in maizep-0.paddock.Manager folder.Fertilise N at sowing
      outputfile -> /Simulations/maizep-0/paddock/outputfile: filename=maizep-60.out; title=maizep-60
        variables My Variables -> /Simulations/maizep-0/paddock/outputfile/My Variables
        events My Variables Events -> /Simulations/maizep-0/paddock/outputfile/My Variables Events
  simulation maizep-70 -> /Simulations/maizep-0
    area paddock -> /Simulations/maizep-0/paddock
      folder Manager folder -> /Simulations/maizep-0/paddock/Manager folder
        manager Fertilise with Phosphorus at sowing
          # When should fertiliser be applied
          modulename = maize  # On which module should the event come from
          eventname = sowing  # On which event should fertiliser be applied
          # Fertiliser application details
          fertmodule = fertiliser  # Module used to apply the fertiliser
          fert_amount_sow = 70  # Amount of starter fertiliser at sowing (kg/ha)
          fert_type_sow = broadcast_p  # Sowing fertiliser type
          on [modulename].[eventname]:
          script: same as in maizep-0.paddock.Manager folder.Fertilise N at sowing
      outputfile -> /Simulations/maizep-0/paddock/outputfile: filename=maizep-70.out; title=maizep-70
        variables My Variables -> /Simulations/maizep-0/paddock/outputfile/My Variables
        events My Variables Events -> /Simulations/maizep-0/paddock/outputfile/My Variables Events
  simulation maizep-80 -> /Simulations/maizep-0
    area paddock -> /Simulations/maizep-0/paddock
      folder Manager folder -> /Simulations/maizep-0/paddock/Manager folder
        manager Fertilise with Phosphorus at sowing
          # When should fertiliser be applied
          modulename = maize  # On which module should the event come from
          eventname = sowing  # On which event should fertiliser be applied
          # Fertiliser application details
          fertmodule = fertiliser  # Module used to apply the fertiliser
          fert_amount_sow = 80  # Amount of starter fertiliser at sowing (kg/ha)
          fert_type_sow = broadcast_p  # Sowing fertiliser type
          on [modulename].[eventname]:
          script: same as in maizep-0.paddock.Manager folder.Fertilise N at sowing
      outputfile -> /Simulations/maizep-0/paddock/outputfile: filename=maizep-80.out; title=maizep-80
        variables My Variables -> /Simulations/maizep-0/paddock/outputfile/My Variables
        events My Variables Events -> /Simulations/maizep-0/paddock/outputfile/My Variables Events
  simulation maizep-90 -> /Simulations/maizep-0
    area paddock -> /Simulations/maizep-0/paddock
      folder Manager folder -> /Simulations/maizep-0/paddock/Manager folder
        manager Fertilise with Phosphorus at sowing
          # When should fertiliser be applied
          modulename = maize  # On which module should the event come from
          eventname = sowing  # On which event should fertiliser be applied
          # Fertiliser application details
          fertmodule = fertiliser  # Module used to apply the fertiliser
          fert_amount_sow = 90  # Amount of starter fertiliser at sowing (kg/ha)
          fert_type_sow = broadcast_p  # Sowing fertiliser type
          on [modulename].[eventname]:
          script: same as in maizep-0.paddock.Manager folder.Fertilise N at sowing
      outputfile -> /Simulations/maizep-0/paddock/outputfile: filename=maizep-90.out; title=maizep-90
        variables My Variables -> /Simulations/maizep-0/paddock/outputfile/My Variables
        events My Variables Events -> /Simulations/maizep-0/paddock/outputfile/My Variables Events
  simulation maizep-100 -> /Simulations/maizep-0
    area paddock -> /Simulations/maizep-0/paddock
      folder Manager folder -> /Simulations/maizep-0/paddock/Manager folder
        manager Fertilise with Phosphorus at sowing
          # When should fertiliser be applied
          modulename = maize  # On which module should the event come from
          eventname = sowing  # On which event should fertiliser be applied
          # Fertiliser application details
          fertmodule = fertiliser  # Module used to apply the fertiliser
          fert_amount_sow = 100  # Amount of starter fertiliser at sowing (kg/ha)
          fert_type_sow = broadcast_p  # Sowing fertiliser type
          on [modulename].[eventname]:
          script: same as in maizep-0.paddock.Manager folder.Fertilise N at sowing
      outputfile -> /Simulations/maizep-0/paddock/outputfile: filename=maizep-100.out; title=maizep-100
        variables My Variables -> /Simulations/maizep-0/paddock/outputfile/My Variables
        events My Variables Events -> /Simulations/maizep-0/paddock/outputfile/My Variables Events
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