folder simulations: version=34
  simulation FloweringModel
    metfile met: filename=%apsim%\Examples\MetFiles\lincoln.met
    clock
      start_date = 01/01/2000  # Enter the start date of the simulation
      end_date = 31/12/2000  # Enter the end date of the simulation
    summaryfile
    PlugIns
      PlugIn=[%apsim%\UserInterface\ApsimUIPlugIn.xml, %apsim%\UserInterface\SoilTypes.xml, %apsim%\UserInterface\Graph.xml, %apsim%\UserInterface\Ausfarm.xml, %apsim%\UserInterface\DevelopersPlugIn.xml, %apsim%\Model\SlurryTank.xml, %apsim%\Model\simpleBuilding.xml, %apsim%\Model\atmosphere.xml, %apsim%\Model\Accum.xml, %apsim%\Model\AgPasture.xml, %apsim%\Model\Bambatsi.xml, %apsim%\Model\Barley.xml, %apsim%\Model\Br.xml, %apsim%\Model\Bore.xml, %apsim%\Model\Broccoli.xml, %apsim%\Model\ButterflyPea.xml, %apsim%\Model\Canola.xml, %apsim%\Model\Canopy.xml, %apsim%\Model\Centro.xml, %apsim%\Model\Channel.xml, %apsim%\Model\Chickpea.xml, %apsim%\Model\Cl.xml, %apsim%\Model\Climatechange.xml, %apsim%\Model\Clock.xml, %apsim%\Model\Cotton2.xml, %apsim%\Model\Cowpea.xml, %apsim%\Model\CropUI.xml, %apsim%\Model\Dam.xml, %apsim%\Model\DCD.xml, %apsim%\Model\EGrandis.xml, %apsim%\Model\EMelliodora.xml, %apsim%\Model\Eo.xml, %apsim%\Model\EPopulnea.xml, %apsim%\Model\Erosion.xml, %apsim%\Model\Events.xml, %apsim%\Model\Fababean.xml, %apsim%\Model\Factorial.xml, %apsim%\Model\Factor.xml, %apsim%\Model\FactorComplex.xml, %apsim%\Model\FrenchBean.xml, %apsim%\Model\Fertiliser.xml, %apsim%\Model\Fieldpea.xml, %apsim%\Model\Gcm_data.xml, %apsim%\Model\Grasp.xml, %apsim%\Model\Graz.xml, %apsim%\Model\Growth.xml, %apsim%\Model\Horsegram.xml, %apsim%\Model\Ini.xml, %apsim%\Model\InitWater.xml, %apsim%\Model\Input.xml, %apsim%\Model\Irrigation.xml, %apsim%\Model\KWTest.xml, %apsim%\Model\Lablab.xml, %apsim%\Model\Lettuce.xml, %apsim%\Model\Log.xml, %apsim%\Model\Lucerne.xml, %apsim%\Model\Lupin.xml, %apsim%\Model\Maize.xml, %apsim%\Model\MaizeZ.xml, %apsim%\Model\Manager.xml, %apsim%\Model\Map.xml, %apsim%\Model\Memo.xml, %apsim%\Model\MetFile.xml, %apsim%\Model\MicroMet.xml, %apsim%\Model\Millet.xml, %apsim%\Model\Millet1.xml, %apsim%\Model\Millet2.xml, %apsim%\Model\Millet3.xml, %apsim%\Model\Millet4.xml, %apsim%\Model\Millet5.xml, %apsim%\Model\Mucuna.xml, %apsim%\Model\Mungbean.xml, %apsim%\Model\Navybean.xml, %apsim%\Model\Oats.xml, %apsim%\Model\Ocean_data.xml, %apsim%\Model\Operations.xml, %apsim%\Model\Orobanche.xml, %apsim%\Model\Oryza.xml, %apsim%\Model\Oryza2.xml, %apsim%\Model\OutputFile.xml, %apsim%\Model\Ozcot.xml, %apsim%\Model\Patchinput.xml, %apsim%\Model\Peanut.xml, %apsim%\Model\Pigeonpea.xml, %apsim%\Model\Pond.xml, %apsim%\Model\Potato.xml, %apsim%\Model\RotPlot.xml, %apsim%\Model\RugPlotUI.xml, %apsim%\Model\Root.xml, %apsim%\Model\Rule.xml, %apsim%\Model\Script.xml, %apsim%\Model\Seedling.xml, %apsim%\Model\SiloInput.xml, %apsim%\Model\Slurp.xml, %apsim%\Model\Soi.xml, %apsim%\Model\Soil.xml, %apsim%\Model\SoilNui.xml, %apsim%\Model\SoilTemp.xml, %apsim%\Model\Sorghum.xml, %apsim%\Model\SorghumConstants.xml, %apsim%\Model\SorghumGenotype.xml, %apsim%\Model\Soybean.xml, %apsim%\Model\Stylo.xml, %apsim%\Model\Sugar.xml, %apsim%\Model\Summaryfile.xml, %apsim%\Model\Sunflower.xml, %apsim%\Model\SurfaceOM.xml, %apsim%\Model\SweetCorn.xml, %apsim%\Model\SweetSorghum.xml, %apsim%\Model\SWIM2.xml, %apsim%\Model\SWIM2ui.xml, %apsim%\Model\Sysbal.xml, %apsim%\Model\SysBal2.xml, %apsim%\Model\Tcllink.xml, %apsim%\Model\Tclmanager.xml, %apsim%\Model\Tclui.xml, %apsim%\Model\TextOutput.xml, %apsim%\Model\Tracker.xml, %apsim%\Model\Tree.xml, %apsim%\Model\Variables.xml, %apsim%\Model\Venlink.xml, %apsim%\Model\vine.xml, %apsim%\Model\WaterSupply.xml, %apsim%\Model\Weed.xml, %apsim%\Model\Wheat.xml, %apsim%\Model\YPCalc.xml, %apsim%\UserInterface\Plant2IDE.xml]
    area paddock
      Soil: LocalName=Waco; Site=Jimbour; Region=South East Queensland
        SoilType = Black Vertosol  # Soil description
        NearestTown = Jimbour, Q 4352
        NaturalVegetation = Grassland, mainly Qld bluegrass
        InitialWater Initial water: FractionFull=1; PercentMethod=FilledFromTop
        Water
          Thickness  BD    AirDry  LL15  DUL   SAT
          150        1.02  0.15    0.29  0.54  0.59
          150        1.03  0.26    0.29  0.53  0.58
          300        1.02  0.29    0.29  0.54  0.59
          300        1.02  0.29    0.29  0.54  0.58
          300        1.06  0.3     0.3   0.52  0.57
          300        1.11  0.31    0.31  0.5   0.55
          300        1.12  0.32    0.32  0.5   0.55
          300        1.15  0.33    0.33  0.48  0.53
          300        1.18  0.34    0.34  0.47  0.52
          300        1.2   0.35    0.35  0.46  0.51
          300        1.25  0.36    0.36  0.44  0.49
          SoilCrop Barley
            LL=[0.29, 0.29, 0.32, 0.38, 0.39, 0.39, 0.41, 0.48, 0.47, 0.46, 0.44]
            KL=[0.1, 0.1, 0.08, 0.06, 0.04, 0.02, 0.01, 0, 0, 0, 0]
            XF=[1, 1, 1, 1, 1, 1, 1, 0, 0, 0, 0]
          SoilCrop Chickpea
            LL=[0.29, 0.29, 0.36, 0.43, 0.51, 0.5, 0.5, 0.48, 0.47, 0.46, 0.44]
            KL=[0.1, 0.1, 0.08, 0.06, 0.04, 0.02, 0.01, 0, 0, 0, 0]
            XF=[1, 1, 1, 1, 1, 1, 1, 0, 0, 0, 0]
          SoilCrop Lucerne
            LL=[0.29, 0.29, 0.29, 0.29, 0.3, 0.31, 0.32, 0.33, 0.34, 0.35, 0.36]
            KL=[0.1, 0.1, 0.1, 0.1, 0.09, 0.09, 0.09, 0.09, 0.09, 0.09, 0.09]
            XF=[1, 1, 1, 1, 1, 1, 1, 1, 1, 1, 1]
          SoilCrop Maize
            LL=[0.29, 0.29, 0.34, 0.34, 0.37, 0.4, 0.42, 0.48, 0.47, 0.46, 0.44]
            KL=[0.1, 0.1, 0.1, 0.08, 0.06, 0.04, 0.02, 0, 0, 0, 0]
            XF=[1, 1, 1, 1, 1, 1, 1, 0, 0, 0, 0]
          SoilCrop Perennial Grass
            LL=[0.29, 0.29, 0.39, 0.41, 0.4, 0.4, 0.41, 0.41, 0.4, 0.4, 0.42]
            KL=[0.1, 0.1, 0.1, 0.1, 0.09, 0.07, 0.05, 0, 0, 0, 0]
            XF=[1, 1, 1, 1, 1, 1, 1, 0, 0, 0, 0]
          SoilCrop Sorghum
            LL=[0.29, 0.29, 0.35, 0.38, 0.4, 0.4, 0.4, 0.48, 0.47, 0.46, 0.44]
            KL=[0.1, 0.1, 0.1, 0.08, 0.06, 0.04, 0.02, 0, 0, 0, 0]
            XF=[1, 1, 1, 1, 1, 1, 1, 0, 0, 0, 0]
          SoilCrop Wheat
            LL=[0.29, 0.29, 0.32, 0.32, 0.35, 0.38, 0.41, 0.48, 0.47, 0.46, 0.44]
            KL=[0.1, 0.1, 0.08, 0.06, 0.04, 0.02, 0.01, 0, 0, 0, 0]
            XF=[1, 1, 1, 1, 1, 1, 1, 0, 0, 0, 0]
        SoilWater: SummerCona=3.5; SummerU=6; SummerDate=1-Nov; WinterCona=3.5; WinterU=6; WinterDate=1-Apr; DiffusConst=40; DiffusSlope=16; Salb=0.13; CN2Bare=73; CNRed=20; CNCov=0.8; Thickness=[150, 150, 300, 300, 300, 300, 300, 300, 300, 300, 300]; SWCON=[0.3, 0.3, 0.3, 0.3, 0.3, 0.3, 0.3, 0.3, 0.3, 0.3, 0.3]
        SoilOrganicMatter: RootCN=40; RootWt=200; SoilCN=12.5; EnrACoeff=7.4; EnrBCoeff=0.2
          Thickness  OC    FBiom  FInert
          150        1.04  0.025  0.4
          150        0.89  0.02   0.6
          300        0.89  0.015  0.8
          300        0.89  0.01   0.9
          300        0.77  0.01   0.95
          300        0.45  0.01   0.95
          300        0.27  0.01   0.95
          300        0.22  0.01   0.95
          300        0.16  0.01   0.95
          300        0.13  0.01   0.95
          300        0.12  0.01   0.95
        Analysis
          Thickness  EC    PH
          150        0.2   8.4
          150        0.25  8.8
          300        0.31  9
          300        0.4   9.2
          300        0.59  9.2
          300        0.84  9.1
          300        0.93  9
          300        1.01  9
          300        1.06  8.9
          300        1.05  8.9
          300        1.01  8.9
        Sample Initial nitrogen
          Thickness  NO3    NH4
          150        6.503  0.599004
          150        2.101  0.100001
          300        2.101  0.100001
          300        1.701  0.100001
          300        1.701  0.100001
          300        1.701  0.100001
          300        1.701  0.100001
          300        1.701  0.100001
          300        1.701  0.100001
          300        1.701  0.100001
          300        1.701  0.100001
      surfaceom SurfaceOrganicMatter
        PoolName = wheat  # Organic Matter pool name
        type = wheat  # Organic Matter type
        mass = 1000  # Initial surface residue (kg/ha)
        cnr = 80  # C:N ratio of initial residue
        standing_fraction = 0  # Fraction of residue standing
      fertiliser
      wheat
      folder Manager folder
        manager Sowing rule
          # Sowing criteria
          date1 = 15-jan  # Enter sowing window START date (dd-mmm)
          date2 = 10-jul  # Enter sowing window END date (dd-mmm)
          must_sow = no  # Must sow?
          raincrit = 25  # Amount of rainfall
          rainnumdays = 7  # Number of days of rainfall
          esw_amount = 100  # Enter minimum allowable available soil water (mm)
          # Sowing parameters
          crop = wheat  # Enter name of crop to sow
          density = 100  # Enter sowing density (plants/m2)
          depth = 30  # Enter sowing depth (mm)
          cultivar = hartog  # Enter cultivar
          class = plant  # Enter crop growth class
          row_spacing = 250  # Enter row spacing (mm)
          on start_of_day:
```
      if (paddock_is_fallow() = 1 and FallowIn <> 'yes' and (NextCrop = 0 or NextCrop = '[crop]')) then
         if (date_within('[date1], [date2]') = 1) then
            if (rain[[rainnumdays]] >= [raincrit] AND esw >= [esw_amount]) OR
                ('[must_sow]' = 'yes' AND today = date('[date2]'))) THEN
               ChooseNextCrop = 'yes'   ! for rotations
               [crop] sow Population =[density], sowing_depth = [depth], cultivar = [cultivar], row_spacing = [row_spacing], crop_class = [class]
            endif
            if today = date('[date2]') then
               ChooseNextCrop = 'yes'
            endif
         endif
      endif
```
          on init:
```
            nextcrop = 0
            fallowin = 0
```
        manager Sowing fertiliser
          # When should fertiliser be applied
          modulename = wheat  # On which module should the event come from
          eventname = sowing  # On which event should fertiliser be applied
          # Fertiliser application details
          fertmodule = fertiliser  # Module used to apply the fertiliser
          fert_amount_sow = 150  # Amount of starter fertiliser at sowing (kg/ha)
          fert_type_sow = urea_N  # Sowing fertiliser type
          on [modulename].[eventname]:
```
        [fertmodule] apply amount = [fert_amount_sow] (kg/ha), depth = 50 (mm), type = [fert_type_sow]
```
        manager Harvesting rule
          # Harvesting criteria
          crop = wheat  # Enter name of crop to harvest when ripe
          on end_of_day:
```
           if [crop].StageName = 'harvest_ripe' or [crop].PlantStatus = 'dead' then
              [crop]  harvest
              [crop]  end_crop
           endif
```
      outputfile: filename=FloweringModel.out; title=FloweringModel; variable=LagIsFinished
        variables
          variables: dd/mm/yyyy as Date, AccumTt, HS, Vrn1, Vrn2, Vrn3, Vrn4, Vrn1Target, IsGerminated, LagIsFinished, IsVernalised, IsInduced, FIHS, TSHS, FLN, MeanT, Pp
        events Reporting Frequency: event=Daily
      manager2 PhenMod: Reference=%APSIM%\Model\Plant2.dll
        Vn_Lag_Rate_b = .4  # Base rate of progression through Vn Lag at high temperature
        Vn_Lag_Rate_a = .4  # Maximum rate of progression through Vn Lag at Low temperature
        Vn_Lag_Rate_r = .55  # Curvature of the change of rate of progression through Vn Lag with temperature
        VnER_Slope_b = .07  # Minimum Coefficient for the rate of Vn expression (/HS) at high temperature
        VnER_Slope_a = 4  # Maximum Coefficient for the rate of Vn expression (/HS) at low temperature
        VnER_Slope_r = -.14  # Curvature of the change of rate of Vn expression (/HS) with temperature
        VnER_Slope_int = 0.018  # Minimum rate of VN expression following Vn Lag
        VnBaseTarget = 0.235  # Amount of Vn expression needed to satisify vernalisation in short photoperiods
```csharp
using System;
using ModelFramework;

public class Script 
   {      
   [Link] Paddock MyPaddock; // Can be used To dynamically Get access To simulation Structure And variables
  
   //Set up Parameter values
   //[Param] double Vn_Lag_Rate_b;
   //[Param] double Vn_Lag_Rate_a;
   //[Param] double Vn_Lag_Rate_r;
   //[Param] double VnER_Slope_a;
   //[Param] double VnER_Slope_b;
   //[Param] double VnER_Slope_r;
   //[Param] double VnER_Slope_int;
   //[Param] double VnBaseTarget;
   
   //Set up data from other modules
   [Input] double MaxT;
   [Input] double MinT;
   
   //Set up links to Plant.NET functions
   [Link] Function PhotoperiodFunction;
   [Link] Function ThermalTime;
   [Link] Function HaunStage;   
   [Link] Function Vrn1rate;
   [Link] Function Vrn2rate;
   [Link] Function Vrn3rate;
   
   //Set up class variables
   [Output] double AccumTt = 0;
   [Output] double Vrn1Lag = 0;
   [Output] double Vrn1 = 0;
   [Output] double Vrn2 = 0;
   [Output] double Vrn3 = 0;
   [Output] double Vrn4 = 0;
   [Output] double Vrn1Target = 0;
   [Output] double Pp = 0;
   [Output] double Tt = 0;
   [Output] double HS = 0;
   //[Output] double VnER_coefficient = 0;
   [Output] double MeanT = 0;
   [Output] double HaunStageYesterday = 0;
   [Output] double DeltaHaunStage = 0;
   [Output] double FIHS = 0;
   [Output] double TSHS = 0;
   [Output] double FLN = 0;
   [Output] bool IsGerminated = false;
   [Output] bool IsPreVernalised = false;
   [Output] bool IsVernalised = false;
   [Output] bool IsInduced = false;
   [Output] bool IsAtTerminalSpikelet = false;
   
   public double VrnRateAt0 = 1.6;
   public double VrnRateAt30 = 0.08;
   public double VrnRateCurve = -0.19;
   public double BaseVrn1Target = 0.74;
   
   //Event procedures
   [EventHandler] public void OnInitialised()
   {
      Vrn4 = 1.0;
      Vrn1Target = 0.74;
   }
      
   [EventHandler] public void OnPrepare()
   {
      MeanT = (MaxT + MinT) / 2;
      Pp = PhotoperiodFunction.Value;
      Tt = ThermalTime.Value;
      HS = HaunStage.Value;
      if (IsGerminated)
         DeltaHaunStage = HS - HaunStageYesterday;
      HaunStageYesterday = HS;
      AccumTt += Tt; 
      IsGerminated = true; //Germinated on 1st day
      
      //Pre-Vernalisation lag, determine the repression of Vrn4
      if (IsPreVernalised == false)
      {
         Vrn4 -= Vrn1rate.Value * DeltaHaunStage;
         Vrn4 = Math.Max(Vrn4, 0.0);
         if (Vrn4 == 0.0)
            IsPreVernalised = true;
      }
      //Vernalisation, determine extent of Vrn1 expression when Vrn 4 is suppressed
      if ((IsPreVernalised) && (IsVernalised == false))
      {
         Vrn1 += Vrn1rate.Value * DeltaHaunStage;
         Vrn1 = Math.Min(1.0, Vrn1);
      }
      //Update Vernalisation target to reflect photoperiod conditions and determine Vernalisation status
      if ((IsVernalised == false) && (Vrn1Target <= 1.0))
      { 
         if (HS >= 1.1)
         {
            Vrn2 += Vrn2rate.Value * DeltaHaunStage;
            Vrn1Target = Math.Min(1.0, BaseVrn1Target + Vrn2);
         }
         if (Vrn1 >= Vrn1Target)
            IsVernalised = true;
      }
      //If Vernalisation is complete begin expressing Vrn3
      if ((IsVernalised) && (IsAtTerminalSpikelet == false))
      {
         Vrn3 += Vrn3rate.Value * DeltaHaunStage;
         Vrn3 = Math.Min(1.0, Vrn3);
      }
      
      //Set timings of floral initiation, terminal spiklet and FLN in response to Vrn3 expression
      if ((Vrn3 >= 0.3) && (IsInduced == false))
      {
         IsInduced = true;
         FIHS = HS;
      }
      if ((Vrn3 >= 1.0) && (IsAtTerminalSpikelet == false))
      {
         IsAtTerminalSpikelet = true;
         TSHS = HS + 1.0;
         FLN = 2.86 + 1.1 * TSHS;
      }
   }
   
}
```
        PhotoperiodFunction
          Twilight = -6
          Memo
            Returns the value of photoperiod.  Twilight is the sun angle below the horizon for beginning and ending photoperiods
        AirTemperatureFunction ThermalTime
          XYPairs: XY=[0 0, 30 30, 40 0]
          Memo
            This function uses max and min air temperature, three hourly temperature interpolation and the temperature threshold specified to return a daily thermal time value
        LinearInterpolationFunction HaunStage
          XProperty = AccumTt
          XYPairs: XY=[0 -1.6, 110 0, 335 2.5, 884 7, 2066 14, 2234 15, 2830 18]
          Memo
            Takes the current value of the XProperty and returns the corresponding y value from the XY maxtix specified
        ExponentialFunction Vrn1rate
          A = .08
          B = 1.6
          C = -.19
          Memo
            Takes the value of the child as the x value and returns the y value from a exponential of the form y = A * B * exp(x * c)
          VariableReference
            VariableName = MeanT
            Memo
              Returns the value of a nominated Plant2 variable.
        LinearInterpolationFunction Vrn2rate
          XProperty = PhotoperiodFunction.Value
          XYPairs: XY=[0 0, 8 0, 16 0.028, 24 0.028]
        LinearInterpolationFunction Vrn3rate
          XProperty = PhotoperiodFunction.Value
          XYPairs: XY=[0 0.153, 8 0.153, 16 0.33, 24 0.33]
          Memo
            Takes the current value of the XProperty and returns the corresponding y value from the XY maxtix specified
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