folder simulations: version=36; creator=Apsim 7.7-r3655
  simulation IrrigationExample
    metfile met: filename=%apsim%\Examples\MetFiles\lincoln.met
    clock
      start_date = 01/01/2005  # Enter the start date of the simulation
      end_date = 31/12/2010  # Enter the end date of the simulation
    summaryfile
    area paddock
      Soil: SoilType=Generic NZ heavy; LocalName=Brigalow; State=Hawke's Bay; NaturalVegetation=Brigalow, belah, wilga; Latitude=0; Longitude=0
        InitialWater Initial water: FractionFull=1; PercentMethod=FilledFromTop
        Water
          Thickness  BD   AirDry  LL15  DUL   SAT  KS
          150        1.4  0.08    0.16  0.32  0.4  50
          150        1.4  0.16    0.16  0.32  0.4  50
          300        1.3  0.16    0.16  0.32  0.4  50
          400        1.3  0.16    0.16  0.32  0.4  50
          300        1.3  0.16    0.16  0.32  0.4  50
          300        1.3  0.16    0.16  0.32  0.4  50
          300        1.3  0.16    0.16  0.32  0.4  50
          SoilCrop Wheat: LL=[0.16, 0.16, 0.16, 0.16, 0.16, 0.16, 0.16]; KL=[0.08, 0.08, 0.07, 0.06, 0.03, 0.02, 0.01]; XF=[1, 1, 1, 1, 1, 1, 1]
          SoilCrop Barley: LL=[0.16, 0.16, 0.16, 0.16, 0.16, 0.16, 0.16]; KL=[0.08, 0.08, 0.07, 0.06, 0.03, 0.02, 0.01]; XF=[1, 1, 1, 1, 1, 1, 1]
          SoilCrop Oats: LL=[0.16, 0.16, 0.16, 0.16, 0.16, 0.16, 0.16]; KL=[0.08, 0.08, 0.07, 0.06, 0.03, 0.02, 0.01]; XF=[1, 1, 1, 1, 1, 1, 1]
          SoilCrop Canola: LL=[0.16, 0.16, 0.16, 0.16, 0.16, 0.16, 0.16]; KL=[0.08, 0.08, 0.07, 0.06, 0.03, 0.02, 0.01]; XF=[1, 1, 1, 1, 1, 1, 1]
          SoilCrop FieldPea: LL=[0.16, 0.16, 0.16, 0.16, 0.16, 0.16, 0.16]; KL=[0.08, 0.08, 0.07, 0.06, 0.03, 0.02, 0.01]; XF=[1, 1, 1, 1, 1, 1, 1]
          SoilCrop potato: LL=[0.16, 0.16, 0.16, 0.16, 0.16, 0.16, 0.16]; KL=[0.08, 0.08, 0.07, 0.06, 0.03, 0.02, 0.01]; XF=[1, 1, 1, 1, 1, 1, 1]
          SoilCrop maize: LL=[0.16, 0.16, 0.16, 0.16, 0.16, 0.16, 0.16]; KL=[0.08, 0.08, 0.07, 0.06, 0.03, 0.02, 0.01]; XF=[1, 1, 1, 1, 1, 1, 1]
        SoilWater: SummerCona=3.5; SummerU=6; SummerDate=1-Nov; WinterCona=3.5; WinterU=6; WinterDate=1-Apr; DiffusConst=40; DiffusSlope=16; Salb=0.13; CN2Bare=1; CNRed=0; CNCov=0; Slope=0; DischargeWidth=0; CatchmentArea=0; MaxPond=0; Thickness=[150, 150, 300, 400, 300, 300, 300]; SWCON=[0.3, 0.3, 0.3, 0.3, 0.3, 0.3, 0.3]
        SoilOrganicMatter: RootCN=40; RootWt=200; SoilCN=12.5; EnrACoeff=7.4; EnrBCoeff=0.2; OCUnits=Total
          Thickness  OC   FBiom  FInert
          150        4.5  0.03   0.4
          150        3    0.02   0.6
          300        1.5  0.01   0.8
          300        0.7  0.01   0.9
          300        0.3  0.01   0.95
          300        0.1  0.01   0.95
          300        0.1  0.01   0.95
        Analysis: Thickness=[150, 150, 300, 300, 300, 300, 300]; PH=[7, 7, 7, 7, 7, 7, 7]
        Sample Initial nitrogen: NO3Units=kgha
          Thickness  NO3  NH4
          150        20   2
          150        10   1
          300        5    0.6
          300        2    0.1
          300        1    0.1
          300        1    0.1
          300        1    0.1
      surfaceom SurfaceOrganicMatter
        PoolName = wheat  # Organic Matter pool name
        type = wheat  # Organic Matter type
        mass = 1000  # Initial surface residue (kg/ha)
        cnr = 80  # C:N ratio of initial residue
        standing_fraction = 0  # Fraction of residue standing
      fertiliser
      irrigation
        automatic_irrigation = off
        asw_depth = 600  # Depth to which ASW is calculated. (mm)
        crit_fr_asw = 0.5  # Fraction of ASW below which irrigation is applied (0-1.0)
        irrigation_efficiency = 1  # Efficiency of the irrigation. (0-1.0)
        irrigation_allocation = off  # Allocation limits
        allocation = 0  # Allocation in ML
        default_no3_conc = 0  # Nitrate concentration (ppm N)
        default_nh4_conc = 0  # Ammonium concentration (ppm N)
        default_cl_conc = 0  # Chloride concentration (ppm Cl)
        default_no3_conc = 0  # Nitrate concentration (ppm N)
        default_nh4_conc = 0  # Ammonium concentration (ppm N)
        default_cl_conc = 0  # Chloride concentration (ppm Cl)
      wheat
      folder Manager folder
        manager Sowing rule
          # Sowing criteria
          date1 = 1-May  # Enter sowing window START date (dd-mmm)
          date2 = 3-May  # Enter sowing window END date (dd-mmm)
          must_sow = yes  # Must sow?
          raincrit = 25  # Amount of rainfall
          rainnumdays = 7  # Number of days of rainfall
          esw_amount = 100  # Enter minimum allowable available soil water (mm)
          # Sowing parameters
          crop = wheat  # Enter name of crop to sow
          density = 150  # Enter sowing density (plants/m2)
          depth = 20  # Enter sowing depth (mm)
          cultivar = Wakaniu  # Enter cultivar
          class = plant  # Enter crop growth class
          row_spacing = 150  # Enter row spacing (mm)
          on start_of_day:
```
      if (paddock_is_fallow() = 1 and FallowIn <> 'yes' and (NextCrop = 0 or NextCrop = '[crop]')) then
         if (date_within('[date1], [date2]') = 1) then
            if (rain[[rainnumdays]] >= [raincrit] AND esw >= [esw_amount]) OR
                ('[must_sow]' = 'yes' AND today = date('[date2]'))) THEN
               ChooseNextCrop = 'yes'   ! for rotations
               [crop] sow plants =[density], sowing_depth = [depth], cultivar = [cultivar], row_spacing = [row_spacing], crop_class = [class]
            endif
            if today = date('[date2]') then
               ChooseNextCrop = 'yes'
            endif
         endif
      endif
```
          on init:
```
            nextcrop = 0
            fallowin = 0
```
        manager Sowing fertiliser
          # When should fertiliser be applied
          modulename = wheat  # On which module should the event come from
          eventname = sowing  # On which event should fertiliser be applied
          # Fertiliser application details
          fertmodule = fertiliser  # Module used to apply the fertiliser
          fert_amount_sow = 400  # Amount of starter fertiliser at sowing (kg/ha)
          fert_type_sow = urea_N  # Sowing fertiliser type
          on [modulename].[eventname]:
```
        [fertmodule] apply amount = [fert_amount_sow] (kg/ha), depth = 50 (mm), type = [fert_type_sow]
```
        manager Harvesting rule
          # Harvesting criteria
          crop = wheat  # Enter name of crop to harvest when ripe
          on end_of_day:
```
           if [crop].StageName = 'harvest_ripe' or [crop].plant_status = 'dead' then
              [crop]  harvest
              [crop]  end_crop
           endif
```
        manager2 Irrigation Rule
          # Irrigation Availability
          Irrigation_Yes_No = yes  # Is Irrigation available?
          Season_Start = 1-sep  # What is the earliest date in the year when irrigation would start
          Season_End = 30-may  # What is the latest date in the year when irrigation would finish
          Season_Allocation = 1000  # What is the maximum amount of water (mm) available to apply to this paddock each season
          # Application rule parameters
          Refull_Frac = .8  # What is the maximum we want to refill the soil to (Relative to DUL, 0 - 1)?
          Trigger_Frac = .5  # What is the deficit at which irrigation will be triggered (Relative to DUL, 0-1)?
          Return_days = 5  # How frequently can this paddock be irrigated (days)?
          Maximum_Irrigation_Amount = 30  # What is the maximum amount the irrigator can apply (mm)?
          Top_Depth = 600  # Depth to which deficit for calculating irrigation requirement is calculated. (mm)
```csharp
using System;
using ModelFramework;
using CSGeneral;

public class Script
{
   //Communication to other modules
   [Link] public Paddock MyPaddock;
   [Link] public Irrigation Irrigation;
   
   //User inputs from properties tab
   [Param()][Output]  public string Irrigation_Yes_No;
   [Param()][Output]  public string Season_Start;
   [Param()][Output]  public string Season_End;
   [Param()][Output]  public double Season_Allocation;
   [Param()][Output]  public double Refull_Frac;
   [Param()][Output]  public double Trigger_Frac;
   [Param()][Output]  public double Return_days;
   [Param()][Output]  public double Maximum_Irrigation_Amount;
   [Param()][Output]  public double Top_Depth;
   
   //Variables from soil water module
   [Input] public DateTime Today;
   [Input] public double[] dul_dep = null;
   [Input] public double[] ll15_dep = null;
   [Input] public double[] sw_dep = null;
   [Input] public double[] dlayer = null;
   
   //Class members
   private bool IrrigationIsAvailable = false;
   private bool SeasonIsOpen = false;
   private bool CropIsActive = false;
   private bool IrrigatorIsAvailable = false;
   private bool SoilIsDry = false;
   [Output] public double Top_DUL = 0;
   [Output] public double Top_Refull = 0;
   [Output] public double Top_Trigger = 0;
   [Output] public double Top_LL = 0;
   [Output] public double Top_SW = 0;
   [Output] public double Accumulated_depth = 0;   
   [Output] public double Days_since_irrigation = 0;
   [Output] public double Amount_to_apply = 0;
   [Output] public double Season_Application = 0;
   
   //Calculate static soil variables
   [EventHandler]
   public void OnInit2()
   {   
      //Calculated soil water variables
      Accumulated_depth = 0;
      for (int layer = 0; Accumulated_depth < Top_Depth; layer++)
      {
         Top_LL += ll15_dep[layer];
         Top_DUL += dul_dep[layer];
         Accumulated_depth += dlayer[layer];
      }
      Top_Refull = Top_LL + (Top_DUL - Top_LL) * Refull_Frac;
   }
   
  
   //Determine daily requirement for irrigation
   [EventHandler]
   public void OnPrepare()
   {
      //Can we irrigate?
      IrrigationIsAvailable = false; 
      if (Irrigation_Yes_No == "yes")
         IrrigationIsAvailable = true; 

      //Are we Allowed to Irrigate
      SeasonIsOpen = true;
      if (DateUtility.DatesEqual(Season_Start, Today))
         Season_Application = 0;
      if(DateUtility.WithinDates(Season_End, Today, Season_Start))
         SeasonIsOpen = false;
      if(Season_Application >= Season_Allocation)
         SeasonIsOpen = false;
      
      //Is there a crop in the ground that needs irrigation?
      CropIsActive = false;
      foreach (Component Crop in MyPaddock.Crops)
      {
         double CropStage = Crop.Variable("stage").ToDouble();
         if ((CropStage >= 3.0) && (CropStage < 8.0))
            CropIsActive = true;
      }      
      
      //Is the irrigator available?
      IrrigatorIsAvailable = false;
      Days_since_irrigation += 1;
      if (Days_since_irrigation >= Return_days)
         IrrigatorIsAvailable = true;
      
      
      //Is the soil dry enough to require irrigation?
      SoilIsDry = false;
      double CurrentRootDepth = 0;
      foreach (Component Crop in MyPaddock.Crops)
      {
         double RootDepth = Crop.Variable("root_depth").ToDouble();
         CurrentRootDepth = Math.Max(RootDepth, CurrentRootDepth);
      }
      double RelativeRootDepth = Math.Min(1.0, CurrentRootDepth / Top_Depth);
      Top_Trigger = Math.Min(Top_Refull, Top_DUL - (Top_DUL - Top_LL) * RelativeRootDepth * Trigger_Frac); 
      
      Accumulated_depth = 0;
      Top_SW = 0;
      for (int layer = 0; Accumulated_depth < Top_Depth; layer++)
      {
         Top_SW += sw_dep[layer];
         Accumulated_depth += dlayer[layer];
      }
      if (Top_SW <= Top_Trigger)
         SoilIsDry = true;
            
      //Lets bloody well irrigate then!!!!
      if((IrrigationIsAvailable) && (SeasonIsOpen) && (CropIsActive) && (IrrigatorIsAvailable) && (SoilIsDry)) //The conditions are rife for irrigation
      {
         Amount_to_apply = Math.Min(Top_Refull - Top_SW, Maximum_Irrigation_Amount);
         Amount_to_apply = Math.Min(Amount_to_apply, Season_Allocation - Season_Application); 
         Amount_to_apply = Math.Max(Amount_to_apply, 0.0);
         Irrigation.Apply((float) Amount_to_apply, 0, 0.0f, 0.0f, "", null, 0.0f, 0.0f, 0.0f, 0.0f, 1.0f);
         Days_since_irrigation = 0;
         Season_Application += Amount_to_apply;
      }
   }
}
```
      outputfile: filename=IrrigationExample.out; title=IrrigationExample
        variables
          variables: dd/mm/yyyy as Date, biomass, yield, grain_protein, grain_size, esw
        events Reporting Frequency: event=harvesting
      folder Irrigation Graph
        outputfile IrrigationVariables: filename=IrrigationExample IrrigationVariables.out; title=IrrigationExample IrrigationVariables
          variables
            variables: dd/mm/yyyy as Date, Top_DUL, Top_Refull, Top_Trigger, Top_LL, Top_SW, Accumulated_depth, Days_since_irrigation, Amount_to_apply, irrigation, cover_green
          events Reporting Frequency: event=daily
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