folder simulations: version=36
  simulation PreNewMet
    clock
      start_date = 01/01/1940  # Enter the start date of the simulation
      end_date = 03/01/1940  # Enter the end date of the simulation
    metfile met: filename=%apsim%/Examples/MetFiles/Goond.met
    summaryfile
    manager2 ClimateCont
```vb
Imports System
Imports ModelFramework

Public Class Script 
      
   <Link> Dim MySimulation As Simulation ' Can be used to dynamically get access to simulation structure and variables
   <Link> Dim Met As ModelFramework.MetFile   ' Equates to the value of the current simulation date - value comes from CLOCK
   
   ' The following event handler will be called when the prenewmet event is sent by Input
   <EventHandler()> Public Sub OnPrenewmet(ByVal MetData As NewMetType)
      Met.maxt = 5
      Met.mint = 1
      Met.rain = 99
      Met.radn = 2
   End Sub
   
End Class
```
    outputfile: filename=PreNewMet.out; title=PreNewMet
      variables
        variable:
          Today format dd/mm/yyyy as Date
          MaxT
          MinT
          Radn
          Rain
      events Reporting Frequency: event=daily
