folder simulations: version=36
  simulation Continuous Wheat
    memo
      This simulation tests that the new manager module (in script in the paddock) can send a remove_crop_biomass event to a specific crop (lucernce).
    metfile met: filename=%apsim%\Examples\MetFiles\Goond.met
    clock
      start_date = 01/01/1940  # Enter the start date of the simulation
      end_date = 02/01/1940  # Enter the end date of the simulation
    summaryfile
    area paddock
      surfaceom surface organic matter
        PoolName = wheat  # Organic Matter pool name
        type = wheat  # Organic Matter type
        mass = 1000  # Initial surface residue (kg/ha)
        cnr = 80  # C:N ratio of initial residue
        standing_fraction = 0  # Fraction of residue standing
      fertiliser
      outputfile: filename=Continuous Wheat.out; title=Continuous Wheat
        variables
          variables: dd/mm/yyyy as Date, C, cn2_bare, cn_cov
        events Reporting Frequency: event=daily
      Soil: Site=Quorn; NearestTown=Quorn; Region=Upper North; State=South Australia; Country=Australia; ApsoilNumber=605; Latitude=-32.321; Longitude=138.026; LocationAccuracy=+-20m
        DataSource=Characterisation 2008 by University of Adelaide, CSIRO Sustainable Ecosystems and Rural Solutions Jamestown
        Comments=LB code:QRN; Moderate-high clay strongly duplex soil with moderate bulk density, high CEC. Texture change at about 6cm depth. Impediment to root growth likely below about 50cm due to high ESP, EC and chloride. DM Description: 0-6cm Clay Loam 2.5YR 3/4;  6
        SoilType = Clay loam over medium clay  # Soil description
        Water
          Thickness  BD     AirDry  LL15   DUL    SAT
          100        1.205  0.085   0.169  0.362  0.515
          100        1.335  0.15    0.187  0.355  0.466
          250        1.338  0.215   0.215  0.347  0.465
          250        1.396  0.215   0.215  0.393  0.443
          350        1.405  0.215   0.215  0.39   0.44
          450        1.396  0.215   0.215  0.393  0.443
          SoilCrop wheat: LL=[0.169, 0.187, 0.215, 0.246, 0.292, 0.354]; KL=[0.06, 0.06, 0.06, 0.05, 0.04, 0.02]; XF=[1, 1, 1, 1, 1, 1]
            LL source: Field measured and checked for sensibility
          SoilCrop lucerne: same as Continuous Wheat.paddock.Soil.Water.wheat
        Analysis: BoronUnits=HotCaCl2
          Thickness  Rocks  Texture      EC   PH   CL    Boron  CEC   Ca    Mg   Na    K    ESP   ParticleSizeSand  ParticleSizeSilt  ParticleSizeClay
          100        0      Light Clay   0.3  8.3  184   1.6    34    26.3  4.9  1.4   1.4  4.2   40.7              13.5              45.8
          100        0      Light Clay   0.3  8.6  255   1.4    32.9  23.8  5.6  2.5   1    7.7   40.7              12.6              46.6
          250        0      Medium Clay  0.7  8.9  724   3.2    31.5  17    8    5.6   0.9  17.8  32.7              13.1              54.2
          250        0      Heavy Clay   1.1  9.1  1073  15.9   31.3  12.2  9.3  8.8   1    28    29.1              12.7              58.3
          350        0      Heavy Clay   2    8.8  1583  23.1   35    13.4  9.6  10.8  1.2  31    27                11.7              61.2
          450        0      Heavy Clay   3.4  8.4  2449  27     39.4  15.9  9.9  12.4  1.2  31.5  28.1              12.6              59.3
        SoilWater: SummerCona=3.5; SummerU=6; SummerDate=1-Nov; WinterCona=2; WinterU=2; WinterDate=1-Apr; DiffusConst=88; DiffusSlope=35; Salb=0.13; CN2Bare=73; CNRed=20; CNCov=0.8; Thickness=[100, 100, 250, 250, 350, 450]; SWCON=[0.4, 0.3, 0.3, 0.3, 0.3, 0.3]
        SoilOrganicMatter: RootCN=40; RootWt=1000; SoilCN=12; EnrACoeff=7.4; EnrBCoeff=0.2; OCUnits=WalkleyBlack
          Thickness  OC    FBiom  FInert
          100        0.77  0.04   0.4
          100        0.71  0.04   0.5
          250        0.42  0.02   0.6
          250        0.27  0.02   0.7
          350        0.21  0.01   0.8
          450        0.12  0.01   1
        Sample: NO3Units=kgha; NH4Units=kgha
          Thickness  NO3  NH4  SW
          200        30   5    0.1
          180        20   1    0.25
          100        15   1    0.25
      lucerne
      wheat
      manager2 Script
        A = 2.6  # Param A
        ChildClass = ScriptChild  # Create child class
```csharp
using System;
using ModelFramework;
using CSGeneral;

public class Script
   {
   [Param] 
   private double A = 0;
   
   [Input] 
   public int Year = 0;
   
   [Output][Units("oC")] 
   public double C = 0;
   
   [Link] 
   public Simulation MySimulation;
   
   [Link]
   public Paddock MyPaddock;
   
   [Link]
   public Component MySelf;

   [Link]
   public Outputfile Report;
   
   [Event]
   public event NullTypeDelegate Do_output;
   
   [EventHandler] 
   public void OnInitialised()
   {
      // Write out our name and our full name.
      Console.WriteLine("Name: " + MySelf.Name);
      Console.WriteLine("Full name: " + MySelf.FullName);
      
   }
   
   
   [EventHandler] 
   public void OnProcess()
   {
      // Make sure the [Param] has worked.
      if (A != 2.6)
         throw new Exception("Incorrect value for A: " + A.ToString());

      // Make sure the [Input] has worked.
      if (Year != 1940)
         throw new Exception("Incorrect value for Year: " + Year.ToString());
      
      // Make sure the [Output] works. This should be written to the output file.
      C = 1234;
      
      // ========================================================================
      // Rrom root Simulation
      // ========================================================================
      Console.WriteLine("Simulation children:");
      foreach (Component Child in MySimulation.Children)
         Console.WriteLine("   " + Child.FullName);
      
      Console.WriteLine("Simulation paddocks:");
      foreach (Component Child in MySimulation.ChildPaddocks)
         Console.WriteLine("   " + Child.FullName);

      // ========================================================================
      // Children method
      // ========================================================================
      Console.WriteLine("Script children:");
      foreach (Object Child in MySelf.ChildrenAsObjects)
         Console.WriteLine("   " + Child.ToString());
      
      Console.WriteLine("Paddock children:");
      foreach (Component Child in MyPaddock.Children)
         Console.WriteLine("   " + Child.FullName);
     
      Console.WriteLine("My Paddock Parent's children:");
      foreach (Component Child in MyPaddock.Parent.Children)
         Console.WriteLine("   " + Child.FullName);
    
      // ========================================================================
      // ChildrenAsObjects method
      // ========================================================================
      if (MySelf.ChildrenAsObjects[0] is ScriptChild)
      {
         // All is good.
      }
      else
         throw new Exception("MySelf.ChildrenAsObjects failed");

      // ========================================================================
      // Paddock.Crops
      // ========================================================================
      Console.WriteLine("Paddock crops:");
      foreach (Component Child in MyPaddock.Crops)
         Console.WriteLine("   " + Child.FullName);
      
      // ========================================================================
      // Link method
      // ========================================================================
      ScriptChild ScriptChild = MySelf.LinkByName("ScriptChild") as ScriptChild;
      if (ScriptChild == null)
         throw new Exception("Cannot find ScriptChild");
      else
      {
         Console.WriteLine("ScriptChild: " + ScriptChild.ToString());
         Console.WriteLine("ScriptChild.A: " + ScriptChild.A.ToString());
      }

      ScriptChild ScriptChild2 = MyPaddock.LinkByName("Script.ScriptChild") as ScriptChild;
      if (ScriptChild2 == null)
         Console.WriteLine("Correctly no access to Script.ScriptChild from MyPaddock");
      else
         Console.WriteLine("Incorrect resolution from MyPaddock to Script.ScriptChild");
      
      SoilWat SoilWat = MyPaddock.LinkByName("Soil Water") as SoilWat;
      if (SoilWat == null)
         throw new Exception("Cannot find Soil Water");
      
      SoilWat SoilWat2 = MyPaddock.LinkByName(".paddock.Soil Water") as SoilWat;
      if (SoilWat2 == null)
         throw new Exception("Cannot find .paddock.Soil Water");

      SoilWat SoilWat3 = MyPaddock.LinkByType("SoilWat") as SoilWat;
      if (SoilWat3 == null)
         throw new Exception("Cannot find a SoilWat type");
      
      SoilWat SoilWat4 = MyPaddock.LinkByName(".paddock2.Soil Water") as SoilWat;
      if (SoilWat4 == null)
         throw new Exception("Cannot find .paddock2.Soil Water");      
      

      // ========================================================================
      // Paddock.Get
      // ========================================================================
      // Test using scoping to find a variable in top level simulation.
      double Latitude;
      MyPaddock.Get(".Met.Latitude", out Latitude);
      if (!MathUtility.FloatsAreEqual(Latitude, -28.33))
         throw new Exception("Incorrect latitude: " + Latitude.ToString());
      
      // Test using a full address to variable.
      MyPaddock.Get(".Met.Latitude", out Latitude);
      if (!MathUtility.FloatsAreEqual(Latitude, -28.33))
         throw new Exception("Incorrect latitude2: " + Latitude.ToString());      
      
      // Test getting a double array from current paddock
      double[] dlayer;
      MyPaddock.Get("Soil Water.dlayer", out dlayer);
      if (!MathUtility.AreEqual(dlayer, new double[] {100, 100, 250, 250, 350, 450}))
         throw new Exception("Incorrect dlayer: " + StringManip.BuildString(dlayer, "f2"));      

      // Test getting a child variable value
      int ChildVariable;
      bool ok = MySelf.Get("ScriptChild.A", out ChildVariable);
      if (!ok)
         throw new Exception("Cannot find child variable");
      if (ChildVariable != 12345)
         throw new Exception("Incorrect child variable value: " + ChildVariable.ToString());

      // Test using a paddock relative address to variable.
      double Yield;
      MyPaddock.Get("wheat.yield", out Yield);
      if (Yield != 0)
         throw new Exception("Cannot find yield");
      
      double _value;
      MyPaddock.Get(".paddock.Soil Water.cn_cov", out _value);
      Console.WriteLine("paddock.Soil Water.cn_cov = " + _value.ToString());
      MyPaddock.Get("Soil Water.cn_cov", out _value);
      Console.WriteLine("        Soil Water.cn_cov = " + _value.ToString());
      
      // ========================================================================
      // Paddock.Set
      // ========================================================================
      // Test using scoping to set a variable. These values should be in output file
      if (!MyPaddock.Set("Soil Water.cn2_bare", 90))
         Console.WriteLine("Cannot set cn2_bare");

      // Test using scoping to set a variable. These values should be in output file
      if (!MyPaddock.Set(".paddock.Soil Water.cn_cov", 0.888))
         Console.WriteLine("Cannot set paddock.Soil Water.cn_cov");

      // Test that "set" returns false when trying to set an invalid variable.
      if (!MyPaddock.Set("asdf", 89))
         Console.WriteLine("Cannot set asdf");

      // ========================================================================
      // Paddock.Warning
      // ========================================================================
      MyPaddock.Warning("This is a warning");
      
      
      // ========================================================================
      // Call a method of a [Link]
      // ========================================================================
      Report.DoOutput();
      
      
      
      }
   }



public class ScriptChild
{
   [Output]
   public int A = 12345;
}
```
    area paddock2
      surfaceom surface organic matter
        PoolName = wheat  # Organic Matter pool name
        type = wheat  # Organic Matter type
        mass = 1000  # Initial surface residue (kg/ha)
        cnr = 80  # C:N ratio of initial residue
        standing_fraction = 0  # Fraction of residue standing
      fertiliser
      Soil: Site=Quorn; NearestTown=Quorn; Region=Upper North; State=South Australia; Country=Australia; ApsoilNumber=605; Latitude=-32.321; Longitude=138.026; LocationAccuracy=+-20m
        DataSource=Characterisation 2008 by University of Adelaide, CSIRO Sustainable Ecosystems and Rural Solutions Jamestown
        Comments=LB code:QRN; Moderate-high clay strongly duplex soil with moderate bulk density, high CEC. Texture change at about 6cm depth. Impediment to root growth likely below about 50cm due to high ESP, EC and chloride. DM Description: 0-6cm Clay Loam 2.5YR 3/4;  6
        SoilType = Clay loam over medium clay  # Soil description
        Water
          Thickness  BD     AirDry  LL15   DUL    SAT
          100        1.205  0.085   0.169  0.362  0.515
          100        1.335  0.15    0.187  0.355  0.466
          250        1.338  0.215   0.215  0.347  0.465
          250        1.396  0.215   0.215  0.393  0.443
          350        1.405  0.215   0.215  0.39   0.44
          450        1.396  0.215   0.215  0.393  0.443
          SoilCrop wheat: LL=[0.169, 0.187, 0.215, 0.246, 0.292, 0.354]; KL=[0.06, 0.06, 0.06, 0.05, 0.04, 0.02]; XF=[1, 1, 1, 1, 1, 1]
            LL source: Field measured and checked for sensibility
          SoilCrop lucerne: same as Continuous Wheat.paddock2.Soil.Water.wheat
        Analysis: same as Continuous Wheat.paddock.Soil.Analysis
        SoilWater: same as Continuous Wheat.paddock.Soil.SoilWater
        SoilOrganicMatter: same as Continuous Wheat.paddock.Soil.SoilOrganicMatter
        Sample: NO3Units=kgha; NH4Units=kgha
          Thickness  NO3  NH4  SW
          200        30   5    0.1
          180        20   1    0.25
          100        15   1    0.25
