folder simulations: version=19
  simulation MicrometTest
    metfile met: filename=Lincoln.met
    clock
      start_date = 1/01/1960  # Enter the start date of the simulation
      end_date = 10/01/1960  # Enter the end date of the simulation
    summaryfile: filename=Continuous Wheat Simulation.sum
    area paddock
      micromet
        soilalbedo = 0.23
        a_interception = 0
        b_interception = 0
        c_interception = 0
        d_interception = 0
      soil: Site=Jimbour; Region=South East Queensland; LocalName=Waco; SoilType=Black Vertosol; NearestTown=Jimbour, Q 4352; NaturalVegetation=Grassland, mainly Qld bluegrass; Cona=3.5; DiffusConst=40; DiffusSlope=16; U=6; Salb=0.13; Cn2Bare=73; CnRed=20; CnCov=0.8; CnCanopyFact=1; RootCn=40; RootWt=200; SoilCn=12.5; EnrACoeff=7.4; EnrBCoeff=0.2
        profile
          layer:
            thickness  bd    ll15  airdry  dul   sat   sw       swcon  oc    ph   fbiom  finert  no3  nh4  ec    ll Tree  kl Tree  xf Tree  ll Slurp1  kl Slurp1  xf Slurp1  ll Slurp  kl Slurp  xf Slurp  ll Slurp2  kl Slurp2  xf Slurp2  ll SlurpRoot1  kl SlurpRoot1  xf SlurpRoot1  ll SlurpRoot  kl SlurpRoot  xf SlurpRoot  ll Slurp1Root  kl Slurp1Root  xf Slurp1Root
            100        1.02  0.29  0.15    0.54  0.59  9999.99  0.3    1.04  8.4  0.025  0.4     6.5  0.6  0.2   0.29     0.06     1        0.29       0.06       1          0.29      0.06      1         0.29       0.06       1          0.29           0.06           1              0.29          0.06          1             0.29           0.06           1
            250        1.03  0.29  0.26    0.53  0.58  9999.99  0.3    0.89  8.8  0.02   0.6     2.1  0.1  0.25  0.29     0.06     1        0.29       0.06       1          0.29      0.06      1         0.29       0.06       1          0.29           0.06           1              0.29          0.06          1             0.29           0.06           1
            300        1.02  0.29  0.29    0.54  0.59  9999.99  0.3    0.89  9    0.015  0.8     2.1  0.1  0.31  0.29     0.06     1        0.29       0.06       1          0.29      0.06      1         0.29       0.06       1          0.29           0.06           1              0.29          0.06          1             0.29           0.06           1
            350        1.02  0.29  0.29    0.54  0.58  9999.99  0.3    0.89  9.2  0.01   0.9     1.7  0.1  0.4   0.29     0.06     1        0.29       0.06       1          0.29      0.06      1         0.29       0.06       1          0.29           0.06           1              0.29          0.06          1             0.29           0.06           1
            400        1.06  0.3   0.3     0.52  0.57  9999.99  0.3    0.77  9.2  0.01   0.95    1.7  0.1  0.59  0.3      0.06     1        0.3        0.06       1          0.3       0.06      1         0.3        0.06       1          0.3            0.06           1              0.3           0.06          1             0.3            0.06           1
            300        1.11  0.31  0.31    0.5   0.55  9999.99  0.3    0.45  9.1  0.01   0.95    1.7  0.1  0.84  0.31     0.06     1        0.31       0.06       1          0.31      0.06      1         0.31       0.06       1          0.31           0.06           1              0.31          0.06          1             0.31           0.06           1
            300        1.12  0.32  0.32    0.5   0.55  9999.99  0.3    0.27  9    0.01   0.95    1.7  0.1  0.93  0.32     0.06     1        0.32       0.06       1          0.32      0.06      1         0.32       0.06       1          0.32           0.06           1              0.32          0.06          1             0.32           0.06           1
            300        1.15  0.33  0.33    0.48  0.53  9999.99  0.3    0.22  9    0.01   0.95    1.7  0.1  1.01  0.33     0.06     1        0.33       0.06       1          0.33      0.06      1         0.33       0.06       1          0.33           0.06           1              0.33          0.06          1             0.33           0.06           1
            300        1.18  0.34  0.34    0.47  0.52  9999.99  0.3    0.16  8.9  0.01   0.95    1.7  0.1  1.06  0.34     0.06     1        0.34       0.06       1          0.34      0.06      1         0.34       0.06       1          0.34           0.06           1              0.34          0.06          1             0.34           0.06           1
            300        1.2   0.35  0.35    0.46  0.51  9999.99  0.3    0.13  8.9  0.01   0.95    1.7  0.1  1.05  0.35     0.06     1        0.35       0.06       1          0.35      0.06      1         0.35       0.06       1          0.35           0.06           1              0.35          0.06          1             0.35           0.06           1
            300        1.25  0.36  0.36    0.44  0.49  9999.99  0.3    0.12  8.9  0.01   0.95    1.7  0.1  1.01  0.36     0.06     1        0.36       0.06       1          0.36      0.06      1         0.36       0.06       1          0.36           0.06           1              0.36          0.06          1             0.36           0.06           1
        InitWater
          percentmethod: percent=1; distributed=filled from top
        InitNitrogen
          profile
            layer:
              no3    nh4       thickness
              6.503  0.599077  100
              2.101  0.100013  250
              2.101  0.100013  300
              1.701  0.100013  350
              1.701  0.100013  400
              1.701  0.100013  300
              1.701  0.100013  300
              1.701  0.100013  300
              1.701  0.100013  300
              1.701  0.100013  300
              1.701  0.100013  300
      slurp
      manager Slurp manager
        on start_of_day:
```
if day = 1 and year = 1960 then
   ! initialise 
   slurp sow cultivar=slurpcultivar
   slurp.leaflai = 7.0
   slurp.Leaflaidead = 0.1
   slurp.height = 200.
endif
```
        on end_of_day:
```
micromet lai_table
```
      slurp slurp1
      manager Slurp manager1
        on start_of_day:
```
if day = 1 and year = 1960 then
   ! initialise 
   slurp1 sow cultivar=slurpcultivar
   slurp1.leaflai = 7.0
   slurp1.Leaflaidead = 0.1
   slurp1.height = 200.
endif
```
      surfaceom surface organic matter
        PoolName = wheat  # Organic Matter pool name
        type = wheat  # Organic Matter type
        mass = 1000  # Initial surface residue (kg/ha)
        cnr = 80  # C:N ratio of initial residue
        standing_fraction = 0  # Fraction of residue standing
      outputfile
        variables
          variables: dd/mm/yyyy as Date, AnnualPEP, AnnualRain, AnnualET, LeafLAI, Cover_green, Height, Cover_Dead, Cover_Tot, AnnualEo, petr, peta, net_rs, LeafWaterDemand
        events Reporting Frequency: event=Daily
      tracker (disabled)
        variable:
          sum of leafwaterdemand on end_of_day from reported to now as AnnualPEP
          sum of rain on end_of_day from reported to now as AnnualRain
          sum of rootwateruptake on end_of_day from reported to now as AnnualET
          sum of eo on end_of_day from reported to now as AnnualEo
          maximum of lai on end_of_day from sowing to harvesting as MaxLai
      root slurproot
      root slurp1root
    log
  simulation WheatTest
    metfile met: filename=Lincoln.met
    clock
      start_date = 1/01/1960  # Enter the start date of the simulation
      end_date = 20/01/1960  # Enter the end date of the simulation
    summaryfile: filename=Continuous Wheat Simulation.sum
    area paddock
      micromet
        soilalbedo = 0.23
        a_interception = 0
        b_interception = 0
        c_interception = 0
        d_interception = 0
      soil: Site=Jimbour; Region=South East Queensland; LocalName=Waco; SoilType=Black Vertosol; NearestTown=Jimbour, Q 4352; NaturalVegetation=Grassland, mainly Qld bluegrass; Cona=3.5; DiffusConst=40; DiffusSlope=16; U=6; Salb=0.13; Cn2Bare=73; CnRed=20; CnCov=0.8; CnCanopyFact=1; RootCn=40; RootWt=200; SoilCn=12.5; EnrACoeff=7.4; EnrBCoeff=0.2
        profile
          layer:
            thickness  bd    ll15  airdry  dul   sat   sw       swcon  oc    ph   fbiom  finert  no3  nh4  ec    ll Tree  kl Tree  xf Tree  ll Slurp1  kl Slurp1  xf Slurp1  ll Slurp  kl Slurp  xf Slurp  ll Slurp2  kl Slurp2  xf Slurp2  ll SlurpRoot1  kl SlurpRoot1  xf SlurpRoot1  ll SlurpRoot  kl SlurpRoot  xf SlurpRoot  ll Wheat  kl Wheat  xf Wheat  ll Wheat2  kl Wheat2  xf Wheat2
            100        1.02  0.29  0.15    0.54  0.59  9999.99  0.3    1.04  8.4  0.025  0.4     6.5  0.6  0.2   0.29     0.06     1        0.29       0.06       1          0.29      0.06      1         0.29       0.06       1          0.29           0.06           1              0.29          0.06          1             0.29      0.06      1         0.29       0.06       1
            250        1.03  0.29  0.26    0.53  0.58  9999.99  0.3    0.89  8.8  0.02   0.6     2.1  0.1  0.25  0.29     0.06     1        0.29       0.06       1          0.29      0.06      1         0.29       0.06       1          0.29           0.06           1              0.29          0.06          1             0.29      0.06      1         0.29       0.06       1
            300        1.02  0.29  0.29    0.54  0.59  9999.99  0.3    0.89  9    0.015  0.8     2.1  0.1  0.31  0.29     0.06     1        0.29       0.06       1          0.29      0.06      1         0.29       0.06       1          0.29           0.06           1              0.29          0.06          1             0.29      0.06      1         0.29       0.06       1
            350        1.02  0.29  0.29    0.54  0.58  9999.99  0.3    0.89  9.2  0.01   0.9     1.7  0.1  0.4   0.29     0.06     1        0.29       0.06       1          0.29      0.06      1         0.29       0.06       1          0.29           0.06           1              0.29          0.06          1             0.29      0.06      1         0.29       0.06       1
            400        1.06  0.3   0.3     0.52  0.57  9999.99  0.3    0.77  9.2  0.01   0.95    1.7  0.1  0.59  0.3      0.06     1        0.3        0.06       1          0.3       0.06      1         0.3        0.06       1          0.3            0.06           1              0.3           0.06          1             0.3       0.06      1         0.3        0.06       1
            300        1.11  0.31  0.31    0.5   0.55  9999.99  0.3    0.45  9.1  0.01   0.95    1.7  0.1  0.84  0.31     0.06     1        0.31       0.06       1          0.31      0.06      1         0.31       0.06       1          0.31           0.06           1              0.31          0.06          1             0.31      0.06      1         0.31       0.06       1
            300        1.12  0.32  0.32    0.5   0.55  9999.99  0.3    0.27  9    0.01   0.95    1.7  0.1  0.93  0.32     0.06     1        0.32       0.06       1          0.32      0.06      1         0.32       0.06       1          0.32           0.06           1              0.32          0.06          1             0.32      0.06      1         0.32       0.06       1
            300        1.15  0.33  0.33    0.48  0.53  9999.99  0.3    0.22  9    0.01   0.95    1.7  0.1  1.01  0.33     0.06     1        0.33       0.06       1          0.33      0.06      1         0.33       0.06       1          0.33           0.06           1              0.33          0.06          1             0.33      0.06      1         0.33       0.06       1
            300        1.18  0.34  0.34    0.47  0.52  9999.99  0.3    0.16  8.9  0.01   0.95    1.7  0.1  1.06  0.34     0.06     1        0.34       0.06       1          0.34      0.06      1         0.34       0.06       1          0.34           0.06           1              0.34          0.06          1             0.34      0.06      1         0.34       0.06       1
            300        1.2   0.35  0.35    0.46  0.51  9999.99  0.3    0.13  8.9  0.01   0.95    1.7  0.1  1.05  0.35     0.06     1        0.35       0.06       1          0.35      0.06      1         0.35       0.06       1          0.35           0.06           1              0.35          0.06          1             0.35      0.06      1         0.35       0.06       1
            300        1.25  0.36  0.36    0.44  0.49  9999.99  0.3    0.12  8.9  0.01   0.95    1.7  0.1  1.01  0.36     0.06     1        0.36       0.06       1          0.36      0.06      1         0.36       0.06       1          0.36           0.06           1              0.36          0.06          1             0.36      0.06      1         0.36       0.06       1
        InitWater
          percentmethod: percent=1; distributed=filled from top
        InitNitrogen
          profile
            layer:
              no3    nh4       thickness
              6.503  0.599077  100
              2.101  0.100013  250
              2.101  0.100013  300
              1.701  0.100013  350
              1.701  0.100013  400
              1.701  0.100013  300
              1.701  0.100013  300
              1.701  0.100013  300
              1.701  0.100013  300
              1.701  0.100013  300
              1.701  0.100013  300
      manager
        on start_of_day:
```
if day = 1 and year = 1960 then
   ! initialise 
   wheat sow cultivar = hartog, plants = 100, row_spacing = 250, sowing_depth = 30
   wheat2 sow cultivar = hartog, plants = 100, row_spacing = 250, sowing_depth = 30
endif
```
        on end_of_day:
```
micromet lai_table
```
      surfaceom surface organic matter
        PoolName = wheat  # Organic Matter pool name
        type = wheat  # Organic Matter type
        mass = 1000  # Initial surface residue (kg/ha)
        cnr = 80  # C:N ratio of initial residue
        standing_fraction = 0  # Fraction of residue standing
      outputfile
        variables
          variables: dd/mm/yyyy as Date, lai, ep
        events Reporting Frequency: event=Daily
      tracker (disabled)
        variable:
          sum of leafwaterdemand on end_of_day from reported to now as AnnualPEP
          sum of rain on end_of_day from reported to now as AnnualRain
          sum of rootwateruptake on end_of_day from reported to now as AnnualET
          sum of eo on end_of_day from reported to now as AnnualEo
          maximum of lai on end_of_day from sowing to harvesting as MaxLai
      wheat
      wheat wheat2
    log
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