folder simulations: version=32
  simulation TestDltGSMax
    metfile met: filename=Lincoln.met
    clock
      start_date = 1/01/1960  # Enter the start date of the simulation
      end_date = 20/01/1960  # Enter the end date of the simulation
    summaryfile
    area paddock
      micromet
        soilalbedo = 0.23
        a_interception = 0
        b_interception = 0
        c_interception = 0
        d_interception = 0
      soil: LocalName=Waco; Site=Jimbour; Region=South East Queensland
        SoilType = Black Vertosol  # Soil description
        NearestTown = Jimbour, Q 4352
        NaturalVegetation = Grassland, mainly Qld bluegrass
        InitWater Initial water
          percentmethod: percent=1; distributed=filled from top
        Water
          Layer:
            Thickness (mm)  BD (g/cc)  AirDry (mm/mm)  LL15 (mm/mm)  DUL (mm/mm)  SAT (mm/mm)
            100             1.02       0.15            0.29          0.54         0.59
            250             1.03       0.26            0.29          0.53         0.58
            300             1.02       0.29            0.29          0.54         0.59
            350             1.02       0.29            0.29          0.54         0.58
            400             1.06       0.3             0.3           0.52         0.57
            300             1.11       0.31            0.31          0.5          0.55
            300             1.12       0.32            0.32          0.5          0.55
            300             1.15       0.33            0.33          0.48         0.53
            300             1.18       0.34            0.34          0.47         0.52
            300             1.2        0.35            0.35          0.46         0.51
            300             1.25       0.36            0.36          0.44         0.49
          SoilCrop Tree
            Layer:
              Thickness (mm)  LL (mm/mm)  KL (/day)  XF (0-1)
              100             0.29        0.06       1
              250             0.29        0.06       1
              300             0.29        0.06       1
              350             0.29        0.06       1
              400             0.3         0.06       1
              300             0.31        0.06       1
              300             0.32        0.06       1
              300             0.33        0.06       1
              300             0.34        0.06       1
              300             0.35        0.06       1
              300             0.36        0.06       1
          SoilCrop Slurp1: same as TestDltGSMax.paddock.Soil.Water.Tree
          SoilCrop Slurp: same as TestDltGSMax.paddock.Soil.Water.Tree
          SoilCrop Slurp2: same as TestDltGSMax.paddock.Soil.Water.Tree
          SoilCrop SlurpRoot1: same as TestDltGSMax.paddock.Soil.Water.Tree
          SoilCrop SlurpRoot: same as TestDltGSMax.paddock.Soil.Water.Tree
          SoilCrop Wheat: same as TestDltGSMax.paddock.Soil.Water.Tree
          SoilCrop Wheat2: same as TestDltGSMax.paddock.Soil.Water.Tree
        SoilWat: SummerCona=3.5; SummerU=6; SummerDate=1-Nov; WinterCona=3.5; WinterU=6; WinterDate=1-Apr; DiffusConst=40; DiffusSlope=16; Salb=0.13; Cn2Bare=73; CnRed=20; CnCov=0.8
          Layer:
            Thickness (mm)  SWCON (0-1)
            100             0.3
            250             0.3
            300             0.3
            350             0.3
            400             0.3
            300             0.3
            300             0.3
            300             0.3
            300             0.3
            300             0.3
            300             0.3
        SoilOrganicMatter: RootCn=40; RootWt=200; SoilCn=12.5; EnrACoeff=7.4; EnrBCoeff=0.2
          Layer:
            Thickness (mm)  OC (Total %)  FBiom (0-1)  FInert (0-1)
            100             1.04          0.025        0.4
            250             0.89          0.02         0.6
            300             0.89          0.015        0.8
            350             0.89          0.01         0.9
            400             0.77          0.01         0.95
            300             0.45          0.01         0.95
            300             0.27          0.01         0.95
            300             0.22          0.01         0.95
            300             0.16          0.01         0.95
            300             0.13          0.01         0.95
            300             0.12          0.01         0.95
        Analysis
          Layer:
            Thickness (mm)  EC (1:5 dS/m)  PH (1:5 water)
            100             0.2            8.4
            250             0.25           8.8
            300             0.31           9
            350             0.4            9.2
            400             0.59           9.2
            300             0.84           9.1
            300             0.93           9
            300             1.01           9
            300             1.06           8.9
            300             1.05           8.9
            300             1.01           8.9
        Sample Initial nitrogen
          Layer:
            Thickness (mm)  NO3 (ppm)  NH4 (ppm)
            100             6.503      0.599077
            250             2.101      0.100013
            300             2.101      0.100013
            350             1.701      0.100013
            400             1.701      0.100013
            300             1.701      0.100013
            300             1.701      0.100013
            300             1.701      0.100013
            300             1.701      0.100013
            300             1.701      0.100013
            300             1.701      0.100013
      manager
        on start_of_day:
```
if day = 1 and year = 1960 then
   wheat sow cultivar = hartog, plants = 100, row_spacing = 250, sowing_depth = 30
   wheat2 sow cultivar = hartog, plants = 100, row_spacing = 250, sowing_depth = 30
else
   dlt_gsmax_wheat2 = 0.001
endif
```
      surfaceom surface organic matter
        PoolName = wheat  # Organic Matter pool name
        type = wheat  # Organic Matter type
        mass = 1000  # Initial surface residue (kg/ha)
        cnr = 80  # C:N ratio of initial residue
        standing_fraction = 0  # Fraction of residue standing
      outputfile: filename=TestDltGSMax.out; title=TestDltGSMax
        variables
          variables: dd/mm/yyyy as Date, lai, ep, gsmax_wheat format 6, gsmax_wheat2 format 6
        events Reporting Frequency: event=Daily  # End of year
      wheat
      wheat wheat2
