folder Simulations: version=32
  simulation Maize P
    memo
      This test makes sure the "name" property can be read from components that use the FortranComponentInterface.
    clock
      start_date = 01/09/1988  # Enter the start date of the simulation
      end_date = 10/09/1988  # Enter the end date of the simulation
    summaryfile
    metfile met: filename=%apsim%\Examples\MetFiles\Dalby.met
    area paddock
      soil
        InitWater Initial water
          PercentMethod: Percent=0.00; Distributed=Filled from top
        Water
          Layer:
            Thickness (mm)  BD (g/cc)  AirDry (mm/mm)  LL15 (mm/mm)  DUL (mm/mm)  SAT (mm/mm)
            100             1.35       0.04            0.11          0.22         0.3
            100             1.35       0.14            0.14          0.25         0.3
            100             1.35       0.15            0.16          0.27         0.32
            200             1.4        0.16            0.17          0.28         0.33
            200             1.4        0.18            0.19          0.3          0.34
            200             1.4        0.18            0.2           0.3          0.35
            200             1.4        0.18            0.2           0.31         0.36
            200             1.4        0.18            0.2           0.32         0.37
            200             1.4        0.18            0.2           0.31         0.37
            200             1.4        0.18            0.2           0.31         0.37
          SoilCrop barley
            Layer:
              Thickness (mm)  LL (mm/mm)  KL (/day)  XF (0-1)
              100             0.11        0.07       1
              100             0.14        0.07       1
              100             0.16        0.07       1
              200             0.17        0.07       1
              200             0.19        0.07       1
              200             0.2         0.07       1
              200             0.2         0.04       1
              200             0.2         0.04       1
              200             0.2         0.04       1
              200             0.2         0.04       1
          SoilCrop cowpea
            Layer:
              Thickness (mm)  LL (mm/mm)  KL (/day)  XF (0-1)
              100             0.11        0.08       1
              100             0.14        0.08       1
              100             0.16        0.08       1
              200             0.17        0.08       1
              200             0.19        0.06       1
              200             0.2         0.04       1
              200             0.2         0.03       1
              200             0.2         0.02       1
              200             0.2         0.01       1
              200             0.2         0.01       1
          SoilCrop maize: same as Maize P.paddock.Soil.Water.cowpea
          SoilCrop mucuna: same as Maize P.paddock.Soil.Water.cowpea
          SoilCrop peanut: same as Maize P.paddock.Soil.Water.cowpea
          SoilCrop pigeonp: same as Maize P.paddock.Soil.Water.cowpea
          SoilCrop soybean: same as Maize P.paddock.Soil.Water.cowpea
        SoilWat: SummerCona=2.5; SummerU=9; SummerDate=1-Nov; WinterCona=2.5; WinterU=9; WinterDate=1-Apr; DiffusConst=88; DiffusSlope=35.4; Salb=0.13; CN2Bare=75; CNRed=20; CNCov=0.8
          Layer:
            Thickness (mm)  SWCON (0-1)
            100             0.5
            100             0.5
            100             0.5
            200             0.5
            200             0.5
            200             0.5
            200             0.5
            200             0.5
            200             0.5
            200             0.5
        SoilOrganicMatter: RootCN=45; RootWT=1000; SoilCN=14.5; EnrACoeff=7.4; EnrBCoeff=0.2
          Layer:
            Thickness (mm)  OC (Total %)  FBiom (0-1)  FInert (0-1)
            100             1.2           0.02         0.6
            100             1             0.01         0.65
            100             0.86          0.01         0.7
            200             0.83          0.01         0.75
            200             0.58          0.01         0.8
            200             0.54          0.01         0.85
            200             0.47          0.01         0.93
            200             0.5           0.01         0.93
            200             0.5           0.01         0.93
            200             0.5           0.01         0.93
        Analysis
          Layer:
            Thickness (mm)  PH (1:5 water)
            100             6
            100             6
            100             6
            200             6.2
            200             6.5
            200             6.7
            200             6.8
            200             6.8
            200             6.8
            200             6.8
        Phosphorus: RootCP=200; RateDissolRock=0.2; RateLossAvail=0.3; SorptionCoeff=0.7
          Layer:
            Thickness (mm)  LabileP (mg/kg)  BandedP (kg/ha)  RockP (kg/ha)  Sorption (-)
            100             5                0                0              50
            100             1                0                0              100
            100             1                0                0              200
            200             1                0                0              200
            200             1                0                0              200
            200             1                0                0              200
            200             1                0                0              200
            200             1                0                0              200
            200             1                0                0              200
            200             1                0                0              200
        Sample Initial nitrogen
          Layer:
            Thickness (mm)  NO3 (ppm)  NH4 (ppm)
            100             0.237      0.194
            100             0.712      0.484
            100             0.712      0.290
            200             0.554      0.290
            200             0.395      0.290
            200             0.395      0.290
            200             0.237      0.290
            200             0.237      0.290
            200             0.158      0.290
            200             0.079      0.290
      surfaceom
        PoolName = wheat  # Organic Matter pool name
        type = wheat  # Organic Matter type
        mass = 0  # Initial surface residue (kg/ha)
        cnr = 80  # C:N ratio of initial residue
        standing_fraction = 0  # Fraction of residue standing
      maize
      cowpea
      outputfile: filename=Maize P.out; title=Maize P
        variables My Variables
          variable:
            dd/mm/yyyy as Date  # Date (dd/mm/yyyy)
            maize.name
            surfaceom.name
            cowpea.name
        events My Variables Events: event=Daily  # End of day
