folder simulations: version=32
  simulation Narrogin
    metfile met: filename=%apsim%\Tests\OilMallee\Narrogin.met
    clock
      start_date = 01/01/2000  # Enter the start date of the simulation
      end_date = 31/12/2005  # Enter the end date of the simulation
    summaryfile
    area paddock
      OilMallee
        RootZones = .paddock
      fertiliser
      surfaceom surface organic matter
        PoolName = wheat  # Organic Matter pool name
        type = wheat  # Organic Matter type
        mass = 2000  # Initial surface residue (kg/ha)
        cnr = 80  # C:N ratio of initial residue
        standing_fraction = 0  # Fraction of residue standing
      folder Manager folder
        operations
          1-jan  fertiliser apply amount= 0 (kg/ha), type= urea_N (), depth= 10 (mm)
        irrigation
          automatic_irrigation = off
          asw_depth = 600  # Depth to which ASW is calculated. (mm)
          crit_fr_asw = 0.5  # Fraction of ASW below which irrigation is applied (0-1.0)
          irrigation_efficiency = 1  # Efficiency of the irrigation. (0-1.0)
          irrigation_allocation = off  # Allocation limits
          allocation = 0  # Allocation in ML
          default_no3_conc = 100  # Nitrate concentration (ppm N)
          default_nh4_conc = 0  # Ammonium concentration (ppm N)
          default_cl_conc = 0  # Chloride concentration (ppm Cl)
          default_no3_conc = 100  # Nitrate concentration (ppm N)
          default_nh4_conc = 0  # Ammonium concentration (ppm N)
          default_cl_conc = 0  # Chloride concentration (ppm Cl)
        manager Tree Sowing Rule
          sowing_date = 01/03/2000
          population = 135  # Plant Population (/ha)
          cultivar = dami
          sowing_depth = 200  # Sowing depth (mm)
          on start_of_day:
```
ppsm = [population]/10000
if today = date('[sowing_date]') then
   OilMallee sow population = ppsm, depth = [sowing_depth], cultivar = [cultivar], maxcover = 1.0, budnumber = 1, row_spacing = [row_width], crop_class = plant  
endif
```
          on Init:
```
Plant_population = 0
```
        manager Calculations
      micromet: soilalbedo=0.23; a_interception=0.0; b_interception=0.0; c_interception=0.0; d_interception=0.0
      outputfile: filename=Narrogin.out; title=Narrogin
        variables
          variables: dd/mm/yyyy as Date, StemLiveWt, LeafLAI, Age, LeafLiveWt, LeafDeadWt, StemLiveWt, LeafPhotosynthesisFw, LeafPhotosynthesisFn, LeafPhotosynthesisFtValue, LeafPhotosynthesisFvpdValue, LeafFw, LeafFn, sw_dep(), ll15_dep(), dul_dep()
        events Reporting Frequency: event=Daily
      soil: Site=Dumbleyung; Region=Central Region_Avon; State=Western Australia; Country=Australia
        SoilType = Clay Loam  # Soil description
        NearestTown = Dumbleyung
        ApsoilNumber = 411
        Latitude = -33.314612  # Latitude (WGS84)
        Longitude = 117.740798  # Longitude (WGS84)
        LocationAccuracy = Regional Soil Type
        DataSource = Yvette Oliver - Lucerne intercorpping Dumbleyung - Pat2
        Comments = Pat2 - The Clay-Loam site featured a brown/red clay loam soil with a neutral pH (6.6) at the soil surface becoming increasingly alkaline (pH 8.2–8.5) between 0.4 and 1.2 m, associated with mottled white calcrete deposits, before becoming acidic (pH 4.8) b
        Water
          Layer:
            Thickness (mm)  BD (g/cc)  Airdry (mm/mm)  LL15 (mm/mm)  DUL (mm/mm)  SAT (mm/mm)
            200             1.415      0.02            0.04          0.2          0.35
            200             1.413      0.03            0.043         0.17         0.41
            200             1.383      0.053           0.053         0.18         0.38
            200             1.383      0.099           0.099         0.2          0.38
            200             1.366      0.15            0.15          0.22         0.38
            200             1.366      0.18            0.18          0.24         0.38
            200             1.304      0.18            0.18          0.25         0.38
            200             1.304      0.18            0.18          0.235        0.38
            200             1.326      0.18            0.18          0.235        0.38
            200             1.326      0.18            0.18          0.235        0.38
            400             1.326      0.18            0.18          0.235        0.38
            400             1.326      0.18            0.18          0.235        0.38
            200             1.326      0.18            0.18          0.235        0.38
          SoilCrop lucerne
            Layer:
              Thickness (mm)  ll (mm/mm)  kl (/day)  xf (0-1)
              200             0.04        0.06       1
              200             0.043       0.06       1
              200             0.053       0.06       1
              200             0.099       0.04       1
              200             0.154       0.04       1
              200             0.19        0.04       1
              200             0.211       0.02       1
              200             0.22        0.01       1
              200             0.221       0.01       1
              200             0.214       0.005      1
              400             0.214       0.005      1
              400             0.214       0          0
              200             0.214       0          0
          SoilCrop OilMallee
            Layer:
              Thickness (mm)  ll (mm/mm)  kl (/day)  xf (0-1)
              200             0.04        0.06       1
              200             0.043       0.06       1
              200             0.053       0.06       1
              200             0.099       0.04       1
              200             0.154       0.04       1
              200             0.19        0.04       1
              200             0.211       0.02       1
              200             0.22        0.01       1
              200             0.221       0.01       1
              200             0.214       0.005      1
              400             0.214       0.005      1
              400             0.214       0.005      1
              200             0.214       0.005      1
        SoilWat: SummerCona=3.5; SummerU=6; SummerDate=1-Nov; WinterCona=2; WinterU=2; WinterDate=1-Apr; DiffusConst=40; DiffusSlope=16; Salb=0.13; Cn2Bare=75; CnRed=20; CnCov=0.8
          Layer:
            Thickness (mm)  SWCON (0-1)  MWCON (0-1)
            200             0.5          1
            200             0.5          1
            200             0.5          1
            200             0.5          1
            200             0.5          1
            200             0.5          1
            200             0.5          1
            200             0.5          1
            200             0.5          1
            200             0.5          1
            400             0.5          1
            400             0.5          1
            200             0.5          1
        SoilOrganicMatter: RootCn=40; RootWt=1000; SoilCn=13; EnrACoeff=7.4; EnrBCoeff=0.2
          Layer:
            Thickness (mm)  OC (Total %)  FBIOM (0-1)  FINERT (0-1)
            200             0.73          0.03         0.3
            200             0.73          0.03         0.3
            200             0.46          0.02         0.3
            200             0.46          0.01         0.8
            200             0.3           0.01         0.8
            200             0.3           0.01         0.8
            200             0.19          0.01         0.9
            200             0.1           0.01         0.9
            200             0.1           0.01         0.9
            200             0.1           0.01         0.9
            400             0.1           0.01         0.9
            400             0.1           0.01         0.9
            200             0.1           0.01         0.9
        Analysis
          Layer:
            Thickness (mm)  PH (1:5 water)
            200             6.6
            200             7.5
            200             8.4
            200             8.4
            200             8.2
            200             8.2
            200             5.4
            200             5.4
            200             4.6
            200             4.6
            400             4.6
            400             4.6
            200             4.6
        InitWater
          percentmethod: percent=1; distributed=filled from top
        Sample Initial nitrogen
          Layer:
            {Thickness (mm)=100, NO3 (ppm)=0, NH4 (ppm)=0, SW (mm/mm)=0}
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