folder simulations: version=36; creator=Apsim 7.6-r3462
  folder LongtermPatching
    simulation WheatBase
      metfile met: filename=%apsim%/Examples/MetFiles/Goond.met
      clock
        start_date = 01/01/1940  # Enter the start date of the simulation
        end_date = 31/12/1950  # Enter the end date of the simulation
      summaryfile
      area paddock
        Soil: SoilType=Black Vertosol; LocalName=Waco; Site=Jimbour; NearestTown=Jimbour, Q 4352; Region=South East Queensland; NaturalVegetation=Grassland, mainly Qld bluegrass; Latitude=0; Longitude=0; YearOfSampling=0
          InitialWater Initial water: FractionFull=0.1; PercentMethod=FilledFromTop; RelativeTo=ll15
          Water
            Thickness  BD    AirDry  LL15  DUL   SAT
            150        1.02  0.15    0.29  0.54  0.59
            150        1.03  0.26    0.29  0.53  0.58
            300        1.02  0.29    0.29  0.54  0.59
            300        1.02  0.29    0.29  0.54  0.58
            300        1.06  0.3     0.3   0.52  0.57
            300        1.11  0.31    0.31  0.5   0.55
            300        1.12  0.32    0.32  0.5   0.55
            300        1.15  0.33    0.33  0.48  0.53
            300        1.18  0.34    0.34  0.47  0.52
            300        1.2   0.35    0.35  0.46  0.51
            300        1.25  0.36    0.36  0.44  0.49
            SoilCrop Barley
              LL=[0.29, 0.29, 0.32, 0.38, 0.39, 0.39, 0.41, 0.48, 0.47, 0.46, 0.44]
              KL=[0.1, 0.1, 0.08, 0.06, 0.04, 0.02, 0.01, 0, 0, 0, 0]
              XF=[1, 1, 1, 1, 1, 1, 1, 0, 0, 0, 0]
            SoilCrop Chickpea
              LL=[0.29, 0.29, 0.36, 0.43, 0.51, 0.5, 0.5, 0.48, 0.47, 0.46, 0.44]
              KL=[0.1, 0.1, 0.08, 0.06, 0.04, 0.02, 0.01, 0, 0, 0, 0]
              XF=[1, 1, 1, 1, 1, 1, 1, 0, 0, 0, 0]
            SoilCrop Lucerne
              LL=[0.29, 0.29, 0.29, 0.29, 0.3, 0.31, 0.32, 0.33, 0.34, 0.35, 0.36]
              KL=[0.1, 0.1, 0.1, 0.1, 0.09, 0.09, 0.09, 0.09, 0.09, 0.09, 0.09]
              XF=[1, 1, 1, 1, 1, 1, 1, 1, 1, 1, 1]
            SoilCrop Maize
              LL=[0.29, 0.29, 0.34, 0.34, 0.37, 0.4, 0.42, 0.48, 0.47, 0.46, 0.44]
              KL=[0.1, 0.1, 0.1, 0.08, 0.06, 0.04, 0.02, 0, 0, 0, 0]
              XF=[1, 1, 1, 1, 1, 1, 1, 0, 0, 0, 0]
            SoilCrop Perennial Grass
              LL=[0.29, 0.29, 0.39, 0.41, 0.4, 0.4, 0.41, 0.41, 0.4, 0.4, 0.42]
              KL=[0.1, 0.1, 0.1, 0.1, 0.09, 0.07, 0.05, 0, 0, 0, 0]
              XF=[1, 1, 1, 1, 1, 1, 1, 0, 0, 0, 0]
            SoilCrop Sorghum
              LL=[0.29, 0.29, 0.35, 0.38, 0.4, 0.4, 0.4, 0.48, 0.47, 0.46, 0.44]
              KL=[0.1, 0.1, 0.1, 0.08, 0.06, 0.04, 0.02, 0, 0, 0, 0]
              XF=[1, 1, 1, 1, 1, 1, 1, 0, 0, 0, 0]
            SoilCrop Wheat
              LL=[0.29, 0.29, 0.32, 0.32, 0.35, 0.38, 0.41, 0.48, 0.47, 0.46, 0.44]
              KL=[0.1, 0.1, 0.08, 0.06, 0.04, 0.02, 0.01, 0, 0, 0, 0]
              XF=[1, 1, 1, 1, 1, 1, 1, 0, 0, 0, 0]
          SoilWater: SummerCona=3.5; SummerU=6; SummerDate=1-Nov; WinterCona=3.5; WinterU=6; WinterDate=1-Apr; DiffusConst=40; DiffusSlope=16; Salb=0.13; CN2Bare=73; CNRed=20; CNCov=0.8; Thickness=[150, 150, 300, 300, 300, 300, 300, 300, 300, 300, 300]; SWCON=[0.3, 0.3, 0.3, 0.3, 0.3, 0.3, 0.3, 0.3, 0.3, 0.3, 0.3]
          SoilOrganicMatter: RootCN=40; RootWt=200; SoilCN=12.5; EnrACoeff=7.4; EnrBCoeff=0.2
            Thickness  OC    FBiom  FInert
            150        1.04  0.025  0.4
            150        0.89  0.02   0.6
            300        0.89  0.015  0.8
            300        0.89  0.01   0.9
            300        0.77  0.01   0.95
            300        0.45  0.01   0.95
            300        0.27  0.01   0.95
            300        0.22  0.01   0.95
            300        0.16  0.01   0.95
            300        0.13  0.01   0.95
            300        0.12  0.01   0.95
          Analysis: PHUnits=Water; BoronUnits=HotWater
            Thickness  EC    PH
            150        0.2   8.4
            150        0.25  8.8
            300        0.31  9
            300        0.4   9.2
            300        0.59  9.2
            300        0.84  9.1
            300        0.93  9
            300        1.01  9
            300        1.06  8.9
            300        1.05  8.9
            300        1.01  8.9
          Sample Initial nitrogen: NO3Units=kgha; NH4Units=kgha; SWUnits=Volumetric; OCUnits=Total; PHUnits=Water
            Thickness  NO3      NH4
            150        9.9496   0.916477
            150        3.24605  0.154501
            300        6.42906  0.306002
            300        5.20506  0.306002
            300        5.40918  0.318002
            300        5.66433  0.333002
            300        5.71536  0.336002
            300        5.86845  0.345003
            300        6.02154  0.354003
            300        6.1236   0.360003
            300        6.37875  0.375003
        surfaceom SurfaceOrganicMatter
          PoolName = wheat  # Organic Matter pool name
          type = wheat  # Organic Matter type
          mass = 1000  # Initial surface residue (kg/ha)
          cnr = 80  # C:N ratio of initial residue
          standing_fraction = 0  # Fraction of residue standing
        fertiliser
        wheat
        outputfile: filename=WheatBase.out; title=WheatBase
          variables
            variables: dd/mm/yyyy as Date, biomass, yield, grain_protein, grain_size, esw
          events Reporting Frequency: event=harvesting
        manager Sow on a fixed date
          # Sowing criteria
          date = 1-jun  # Enter sowing date (dd-mmm)
          # Sowing parameters
          crop = wheat  # Enter name of crop to sow
          density = 10  # Enter sowing density (plants/m2)
          depth = 50  # Enter sowing depth (mm)
          cultivar = hartog  # Enter cultivar
          class = plant  # Enter crop growth class
          row_spacing = 500  # Enter row spacing (mm)
          on start_of_day:
```
        if (today = date('[date]') then
              [crop] sow plants =[density], sowing_depth = [depth], cultivar = [cultivar], row_spacing = [row_spacing], crop_class = [class]
         endif
```
        manager Harvesting rule
          # Harvesting criteria
          crop = wheat  # Enter name of crop to harvest when ripe
          on end_of_day:
```
           if [crop].StageName = 'harvest_ripe' or [crop].plant_status = 'dead' then
              [crop]  harvest
              [crop]  end_crop
           endif
```
        manager Reset
          # When should a reset be done
          modulename = wheat  # The module the event is to come from
          eventname = sowing  # On which event should a reset be done
          # Reset details
          soilmodule = Soil  # Name of your soil module
          surfaceommodule = SurfaceOrganicMatter  # Name of your surface organic matter module
          pmodule = Phosphorus  # Name of your phosphorus module
          resetWater = yes  # Reset soil water?
          resetNitrogen = yes  # Reset soil nitrogen?
          resetSurfaceOM = yes  # Reset surface organic matter?
          resetP = no  # Reset phosphorus?
          on [modulename].[eventname]:
```
            resetWater = '[resetWater]'
            resetNitrogen  = '[resetNitrogen]'
            resetSurfaceOM = '[resetSurfaceOM]'
            resetP = '[resetP]'
            if (resetWater = 'yes') then
                '[soilmodule] Water' reset
            endif
            if (resetNitrogen = 'yes') then
                '[soilmodule] Nitrogen' reset
            endif
            if (resetSurfaceOM = 'yes') then
                '[surfaceommodule]' reset
            endif
            if (resetP = 'yes') then
                '[pmodule]' reset
            endif
            if (resetWater = 'yes' or resetNitrogen = 'yes' or resetSurfaceOM = 'yes' or resetP = 'yes') then
               act_mods reseting
            endif
```
    simulation WheatZeroRain
      memo
        All rainfall has been zeroed so the line on the graph will be lower than the other 2 lines.
      metfile met: filename=%apsim%/Examples/MetFiles/Goond.met
      PatchData: FileName=PatchRain2.rain
      clock
        start_date = 01/01/1940  # Enter the start date of the simulation
        end_date = 31/12/1950  # Enter the end date of the simulation
      summaryfile
      area paddock
        Soil: same as LongtermPatching.WheatBase.paddock.Soil
        surfaceom SurfaceOrganicMatter
          PoolName = wheat  # Organic Matter pool name
          type = wheat  # Organic Matter type
          mass = 1000  # Initial surface residue (kg/ha)
          cnr = 80  # C:N ratio of initial residue
          standing_fraction = 0  # Fraction of residue standing
        fertiliser
        wheat
        outputfile: filename=WheatZeroRain.out; title=WheatZeroRain
          variables
            variables: dd/mm/yyyy as Date, biomass, yield, grain_protein, grain_size, esw
          events Reporting Frequency: event=harvesting
        manager Sow on a fixed date: same as LongtermPatching.WheatBase.paddock.Sow on a fixed date
        manager Harvesting rule
          # Harvesting criteria
          crop = wheat  # Enter name of crop to harvest when ripe
          on end_of_day:
          script: same as in LongtermPatching.WheatBase.paddock.Harvesting rule
        manager Reset: same as LongtermPatching.WheatBase.paddock.Reset
    simulation WheatPatched
      memo
        This simulation has all met variables patched and so the probability of exceedence line for this sim should be vertical.
      metfile met: filename=%apsim%/Examples/MetFiles/Goond.met
      PatchData: FileName=PatchRain1.rain
      clock
        start_date = 01/01/1940  # Enter the start date of the simulation
        end_date = 31/12/1950  # Enter the end date of the simulation
      summaryfile
      area paddock
        Soil: same as LongtermPatching.WheatBase.paddock.Soil
        surfaceom SurfaceOrganicMatter
          PoolName = wheat  # Organic Matter pool name
          type = wheat  # Organic Matter type
          mass = 1000  # Initial surface residue (kg/ha)
          cnr = 80  # C:N ratio of initial residue
          standing_fraction = 0  # Fraction of residue standing
        fertiliser
        wheat
        outputfile: filename=WheatPatched.out; title=WheatPatched
          variables
            variables: dd/mm/yyyy as Date, biomass, yield, grain_protein, grain_size, esw
          events Reporting Frequency: event=harvesting
        manager Sow on a fixed date: same as LongtermPatching.WheatBase.paddock.Sow on a fixed date
        manager Harvesting rule
          # Harvesting criteria
          crop = wheat  # Enter name of crop to harvest when ripe
          on end_of_day:
          script: same as in LongtermPatching.WheatBase.paddock.Harvesting rule
        manager Reset: same as LongtermPatching.WheatBase.paddock.Reset
  folder PatchingWithData
    simulation WithData
      memo
        This simulation tests the missing data capability.
      metfile met: filename=%apsim%/Examples/MetFiles/Goond.met
      PatchData: FileName=PatchRain3.rain
      clock
        start_date = 01/01/1940  # Enter the start date of the simulation
        end_date = 10/01/1940  # Enter the end date of the simulation
      summaryfile
      area paddock
        Soil: same as LongtermPatching.WheatBase.paddock.Soil
        surfaceom SurfaceOrganicMatter
          PoolName = wheat  # Organic Matter pool name
          type = wheat  # Organic Matter type
          mass = 1000  # Initial surface residue (kg/ha)
          cnr = 80  # C:N ratio of initial residue
          standing_fraction = 0  # Fraction of residue standing
        outputfile: filename=WithData.out; title=WithData
          variables
            variables: dd/mm/yyyy as Date, maxt, mint, radn, rain
          events Reporting Frequency: event=daily
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