folder simulations: version=36; creator=Apsim 7.6-r3462
  simulation Wheat
    metfile met: filename=%APSIM%\\Examples\MetFiles\Goond.met
    clock
      start_date = 1/01/1988  # Enter the start date of the simulation
      end_date = 31/12/1989  # Enter the end date of the simulation
    summaryfile
    area paddock
      Soil: LocalName=Waco; Site=Jimbour; Region=South East Queensland
        SoilType = Black Vertosol  # Soil description
        NearestTown = Jimbour, Q 4352
        NaturalVegetation = Grassland, mainly Qld bluegrass
        InitialWater Initial water: FractionFull=1; PercentMethod=FilledFromTop
        Water
          Thickness  BD    AirDry  LL15  DUL   SAT
          150        1.02  0.15    0.29  0.54  0.59
          150        1.03  0.26    0.29  0.53  0.58
          300        1.02  0.29    0.29  0.54  0.59
          300        1.02  0.29    0.29  0.54  0.58
          300        1.06  0.3     0.3   0.52  0.57
          300        1.11  0.31    0.31  0.5   0.55
          300        1.12  0.32    0.32  0.5   0.55
          300        1.15  0.33    0.33  0.48  0.53
          300        1.18  0.34    0.34  0.47  0.52
          300        1.2   0.35    0.35  0.46  0.51
          300        1.25  0.36    0.36  0.44  0.49
          SoilCrop Barley
            LL=[0.29, 0.29, 0.32, 0.38, 0.39, 0.39, 0.41, 0.48, 0.47, 0.46, 0.44]
            KL=[0.1, 0.1, 0.08, 0.06, 0.04, 0.02, 0.01, 0, 0, 0, 0]
            XF=[1, 1, 1, 1, 1, 1, 1, 0, 0, 0, 0]
          SoilCrop Broccoli
            LL=[0.29, 0.29, 0.29, 0.29, 0.3, 0.31, 0.32, 0.33, 0.34, 0.35, 0.36]
            KL=[0.06, 0.06, 0.06, 0.06, 0.06, 0.06, 0.06, 0.06, 0.06, 0.06, 0.06]
            XF=[1, 1, 1, 1, 1, 1, 1, 1, 1, 1, 1]
          SoilCrop Butterflypea
            LL=[0.29, 0.29, 0.29, 0.29, 0.3, 0.31, 0.32, 0.33, 0.34, 0.35, 0.36]
            KL=[0.06, 0.06, 0.06, 0.06, 0.06, 0.06, 0.06, 0.06, 0.06, 0.06, 0.06]
            XF=[1, 1, 1, 1, 1, 1, 1, 1, 1, 1, 1]
          SoilCrop Canola
            LL=[0.29, 0.29, 0.29, 0.29, 0.3, 0.31, 0.32, 0.33, 0.34, 0.35, 0.36]
            KL=[0.06, 0.06, 0.06, 0.06, 0.06, 0.06, 0.06, 0.06, 0.06, 0.06, 0.06]
            XF=[1, 1, 1, 1, 1, 1, 1, 1, 1, 1, 1]
          SoilCrop Centro
            LL=[0.29, 0.29, 0.29, 0.29, 0.3, 0.31, 0.32, 0.33, 0.34, 0.35, 0.36]
            KL=[0.06, 0.06, 0.06, 0.06, 0.06, 0.06, 0.06, 0.06, 0.06, 0.06, 0.06]
            XF=[1, 1, 1, 1, 1, 1, 1, 1, 1, 1, 1]
          SoilCrop Chickpea
            LL=[0.29, 0.29, 0.36, 0.43, 0.51, 0.5, 0.5, 0.48, 0.47, 0.46, 0.44]
            KL=[0.1, 0.1, 0.08, 0.06, 0.04, 0.02, 0.01, 0, 0, 0, 0]
            XF=[1, 1, 1, 1, 1, 1, 1, 0, 0, 0, 0]
          SoilCrop Cowpea
            LL=[0.29, 0.29, 0.29, 0.29, 0.3, 0.31, 0.32, 0.33, 0.34, 0.35, 0.36]
            KL=[0.06, 0.06, 0.06, 0.06, 0.06, 0.06, 0.06, 0.06, 0.06, 0.06, 0.06]
            XF=[1, 1, 1, 1, 1, 1, 1, 1, 1, 1, 1]
          SoilCrop Fababean
            LL=[0.29, 0.29, 0.29, 0.29, 0.3, 0.31, 0.32, 0.33, 0.34, 0.35, 0.36]
            KL=[0.06, 0.06, 0.06, 0.06, 0.06, 0.06, 0.06, 0.06, 0.06, 0.06, 0.06]
            XF=[1, 1, 1, 1, 1, 1, 1, 1, 1, 1, 1]
          SoilCrop Fieldpea
            LL=[0.29, 0.29, 0.29, 0.29, 0.3, 0.31, 0.32, 0.33, 0.34, 0.35, 0.36]
            KL=[0.06, 0.06, 0.06, 0.06, 0.06, 0.06, 0.06, 0.06, 0.06, 0.06, 0.06]
            XF=[1, 1, 1, 1, 1, 1, 1, 1, 1, 1, 1]
          SoilCrop Horsegram
            LL=[0.29, 0.29, 0.29, 0.29, 0.3, 0.31, 0.32, 0.33, 0.34, 0.35, 0.36]
            KL=[0.06, 0.06, 0.06, 0.06, 0.06, 0.06, 0.06, 0.06, 0.06, 0.06, 0.06]
            XF=[1, 1, 1, 1, 1, 1, 1, 1, 1, 1, 1]
          SoilCrop LabLab
            LL=[0.29, 0.29, 0.29, 0.29, 0.3, 0.31, 0.32, 0.33, 0.34, 0.35, 0.36]
            KL=[0.06, 0.06, 0.06, 0.06, 0.06, 0.06, 0.06, 0.06, 0.06, 0.06, 0.06]
            XF=[1, 1, 1, 1, 1, 1, 1, 1, 1, 1, 1]
          SoilCrop Lettuce
            LL=[0.29, 0.29, 0.29, 0.29, 0.3, 0.31, 0.32, 0.33, 0.34, 0.35, 0.36]
            KL=[0.06, 0.06, 0.06, 0.06, 0.06, 0.06, 0.06, 0.06, 0.06, 0.06, 0.06]
            XF=[1, 1, 1, 1, 1, 1, 1, 1, 1, 1, 1]
          SoilCrop Lucerne
            LL=[0.29, 0.29, 0.29, 0.29, 0.3, 0.31, 0.32, 0.33, 0.34, 0.35, 0.36]
            KL=[0.1, 0.1, 0.1, 0.1, 0.09, 0.09, 0.09, 0.09, 0.09, 0.09, 0.09]
            XF=[1, 1, 1, 1, 1, 1, 1, 1, 1, 1, 1]
          SoilCrop Lupin
            LL=[0.29, 0.29, 0.29, 0.29, 0.3, 0.31, 0.32, 0.33, 0.34, 0.35, 0.36]
            KL=[0.06, 0.06, 0.06, 0.06, 0.06, 0.06, 0.06, 0.06, 0.06, 0.06, 0.06]
            XF=[1, 1, 1, 1, 1, 1, 1, 1, 1, 1, 1]
          SoilCrop Mucuna
            LL=[0.29, 0.29, 0.29, 0.29, 0.3, 0.31, 0.32, 0.33, 0.34, 0.35, 0.36]
            KL=[0.06, 0.06, 0.06, 0.06, 0.06, 0.06, 0.06, 0.06, 0.06, 0.06, 0.06]
            XF=[1, 1, 1, 1, 1, 1, 1, 1, 1, 1, 1]
          SoilCrop Mungbean
            LL=[0.29, 0.29, 0.29, 0.29, 0.3, 0.31, 0.32, 0.33, 0.34, 0.35, 0.36]
            KL=[0.06, 0.06, 0.06, 0.06, 0.06, 0.06, 0.06, 0.06, 0.06, 0.06, 0.06]
            XF=[1, 1, 1, 1, 1, 1, 1, 1, 1, 1, 1]
          SoilCrop Navybean
            LL=[0.29, 0.29, 0.29, 0.29, 0.3, 0.31, 0.32, 0.33, 0.34, 0.35, 0.36]
            KL=[0.06, 0.06, 0.06, 0.06, 0.06, 0.06, 0.06, 0.06, 0.06, 0.06, 0.06]
            XF=[1, 1, 1, 1, 1, 1, 1, 1, 1, 1, 1]
          SoilCrop Oats
            LL=[0.29, 0.29, 0.32, 0.32, 0.35, 0.38, 0.41, 0.48, 0.47, 0.46, 0.44]
            KL=[0.1, 0.1, 0.08, 0.06, 0.04, 0.02, 0.01, 0, 0, 0, 0]
            XF=[1, 1, 1, 1, 1, 1, 1, 0, 0, 0, 0]
          SoilCrop Peanut
            LL=[0.29, 0.29, 0.29, 0.29, 0.3, 0.31, 0.32, 0.33, 0.34, 0.35, 0.36]
            KL=[0.06, 0.06, 0.06, 0.06, 0.06, 0.06, 0.06, 0.06, 0.06, 0.06, 0.06]
            XF=[1, 1, 1, 1, 1, 1, 1, 1, 1, 1, 1]
          SoilCrop Pigeonpea
            LL=[0.29, 0.29, 0.29, 0.29, 0.3, 0.31, 0.32, 0.33, 0.34, 0.35, 0.36]
            KL=[0.06, 0.06, 0.06, 0.06, 0.06, 0.06, 0.06, 0.06, 0.06, 0.06, 0.06]
            XF=[1, 1, 1, 1, 1, 1, 1, 1, 1, 1, 1]
          SoilCrop Potato
            LL=[0.29, 0.29, 0.29, 0.29, 0.3, 0.31, 0.32, 0.33, 0.34, 0.35, 0.36]
            KL=[0.06, 0.06, 0.06, 0.06, 0.06, 0.06, 0.06, 0.06, 0.06, 0.06, 0.06]
            XF=[1, 1, 1, 1, 1, 1, 1, 1, 1, 1, 1]
          SoilCrop Soybean
            LL=[0.29, 0.29, 0.29, 0.29, 0.3, 0.31, 0.32, 0.33, 0.34, 0.35, 0.36]
            KL=[0.06, 0.06, 0.06, 0.06, 0.06, 0.06, 0.06, 0.06, 0.06, 0.06, 0.06]
            XF=[1, 1, 1, 1, 1, 1, 1, 1, 1, 1, 1]
          SoilCrop Stylo
            LL=[0.29, 0.29, 0.29, 0.29, 0.3, 0.31, 0.32, 0.33, 0.34, 0.35, 0.36]
            KL=[0.06, 0.06, 0.06, 0.06, 0.06, 0.06, 0.06, 0.06, 0.06, 0.06, 0.06]
            XF=[1, 1, 1, 1, 1, 1, 1, 1, 1, 1, 1]
          SoilCrop SweetCorn
            LL=[0.29, 0.29, 0.29, 0.29, 0.3, 0.31, 0.32, 0.33, 0.34, 0.35, 0.36]
            KL=[0.06, 0.06, 0.06, 0.06, 0.06, 0.06, 0.06, 0.06, 0.06, 0.06, 0.06]
            XF=[1, 1, 1, 1, 1, 1, 1, 1, 1, 1, 1]
          SoilCrop SweetSorghum
            LL=[0.29, 0.29, 0.29, 0.29, 0.3, 0.31, 0.32, 0.33, 0.34, 0.35, 0.36]
            KL=[0.06, 0.06, 0.06, 0.06, 0.06, 0.06, 0.06, 0.06, 0.06, 0.06, 0.06]
            XF=[1, 1, 1, 1, 1, 1, 1, 1, 1, 1, 1]
          SoilCrop Weed
            LL=[0.29, 0.29, 0.29, 0.29, 0.3, 0.31, 0.32, 0.33, 0.34, 0.35, 0.36]
            KL=[0.06, 0.06, 0.06, 0.06, 0.06, 0.06, 0.06, 0.06, 0.06, 0.06, 0.06]
            XF=[1, 1, 1, 1, 1, 1, 1, 1, 1, 1, 1]
          SoilCrop Wheat
            LL=[0.29, 0.29, 0.32, 0.32, 0.35, 0.38, 0.41, 0.48, 0.47, 0.46, 0.44]
            KL=[0.1, 0.1, 0.08, 0.06, 0.04, 0.02, 0.01, 0, 0, 0, 0]
            XF=[1, 1, 1, 1, 1, 1, 1, 0, 0, 0, 0]
        SoilWater: SummerCona=3.5; SummerU=6; SummerDate=1-Nov; WinterCona=3.5; WinterU=6; WinterDate=1-Apr; DiffusConst=40; DiffusSlope=16; Salb=0.13; CN2Bare=73; CNRed=20; CNCov=0.8; Thickness=[150, 150, 300, 300, 300, 300, 300, 300, 300, 300, 300]; SWCON=[0.3, 0.3, 0.3, 0.3, 0.3, 0.3, 0.3, 0.3, 0.3, 0.3, 0.3]
        SoilOrganicMatter: RootCN=40; RootWt=200; SoilCN=12.5; EnrACoeff=7.4; EnrBCoeff=0.2
          Thickness  OC    FBiom  FInert
          150        1.04  0.025  0.4
          150        0.89  0.02   0.6
          300        0.89  0.015  0.8
          300        0.89  0.01   0.9
          300        0.77  0.01   0.95
          300        0.45  0.01   0.95
          300        0.27  0.01   0.95
          300        0.22  0.01   0.95
          300        0.16  0.01   0.95
          300        0.13  0.01   0.95
          300        0.12  0.01   0.95
        Analysis
          Thickness  EC    PH
          150        0.2   8.4
          150        0.25  8.8
          300        0.31  9
          300        0.4   9.2
          300        0.59  9.2
          300        0.84  9.1
          300        0.93  9
          300        1.01  9
          300        1.06  8.9
          300        1.05  8.9
          300        1.01  8.9
        Sample Initial nitrogen
          Thickness  NO3    NH4
          150        6.503  0.599004
          150        2.101  0.100001
          300        2.101  0.100001
          300        1.701  0.100001
          300        1.701  0.100001
          300        1.701  0.100001
          300        1.701  0.100001
          300        1.701  0.100001
          300        1.701  0.100001
          300        1.701  0.100001
          300        1.701  0.100001
      surfaceom surface organic matter
        PoolName = wheat  # Organic Matter pool name
        type = wheat  # Organic Matter type
        mass = 1000  # Initial surface residue (kg/ha)
        cnr = 80  # C:N ratio of initial residue
        standing_fraction = 0  # Fraction of residue standing
      fertiliser
      wheat
      folder Manager folder
        manager Sow on a fixed date
          # Sowing criteria
          date = 1-jun  # Enter sowing date (dd-mmm)
          # Sowing parameters
          crop = wheat  # Enter name of crop to sow
          density = 10  # Enter sowing density (plants/m2)
          depth = 50  # Enter sowing depth (mm)
          cultivar = hartog  # Enter cultivar
          class = plant  # Enter crop growth class
          row_spacing = 500  # Enter row spacing (mm)
          on start_of_day:
```
        if (today = date('[date]') then
              [crop] sow plants =[density], sowing_depth = [depth], cultivar = [cultivar], row_spacing = [row_spacing], crop_class = [class]
         endif
```
        manager Harvesting rule
          # Harvesting criteria
          crop = wheat  # Enter name of crop to harvest when ripe
          on end_of_day:
```
           if [crop].StageName = 'harvest_ripe' or [crop].plant_status = 'dead' then
              [crop]  harvest
              [crop]  end_crop
           endif
```
      outputfile: filename=Wheat.out; title=Wheat
        variables
          variables: dd/mm/yyyy as Date, biomass, yield, grain_protein, grain_size, esw, roottotalwt, stemtotalwt, leaftotalwt, podtotalwt, graintotalwt, oiltotalwt, roottotaln, stemtotaln, leaftotaln, podtotaln, graintotaln, lai, swdef_photo, nfact_photo
        events Reporting Frequency: event=Daily
  simulation Barley -> /simulations/Wheat
    area paddock -> /simulations/Wheat/paddock
      folder Manager folder -> /simulations/Wheat/paddock/Manager folder
        manager Sow on a fixed date
          # Sowing criteria
          date = 1-jun  # Enter sowing date (dd-mmm)
          # Sowing parameters
          crop = barley  # Enter name of crop to sow
          density = 10  # Enter sowing density (plants/m2)
          depth = 50  # Enter sowing depth (mm)
          cultivar = schooner  # Enter cultivar
          class = plant  # Enter crop growth class
          row_spacing = 500  # Enter row spacing (mm)
          on start_of_day:
          script: same as in Wheat.paddock.Manager folder.Sow on a fixed date
        manager Harvesting rule
          # Harvesting criteria
          crop = barley  # Enter name of crop to harvest when ripe
          on end_of_day:
          script: same as in Wheat.paddock.Manager folder.Harvesting rule
      outputfile: filename=Barley.out; title=Barley
        variables -> /simulations/Wheat/paddock/outputfile/Variables
        events Reporting Frequency -> /simulations/Wheat/paddock/outputfile/Reporting Frequency
      barley
  simulation Broccoli -> /simulations/Wheat
    area paddock -> /simulations/Wheat/paddock
      folder Manager folder -> /simulations/Wheat/paddock/Manager folder
        manager Sow on a fixed date
          # Sowing criteria
          date = 11-mar  # Enter sowing date (dd-mmm)
          # Sowing parameters
          crop = broccoli  # Enter name of crop to sow
          density = 6  # Enter sowing density (plants/m2)
          depth = 50  # Enter sowing depth (mm)
          cultivar = fiesta  # Enter cultivar
          class = plant  # Enter crop growth class
          row_spacing = 600  # Enter row spacing (mm)
          on start_of_day:
          script: same as in Wheat.paddock.Manager folder.Sow on a fixed date
        manager Harvest on a Growth Stage
          # Harvesting criteria
          stage = maturity  # Enter stage name
          # Harvesting parameters
          crop = broccoli  # Enter name of crop to sow
          on start_of_day:
```
      if ([crop].plant_status <> 'out') then
        if ([crop].PhenologyCurrentStageName = '[stage]') then
                    [crop] harvest
                    [crop] end_crop
        endif
      endif
```
      outputfile: filename=Broccoli.out; title=Broccoli
        variables -> /simulations/Wheat/paddock/outputfile/Variables
        events Reporting Frequency -> /simulations/Wheat/paddock/outputfile/Reporting Frequency
      broccoli
  simulation Butterflypea -> /simulations/Wheat
    area paddock -> /simulations/Wheat/paddock
      folder Manager folder -> /simulations/Wheat/paddock/Manager folder
        manager Sowing rule
          # Sowing criteria
          date1 = 31-jan  # Enter sowing window START date (dd-mmm)
          date2 = 31-jan  # Enter sowing window END date (dd-mmm)
          must_sow = yes  # Must sow?
          raincrit = 30  # Amount of rainfall
          rainnumdays = 3  # Number of days of rainfall
          esw_amount = 200  # Enter minimum allowable available soil water (mm)
          # Sowing parameters
          crop = butterflypea  # Enter name of crop to sow
          density = 20  # Enter sowing density (plants/m2)
          depth = 30  # Enter sowing depth (mm)
          cultivar = milgarra  # Enter cultivar
          row_spacing = 300  # Enter row spacing (mm)
          on start_of_day:
```
      if (paddock_is_fallow() = 1) then
         if (date_within('[date1], [date2]') = 1) then
            if (rain[[rainnumdays]] >= [raincrit] AND esw >= [esw_amount]) OR
                ('[must_sow]' = 'yes' AND today = date('[date2]'))) THEN
               [crop] sow plants =[density], sowing_depth = [depth], cultivar = [cultivar], row_spacing = [row_spacing]
            endif
            if today = date('[date2]') then
               ChooseNextCrop = 'yes'
            endif
         endif
      endif
```
      outputfile: filename=Butterflypea.out; title=Butterflypea
        variables -> /simulations/Wheat/paddock/outputfile/Variables
        events Reporting Frequency -> /simulations/Wheat/paddock/outputfile/Reporting Frequency
      butterflypea
  simulation Canola -> /simulations/Wheat
    area paddock -> /simulations/Wheat/paddock
      folder Manager folder -> /simulations/Wheat/paddock/Manager folder
        manager Sow on a fixed date
          # Sowing criteria
          date = 1-jun  # Enter sowing date (dd-mmm)
          # Sowing parameters
          crop = canola  # Enter name of crop to sow
          density = 10  # Enter sowing density (plants/m2)
          depth = 50  # Enter sowing depth (mm)
          cultivar = rainbow  # Enter cultivar
          class = plant  # Enter crop growth class
          row_spacing = 500  # Enter row spacing (mm)
          on start_of_day:
          script: same as in Wheat.paddock.Manager folder.Sow on a fixed date
        manager Harvesting rule
          # Harvesting criteria
          crop = canola  # Enter name of crop to harvest when ripe
          on end_of_day:
          script: same as in Wheat.paddock.Manager folder.Harvesting rule
      outputfile: filename=Canola.out; title=Canola
        variables
          variable:
            dd/mm/yyyy as Date  # Date (dd/mm/yyyy)
            biomass  # Biomass
            yield  # Yield
            grain_protein  # grain protein content
            grain_size  # Size of each grain
            esw  # Extractable Soil Water (mm)
            lai
            oil
        events Reporting Frequency -> /simulations/Wheat/paddock/outputfile/Reporting Frequency
      canola
  simulation Centro -> /simulations/Wheat
    area paddock -> /simulations/Wheat/paddock
      folder Manager folder -> /simulations/Wheat/paddock/Manager folder
        manager Sow on a fixed date
          # Sowing criteria
          date = 1-feb  # Enter sowing date (dd-mmm)
          # Sowing parameters
          crop = centro  # Enter name of crop to sow
          density = 10  # Enter sowing density (plants/m2)
          depth = 50  # Enter sowing depth (mm)
          cultivar = cavalcade  # Enter cultivar
          class = plant  # Enter crop growth class
          row_spacing = 500  # Enter row spacing (mm)
          on start_of_day:
          script: same as in Wheat.paddock.Manager folder.Sow on a fixed date
        manager Harvesting rule
          # Harvesting criteria
          crop = centro  # Enter name of crop to harvest when ripe
          on end_of_day:
          script: same as in Wheat.paddock.Manager folder.Harvesting rule
      outputfile: filename=Centro.out; title=Centro
        variables -> /simulations/Wheat/paddock/outputfile/Variables
        events Reporting Frequency -> /simulations/Wheat/paddock/outputfile/Reporting Frequency
      centro
  simulation Chickpea -> /simulations/Wheat
    area paddock -> /simulations/Wheat/paddock
      folder Manager folder -> /simulations/Wheat/paddock/Manager folder
        manager Sow on a fixed date
          # Sowing criteria
          date = 1-jun  # Enter sowing date (dd-mmm)
          # Sowing parameters
          crop = chickpea  # Enter name of crop to sow
          density = 10  # Enter sowing density (plants/m2)
          depth = 50  # Enter sowing depth (mm)
          cultivar = amethyst  # Enter cultivar
          class = plant  # Enter crop growth class
          row_spacing = 500  # Enter row spacing (mm)
          on start_of_day:
          script: same as in Wheat.paddock.Manager folder.Sow on a fixed date
        manager Harvesting rule
          # Harvesting criteria
          crop = chickpea  # Enter name of crop to harvest when ripe
          on end_of_day:
          script: same as in Wheat.paddock.Manager folder.Harvesting rule
      outputfile: filename=Chickpea.out; title=Chickpea
        variables -> /simulations/Wheat/paddock/outputfile/Variables
        events Reporting Frequency -> /simulations/Wheat/paddock/outputfile/Reporting Frequency
      chickpea
  simulation Cowpea -> /simulations/Wheat
    area paddock -> /simulations/Wheat/paddock
      folder Manager folder -> /simulations/Wheat/paddock/Manager folder
        manager Sow on a fixed date
          # Sowing criteria
          date = 1-dec  # Enter sowing date (dd-mmm)
          # Sowing parameters
          crop = cowpea  # Enter name of crop to sow
          density = 10  # Enter sowing density (plants/m2)
          depth = 50  # Enter sowing depth (mm)
          cultivar = banjo  # Enter cultivar
          class = plant  # Enter crop growth class
          row_spacing = 500  # Enter row spacing (mm)
          on start_of_day:
          script: same as in Wheat.paddock.Manager folder.Sow on a fixed date
        manager Harvesting rule
          # Harvesting criteria
          crop = cowpea  # Enter name of crop to harvest when ripe
          on end_of_day:
          script: same as in Wheat.paddock.Manager folder.Harvesting rule
      outputfile: filename=Cowpea.out; title=Cowpea
        variables -> /simulations/Wheat/paddock/outputfile/Variables
        events Reporting Frequency -> /simulations/Wheat/paddock/outputfile/Reporting Frequency
      cowpea
  simulation Fababean -> /simulations/Wheat
    area paddock -> /simulations/Wheat/paddock
      folder Manager folder -> /simulations/Wheat/paddock/Manager folder
        manager Sow on a fixed date
          # Sowing criteria
          date = 1-jun  # Enter sowing date (dd-mmm)
          # Sowing parameters
          crop = fababean  # Enter name of crop to sow
          density = 10  # Enter sowing density (plants/m2)
          depth = 50  # Enter sowing depth (mm)
          cultivar = fiord  # Enter cultivar
          class = plant  # Enter crop growth class
          row_spacing = 500  # Enter row spacing (mm)
          on start_of_day:
          script: same as in Wheat.paddock.Manager folder.Sow on a fixed date
        manager Harvesting rule
          # Harvesting criteria
          crop = fababean  # Enter name of crop to harvest when ripe
          on end_of_day:
          script: same as in Wheat.paddock.Manager folder.Harvesting rule
      outputfile: filename=Fababean.out; title=Fababean
        variables -> /simulations/Wheat/paddock/outputfile/Variables
        events Reporting Frequency -> /simulations/Wheat/paddock/outputfile/Reporting Frequency
      fababean
  simulation Fieldpea -> /simulations/Wheat
    area paddock -> /simulations/Wheat/paddock
      folder Manager folder -> /simulations/Wheat/paddock/Manager folder
        manager Sow on a fixed date
          # Sowing criteria
          date = 1-jun  # Enter sowing date (dd-mmm)
          # Sowing parameters
          crop = fieldpea  # Enter name of crop to sow
          density = 10  # Enter sowing density (plants/m2)
          depth = 50  # Enter sowing depth (mm)
          cultivar = excel  # Enter cultivar
          class = plant  # Enter crop growth class
          row_spacing = 500  # Enter row spacing (mm)
          on start_of_day:
          script: same as in Wheat.paddock.Manager folder.Sow on a fixed date
        manager Harvesting rule
          # Harvesting criteria
          crop = fieldpea  # Enter name of crop to harvest when ripe
          on end_of_day:
          script: same as in Wheat.paddock.Manager folder.Harvesting rule
      outputfile: filename=Fieldpea.out; title=Fieldpea
        variables -> /simulations/Wheat/paddock/outputfile/Variables
        events Reporting Frequency -> /simulations/Wheat/paddock/outputfile/Reporting Frequency
      fieldpea
  simulation Horsegram -> /simulations/Wheat
    area paddock -> /simulations/Wheat/paddock
      folder Manager folder -> /simulations/Wheat/paddock/Manager folder
        manager Sow on a fixed date
          # Sowing criteria
          date = 1-dec  # Enter sowing date (dd-mmm)
          # Sowing parameters
          crop = horsegram  # Enter name of crop to sow
          density = 10  # Enter sowing density (plants/m2)
          depth = 50  # Enter sowing depth (mm)
          cultivar = co1  # Enter cultivar
          class = plant  # Enter crop growth class
          row_spacing = 500  # Enter row spacing (mm)
          on start_of_day:
          script: same as in Wheat.paddock.Manager folder.Sow on a fixed date
        manager Harvesting rule
          # Harvesting criteria
          crop = horsegram  # Enter name of crop to harvest when ripe
          on end_of_day:
          script: same as in Wheat.paddock.Manager folder.Harvesting rule
      outputfile: filename=Horsegram.out; title=Horsegram
        variables -> /simulations/Wheat/paddock/outputfile/Variables
        events Reporting Frequency -> /simulations/Wheat/paddock/outputfile/Reporting Frequency
      horsegram
  simulation LabLab -> /simulations/Wheat
    area paddock -> /simulations/Wheat/paddock
      folder Manager folder -> /simulations/Wheat/paddock/Manager folder
        manager Sow on a fixed date
          # Sowing criteria
          date = 1-dec  # Enter sowing date (dd-mmm)
          # Sowing parameters
          crop = lablab  # Enter name of crop to sow
          density = 10  # Enter sowing density (plants/m2)
          depth = 50  # Enter sowing depth (mm)
          cultivar = endurance  # Enter cultivar
          class = plant  # Enter crop growth class
          row_spacing = 500  # Enter row spacing (mm)
          on start_of_day:
          script: same as in Wheat.paddock.Manager folder.Sow on a fixed date
        manager Harvesting rule
          # Harvesting criteria
          crop = lablab  # Enter name of crop to harvest when ripe
          on end_of_day:
          script: same as in Wheat.paddock.Manager folder.Harvesting rule
      outputfile: filename=LabLab.out; title=LabLab
        variables -> /simulations/Wheat/paddock/outputfile/Variables
        events Reporting Frequency -> /simulations/Wheat/paddock/outputfile/Reporting Frequency
      lablab
  simulation Lettuce -> /simulations/Wheat
    area paddock -> /simulations/Wheat/paddock
      folder Manager folder -> /simulations/Wheat/paddock/Manager folder
        manager Sow on a fixed date
          # Sowing criteria
          date = 1-jun  # Enter sowing date (dd-mmm)
          # Sowing parameters
          crop = lettuce  # Enter name of crop to sow
          density = 6  # Enter sowing density (plants/m2)
          depth = 50  # Enter sowing depth (mm)
          cultivar = Titanic  # Enter cultivar
          class = plant  # Enter crop growth class
          row_spacing = 600  # Enter row spacing (mm)
          on start_of_day:
          script: same as in Wheat.paddock.Manager folder.Sow on a fixed date
        manager Harvest on a Growth Stage
          # Harvesting criteria
          stage = maturity  # Enter stage name
          # Harvesting parameters
          crop = lettuce  # Enter name of crop to sow
          on start_of_day:
```
        if ([crop].StageName = '[stage]') then
                    [crop] harvest
                    [crop] end_crop
        endif
```
      outputfile: filename=Lettuce.out; title=Lettuce
        variables -> /simulations/Wheat/paddock/outputfile/Variables
        events Reporting Frequency -> /simulations/Wheat/paddock/outputfile/Reporting Frequency
      lettuce
  simulation Lucerne -> /simulations/Wheat
    area paddock -> /simulations/Wheat/paddock
      folder Manager folder -> /simulations/Wheat/paddock/Manager folder
        manager Lucerne Ley fixed sow harvest at flowering
          # Sowing criteria
          date = 1-Jan-1988  # Enter sowing date (dd-mmm-yyyy)
          # Sowing parameters
          crop = lucerne  # Enter name of crop to sow
          density = 200  # Enter sowing density (plants/m2)
          depth = 20  # Enter sowing depth (mm)
          cultivar = trifecta  # Enter cultivar
          class = plant  # Enter crop growth class
          row_spacing = 250  # Enter row spacing (mm)
          # Number of years
          leyyears = 3  # Enter numberofyeasr inley
          # Harvesting criteria
          harvest_ht = 50  # Enter the height to harvest the crop
          remove = 0.95  # Fraction of maerial removed leaving the system (balance to residue)
          killdate = 15-Nov-1989  # date lucerne is to be removed
          on start_of_day:
```
       if (today = date('[date]') then
              [crop] sow plants =[density], sowing_depth = [depth], cultivar = [cultivar], row_spacing = [row_spacing], crop_class = [class]
              [crop]LeyYears = [leyyears]
       endif
```
          on end_of_day:
```
             if [crop].StageName = 'flowering'  then
                [crop]  harvest height = [harvest_ht], remove = [remove]
              endif
              if today= date('[killdate]') and [crop].plant_status <>'out' then
                   if ( [crop]LeyYears > 0 ) then
                         [crop]LeyYears = [crop]LeyYears - 1
                   else
                              [crop] end_crop
                   endif
              endif
```
        manager Harvesting rule
          # Harvesting criteria
          crop = lucerne  # Enter name of crop to harvest when ripe
          on end_of_day:
          script: same as in Wheat.paddock.Manager folder.Harvesting rule
      outputfile: filename=Lucerne.out; title=Lucerne
        variables -> /simulations/Wheat/paddock/outputfile/Variables
        events Reporting Frequency -> /simulations/Wheat/paddock/outputfile/Reporting Frequency
      lucerne
  simulation Lupin -> /simulations/Wheat
    area paddock -> /simulations/Wheat/paddock
      folder Manager folder -> /simulations/Wheat/paddock/Manager folder
        manager Sow on a fixed date
          # Sowing criteria
          date = 1-jun  # Enter sowing date (dd-mmm)
          # Sowing parameters
          crop = lupin  # Enter name of crop to sow
          density = 10  # Enter sowing density (plants/m2)
          depth = 50  # Enter sowing depth (mm)
          cultivar = merrit  # Enter cultivar
          class = plant  # Enter crop growth class
          row_spacing = 500  # Enter row spacing (mm)
          on start_of_day:
          script: same as in Wheat.paddock.Manager folder.Sow on a fixed date
        manager Harvesting rule
          # Harvesting criteria
          crop = lupin  # Enter name of crop to harvest when ripe
          on end_of_day:
          script: same as in Wheat.paddock.Manager folder.Harvesting rule
      outputfile: filename=Lupin.out; title=Lupin
        variables -> /simulations/Wheat/paddock/outputfile/Variables
        events Reporting Frequency -> /simulations/Wheat/paddock/outputfile/Reporting Frequency
      lupin
  simulation Mucuna -> /simulations/Wheat
    area paddock -> /simulations/Wheat/paddock
      folder Manager folder -> /simulations/Wheat/paddock/Manager folder
        manager Sow on a fixed date
          # Sowing criteria
          date = 1-dec  # Enter sowing date (dd-mmm)
          # Sowing parameters
          crop = mucuna  # Enter name of crop to sow
          density = 10  # Enter sowing density (plants/m2)
          depth = 50  # Enter sowing depth (mm)
          cultivar = mucuna_gen  # Enter cultivar
          class = plant  # Enter crop growth class
          row_spacing = 500  # Enter row spacing (mm)
          on start_of_day:
          script: same as in Wheat.paddock.Manager folder.Sow on a fixed date
        manager Harvesting rule
          # Harvesting criteria
          crop = mucuna  # Enter name of crop to harvest when ripe
          on end_of_day:
          script: same as in Wheat.paddock.Manager folder.Harvesting rule
      outputfile: filename=Mucuna.out; title=Mucuna
        variables -> /simulations/Wheat/paddock/outputfile/Variables
        events Reporting Frequency -> /simulations/Wheat/paddock/outputfile/Reporting Frequency
      mucuna
  simulation Mungbean -> /simulations/Wheat
    area paddock -> /simulations/Wheat/paddock
      folder Manager folder -> /simulations/Wheat/paddock/Manager folder
        manager Sow on a fixed date
          # Sowing criteria
          date = 1-dec  # Enter sowing date (dd-mmm)
          # Sowing parameters
          crop = mungbean  # Enter name of crop to sow
          density = 10  # Enter sowing density (plants/m2)
          depth = 50  # Enter sowing depth (mm)
          cultivar = shangtung  # Enter cultivar
          class = plant  # Enter crop growth class
          row_spacing = 500  # Enter row spacing (mm)
          on start_of_day:
          script: same as in Wheat.paddock.Manager folder.Sow on a fixed date
        manager Harvesting rule
          # Harvesting criteria
          crop = mungbean  # Enter name of crop to harvest when ripe
          on end_of_day:
          script: same as in Wheat.paddock.Manager folder.Harvesting rule
      outputfile: filename=Mungbean.out; title=Mungbean
        variables -> /simulations/Wheat/paddock/outputfile/Variables
        events Reporting Frequency -> /simulations/Wheat/paddock/outputfile/Reporting Frequency
      mungbean
  simulation Navybean -> /simulations/Wheat
    area paddock -> /simulations/Wheat/paddock
      folder Manager folder -> /simulations/Wheat/paddock/Manager folder
        manager Sow on a fixed date
          # Sowing criteria
          date = 1-dec  # Enter sowing date (dd-mmm)
          # Sowing parameters
          crop = navybean  # Enter name of crop to sow
          density = 10  # Enter sowing density (plants/m2)
          depth = 50  # Enter sowing depth (mm)
          cultivar = rainbird  # Enter cultivar
          class = plant  # Enter crop growth class
          row_spacing = 500  # Enter row spacing (mm)
          on start_of_day:
          script: same as in Wheat.paddock.Manager folder.Sow on a fixed date
        manager Harvesting rule
          # Harvesting criteria
          crop = navybean  # Enter name of crop to harvest when ripe
          on end_of_day:
          script: same as in Wheat.paddock.Manager folder.Harvesting rule
      outputfile: filename=Navybean.out; title=Navybean
        variables -> /simulations/Wheat/paddock/outputfile/Variables
        events Reporting Frequency -> /simulations/Wheat/paddock/outputfile/Reporting Frequency
      navybean
  simulation Oats -> /simulations/Wheat
    area paddock -> /simulations/Wheat/paddock
      folder Manager folder -> /simulations/Wheat/paddock/Manager folder
        manager Sow on a fixed date
          # Sowing criteria
          date = 1-jun  # Enter sowing date (dd-mmm)
          # Sowing parameters
          crop = Oats  # Enter name of crop to sow
          density = 10  # Enter sowing density (plants/m2)
          depth = 50  # Enter sowing depth (mm)
          cultivar = potoroo  # Enter cultivar
          class = plant  # Enter crop growth class
          row_spacing = 500  # Enter row spacing (mm)
          on start_of_day:
          script: same as in Wheat.paddock.Manager folder.Sow on a fixed date
        manager Harvesting rule
          # Harvesting criteria
          crop = oats  # Enter name of crop to harvest when ripe
          on end_of_day:
          script: same as in Wheat.paddock.Manager folder.Harvesting rule
      outputfile: filename=Oats.out; title=Oats
        variables -> /simulations/Wheat/paddock/outputfile/Variables
        events Reporting Frequency -> /simulations/Wheat/paddock/outputfile/Reporting Frequency
      oats
  simulation Peanut -> /simulations/Wheat
    area paddock -> /simulations/Wheat/paddock
      folder Manager folder -> /simulations/Wheat/paddock/Manager folder
        manager Sow on a fixed date
          # Sowing criteria
          date = 1-oct  # Enter sowing date (dd-mmm)
          # Sowing parameters
          crop = peanut  # Enter name of crop to sow
          density = 10  # Enter sowing density (plants/m2)
          depth = 50  # Enter sowing depth (mm)
          cultivar = mccubbin  # Enter cultivar
          class = plant  # Enter crop growth class
          row_spacing = 500  # Enter row spacing (mm)
          on start_of_day:
          script: same as in Wheat.paddock.Manager folder.Sow on a fixed date
        manager Harvesting rule
          # Harvesting criteria
          crop = peanut  # Enter name of crop to harvest when ripe
          on end_of_day:
          script: same as in Wheat.paddock.Manager folder.Harvesting rule
      outputfile: filename=Peanut.out; title=Peanut
        variables -> /simulations/Wheat/paddock/outputfile/Variables
        events Reporting Frequency -> /simulations/Wheat/paddock/outputfile/Reporting Frequency
      peanut
  simulation PigeonPea -> /simulations/Wheat
    area paddock -> /simulations/Wheat/paddock
      pigeonpea
      folder Manager folder -> /simulations/Wheat/paddock/Manager folder
        manager Sow on a fixed date
          # Sowing criteria
          date = 1-dec  # Enter sowing date (dd-mmm)
          # Sowing parameters
          crop = pigeonpea  # Enter name of crop to sow
          density = 10  # Enter sowing density (plants/m2)
          depth = 50  # Enter sowing depth (mm)
          cultivar = medium_duration  # Enter cultivar
          class = plant  # Enter crop growth class
          row_spacing = 500  # Enter row spacing (mm)
          on start_of_day:
          script: same as in Wheat.paddock.Manager folder.Sow on a fixed date
        manager Harvesting rule
          # Harvesting criteria
          crop = pigeonpea  # Enter name of crop to harvest when ripe
          on end_of_day:
          script: same as in Wheat.paddock.Manager folder.Harvesting rule
      outputfile: filename=PigeonPea.out; title=PigeonPea
        variables -> /simulations/Wheat/paddock/outputfile/Variables
        events Reporting Frequency -> /simulations/Wheat/paddock/outputfile/Reporting Frequency
  simulation Potato -> /simulations/Wheat
    area paddock -> /simulations/Wheat/paddock
      folder Manager folder -> /simulations/Wheat/paddock/Manager folder
        manager Sow on a fixed date
          # Sowing criteria
          date = 1-jun  # Enter sowing date (dd-mmm)
          # Sowing parameters
          crop = potato  # Enter name of crop to sow
          density = 5  # Enter sowing density (plants/m2)
          depth = 30  # Enter sowing depth (mm)
          cultivar = russet  # Enter cultivar
          class = plant  # Enter crop growth class
          row_spacing = 250  # Enter row spacing (mm)
          age = 1000  # Enter physiological age (deg days)
          on start_of_day:
          script: same as in Wheat.paddock.Manager folder.Sow on a fixed date
        manager Harvesting rule
          # Harvesting criteria
          crop = potato  # Enter name of crop to harvest when ripe
          on end_of_day:
```
           if [crop].StageName = 'maturity' or [crop].plant_status = 'dead' then
              [crop]  harvest
              [crop]  end_crop
           endif
```
      outputfile: filename=Potato.out; title=Potato
        variables -> /simulations/Wheat/paddock/outputfile/Variables
        events Reporting Frequency -> /simulations/Wheat/paddock/outputfile/Reporting Frequency
      potato
  simulation Soybean -> /simulations/Wheat
    area paddock -> /simulations/Wheat/paddock
      folder Manager folder -> /simulations/Wheat/paddock/Manager folder
        manager Sow on a fixed date
          # Sowing criteria
          date = 1-dec  # Enter sowing date (dd-mmm)
          # Sowing parameters
          crop = soybean  # Enter name of crop to sow
          density = 10  # Enter sowing density (plants/m2)
          depth = 50  # Enter sowing depth (mm)
          cultivar = buchanan  # Enter cultivar
          class = plant  # Enter crop growth class
          row_spacing = 500  # Enter row spacing (mm)
          on start_of_day:
          script: same as in Wheat.paddock.Manager folder.Sow on a fixed date
        manager Harvesting rule
          # Harvesting criteria
          crop = soybean  # Enter name of crop to harvest when ripe
          on end_of_day:
          script: same as in Wheat.paddock.Manager folder.Harvesting rule
      outputfile: filename=Soybean.out; title=Soybean
        variables -> /simulations/Wheat/paddock/outputfile/Variables
        events Reporting Frequency -> /simulations/Wheat/paddock/outputfile/Reporting Frequency
      soybean
  simulation Stylo -> /simulations/Wheat
    area paddock -> /simulations/Wheat/paddock
      folder Manager folder -> /simulations/Wheat/paddock/Manager folder
        manager Sow on a fixed date
          # Sowing criteria
          date = 1-dec  # Enter sowing date (dd-mmm)
          # Sowing parameters
          crop = stylo  # Enter name of crop to sow
          density = 10  # Enter sowing density (plants/m2)
          depth = 50  # Enter sowing depth (mm)
          cultivar = verano  # Enter cultivar
          class = plant  # Enter crop growth class
          row_spacing = 500  # Enter row spacing (mm)
          on start_of_day:
          script: same as in Wheat.paddock.Manager folder.Sow on a fixed date
        manager Harvesting rule
          # Harvesting criteria
          crop = stylo  # Enter name of crop to harvest when ripe
          on end_of_day:
          script: same as in Wheat.paddock.Manager folder.Harvesting rule
      outputfile: filename=Stylo.out; title=Stylo
        variables -> /simulations/Wheat/paddock/outputfile/Variables
        events Reporting Frequency -> /simulations/Wheat/paddock/outputfile/Reporting Frequency
      stylo
  simulation SweetCorn -> /simulations/Wheat
    area paddock -> /simulations/Wheat/paddock
      folder Manager folder -> /simulations/Wheat/paddock/Manager folder
        manager Sow on a fixed date
          # Sowing criteria
          date = 1-dec  # Enter sowing date (dd-mmm)
          # Sowing parameters
          crop = SweetCorn  # Enter name of crop to sow
          density = 10  # Enter sowing density (plants/m2)
          depth = 50  # Enter sowing depth (mm)
          cultivar = h5  # Enter cultivar
          class = plant  # Enter crop growth class
          row_spacing = 500  # Enter row spacing (mm)
          on start_of_day:
          script: same as in Wheat.paddock.Manager folder.Sow on a fixed date
        manager Harvesting rule
          # Harvesting criteria
          crop = SweetCorn  # Enter name of crop to harvest when ripe
          on end_of_day:
          script: same as in Wheat.paddock.Manager folder.Harvesting rule
      outputfile: filename=SweetCorn.out; title=SweetCorn
        variables -> /simulations/Wheat/paddock/outputfile/Variables
        events Reporting Frequency -> /simulations/Wheat/paddock/outputfile/Reporting Frequency
      SweetCorn
  simulation SweetSorghum -> /simulations/Wheat
    area paddock -> /simulations/Wheat/paddock
      folder Manager folder -> /simulations/Wheat/paddock/Manager folder
        manager Sow on a fixed date
          # Sowing criteria
          date = 1-dec  # Enter sowing date (dd-mmm)
          # Sowing parameters
          crop = SweetSorghum  # Enter name of crop to sow
          density = 10  # Enter sowing density (plants/m2)
          depth = 50  # Enter sowing depth (mm)
          cultivar = sugargraze  # Enter cultivar
          class = plant  # Enter crop growth class
          row_spacing = 500  # Enter row spacing (mm)
          on start_of_day:
          script: same as in Wheat.paddock.Manager folder.Sow on a fixed date
        manager Harvesting rule
          # Harvesting criteria
          crop = SweetSorghum  # Enter name of crop to harvest when ripe
          on end_of_day:
          script: same as in Wheat.paddock.Manager folder.Harvesting rule
      outputfile: filename=SweetSorghum.out; title=SweetSorghum
        variables -> /simulations/Wheat/paddock/outputfile/Variables
        events Reporting Frequency -> /simulations/Wheat/paddock/outputfile/Reporting Frequency
      SweetSorghum
  simulation Weed -> /simulations/Wheat
    area paddock -> /simulations/Wheat/paddock
      folder Manager folder -> /simulations/Wheat/paddock/Manager folder
        manager Sow on a fixed date
          # Sowing criteria
          date = 1-jun  # Enter sowing date (dd-mmm)
          # Sowing parameters
          crop = weed  # Enter name of crop to sow
          density = 10  # Enter sowing density (plants/m2)
          depth = 50  # Enter sowing depth (mm)
          cultivar = late  # Enter cultivar
          class = winter_dicot  # Enter crop growth class
          row_spacing = 500  # Enter row spacing (mm)
          on start_of_day:
          script: same as in Wheat.paddock.Manager folder.Sow on a fixed date
        manager Harvesting rule
          # Harvesting criteria
          crop = weed  # Enter name of crop to harvest when ripe
          on end_of_day:
          script: same as in Wheat.paddock.Manager folder.Harvesting rule
      outputfile: filename=Weed.out; title=Weed
        variables -> /simulations/Wheat/paddock/outputfile/Variables
        events Reporting Frequency -> /simulations/Wheat/paddock/outputfile/Reporting Frequency
      weed
  simulation WheatWithSetEmergenceDate -> /simulations/Wheat
    area paddock -> /simulations/Wheat/paddock
      folder Manager folder -> /simulations/Wheat/paddock/Manager folder
        manager Sow on a fixed date
          # Sowing criteria
          date = 1-jun  # Enter sowing date (dd-mmm)
          # Sowing parameters
          crop = wheat  # Enter name of crop to sow
          density = 10  # Enter sowing density (plants/m2)
          depth = 50  # Enter sowing depth (mm)
          cultivar = hartog  # Enter cultivar
          class = plant  # Enter crop growth class
          row_spacing = 500  # Enter row spacing (mm)
          on start_of_day:
```
        if (today = date('[date]') then
              [crop] sow plants =[density], sowing_depth = [depth], cultivar = [cultivar], row_spacing = [row_spacing], crop_class = [class]
              [crop].DaysToGermination = 35
              [crop].DaysToEmergence = 40
        endif
```
      outputfile -> /simulations/Wheat/paddock/outputfile: filename=WheatWithSetEmergenceDate.out; title=WheatWithSetEmergenceDate
        variables -> /simulations/Wheat/paddock/outputfile/Variables
        events Reporting Frequency -> /simulations/Wheat/paddock/outputfile/Reporting Frequency
  simulation WheatWithMaxRootDepth -> /simulations/Wheat
    area paddock -> /simulations/Wheat/paddock
      wheat
        ModifyKL = yes  # Modify KL using CL, EC or ESP if found?
        MaxRootDepth = 600  # Maximum rooting depth (mm) 0=no restriction
      folder Manager folder -> /simulations/Wheat/paddock/Manager folder
        manager Sow on a fixed date: same as WheatWithSetEmergenceDate.paddock.Manager folder.Sow on a fixed date
      outputfile -> /simulations/Wheat/paddock/outputfile: filename=WheatWithMaxRootDepth.out; title=WheatWithMaxRootDepth
        variables
          variables: dd/mm/yyyy as Date, root_depth
        events Reporting Frequency -> /simulations/Wheat/paddock/outputfile/Reporting Frequency
