folder Simulations: version=23
  folder FUE
    simulation FUE_150early -> /Simulations/FUE/FUE_300early
      area paddock -> /Simulations/FUE/FUE_300early/paddock
        folder Manager folder -> /Simulations/FUE/FUE_300early/paddock/Manager folder
          operations
            19/10/1999  fertiliser apply amount= 150 (kg/ha), type= urea_N (), depth= 10 (mm)
            9/12/1999  irrigation apply amount= 55 (mm)
            23/12/1999  irrigation apply amount= 25 (mm)
            30/12/1999  irrigation apply amount= 25 (mm)
            21/01/2000  irrigation apply amount= 38 (mm)
            10/02/2000  irrigation apply amount= 50 (mm)
            16/02/2000  irrigation apply amount= 25 (mm)
            1/03/2000  irrigation apply amount= 38 (mm)
    simulation FUE_275split -> /Simulations/FUE/FUE_300early
      area paddock -> /Simulations/FUE/FUE_300early/paddock
        folder Manager folder -> /Simulations/FUE/FUE_300early/paddock/Manager folder
          operations
            19/10/1999  fertiliser apply amount= 100 (kg/ha), type= urea_N (), depth= 10 (mm)
            1/12/1999  fertiliser apply amount= 25 (kg/ha), type= urea_N (), depth= 10 (mm)
            9/12/1999  irrigation apply amount= 55 (mm)
            23/12/1999  irrigation apply amount= 25 (mm)
            30/12/1999  irrigation apply amount= 25 (mm)
            21/01/2000  irrigation apply amount= 38 (mm)
            10/02/2000  irrigation apply amount= 50 (mm)
            16/02/2000  irrigation apply amount= 25 (mm)
            1/03/2000  irrigation apply amount= 38 (mm)
            13/12/1999  fertiliser apply amount= 25 (kg/ha), type= urea_N (), depth= 10 (mm)
            17/01/2000  fertiliser apply amount= 13 (kg/ha), type= urea_N (), depth= 10 (mm)
            21/01/2000  fertiliser apply amount= 13 (kg/ha), type= urea_N (), depth= 10 (mm)
            24/01/2000  fertiliser apply amount= 13 (kg/ha), type= urea_N (), depth= 10 (mm)
            31/01/2000  fertiliser apply amount= 13 (kg/ha), type= urea_N (), depth= 10 (mm)
            7/02/2000  fertiliser apply amount= 13 (kg/ha), type= urea_N (), depth= 10 (mm)
            14/02/2000  fertiliser apply amount= 13 (kg/ha), type= urea_N (), depth= 10 (mm)
            21/02/2000  fertiliser apply amount= 13 (kg/ha), type= urea_N (), depth= 10 (mm)
            28/02/2000  fertiliser apply amount= 13 (kg/ha), type= urea_N (), depth= 10 (mm)
            6/03/2000  fertiliser apply amount= 13 (kg/ha), type= urea_N (), depth= 10 (mm)
            13/03/2000  fertiliser apply amount= 13 (kg/ha), type= urea_N (), depth= 10 (mm)
            20/03/2000  fertiliser apply amount= 13 (kg/ha), type= urea_N (), depth= 10 (mm)
            27/03/2000  fertiliser apply amount= 13 (kg/ha), type= urea_N (), depth= 10 (mm)
    simulation FUE_300early
      metfile met: filename=lincoln.met
      clock
        start_date = 18/10/1999  # Enter the start date of the simulation
        end_date = 1/06/2000  # Enter the end date of the simulation
      summaryfile: filename=Continuous Wheat Simulation.sum
      area paddock
        fertiliser
        surfaceom surface organic matter
          PoolName = wheat  # Organic Matter pool name
          type = wheat  # Organic Matter type
          mass = 2000  # Initial surface residue (kg/ha)
          cnr = 80  # C:N ratio of initial residue
          standing_fraction = 0  # Fraction of residue standing
        folder Manager folder
          manager Sowing rule
            category =  # Sowing criteria
            date1 = 19-oct  # Enter sowing window START date (dd-mmm)
            date2 = 19-oct  # Enter sowing window END date (dd-mmm)
            must_sow = yes  # Must sow?
            raincrit = 10  # Amount of rainfall
            rainnumdays = 7  # Number of days of rainfall
            esw_amount = 10  # Enter minimum allowable available soil water (mm)
            category =  # Sowing parameters
            crop = potato2  # Enter name of crop to sow
            seeds = 6  # Enter sowing density (seeds/m2)
            depth = 150  # Enter sowing depth (mm)
            cultivar = russet  # Enter cultivar
            class = plant  # Enter crop growth class
            age = 1000  # Enter physiological age (deg days)
            row_spacing = 650  # Enter row spacing (mm)
            on start_of_day:
```
      if (paddock_is_fallow() = 1 ) then
         if (date_within('[date1], [date2]') = 1) then
            if (rain[[rainnumdays]] >= [raincrit] AND esw >= [esw_amount]) OR
                ('[must_sow]' = 'yes' AND today = date('[date2]'))) THEN
               ChooseNextCrop = 'yes'   ! for rotations
               stf = st(1) / 10.
               if (stf < 0) then
                  stf = 0
               endif
               if (stf > 1) then
                  stf = 1
               endif               
               swf = (sw(1) - ll(1))/(dul(1) - ll(1))
               if (swf < 0) then
                  swf = 0
               endif
               if (swf > 1) then
                  swf = 1
               endif
               density = [seeds]*4 !* [age]/2000. * stf * swf
               potato2 sow population =density, depth = 200, cultivar = russet, maxcover = 1.0, budnumber = 1, row_spacing = 650, crop_class = plant  
            endif
         endif
      endif
```
          manager Harvesting rule
            category =  # Harvesting criteria
            crop = potato2  # Enter name of crop to harvest when ripe
            on end_of_day:
```
           if [crop].PhenologyCurrentPhaseName = 'maturity' or [crop].plant_status = 'dead' then
              [crop]  harvest
              [crop]  end_crop
           endif
```
          operations
            19/10/1999  fertiliser apply amount= 150 (kg/ha), type= urea_N (), depth= 10 (mm)
            1/12/1999  fertiliser apply amount= 150 (kg/ha), type= urea_N (), depth= 10 (mm)
            9/12/1999  irrigation apply amount= 55 (mm)
            23/12/1999  irrigation apply amount= 25 (mm)
            30/12/1999  irrigation apply amount= 25 (mm)
            21/01/2000  irrigation apply amount= 38 (mm)
            10/02/2000  irrigation apply amount= 50 (mm)
            16/02/2000  irrigation apply amount= 25 (mm)
            1/03/2000  irrigation apply amount= 38 (mm)
          irrigation
            automatic_irrigation = off
            asw_depth = 600  # Depth to which ASW is calculated. (mm)
            crit_fr_asw = 0.5  # Fraction of ASW below which irrigation is applied (0-1.0)
            irrigation_efficiency = 1  # Efficiency of the irrigation. (0-1.0)
            irrigation_allocation = off  # Allocation limits
            allocation = 0  # Allocation in ML
            default_no3_conc = 0  # Nitrate concentration (ppm N)
            default_nh4_conc = 0  # Ammonium concentration (ppm N)
            default_cl_conc = 0  # Chloride concentration (ppm Cl)
            default_no3_conc = 0  # Nitrate concentration (ppm N)
            default_nh4_conc = 0  # Ammonium concentration (ppm N)
            default_cl_conc = 0  # Chloride concentration (ppm Cl)
        outputfile
          events Reporting Frequency: event=Daily
          variables
            variables: dd/mmm/yyyy, biomass, leaflivewt2, leafliven2, leafdeadwt2, stemlivewt, stemliven, tuberlivewt, TuberliveN, nfact_expan, nfact_photo, LeafLAI, Cover_tot, PhenologyCurrentPhaseName, tt, Leafnodeno, LeafHeightValue, Leafnodeno_fx, Leafnodeno_sen, ttafteremergence, ttaftersowing, dlt_LeafLAI_carbon, dlt_LeafLAI_pot, no3(), swdef_photo, rootdepth, no3_demand
        soil Templeton
          InitWater Initial water
            PercentMethod: Percent=1.00; Distributed=Evenly distributed
          Water
            Layer:
              Thickness (mm)  BD (g/cc)  AirDry (mm/mm)  LL15 (mm/mm)  DUL (mm/mm)  SAT (mm/mm)
              100             1.2        0.08            0.13          0.33         0.5
              200             1.2        0.08            0.13          0.33         0.5
              300             1.2        0.05            0.1           0.31         0.44
              300             1.2        0.04            0.08          0.27         0.46
              300             1.2        0.06            0.11          0.3          0.44
              300             1.2        0.06            0.11          0.3          0.44
            SoilCrop wheat
              Layer:
                Thickness (mm)  LL (mm/mm)  KL (/day)  XF (0-1)
                100             0.13        0.06       1
                200             0.13        0.06       1
                300             0.1         0.06       1
                300             0.08        0.06       1
                300             0.11        0.06       1
                300             0.11        0.06       1
            SoilCrop potato2
              Layer:
                Thickness (mm)  LL (mm/mm)  KL (/day)  XF (0-1)
                100             0.13        0.1        1
                200             0.13        0.1        1
                300             0.1         0.07       1
                300             0.15        0.05       1
                300             0.3         0.05       0
                300             0.3         0.05       0
          SoilWat: SummerCona=4.4; WinterCona=4.4; SummerU=9; WinterU=9; SummerDate=1-Nov; WinterDate=1-Apr; DiffusConst=88; DiffusSlope=35.4; Salb=0.18; CN2Bare=68; CNRed=20; CNCov=0.8
            Layer:
              Thickness (mm)  SWCON (0-1)
              100             0.55
              200             0.55
              300             0.55
              300             0.55
              300             0.55
              300             0.55
          SoilOrganicMatter: RootCN=30; RootWT=3000; SoilCN=11.5; EnrACoeff=7.4; EnrBCoeff=0.2
            Layer:
              Thickness (mm)  OC (Total %)  FBiom (0-1)  FInert (0-1)
              100             1.82          0.025        0.3
              200             1.47          0.025        0.4
              300             1.2           0.015        0.75
              300             1.03          0.01         0.9
              300             0.47          0.01         0.96
              300             0.47          0.01         0.96
          Lab
            Layer:
              Thickness (mm)  PH (1:5 water)
              100             6.6
              200             6.2
              300             5.7
              300             5.5
              300             5.5
              300             5.5
          Sample Initial nitrogen
            Layer:
              Thickness (mm)  NO3 (ppm)  NH4 (ppm)
              100             33.3333    0.1
              200             22.5       0.1
              300             1.38889    0.1
              300             1.38889    0.1
              300             1.38889    0.1
              300             1.38889    0.1
        potato2
          ini: filename=%apsim%\Model\Potato2.xml
        micromet
          soilalbedo = 0.23
          a_interception = 0
          b_interception = 0
          c_interception = 0
          d_interception = 0
          ini: filename=%apsim%\Model\micromet.xml
    simulation FUE_nil -> /Simulations/FUE/FUE_300early
      area paddock -> /Simulations/FUE/FUE_300early/paddock
        folder Manager folder -> /Simulations/FUE/FUE_300early/paddock/Manager folder
          operations
            19/10/1999  fertiliser apply amount= 0 (kg/ha), type= urea_N (), depth= 10 (mm)
            1/12/1999  fertiliser apply amount= 0 (kg/ha), type= urea_N (), depth= 10 (mm)
            9/12/1999  irrigation apply amount= 55 (mm)
            23/12/1999  irrigation apply amount= 25 (mm)
            30/12/1999  irrigation apply amount= 25 (mm)
            21/01/2000  irrigation apply amount= 38 (mm)
            10/02/2000  irrigation apply amount= 50 (mm)
            16/02/2000  irrigation apply amount= 25 (mm)
            1/03/2000  irrigation apply amount= 38 (mm)
  folder Baxters
    simulation Baxters_14Oct_4
      metfile met: filename=lincoln.met
      clock
        start_date = 14/10/1998  # Enter the start date of the simulation
        end_date = 1/06/1999  # Enter the end date of the simulation
      summaryfile: filename=Continuous Wheat Simulation.sum
      area paddock
        fertiliser
        surfaceom surface organic matter
          PoolName = wheat  # Organic Matter pool name
          type = wheat  # Organic Matter type
          mass = 2000  # Initial surface residue (kg/ha)
          cnr = 80  # C:N ratio of initial residue
          standing_fraction = 0  # Fraction of residue standing
        folder Manager folder
          manager Harvesting rule
            category =  # Harvesting criteria
            crop = potato2  # Enter name of crop to harvest when ripe
            on end_of_day:
```
           if [crop].PhenologyCurrentPhaseName = 'maturity' or [crop].plant_status = 'dead' then
              [crop]  harvest
              [crop]  end_crop
           endif

if stagecodevalue >=3 then
Tt_emerge = Tt_emerge + PhenologyThermalTimeValue            
endif
```
          operations
            2/10/1998  irrigation apply amount= 40 (mm)
            26/10/1998  irrigation apply amount= 70 (mm)
            15/12/1998  irrigation apply amount= 70 (mm)
            29/12/1998  irrigation apply amount= 10 (mm)
            30/12/1998  irrigation apply amount= 55 (mm)
            7/01/1999  irrigation apply amount= 50 (mm)
            21/01/1999  irrigation apply amount= 40 (mm)
            10/02/1999  irrigation apply amount= 28 (mm)
            19/02/1999  irrigation apply amount= 15 (mm)
            9/03/1999  irrigation apply amount= 25 (mm)
            29/12/1998  fertiliser apply amount= 150 (kg/ha), type= urea_N (), depth= 10 (mm)
          irrigation: same as FUE.FUE_300early.paddock.Manager folder.Irrigation
          manager Sowing rule
            category =  # Sowing criteria
            date1 = 14-oct  # Enter sowing window START date (dd-mmm)
            date2 = 14-oct  # Enter sowing window END date (dd-mmm)
            must_sow = yes  # Must sow?
            raincrit = 10  # Amount of rainfall
            rainnumdays = 7  # Number of days of rainfall
            esw_amount = 10  # Enter minimum allowable available soil water (mm)
            category =  # Sowing parameters
            crop = potato2  # Enter name of crop to sow
            seeds = 4.3  # Enter sowing density (seeds/m2)
            depth = 150  # Enter sowing depth (mm)
            cultivar = russet  # Enter cultivar
            class = plant  # Enter crop growth class
            age = 1000  # Enter physiological age (deg days)
            row_spacing = 650  # Enter row spacing (mm)
            on start_of_day:
            script: same as in FUE.FUE_300early.paddock.Manager folder.Sowing rule
        outputfile
          events Reporting Frequency: event=Daily
          variables
            variables: dd/mmm/yyyy, biomass, leaflivewt2, leafliven2, leafdeadwt2, stemlivewt, stemliven, tuberlivewt, TuberliveN, nfact_expan, nfact_photo, LeafLAI, Cover_tot, PhenologyCurrentPhaseName, tt, Leafnodeno, stagecodevalue, leafsize, LeafDeadNodeNo, PhenologyThermalTimeValue, tt_emerge
        soil Baxters_compact
          InitWater Initial water
            PercentMethod: Percent=1.00; Distributed=Evenly distributed
          Water
            Layer:
              Thickness (mm)  BD (g/cc)  AirDry (mm/mm)  LL15 (mm/mm)  DUL (mm/mm)  SAT (mm/mm)
              100             1.2        0.08            0.13          0.33         0.5
              200             1.2        0.08            0.13          0.33         0.5
              300             1.2        0.05            0.1           0.31         0.44
              300             1.2        0.04            0.08          0.27         0.46
              300             1.2        0.06            0.11          0.3          0.44
              300             1.2        0.06            0.11          0.3          0.44
            SoilCrop wheat: same as FUE.FUE_300early.paddock.Templeton.Water.wheat
            SoilCrop potato2
              Layer:
                Thickness (mm)  LL (mm/mm)  KL (/day)  XF (0-1)
                100             0.13        0.1        1
                200             0.13        0.1        1
                300             0.27        0.07       0.1
                300             0.27        0.05       0
                300             0.3         0.05       0
                300             0.3         0.05       0
          SoilWat: same as FUE.FUE_300early.paddock.Templeton.SoilWat
          SoilOrganicMatter: same as FUE.FUE_300early.paddock.Templeton.SoilOrganicMatter
          Lab
            Layer:
              Thickness (mm)  PH (1:5 water)
              100             6.6
              200             6.2
              300             5.7
              300             5.5
              300             5.5
              300             5.5
          Sample Initial nitrogen
            Layer:
              Thickness (mm)  NO3 (ppm)  NH4 (ppm)
              100             125        0
              200             27.9167    0
              300             8.33333    0
              300             1.38889    0
              300             0          0
              300             0          0
        micromet -> /Simulations/FUE/FUE_300early/paddock/Micromet
        potato2 -> /Simulations/FUE/FUE_300early/paddock/potato2
    simulation Baxters_14Oct_2 -> /Simulations/Baxters/Baxters_14Oct_4
      area paddock -> /Simulations/Baxters/Baxters_14Oct_4/paddock
        folder Manager folder -> /Simulations/Baxters/Baxters_14Oct_4/paddock/Manager folder
          manager Sowing rule
            category =  # Sowing criteria
            date1 = 14-oct  # Enter sowing window START date (dd-mmm)
            date2 = 14-oct  # Enter sowing window END date (dd-mmm)
            must_sow = yes  # Must sow?
            raincrit = 10  # Amount of rainfall
            rainnumdays = 7  # Number of days of rainfall
            esw_amount = 10  # Enter minimum allowable available soil water (mm)
            category =  # Sowing parameters
            crop = potato2  # Enter name of crop to sow
            seeds = 2.16  # Enter sowing density (seeds/m2)
            depth = 150  # Enter sowing depth (mm)
            cultivar = russet  # Enter cultivar
            class = plant  # Enter crop growth class
            age = 1000  # Enter physiological age (deg days)
            row_spacing = 650  # Enter row spacing (mm)
            on start_of_day:
            script: same as in FUE.FUE_300early.paddock.Manager folder.Sowing rule
    simulation Baxters_2Nov_4 -> /Simulations/Baxters/Baxters_14Oct_4
      clock
        start_date = 02/11/1998  # Enter the start date of the simulation
        end_date = 01/06/1999  # Enter the end date of the simulation
      area paddock -> /Simulations/Baxters/Baxters_14Oct_4/paddock
        folder Manager folder -> /Simulations/Baxters/Baxters_14Oct_4/paddock/Manager folder
          manager Sowing rule
            category =  # Sowing criteria
            date1 = 2-nov  # Enter sowing window START date (dd-mmm)
            date2 = 2-nov  # Enter sowing window END date (dd-mmm)
            must_sow = yes  # Must sow?
            raincrit = 10  # Amount of rainfall
            rainnumdays = 7  # Number of days of rainfall
            esw_amount = 10  # Enter minimum allowable available soil water (mm)
            category =  # Sowing parameters
            crop = potato2  # Enter name of crop to sow
            seeds = 4.3  # Enter sowing density (seeds/m2)
            depth = 150  # Enter sowing depth (mm)
            cultivar = russet  # Enter cultivar
            class = plant  # Enter crop growth class
            age = 1000  # Enter physiological age (deg days)
            row_spacing = 650  # Enter row spacing (mm)
            on start_of_day:
            script: same as in FUE.FUE_300early.paddock.Manager folder.Sowing rule
    simulation Baxters_2Nov_2 -> /Simulations/Baxters/Baxters_14Oct_4
      clock
        start_date = 02/11/1998  # Enter the start date of the simulation
        end_date = 01/06/1999  # Enter the end date of the simulation
      area paddock -> /Simulations/Baxters/Baxters_14Oct_4/paddock
        folder Manager folder -> /Simulations/Baxters/Baxters_14Oct_4/paddock/Manager folder
          manager Sowing rule
            category =  # Sowing criteria
            date1 = 2-nov  # Enter sowing window START date (dd-mmm)
            date2 = 2-nov  # Enter sowing window END date (dd-mmm)
            must_sow = yes  # Must sow?
            raincrit = 10  # Amount of rainfall
            rainnumdays = 7  # Number of days of rainfall
            esw_amount = 10  # Enter minimum allowable available soil water (mm)
            category =  # Sowing parameters
            crop = potato2  # Enter name of crop to sow
            seeds = 2.16  # Enter sowing density (seeds/m2)
            depth = 150  # Enter sowing depth (mm)
            cultivar = russet  # Enter cultivar
            class = plant  # Enter crop growth class
            age = 1000  # Enter physiological age (deg days)
            row_spacing = 650  # Enter row spacing (mm)
            on start_of_day:
            script: same as in FUE.FUE_300early.paddock.Manager folder.Sowing rule
    simulation Baxters_23Nov_4 -> /Simulations/Baxters/Baxters_14Oct_4
      clock
        start_date = 23/11/1998  # Enter the start date of the simulation
        end_date = 01/06/1999  # Enter the end date of the simulation
      area paddock -> /Simulations/Baxters/Baxters_14Oct_4/paddock
        folder Manager folder -> /Simulations/Baxters/Baxters_14Oct_4/paddock/Manager folder
          manager Sowing rule
            category =  # Sowing criteria
            date1 = 23-nov  # Enter sowing window START date (dd-mmm)
            date2 = 23-nov  # Enter sowing window END date (dd-mmm)
            must_sow = yes  # Must sow?
            raincrit = 10  # Amount of rainfall
            rainnumdays = 7  # Number of days of rainfall
            esw_amount = 10  # Enter minimum allowable available soil water (mm)
            category =  # Sowing parameters
            crop = potato2  # Enter name of crop to sow
            seeds = 4.3  # Enter sowing density (seeds/m2)
            depth = 150  # Enter sowing depth (mm)
            cultivar = russet  # Enter cultivar
            class = plant  # Enter crop growth class
            age = 1000  # Enter physiological age (deg days)
            row_spacing = 650  # Enter row spacing (mm)
            on start_of_day:
            script: same as in FUE.FUE_300early.paddock.Manager folder.Sowing rule
    simulation Baxters_23Nov_2 -> /Simulations/Baxters/Baxters_14Oct_4
      clock
        start_date = 23/11/1998  # Enter the start date of the simulation
        end_date = 01/06/1999  # Enter the end date of the simulation
      area paddock -> /Simulations/Baxters/Baxters_14Oct_4/paddock
        folder Manager folder -> /Simulations/Baxters/Baxters_14Oct_4/paddock/Manager folder
          manager Sowing rule
            category =  # Sowing criteria
            date1 = 23-nov  # Enter sowing window START date (dd-mmm)
            date2 = 23-nov  # Enter sowing window END date (dd-mmm)
            must_sow = yes  # Must sow?
            raincrit = 10  # Amount of rainfall
            rainnumdays = 7  # Number of days of rainfall
            esw_amount = 10  # Enter minimum allowable available soil water (mm)
            category =  # Sowing parameters
            crop = potato2  # Enter name of crop to sow
            seeds = 2.16  # Enter sowing density (seeds/m2)
            depth = 150  # Enter sowing depth (mm)
            cultivar = russet  # Enter cultivar
            class = plant  # Enter crop growth class
            age = 1000  # Enter physiological age (deg days)
            row_spacing = 650  # Enter row spacing (mm)
            on start_of_day:
            script: same as in FUE.FUE_300early.paddock.Manager folder.Sowing rule
    memo
      Sowing 1 emerged 16 Nov
      Sowing 2 emerged 1 Dec
      Sowing 3 emerged 14 Dec
  folder PYM
    simulation PYM_Nov98
      metfile met: filename=LawnRoad.met
      clock
        start_date = 15/11/1998  # Enter the start date of the simulation
        end_date = 1/06/1999  # Enter the end date of the simulation
      summaryfile: filename=Continuous Wheat Simulation.sum
      area paddock
        fertiliser
        surfaceom surface organic matter
          PoolName = wheat  # Organic Matter pool name
          type = wheat  # Organic Matter type
          mass = 2000  # Initial surface residue (kg/ha)
          cnr = 80  # C:N ratio of initial residue
          standing_fraction = 0  # Fraction of residue standing
        folder Manager folder
          manager Sowing rule
            category =  # Sowing criteria
            date1 = 16-nov  # Enter sowing window START date (dd-mmm)
            date2 = 16-nov  # Enter sowing window END date (dd-mmm)
            must_sow = yes  # Must sow?
            raincrit = 10  # Amount of rainfall
            rainnumdays = 7  # Number of days of rainfall
            esw_amount = 10  # Enter minimum allowable available soil water (mm)
            category =  # Sowing parameters
            crop = potato2  # Enter name of crop to sow
            seeds = 5  # Enter sowing density (seeds/m2)
            depth = 30  # Enter sowing depth (mm)
            cultivar = russet  # Enter cultivar
            class = plant  # Enter crop growth class
            age = 1000  # Enter physiological age (deg days)
            row_spacing = 650  # Enter row spacing (mm)
            on start_of_day:
            script: same as in FUE.FUE_300early.paddock.Manager folder.Sowing rule
          manager Harvesting rule
            category =  # Harvesting criteria
            crop = potato2  # Enter name of crop to harvest when ripe
            on end_of_day:
            script: same as in FUE.FUE_300early.paddock.Manager folder.Harvesting rule
          operations
            16/11/1998  fertiliser apply amount= 120 (kg/ha), type= urea_N (), depth= 10 (mm)
            18/12/1998  irrigation apply amount= 30 (mm)
            22/12/1998  irrigation apply amount= 30 (mm)
            27/12/1998  irrigation apply amount= 30 (mm)
            1/01/1999  irrigation apply amount= 30 (mm)
            5/01/1999  irrigation apply amount= 30 (mm)
            10/01/1999  irrigation apply amount= 30 (mm)
            10/02/1999  irrigation apply amount= 30 (mm)
            15/02/1999  irrigation apply amount= 30 (mm)
            18/02/1999  fertiliser apply amount= 40 (kg/ha), type= urea_N (), depth= 10 (mm)
            21/02/1999  irrigation apply amount= 30 (mm)
            27/02/1999  irrigation apply amount= 30 (mm)
            25/03/1999  irrigation apply amount= 30 (mm)
          irrigation: same as FUE.FUE_300early.paddock.Manager folder.Irrigation
        outputfile
          events Reporting Frequency -> /Simulations/FUE/FUE_300early/paddock/outputfile/Reporting Frequency
          variables -> /Simulations/FUE/FUE_300early/paddock/outputfile/Variables
        soil Templeton
          InitWater Initial water
            PercentMethod: Percent=1.00; Distributed=Evenly distributed
          Water
            Layer:
              Thickness (mm)  BD (g/cc)  AirDry (mm/mm)  LL15 (mm/mm)  DUL (mm/mm)  SAT (mm/mm)
              100             1.2        0.08            0.13          0.33         0.5
              200             1.2        0.08            0.13          0.33         0.5
              300             1.2        0.05            0.1           0.31         0.44
              300             1.2        0.04            0.08          0.27         0.46
              300             1.2        0.06            0.11          0.3          0.44
              300             1.2        0.06            0.11          0.3          0.44
            SoilCrop wheat: same as FUE.FUE_300early.paddock.Templeton.Water.wheat
            SoilCrop potato2
              Layer:
                Thickness (mm)  LL (mm/mm)  KL (/day)  XF (0-1)
                100             0.13        0.1        1
                200             0.13        0.1        1
                300             0.1         0.07       1
                300             0.08        0.05       1
                300             0.11        0.05       1
                300             0.11        0.05       1
          SoilWat: same as FUE.FUE_300early.paddock.Templeton.SoilWat
          SoilOrganicMatter: same as FUE.FUE_300early.paddock.Templeton.SoilOrganicMatter
          Lab
            Layer:
              Thickness (mm)  PH (1:5 water)
              100             6.6
              200             6.2
              300             5.7
              300             5.5
              300             5.5
              300             5.5
          Sample Initial nitrogen
            Layer:
              Thickness (mm)  NO3 (ppm)  NH4 (ppm)
              100             41.6667    0.1
              200             20         0.1
              300             1.38889    0.1
              300             1.38889    0.1
              300             1.38889    0.1
              300             1.38889    0.1
        micromet -> /Simulations/FUE/FUE_300early/paddock/Micromet
        potato2 -> /Simulations/FUE/FUE_300early/paddock/potato2
    simulation PYM_Dec98 -> /Simulations/PYM/PYM_Nov98
      area paddock -> /Simulations/PYM/PYM_Nov98/paddock
        folder Manager folder -> /Simulations/PYM/PYM_Nov98/paddock/Manager folder
          manager Sowing rule
            category =  # Sowing criteria
            date1 = 14-dec  # Enter sowing window START date (dd-mmm)
            date2 = 14-dec  # Enter sowing window END date (dd-mmm)
            must_sow = yes  # Must sow?
            raincrit = 10  # Amount of rainfall
            rainnumdays = 7  # Number of days of rainfall
            esw_amount = 10  # Enter minimum allowable available soil water (mm)
            category =  # Sowing parameters
            crop = potato2  # Enter name of crop to sow
            seeds = 5  # Enter sowing density (seeds/m2)
            depth = 30  # Enter sowing depth (mm)
            cultivar = russet  # Enter cultivar
            class = plant  # Enter crop growth class
            age = 1000  # Enter physiological age (deg days)
            row_spacing = 650  # Enter row spacing (mm)
            on start_of_day:
            script: same as in FUE.FUE_300early.paddock.Manager folder.Sowing rule
          operations
            14/12/1998  fertiliser apply amount= 120 (kg/ha), type= urea_N (), depth= 10 (mm)
            8/01/1999  irrigation apply amount= 30 (mm)
            13/01/1999  irrigation apply amount= 30 (mm)
            7/02/1999  irrigation apply amount= 30 (mm)
            15/02/1999  irrigation apply amount= 30 (mm)
            18/02/1999  fertiliser apply amount= 40 (kg/ha), type= urea_N (), depth= 10 (mm)
            20/02/1999  irrigation apply amount= 30 (mm)
            27/02/1999  irrigation apply amount= 30 (mm)
            6/03/1999  irrigation apply amount= 30 (mm)
            27/03/1999  irrigation apply amount= 30 (mm)
    simulation PYM_Oct99 -> /Simulations/PYM/PYM_Dec98
      clock
        start_date = 13/10/1999  # Enter the start date of the simulation
        end_date = 1/06/2000  # Enter the end date of the simulation
      area paddock -> /Simulations/PYM/PYM_Dec98/paddock
        folder Manager folder -> /Simulations/PYM/PYM_Dec98/paddock/Manager folder
          manager Sowing rule
            category =  # Sowing criteria
            date1 = 14-oct  # Enter sowing window START date (dd-mmm)
            date2 = 14-oct  # Enter sowing window END date (dd-mmm)
            must_sow = yes  # Must sow?
            raincrit = 10  # Amount of rainfall
            rainnumdays = 7  # Number of days of rainfall
            esw_amount = 10  # Enter minimum allowable available soil water (mm)
            category =  # Sowing parameters
            crop = potato2  # Enter name of crop to sow
            seeds = 5  # Enter sowing density (seeds/m2)
            depth = 30  # Enter sowing depth (mm)
            cultivar = russet  # Enter cultivar
            class = plant  # Enter crop growth class
            age = 1000  # Enter physiological age (deg days)
            row_spacing = 650  # Enter row spacing (mm)
            on start_of_day:
            script: same as in FUE.FUE_300early.paddock.Manager folder.Sowing rule
          operations
            14/10/1999  fertiliser apply amount= 120 (kg/ha), type= urea_N (), depth= 10 (mm)
            14/11/1999  irrigation apply amount= 30 (mm)
            16/12/1999  irrigation apply amount= 30 (mm)
            22/12/1999  irrigation apply amount= 30 (mm)
            28/12/1999  irrigation apply amount= 30 (mm)
            3/01/2000  irrigation apply amount= 30 (mm)
            10/01/2000  irrigation apply amount= 30 (mm)
            16/01/2000  irrigation apply amount= 30 (mm)
            20/01/2000  irrigation apply amount= 30 (mm)
            30/01/2000  irrigation apply amount= 30 (mm)
            4/02/2000  irrigation apply amount= 30 (mm)
            10/02/2000  irrigation apply amount= 30 (mm)
            18/02/2000  irrigation apply amount= 30 (mm)
    simulation PYM_Nov99 -> /Simulations/PYM/PYM_Nov98
      clock
        start_date = 13/10/1999  # Enter the start date of the simulation
        end_date = 1/06/2000  # Enter the end date of the simulation
      area paddock -> /Simulations/PYM/PYM_Nov98/paddock
        folder Manager folder -> /Simulations/PYM/PYM_Nov98/paddock/Manager folder
          manager Sowing rule
            category =  # Sowing criteria
            date1 = 4-nov  # Enter sowing window START date (dd-mmm)
            date2 = 4-nov  # Enter sowing window END date (dd-mmm)
            must_sow = yes  # Must sow?
            raincrit = 10  # Amount of rainfall
            rainnumdays = 7  # Number of days of rainfall
            esw_amount = 10  # Enter minimum allowable available soil water (mm)
            category =  # Sowing parameters
            crop = potato2  # Enter name of crop to sow
            seeds = 5  # Enter sowing density (seeds/m2)
            depth = 30  # Enter sowing depth (mm)
            cultivar = russet  # Enter cultivar
            class = plant  # Enter crop growth class
            age = 1000  # Enter physiological age (deg days)
            row_spacing = 650  # Enter row spacing (mm)
            on start_of_day:
            script: same as in FUE.FUE_300early.paddock.Manager folder.Sowing rule
          operations
            4/11/1999  fertiliser apply amount= 120 (kg/ha), type= urea_N (), depth= 10 (mm)
            18/12/1999  irrigation apply amount= 30 (mm)
            24/12/1999  irrigation apply amount= 30 (mm)
            28/12/1999  irrigation apply amount= 30 (mm)
            4/01/2000  irrigation apply amount= 30 (mm)
            10/01/2000  irrigation apply amount= 30 (mm)
            16/01/2000  irrigation apply amount= 30 (mm)
            20/01/2000  irrigation apply amount= 30 (mm)
            30/01/2000  irrigation apply amount= 30 (mm)
            4/02/2000  irrigation apply amount= 30 (mm)
            10/02/2000  irrigation apply amount= 30 (mm)
            16/02/2000  irrigation apply amount= 30 (mm)
            23/02/2000  irrigation apply amount= 30 (mm)
            3/03/2000  irrigation apply amount= 30 (mm)
  folder Parilla
    simulation Parilla_23Nov_lowN -> /Simulations/Parilla/Parilla_23Nov_highN
      area paddock -> /Simulations/Parilla/Parilla_23Nov_highN/paddock
        folder Manager folder -> /Simulations/Parilla/Parilla_23Nov_highN/paddock/Manager folder
          operations
            23/11/2007  fertiliser apply amount= 100 (kg/ha), type= urea_N (), depth= 10 (mm)
            10/01/2008  fertiliser apply amount= 48 (kg/ha), type= urea_N (), depth= 10 (mm)
            29/01/2008  fertiliser apply amount= 40 (kg/ha), type= urea_N (), depth= 10 (mm)
            12/02/2008  fertiliser apply amount= 40 (kg/ha), type= urea_N (), depth= 10 (mm)
            28/02/2008  fertiliser apply amount= 40 (kg/ha), type= urea_N (), depth= 10 (mm)
            29/02/2008  fertiliser apply amount= 20 (kg/ha), type= urea_N (), depth= 10 (mm)
            6/03/2008  fertiliser apply amount= 40 (kg/ha), type= urea_N (), depth= 10 (mm)
            16/03/2008  fertiliser apply amount= 40 (kg/ha), type= urea_N (), depth= 10 (mm)
            23/11/2007  irrigation apply amount= 9 (mm)
            24/11/2007  irrigation apply amount= 9 (mm)
            25/11/2007  irrigation apply amount= 9 (mm)
            26/11/2007  irrigation apply amount= 9 (mm)
            27/11/2007  irrigation apply amount= 9 (mm)
            28/11/2007  irrigation apply amount= 9 (mm)
            29/11/2007  irrigation apply amount= 9 (mm)
            1/12/2007  irrigation apply amount= 9 (mm)
            2/12/2007  irrigation apply amount= 9 (mm)
            3/12/2007  irrigation apply amount= 9 (mm)
            4/12/2007  irrigation apply amount= 9 (mm)
            5/12/2007  irrigation apply amount= 9 (mm)
            6/12/2007  irrigation apply amount= 9 (mm)
            7/12/2007  irrigation apply amount= 9 (mm)
            8/12/2007  irrigation apply amount= 9 (mm)
            9/12/2007  irrigation apply amount= 9 (mm)
            10/12/2007  irrigation apply amount= 9 (mm)
            11/12/2007  irrigation apply amount= 9 (mm)
            12/12/2007  irrigation apply amount= 9 (mm)
            13/12/2007  irrigation apply amount= 9 (mm)
            14/12/2007  irrigation apply amount= 9 (mm)
            16/12/2007  irrigation apply amount= 9 (mm)
            17/12/2007  irrigation apply amount= 9 (mm)
            18/12/2007  irrigation apply amount= 9 (mm)
            19/12/2007  irrigation apply amount= 9 (mm)
            20/12/2007  irrigation apply amount= 9 (mm)
            21/12/2007  irrigation apply amount= 9 (mm)
            22/12/2007  irrigation apply amount= 9 (mm)
            23/12/2007  irrigation apply amount= 9 (mm)
            24/12/2007  irrigation apply amount= 9 (mm)
            25/12/2007  irrigation apply amount= 9 (mm)
            26/12/2007  irrigation apply amount= 9 (mm)
            27/12/2007  irrigation apply amount= 9 (mm)
            28/12/2007  irrigation apply amount= 9 (mm)
            29/12/2007  irrigation apply amount= 9 (mm)
            30/12/2007  irrigation apply amount= 9 (mm)
            31/12/2007  irrigation apply amount= 9 (mm)
            1/01/2008  irrigation apply amount= 9 (mm)
            2/01/2008  irrigation apply amount= 9 (mm)
            3/01/2008  irrigation apply amount= 9 (mm)
            4/01/2008  irrigation apply amount= 9 (mm)
            5/01/2008  irrigation apply amount= 9 (mm)
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    simulation Parilla_23Nov_medN -> /Simulations/Parilla/Parilla_23Nov_highN
      area paddock -> /Simulations/Parilla/Parilla_23Nov_highN/paddock
        folder Manager folder -> /Simulations/Parilla/Parilla_23Nov_highN/paddock/Manager folder
          operations
            23/11/2007  fertiliser apply amount= 100 (kg/ha), type= urea_N (), depth= 10 (mm)
            20/12/2007  fertiliser apply amount= 38 (kg/ha), type= urea_N (), depth= 10 (mm)
            10/01/2008  fertiliser apply amount= 48 (kg/ha), type= urea_N (), depth= 10 (mm)
            14/01/2008  fertiliser apply amount= 38 (kg/ha), type= urea_N (), depth= 10 (mm)
            29/01/2008  fertiliser apply amount= 20 (kg/ha), type= urea_N (), depth= 10 (mm)
            1/02/2008  fertiliser apply amount= 40 (kg/ha), type= urea_N (), depth= 10 (mm)
            12/02/2008  fertiliser apply amount= 40 (kg/ha), type= urea_N (), depth= 10 (mm)
            28/02/2008  fertiliser apply amount= 40 (kg/ha), type= urea_N (), depth= 10 (mm)
            29/02/2008  fertiliser apply amount= 20 (kg/ha), type= urea_N (), depth= 10 (mm)
            6/03/2008  fertiliser apply amount= 40 (kg/ha), type= urea_N (), depth= 10 (mm)
            16/03/2008  fertiliser apply amount= 40 (kg/ha), type= urea_N (), depth= 10 (mm)
            23/11/2007  irrigation apply amount= 9 (mm)
            24/11/2007  irrigation apply amount= 9 (mm)
            25/11/2007  irrigation apply amount= 9 (mm)
            26/11/2007  irrigation apply amount= 9 (mm)
            27/11/2007  irrigation apply amount= 9 (mm)
            28/11/2007  irrigation apply amount= 9 (mm)
            29/11/2007  irrigation apply amount= 9 (mm)
            1/12/2007  irrigation apply amount= 9 (mm)
            2/12/2007  irrigation apply amount= 9 (mm)
            3/12/2007  irrigation apply amount= 9 (mm)
            4/12/2007  irrigation apply amount= 9 (mm)
            5/12/2007  irrigation apply amount= 9 (mm)
            6/12/2007  irrigation apply amount= 9 (mm)
            7/12/2007  irrigation apply amount= 9 (mm)
            8/12/2007  irrigation apply amount= 9 (mm)
            9/12/2007  irrigation apply amount= 9 (mm)
            10/12/2007  irrigation apply amount= 9 (mm)
            11/12/2007  irrigation apply amount= 9 (mm)
            12/12/2007  irrigation apply amount= 9 (mm)
            13/12/2007  irrigation apply amount= 9 (mm)
            14/12/2007  irrigation apply amount= 9 (mm)
            16/12/2007  irrigation apply amount= 9 (mm)
            17/12/2007  irrigation apply amount= 9 (mm)
            18/12/2007  irrigation apply amount= 9 (mm)
            19/12/2007  irrigation apply amount= 9 (mm)
            20/12/2007  irrigation apply amount= 9 (mm)
            21/12/2007  irrigation apply amount= 9 (mm)
            22/12/2007  irrigation apply amount= 9 (mm)
            23/12/2007  irrigation apply amount= 9 (mm)
            24/12/2007  irrigation apply amount= 9 (mm)
            25/12/2007  irrigation apply amount= 9 (mm)
            26/12/2007  irrigation apply amount= 9 (mm)
            27/12/2007  irrigation apply amount= 9 (mm)
            28/12/2007  irrigation apply amount= 9 (mm)
            29/12/2007  irrigation apply amount= 9 (mm)
            30/12/2007  irrigation apply amount= 9 (mm)
            31/12/2007  irrigation apply amount= 9 (mm)
            1/01/2008  irrigation apply amount= 9 (mm)
            2/01/2008  irrigation apply amount= 9 (mm)
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    simulation Parilla_23Nov_highN
      metfile met: filename=Lameroo.met
      clock
        start_date = 22/11/2007  # Enter the start date of the simulation
        end_date = 1/06/2008  # Enter the end date of the simulation
      summaryfile: filename=Continuous Wheat Simulation.sum
      area paddock
        fertiliser
        surfaceom surface organic matter
          PoolName = wheat  # Organic Matter pool name
          type = wheat  # Organic Matter type
          mass = 2000  # Initial surface residue (kg/ha)
          cnr = 80  # C:N ratio of initial residue
          standing_fraction = 0  # Fraction of residue standing
        folder Manager folder
          manager Sowing rule
            category =  # Sowing criteria
            date1 = 23-nov  # Enter sowing window START date (dd-mmm)
            date2 = 23-nov  # Enter sowing window END date (dd-mmm)
            must_sow = yes  # Must sow?
            raincrit = 10  # Amount of rainfall
            rainnumdays = 7  # Number of days of rainfall
            esw_amount = 10  # Enter minimum allowable available soil water (mm)
            category =  # Sowing parameters
            crop = potato2  # Enter name of crop to sow
            seeds = 5  # Enter sowing density (seeds/m2)
            depth = 30  # Enter sowing depth (mm)
            cultivar = russet  # Enter cultivar
            class = plant  # Enter crop growth class
            age = 1000  # Enter physiological age (deg days)
            row_spacing = 650  # Enter row spacing (mm)
            on start_of_day:
            script: same as in FUE.FUE_300early.paddock.Manager folder.Sowing rule
          manager Harvesting rule
            category =  # Harvesting criteria
            crop = potato2  # Enter name of crop to harvest when ripe
            on end_of_day:
            script: same as in FUE.FUE_300early.paddock.Manager folder.Harvesting rule
          operations
            23/11/2007  fertiliser apply amount= 100 (kg/ha), type= urea_N (), depth= 10 (mm)
            20/12/2007  fertiliser apply amount= 75 (kg/ha), type= urea_N (), depth= 10 (mm)
            10/01/2008  fertiliser apply amount= 48 (kg/ha), type= urea_N (), depth= 10 (mm)
            14/01/2008  fertiliser apply amount= 75 (kg/ha), type= urea_N (), depth= 10 (mm)
            29/01/2008  fertiliser apply amount= 40 (kg/ha), type= urea_N (), depth= 10 (mm)
            1/02/2008  fertiliser apply amount= 40 (kg/ha), type= urea_N (), depth= 10 (mm)
            12/02/2008  fertiliser apply amount= 40 (kg/ha), type= urea_N (), depth= 10 (mm)
            28/02/2008  fertiliser apply amount= 40 (kg/ha), type= urea_N (), depth= 10 (mm)
            29/02/2008  fertiliser apply amount= 20 (kg/ha), type= urea_N (), depth= 10 (mm)
            6/03/2008  fertiliser apply amount= 40 (kg/ha), type= urea_N (), depth= 10 (mm)
            16/03/2008  fertiliser apply amount= 40 (kg/ha), type= urea_N (), depth= 10 (mm)
            23/11/2007  irrigation apply amount= 9 (mm)
            24/11/2007  irrigation apply amount= 9 (mm)
            25/11/2007  irrigation apply amount= 9 (mm)
            26/11/2007  irrigation apply amount= 9 (mm)
            27/11/2007  irrigation apply amount= 9 (mm)
            28/11/2007  irrigation apply amount= 9 (mm)
            29/11/2007  irrigation apply amount= 9 (mm)
            1/12/2007  irrigation apply amount= 9 (mm)
            2/12/2007  irrigation apply amount= 9 (mm)
            3/12/2007  irrigation apply amount= 9 (mm)
            4/12/2007  irrigation apply amount= 9 (mm)
            5/12/2007  irrigation apply amount= 9 (mm)
            6/12/2007  irrigation apply amount= 9 (mm)
            7/12/2007  irrigation apply amount= 9 (mm)
            8/12/2007  irrigation apply amount= 9 (mm)
            9/12/2007  irrigation apply amount= 9 (mm)
            10/12/2007  irrigation apply amount= 9 (mm)
            11/12/2007  irrigation apply amount= 9 (mm)
            12/12/2007  irrigation apply amount= 9 (mm)
            13/12/2007  irrigation apply amount= 9 (mm)
            14/12/2007  irrigation apply amount= 9 (mm)
            16/12/2007  irrigation apply amount= 9 (mm)
            17/12/2007  irrigation apply amount= 9 (mm)
            18/12/2007  irrigation apply amount= 9 (mm)
            19/12/2007  irrigation apply amount= 9 (mm)
            20/12/2007  irrigation apply amount= 9 (mm)
            21/12/2007  irrigation apply amount= 9 (mm)
            22/12/2007  irrigation apply amount= 9 (mm)
            23/12/2007  irrigation apply amount= 9 (mm)
            24/12/2007  irrigation apply amount= 9 (mm)
            25/12/2007  irrigation apply amount= 9 (mm)
            26/12/2007  irrigation apply amount= 9 (mm)
            27/12/2007  irrigation apply amount= 9 (mm)
            28/12/2007  irrigation apply amount= 9 (mm)
            29/12/2007  irrigation apply amount= 9 (mm)
            30/12/2007  irrigation apply amount= 9 (mm)
            31/12/2007  irrigation apply amount= 9 (mm)
            1/01/2008  irrigation apply amount= 9 (mm)
            2/01/2008  irrigation apply amount= 9 (mm)
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          irrigation: same as FUE.FUE_300early.paddock.Manager folder.Irrigation
        outputfile
          events Reporting Frequency -> /Simulations/FUE/FUE_300early/paddock/outputfile/Reporting Frequency
          variables -> /Simulations/FUE/FUE_300early/paddock/outputfile/Variables
        soil Pinarro_sand
          InitWater Initial water
            PercentMethod: Percent=1.00; Distributed=Evenly distributed
          Water
            Layer:
              Thickness (mm)  BD (g/cc)  AirDry (mm/mm)  LL15 (mm/mm)  DUL (mm/mm)  SAT (mm/mm)
              100             1.2        0.03            0.06          0.12         0.25
              200             1.2        0.05            0.06          0.12         0.25
              300             1.2        0.06            0.06          0.12         0.25
              300             1.2        0.06            0.06          0.12         0.25
              300             1.2        0.06            0.06          0.12         0.25
              300             1.2        0.06            0.06          0.12         0.25
            SoilCrop potato2
              Layer:
                Thickness (mm)  LL (mm/mm)  KL (/day)  XF (0-1)
                100             0.06        0.1        1
                200             0.06        0.1        1
                300             0.12        0.07       1
                300             0.12        0.05       1
                300             0.12        0.05       1
                300             0.12        0.05       1
          SoilWat: SummerCona=4.4; WinterCona=4.4; SummerU=9; WinterU=9; SummerDate=1-Nov; WinterDate=1-Apr; DiffusConst=88; DiffusSlope=35.4; Salb=0.18; CN2Bare=68; CNRed=20; CNCov=0.8
            Layer:
              Thickness (mm)  SWCON (0-1)
              100             0.9
              200             0.9
              300             0.9
              300             0.9
              300             0.9
              300             0.9
          SoilOrganicMatter: RootCN=30; RootWT=3000; SoilCN=11.5; EnrACoeff=7.4; EnrBCoeff=0.2
            Layer:
              Thickness (mm)  OC (Total %)  FBiom (0-1)  FInert (0-1)
              100             0.7           0.025        0.3
              200             0.5           0.025        0.4
              300             0.3           0.015        0.75
              300             0.3           0.01         0.9
              300             0.3           0.01         0.96
              300             0.3           0.01         0.96
          Lab
            Layer:
              Thickness (mm)  PH (1:5 water)
              100             6.6
              200             6.2
              300             5.7
              300             5.5
              300             5.5
              300             5.5
          Sample Initial nitrogen
            Layer:
              Thickness (mm)  NO3 (ppm)  NH4 (ppm)
              100             21.25      0.1
              200             19.125     0.1
              300             0.555556   0.1
              300             0.555556   0.1
              300             0.555556   0.1
              300             0.555556   0.1
        micromet -> /Simulations/FUE/FUE_300early/paddock/Micromet
        potato2 -> /Simulations/FUE/FUE_300early/paddock/potato2
    simulation Parilla_3Dec_lowN -> /Simulations/Parilla/Parilla_3Dec_highN
      area paddock -> /Simulations/Parilla/Parilla_3Dec_highN/paddock
        folder Manager folder -> /Simulations/Parilla/Parilla_3Dec_highN/paddock/Manager folder
          operations
            27/01/2008  fertiliser apply amount= 44 (kg/ha), type= urea_N (), depth= 10 (mm)
            2/05/2008  fertiliser apply amount= 44 (kg/ha), type= urea_N (), depth= 10 (mm)
            13/02/2008  fertiliser apply amount= 40 (kg/ha), type= urea_N (), depth= 10 (mm)
            27/02/2008  fertiliser apply amount= 40 (kg/ha), type= urea_N (), depth= 10 (mm)
            3/06/2008  fertiliser apply amount= 40 (kg/ha), type= urea_N (), depth= 10 (mm)
            13/03/2008  fertiliser apply amount= 40 (kg/ha), type= urea_N (), depth= 10 (mm)
            21/03/2008  fertiliser apply amount= 40 (kg/ha), type= urea_N (), depth= 10 (mm)
            23/11/2007  irrigation apply amount= 9 (mm)
            24/11/2007  irrigation apply amount= 9 (mm)
            25/11/2007  irrigation apply amount= 9 (mm)
            26/11/2007  irrigation apply amount= 9 (mm)
            27/11/2007  irrigation apply amount= 9 (mm)
            28/11/2007  irrigation apply amount= 9 (mm)
            29/11/2007  irrigation apply amount= 9 (mm)
            1/12/2007  irrigation apply amount= 9 (mm)
            2/12/2007  irrigation apply amount= 9 (mm)
            3/12/2007  irrigation apply amount= 9 (mm)
            4/12/2007  irrigation apply amount= 9 (mm)
            5/12/2007  irrigation apply amount= 9 (mm)
            6/12/2007  irrigation apply amount= 9 (mm)
            7/12/2007  irrigation apply amount= 9 (mm)
            8/12/2007  irrigation apply amount= 9 (mm)
            9/12/2007  irrigation apply amount= 9 (mm)
            10/12/2007  irrigation apply amount= 9 (mm)
            11/12/2007  irrigation apply amount= 9 (mm)
            12/12/2007  irrigation apply amount= 9 (mm)
            13/12/2007  irrigation apply amount= 9 (mm)
            14/12/2007  irrigation apply amount= 9 (mm)
            16/12/2007  irrigation apply amount= 9 (mm)
            17/12/2007  irrigation apply amount= 9 (mm)
            18/12/2007  irrigation apply amount= 9 (mm)
            19/12/2007  irrigation apply amount= 9 (mm)
            20/12/2007  irrigation apply amount= 9 (mm)
            21/12/2007  irrigation apply amount= 9 (mm)
            22/12/2007  irrigation apply amount= 9 (mm)
            23/12/2007  irrigation apply amount= 9 (mm)
            24/12/2007  irrigation apply amount= 9 (mm)
            25/12/2007  irrigation apply amount= 9 (mm)
            26/12/2007  irrigation apply amount= 9 (mm)
            27/12/2007  irrigation apply amount= 9 (mm)
            28/12/2007  irrigation apply amount= 9 (mm)
            29/12/2007  irrigation apply amount= 9 (mm)
            30/12/2007  irrigation apply amount= 9 (mm)
            31/12/2007  irrigation apply amount= 9 (mm)
            1/01/2008  irrigation apply amount= 9 (mm)
            2/01/2008  irrigation apply amount= 9 (mm)
            3/01/2008  irrigation apply amount= 9 (mm)
            4/01/2008  irrigation apply amount= 9 (mm)
            5/01/2008  irrigation apply amount= 9 (mm)
            6/01/2008  irrigation apply amount= 9 (mm)
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    simulation Parilla_3Dec_medN -> /Simulations/Parilla/Parilla_3Dec_highN
      area paddock -> /Simulations/Parilla/Parilla_3Dec_highN/paddock
        folder Manager folder -> /Simulations/Parilla/Parilla_3Dec_highN/paddock/Manager folder
          operations
            14/01/2008  fertiliser apply amount= 37 (kg/ha), type= urea_N (), depth= 10 (mm)
            27/01/2008  fertiliser apply amount= 44 (kg/ha), type= urea_N (), depth= 10 (mm)
            29/01/2008  fertiliser apply amount= 37 (kg/ha), type= urea_N (), depth= 10 (mm)
            2/05/2008  fertiliser apply amount= 44 (kg/ha), type= urea_N (), depth= 10 (mm)
            12/02/2008  fertiliser apply amount= 25 (kg/ha), type= urea_N (), depth= 10 (mm)
            13/02/2008  fertiliser apply amount= 40 (kg/ha), type= urea_N (), depth= 10 (mm)
            27/02/2008  fertiliser apply amount= 40 (kg/ha), type= urea_N (), depth= 10 (mm)
            3/06/2008  fertiliser apply amount= 40 (kg/ha), type= urea_N (), depth= 10 (mm)
            13/03/2008  fertiliser apply amount= 40 (kg/ha), type= urea_N (), depth= 10 (mm)
            21/03/2008  fertiliser apply amount= 40 (kg/ha), type= urea_N (), depth= 10 (mm)
            23/11/2007  irrigation apply amount= 9 (mm)
            24/11/2007  irrigation apply amount= 9 (mm)
            25/11/2007  irrigation apply amount= 9 (mm)
            26/11/2007  irrigation apply amount= 9 (mm)
            27/11/2007  irrigation apply amount= 9 (mm)
            28/11/2007  irrigation apply amount= 9 (mm)
            29/11/2007  irrigation apply amount= 9 (mm)
            1/12/2007  irrigation apply amount= 9 (mm)
            2/12/2007  irrigation apply amount= 9 (mm)
            3/12/2007  irrigation apply amount= 9 (mm)
            4/12/2007  irrigation apply amount= 9 (mm)
            5/12/2007  irrigation apply amount= 9 (mm)
            6/12/2007  irrigation apply amount= 9 (mm)
            7/12/2007  irrigation apply amount= 9 (mm)
            8/12/2007  irrigation apply amount= 9 (mm)
            9/12/2007  irrigation apply amount= 9 (mm)
            10/12/2007  irrigation apply amount= 9 (mm)
            11/12/2007  irrigation apply amount= 9 (mm)
            12/12/2007  irrigation apply amount= 9 (mm)
            13/12/2007  irrigation apply amount= 9 (mm)
            14/12/2007  irrigation apply amount= 9 (mm)
            16/12/2007  irrigation apply amount= 9 (mm)
            17/12/2007  irrigation apply amount= 9 (mm)
            18/12/2007  irrigation apply amount= 9 (mm)
            19/12/2007  irrigation apply amount= 9 (mm)
            20/12/2007  irrigation apply amount= 9 (mm)
            21/12/2007  irrigation apply amount= 9 (mm)
            22/12/2007  irrigation apply amount= 9 (mm)
            23/12/2007  irrigation apply amount= 9 (mm)
            24/12/2007  irrigation apply amount= 9 (mm)
            25/12/2007  irrigation apply amount= 9 (mm)
            26/12/2007  irrigation apply amount= 9 (mm)
            27/12/2007  irrigation apply amount= 9 (mm)
            28/12/2007  irrigation apply amount= 9 (mm)
            29/12/2007  irrigation apply amount= 9 (mm)
            30/12/2007  irrigation apply amount= 9 (mm)
            31/12/2007  irrigation apply amount= 9 (mm)
            1/01/2008  irrigation apply amount= 9 (mm)
            2/01/2008  irrigation apply amount= 9 (mm)
            3/01/2008  irrigation apply amount= 9 (mm)
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    simulation Parilla_3Dec_highN -> /Simulations/Parilla/Parilla_23Nov_highN
      clock
        start_date = 2/12/2007  # Enter the start date of the simulation
        end_date = 1/06/2008  # Enter the end date of the simulation
      area paddock -> /Simulations/Parilla/Parilla_23Nov_highN/paddock
        folder Manager folder -> /Simulations/Parilla/Parilla_23Nov_highN/paddock/Manager folder
          manager Sowing rule
            category =  # Sowing criteria
            date1 = 3-dec  # Enter sowing window START date (dd-mmm)
            date2 = 3-dec  # Enter sowing window END date (dd-mmm)
            must_sow = yes  # Must sow?
            raincrit = 10  # Amount of rainfall
            rainnumdays = 7  # Number of days of rainfall
            esw_amount = 10  # Enter minimum allowable available soil water (mm)
            category =  # Sowing parameters
            crop = potato2  # Enter name of crop to sow
            seeds = 5  # Enter sowing density (seeds/m2)
            depth = 30  # Enter sowing depth (mm)
            cultivar = russet  # Enter cultivar
            class = plant  # Enter crop growth class
            age = 1000  # Enter physiological age (deg days)
            row_spacing = 650  # Enter row spacing (mm)
            on start_of_day:
            script: same as in FUE.FUE_300early.paddock.Manager folder.Sowing rule
          operations
            14/01/2008  fertiliser apply amount= 75 (kg/ha), type= urea_N (), depth= 10 (mm)
            27/01/2008  fertiliser apply amount= 44 (kg/ha), type= urea_N (), depth= 10 (mm)
            29/01/2008  fertiliser apply amount= 75 (kg/ha), type= urea_N (), depth= 10 (mm)
            2/05/2008  fertiliser apply amount= 44 (kg/ha), type= urea_N (), depth= 10 (mm)
            12/02/2008  fertiliser apply amount= 50 (kg/ha), type= urea_N (), depth= 10 (mm)
            13/02/2008  fertiliser apply amount= 40 (kg/ha), type= urea_N (), depth= 10 (mm)
            27/02/2008  fertiliser apply amount= 40 (kg/ha), type= urea_N (), depth= 10 (mm)
            3/06/2008  fertiliser apply amount= 40 (kg/ha), type= urea_N (), depth= 10 (mm)
            13/03/2008  fertiliser apply amount= 40 (kg/ha), type= urea_N (), depth= 10 (mm)
            21/03/2008  fertiliser apply amount= 40 (kg/ha), type= urea_N (), depth= 10 (mm)
            23/11/2007  irrigation apply amount= 9 (mm)
            24/11/2007  irrigation apply amount= 9 (mm)
            25/11/2007  irrigation apply amount= 9 (mm)
            26/11/2007  irrigation apply amount= 9 (mm)
            27/11/2007  irrigation apply amount= 9 (mm)
            28/11/2007  irrigation apply amount= 9 (mm)
            29/11/2007  irrigation apply amount= 9 (mm)
            1/12/2007  irrigation apply amount= 9 (mm)
            2/12/2007  irrigation apply amount= 9 (mm)
            3/12/2007  irrigation apply amount= 9 (mm)
            4/12/2007  irrigation apply amount= 9 (mm)
            5/12/2007  irrigation apply amount= 9 (mm)
            6/12/2007  irrigation apply amount= 9 (mm)
            7/12/2007  irrigation apply amount= 9 (mm)
            8/12/2007  irrigation apply amount= 9 (mm)
            9/12/2007  irrigation apply amount= 9 (mm)
            10/12/2007  irrigation apply amount= 9 (mm)
            11/12/2007  irrigation apply amount= 9 (mm)
            12/12/2007  irrigation apply amount= 9 (mm)
            13/12/2007  irrigation apply amount= 9 (mm)
            14/12/2007  irrigation apply amount= 9 (mm)
            16/12/2007  irrigation apply amount= 9 (mm)
            17/12/2007  irrigation apply amount= 9 (mm)
            18/12/2007  irrigation apply amount= 9 (mm)
            19/12/2007  irrigation apply amount= 9 (mm)
            20/12/2007  irrigation apply amount= 9 (mm)
            21/12/2007  irrigation apply amount= 9 (mm)
            22/12/2007  irrigation apply amount= 9 (mm)
            23/12/2007  irrigation apply amount= 9 (mm)
            24/12/2007  irrigation apply amount= 9 (mm)
            25/12/2007  irrigation apply amount= 9 (mm)
            26/12/2007  irrigation apply amount= 9 (mm)
            27/12/2007  irrigation apply amount= 9 (mm)
            28/12/2007  irrigation apply amount= 9 (mm)
            29/12/2007  irrigation apply amount= 9 (mm)
            30/12/2007  irrigation apply amount= 9 (mm)
            31/12/2007  irrigation apply amount= 9 (mm)
            1/01/2008  irrigation apply amount= 9 (mm)
            2/01/2008  irrigation apply amount= 9 (mm)
            3/01/2008  irrigation apply amount= 9 (mm)
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    simulation Parilla_17Dec_lowN -> /Simulations/Parilla/Parilla_17Dec_highN
      area paddock -> /Simulations/Parilla/Parilla_17Dec_highN/paddock
        folder Manager folder -> /Simulations/Parilla/Parilla_17Dec_highN/paddock/Manager folder
          operations: same as Parilla.Parilla_3Dec_lowN.paddock.Manager folder.operations
    simulation Parilla_17Dec_medN -> /Simulations/Parilla/Parilla_17Dec_highN
      area paddock -> /Simulations/Parilla/Parilla_17Dec_highN/paddock
        folder Manager folder -> /Simulations/Parilla/Parilla_17Dec_highN/paddock/Manager folder
          operations
            14/01/2008  fertiliser apply amount= 38 (kg/ha), type= urea_N (), depth= 10 (mm)
            27/01/2008  fertiliser apply amount= 44 (kg/ha), type= urea_N (), depth= 10 (mm)
            29/01/2008  fertiliser apply amount= 38 (kg/ha), type= urea_N (), depth= 10 (mm)
            2/05/2008  fertiliser apply amount= 44 (kg/ha), type= urea_N (), depth= 10 (mm)
            12/02/2008  fertiliser apply amount= 25 (kg/ha), type= urea_N (), depth= 10 (mm)
            13/02/2008  fertiliser apply amount= 40 (kg/ha), type= urea_N (), depth= 10 (mm)
            27/02/2008  fertiliser apply amount= 40 (kg/ha), type= urea_N (), depth= 10 (mm)
            3/06/2008  fertiliser apply amount= 40 (kg/ha), type= urea_N (), depth= 10 (mm)
            13/03/2008  fertiliser apply amount= 40 (kg/ha), type= urea_N (), depth= 10 (mm)
            21/03/2008  fertiliser apply amount= 40 (kg/ha), type= urea_N (), depth= 10 (mm)
            23/11/2007  irrigation apply amount= 9 (mm)
            24/11/2007  irrigation apply amount= 9 (mm)
            25/11/2007  irrigation apply amount= 9 (mm)
            26/11/2007  irrigation apply amount= 9 (mm)
            27/11/2007  irrigation apply amount= 9 (mm)
            28/11/2007  irrigation apply amount= 9 (mm)
            29/11/2007  irrigation apply amount= 9 (mm)
            1/12/2007  irrigation apply amount= 9 (mm)
            2/12/2007  irrigation apply amount= 9 (mm)
            3/12/2007  irrigation apply amount= 9 (mm)
            4/12/2007  irrigation apply amount= 9 (mm)
            5/12/2007  irrigation apply amount= 9 (mm)
            6/12/2007  irrigation apply amount= 9 (mm)
            7/12/2007  irrigation apply amount= 9 (mm)
            8/12/2007  irrigation apply amount= 9 (mm)
            9/12/2007  irrigation apply amount= 9 (mm)
            10/12/2007  irrigation apply amount= 9 (mm)
            11/12/2007  irrigation apply amount= 9 (mm)
            12/12/2007  irrigation apply amount= 9 (mm)
            13/12/2007  irrigation apply amount= 9 (mm)
            14/12/2007  irrigation apply amount= 9 (mm)
            16/12/2007  irrigation apply amount= 9 (mm)
            17/12/2007  irrigation apply amount= 9 (mm)
            18/12/2007  irrigation apply amount= 9 (mm)
            19/12/2007  irrigation apply amount= 9 (mm)
            20/12/2007  irrigation apply amount= 9 (mm)
            21/12/2007  irrigation apply amount= 9 (mm)
            22/12/2007  irrigation apply amount= 9 (mm)
            23/12/2007  irrigation apply amount= 9 (mm)
            24/12/2007  irrigation apply amount= 9 (mm)
            25/12/2007  irrigation apply amount= 9 (mm)
            26/12/2007  irrigation apply amount= 9 (mm)
            27/12/2007  irrigation apply amount= 9 (mm)
            28/12/2007  irrigation apply amount= 9 (mm)
            29/12/2007  irrigation apply amount= 9 (mm)
            30/12/2007  irrigation apply amount= 9 (mm)
            31/12/2007  irrigation apply amount= 9 (mm)
            1/01/2008  irrigation apply amount= 9 (mm)
            2/01/2008  irrigation apply amount= 9 (mm)
            3/01/2008  irrigation apply amount= 9 (mm)
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    simulation Parilla_17Dec_highN -> /Simulations/Parilla/Parilla_23Nov_highN
      clock
        start_date = 16/12/2007  # Enter the start date of the simulation
        end_date = 1/06/2008  # Enter the end date of the simulation
      area paddock -> /Simulations/Parilla/Parilla_23Nov_highN/paddock
        folder Manager folder -> /Simulations/Parilla/Parilla_23Nov_highN/paddock/Manager folder
          manager Sowing rule
            category =  # Sowing criteria
            date1 = 17-dec  # Enter sowing window START date (dd-mmm)
            date2 = 17-dec  # Enter sowing window END date (dd-mmm)
            must_sow = yes  # Must sow?
            raincrit = 10  # Amount of rainfall
            rainnumdays = 7  # Number of days of rainfall
            esw_amount = 10  # Enter minimum allowable available soil water (mm)
            category =  # Sowing parameters
            crop = potato2  # Enter name of crop to sow
            seeds = 5  # Enter sowing density (seeds/m2)
            depth = 30  # Enter sowing depth (mm)
            cultivar = russet  # Enter cultivar
            class = plant  # Enter crop growth class
            age = 1000  # Enter physiological age (deg days)
            row_spacing = 650  # Enter row spacing (mm)
            on start_of_day:
            script: same as in FUE.FUE_300early.paddock.Manager folder.Sowing rule
          operations: same as Parilla.Parilla_3Dec_highN.paddock.Manager folder.operations
  folder FSP
    simulation FSP_242 -> /Simulations/FSP/FSP_350
      area paddock -> /Simulations/FSP/FSP_350/paddock
        folder Manager folder -> /Simulations/FSP/FSP_350/paddock/Manager folder
          operations
            2/05/2000  fertiliser apply amount= 180 (kg/ha), type= urea_N (), depth= 10 (mm)
            14/06/2000  fertiliser apply amount= 46 (kg/ha), type= urea_N (), depth= 10 (mm)
            10/07/2000  fertiliser apply amount= 46 (kg/ha), type= urea_N (), depth= 10 (mm)
    simulation FSP_350 -> /Simulations/FSP/FSP_472
      area paddock -> /Simulations/FSP/FSP_472/paddock
        folder Manager folder -> /Simulations/FSP/FSP_472/paddock/Manager folder
          operations
            2/05/2000  fertiliser apply amount= 180 (kg/ha), type= urea_N (), depth= 10 (mm)
            14/06/2000  fertiliser apply amount= 57 (kg/ha), type= urea_N (), depth= 10 (mm)
            10/07/2000  fertiliser apply amount= 57 (kg/ha), type= urea_N (), depth= 10 (mm)
            3/08/2000  fertiliser apply amount= 57 (kg/ha), type= urea_N (), depth= 10 (mm)
    simulation FSP_472
      metfile met: filename=Pukehohe.met
      clock
        start_date = 1/05/2000  # Enter the start date of the simulation
        end_date = 1/12/2000  # Enter the end date of the simulation
      summaryfile: filename=Continuous Wheat Simulation.sum
      area paddock
        fertiliser
        surfaceom surface organic matter
          PoolName = wheat  # Organic Matter pool name
          type = wheat  # Organic Matter type
          mass = 2000  # Initial surface residue (kg/ha)
          cnr = 80  # C:N ratio of initial residue
          standing_fraction = 0  # Fraction of residue standing
        folder Manager folder
          manager Sowing rule
            category =  # Sowing criteria
            date1 = 2-may  # Enter sowing window START date (dd-mmm)
            date2 = 2-may  # Enter sowing window END date (dd-mmm)
            must_sow = yes  # Must sow?
            raincrit = 10  # Amount of rainfall
            rainnumdays = 7  # Number of days of rainfall
            esw_amount = 10  # Enter minimum allowable available soil water (mm)
            category =  # Sowing parameters
            crop = potato2  # Enter name of crop to sow
            seeds = 5  # Enter sowing density (seeds/m2)
            depth = 200  # Enter sowing depth (mm)
            cultivar = russet  # Enter cultivar
            class = plant  # Enter crop growth class
            age = 1000  # Enter physiological age (deg days)
            row_spacing = 650  # Enter row spacing (mm)
            on start_of_day:
            script: same as in FUE.FUE_300early.paddock.Manager folder.Sowing rule
          manager Harvesting rule
            category =  # Harvesting criteria
            crop = potato2  # Enter name of crop to harvest when ripe
            on end_of_day:
            script: same as in FUE.FUE_300early.paddock.Manager folder.Harvesting rule
          operations
            2/05/2000  fertiliser apply amount= 300 (kg/ha), type= urea_N (), depth= 10 (mm)
            14/06/2000  fertiliser apply amount= 170 (kg/ha), type= urea_N (), depth= 10 (mm)
          irrigation: same as FUE.FUE_300early.paddock.Manager folder.Irrigation
        outputfile
          events Reporting Frequency: event=Daily
          variables
            variables: dd/mmm/yyyy, biomass, leaflivewt2, leafliven2, leafdeadwt2, stemlivewt, stemliven, tuberlivewt, TuberliveN, nfact_expan, nfact_photo, LeafLAI, Cover_tot, PhenologyCurrentPhaseName, tt, Leafnodeno, LeafHeightValue, Leafnodeno_fx, Leafnodeno_sen, ttafteremergence, ttaftersowing, AboveGroundDM, AboveGroundN
        soil Templeton
          InitWater Initial water
            PercentMethod: Percent=1.00; Distributed=Evenly distributed
          Water: same as PYM.PYM_Nov98.paddock.Templeton.Water
          SoilWat: same as FUE.FUE_300early.paddock.Templeton.SoilWat
          SoilOrganicMatter: same as FUE.FUE_300early.paddock.Templeton.SoilOrganicMatter
          Lab
            Layer:
              Thickness (mm)  PH (1:5 water)
              100             6.6
              200             6.2
              300             5.7
              300             5.5
              300             5.5
              300             5.5
          Sample Initial nitrogen: same as FUE.FUE_300early.paddock.Templeton.Initial nitrogen
        micromet -> /Simulations/FUE/FUE_300early/paddock/Micromet
        potato2 -> /Simulations/FUE/FUE_300early/paddock/potato2
    simulation FSP_0 -> /Simulations/FSP/FSP_350
      area paddock -> /Simulations/FSP/FSP_350/paddock
        folder Manager folder -> /Simulations/FSP/FSP_350/paddock/Manager folder
          operations
  folder Rainshelter
    simulation RainShelter_1_optimal_20@30
      metfile met: filename=lincoln.met
      clock
        start_date = 12/10/1987  # Enter the start date of the simulation
        end_date = 1/06/1988  # Enter the end date of the simulation
      summaryfile: filename=Continuous Wheat Simulation.sum
      area paddock
        micrometRGR1
          soilalbedo = 0.23
          a_interception = 0
          b_interception = 0
          c_interception = 0
          d_interception = 0
        fertiliser
        surfaceom surface organic matter
          PoolName = wheat  # Organic Matter pool name
          type = wheat  # Organic Matter type
          mass = 2000  # Initial surface residue (kg/ha)
          cnr = 80  # C:N ratio of initial residue
          standing_fraction = 0  # Fraction of residue standing
        folder Manager folder
          manager Sowing rule
            category =  # Sowing criteria
            date1 = 13-oct  # Enter sowing window START date (dd-mmm)
            date2 = 13-oct  # Enter sowing window END date (dd-mmm)
            must_sow = yes  # Must sow?
            raincrit = 10  # Amount of rainfall
            rainnumdays = 7  # Number of days of rainfall
            esw_amount = 10  # Enter minimum allowable available soil water (mm)
            category =  # Sowing parameters
            crop = potato2  # Enter name of crop to sow
            seeds = 3  # Enter sowing density (seeds/m2)
            depth = 150  # Enter sowing depth (mm)
            class = plant  # Enter crop growth class
            age = 1000  # Enter physiological age (deg days)
            row_spacing = 650  # Enter row spacing (mm)
            on start_of_day:
            script: same as in FUE.FUE_300early.paddock.Manager folder.Sowing rule
          manager Harvesting rule
            category =  # Harvesting criteria
            crop = potato2  # Enter name of crop to harvest when ripe
            on end_of_day:
            script: same as in FUE.FUE_300early.paddock.Manager folder.Harvesting rule
          operations
            19/11/1987  irrigation apply amount= 21 (mm)
            26/11/1987  irrigation apply amount= 21 (mm)
            1/12/1987  irrigation apply amount= 17 (mm)
            4/12/1987  irrigation apply amount= 17 (mm)
            9/12/1987  irrigation apply amount= 17 (mm)
            14/12/1987  irrigation apply amount= 17 (mm)
            18/12/1987  irrigation apply amount= 17 (mm)
            22/12/1987  irrigation apply amount= 17 (mm)
            24/12/1987  irrigation apply amount= 1 (mm)
            26/12/1987  irrigation apply amount= 21 (mm)
            30/12/1987  irrigation apply amount= 17 (mm)
            3/01/1988  irrigation apply amount= 17 (mm)
            7/01/1988  irrigation apply amount= 17 (mm)
            11/01/1988  irrigation apply amount= 17 (mm)
            15/01/1988  irrigation apply amount= 17 (mm)
            19/01/1988  irrigation apply amount= 18 (mm)
            22/01/1988  irrigation apply amount= 22 (mm)
            25/01/1988  irrigation apply amount= 18 (mm)
            28/01/1988  irrigation apply amount= 17 (mm)
            1/02/1988  irrigation apply amount= 17 (mm)
            4/02/1988  irrigation apply amount= 17 (mm)
            8/02/1988  irrigation apply amount= 17 (mm)
            11/02/1988  irrigation apply amount= 17 (mm)
            15/02/1988  irrigation apply amount= 17 (mm)
            19/02/1988  irrigation apply amount= 17 (mm)
            24/02/1988  irrigation apply amount= 18 (mm)
            29/02/1988  irrigation apply amount= 17 (mm)
            4/03/1988  irrigation apply amount= 17 (mm)
            9/03/1988  irrigation apply amount= 18 (mm)
            13/10/1987  fertiliser apply amount= 10 (kg/ha), type= urea_N (), depth= 10 (mm)
            24/12/1987  fertiliser apply amount= 60 (kg/ha), type= urea_N (), depth= 10 (mm)
            19/01/1988  fertiliser apply amount= 40 (kg/ha), type= urea_N (), depth= 10 (mm)
          irrigation: same as FUE.FUE_300early.paddock.Manager folder.Irrigation
        outputfile
          events Reporting Frequency: event=Daily
          variables
            variables: dd/mmm/yyyy, biomass, leaflivewt2, leafliven2, leafdeadwt2, stemlivewt, stemliven, tuberlivewt, TuberliveN, nfact_expan, nfact_photo, LeafLAI, Cover_tot, PhenologyCurrentPhaseName, tt, Leafnodeno, LeafHeightValue, Leafnodeno_fx, Leafnodeno_sen, ttafteremergence, ttaftersowing, dlt_LeafLAI_carbon, dlt_LeafLAI_pot, no3(), swdef_photo, rootdepth, no3_demand, sw, ep, eo, es, cover_green, drain, vpd
        soil Templeton
          Water
            Layer:
              Thickness (mm)  BD (g/cc)  AirDry (mm/mm)  LL15 (mm/mm)  DUL (mm/mm)  SAT (mm/mm)
              300             1.2        0.08            0.14          0.3          0.5
              300             1.2        0.08            0.14          0.3          0.5
              300             1.2        0.05            0.14          0.3          0.44
              300             1.2        0.04            0.14          0.3          0.46
              300             1.2        0.06            0.14          0.3          0.44
              300             1.2        0.06            0.14          0.3          0.44
            SoilCrop wheat
              Layer:
                Thickness (mm)  LL (mm/mm)  KL (/day)  XF (0-1)
                300             0.13        0.06       1
                300             0.13        0.06       1
                300             0.1         0.06       1
                300             0.08        0.06       1
                300             0.11        0.06       1
                300             0.11        0.06       1
            SoilCrop potato2
              Layer:
                Thickness (mm)  LL (mm/mm)  KL (/day)  XF (0-1)
                300             0.14        0.1        1
                300             0.14        0.07       1
                300             0.14        0.05       1
                300             0.14        0.01       0
                300             0.14        0.05       0
                300             0.14        0.05       0
          SoilWat: SummerCona=4.4; WinterCona=4.4; SummerU=9; WinterU=9; SummerDate=1-Nov; WinterDate=1-Apr; DiffusConst=88; DiffusSlope=35.4; Salb=0.18; CN2Bare=68; CNRed=20; CNCov=0.8
            Layer:
              Thickness (mm)  SWCON (0-1)
              300             0.55
              300             0.55
              300             0.55
              300             0.55
              300             0.55
              300             0.55
          SoilOrganicMatter: RootCN=30; RootWT=3000; SoilCN=11.5; EnrACoeff=7.4; EnrBCoeff=0.2
            Layer:
              Thickness (mm)  OC (Total %)  FBiom (0-1)  FInert (0-1)
              300             1.82          0.025        0.3
              300             1.47          0.025        0.4
              300             1.2           0.015        0.75
              300             1.03          0.01         0.9
              300             0.47          0.01         0.96
              300             0.47          0.01         0.96
          Lab
            Layer:
              Thickness (mm)  PH (1:5 water)
              300             6.6
              300             6.2
              300             5.7
              300             5.5
              300             5.5
              300             5.5
          Sample Initial nitrogen
            Layer:
              Thickness (mm)  NO3 (ppm)  NH4 (ppm)
              300             25         0.1
              300             16.6667    0.1
              300             1.38889    0.1
              300             1.38889    0.1
              300             1.38889    0.1
              300             1.38889    0.1
          Sample Initial water
            Layer:
              Thickness (mm)  SW (mm/mm)
              300             0.22
              300             0.3
              300             0.3
              300             0.3
              300             0.3
              300             0.3
        manager ClimateControl
          category =  # Climate Control Window
          date1 = 1-jan  # Enter window START date (dd-mmm)
          date2 = 31-dec  # Enter window END date (dd-mmm)
          category =  # Climate Change Parameters
          MaxtChange = 0  # Change in maximum temperature (oC)
          MintChange = 0  # Change in minimum temperature (oC)
          RainChange = -100  # Relative change in daily rainfall (%)
          RadnChange = 0  # Relative change in daily radiation (%)
          CO2 = 350  # Atmospheric CO2 Concentration (ppm)
          on prenewmet:
```
!  Adjust daily temperatures, rainfall and radiation up or down according to user-defined amounts
! To apply different levels of climate control to different times of year add multiple copies of this logic into your simulation and change the window.

if (date_within('[date1], [date2]') = 1) then
   maxt = maxt + [MaxtChange]
   mint = mint + [MintChange]
   rain = rain + rain * [RainChange] / 100
   radn = radn + radn * [RadnChange] / 100
   co2 = [CO2]
 endif
```
          on Init:
```
co2 = [CO2]
```
        micromet -> /Simulations/FUE/FUE_300early/paddock/Micromet
        potato2 -> /Simulations/FUE/FUE_300early/paddock/potato2
    simulation RainShelter_14_outside_rainfeed -> /Simulations/Rainshelter/RainShelter_1_optimal_20@30
      area paddock -> /Simulations/Rainshelter/RainShelter_1_optimal_20@30/paddock
        folder Manager folder -> /Simulations/Rainshelter/RainShelter_1_optimal_20@30/paddock/Manager folder
          operations
            29/10/1987  irrigation apply amount= 15 (mm)
            8/11/1987  irrigation apply amount= 0.6 (mm)
            16/11/1987  irrigation apply amount= 0.4 (mm)
            20/11/1987  irrigation apply amount= 21 (mm)
            23/11/1987  irrigation apply amount= 3.3 (mm)
            28/11/1987  irrigation apply amount= 19.5 (mm)
            29/11/1987  irrigation apply amount= 1.4 (mm)
            30/11/1987  irrigation apply amount= 6.5 (mm)
            1/12/1987  irrigation apply amount= 2.5 (mm)
            5/12/1987  irrigation apply amount= 8.3 (mm)
            9/12/1987  irrigation apply amount= 4.3 (mm)
            11/12/1987  irrigation apply amount= 0.4 (mm)
            15/12/1987  irrigation apply amount= 17 (mm)
            16/12/1987  irrigation apply amount= 0.2 (mm)
            17/12/1987  irrigation apply amount= 0.1 (mm)
            19/12/1987  irrigation apply amount= 2.2 (mm)
            21/12/1987  irrigation apply amount= 33 (mm)
            22/12/1987  irrigation apply amount= 3.7 (mm)
            26/12/1987  irrigation apply amount= 17 (mm)
            30/12/1987  irrigation apply amount= 6.7 (mm)
            31/12/1987  irrigation apply amount= 19.1 (mm)
            9/01/1988  irrigation apply amount= 3.5 (mm)
            11/01/1988  irrigation apply amount= 24 (mm)
            14/01/1988  irrigation apply amount= 7.2 (mm)
            18/01/1988  irrigation apply amount= 5.3 (mm)
            19/01/1988  irrigation apply amount= 8.2 (mm)
            20/01/1988  irrigation apply amount= 1.4 (mm)
            21/01/1988  irrigation apply amount= 7 (mm)
            26/01/1988  irrigation apply amount= 27 (mm)
            28/01/1988  irrigation apply amount= 2.2 (mm)
            1/02/1988  irrigation apply amount= 25 (mm)
            2/02/1988  irrigation apply amount= 4.7 (mm)
            6/02/1988  irrigation apply amount= 27 (mm)
            7/02/1988  irrigation apply amount= 0.6 (mm)
            12/02/1988  irrigation apply amount= 27 (mm)
            14/02/1988  irrigation apply amount= 1.6 (mm)
            15/02/1988  irrigation apply amount= 35 (mm)
            21/02/1988  irrigation apply amount= 1.1 (mm)
            24/02/1988  irrigation apply amount= 26 (mm)
            25/02/1988  irrigation apply amount= 0.7 (mm)
            2/03/1988  irrigation apply amount= 17 (mm)
            6/03/1988  irrigation apply amount= 0.2 (mm)
            9/03/1988  irrigation apply amount= 25 (mm)
            10/03/1988  irrigation apply amount= 1.3 (mm)
            11/03/1988  irrigation apply amount= 2.1 (mm)
            12/03/1988  irrigation apply amount= 0.4 (mm)
            14/03/1988  irrigation apply amount= 0.3 (mm)
            15/03/1988  irrigation apply amount= 1 (mm)
            16/03/1988  irrigation apply amount= 3.9 (mm)
            17/03/1988  irrigation apply amount= 0.6 (mm)
            19/03/1988  irrigation apply amount= 0.4 (mm)
            24/03/1988  irrigation apply amount= 0.1 (mm)
            29/03/1988  irrigation apply amount= 6.1 (mm)
            13/10/1987  fertiliser apply amount= 10 (kg/ha), type= urea_N (), depth= 10 (mm)
            24/12/1987  fertiliser apply amount= 60 (kg/ha), type= urea_N (), depth= 10 (mm)
            19/01/1988  fertiliser apply amount= 40 (kg/ha), type= urea_N (), depth= 10 (mm)
  folder Cultivar
    simulation Burbank
      metfile met: filename=lincoln.met
      clock
        start_date = 20/10/2003  # Enter the start date of the simulation
        end_date = 01/06/2004  # Enter the end date of the simulation
      summaryfile: filename=Continuous Wheat Simulation.sum
      area paddock
        fertiliser
        surfaceom surface organic matter
          PoolName = wheat  # Organic Matter pool name
          type = wheat  # Organic Matter type
          mass = 2000  # Initial surface residue (kg/ha)
          cnr = 80  # C:N ratio of initial residue
          standing_fraction = 0  # Fraction of residue standing
        folder Manager folder
          manager Sowing rule
            on start_of_day:
```
      if (today=date('20-Oct')) then 
      potato2 sow population = 24, depth = 150, cultivar = russet, maxcover = 1.0, budnumber = 1, row_spacing = 650, crop_class = plant
      endif
```
          manager Harvesting rule
            # Harvesting criteria
            crop = potato2  # Enter name of crop to harvest when ripe
            on end_of_day:
            script: same as in FUE.FUE_300early.paddock.Manager folder.Harvesting rule
          operations
            20/10/2003  fertiliser apply amount= 100 (kg/ha), type= urea_N (), depth= 10 (mm)
            25/11/2003  fertiliser apply amount= 69 (kg/ha), type= urea_N (), depth= 10 (mm)
            26/11/2003  irrigation apply amount= 15 (mm)
            4/12/2003  irrigation apply amount= 50 (mm)
            16/12/2003  irrigation apply amount= 15 (mm)
            22/12/2003  irrigation apply amount= 50 (mm)
            30/12/2003  irrigation apply amount= 50 (mm)
            8/1/2004  irrigation apply amount= 50 (mm)
            21/1/2004  irrigation apply amount= 50 (mm)
            31/1/2004  irrigation apply amount= 50 (mm)
            27/2/2004  irrigation apply amount= 25 (mm)
          irrigation: same as FUE.FUE_300early.paddock.Manager folder.Irrigation
        outputfile
          events Reporting Frequency: event=Daily
          variables
            variables: dd/mmm/yyyy, leaflivewt2, leafliven2, leafdeadwt2, stemlivewt, stemliven, tuberlivewt, TuberliveN, nfact_expan, nfact_photo, LeafLAI, Cover_tot, PhenologyCurrentPhaseName, tt, Leafnodeno, LeafHeightValue, Leafnodeno_fx, Leafnodeno_sen, ttafteremergence, ttaftersowing, dlt_LeafLAI_carbon, dlt_LeafLAI_pot, no3(), swdef_photo, rootdepth, no3_demand, StageCodeValue, leafsize
        soil Templeton
          InitWater Initial water
            PercentMethod: Percent=1.00; Distributed=Evenly distributed
          Water
            Layer:
              Thickness (mm)  BD (g/cc)  AirDry (mm/mm)  LL15 (mm/mm)  DUL (mm/mm)  SAT (mm/mm)
              100             1.2        0.08            0.13          0.33         0.5
              200             1.2        0.08            0.13          0.33         0.5
              300             1.2        0.05            0.1           0.31         0.44
              300             1.2        0.04            0.08          0.27         0.46
              300             1.2        0.06            0.11          0.3          0.44
              300             1.2        0.06            0.11          0.3          0.44
            SoilCrop wheat: same as FUE.FUE_300early.paddock.Templeton.Water.wheat
            SoilCrop potato2: same as FUE.FUE_300early.paddock.Templeton.Water.potato2
            SoilCrop potato21: same as FUE.FUE_300early.paddock.Templeton.Water.potato2
          SoilWat: same as FUE.FUE_300early.paddock.Templeton.SoilWat
          SoilOrganicMatter: same as FUE.FUE_300early.paddock.Templeton.SoilOrganicMatter
          Lab
            Layer:
              Thickness (mm)  PH (1:5 water)
              100             6.6
              200             6.2
              300             5.7
              300             5.5
              300             5.5
              300             5.5
          Sample Initial nitrogen: same as FUE.FUE_300early.paddock.Templeton.Initial nitrogen
        micromet
          soilalbedo = 0.23
          a_interception = 0
          b_interception = 0
          c_interception = 0
          d_interception = 0
        potato2
          ini: filename=%apsim%\Model\Potato2.xml
    simulation IlamHardy -> /Simulations/Cultivar/Burbank
      area paddock -> /Simulations/Cultivar/Burbank/paddock
        folder Manager folder -> /Simulations/Cultivar/Burbank/paddock/Manager folder
          manager Sowing rule
            on start_of_day:
```
      if (today=date('20-Oct')) then 
      potato2 sow population = 24, depth = 150, cultivar = IlamHardy, maxcover = 1.0, budnumber = 1, row_spacing = 650, crop_class = plant
      endif
```
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