folder Simulations: version=23
  simulation Pukekohe_FSP_highN
    metfile met: filename=%apsim%\Tests\Validation\Potato\Pukehohe.met
    clock
      start_date = 1/05/2000  # Enter the start date of the simulation
      end_date = 1/12/2000  # Enter the end date of the simulation
    summaryfile: filename=Continuous Wheat Simulation.sum
    area paddock
      fertiliser
      surfaceom surface organic matter
        PoolName = wheat  # Organic Matter pool name
        type = wheat  # Organic Matter type
        mass = 2000  # Initial surface residue (kg/ha)
        cnr = 80  # C:N ratio of initial residue
        standing_fraction = 0  # Fraction of residue standing
      folder Manager folder
        manager Sowing rule
          category =  # Sowing criteria
          date1 = 2-may  # Enter sowing window START date (dd-mmm)
          date2 = 2-may  # Enter sowing window END date (dd-mmm)
          must_sow = yes  # Must sow?
          raincrit = 10  # Amount of rainfall
          rainnumdays = 7  # Number of days of rainfall
          esw_amount = 10  # Enter minimum allowable available soil water (mm)
          category =  # Sowing parameters
          crop = potato  # Enter name of crop to sow
          seeds = 5  # Enter sowing density (seeds/m2)
          depth = 200  # Enter sowing depth (mm)
          cultivar = russet  # Enter cultivar
          class = plant  # Enter crop growth class
          age = 1000  # Enter physiological age (deg days)
          row_spacing = 650  # Enter row spacing (mm)
          on start_of_day:
```
      if (paddock_is_fallow() = 1 ) then
         if (date_within('[date1], [date2]') = 1) then
            if (rain[[rainnumdays]] >= [raincrit] AND esw >= [esw_amount]) OR
                ('[must_sow]' = 'yes' AND today = date('[date2]'))) THEN
               ChooseNextCrop = 'yes'   ! for rotations
               stf = st(1) / 10.
               if (stf < 0) then
                  stf = 0
               endif
               if (stf > 1) then
                  stf = 1
               endif               
               swf = (sw(1) - ll15(1))/(dul(1) - ll15(1))
               if (swf < 0) then
                  swf = 0
               endif
               if (swf > 1) then
                  swf = 1
               endif
               density = [seeds]*4 !* [age]/2000. * stf * swf
               [crop] sow plants = density, sowing_depth = [depth], cultivar = [cultivar], row_spacing = [row_spacing], crop_class = [class]
            endif
         endif
      endif
```
        manager Harvesting rule
          category =  # Harvesting criteria
          crop = potato  # Enter name of crop to harvest when ripe
          on end_of_day:
```
           if [crop].StageName = 'maturity' or [crop].plant_status = 'dead' then
              [crop]  harvest
              [crop]  end_crop
           endif
```
        operations
          2/05/2000  fertiliser apply amount= 300 (kg/ha), type= urea_N (), depth= 10 (mm)
          14/06/2000  fertiliser apply amount= 170 (kg/ha), type= urea_N (), depth= 10 (mm)
        irrigation
          automatic_irrigation = off
          asw_depth = 600  # Depth to which ASW is calculated. (mm)
          crit_fr_asw = 0.5  # Fraction of ASW below which irrigation is applied (0-1.0)
          irrigation_efficiency = 1  # Efficiency of the irrigation. (0-1.0)
          irrigation_allocation = off  # Allocation limits
          allocation = 0  # Allocation in ML
          default_no3_conc = 0  # Nitrate concentration (ppm N)
          default_nh4_conc = 0  # Ammonium concentration (ppm N)
          default_cl_conc = 0  # Chloride concentration (ppm Cl)
          default_no3_conc = 0  # Nitrate concentration (ppm N)
          default_nh4_conc = 0  # Ammonium concentration (ppm N)
          default_cl_conc = 0  # Chloride concentration (ppm Cl)
      outputfile
        events Reporting Frequency: event=Daily
        variables
          variables: dd/mmm/yyyy, biomass, leafgreenwt, leafgreenn, leafsenescedwt, stemgreenwt, stemgreenn, TuberGreenWt, TuberGreenN, nfact_expan, nfact_photo, lai, leaf_no, stagename, tt, node_no, height, node_no_fx, node_no_sen, ttafteremergence, ttaftersowing
      soil Templeton
        InitWater Initial water
          PercentMethod: Percent=1.00; Distributed=Evenly distributed
        Water
          Layer:
            Thickness (mm)  BD (g/cc)  AirDry (mm/mm)  LL15 (mm/mm)  DUL (mm/mm)  SAT (mm/mm)
            100             1.2        0.08            0.13          0.33         0.5
            200             1.2        0.08            0.13          0.33         0.5
            300             1.2        0.05            0.1           0.31         0.44
            300             1.2        0.04            0.08          0.27         0.46
            300             1.2        0.06            0.11          0.3          0.44
            300             1.2        0.06            0.11          0.3          0.44
          SoilCrop wheat
            Layer:
              Thickness (mm)  LL (mm/mm)  KL (/day)  XF (0-1)
              100             0.13        0.06       1
              200             0.13        0.06       1
              300             0.1         0.06       1
              300             0.08        0.06       1
              300             0.11        0.06       1
              300             0.11        0.06       1
          SoilCrop potato
            Layer:
              Thickness (mm)  LL (mm/mm)  KL (/day)  XF (0-1)
              100             0.13        0.1        1
              200             0.13        0.1        1
              300             0.1         0.07       1
              300             0.08        0.05       1
              300             0.11        0.05       1
              300             0.11        0.05       1
        SoilWat: SummerCona=4.4; WinterCona=4.4; SummerU=9; WinterU=9; SummerDate=1-Nov; WinterDate=1-Apr; DiffusConst=88; DiffusSlope=35.4; Salb=0.18; CN2Bare=68; CNRed=20; CNCov=0.8
          Layer:
            Thickness (mm)  SWCON (0-1)
            100             0.55
            200             0.55
            300             0.55
            300             0.55
            300             0.55
            300             0.55
        SoilOrganicMatter: RootCN=30; RootWT=3000; SoilCN=11.5; EnrACoeff=7.4; EnrBCoeff=0.2
          Layer:
            Thickness (mm)  OC (Total %)  FBiom (0-1)  FInert (0-1)
            100             1.82          0.025        0.3
            200             1.47          0.025        0.4
            300             1.2           0.015        0.75
            300             1.03          0.01         0.9
            300             0.47          0.01         0.96
            300             0.47          0.01         0.96
        Lab
          Layer:
            Thickness (mm)  PH (1:5 water)
            100             6.6
            200             6.2
            300             5.7
            300             5.5
            300             5.5
            300             5.5
        Sample Initial nitrogen
          Layer:
            Thickness (mm)  NO3 (ppm)  NH4 (ppm)
            100             33.3333    0.1
            200             22.5       0.1
            300             1.38889    0.1
            300             1.38889    0.1
            300             1.38889    0.1
            300             1.38889    0.1
      potato
        ini: filename=%apsim%\Model\Potato.xml
      micromet
        soilalbedo = 0.23
        a_interception = 0
        b_interception = 0
        c_interception = 0
        d_interception = 0
  simulation Plant2 Pukekohe_FSP_highN1 -> /Simulations/Pukekohe_FSP_highN
    area paddock -> /Simulations/Pukekohe_FSP_highN/paddock
      folder Manager folder -> /Simulations/Pukekohe_FSP_highN/paddock/Manager folder
        manager Sowing rule
          # Sowing criteria
          date1 = 2-may  # Enter sowing window START date (dd-mmm)
          date2 = 2-may  # Enter sowing window END date (dd-mmm)
          must_sow = yes  # Must sow?
          raincrit = 10  # Amount of rainfall
          rainnumdays = 7  # Number of days of rainfall
          esw_amount = 10  # Enter minimum allowable available soil water (mm)
          # Sowing parameters
          crop = potato2  # Enter name of crop to sow
          seeds = 5  # Enter sowing density (seeds/m2)
          depth = 200  # Enter sowing depth (mm)
          cultivar = russet  # Enter cultivar
          class = plant  # Enter crop growth class
          age = 1000  # Enter physiological age (deg days)
          row_spacing = 650  # Enter row spacing (mm)
          on start_of_day:
```
      if (paddock_is_fallow() = 1 ) then
         if (date_within('[date1], [date2]') = 1) then
            if (rain[[rainnumdays]] >= [raincrit] AND esw >= [esw_amount]) OR
                ('[must_sow]' = 'yes' AND today = date('[date2]'))) THEN
               ChooseNextCrop = 'yes'   ! for rotations
               stf = st(1) / 10.
               if (stf < 0) then
                  stf = 0
               endif
               if (stf > 1) then
                  stf = 1
               endif               
               swf = (sw(1) - ll15(1))/(dul(1) - ll15(1))
               if (swf < 0) then
                  swf = 0
               endif
               if (swf > 1) then
                  swf = 1
               endif
               density = [seeds]*4 !* [age]/2000. * stf * swf
               [crop] sow population =density, depth = [depth], cultivar = [cultivar], MaxCover = 1.0, BudNumber = 1, row_spacing = [row_spacing], crop_class = [class]
            endif
         endif
      endif
```
        manager Harvesting rule
          # Harvesting criteria
          crop = potato2  # Enter name of crop to harvest when ripe
          on end_of_day:
```
           if [crop].StageName = 'maturity' or [crop].plant_status = 'dead' then
              [crop]  harvest
           endif
```
      potato2
        ini: filename=%apsim%\Model\Potato2.xml
