folder RS_Barley_8889: version=32
  simulation RS_Barley_8889_Control
    metfile met: filename=%apsim%\Examples\MetFiles\lincoln.met
    clock
      start_date = 01/09/1988  # Enter the start date of the simulation
      end_date = 01/03/1989  # Enter the end date of the simulation
    summaryfile
    area paddock
      surfaceom surface organic matter
        PoolName = wheat  # Organic Matter pool name
        type = wheat  # Organic Matter type
        mass = 500  # Initial surface residue (kg/ha)
        cnr = 80  # C:N ratio of initial residue
        standing_fraction = 0  # Fraction of residue standing
      outputfile: filename=RS_Barley_8889_Control.out; title=RS_Barley_8889_Control
        events Reporting Frequency: event=Daily
        variables
          variables: dd/mmm/yyyy as Date, biomass, yield, rain, es, biomass, drain, runoff, irrigation, leafgreenwt, cover_green, leafsenescedwt, stemgreenwt, headgreenwt, lai, ep, height, sw_dep(), runoff, drain, yieldwet, yield, grain_wt, grainwt, graintotalwt, sw, green_biomass, esw, sw_demand, sw_supply, sw_stress_photo, n_stress_photo, stage, node_no, leaf_no, cover_green, root_depth
      soil Templeton deep 1: Region=Plains; State=Canterbury; Country=New Zealand
        DataSource=Generic profile descriptions provided by Trevor Webb and data for functional horizions based on SWAMP project results
        Comments=Bulk density values were measured on the fine earth fraction so values entered into apsim soil are adjusted down to account for stone content (assuming stones are inert from all soil process so their mass and volume is removed from model paramaters).  SAT, DUL, LL15 and Air dry have been adjusted down to account for stone content.  OC has not been adjusted so the model will get the correct carbon and N amounts using the adjusted BD.
        SoilType = NZ_sedementary  # Soil description
        Analysis
          Layer:
            Thickness (mm)  Rocks (%)  PH (1:5 water)  CEC (cmol+/kg)  ParticleSizeSand (%)  ParticleSizeSilt (%)  ParticleSizeClay (%)
            180             0          6               13              14.5                  65.5                  20
            150             0          6               9               18                    58                    24
            400             0          6               9               14                    63                    23
            270             0          6               9               15                    66                    19
            500             0          6               9               15                    66                    19
        Water
          Layer:
            Thickness (mm)  KS (mm/day)  BD (g/cc)  Airdry (mm/mm)  LL15 (mm/mm)  DUL (mm/mm)  SAT (mm/mm)
            100             4832.04      1.3105     0.05            0.1           0.32         0.419
            200             389.229      1.524      0.05            0.1           0.3          0.3945
            200             16.3619      1.65       0.157           0.157         0.29         0.405
            200             97.995       1.601      0.189           0.173         0.31         0.366
            200             97.995       1.601      0.173           0.173         0.31         0.3655
            200             97.995       1.601      0.165           0.165         0.3          0.3575
            200             97.995       1.601      0.165           0.165         0.3          0.3575
            200             97.995       1.601      0.115           0.115         0.23         0.3161
          SoilCrop Barley
            Layer:
              Thickness (mm)  LL (mm/mm)  kl (/day)  xf (0-1)
              200             0.1         0.05       1
              200             0.1         0.09       0.5
              200             0.157       0.02       1
              200             0.173       0.08       1
              200             0.173       0.04       1
              200             0.165       0          1
              200             0.165       0          1
              200             0.115       0          1
        SoilWat
          Layer:
            Thickness (mm)  SWCON (0-1)
            200             0.9
            200             0.6
            200             0.4
            200             0.01
            200             0.4
            200             0.9
            200             0.9
            200             0.9
          SummerCona = 4.4
          SummerU = 9
          SummerDate = 1-oct
          WinterCona = 1.5
          WinterU = 2
          WinterDate = 1-Apr
          DiffusConst = 88
          DiffusSlope = 35
          Salb = 0.13
          Cn2Bare = 73
          CnRed = 20
          CnCov = 0.8
        SoilOrganicMatter: RootCn=40; RootWt=1000; SoilCn=11; EnrACoeff=7.4; EnrBCoeff=0.2
          Layer:
            Thickness (mm)  OC (Total %)  FBIOM (0-1)  FINERT (0-1)
            200             2.6251        0.0333099    0.437121
            200             1.24694       0.0186614    0.656885
            200             0.316004      0.0116634    0.849635
            200             0.207954      0.0102229    0.94496
            200             0.200366      0.0100221    0.982659
            200             -             -            -
            200             -             -            -
            200             -             -            -
        Sample Initial nitrogen
          Layer:
            Thickness (mm)  no3 (kg/ha)  nh4 (kg/ha)  SW (mm/mm)
            200             30           5            0.32
            200             15           0.5          0.3
            200             15           0.5          0.29
            200             10           0            0.33
            200             5            0            0.31
            200             5            0            0.3
            200             5            0            0.3
            200             5            0            0.23
      folder Manager folder
        operations
          26/09/1988  fertiliser apply amount= 50 (kg/ha), type= nh4so4_n, depth= 10 (mm)
          6/10/1988  irrigation apply amount= 27 (mm)
          13/10/1988  irrigation apply amount= 10 (mm)
          20/10/1988  irrigation apply amount= 30 (mm)
          27/10/1988  irrigation apply amount= 25 (mm)
          3/11/1988  irrigation apply amount= 25 (mm)
          10/11/1988  irrigation apply amount= 47 (mm)
          17/11/1988  irrigation apply amount= 32 (mm)
          24/11/1988  irrigation apply amount= 18 (mm)
          1/12/1988  irrigation apply amount= 35 (mm)
          8/12/1988  irrigation apply amount= 24 (mm)
          15/12/1988  irrigation apply amount= 43 (mm)
          22/12/1988  irrigation apply amount= 32 (mm)
          29/12/1988  irrigation apply amount= 36 (mm)
          02/11/1988  fertiliser apply amount= 70 (kg/ha), type= nh4so4_n, depth= 10 (mm)
        irrigation
          automatic_irrigation = off
          asw_depth = 600  # Depth to which ASW is calculated. (mm)
          crit_fr_asw = 0.5  # Fraction of ASW below which irrigation is applied (0-1.0)
          irrigation_efficiency = 1  # Efficiency of the irrigation. (0-1.0)
          irrigation_allocation = off  # Allocation limits
          allocation = 0  # Allocation in ML
          default_no3_conc = 0  # Nitrate concentration (ppm N)
          default_nh4_conc = 0  # Ammonium concentration (ppm N)
          default_cl_conc = 0  # Chloride concentration (ppm Cl)
          default_no3_conc = 0  # Nitrate concentration (ppm N)
          default_nh4_conc = 0  # Ammonium concentration (ppm N)
          default_cl_conc = 0  # Chloride concentration (ppm Cl)
        manager ClimateControl
          # Climate Control Window
          date1 = 01/09/1988  # Enter window START date (dd-mmm)
          date2 = 31/12/1989  # Enter window END date (dd-mmm)
          # Climate Change Parameters
          MaxtChange = 0  # Change in maximum temperature (oC)
          MintChange = 0  # Change in minimum temperature (oC)
          RainChange = -100  # Relative change in daily rainfall (%)
          RadnChange = 0  # Relative change in daily radiation (%)
          CO2 = 350  # Atmospheric CO2 Concentration (ppm)
          on prenewmet:
```
!  Adjust daily temperatures, rainfall and radiation up or down according to user-defined amounts
! To apply different levels of climate control to different times of year add multiple copies of this logic into your simulation and change the window.

if (date_within('[date1], [date2]') = 1) then
   maxt = maxt + [MaxtChange]
   mint = mint + [MintChange]
   rain = 0
   radn = radn + radn * [RadnChange] / 100
   co2 = [CO2]
 endif
```
        manager Sow on a fixed date
          #
          date = 07/09/1988  # Enter sowing date (dd-mmm)
          #
          crop = barley  # Enter name of crop to sow
          density = 291  # Enter sowing density (plants/m2)
          depth = 60  # Enter sowing depth (mm)
          cultivar = Triumph  # Enter cultivar
          class = plant  # Enter crop growth class
          row_spacing = 150  # Enter row spacing (mm)
          on start_of_day:
```
if today = date('[date]') then
   [crop] sow plants =[density], sowing_depth = [depth], cultivar = [cultivar], row_spacing = [row_spacing], crop_class = [class]
endif
```
      fertiliser
      micromet
        soilalbedo = 0.23
        a_interception = 0
        b_interception = 0
        c_interception = 0
        d_interception = 0
        ini: filename=%apsim%\Model\MicroMet_NZ_adjustment.xml
      barley
  simulation RS_Barley_8889_EarlyDrought1 -> /RS_Barley_8889/RS_Barley_8889_Control
    area paddock -> /RS_Barley_8889/RS_Barley_8889_Control/paddock
      outputfile -> /RS_Barley_8889/RS_Barley_8889_Control/paddock/outputfile: filename=RS_Barley_8889_EarlyDrought1.out; title=RS_Barley_8889_EarlyDrought1
        events Reporting Frequency -> /RS_Barley_8889/RS_Barley_8889_Control/paddock/outputfile/Reporting Frequency
        variables -> /RS_Barley_8889/RS_Barley_8889_Control/paddock/outputfile/Variables
      soil Templeton deep 1 -> /RS_Barley_8889/RS_Barley_8889_Control/paddock/Templeton deep 1 
        Water
          Layer:
            Thickness (mm)  KS (mm/day)  BD (g/cc)  Airdry (mm/mm)  LL15 (mm/mm)  DUL (mm/mm)  SAT (mm/mm)
            200             4832.04      1.3105     0.0115          0.0115        0.23         0.3805
            200             389.229      1.524      0.012           0.012         0.24         0.384
            200             16.3619      1.65       0.149           0.149         0.28         0.3415
            200             97.995       1.601      0.157           0.157         0.29         0.3495
            200             97.995       1.601      0.165           0.165         0.3          0.3575
            200             97.995       1.601      0.173           0.173         0.31         0.3655
            200             97.995       1.601      0.185           0.185         0.325        0.3775
            200             97.995       1.601      0.1986          0.1986        0.342        0.3911
          SoilCrop Barley
            Layer:
              Thickness (mm)  LL (mm/mm)  kl (/day)   xf (0-1)
              200             0.1535      0.242629    1
              200             0.201       0.36744     1
              200             0.201       0.0472522   0.301194
              200             0.162       0.0293168   1
              200             0.162       0.00528755  1
              200             -           -           -
              200             -           -           -
              200             -           -           -
        SoilWat: SummerCona=4.4; SummerU=9; SummerDate=1-Oct; WinterCona=3; WinterU=6; WinterDate=1-Apr; DiffusConst=88; DiffusSlope=35; Salb=0.13; Cn2Bare=73; CnRed=20; CnCov=0.8
          Layer:
            Thickness (mm)  SWCON (0-1)
            200             0.496442
            200             0.365575
            200             0.0968316
            200             0.306273
            200             0.306273
            200             -
            200             -
            200             -
        InitWater
          percentmethod: percent=1; distributed=filled from top
      barley
      folder Manager folder -> /RS_Barley_8889/RS_Barley_8889_Control/paddock/Manager folder
        operations
          26/09/1988  fertiliser apply amount= 50 (kg/ha), type= urea, depth= 10 (mm)
          3/11/1988  irrigation apply amount= 45 (mm)
          10/11/1988  irrigation apply amount= 47 (mm)
          17/11/1988  irrigation apply amount= 32 (mm)
          24/10/1988  irrigation apply amount= 18 (mm)
          1/12/1988  irrigation apply amount= 35 (mm)
          8/12/1988  irrigation apply amount= 24 (mm)
          15/12/1988  irrigation apply amount= 43 (mm)
          22/12/1988  irrigation apply amount= 32 (mm)
          29/12/1988  irrigation apply amount= 36 (mm)
          5/01/1989  irrigation apply amount= 35 (mm)
      fertiliser
  simulation RS_Barley_8889_EarlyDrought2 -> /RS_Barley_8889/RS_Barley_8889_Control
    area paddock -> /RS_Barley_8889/RS_Barley_8889_Control/paddock
      outputfile -> /RS_Barley_8889/RS_Barley_8889_Control/paddock/outputfile: filename=RS_Barley_8889_EarlyDrought2.out; title=RS_Barley_8889_EarlyDrought2
        events Reporting Frequency -> /RS_Barley_8889/RS_Barley_8889_Control/paddock/outputfile/Reporting Frequency
        variables -> /RS_Barley_8889/RS_Barley_8889_Control/paddock/outputfile/Variables
      soil Templeton deep 1 -> /RS_Barley_8889/RS_Barley_8889_Control/paddock/Templeton deep 1 
        InitWater
          percentmethod: percent=1; distributed=filled from top
      barley
      folder Manager folder -> /RS_Barley_8889/RS_Barley_8889_Control/paddock/Manager folder
        operations
          26/09/1988  fertiliser apply amount= 50 (kg/ha), type= urea, depth= 10 (mm)
          17/11/1988  irrigation apply amount= 57 (mm)
          24/10/1988  irrigation apply amount= 18 (mm)
          1/12/1988  irrigation apply amount= 35 (mm)
          8/12/1988  irrigation apply amount= 24 (mm)
          15/12/1988  irrigation apply amount= 43 (mm)
          22/12/1988  irrigation apply amount= 32 (mm)
          29/12/1988  irrigation apply amount= 36 (mm)
          5/01/1989  irrigation apply amount= 35 (mm)
          12/01/1989  irrigation apply amount= 26 (mm)
          19/01/1989  irrigation apply amount= 22 (mm)
      fertiliser
  simulation RS_Barley_8889_EarlyDrought3 -> /RS_Barley_8889/RS_Barley_8889_Control
    area paddock -> /RS_Barley_8889/RS_Barley_8889_Control/paddock
      outputfile -> /RS_Barley_8889/RS_Barley_8889_Control/paddock/outputfile: filename=RS_Barley_8889_EarlyDrought3.out; title=RS_Barley_8889_EarlyDrought3
        events Reporting Frequency -> /RS_Barley_8889/RS_Barley_8889_Control/paddock/outputfile/Reporting Frequency
        variables -> /RS_Barley_8889/RS_Barley_8889_Control/paddock/outputfile/Variables
      soil Templeton deep 1 -> /RS_Barley_8889/RS_Barley_8889_Control/paddock/Templeton deep 1 
        InitWater
          percentmethod: percent=1; distributed=filled from top
      barley
      folder Manager folder -> /RS_Barley_8889/RS_Barley_8889_Control/paddock/Manager folder
        operations
          26/09/1988  fertiliser apply amount= 50 (kg/ha), type= urea, depth= 10 (mm)
          24/10/1988  irrigation apply amount= 43 (mm)
          1/12/1988  irrigation apply amount= 35 (mm)
          8/12/1988  irrigation apply amount= 24 (mm)
          15/12/1988  irrigation apply amount= 43 (mm)
          22/12/1988  irrigation apply amount= 32 (mm)
          29/12/1988  irrigation apply amount= 36 (mm)
          5/01/1989  irrigation apply amount= 35 (mm)
          12/01/1989  irrigation apply amount= 26 (mm)
          19/01/1989  irrigation apply amount= 22 (mm)
      fertiliser
  simulation RS_Barley_8889_EarlyDrought4 -> /RS_Barley_8889/RS_Barley_8889_Control
    area paddock -> /RS_Barley_8889/RS_Barley_8889_Control/paddock
      outputfile -> /RS_Barley_8889/RS_Barley_8889_Control/paddock/outputfile: filename=RS_Barley_8889_EarlyDrought4.out; title=RS_Barley_8889_EarlyDrought4
        events Reporting Frequency -> /RS_Barley_8889/RS_Barley_8889_Control/paddock/outputfile/Reporting Frequency
        variables -> /RS_Barley_8889/RS_Barley_8889_Control/paddock/outputfile/Variables
      soil Templeton deep 1 -> /RS_Barley_8889/RS_Barley_8889_Control/paddock/Templeton deep 1 
        Water
          Layer:
            Thickness (mm)  KS (mm/day)  BD (g/cc)  Airdry (mm/mm)  LL15 (mm/mm)  DUL (mm/mm)  SAT (mm/mm)
            200             4832.04      1.3105     0.0115          0.0115        0.23         0.3805
            200             389.229      1.524      0.012           0.012         0.24         0.384
            200             16.3619      1.65       0.149           0.149         0.28         0.3415
            200             97.995       1.601      0.157           0.157         0.29         0.3495
            200             97.995       1.601      0.165           0.165         0.3          0.3575
            200             97.995       1.601      0.173           0.173         0.31         0.3655
            200             97.995       1.601      0.185           0.185         0.325        0.3775
            200             97.995       1.601      0.1986          0.1986        0.342        0.3911
          SoilCrop Barley -> /RS_Barley_8889/RS_Barley_8889_Control/paddock/Templeton deep 1 /Water/Barley
        InitWater
          percentmethod: percent=1; distributed=filled from top
      barley
      folder Manager folder -> /RS_Barley_8889/RS_Barley_8889_Control/paddock/Manager folder
        operations
          26/09/1988  fertiliser apply amount= 50 (kg/ha), type= urea, depth= 10 (mm)
          1/12/1988  irrigation apply amount= 35 (mm)
          8/12/1988  irrigation apply amount= 50 (mm)
          15/12/1988  irrigation apply amount= 43 (mm)
          22/12/1988  irrigation apply amount= 32 (mm)
          29/12/1988  irrigation apply amount= 36 (mm)
          5/01/1989  irrigation apply amount= 35 (mm)
          12/01/1989  irrigation apply amount= 26 (mm)
          19/01/1989  irrigation apply amount= 22 (mm)
          26/01/1989  irrigation apply amount= 20 (mm)
          2/02/1989  irrigation apply amount = 17 (mm)
          9/02/1989  irrigation apply amount= 15 (mm)
      fertiliser
  simulation RS_Barley_8889_MiddleDrought1 -> /RS_Barley_8889/RS_Barley_8889_Control
    area paddock -> /RS_Barley_8889/RS_Barley_8889_Control/paddock
      outputfile -> /RS_Barley_8889/RS_Barley_8889_Control/paddock/outputfile: filename=RS_Barley_8889_MiddleDrought1.out; title=RS_Barley_8889_MiddleDrought1
        events Reporting Frequency -> /RS_Barley_8889/RS_Barley_8889_Control/paddock/outputfile/Reporting Frequency
        variables -> /RS_Barley_8889/RS_Barley_8889_Control/paddock/outputfile/Variables
      soil Templeton deep 1 -> /RS_Barley_8889/RS_Barley_8889_Control/paddock/Templeton deep 1 
        InitWater
          percentmethod: percent=1; distributed=filled from top
      folder Manager folder -> /RS_Barley_8889/RS_Barley_8889_Control/paddock/Manager folder
        operations
          26/09/1988  fertiliser apply amount= 50 (kg/ha), type= urea, depth= 10 (mm)
          6/10/1988  irrigation apply amount= 27 (mm)
          13/10/1988  irrigation apply amount= 10 (mm)
          20/10/1988  irrigation apply amount= 30 (mm)
          27/10/1988  irrigation apply amount= 25 (mm)
          3/11/1988  irrigation apply amount= 25 (mm)
          24/10/1988  irrigation apply amount= 43 (mm)
          1/12/1988  irrigation apply amount= 35 (mm)
          8/12/1988  irrigation apply amount= 24 (mm)
          15/12/1988  irrigation apply amount= 43 (mm)
          22/12/1988  irrigation apply amount= 32 (mm)
          29/12/1988  irrigation apply amount= 36 (mm)
  simulation RS_Barley_8889_MiddleDrought2 -> /RS_Barley_8889/RS_Barley_8889_Control
    area paddock -> /RS_Barley_8889/RS_Barley_8889_Control/paddock
      outputfile -> /RS_Barley_8889/RS_Barley_8889_Control/paddock/outputfile: filename=RS_Barley_8889_MiddleDrought2.out; title=RS_Barley_8889_MiddleDrought2
        events Reporting Frequency -> /RS_Barley_8889/RS_Barley_8889_Control/paddock/outputfile/Reporting Frequency
        variables -> /RS_Barley_8889/RS_Barley_8889_Control/paddock/outputfile/Variables
      soil Templeton deep 1 -> /RS_Barley_8889/RS_Barley_8889_Control/paddock/Templeton deep 1 
        InitWater
          percentmethod: percent=1; distributed=filled from top
      folder Manager folder -> /RS_Barley_8889/RS_Barley_8889_Control/paddock/Manager folder
        operations
          26/09/1988  fertiliser apply amount= 50 (kg/ha), type= urea, depth= 10 (mm)
          6/10/1988  irrigation apply amount= 27 (mm)
          13/10/1988  irrigation apply amount= 10 (mm)
          20/10/1988  irrigation apply amount= 30 (mm)
          27/10/1988  irrigation apply amount= 25 (mm)
          3/11/1988  irrigation apply amount= 25 (mm)
          1/12/1988  irrigation apply amount= 35 (mm)
          8/12/1988  irrigation apply amount= 50 (mm)
          15/12/1988  irrigation apply amount= 43 (mm)
          22/12/1988  irrigation apply amount= 32 (mm)
          29/12/1988  irrigation apply amount= 36 (mm)
  simulation RS_Barley_8889_MiddleDrought3 -> /RS_Barley_8889/RS_Barley_8889_Control
    area paddock -> /RS_Barley_8889/RS_Barley_8889_Control/paddock
      outputfile -> /RS_Barley_8889/RS_Barley_8889_Control/paddock/outputfile: filename=RS_Barley_8889_MiddleDrought3.out; title=RS_Barley_8889_MiddleDrought3
        events Reporting Frequency -> /RS_Barley_8889/RS_Barley_8889_Control/paddock/outputfile/Reporting Frequency
        variables -> /RS_Barley_8889/RS_Barley_8889_Control/paddock/outputfile/Variables
      soil Templeton deep 1 -> /RS_Barley_8889/RS_Barley_8889_Control/paddock/Templeton deep 1 
        InitWater
          percentmethod: percent=1; distributed=filled from top
      folder Manager folder -> /RS_Barley_8889/RS_Barley_8889_Control/paddock/Manager folder
        operations
          26/09/1988  fertiliser apply amount= 50 (kg/ha), type= urea, depth= 10 (mm)
          6/10/1988  irrigation apply amount= 27 (mm)
          13/10/1988  irrigation apply amount= 10 (mm)
          20/10/1988  irrigation apply amount= 30 (mm)
          27/10/1988  irrigation apply amount= 25 (mm)
          3/11/1988  irrigation apply amount= 25 (mm)
          15/12/1988  irrigation apply amount= 43 (mm)
          22/12/1988  irrigation apply amount= 32 (mm)
          29/12/1988  irrigation apply amount= 36 (mm)
  simulation RS_Barley_8889_MiddleDrought4 -> /RS_Barley_8889/RS_Barley_8889_Control
    area paddock -> /RS_Barley_8889/RS_Barley_8889_Control/paddock
      outputfile -> /RS_Barley_8889/RS_Barley_8889_Control/paddock/outputfile: filename=RS_Barley_8889_MiddleDrought4.out; title=RS_Barley_8889_MiddleDrought4
        events Reporting Frequency -> /RS_Barley_8889/RS_Barley_8889_Control/paddock/outputfile/Reporting Frequency
        variables -> /RS_Barley_8889/RS_Barley_8889_Control/paddock/outputfile/Variables
      soil Templeton deep 1 -> /RS_Barley_8889/RS_Barley_8889_Control/paddock/Templeton deep 1 
        Water
          Layer:
            Thickness (mm)  KS (mm/day)  BD (g/cc)  Airdry (mm/mm)  LL15 (mm/mm)  DUL (mm/mm)  SAT (mm/mm)
            100             4832.04      1.3105     0.09            0.1           0.28         0.398
            200             389.229      1.524      0.06            0.125         0.3          0.405
            200             16.3619      1.65       0.173           0.173         0.31         0.3655
            200             97.995       1.601      0.1             0.1           0.175        0.31225
            200             97.995       1.601      0.141           0.141         0.27         0.3335
            200             97.995       1.601      0.08            0.08          0.16         0.3112
            200             97.995       1.601      0.141           0.141         0.27         0.3335
            200             97.995       1.601      0.115           0.115         0.23         0.316
          SoilCrop Barley
            Layer:
              Thickness (mm)  LL (mm/mm)  kl (/day)  xf (0-1)
              100             0.1         0.08       1
              200             0.125       0.09       0.5
              200             0.173       0.02       1
              200             0.1         0.08       1
              200             0.141       0.04       1
              200             0.08        0          1
              200             0.141       0          1
              200             0.115       0          1
        SoilWat
          Layer:
            Thickness (mm)  SWCON (0-1)
            100             1
            200             0.9
            200             0.1
            200             0.05
            200             0.9
            200             0.9
            200             0.9
            200             0.9
          SummerCona = 4.4
          SummerU = 9
          SummerDate = 1-oct
          WinterCona = 1.5
          WinterU = 2
          WinterDate = 1-Apr
          DiffusConst = 88
          DiffusSlope = 35
          Salb = 0.13
          Cn2Bare = 73
          CnRed = 20
          CnCov = 0.8
        Sample Initial nitrogen
          Layer:
            Thickness (mm)  no3 (kg/ha)  nh4 (kg/ha)  SW (mm/mm)
            100             30           5            0.28
            200             15           0.5          0.3
            200             15           0.5          0.31
            200             10           0            0.175
            200             5            0            0.27
            200             5            0            0.16
            200             5            0            0.27
            200             5            0            0.23
      folder Manager folder -> /RS_Barley_8889/RS_Barley_8889_Control/paddock/Manager folder
        operations
          26/09/1988  fertiliser apply amount= 50 (kg/ha), type= urea, depth= 10 (mm)
          6/10/1988  irrigation apply amount= 27 (mm)
          13/10/1988  irrigation apply amount= 10 (mm)
          20/10/1988  irrigation apply amount= 30 (mm)
          27/10/1988  irrigation apply amount= 25 (mm)
          3/11/1988  irrigation apply amount= 0 (mm)
  simulation RS_Barley_8889_LateDrought1 -> /RS_Barley_8889/RS_Barley_8889_Control
    area paddock -> /RS_Barley_8889/RS_Barley_8889_Control/paddock
      outputfile -> /RS_Barley_8889/RS_Barley_8889_Control/paddock/outputfile: filename=RS_Barley_8889_LateDrought1.out; title=RS_Barley_8889_LateDrought1
        events Reporting Frequency -> /RS_Barley_8889/RS_Barley_8889_Control/paddock/outputfile/Reporting Frequency
        variables -> /RS_Barley_8889/RS_Barley_8889_Control/paddock/outputfile/Variables
      soil Templeton deep 1 -> /RS_Barley_8889/RS_Barley_8889_Control/paddock/Templeton deep 1 
        InitWater
          percentmethod: percent=1; distributed=filled from top
      folder Manager folder -> /RS_Barley_8889/RS_Barley_8889_Control/paddock/Manager folder
        operations
          26/09/1988  fertiliser apply amount= 50 (kg/ha), type= urea, depth= 10 (mm)
          6/10/1988  irrigation apply amount= 27 (mm)
          13/10/1988  irrigation apply amount= 10 (mm)
          20/10/1988  irrigation apply amount= 30 (mm)
          27/10/1988  irrigation apply amount= 25 (mm)
          3/11/1988  irrigation apply amount= 25 (mm)
          10/11/1988  irrigation apply amount= 47 (mm)
          17/11/1988  irrigation apply amount= 32 (mm)
  simulation RS_Barley_8889_LateDrought2 -> /RS_Barley_8889/RS_Barley_8889_Control
    area paddock -> /RS_Barley_8889/RS_Barley_8889_Control/paddock
      outputfile -> /RS_Barley_8889/RS_Barley_8889_Control/paddock/outputfile: filename=RS_Barley_8889_LateDrought2.out; title=RS_Barley_8889_LateDrought2
        events Reporting Frequency -> /RS_Barley_8889/RS_Barley_8889_Control/paddock/outputfile/Reporting Frequency
        variables -> /RS_Barley_8889/RS_Barley_8889_Control/paddock/outputfile/Variables
      soil Templeton deep 1 -> /RS_Barley_8889/RS_Barley_8889_Control/paddock/Templeton deep 1 
        InitWater
          percentmethod: percent=1; distributed=filled from top
      folder Manager folder -> /RS_Barley_8889/RS_Barley_8889_Control/paddock/Manager folder
        operations
          26/09/1988  fertiliser apply amount= 50 (kg/ha), type= urea, depth= 10 (mm)
          6/10/1988  irrigation apply amount= 27 (mm)
          13/10/1988  irrigation apply amount= 10 (mm)
          20/10/1988  irrigation apply amount= 30 (mm)
          27/10/1988  irrigation apply amount= 25 (mm)
          3/11/1988  irrigation apply amount= 25 (mm)
          10/11/1988  irrigation apply amount= 47 (mm)
          17/11/1988  irrigation apply amount= 32 (mm)
          24/10/1988  irrigation apply amount= 18 (mm)
  simulation RS_Barley_8889_LateDrought3 -> /RS_Barley_8889/RS_Barley_8889_Control
    area paddock -> /RS_Barley_8889/RS_Barley_8889_Control/paddock
      outputfile -> /RS_Barley_8889/RS_Barley_8889_Control/paddock/outputfile: filename=RS_Barley_8889_LateDrought3.out; title=RS_Barley_8889_LateDrought3
        events Reporting Frequency -> /RS_Barley_8889/RS_Barley_8889_Control/paddock/outputfile/Reporting Frequency
        variables -> /RS_Barley_8889/RS_Barley_8889_Control/paddock/outputfile/Variables
      soil Templeton deep 1 -> /RS_Barley_8889/RS_Barley_8889_Control/paddock/Templeton deep 1 
        InitWater
          percentmethod: percent=1; distributed=filled from top
      folder Manager folder -> /RS_Barley_8889/RS_Barley_8889_Control/paddock/Manager folder
        operations
          26/09/1988  fertiliser apply amount= 50 (kg/ha), type= urea, depth= 10 (mm)
          6/10/1988  irrigation apply amount= 27 (mm)
          13/10/1988  irrigation apply amount= 10 (mm)
          20/10/1988  irrigation apply amount= 30 (mm)
          27/10/1988  irrigation apply amount= 25 (mm)
          3/11/1988  irrigation apply amount= 25 (mm)
          10/11/1988  irrigation apply amount= 47 (mm)
          17/11/1988  irrigation apply amount= 32 (mm)
          24/10/1988  irrigation apply amount= 18 (mm)
          1/12/1988  irrigation apply amount= 35 (mm)
  simulation RS_Barley_8889_Full_OutRS -> /RS_Barley_8889/RS_Barley_8889_Control
    area paddock -> /RS_Barley_8889/RS_Barley_8889_Control/paddock
      outputfile -> /RS_Barley_8889/RS_Barley_8889_Control/paddock/outputfile: filename=RS_Barley_8889_Full_OutRS.out; title=RS_Barley_8889_Full_OutRS
        events Reporting Frequency -> /RS_Barley_8889/RS_Barley_8889_Control/paddock/outputfile/Reporting Frequency
        variables -> /RS_Barley_8889/RS_Barley_8889_Control/paddock/outputfile/Variables
      soil Templeton deep 1 -> /RS_Barley_8889/RS_Barley_8889_Control/paddock/Templeton deep 1 
        InitWater
          percentmethod: percent=1; distributed=filled from top
      folder Manager folder -> /RS_Barley_8889/RS_Barley_8889_Control/paddock/Manager folder
        operations
          26/09/1988  fertiliser apply amount= 50 (kg/ha), type= urea, depth= 10 (mm)
          6/10/1988  irrigation apply amount= 28 (mm)
          13/10/1988  irrigation apply amount= 13 (mm)
          20/10/1988  irrigation apply amount= 32 (mm)
          27/10/1988  irrigation apply amount= 26 (mm)
          3/11/1988  irrigation apply amount= 46 (mm)
          10/11/1988  irrigation apply amount= 21 (mm)
          17/11/1988  irrigation apply amount= 37 (mm)
          24/10/1988  irrigation apply amount= 19 (mm)
          1/12/1988  irrigation apply amount= 40 (mm)
          8/12/1988  irrigation apply amount= 31 (mm)
          15/12/1988  irrigation apply amount= 43 (mm)
          22/12/1988  irrigation apply amount= 40 (mm)
          29/12/1988  irrigation apply amount= 56 (mm)
        manager ClimateControl (disabled)
          # Climate Control Window
          date1 = 01/09/1988  # Enter window START date (dd-mmm)
          date2 = 31/12/1989  # Enter window END date (dd-mmm)
          # Climate Change Parameters
          MaxtChange = 0  # Change in maximum temperature (oC)
          MintChange = 0  # Change in minimum temperature (oC)
          RainChange = -100  # Relative change in daily rainfall (%)
          RadnChange = 0  # Relative change in daily radiation (%)
          CO2 = 350  # Atmospheric CO2 Concentration (ppm)
          on prenewmet:
          script: same as in RS_Barley_8889_Control.paddock.Manager folder.ClimateControl
  simulation RS_Barley_8889_Rain_OutRS -> /RS_Barley_8889/RS_Barley_8889_Control
    area paddock -> /RS_Barley_8889/RS_Barley_8889_Control/paddock
      outputfile -> /RS_Barley_8889/RS_Barley_8889_Control/paddock/outputfile: filename=RS_Barley_8889_Rain_OutRS.out; title=RS_Barley_8889_Rain_OutRS
        events Reporting Frequency -> /RS_Barley_8889/RS_Barley_8889_Control/paddock/outputfile/Reporting Frequency
        variables -> /RS_Barley_8889/RS_Barley_8889_Control/paddock/outputfile/Variables
      soil Templeton deep 1 -> /RS_Barley_8889/RS_Barley_8889_Control/paddock/Templeton deep 1 
        Water
          Layer:
            Thickness (mm)  KS (mm/day)  BD (g/cc)  Airdry (mm/mm)  LL15 (mm/mm)  DUL (mm/mm)  SAT (mm/mm)
            100             4832.04      1.3105     0.05            0.1           0.32         0.419
            200             389.229      1.524      0.012           0.1           0.284        0.3994
            200             16.3619      1.65       0.152           0.1522        0.284        0.3447
            200             97.995       1.601      0.082           0.082         0.164        0.31148
            200             97.995       1.601      0.133           0.133         0.26         0.3255
            200             97.995       1.601      0.09            0.09          0.18         0.3126
            200             97.995       1.601      0.085           0.085         0.17         0.3119
            200             97.995       1.601      0.115           0.115         0.23         0.3161
          SoilCrop Barley
            Layer:
              Thickness (mm)  LL (mm/mm)  kl (/day)   xf (0-1)
              200             0.1         0.242629    1
              200             0.1         0.36744     1
              200             0.152       0.0472522   1
              200             0.082       0.0293168   1
              200             0.133       0.00528755  1
              200             0.09        0           1
              200             0.085       0           1
              200             0.115       0           1
        SoilWat
          Layer:
            Thickness (mm)  SWCON (0-1)
            200             0.1
            200             0.6
            200             0.4
            200             0.4
            200             0.4
            200             0.9
            200             0.9
            200             0.9
          SummerCona = 4.4
          SummerU = 9
          SummerDate = 1-oct
          WinterCona = 1.5
          WinterU = 2
          WinterDate = 1-Apr
          DiffusConst = 88
          DiffusSlope = 35
          Salb = 0.13
          Cn2Bare = 73
          CnRed = 20
          CnCov = 0.8
        Sample Initial nitrogen
          Layer:
            Thickness (mm)  no3 (kg/ha)  nh4 (kg/ha)  SW (mm/mm)
            200             30           5            0.32
            200             15           0.5          0.284
            200             15           0.5          0.284
            200             10           0            0.164
            200             5            0            0.26
            200             5            0            0.18
            200             5            0            0.17
            200             5            0            0.23
      folder Manager folder -> /RS_Barley_8889/RS_Barley_8889_Control/paddock/Manager folder
        operations
          26/09/1988  fertiliser apply amount= 50 (kg/ha), type= urea, depth= 10 (mm)
          6/10/1988  irrigation apply amount= 1.2 (mm)
          13/10/1988  irrigation apply amount= 3.3 (mm)
          20/10/1988  irrigation apply amount= 1.5 (mm)
          27/10/1988  irrigation apply amount= 0.8 (mm)
          3/11/1988  irrigation apply amount= 21.1 (mm)
          10/11/1988  irrigation apply amount= 1.2 (mm)
          17/11/1988  irrigation apply amount= 4.7 (mm)
          24/10/1988  irrigation apply amount= 1.1 (mm)
          1/12/1988  irrigation apply amount= 5.2 (mm)
          8/12/1988  irrigation apply amount= 6.8 (mm)
          15/12/1988  irrigation apply amount= 0 (mm)
          22/12/1988  irrigation apply amount= 8.2 (mm)
          29/12/1988  irrigation apply amount= 19.7 (mm)
          02/11/1988  fertiliser apply amount= 70 (kg/ha), type= nh4so4_n, depth= 10 (mm)
        manager ClimateControl (disabled): same as RS_Barley_8889_Full_OutRS.paddock.Manager folder.ClimateControl
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