folder RS_Barley_9596: version=32
  simulation RS_Barley_9596_Fulldrought_N150
    metfile met: filename=lincoln.met
    clock
      start_date = 01/10/1995  # Enter the start date of the simulation
      end_date = 01/03/1996  # Enter the end date of the simulation
    summaryfile
    area paddock
      surfaceom surface organic matter
        PoolName = wheat  # Organic Matter pool name
        type = wheat  # Organic Matter type
        mass = 1000  # Initial surface residue (kg/ha)
        cnr = 80  # C:N ratio of initial residue
        standing_fraction = 0  # Fraction of residue standing
      outputfile: filename=RS_Barley_9596_Fulldrought_N150.out; title=RS_Barley_9596_Fulldrought_N150
        events Reporting Frequency: event=Daily
        variables
          variables: dd/mmm/yyyy as Date, biomass, yield, rain, es, biomass, drain, runoff, irrigation, leafgreenwt, cover_green, leafsenescedwt, stemgreenwt, headgreenwt, lai, ep, height, sw_dep(), runoff, drain, yieldwet, yield, grain_wt, grainwt, graintotalwt, sw, green_biomass, esw
      soil Templeton deep 1: Region=Plains; State=Canterbury; Country=New Zealand
        DataSource=Generic profile descriptions provided by Trevor Webb and data for functional horizions based on SWAMP project results
        Comments=Bulk density values were measured on the fine earth fraction so values entered into apsim soil are adjusted down to account for stone content (assuming stones are inert from all soil process so their mass and volume is removed from model paramaters).  SAT, DUL, LL15 and Air dry have been adjusted down to account for stone content.  OC has not been adjusted so the model will get the correct carbon and N amounts using the adjusted BD.
        SoilType = NZ_sedementary  # Soil description
        Analysis
          Layer:
            Thickness (mm)  Rocks (%)  PH (1:5 water)  CEC (cmol+/kg)  ParticleSizeSand (%)  ParticleSizeSilt (%)  ParticleSizeClay (%)
            180             0          6               13              14.5                  65.5                  20
            150             0          6               9               18                    58                    24
            400             0          6               9               14                    63                    23
            270             0          6               9               15                    66                    19
            500             0          6               9               15                    66                    19
        Water
          Layer:
            Thickness (mm)  KS (mm/day)  BD (g/cc)  Airdry (mm/mm)  LL15 (mm/mm)  DUL (mm/mm)  SAT (mm/mm)
            200             4832.04      1.3105     0.0115          0.0115        0.23         0.3805
            200             389.229      1.524      0.012           0.012         0.24         0.384
            200             16.3619      1.65       0.149           0.149         0.28         0.3415
            200             97.995       1.601      0.157           0.157         0.29         0.3495
            200             97.995       1.601      0.165           0.165         0.3          0.3575
            200             97.995       1.601      0.173           0.173         0.31         0.3655
            200             97.995       1.601      0.185           0.185         0.325        0.3775
            200             97.995       1.601      0.1986          0.1986        0.342        0.3911
          SoilCrop Barley
            Layer:
              Thickness (mm)  LL (mm/mm)  kl (/day)   xf (0-1)
              180             0.1535      0.242629    1
              150             0.201       0.36744     1
              400             0.201       0.0472522   0.301194
              270             0.162       0.0293168   1
              500             0.162       0.00528755  1
          SoilCrop Canola
            Layer:
              Thickness (mm)  LL (mm/mm)  kl (/day)   xf (0-1)
              180             0.1535      0.242629    1
              150             0.201       0.36744     0.825307
              400             0.201       0.0472522   0.120996
              270             0.162       0.0293168   0.510686
              500             0.162       0.00528755  0.510686
          SoilCrop Cloverseed
            Layer:
              Thickness (mm)  LL (mm/mm)  kl (/day)    xf (0-1)
              180             0.1535      0.173413     1
              150             0.201       0.193986     1
              400             0.201       0.0143601    0.153816
              270             0.162       0.00706269   0.731982
              500             0.162       0.000616139  0.731982
          SoilCrop Fieldpea
            Layer:
              Thickness (mm)  LL (mm/mm)  kl (/day)   xf (0-1)
              180             0.1535      0.22882     1
              150             0.201       0.330128    0.449329
              400             0.201       0.0241696   0.090718
              270             0.162       0.0132411   0.301194
              500             0.162       0.00122552  0.301194
          SoilCrop Fababean
            Layer:
              Thickness (mm)  LL (mm/mm)  kl (/day)  xf (0-1)
              180             0.1535      0.255792   1
              150             0.201       0.420882   0.825307
              400             0.201       0.120698   0.120996
              270             0.162       0.0591381  0.510686
              500             0.162       0.020134   0.510686
          SoilCrop kale: same as RS_Barley_9596_Fulldrought_N150.paddock.Templeton deep 1.Water.Canola
          SoilCrop ItallianRyegrass: same as RS_Barley_9596_Fulldrought_N150.paddock.Templeton deep 1.Water.Canola
          SoilCrop Lucerne
            Layer:
              Thickness (mm)  LL (mm/mm)  kl (/day)  xf (0-1)
              180             0.1535      0.20426    1
              150             0.201       0.386305   1
              400             0.201       0.1589     0.301194
              270             0.162       0.106638   1
              500             0.162       0.0441555  1
          SoilCrop Maize
            Layer:
              Thickness (mm)  LL (mm/mm)  kl (/day)  xf (0-1)
              180             0.1535      0.262296   1
              150             0.201       0.446104   0.825307
              400             0.201       0.159359   0.120996
              270             0.162       0.105964   0.510686
              500             0.162       0.0347419  0.510686
          SoilCrop Oats
            Layer:
              Thickness (mm)  LL (mm/mm)  kl (/day)   xf (0-1)
              180             0.1535      0.242629    1
              150             0.201       0.36744     1
              400             0.201       0.0472522   0.153816
              270             0.162       0.0293168   0.731982
              500             0.162       0.00528755  0.731982
          SoilCrop Potato
            Layer:
              Thickness (mm)  LL (mm/mm)  kl (/day)    xf (0-1)
              180             0.1535      0.199694     1
              150             0.201       0.201525     0.449329
              400             0.201       0.00753395   0.090718
              270             0.162       0.00200619   0.301194
              500             0.162       6.16568e-05  0.301194
          SoilCrop Grassseed
            Layer:
              Thickness (mm)  LL (mm/mm)  kl (/day)    xf (0-1)
              180             0.1535      0.214378     1
              150             0.201       0.27165      0.825307
              400             0.201       0.0139479    0.120996
              270             0.162       0.00528755   0.510686
              500             0.162       0.000275799  0.510686
          SoilCrop Triticale: same as RS_Barley_9596_Fulldrought_N150.paddock.Templeton deep 1.Water.Oats
          SoilCrop Wheat: same as RS_Barley_9596_Fulldrought_N150.paddock.Templeton deep 1.Water.Oats
          SoilCrop ryegrass_clover: same as RS_Barley_9596_Fulldrought_N150.paddock.Templeton deep 1.Water.Grassseed
          SoilCrop ryegrass: same as RS_Barley_9596_Fulldrought_N150.paddock.Templeton deep 1.Water.Grassseed
          SoilCrop whiteclover: same as RS_Barley_9596_Fulldrought_N150.paddock.Templeton deep 1.Water.Fieldpea
        SoilWat: SummerCona=4.4; SummerU=9; SummerDate=1-Oct; WinterCona=3; WinterU=6; WinterDate=1-Apr; DiffusConst=88; DiffusSlope=35; Salb=0.13; Cn2Bare=73; CnRed=20; CnCov=0.8
          Layer:
            Thickness (mm)  SWCON (0-1)
            180             0.496442
            150             0.365575
            400             0.0968316
            270             0.306273
            500             0.306273
        SoilOrganicMatter: RootCn=40; RootWt=1000; SoilCn=11; EnrACoeff=7.4; EnrBCoeff=0.2
          Layer:
            Thickness (mm)  OC (Total %)  FBIOM (0-1)  FINERT (0-1)
            180             2.6251        0.0333099    0.437121
            150             1.24694       0.0186614    0.656885
            400             0.316004      0.0116634    0.849635
            270             0.207954      0.0102229    0.94496
            500             0.200366      0.0100221    0.982659
        InitWater
          percentmethod: percent=1; distributed=filled from top
        Sample Initial nitrogen
          Layer:
            Thickness (mm)  no3 (kg/ha)  nh4 (kg/ha)
            200             30           5
            1800            20           1
      barley
      folder Manager folder
        operations
          28/11/1995  irrigation apply amount= 31.2 (mm)
          19/12/1995  irrigation apply amount= 3.1 (mm)
          28/10/1995  fertiliser apply amount= 50 (kg/ha), type= urea_n (), depth= 2 (mm)
          05/12/1995  fertiliser apply amount= 50 (kg/ha), type= urea_n (), depth= 5 (mm)
          18/12/1995  fertiliser apply amount= 50 (kg/ha), type= urea_n (), depth= 5 (mm)
        irrigation
          automatic_irrigation = off
          asw_depth = 600  # Depth to which ASW is calculated. (mm)
          crit_fr_asw = 0.5  # Fraction of ASW below which irrigation is applied (0-1.0)
          irrigation_efficiency = 1  # Efficiency of the irrigation. (0-1.0)
          irrigation_allocation = off  # Allocation limits
          allocation = 0  # Allocation in ML
          default_no3_conc = 0  # Nitrate concentration (ppm N)
          default_nh4_conc = 0  # Ammonium concentration (ppm N)
          default_cl_conc = 0  # Chloride concentration (ppm Cl)
          default_no3_conc = 0  # Nitrate concentration (ppm N)
          default_nh4_conc = 0  # Ammonium concentration (ppm N)
          default_cl_conc = 0  # Chloride concentration (ppm Cl)
        manager ClimateControl
          # Climate Control Window
          date1 = 01/10/1995  # Enter window START date (dd-mmm)
          date2 = 31/12/1996  # Enter window END date (dd-mmm)
          # Climate Change Parameters
          MaxtChange = 0  # Change in maximum temperature (oC)
          MintChange = 0  # Change in minimum temperature (oC)
          RainChange = -100  # Relative change in daily rainfall (%)
          RadnChange = 0  # Relative change in daily radiation (%)
          CO2 = 350  # Atmospheric CO2 Concentration (ppm)
          on prenewmet:
```
!  Adjust daily temperatures, rainfall and radiation up or down according to user-defined amounts
! To apply different levels of climate control to different times of year add multiple copies of this logic into your simulation and change the window.

if (date_within('[date1], [date2]') = 1) then
   maxt = maxt + [MaxtChange]
   mint = mint + [MintChange]
   rain = 0
   radn = radn + radn * [RadnChange] / 100
   co2 = [CO2]
 endif
```
        manager Sow on a fixed date
          #
          date = 20/10/1995  # Enter sowing date (dd-mmm)
          #
          crop = barley  # Enter name of crop to sow
          density = 280  # Enter sowing density (plants/m2)
          depth = 20  # Enter sowing depth (mm)
          cultivar = Dash  # Enter cultivar
          class = plant  # Enter crop growth class
          row_spacing = 150  # Enter row spacing (mm)
          on start_of_day:
```
if today = date('[date]') then
   [crop] sow plants =[density], sowing_depth = [depth], cultivar = [cultivar], row_spacing = [row_spacing], crop_class = [class]
endif
```
        manager New variables
          on init:
```
grain_no_per_head=0 !number of grain (g/m2)
```
          on start_of_day:
```
if (plants <> 0) then
   grain_no_per_head = grain_no / plants
endif
```
      fertiliser
  simulation RS_Barley_9596_Earlydrought_N150 -> /RS_Barley_9596/RS_Barley_9596_Fulldrought_N150
    area paddock -> /RS_Barley_9596/RS_Barley_9596_Fulldrought_N150/paddock
      outputfile -> /RS_Barley_9596/RS_Barley_9596_Fulldrought_N150/paddock/outputfile: filename=RS_Barley_9596_Earlydrought_N150.out; title=RS_Barley_9596_Earlydrought_N150
        events Reporting Frequency -> /RS_Barley_9596/RS_Barley_9596_Fulldrought_N150/paddock/outputfile/Reporting Frequency
        variables -> /RS_Barley_9596/RS_Barley_9596_Fulldrought_N150/paddock/outputfile/Variables
      folder Manager folder -> /RS_Barley_9596/RS_Barley_9596_Fulldrought_N150/paddock/Manager folder
        operations
          28/11/1995  irrigation apply amount= 31.2 (mm)
          19/12/1995  irrigation apply amount= 32.1 (mm)
          03/01/1996  irrigation apply amount= 79.3 (mm)
          09/01/1996  irrigation apply amount= 44.7 (mm)
          16/01/1996  irrigation apply amount= 38.8 (mm)
          23/01/1996  irrigation apply amount= 30 (mm)
          30/01/1196  irrigation apply amount= 21.4 (mm)
          28/10/1995  fertiliser apply amount= 50 (kg/ha), type= urea_n (), depth= 2 (mm)
          05/12/1995  fertiliser apply amount= 50 (kg/ha), type= urea_n (), depth= 5 (mm)
          18/12/1995  fertiliser apply amount= 50 (kg/ha), type= urea_n (), depth= 5 (mm)
      fertiliser
  simulation RS_Barley_9596_Latedrought_N150 -> /RS_Barley_9596/RS_Barley_9596_Fulldrought_N150
    area paddock -> /RS_Barley_9596/RS_Barley_9596_Fulldrought_N150/paddock
      outputfile -> /RS_Barley_9596/RS_Barley_9596_Fulldrought_N150/paddock/outputfile: filename=RS_Barley_9596_Latedrought_N150.out; title=RS_Barley_9596_Latedrought_N150
        events Reporting Frequency -> /RS_Barley_9596/RS_Barley_9596_Fulldrought_N150/paddock/outputfile/Reporting Frequency
        variables -> /RS_Barley_9596/RS_Barley_9596_Fulldrought_N150/paddock/outputfile/Variables
      folder Manager folder -> /RS_Barley_9596/RS_Barley_9596_Fulldrought_N150/paddock/Manager folder
        operations
          28/11/1995  irrigation apply amount= 47 (mm)
          05/12/1995  irrigation apply amount= 5 (mm)
          12/12/1995  irrigation apply amount= 30.5 (mm)
          19/12/1995  irrigation apply amount= 3.1 (mm)
          28/10/1995  fertiliser apply amount= 50 (kg/ha), type= urea_n (), depth= 2 (mm)
          05/12/1995  fertiliser apply amount= 50 (kg/ha), type= urea_n (), depth= 5 (mm)
          18/12/1995  fertiliser apply amount= 50 (kg/ha), type= urea_n (), depth= 5 (mm)
      fertiliser
  simulation RS_Barley_9596_Rainfed_N150 -> /RS_Barley_9596/RS_Barley_9596_Fulldrought_N150
    area paddock -> /RS_Barley_9596/RS_Barley_9596_Fulldrought_N150/paddock
      outputfile -> /RS_Barley_9596/RS_Barley_9596_Fulldrought_N150/paddock/outputfile: filename=RS_Barley_9596_Rainfed_N150.out; title=RS_Barley_9596_Rainfed_N150
        events Reporting Frequency -> /RS_Barley_9596/RS_Barley_9596_Fulldrought_N150/paddock/outputfile/Reporting Frequency
        variables -> /RS_Barley_9596/RS_Barley_9596_Fulldrought_N150/paddock/outputfile/Variables
      folder Manager folder -> /RS_Barley_9596/RS_Barley_9596_Fulldrought_N150/paddock/Manager folder
        operations
          04/11/1995  irrigation apply amount= 3.8 (mm)
          15/11/1995  irrigation apply amount= 5.2 (mm)
          28/11/1995  irrigation apply amount= 21.3 (mm)
          05/12/1995  irrigation apply amount= 0.3 (mm)
          12/12/1995  irrigation apply amount= 1.5 (mm)
          19/12/1995  irrigation apply amount= 11.3 (mm)
          27/12/1995  irrigation apply amount= 5.3 (mm)
          03/01/1996  irrigation apply amount= 2.8 (mm)
          09/01/1996  irrigation apply amount= 8.4 (mm)
          16/01/1996  irrigation apply amount= 5.9 (mm)
          23/01/1996  irrigation apply amount= 0.7 (mm)
          30/01/1996  irrigation apply amount= 0.7 (mm)
          28/10/1995  fertiliser apply amount= 50 (kg/ha), type= urea_n (), depth= 2 (mm)
          05/12/1995  fertiliser apply amount= 50 (kg/ha), type= urea_n (), depth= 5 (mm)
          18/12/1995  fertiliser apply amount= 50 (kg/ha), type= urea_n (), depth= 5 (mm)
      fertiliser
  simulation RS_Barley_9596_Fullirrigation_N150 -> /RS_Barley_9596/RS_Barley_9596_Fulldrought_N150
    area paddock -> /RS_Barley_9596/RS_Barley_9596_Fulldrought_N150/paddock
      outputfile -> /RS_Barley_9596/RS_Barley_9596_Fulldrought_N150/paddock/outputfile: filename=RS_Barley_9596_Fullirrigation_N150.out; title=RS_Barley_9596_Fullirrigation_N150
        events Reporting Frequency -> /RS_Barley_9596/RS_Barley_9596_Fulldrought_N150/paddock/outputfile/Reporting Frequency
        variables -> /RS_Barley_9596/RS_Barley_9596_Fulldrought_N150/paddock/outputfile/Variables
      folder Manager folder -> /RS_Barley_9596/RS_Barley_9596_Fulldrought_N150/paddock/Manager folder
        operations
          04/11/1995  irrigation apply amount= 3.8 (mm)
          15/11/1995  irrigation apply amount= 5.2 (mm)
          28/11/1995  irrigation apply amount= 49.3 (mm)
          05/12/1995  irrigation apply amount= 5.3 (mm)
          12/12/1995  irrigation apply amount= 32 (mm)
          19/12/1995  irrigation apply amount= 40.3 (mm)
          27/12/1995  irrigation apply amount= 5.3 (mm)
          03/01/1996  irrigation apply amount= 80 (mm)
          09/01/1996  irrigation apply amount= 50.3 (mm)
          16/01/1996  irrigation apply amount= 36 (mm)
          23/01/1996  irrigation apply amount= 24.8 (mm)
          30/01/1996  irrigation apply amount= 21.4 (mm)
          07/02/1996  irrigation apply amount= 15.9 (mm)
          12/02/1996  irrigation apply amount= 11.3 (mm)
          28/10/1995  fertiliser apply amount= 50 (kg/ha), type= urea_n (), depth= 2 (mm)
          05/12/1995  fertiliser apply amount= 50 (kg/ha), type= urea_n (), depth= 5 (mm)
          18/12/1995  fertiliser apply amount= 50 (kg/ha), type= urea_n (), depth= 5 (mm)
      fertiliser
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