folder RS_Oats_9899: version=32
  simulation RS_Oats_9899_FULL
    metfile met: filename=lincoln.met
    clock
      start_date = 01/09/1998  # Enter the start date of the simulation
      end_date = 01/04/1999  # Enter the end date of the simulation
    summaryfile
    area paddock
      surfaceom surface organic matter
        PoolName = wheat  # Organic Matter pool name
        type = wheat  # Organic Matter type
        mass = 1000  # Initial surface residue (kg/ha)
        cnr = 80  # C:N ratio of initial residue
        standing_fraction = 0  # Fraction of residue standing
      outputfile: filename=RS_Oats_9899_FULL.out; title=RS_Oats_9899_FULL
        variables
          variables: dd/mm/yyyy as Date, biomass, yield, esw, cover_green, esw, podgreenwt, rain, runoff, irrigation, sw, sw_dep(), grain_wt, height, lai, stemgreenwt, leafgreenwt, green_biomass, senescedwt, node_no, height, podgreenwt, spikelet_wt, yield, yieldwet, grain_wt, grainwt, n_stress_photo, sw_stress_photo, eo, es, ep, root_depth, sw_demand, sw_supply, stage
        events Reporting Frequency: event=daily
      soil Templeton deep 1: Region=Plains; State=Canterbury; Country=New Zealand
        DataSource=Generic profile descriptions provided by Trevor Webb and data for functional horizions based on SWAMP project results
        Comments=Bulk density values were measured on the fine earth fraction so values entered into apsim soil are adjusted down to account for stone content (assuming stones are inert from all soil process so their mass and volume is removed from model paramaters).  SAT, DUL, LL15 and Air dry have been adjusted down to account for stone content.  OC has not been adjusted so the model will get the correct carbon and N amounts using the adjusted BD.
        SoilType = NZ_sedementary  # Soil description
        Analysis
          Layer:
            Thickness (mm)  Rocks (%)  PH (1:5 water)  CEC (cmol+/kg)  ParticleSizeSand (%)  ParticleSizeSilt (%)  ParticleSizeClay (%)
            180             0          6               13              14.5                  65.5                  20
            150             0          6               9               18                    58                    24
            400             0          6               9               14                    63                    23
            270             0          6               9               15                    66                    19
            500             0          6               9               15                    66                    19
        Water
          Layer:
            Thickness (mm)  KS (mm/day)  BD (g/cc)  Airdry (mm/mm)  LL15 (mm/mm)  DUL (mm/mm)  SAT (mm/mm)
            200             4832.04      1.3105     0.05            0.1           0.32         0.419
            200             389.229      1.524      0.05            0.1           0.3          0.405
            200             16.3619      1.65       0.149           0.149         0.28         0.3415
            200             97.995       1.601      0.129           0.129         0.255        0.3215
            200             97.995       1.601      0.1554          0.1554        0.288        0.3479
            200             97.995       1.601      0.149           0.149         0.28         0.3415
            200             97.995       1.601      0.0535          0.0535        0.107        0.30749
            200             97.995       1.601      0.061           0.061         0.122        0.30854
          SoilCrop Oats
            Layer:
              Thickness (mm)  LL (mm/mm)  kl (/day)  xf (0-1)
              200             0.1         0.06       1
              200             0.1         0.06       1
              200             0.149       0.05       1
              200             0.129       0.08       1
              200             0.155       0.03       1
              200             0.149       0.005      1
              200             0.053       0          1
              200             0.061       0          1
          SoilCrop Oat2: same as RS_Oats_9899_FULL.paddock.Templeton deep 1.Water.Oats
        SoilWat
          Layer:
            Thickness (mm)  SWCON (0-1)
            200             0.9
            200             0.5
            200             0.6
            200             0.4
            200             0.4
            200             0.9
            200             0.9
            200             0.9
          SummerCona = 4.4
          SummerU = 9
          SummerDate = 1-sep
          WinterCona = 1.5
          WinterU = 2
          WinterDate = 1-Apr
          DiffusConst = 88
          DiffusSlope = 35
          Salb = 0.13
          Cn2Bare = 73
          CnRed = 20
          CnCov = 0.8
        SoilOrganicMatter: RootCn=40; RootWt=1000; SoilCn=11; EnrACoeff=7.4; EnrBCoeff=0.2
          Layer:
            Thickness (mm)  OC (Total %)  FBIOM (0-1)  FINERT (0-1)
            180             2.6251        0.0333099    0.437121
            150             1.24694       0.0186614    0.656885
            400             0.316004      0.0116634    0.849635
            270             0.207954      0.0102229    0.94496
            500             0.200366      0.0100221    0.982659
        InitWater
          percentmethod: percent=1; distributed=filled from top
        Sample Initial nitrogen
          Layer:
            Thickness (mm)  no3 (kg/ha)  nh4 (kg/ha)
            200             130          3
            200             15           2
            200             15           1
            200             10           1
            200             5            1
            200             5            1
            200             5            1
            200             5            1
      folder manager
        manager Sow on a fixed date
          #
          date = 29/09/1998  # Enter sowing date (dd-mmm)
          #
          crop = Oat2  # Enter name of crop to sow
          density = 262  # Enter sowing density (plants/m2)
          depth = 20  # Enter sowing depth (mm)
          cultivar = Booma  # Enter cultivar
          class = plant  # Enter crop growth class
          row_spacing = 130  # Enter row spacing (mm)
          on start_of_day:
```
if today = date('[date]') then
    [crop] sow population = [density], depth = [depth], cultivar = [cultivar], maxcover = 1.0, budnumber = 1, row_spacing = [row_spacing], crop_class = plant  
   ![crop] sow population = [population], depth = [sowing_depth], cultivar = [cultivar], maxcover = 1.0, budnumber = [stem_number], row_spacing = [row_width], crop_class = plant  
   ![crop] sow plants =[density], sowing_depth = [depth], cultivar = [cultivar], row_spacing = [row_spacing], crop_class = [class]
endif
```
        operations
          03/11/1998  irrigation apply amount= 50 (mm)
          9/11/1998  irrigation apply amount= 30 (mm)
          16/11/1998  irrigation apply amount= 35.3 (mm)
          23/11/1998  irrigation apply amount= 45 (mm)
          30/11/1998  irrigation apply amount= 44 (mm)
          07/12/1998  irrigation apply amount= 30.1 (mm)
          14/12/1998  irrigation apply amount= 41.6 (mm)
          21/12/1998  irrigation apply amount= 55 (mm)
          29/12/1998  irrigation apply amount= 50 (mm)
          05/01/1999  irrigation apply amount= 55 (mm)
          11/01/1999  irrigation apply amount= 53 (mm)
          18/01/1999  irrigation apply amount=50.4 (mm)
          25/01/1999  irrigation apply amount= 49 (mm)
          01/02/1999  irrigation apply amount= 49 (mm)
          08/02/1999  irrigation apply amount= 51.2 (mm)
          15/02/1999  irrigation apply amount= 53 (mm)
          22/02/1999  irrigation apply amount= 34 (mm)
          01/03/1999  irrigation apply amount= 37 (mm)
          08/03/1999  irrigation apply amount= 24 (mm)
        irrigation
          automatic_irrigation = off
          asw_depth = 600  # Depth to which ASW is calculated. (mm)
          crit_fr_asw = 0.5  # Fraction of ASW below which irrigation is applied (0-1.0)
          irrigation_efficiency = 1  # Efficiency of the irrigation. (0-1.0)
          irrigation_allocation = off  # Allocation limits
          allocation = 0  # Allocation in ML
          default_no3_conc = 0  # Nitrate concentration (ppm N)
          default_nh4_conc = 0  # Ammonium concentration (ppm N)
          default_cl_conc = 0  # Chloride concentration (ppm Cl)
          default_no3_conc = 0  # Nitrate concentration (ppm N)
          default_nh4_conc = 0  # Ammonium concentration (ppm N)
          default_cl_conc = 0  # Chloride concentration (ppm Cl)
        manager ClimateControl
          # Climate Control Window
          date1 = 10/10/1998  # Enter window START date (dd-mmm)
          date2 = 01/04/1999  # Enter window END date (dd-mmm)
          # Climate Change Parameters
          MaxtChange = 0  # Change in maximum temperature (oC)
          MintChange = 0  # Change in minimum temperature (oC)
          RainChange = -100  # Relative change in daily rainfall (%)
          RadnChange = 0  # Relative change in daily radiation (%)
          CO2 = 350  # Atmospheric CO2 Concentration (ppm)
          on prenewmet:
```
!  Adjust daily temperatures, rainfall and radiation up or down according to user-defined amounts
! To apply different levels of climate control to different times of year add multiple copies of this logic into your simulation and change the window.

if (date_within('[date1], [date2]') = 1) then
   maxt = maxt + [MaxtChange]
   mint = mint + [MintChange]
   rain = rain + rain * [RainChange] / 100
   radn = radn + radn * [RadnChange] / 100
   co2 = [CO2]
 endif
```
          on Init:
```
co2 = [CO2]
```
        manager New variables
          on init:
```
spikelet_wt=0 !weight of spikelets (g/m2)
```
          on start_of_day:
```
spikelet_wt = grain_wt + podgreenwt
```
      micromet: soilalbedo=0.23; a_interception=0.0; b_interception=0.0; c_interception=0.0; d_interception=0.0
        ini: filename=%apsim%\Model\MicroMet_NZ_adjustment.xml
      SoilTemp2 Soil Temperature (dotNET)
        maxt_time_default = 14  # hours
        bound_layer_cond_source = calc  # boundary layer conductance source (calc/constant)
        bound_layer_cond = 20  # boundary layer conductance
        boundary_layer_conductance_iterations = 1  # Number of iterations to calc boundary layer conductance (0-10)
        net_radn_source = calc  # net radiation source (calc/eos)
        default_wind_speed = 3  # m/s
        default_altitude = 18  # default altitude (m) 275m (700 ft) is approx 980 hPa
        default_instrum_height = 1.2  # default instrument height for wind and temperature (m)
        bare_soil_height = 57  # height of bare soil (mm)
      Oat2
  simulation RS_Oats_9899_NILL -> /RS_Oats_9899/RS_Oats_9899_FULL
    area paddock -> /RS_Oats_9899/RS_Oats_9899_FULL/paddock
      outputfile: filename=RS_Oats_9899_NILL.out; title=RS_Oats_9899_NILL
        variables -> /RS_Oats_9899/RS_Oats_9899_FULL/paddock/outputfile/Variables
        events Reporting Frequency -> /RS_Oats_9899/RS_Oats_9899_FULL/paddock/outputfile/Reporting Frequency
      oats
      soil Templeton deep 1 -> /RS_Oats_9899/RS_Oats_9899_FULL/paddock/Templeton deep 1 
        Water
          Layer:
            Thickness (mm)  KS (mm/day)  BD (g/cc)  Airdry (mm/mm)  LL15 (mm/mm)  DUL (mm/mm)  SAT (mm/mm)
            200             4832.04      1.3105     0.07            0.1           0.32         0.419
            200             389.229      1.524      0.13            0.13          0.3          0.405
            200             16.3619      1.65       0.141           0.141         0.27         0.3335
            200             97.995       1.601      0.1             0.1           0.2          0.314
            200             97.995       1.601      0.11            0.11          0.22         0.3154
            200             97.995       1.601      0.115           0.115         0.23         0.3161
            200             97.995       1.601      0.06            0.06          0.12         0.3084
            200             97.995       1.601      0.085           0.085         0.17         0.3119
          SoilCrop Oats
            Layer:
              Thickness (mm)  LL (mm/mm)  kl (/day)  xf (0-1)
              200             0.1         0.06       1
              200             0.13        0.06       0.15
              200             0.141       0.05       1
              200             0.1         0.08       1
              200             0.11        0.03       1
              200             0.115       0.005      1
              200             0.06        0          1
              200             0.085       0          1
        SoilWat
          Layer:
            Thickness (mm)  SWCON (0-1)
            200             0.9
            200             0.5
            200             0.05
            200             0.03
            200             0.4
            200             0.9
            200             0.9
            200             0.9
          SummerCona = 4.4
          SummerU = 9
          SummerDate = 1-Sep
          WinterCona = 1.5
          WinterU = 2
          WinterDate = 1-Apr
          DiffusConst = 88
          DiffusSlope = 35
          Salb = 0.13
          Cn2Bare = 73
          CnRed = 20
          CnCov = 0.8
        Sample Initial nitrogen
          Layer:
            Thickness (mm)  no3 (kg/ha)  nh4 (kg/ha)  SW (mm/mm)
            200             130          3            0.32
            200             15           2            0.3
            200             15           1            0.27
            200             10           1            0.3
            200             5            1            0.22
            200             5            1            0.23
            200             5            1            0.12
            200             5            1            0.17
      folder manager -> /RS_Oats_9899/RS_Oats_9899_FULL/paddock/manager
        operations
  simulation RS_Oats_9899_ED1 -> /RS_Oats_9899/RS_Oats_9899_FULL
    area paddock -> /RS_Oats_9899/RS_Oats_9899_FULL/paddock
      outputfile: filename=RS_Oats_9899_ED1.out; title=RS_Oats_9899_ED1
        variables -> /RS_Oats_9899/RS_Oats_9899_FULL/paddock/outputfile/Variables
        events Reporting Frequency -> /RS_Oats_9899/RS_Oats_9899_FULL/paddock/outputfile/Reporting Frequency
      oats
      soil Templeton deep 1 -> /RS_Oats_9899/RS_Oats_9899_FULL/paddock/Templeton deep 1 
        Water
          Layer:
            Thickness (mm)  KS (mm/day)  BD (g/cc)  Airdry (mm/mm)  LL15 (mm/mm)  DUL (mm/mm)  SAT (mm/mm)
            200             4832.04      1.3105     0.013           0.1           0.25         0.3875
            200             389.229      1.524      0.025           0.1           0.275        0.39625
            200             16.3619      1.65       0.149           0.149         0.28         0.3415
            200             97.995       1.601      0.1             0.1           0.2          0.314
            200             97.995       1.601      0.095           0.095         0.19         0.3133
            200             97.995       1.601      0.12            0.12          0.24         0.3168
            200             97.995       1.601      0.095           0.095         0.19         0.3133
            200             97.995       1.601      0.09            0.09          0.18         0.3126
          SoilCrop Oats
            Layer:
              Thickness (mm)  LL (mm/mm)  kl (/day)   xf (0-1)
              200             0.1         0.1         1
              200             0.1         0.06        1
              200             0.149       0.03        0.153816
              200             0.1         0.0293168   0.731982
              200             0.095       0.00528755  0.731982
              200             0.12        0.005       0
              200             0.095       0.005       0
              200             0.09        0.005       0
      folder manager -> /RS_Oats_9899/RS_Oats_9899_FULL/paddock/manager
        operations operations1
          23/11/1998  irrigation apply amount= 45 (mm)
          30/11/1998  irrigation apply amount= 44 (mm)
          07/12/1998  irrigation apply amount= 30.1 (mm)
          14/12/1998  irrigation apply amount= 41.6 (mm)
          21/12/1998  irrigation apply amount= 55 (mm)
          29/12/1998  irrigation apply amount= 50 (mm)
          05/01/1999  irrigation apply amount= 55 (mm)
          11/01/1999  irrigation apply amount= 53 (mm)
          18/01/1999  irrigation apply amount=50.4 (mm)
          25/01/1999  irrigation apply amount= 49 (mm)
          01/02/1999  irrigation apply amount= 49 (mm)
          08/02/1999  irrigation apply amount= 51.2 (mm)
          15/02/1999  irrigation apply amount= 53 (mm)
          22/02/1999  irrigation apply amount= 34 (mm)
          01/03/1999  irrigation apply amount= 37 (mm)
          08/03/1999  irrigation apply amount= 24 (mm)
  simulation RS_Oats_9899_ED2 -> /RS_Oats_9899/RS_Oats_9899_FULL
    area paddock -> /RS_Oats_9899/RS_Oats_9899_FULL/paddock
      outputfile: filename=RS_Oats_9899_ED2.out; title=RS_Oats_9899_ED2
        variables -> /RS_Oats_9899/RS_Oats_9899_FULL/paddock/outputfile/Variables
        events Reporting Frequency -> /RS_Oats_9899/RS_Oats_9899_FULL/paddock/outputfile/Reporting Frequency
      oats
      soil Templeton deep 1 -> /RS_Oats_9899/RS_Oats_9899_FULL/paddock/Templeton deep 1 
        Water
          Layer:
            Thickness (mm)  KS (mm/day)  BD (g/cc)  Airdry (mm/mm)  LL15 (mm/mm)  DUL (mm/mm)  SAT (mm/mm)
            200             4832.04      1.3105     0.013           0.1           0.25         0.388
            200             389.229      1.524      0.025           0.1           0.275        0.396
            200             16.3619      1.65       0.137           0.137         0.265        0.329
            200             97.995       1.601      0.11            0.11          0.22         0.3154
            200             97.995       1.601      0.155           0.155         0.288        0.348
            200             97.995       1.601      0.149           0.149         0.28         0.342
            200             97.995       1.601      0.075           0.075         0.15         0.3105
            200             97.995       1.601      0.04            0.04          0.08         0.3056
          SoilCrop Oats
            Layer:
              Thickness (mm)  LL (mm/mm)  kl (/day)   xf (0-1)
              200             0.1         0.242629    1
              200             0.1         0.36744     1
              200             0.137       0.0472522   0.153816
              200             0.11        0.0293168   0.731982
              200             0.155       0.00528755  0.731982
              200             0.149       0.005       0
              200             0.075       0.005       0
              200             0.04        0.005       0
        SoilWat
          Layer:
            Thickness (mm)  SWCON (0-1)
            200             0.496442
            200             0.365575
            200             0.5
            200             0.5
            200             0.506
            200             0.9
            200             0.9
            200             0.9
          SummerCona = 4.4
          SummerU = 9
          SummerDate = 1-Oct
          WinterCona = 1.5
          WinterU = 2
          WinterDate = 1-Apr
          DiffusConst = 88
          DiffusSlope = 35
          Salb = 0.13
          Cn2Bare = 73
          CnRed = 20
          CnCov = 0.8
      folder manager -> /RS_Oats_9899/RS_Oats_9899_FULL/paddock/manager
        operations operations1
          07/12/1998  irrigation apply amount= 30.1 (mm)
          14/12/1998  irrigation apply amount= 41.6 (mm)
          21/12/1998  irrigation apply amount= 55 (mm)
          29/12/1998  irrigation apply amount= 50 (mm)
          05/01/1999  irrigation apply amount= 55 (mm)
          11/01/1999  irrigation apply amount= 53 (mm)
          18/01/1999  irrigation apply amount=50.4 (mm)
          25/01/1999  irrigation apply amount= 49 (mm)
          01/02/1999  irrigation apply amount= 49 (mm)
          08/02/1999  irrigation apply amount= 51.2 (mm)
          15/02/1999  irrigation apply amount= 53 (mm)
          22/02/1999  irrigation apply amount= 34 (mm)
          01/03/1999  irrigation apply amount= 37 (mm)
          08/03/1999  irrigation apply amount= 24 (mm)
  simulation RS_Oats_9899_ED3 -> /RS_Oats_9899/RS_Oats_9899_FULL
    area paddock -> /RS_Oats_9899/RS_Oats_9899_FULL/paddock
      outputfile: filename=RS_Oats_9899_ED3.out; title=RS_Oats_9899_ED3
        variables -> /RS_Oats_9899/RS_Oats_9899_FULL/paddock/outputfile/Variables
        events Reporting Frequency -> /RS_Oats_9899/RS_Oats_9899_FULL/paddock/outputfile/Reporting Frequency
      oats
      soil Templeton deep 1 -> /RS_Oats_9899/RS_Oats_9899_FULL/paddock/Templeton deep 1 
        Water -> /RS_Oats_9899/RS_Oats_9899_FULL/paddock/Templeton deep 1 /Water
          SoilCrop Barley
            Layer:
              Thickness (mm)  LL (mm/mm)  kl (/day)   xf (0-1)
              180             0.1535      0.242629    1
              150             0.201       0.36744     1
              400             0.201       0.0472522   0.301194
              270             0.162       0.0293168   1
              500             0.162       0.00528755  1
          SoilCrop Canola
            Layer:
              Thickness (mm)  LL (mm/mm)  kl (/day)   xf (0-1)
              180             0.1535      0.242629    1
              150             0.201       0.36744     0.825307
              400             0.201       0.0472522   0.120996
              270             0.162       0.0293168   0.510686
              500             0.162       0.00528755  0.510686
          SoilCrop Cloverseed
            Layer:
              Thickness (mm)  LL (mm/mm)  kl (/day)    xf (0-1)
              180             0.1535      0.173413     1
              150             0.201       0.193986     1
              400             0.201       0.0143601    0.153816
              270             0.162       0.00706269   0.731982
              500             0.162       0.000616139  0.731982
          SoilCrop Fieldpea
            Layer:
              Thickness (mm)  LL (mm/mm)  kl (/day)   xf (0-1)
              180             0.1535      0.22882     1
              150             0.201       0.330128    0.449329
              400             0.201       0.0241696   0.090718
              270             0.162       0.0132411   0.301194
              500             0.162       0.00122552  0.301194
          SoilCrop Fababean
            Layer:
              Thickness (mm)  LL (mm/mm)  kl (/day)  xf (0-1)
              180             0.1535      0.255792   1
              150             0.201       0.420882   0.825307
              400             0.201       0.120698   0.120996
              270             0.162       0.0591381  0.510686
              500             0.162       0.020134   0.510686
          SoilCrop kale: same as RS_Oats_9899_ED3.paddock.Templeton deep 1.Water.Canola
          SoilCrop ItallianRyegrass: same as RS_Oats_9899_ED3.paddock.Templeton deep 1.Water.Canola
          SoilCrop Lucerne
            Layer:
              Thickness (mm)  LL (mm/mm)  kl (/day)  xf (0-1)
              180             0.1535      0.20426    1
              150             0.201       0.386305   1
              400             0.201       0.1589     0.301194
              270             0.162       0.106638   1
              500             0.162       0.0441555  1
          SoilCrop Maize
            Layer:
              Thickness (mm)  LL (mm/mm)  kl (/day)  xf (0-1)
              180             0.1535      0.262296   1
              150             0.201       0.446104   0.825307
              400             0.201       0.159359   0.120996
              270             0.162       0.105964   0.510686
              500             0.162       0.0347419  0.510686
          SoilCrop Potato
            Layer:
              Thickness (mm)  LL (mm/mm)  kl (/day)    xf (0-1)
              180             0.1535      0.199694     1
              150             0.201       0.201525     0.449329
              400             0.201       0.00753395   0.090718
              270             0.162       0.00200619   0.301194
              500             0.162       6.16568e-05  0.301194
          SoilCrop Grassseed
            Layer:
              Thickness (mm)  LL (mm/mm)  kl (/day)    xf (0-1)
              180             0.1535      0.214378     1
              150             0.201       0.27165      0.825307
              400             0.201       0.0139479    0.120996
              270             0.162       0.00528755   0.510686
              500             0.162       0.000275799  0.510686
          SoilCrop Triticale
            Layer:
              Thickness (mm)  LL (mm/mm)  kl (/day)   xf (0-1)
              180             0.1535      0.242629    1
              150             0.201       0.36744     1
              400             0.201       0.0472522   0.153816
              270             0.162       0.0293168   0.731982
              500             0.162       0.00528755  0.731982
          SoilCrop Wheat: same as RS_Oats_9899_ED3.paddock.Templeton deep 1.Water.Triticale
          SoilCrop ryegrass_clover: same as RS_Oats_9899_ED3.paddock.Templeton deep 1.Water.Grassseed
          SoilCrop ryegrass: same as RS_Oats_9899_ED3.paddock.Templeton deep 1.Water.Grassseed
          SoilCrop whiteclover: same as RS_Oats_9899_ED3.paddock.Templeton deep 1.Water.Fieldpea
      folder manager -> /RS_Oats_9899/RS_Oats_9899_FULL/paddock/manager
        operations operations1
          21/12/1998  irrigation apply amount= 55 (mm)
          29/12/1998  irrigation apply amount= 50 (mm)
          05/01/1999  irrigation apply amount= 55 (mm)
          11/01/1999  irrigation apply amount= 53 (mm)
          18/01/1999  irrigation apply amount=50.4 (mm)
          25/01/1999  irrigation apply amount= 49 (mm)
          01/02/1999  irrigation apply amount= 49 (mm)
          08/02/1999  irrigation apply amount= 51.2 (mm)
          15/02/1999  irrigation apply amount= 53 (mm)
          22/02/1999  irrigation apply amount= 34 (mm)
          01/03/1999  irrigation apply amount= 37 (mm)
          08/03/1999  irrigation apply amount= 24 (mm)
  simulation RS_Oats_9899_ED4 -> /RS_Oats_9899/RS_Oats_9899_FULL
    area paddock -> /RS_Oats_9899/RS_Oats_9899_FULL/paddock
      outputfile: filename=RS_Oats_9899_ED4.out; title=RS_Oats_9899_ED4
        variables -> /RS_Oats_9899/RS_Oats_9899_FULL/paddock/outputfile/Variables
        events Reporting Frequency -> /RS_Oats_9899/RS_Oats_9899_FULL/paddock/outputfile/Reporting Frequency
      oats
      soil Templeton deep 1 -> /RS_Oats_9899/RS_Oats_9899_FULL/paddock/Templeton deep 1 
        Water -> /RS_Oats_9899/RS_Oats_9899_FULL/paddock/Templeton deep 1 /Water
          SoilCrop Barley: same as RS_Oats_9899_ED3.paddock.Templeton deep 1.Water.Barley
          SoilCrop Canola: same as RS_Oats_9899_ED3.paddock.Templeton deep 1.Water.Canola
          SoilCrop Cloverseed: same as RS_Oats_9899_ED3.paddock.Templeton deep 1.Water.Cloverseed
          SoilCrop Fieldpea: same as RS_Oats_9899_ED3.paddock.Templeton deep 1.Water.Fieldpea
          SoilCrop Fababean: same as RS_Oats_9899_ED3.paddock.Templeton deep 1.Water.Fababean
          SoilCrop kale: same as RS_Oats_9899_ED3.paddock.Templeton deep 1.Water.Canola
          SoilCrop ItallianRyegrass: same as RS_Oats_9899_ED3.paddock.Templeton deep 1.Water.Canola
          SoilCrop Lucerne: same as RS_Oats_9899_ED3.paddock.Templeton deep 1.Water.Lucerne
          SoilCrop Maize: same as RS_Oats_9899_ED3.paddock.Templeton deep 1.Water.Maize
          SoilCrop Potato: same as RS_Oats_9899_ED3.paddock.Templeton deep 1.Water.Potato
          SoilCrop Grassseed: same as RS_Oats_9899_ED3.paddock.Templeton deep 1.Water.Grassseed
          SoilCrop Triticale: same as RS_Oats_9899_ED3.paddock.Templeton deep 1.Water.Triticale
          SoilCrop Wheat: same as RS_Oats_9899_ED3.paddock.Templeton deep 1.Water.Triticale
          SoilCrop ryegrass_clover: same as RS_Oats_9899_ED3.paddock.Templeton deep 1.Water.Grassseed
          SoilCrop ryegrass: same as RS_Oats_9899_ED3.paddock.Templeton deep 1.Water.Grassseed
          SoilCrop whiteclover: same as RS_Oats_9899_ED3.paddock.Templeton deep 1.Water.Fieldpea
      folder manager -> /RS_Oats_9899/RS_Oats_9899_FULL/paddock/manager
        operations operations1
          05/01/1999  irrigation apply amount= 55 (mm)
          11/01/1999  irrigation apply amount= 53 (mm)
          18/01/1999  irrigation apply amount=50.4 (mm)
          25/01/1999  irrigation apply amount= 49 (mm)
          01/02/1999  irrigation apply amount= 49 (mm)
          08/02/1999  irrigation apply amount= 51.2 (mm)
          15/02/1999  irrigation apply amount= 53 (mm)
          22/02/1999  irrigation apply amount= 34 (mm)
          01/03/1999  irrigation apply amount= 37 (mm)
          08/03/1999  irrigation apply amount= 24 (mm)
  simulation RS_Oats_9899_LD1 -> /RS_Oats_9899/RS_Oats_9899_FULL
    area paddock -> /RS_Oats_9899/RS_Oats_9899_FULL/paddock
      outputfile: filename=RS_Oats_9899_LD1.out; title=RS_Oats_9899_LD1
        variables -> /RS_Oats_9899/RS_Oats_9899_FULL/paddock/outputfile/Variables
        events Reporting Frequency -> /RS_Oats_9899/RS_Oats_9899_FULL/paddock/outputfile/Reporting Frequency
      oats
      soil Templeton deep 1 -> /RS_Oats_9899/RS_Oats_9899_FULL/paddock/Templeton deep 1 
        Water -> /RS_Oats_9899/RS_Oats_9899_FULL/paddock/Templeton deep 1 /Water
          SoilCrop Barley: same as RS_Oats_9899_ED3.paddock.Templeton deep 1.Water.Barley
          SoilCrop Canola: same as RS_Oats_9899_ED3.paddock.Templeton deep 1.Water.Canola
          SoilCrop Cloverseed: same as RS_Oats_9899_ED3.paddock.Templeton deep 1.Water.Cloverseed
          SoilCrop Fieldpea: same as RS_Oats_9899_ED3.paddock.Templeton deep 1.Water.Fieldpea
          SoilCrop Fababean: same as RS_Oats_9899_ED3.paddock.Templeton deep 1.Water.Fababean
          SoilCrop kale: same as RS_Oats_9899_ED3.paddock.Templeton deep 1.Water.Canola
          SoilCrop ItallianRyegrass: same as RS_Oats_9899_ED3.paddock.Templeton deep 1.Water.Canola
          SoilCrop Lucerne: same as RS_Oats_9899_ED3.paddock.Templeton deep 1.Water.Lucerne
          SoilCrop Maize: same as RS_Oats_9899_ED3.paddock.Templeton deep 1.Water.Maize
          SoilCrop Potato: same as RS_Oats_9899_ED3.paddock.Templeton deep 1.Water.Potato
          SoilCrop Grassseed: same as RS_Oats_9899_ED3.paddock.Templeton deep 1.Water.Grassseed
          SoilCrop Triticale: same as RS_Oats_9899_ED3.paddock.Templeton deep 1.Water.Triticale
          SoilCrop Wheat: same as RS_Oats_9899_ED3.paddock.Templeton deep 1.Water.Triticale
          SoilCrop ryegrass_clover: same as RS_Oats_9899_ED3.paddock.Templeton deep 1.Water.Grassseed
          SoilCrop ryegrass: same as RS_Oats_9899_ED3.paddock.Templeton deep 1.Water.Grassseed
          SoilCrop whiteclover: same as RS_Oats_9899_ED3.paddock.Templeton deep 1.Water.Fieldpea
      folder manager -> /RS_Oats_9899/RS_Oats_9899_FULL/paddock/manager
        operations operations1
          03/11/1998  irrigation apply amount= 50 (mm)
  simulation RS_Oats_9899_LD2 -> /RS_Oats_9899/RS_Oats_9899_FULL
    area paddock -> /RS_Oats_9899/RS_Oats_9899_FULL/paddock
      outputfile: filename=RS_Oats_9899_LD2.out; title=RS_Oats_9899_LD2
        variables -> /RS_Oats_9899/RS_Oats_9899_FULL/paddock/outputfile/Variables
        events Reporting Frequency -> /RS_Oats_9899/RS_Oats_9899_FULL/paddock/outputfile/Reporting Frequency
      oats
      soil Templeton deep 1 -> /RS_Oats_9899/RS_Oats_9899_FULL/paddock/Templeton deep 1 
        Water -> /RS_Oats_9899/RS_Oats_9899_FULL/paddock/Templeton deep 1 /Water
          SoilCrop Barley: same as RS_Oats_9899_ED3.paddock.Templeton deep 1.Water.Barley
          SoilCrop Canola: same as RS_Oats_9899_ED3.paddock.Templeton deep 1.Water.Canola
          SoilCrop Cloverseed: same as RS_Oats_9899_ED3.paddock.Templeton deep 1.Water.Cloverseed
          SoilCrop Fieldpea: same as RS_Oats_9899_ED3.paddock.Templeton deep 1.Water.Fieldpea
          SoilCrop Fababean: same as RS_Oats_9899_ED3.paddock.Templeton deep 1.Water.Fababean
          SoilCrop kale: same as RS_Oats_9899_ED3.paddock.Templeton deep 1.Water.Canola
          SoilCrop ItallianRyegrass: same as RS_Oats_9899_ED3.paddock.Templeton deep 1.Water.Canola
          SoilCrop Lucerne: same as RS_Oats_9899_ED3.paddock.Templeton deep 1.Water.Lucerne
          SoilCrop Maize: same as RS_Oats_9899_ED3.paddock.Templeton deep 1.Water.Maize
          SoilCrop Potato: same as RS_Oats_9899_ED3.paddock.Templeton deep 1.Water.Potato
          SoilCrop Grassseed: same as RS_Oats_9899_ED3.paddock.Templeton deep 1.Water.Grassseed
          SoilCrop Triticale: same as RS_Oats_9899_ED3.paddock.Templeton deep 1.Water.Triticale
          SoilCrop Wheat: same as RS_Oats_9899_ED3.paddock.Templeton deep 1.Water.Triticale
          SoilCrop ryegrass_clover: same as RS_Oats_9899_ED3.paddock.Templeton deep 1.Water.Grassseed
          SoilCrop ryegrass: same as RS_Oats_9899_ED3.paddock.Templeton deep 1.Water.Grassseed
          SoilCrop whiteclover: same as RS_Oats_9899_ED3.paddock.Templeton deep 1.Water.Fieldpea
      folder manager -> /RS_Oats_9899/RS_Oats_9899_FULL/paddock/manager
        operations
          03/11/1998  irrigation apply amount= 50 (mm)
          9/11/1998  irrigation apply amount= 30 (mm)
          16/11/1998  irrigation apply amount= 35.3 (mm)
  simulation RS_Oats_9899_LD3 -> /RS_Oats_9899/RS_Oats_9899_FULL
    area paddock -> /RS_Oats_9899/RS_Oats_9899_FULL/paddock
      outputfile: filename=RS_Oats_9899_LD3.out; title=RS_Oats_9899_LD3
        variables -> /RS_Oats_9899/RS_Oats_9899_FULL/paddock/outputfile/Variables
        events Reporting Frequency -> /RS_Oats_9899/RS_Oats_9899_FULL/paddock/outputfile/Reporting Frequency
      oats
      soil Templeton deep 1 -> /RS_Oats_9899/RS_Oats_9899_FULL/paddock/Templeton deep 1 
        Water -> /RS_Oats_9899/RS_Oats_9899_FULL/paddock/Templeton deep 1 /Water
          SoilCrop Barley: same as RS_Oats_9899_ED3.paddock.Templeton deep 1.Water.Barley
          SoilCrop Canola: same as RS_Oats_9899_ED3.paddock.Templeton deep 1.Water.Canola
          SoilCrop Cloverseed: same as RS_Oats_9899_ED3.paddock.Templeton deep 1.Water.Cloverseed
          SoilCrop Fieldpea: same as RS_Oats_9899_ED3.paddock.Templeton deep 1.Water.Fieldpea
          SoilCrop Fababean: same as RS_Oats_9899_ED3.paddock.Templeton deep 1.Water.Fababean
          SoilCrop kale: same as RS_Oats_9899_ED3.paddock.Templeton deep 1.Water.Canola
          SoilCrop ItallianRyegrass: same as RS_Oats_9899_ED3.paddock.Templeton deep 1.Water.Canola
          SoilCrop Lucerne: same as RS_Oats_9899_ED3.paddock.Templeton deep 1.Water.Lucerne
          SoilCrop Maize: same as RS_Oats_9899_ED3.paddock.Templeton deep 1.Water.Maize
          SoilCrop Potato: same as RS_Oats_9899_ED3.paddock.Templeton deep 1.Water.Potato
          SoilCrop Grassseed: same as RS_Oats_9899_ED3.paddock.Templeton deep 1.Water.Grassseed
          SoilCrop Triticale: same as RS_Oats_9899_ED3.paddock.Templeton deep 1.Water.Triticale
          SoilCrop Wheat: same as RS_Oats_9899_ED3.paddock.Templeton deep 1.Water.Triticale
          SoilCrop ryegrass_clover: same as RS_Oats_9899_ED3.paddock.Templeton deep 1.Water.Grassseed
          SoilCrop ryegrass: same as RS_Oats_9899_ED3.paddock.Templeton deep 1.Water.Grassseed
          SoilCrop whiteclover: same as RS_Oats_9899_ED3.paddock.Templeton deep 1.Water.Fieldpea
      folder manager -> /RS_Oats_9899/RS_Oats_9899_FULL/paddock/manager
        operations
          03/11/1998  irrigation apply amount= 50 (mm)
          9/11/1998  irrigation apply amount= 30 (mm)
          16/11/1998  irrigation apply amount= 35.3 (mm)
          23/11/1998  irrigation apply amount= 45 (mm)
          30/11/1998  irrigation apply amount= 44 (mm)
  simulation RS_Oats_9899_LD4 -> /RS_Oats_9899/RS_Oats_9899_FULL
    area paddock -> /RS_Oats_9899/RS_Oats_9899_FULL/paddock
      outputfile: filename=RS_Oats_9899_LD4.out; title=RS_Oats_9899_LD4
        variables -> /RS_Oats_9899/RS_Oats_9899_FULL/paddock/outputfile/Variables
        events Reporting Frequency -> /RS_Oats_9899/RS_Oats_9899_FULL/paddock/outputfile/Reporting Frequency
      oats
      soil Templeton deep 1 -> /RS_Oats_9899/RS_Oats_9899_FULL/paddock/Templeton deep 1 
        Water -> /RS_Oats_9899/RS_Oats_9899_FULL/paddock/Templeton deep 1 /Water
          SoilCrop Barley: same as RS_Oats_9899_ED3.paddock.Templeton deep 1.Water.Barley
          SoilCrop Canola: same as RS_Oats_9899_ED3.paddock.Templeton deep 1.Water.Canola
          SoilCrop Cloverseed: same as RS_Oats_9899_ED3.paddock.Templeton deep 1.Water.Cloverseed
          SoilCrop Fieldpea: same as RS_Oats_9899_ED3.paddock.Templeton deep 1.Water.Fieldpea
          SoilCrop Fababean: same as RS_Oats_9899_ED3.paddock.Templeton deep 1.Water.Fababean
          SoilCrop kale: same as RS_Oats_9899_ED3.paddock.Templeton deep 1.Water.Canola
          SoilCrop ItallianRyegrass: same as RS_Oats_9899_ED3.paddock.Templeton deep 1.Water.Canola
          SoilCrop Lucerne: same as RS_Oats_9899_ED3.paddock.Templeton deep 1.Water.Lucerne
          SoilCrop Maize: same as RS_Oats_9899_ED3.paddock.Templeton deep 1.Water.Maize
          SoilCrop Potato: same as RS_Oats_9899_ED3.paddock.Templeton deep 1.Water.Potato
          SoilCrop Grassseed: same as RS_Oats_9899_ED3.paddock.Templeton deep 1.Water.Grassseed
          SoilCrop Triticale: same as RS_Oats_9899_ED3.paddock.Templeton deep 1.Water.Triticale
          SoilCrop Wheat: same as RS_Oats_9899_ED3.paddock.Templeton deep 1.Water.Triticale
          SoilCrop ryegrass_clover: same as RS_Oats_9899_ED3.paddock.Templeton deep 1.Water.Grassseed
          SoilCrop ryegrass: same as RS_Oats_9899_ED3.paddock.Templeton deep 1.Water.Grassseed
          SoilCrop whiteclover: same as RS_Oats_9899_ED3.paddock.Templeton deep 1.Water.Fieldpea
      folder manager -> /RS_Oats_9899/RS_Oats_9899_FULL/paddock/manager
        operations
          03/11/1998  irrigation apply amount= 50 (mm)
          9/11/1998  irrigation apply amount= 30 (mm)
          16/11/1998  irrigation apply amount= 35.3 (mm)
          23/11/1998  irrigation apply amount= 45 (mm)
          30/11/1998  irrigation apply amount= 44 (mm)
          07/12/1998  irrigation apply amount= 30.1 (mm)
          14/12/1998  irrigation apply amount= 41.6 (mm)
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