folder Simulations: version=27
  simulation RS_Wheat_9394_Fullirrigation_N200
    metfile met: filename=lincoln.met
    clock
      start_date = 01/05/1993  # Enter the start date of the simulation
      end_date = 01/02/1994  # Enter the end date of the simulation
    summaryfile: filename=Continuous Wheat Simulation.sum
    area paddock
      fertiliser
      surfaceom surface organic matter
        PoolName = wheat  # Organic Matter pool name
        type = wheat  # Organic Matter type
        mass = 1000  # Initial surface residue (kg/ha)
        cnr = 80  # C:N ratio of initial residue
        standing_fraction = 0  # Fraction of residue standing
      folder Manager folder
        operations
          17/05/1993  irrigation apply amount= 64 (mm)
          29/05/1993  irrigation apply amount= 20 (mm)
          29/07/1993  fertiliser apply amount= 50 (kg/ha), type= urea_n (), depth= 8.8 (mm)
          12/08/1993  irrigation apply amount= 11 (mm)
          06/09/1993  irrigation apply amount= 6.5 (mm)
          06/09/1993  fertiliser apply amount= 50 (kg/ha), type= urea_n (), depth= 13 (mm)
          17/09/1993  irrigation apply amount= 43 (mm)
          04/10/1993  irrigation apply amount= 12.2 (mm)
          04/10/1993  fertiliser apply amount= 50 (kg/ha), type= urea_n (), depth= 11.8 (mm)
          08/10/1993  irrigation apply amount= 21.1 (mm)
          14/10/1993  irrigation apply amount= 40 (mm)
          22/10/1993  irrigation apply amount= 31 (mm)
          29/10/1993  irrigation apply amount= 52 (mm)
          3/11/1993  irrigation apply amount= 21 (mm)
          11/11/1993  irrigation apply amount= 30 (mm)
          16/11/1993  fertiliser apply amount= 50 (kg/ha), type= urea_n (), depth= 13 (mm)
          16/11/1993  irrigation apply amount= 27 (mm)
          25/11/1993  irrigation apply amount= 20 (mm)
          10/12/1993  irrigation apply amount =  35 (mm)
          17/12/1993  irrigation apply amount= 20 (mm)
          23/12/1993  irrigation apply amount= 37 (mm)
          31/12/1993  irrigation apply amount= 39 (mm)
        irrigation
          automatic_irrigation = off
          asw_depth = 600  # Depth to which ASW is calculated. (mm)
          crit_fr_asw = 0.5  # Fraction of ASW below which irrigation is applied (0-1.0)
          irrigation_efficiency = 1  # Efficiency of the irrigation. (0-1.0)
          irrigation_allocation = off  # Allocation limits
          allocation = 0  # Allocation in ML
          default_no3_conc = 0  # Nitrate concentration (ppm N)
          default_nh4_conc = 0  # Ammonium concentration (ppm N)
          default_cl_conc = 0  # Chloride concentration (ppm Cl)
          default_no3_conc = 0  # Nitrate concentration (ppm N)
          default_nh4_conc = 0  # Ammonium concentration (ppm N)
          default_cl_conc = 0  # Chloride concentration (ppm Cl)
        manager ClimateControl
          # Climate Control Window
          date1 = 1-jan  # Enter window START date (dd-mmm)
          date2 = 31-dec  # Enter window END date (dd-mmm)
          # Climate Change Parameters
          MaxtChange = 0  # Change in maximum temperature (oC)
          MintChange = 0  # Change in minimum temperature (oC)
          RainChange = -100  # Relative change in daily rainfall (%)
          RadnChange = 0  # Relative change in daily radiation (%)
          CO2 = 350  # Atmospheric CO2 Concentration (ppm)
          on prenewmet:
```
!  Adjust daily temperatures, rainfall and radiation up or down according to user-defined amounts
! To apply different levels of climate control to different times of year add multiple copies of this logic into your simulation and change the window.

if (date_within('[date1], [date2]') = 1) then
   maxt = maxt + [MaxtChange]
   mint = mint + [MintChange]
   rain = 0
   radn = radn + radn * [RadnChange] / 100
   co2 = [CO2]
 endif
```
        manager New variables
          on init:
```
grain_no_per_head=0 !number of grain per head
```
          on start_of_day:
```
!if (plants <> 0) then
!   grain_no_per_head = grain_no / plants
!endif
```
        manager Sow on a fixed date
          #
          date = 11/05/1993  # Enter sowing date (dd-mmm)
          #
          crop = wheat  # Enter name of crop to sow
          density = 290  # Enter sowing density (plants/m2)
          depth = 30  # Enter sowing depth (mm)
          cultivar = batten  # Enter cultivar
          class = plant  # Enter crop growth class
          row_spacing = 150  # Enter row spacing (mm)
          on start_of_day:
```
if today = date('[date]') then
   [crop] sow plants =[density], sowing_depth = [depth], cultivar = [cultivar], row_spacing = [row_spacing], crop_class = [class]
endif
```
        micromet (disabled)
          ini: filename=%apsim%\Model\MicroMet_NZ_adjustment.xml
      outputfile
        events Reporting Frequency: event=Daily
        variables
          variables: dd/mm/yyyy as date, biomass, yield, rain, es, sw, sw_uptake, sw_demand, sw_supply, leafgreenwt, leafsenescedwt, stemgreenwt, headgreenwt, lai, ep, height, sw_dep(), runoff, drain, biomass_wt, irrigation, grain_no, plants, green_biomass, podgreenwt, esw, grain_wt, senescedwt, sw_stress_photo, n_stress_photo, surfaceom_cover, no3(1), hum_n(1), biom_n(1), root_depth
      soil Templeton deep 1: Country=New Zealand; Region=Plains; SoilType=NZ_sedementary; State=Canterbury
        DataSource=Generic profile descriptions provided by Trevor Webb and data for functional horizions based on SWAMP project results
        Comments=Bulk density values were measured on the fine earth fraction so values entered into apsim soil are adjusted down to account for stone content (assuming stones are inert from all soil process so their mass and volume is removed from model paramaters).  SAT, DUL, LL15 and Air dry have been adjusted down to account for stone content.  OC has not been adjusted so the model will get the correct carbon and N amounts using the adjusted BD.
        Analysis
          Layer:
            Thickness (mm)  Rocks (%)  PH (1:5 water)  CEC (cmol+/kg)  ParticleSizeSand (%)  ParticleSizeSilt (%)  ParticleSizeClay (%)
            180             0          6               13              14.5                  65.5                  20
            150             0          6               9               18                    58                    24
            400             0          6               9               14                    63                    23
            270             0          6               9               15                    66                    19
            500             0          6               9               15                    66                    19
        Water
          Layer:
            Thickness (mm)  KS (mm/day)  BD (g/cc)  Airdry (mm/mm)  LL15 (mm/mm)  DUL (mm/mm)  SAT (mm/mm)
            200             4832.04      1.3105     0.025           0.05          0.3          0.4
            200             389.229      1.524      0.08            0.08          0.28         0.39625
            200             16.3619      1.65       0.137           0.137         0.265        0.3295
            200             97.995       1.601      0.129           0.129         0.255        0.3215
            200             97.995       1.601      0.1             0.1           0.2          0.314
            200             97.995       1.601      0.09            0.09          0.18         0.3126
            200             97.995       1.601      0.115           0.115         0.23         0.3161
            200             97.995       1.601      0.12            0.12          0.24         0.3168
          SoilCrop Barley
            Layer:
              Thickness (mm)  LL (mm/mm)  kl (/day)   xf (0-1)
              180             0.1535      0.242629    1
              150             0.201       0.36744     1
              400             0.201       0.0472522   0.301194
              270             0.162       0.0293168   1
              500             0.162       0.00528755  1
          SoilCrop Canola
            Layer:
              Thickness (mm)  LL (mm/mm)  kl (/day)   xf (0-1)
              180             0.1535      0.242629    1
              150             0.201       0.36744     0.825307
              400             0.201       0.0472522   0.120996
              270             0.162       0.0293168   0.510686
              500             0.162       0.00528755  0.510686
          SoilCrop Cloverseed
            Layer:
              Thickness (mm)  LL (mm/mm)  kl (/day)    xf (0-1)
              180             0.1535      0.173413     1
              150             0.201       0.193986     1
              400             0.201       0.0143601    0.153816
              270             0.162       0.00706269   0.731982
              500             0.162       0.000616139  0.731982
          SoilCrop Fieldpea
            Layer:
              Thickness (mm)  LL (mm/mm)  kl (/day)   xf (0-1)
              180             0.1535      0.22882     1
              150             0.201       0.330128    0.449329
              400             0.201       0.0241696   0.090718
              270             0.162       0.0132411   0.301194
              500             0.162       0.00122552  0.301194
          SoilCrop Fababean
            Layer:
              Thickness (mm)  LL (mm/mm)  kl (/day)  xf (0-1)
              180             0.1535      0.255792   1
              150             0.201       0.420882   0.825307
              400             0.201       0.120698   0.120996
              270             0.162       0.0591381  0.510686
              500             0.162       0.020134   0.510686
          SoilCrop kale: same as RS_Wheat_9394_Fullirrigation_N200.paddock.Templeton deep 1.Water.Canola
          SoilCrop ItallianRyegrass: same as RS_Wheat_9394_Fullirrigation_N200.paddock.Templeton deep 1.Water.Canola
          SoilCrop Lucerne
            Layer:
              Thickness (mm)  LL (mm/mm)  kl (/day)  xf (0-1)
              180             0.1535      0.20426    1
              150             0.201       0.386305   1
              400             0.201       0.1589     0.301194
              270             0.162       0.106638   1
              500             0.162       0.0441555  1
          SoilCrop Maize
            Layer:
              Thickness (mm)  LL (mm/mm)  kl (/day)  xf (0-1)
              180             0.1535      0.262296   1
              150             0.201       0.446104   0.825307
              400             0.201       0.159359   0.120996
              270             0.162       0.105964   0.510686
              500             0.162       0.0347419  0.510686
          SoilCrop Oats
            Layer:
              Thickness (mm)  LL (mm/mm)  kl (/day)   xf (0-1)
              180             0.1535      0.242629    1
              150             0.201       0.36744     1
              400             0.201       0.0472522   0.153816
              270             0.162       0.0293168   0.731982
              500             0.162       0.00528755  0.731982
          SoilCrop Potato
            Layer:
              Thickness (mm)  LL (mm/mm)  kl (/day)    xf (0-1)
              180             0.1535      0.199694     1
              150             0.201       0.201525     0.449329
              400             0.201       0.00753395   0.090718
              270             0.162       0.00200619   0.301194
              500             0.162       6.16568e-05  0.301194
          SoilCrop Grassseed
            Layer:
              Thickness (mm)  LL (mm/mm)  kl (/day)    xf (0-1)
              180             0.1535      0.214378     1
              150             0.201       0.27165      0.825307
              400             0.201       0.0139479    0.120996
              270             0.162       0.00528755   0.510686
              500             0.162       0.000275799  0.510686
          SoilCrop Triticale: same as RS_Wheat_9394_Fullirrigation_N200.paddock.Templeton deep 1.Water.Oats
          SoilCrop Wheat
            Layer:
              Thickness (mm)  LL (mm/mm)  kl (/day)  xf (0-1)
              200             0.05        0.1        1
              200             0.08        0.06       1
              200             0.137       0.06       1
              200             0.129       0.04       1
              200             0.1         0.04       1
              200             0.09        0.03       1
              200             0.115       0.02       1
              200             0.12        0.01       1
          SoilCrop ryegrass_clover: same as RS_Wheat_9394_Fullirrigation_N200.paddock.Templeton deep 1.Water.Grassseed
          SoilCrop ryegrass: same as RS_Wheat_9394_Fullirrigation_N200.paddock.Templeton deep 1.Water.Grassseed
          SoilCrop whiteclover: same as RS_Wheat_9394_Fullirrigation_N200.paddock.Templeton deep 1.Water.Fieldpea
        SoilWat
          Layer:
            Thickness (mm)  SWCON (0-1)
            180             0.496
            150             0.366
            400             0.2
            270             0.306
            500             0.306
          SummerCona = 4.4
          SummerU = 9
          SummerDate = 1-Oct
          WinterCona = 2
          WinterU = 4
          WinterDate = 1-Apr
          DiffusConst = 88
          DiffusSlope = 35
          Salb = 0.13
          Cn2Bare = 73
          CnRed = 20
          CnCov = 0.8
        SoilOrganicMatter: RootCn=40; RootWt=1000; SoilCn=11; EnrACoeff=7.4; EnrBCoeff=0.2
          Layer:
            Thickness (mm)  OC (Total %)  FBIOM (0-1)  FINERT (0-1)
            180             2.6251        0.0333099    0.437121
            150             1.24694       0.0186614    0.656885
            400             0.316004      0.0116634    0.849635
            270             0.207954      0.0102229    0.94496
            500             0.200366      0.0100221    0.982659
        InitWater: RelativeTo=ll15
          PercentMethod: Percent=1; Distributed=Filled from top
        Sample Initial nitrogen
          Layer:
            Thickness (mm)  no3 (kg/ha)  nh4 (kg/ha)
            200             50           5
            400             50           1
            400             20           -
            500             20           -
      wheat
  simulation RS_Wheat_9394_Earlydrought_N200 -> /Simulations/RS_Wheat_9394_Fullirrigation_N200
    area paddock -> /Simulations/RS_Wheat_9394_Fullirrigation_N200/paddock
      folder Manager folder -> /Simulations/RS_Wheat_9394_Fullirrigation_N200/paddock/Manager folder
        operations
          17/05/1993  irrigation apply amount= 64 (mm)
          29/05/1993  irrigation apply amount= 20 (mm)
          29/07/1993  fertiliser apply amount= 50 (kg/ha), type= urea_n (), depth= 8.8 (mm)
          12/08/1993  irrigation apply amount= 11 (mm)
          06/09/1993  irrigation apply amount= 6.5 (mm)
          06/09/1993  fertiliser apply amount= 50 (kg/ha), type= urea_n (), depth= 13 (mm)
          04/10/1993  fertiliser apply amount= 50 (kg/ha), type= urea_n (), depth= 11.8 (mm)
          11/11/1993  irrigation apply amount= 75 (mm)
          15/11/1993  irrigation apply amount= 75 (mm)
          16/11/1993  fertiliser apply amount= 50 (kg/ha), type= urea_n (), depth= 13 (mm)
          16/11/1993  irrigation apply amount= 27 (mm)
          25/11/1993  irrigation apply amount= 20 (mm)
          10/12/1993  irrigation apply amount =  35 (mm)
          17/12/1993  irrigation apply amount= 20 (mm)
          23/12/1993  irrigation apply amount= 37 (mm)
          31/12/1993  irrigation apply amount= 39 (mm)
      soil Templeton deep 1: Country=New Zealand; Region=Plains; SoilType=NZ_sedementary; State=Canterbury
        DataSource=Generic profile descriptions provided by Trevor Webb and data for functional horizions based on SWAMP project results
        Comments=Bulk density values were measured on the fine earth fraction so values entered into apsim soil are adjusted down to account for stone content (assuming stones are inert from all soil process so their mass and volume is removed from model paramaters).  SAT, DUL, LL15 and Air dry have been adjusted down to account for stone content.  OC has not been adjusted so the model will get the correct carbon and N amounts using the adjusted BD.
        Analysis: same as RS_Wheat_9394_Fullirrigation_N200.paddock.Templeton deep 1.Analysis
        Water
          Layer:
            Thickness (mm)  KS (mm/day)  BD (g/cc)  Airdry (mm/mm)  LL15 (mm/mm)  DUL (mm/mm)  SAT (mm/mm)
            200             4832.04      1.3105     0.0525          0.0525        0.33         0.426
            200             389.229      1.524      0.03750001      0.03750001    0.3          0.405
            200             16.3619      1.65       0.125           0.125         0.25         0.3175
            200             97.995       1.601      0.1             0.1           0.2          0.314
            200             97.995       1.601      0.085           0.085         0.17         0.3119
            200             97.995       1.601      0.07            0.07          0.14         0.3098
            200             97.995       1.601      0.115           0.115         0.23         0.3161
            200             97.995       1.601      0.149           0.149         0.28         0.3415
          SoilCrop Barley: same as RS_Wheat_9394_Fullirrigation_N200.paddock.Templeton deep 1.Water.Barley
          SoilCrop Canola: same as RS_Wheat_9394_Fullirrigation_N200.paddock.Templeton deep 1.Water.Canola
          SoilCrop Cloverseed: same as RS_Wheat_9394_Fullirrigation_N200.paddock.Templeton deep 1.Water.Cloverseed
          SoilCrop Fieldpea: same as RS_Wheat_9394_Fullirrigation_N200.paddock.Templeton deep 1.Water.Fieldpea
          SoilCrop Fababean: same as RS_Wheat_9394_Fullirrigation_N200.paddock.Templeton deep 1.Water.Fababean
          SoilCrop kale: same as RS_Wheat_9394_Fullirrigation_N200.paddock.Templeton deep 1.Water.Canola
          SoilCrop ItallianRyegrass: same as RS_Wheat_9394_Fullirrigation_N200.paddock.Templeton deep 1.Water.Canola
          SoilCrop Lucerne: same as RS_Wheat_9394_Fullirrigation_N200.paddock.Templeton deep 1.Water.Lucerne
          SoilCrop Maize: same as RS_Wheat_9394_Fullirrigation_N200.paddock.Templeton deep 1.Water.Maize
          SoilCrop Oats: same as RS_Wheat_9394_Fullirrigation_N200.paddock.Templeton deep 1.Water.Oats
          SoilCrop Potato: same as RS_Wheat_9394_Fullirrigation_N200.paddock.Templeton deep 1.Water.Potato
          SoilCrop Grassseed: same as RS_Wheat_9394_Fullirrigation_N200.paddock.Templeton deep 1.Water.Grassseed
          SoilCrop Triticale: same as RS_Wheat_9394_Fullirrigation_N200.paddock.Templeton deep 1.Water.Oats
          SoilCrop Wheat: same as RS_Wheat_9394_Fullirrigation_N200.paddock.Templeton deep 1.Water.Oats
          SoilCrop ryegrass_clover: same as RS_Wheat_9394_Fullirrigation_N200.paddock.Templeton deep 1.Water.Grassseed
          SoilCrop ryegrass: same as RS_Wheat_9394_Fullirrigation_N200.paddock.Templeton deep 1.Water.Grassseed
          SoilCrop whiteclover: same as RS_Wheat_9394_Fullirrigation_N200.paddock.Templeton deep 1.Water.Fieldpea
        SoilWat: SummerCona=4.4; SummerU=9; SummerDate=1-Oct; WinterCona=3; WinterU=6; WinterDate=1-Apr; DiffusConst=88; DiffusSlope=35; Salb=0.13; Cn2Bare=73; CnRed=20; CnCov=0.8
          Layer:
            Thickness (mm)  SWCON (0-1)
            180             0.496442
            150             0.365575
            400             0.0968316
            270             0.306273
            500             0.306273
        SoilOrganicMatter: same as RS_Wheat_9394_Fullirrigation_N200.paddock.Templeton deep 1.SoilOrganicMatter
        InitWater
          percentmethod: percent=1; distributed=filled from top
        Sample Initial nitrogen
          Layer:
            Thickness (mm)  no3 (kg/ha)  nh4 (kg/ha)
            200             30           5
            1800            20           1
      wheat
  simulation RS_Wheat_9394_Latedrought_N2001 -> /Simulations/RS_Wheat_9394_Fullirrigation_N200
    area paddock -> /Simulations/RS_Wheat_9394_Fullirrigation_N200/paddock
      folder Manager folder -> /Simulations/RS_Wheat_9394_Fullirrigation_N200/paddock/Manager folder
        operations
          17/05/1993  irrigation apply amount= 64 (mm)
          29/05/1993  irrigation apply amount= 20 (mm)
          29/07/1993  fertiliser apply amount= 50 (kg/ha), type= urea_n (), depth= 8.8 (mm)
          12/08/1993  irrigation apply amount= 11 (mm)
          06/09/1993  irrigation apply amount= 6.5 (mm)
          06/09/1993  fertiliser apply amount= 50 (kg/ha), type= urea_n (), depth= 13 (mm)
          17/09/1993  irrigation apply amount= 43 (mm)
          04/10/1993  irrigation apply amount= 12.2 (mm)
          04/10/1993  fertiliser apply amount= 50 (kg/ha), type= urea_n (), depth= 11.8 (mm)
          08/10/1993  irrigation apply amount= 21.1 (mm)
          16/11/1993  fertiliser apply amount= 50 (kg/ha), type= urea_n (), depth= 13 (mm)
      wheat
      soil Templeton deep 1: same as RS_Wheat_9394_Earlydrought_N200.paddock.Templeton deep 1
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