folder Simulations: version=32
  simulation RS_Wheat_9394_Fullirrigation_N200
    metfile met: filename=%apsim%\Examples\MetFiles\lincoln.met
    clock
      start_date = 01/05/1993  # Enter the start date of the simulation
      end_date = 01/02/1994  # Enter the end date of the simulation
    summaryfile
    area paddock
      fertiliser
      surfaceom surface organic matter
        PoolName = wheat  # Organic Matter pool name
        type = wheat  # Organic Matter type
        mass = 1000  # Initial surface residue (kg/ha)
        cnr = 80  # C:N ratio of initial residue
        standing_fraction = 0  # Fraction of residue standing
      folder Manager folder
        operations
          17/05/1993  irrigation apply amount= 64 (mm)
          29/05/1993  irrigation apply amount= 20 (mm)
          29/07/1993  fertiliser apply amount= 50 (kg/ha), type= urea_n (), depth= 5 (mm)
          29/07/1993  irrigation apply amount= 9 (mm)
          12/08/1993  irrigation apply amount= 11 (mm)
          06/09/1993  irrigation apply amount= 6.5 (mm)
          06/09/1993  fertiliser apply amount= 50 (kg/ha), type= urea_n (), depth= 5 (mm)
          06/09/1993  irrigation apply amount= 13 (mm)
          17/09/1993  irrigation apply amount= 43 (mm)
          04/10/1993  irrigation apply amount= 12.2 (mm)
          04/10/1993  fertiliser apply amount= 50 (kg/ha), type= urea_n (), depth= 5 (mm)
          04/10/1993  irrigation apply amount= 12 (mm)
          08/10/1993  irrigation apply amount= 21.1 (mm)
          14/10/1993  irrigation apply amount= 40 (mm)
          22/10/1993  irrigation apply amount= 31 (mm)
          29/10/1993  irrigation apply amount= 52 (mm)
          3/11/1993  irrigation apply amount= 21 (mm)
          11/11/1993  irrigation apply amount= 30 (mm)
          16/11/1993  fertiliser apply amount= 50 (kg/ha), type= urea_n (), depth= 5 (mm)
          16/11/1993  irrigation apply amount= 13 (mm)
          16/11/1993  irrigation apply amount= 27 (mm)
          25/11/1993  irrigation apply amount= 20 (mm)
          3/12/1993  irrigation apply amount= 37 (mm)
          10/12/1993  irrigation apply amount =  35 (mm)
          17/12/1993  irrigation apply amount= 20 (mm)
          23/12/1993  irrigation apply amount= 37 (mm)
          31/12/1993  irrigation apply amount= 39 (mm)
        irrigation
          automatic_irrigation = off
          asw_depth = 600  # Depth to which ASW is calculated. (mm)
          crit_fr_asw = 0.5  # Fraction of ASW below which irrigation is applied (0-1.0)
          irrigation_efficiency = 1  # Efficiency of the irrigation. (0-1.0)
          irrigation_allocation = off  # Allocation limits
          allocation = 0  # Allocation in ML
          default_no3_conc = 0  # Nitrate concentration (ppm N)
          default_nh4_conc = 0  # Ammonium concentration (ppm N)
          default_cl_conc = 0  # Chloride concentration (ppm Cl)
          default_no3_conc = 0  # Nitrate concentration (ppm N)
          default_nh4_conc = 0  # Ammonium concentration (ppm N)
          default_cl_conc = 0  # Chloride concentration (ppm Cl)
        manager ClimateControl
          # Climate Control Window
          date1 = 1-jan  # Enter window START date (dd-mmm)
          date2 = 31-dec  # Enter window END date (dd-mmm)
          # Climate Change Parameters
          MaxtChange = 0  # Change in maximum temperature (oC)
          MintChange = 0  # Change in minimum temperature (oC)
          RainChange = -100  # Relative change in daily rainfall (%)
          RadnChange = 0  # Relative change in daily radiation (%)
          CO2 = 350  # Atmospheric CO2 Concentration (ppm)
          on prenewmet:
```
!  Adjust daily temperatures, rainfall and radiation up or down according to user-defined amounts
! To apply different levels of climate control to different times of year add multiple copies of this logic into your simulation and change the window.

if (date_within('[date1], [date2]') = 1) then
   maxt = maxt + [MaxtChange]
   mint = mint + [MintChange]
   rain = 0
   radn = radn + radn * [RadnChange] / 100
   co2 = [CO2]
 endif
```
        manager New variables
          on init:
```
grain_no_per_head=0 !number of grain per head
```
          on start_of_day:
```
!if (plants <> 0) then
!   grain_no_per_head = grain_no / plants
!endif
```
        manager Sow on a fixed date
          #
          date = 11/05/1993  # Enter sowing date (dd-mmm)
          #
          crop = wheat  # Enter name of crop to sow
          density = 290  # Enter sowing density (plants/m2)
          depth = 20  # Enter sowing depth (mm)
          cultivar = Batten_spring  # Enter cultivar
          class = plant  # Enter crop growth class
          row_spacing = 150  # Enter row spacing (mm)
          on start_of_day:
```
if today = date('[date]') then
   [crop] sow plants =[density], sowing_depth = [depth], cultivar = [cultivar], row_spacing = [row_spacing], crop_class = [class]
endif
```
      outputfile: filename=RS_Wheat_9394_Fullirrigation_N200.out; title=RS_Wheat_9394_Fullirrigation_N200
        events Reporting Frequency: event=Daily
        variables
          variables: dd/mm/yyyy as date, biomass, yield, rain, es, sw, sw_uptake, sw_demand, sw_supply, leafgreenwt, leafsenescedwt, stemgreenwt, headgreenwt, lai, ep, height, sw_dep(), runoff, drain, biomass_wt, irrigation, grain_no, plants, green_biomass, podgreenwt, esw, grain_wt, senescedwt, sw_stress_photo, n_stress_photo, surfaceom_cover, no3(1), hum_n(1), biom_n(1), root_depth, leaf_no, leaf_area
      soil Templeton deep 1: Region=Plains; State=Canterbury; Country=New Zealand
        DataSource=Generic profile descriptions provided by Trevor Webb and data for functional horizions based on SWAMP project results
        Comments=Bulk density values were measured on the fine earth fraction so values entered into apsim soil are adjusted down to account for stone content (assuming stones are inert from all soil process so their mass and volume is removed from model paramaters).  SAT, DUL, LL15 and Air dry have been adjusted down to account for stone content.  OC has not been adjusted so the model will get the correct carbon and N amounts using the adjusted BD.
        SoilType = NZ_sedementary  # Soil description
        Analysis
          Layer:
            Thickness (mm)  Rocks (%)  PH (1:5 water)  CEC (cmol+/kg)  ParticleSizeSand (%)  ParticleSizeSilt (%)  ParticleSizeClay (%)
            180             0          6               13              14.5                  65.5                  20
            150             0          6               9               18                    58                    24
            400             0          6               9               14                    63                    23
            270             0          6               9               15                    66                    19
            500             0          6               9               15                    66                    19
        Water
          Layer:
            Thickness (mm)  KS (mm/day)  BD (g/cc)  Airdry (mm/mm)  LL15 (mm/mm)  DUL (mm/mm)  SAT (mm/mm)
            200             4832.04      1.3105     0.05            0.1           0.3          0.4
            200             389.229      1.524      0.15            0.15          0.28         0.39625
            200             16.3619      1.65       0.137           0.137         0.25         0.265
            200             97.995       1.601      0.129           0.129         0.23         0.255
            200             97.995       1.601      0.1             0.1           0.18         0.2
            200             97.995       1.601      0.09            0.09          0.16         0.18
            200             97.995       1.601      0.115           0.115         0.22         0.23
            200             97.995       1.601      0.12            0.12          0.23         0.25
          SoilCrop Wheat
            Layer:
              Thickness (mm)  LL (mm/mm)  kl (/day)  xf (0-1)
              200             0.1         0.06       1
              200             0.15        0.06       1
              200             0.137       0.05       1
              200             0.129       0.04       1
              200             0.1         0.03       1
              200             0.09        0.015      1
              200             0.115       0          1
              200             0.12        0          1
        SoilWat
          Layer:
            Thickness (mm)  SWCON (0-1)
            200             0.6
            200             0.6
            200             0.05
            200             0.05
            200             0.05
            200             0.05
            200             0.05
            200             0.05
          SummerCona = 4.4
          SummerU = 9
          SummerDate = 1-Oct
          WinterCona = 1.5
          WinterU = 2
          WinterDate = 1-Apr
          DiffusConst = 88
          DiffusSlope = 35
          Salb = 0.13
          Cn2Bare = 73
          CnRed = 20
          CnCov = 0.8
        SoilOrganicMatter: RootCn=40; RootWt=1000; SoilCn=11; EnrACoeff=7.4; EnrBCoeff=0.2
          Layer:
            Thickness (mm)  OC (Total %)  FBIOM (0-1)  FINERT (0-1)
            180             2.6           0.0333099    0.18
            150             1.24694       0.0186614    0.3
            400             0.316004      0.0116634    0.6
            270             0.207954      0.0102229    0.94496
            500             0.200366      0.0100221    0.982659
        Sample InitialWater
          Layer:
            Thickness (mm)  SW (mm/mm)
            200             0.3
            200             0.28
            200             0.265
            200             0.255
            200             0.2
            200             0.18
            200             0.23
            200             0.25
        Sample InitialNitrogen
          Layer:
            Thickness (mm)  NO3 (kg/ha)  NH4 (kg/ha)
            200             130          3
            200             15           2
            200             15           1
            200             10           1
            200             5            1
            200             5            1
            200             5            1
            200             5            1
      wheat
      micromet: soilalbedo=0.23; a_interception=0.0; b_interception=0.0; c_interception=0.0; d_interception=0.0
        ini: filename=%apsim%\Model\MicroMet_NZ_adjustment.xml
  simulation RS_Wheat_9394_Earlydrought_N200 -> /Simulations/RS_Wheat_9394_Fullirrigation_N200
    area paddock -> /Simulations/RS_Wheat_9394_Fullirrigation_N200/paddock
      outputfile -> /Simulations/RS_Wheat_9394_Fullirrigation_N200/paddock/outputfile: filename=RS_Wheat_9394_Earlydrought_N200.out; title=RS_Wheat_9394_Earlydrought_N200
        events Reporting Frequency -> /Simulations/RS_Wheat_9394_Fullirrigation_N200/paddock/outputfile/Reporting Frequency
        variables -> /Simulations/RS_Wheat_9394_Fullirrigation_N200/paddock/outputfile/Variables
      folder Manager folder -> /Simulations/RS_Wheat_9394_Fullirrigation_N200/paddock/Manager folder
        operations
          3/12/1993  irrigation apply amount= 37 (mm)
          29/05/1993  irrigation apply amount= 20 (mm)
          29/07/1993  fertiliser apply amount= 50 (kg/ha), type= urea_n (), depth= 8.8 (mm)
          12/08/1993  irrigation apply amount= 11 (mm)
          06/09/1993  irrigation apply amount= 6.5 (mm)
          06/09/1993  fertiliser apply amount= 50 (kg/ha), type= urea_n (), depth= 13 (mm)
          06/09/1993  irrigation apply amount= 13 (mm)
          04/10/1993  fertiliser apply amount= 50 (kg/ha), type= urea_n (), depth= 11.8 (mm)
          04/10/1993  irrigation apply amount= 12 (mm)
          11/11/1993  irrigation apply amount= 75 (mm)
          15/11/1993  irrigation apply amount= 75 (mm)
          16/11/1993  fertiliser apply amount= 50 (kg/ha), type= urea_n (), depth= 13 (mm)
          16/11/1993  irrigation apply amount= 13 (mm)
          16/11/1993  irrigation apply amount= 27 (mm)
          25/11/1993  irrigation apply amount= 20 (mm)
          3/12/1993  irrigation apply amount= 37 (mm)
          10/12/1993  irrigation apply amount =  35 (mm)
          17/12/1993  irrigation apply amount= 20 (mm)
          23/12/1993  irrigation apply amount= 37 (mm)
          31/12/1993  irrigation apply amount= 39 (mm)
          29/07/1993  irrigation apply amount= 9 (mm)
      wheat
      soil Templeton deep 1 -> /Simulations/RS_Wheat_9394_Fullirrigation_N200/paddock/Templeton deep 1 
        Water
          Layer:
            Thickness (mm)  KS (mm/day)  BD (g/cc)  Airdry (mm/mm)  LL15 (mm/mm)  DUL (mm/mm)  SAT (mm/mm)
            200             4832.04      1.3105     0.05            0.1           0.3          0.4
            200             389.229      1.524      0.15            0.15          0.28         0.39625
            200             16.3619      1.65       0.137           0.137         0.28         0.38
            200             97.995       1.601      0.129           0.129         0.26         0.3
            200             97.995       1.601      0.1             0.1           0.27         0.3
            200             97.995       1.601      0.09            0.09          0.23         0.31
            200             97.995       1.601      0.22            0.22          0.23         0.25
            200             97.995       1.601      0.22            0.22          0.22         0.25
          SoilCrop Wheat
            Layer:
              Thickness (mm)  LL (mm/mm)  kl (/day)  xf (0-1)
              200             0.1         0.06       1
              200             0.15        0.06       1
              200             0.137       0.05       1
              200             0.129       0.04       1
              200             0.1         0.03       1
              200             0.09        0.015      1
              200             0.22        0          1
              200             0.22        0          1
        SoilWat
          Layer:
            Thickness (mm)  SWCON (0-1)
            200             0.6
            200             0.6
            200             0.6
            200             0.05
            200             0.05
            200             0.05
            200             0.05
            200             0.05
          SummerCona = 4.4
          SummerU = 9
          SummerDate = 1-Oct
          WinterCona = 1.5
          WinterU = 2
          WinterDate = 1-Apr
          DiffusConst = 88
          DiffusSlope = 35
          Salb = 0.13
          Cn2Bare = 73
          CnRed = 20
          CnCov = 0.8
        Sample InitialWater
          Layer:
            Thickness (mm)  SW (mm/mm)
            200             0.3
            200             0.28
            200             0.38
            200             0.3
            200             0.3
            200             0.28
            200             0.25
            200             0.25
  simulation RS_Wheat_9394_Latedrought_N2001 -> /Simulations/RS_Wheat_9394_Fullirrigation_N200
    area paddock -> /Simulations/RS_Wheat_9394_Fullirrigation_N200/paddock
      outputfile -> /Simulations/RS_Wheat_9394_Fullirrigation_N200/paddock/outputfile: filename=RS_Wheat_9394_Latedrought_N2001.out; title=RS_Wheat_9394_Latedrought_N2001
        events Reporting Frequency -> /Simulations/RS_Wheat_9394_Fullirrigation_N200/paddock/outputfile/Reporting Frequency
        variables -> /Simulations/RS_Wheat_9394_Fullirrigation_N200/paddock/outputfile/Variables
      folder Manager folder -> /Simulations/RS_Wheat_9394_Fullirrigation_N200/paddock/Manager folder
        operations
          17/05/1993  irrigation apply amount= 64 (mm)
          29/05/1993  irrigation apply amount= 20 (mm)
          29/07/1993  fertiliser apply amount= 50 (kg/ha), type= urea_n (), depth= 8.8 (mm)
          29/07/1993  irrigation apply amount= 9(mm)
          12/08/1993  irrigation apply amount= 11 (mm)
          06/09/1993  irrigation apply amount= 6.5 (mm)
          06/09/1993  fertiliser apply amount= 50 (kg/ha), type= urea_n (), depth= 13 (mm)
          06/09/1993  irrigation apply amount= 13(mm)
          17/09/1993  irrigation apply amount= 43 (mm)
          04/10/1993  irrigation apply amount= 12.2 (mm)
          04/10/1993  fertiliser apply amount= 50 (kg/ha), type= urea_n (), depth= 11.8 (mm)
          04/10/1993  irrigation apply amount= 12 (mm)
          08/10/1993  irrigation apply amount= 21.1 (mm)
          16/11/1993  fertiliser apply amount= 50 (kg/ha), type= urea_n (), depth= 13 (mm)
          16/11/1993  irrigation apply amount= 13(mm)
      wheat
      soil Templeton deep 1 -> /Simulations/RS_Wheat_9394_Fullirrigation_N200/paddock/Templeton deep 1 
        Water
          Layer:
            Thickness (mm)  KS (mm/day)  BD (g/cc)  Airdry (mm/mm)  LL15 (mm/mm)  DUL (mm/mm)  SAT (mm/mm)
            200             4832.04      1.3105     0.08            0.1           0.25         0.39
            200             389.229      1.524      0.12            0.12          0.28         0.39625
            200             16.3619      1.65       0.12            0.12          0.29         0.38
            200             97.995       1.601      0.129           0.129         0.31         0.38
            200             97.995       1.601      0.1             0.1           0.27         0.36
            200             97.995       1.601      0.12            0.12          0.18         0.22
            200             97.995       1.601      0.265           0.265         0.28         0.3
            200             97.995       1.601      0.32            0.32          0.32         0.34
          SoilCrop Wheat
            Layer:
              Thickness (mm)  LL (mm/mm)  kl (/day)  xf (0-1)
              200             0.1         0.06       1
              200             0.12        0.06       1
              200             0.12        0.05       1
              200             0.129       0.04       1
              200             0.1         0.03       1
              200             0.12        0.015      1
              200             0.265       0.01       1
              200             0.32        0          1
        SoilWat
          Layer:
            Thickness (mm)  SWCON (0-1)
            200             0.6
            200             0.6
            200             0.6
            200             0.6
            200             0.6
            200             0.01
            200             0.05
            200             0.05
          SummerCona = 4.4
          SummerU = 9
          SummerDate = 1-Oct
          WinterCona = 1.5
          WinterU = 2
          WinterDate = 1-Apr
          DiffusConst = 88
          DiffusSlope = 35
          Salb = 0.13
          Cn2Bare = 73
          CnRed = 20
          CnCov = 0.8
        Sample InitialWater
          Layer:
            Thickness (mm)  SW (mm/mm)
            200             0.3
            200             0.28
            200             0.28
            200             0.29
            200             0.27
            200             0.22
            200             0.3
            200             0.34
      micromet: soilalbedo=0.23; a_interception=0.0; b_interception=0.0; c_interception=0.0; d_interception=0.0
        ini: filename=%apsim%\Model\MicroMet_NZ_adjustment.xml
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