folder simulations: version=34
  memo
    	Note: If you have Observered data for some samplings but not others, then in the .out file (for the observations) you can use * or ?  for those missing values instead of using 0

    	This allows you to tell the difference between data you did not collect, and data that actually had a value of 0

    	Data with a * or ? is not plotted on the graph (hence neither is its predicted value) whereas data with 0 is.
  memo: same as memo
  memo: same as memo
  memo: same as memo
  folder Mixtures
    folder SWIM
      folder 2003
        simulation W100R15SWIM
          metfile met: filename=Roseworthy.met
          clock
            start_date = 09/06/2003  # Enter the start date of the simulation
            end_date = 31/12/2003  # Enter the end date of the simulation
          summaryfile
          area paddock
            surfaceom surface organic matter
              PoolName = wheat  # Organic Matter pool name
              type = wheat  # Organic Matter type
              mass = 1000  # Initial surface residue (kg/ha)
              cnr = 80  # C:N ratio of initial residue
              standing_fraction = 0  # Fraction of residue standing
            fertiliser
            folder Manager folder
              manager Harvesting radish
                # Harvesting criteria
                crop = raphanus_raphanistrum  # Enter name of crop to harvest when ripe
                on end_of_day:
```
           if [crop].StageName = 'harvest_ripe' or [crop].PlantStatus = 'dead' then
              [crop]  harvest
              [crop]  end_crop
           endif
```
              manager Harvesting wheat
                # Harvesting criteria
                crop = wheat  # Enter name of crop to harvest when ripe
                on end_of_day:
                script: same as in Mixtures.SWIM.2003.W100R15SWIM.paddock.Manager folder.Harvesting radish
              operations Operations Schedule
                10/06/2003  Raphanus_raphanistrum sow population =15, sowing_depth = 10, cultivar =  radish_SA, row_spacing = 250, crop_class = plant
                10/06/2003  fertiliser apply amount = 57 (kg/ha), depth = 50 (mm), type = NO3_N
                10/06/2003  fertiliser apply amount = 12 (kg/ha), depth = 50 (mm), type = NO3_N
                10/06/2003  wheat sow population = 100, sowing_depth = 30, cultivar = hartog, row_spacing = 250, crop_class = plant
            Raphanus_raphanistrum
            wheat
            micromet: soilalbedo=0.23; a_interception=0.0; b_interception=0.0; c_interception=0.0; d_interception=0.0
            canopy Canopy (plays with Micromet)
              intercrop = raphanus_raphanistrum wheat  # Enter crop names to intercrop
              dolight = yes  # Do the light competition? - set to 'No' if only for swapping
            Soil Buckby (Roseworthy): Site=Roseworthy; Region=Mid North; State=South Australia; Country=Australia
              SoilType = Red Brown Earth  # Soil description
              NearestTown = Roseworthy
              ApsoilNumber = 300
              Latitude = -34.5  # Latitude (WGS84)
              Longitude = 138.686  # Longitude (WGS84)
              LocationAccuracy = +-20m
              DataSource = Characterisation 2005 by University of Adelaide, CSIRO Sustainable Ecosystems and DWLBC. Measurement site located adjacent to site described by Soil and Land Information Group, Department of Water, Land and Biodiversity Conservation, South Australia.
              Comments = Soil naming structure: \soils\Australia\South Australia\Region\Classification (Location APSoil No). LB code: RWN3; Low-moderate clay duplex soil with moderate CEC, moderate-high bulk density.Texture change about 10cm. Slaking or dispersion likely in the l
              Water
                Thickness  KS  BD    AirDry  LL15   DUL    SAT
                200        50  1.33  0.05    0.104  0.3    0.35
                200        50  1.22  0.05    0.104  0.3    0.35
                200        50  1.33  0.09    0.115  0.3    0.35
                200        50  1.38  0.11    0.146  0.3    0.35
                200        50  1.44  0.12    0.178  0.3    0.35
                200        50  1.53  0.13    0.202  0.336  0.38
                200        50  1.47  0.14    0.257  0.358  0.41
                200        50  1.49  0.15    0.318  0.387  0.41
                200        50  1.52  0.16    0.354  0.4    0.41
                DUL source: Field measured and checked for sensibility (layer 2, 4)
                SoilCrop wheat: LL=[0.104, 0.104, 0.12, 0.16, 0.19, 0.25, 0.358, 0.387, 0.4]; KL=[0.06, 0.06, 0.06, 0.06, 0.4, 0.4, 0.2, 0.2, 0.2]; XF=[1, 1, 1, 1, 1, 1, 1, 1, 1]
                SoilCrop raphanus_raphanistrum: LL=[0.104, 0.128, 0.18, 0.22, 0.262, 0.336, 0.358, 0.387, 0.4]; KL=[0.06, 0.06, 0.06, 0.06, 0.06, 0.06, 0.04, 0.04, 0.04]; XF=[1, 1, 1, 1, 1, 1, 1, 1, 1]
                SoilCrop peas
                  Thickness  LL    KL    XF
                  150        0.07  0.06  1
                  150        0.22  0.06  1
                  300        0.22  0.06  1
                  300        0.28  0.06  1
                  300        0.27  0.06  0.4
                  300        0.23  0.06  0.32
                  LL source: Field measured and checked for sensibility
              SoilOrganicMatter: OCUnits=WalkleyBlack
                Thickness  OC    FBiom  FInert
                200        1.42  0.035  0.3
                200        0.66  0.025  0.5
                200        0.36  0.015  0.6
                200        0.29  0.01   0.75
                200        0.26  0.01   0.9
                200        0.21  0.01   0.99
                200        0.12  0.01   0.99
                200        0.1   0.01   0.99
                200        0.07  0.01   0.99
                RootCN = 20
                RootWt = 1000
                SoilCN = 24.7
                EnrACoeff = 7.4
                EnrBCoeff = 0.2
              Analysis: PHUnits=CaCl2
                Thickness  Rocks  Texture                EC   PH    CL   CEC   Ca    Mg   Na    K    ESP      ParticleSizeSand  ParticleSizeSilt  ParticleSizeClay
                200        0      Sandy loam             0.1  7.9   21   13.7  9.2   3.3  0.5   0.7  3.64964  73                4                 22
                200        0      Light sandy clay loam  0.2  8     28   25.7  16.7  7.1  1.2   0.7  4.66926  44                4                 52
                200        0      Medium clay            0.2  8.3   66   23.6  13.8  7.2  2     0.6  8.47458  39                8                 53
                200        0      Medium clay            0.5  8.55  250  25    8.5   8.9  6.9   0.7  27.6     39                8                 52
                200        0      Medium clay            0.9  8.65  510  26.1  5.7   9.6  9.8   1    37.5479  48                7                 45
                200        0      Medium clay            1    8.8   736  24.8  3.8   9.8  10.2  1    41.129   51                5                 43
                200        -      -                      -    8.8   -    -     -     -    -     -    -        -                 -                 -
                200        -      -                      -    8.6   -    -     -     -    -     -    -        -                 -                 -
                200        -      -                      -    8     -    -     -     -    -     -    -        -                 -                 -
                Texture source: From PSA using layers in column 'Thickness' (layer 1, 2, 3, 4, 5, 6)
                EC, CL, CEC, Ca, Mg, Na, K, ParticleSizeSand, ParticleSizeSilt, ParticleSizeClay source: Measured (layer 1, 2, 3, 4, 5, 6)
                ESP source: C (layer 1, 2, 3, 4, 5, 6)
              Sample Soil sample
                Thickness  NO3  NH4   SW
                200        19   34    0.3
                200        12   10.5  0.3
                200        8    3     0.3
                200        2.5  2     0.3
                200        2.5  1.5   0.3
                200        5    1     0.336
                200        6    1     0.358
                200        8    1     0.387
                200        9    1     0.4
              Swim
                Salb = 0.13  # Bare Soil Albedo
                CN2Bare = 75  # Bare Soil Runoff Curve Number
                CNRed = 20  # Max. Reduction in Curve Number due to cover
                CNCov = 0.8  # Cover for max Curve Number reduction
                KDul = .1  # Hydraulic Conductivity at DUL (mm/d)
                PSIDul = -100  # Matric Potential at DUL (cm)
                VC = true  # Vapour Conductivity Calculations (on/off)
                DTmin = 0.0  # Minimum Timestep (min)
                DTmax = 1440.  # Maximum Timestep (min)
                MaxWaterIncrement = 10  # Maximum Water Increment (mm)
                SpaceWeightingFactor = 0
                SoluteSpaceWeightingFactor = 0.0
                Diagnostics = false  # Diagnostic Information?
                SwimSoluteParameters: ThicknessUnits=mm
                  Thickness  NO3Exco  NO3FIP  NH4Exco  NH4FIP  UreaExco  UreaFIP  ClExco  ClFIP
                  1000       0        1.0     100.0    1.0     0.0       1.0      0.0     1.0
                  1000       0        1.0     100.0    1.0     0.0       1.0      0.0     1.0
                  1000       0.0      1.0     100.0    1.0     0.0       1.0      0.0     1.0
                  Dis = 15  # Dispersivity - dis ((cm^2/h)/(cm/h)^p)
                  Disp = 1  # Dispersivity Power - disp
                  A = 1.0  # Tortuosity Constant - a
                  DTHC = 0.0  # Tortuoisty Offset - dthc
                  DTHP = 1.0  # Tortuoisty Power - dthp
                  WaterTableCl = 0.0  # Water Table Cl Concentration (ppm)
                  WaterTableNO3 = 0.0  # Water Table NO3 Concentration (ppm)
                  WaterTableNH4 = 0.0  # Water Table NH4 Concentration (ppm)
                  WaterTableUrea = 0.0  # Water Table Urea Concentration (ppm)
                SwimWaterTable
                  WaterTableDepth = 2000.0  # Depth to Water Table (mm)
                SwimSubsurfaceDrain
                  DrainDepth = 600.0  # Depth of subsurface drain (mm)
                  DrainSpacing = 30000.0  # Distance between subsurface drains (mm)
                  DrainRadius = 50.0  # Radius of each subsurface drain (mm)
                  Klat = 1000.0  # Lateral saturated soil water conductivity (mm/d)
                  ImpermDepth = 3000.0  # Depth to impermeable soil (mm)
            outputfile: filename=W100R15SWIM.out; title=W100R15SWIM
              variables
                variable:
                  day
                  year
                  dd/mm/yyyy as date
                  raphanus_raphanistrum.Height as R_height
                  raphanus_raphanistrum.LAI as R_lai
                  raphanus_raphanistrum.LeafNumber as R_LeafNumber
                  raphanus_raphanistrum.LeafNumberDead as R_LeafNumberDead
                  raphanus_raphanistrum.Biomass as R_biomass
                  raphanus_raphanistrum.LeafLiveWt as R_LeafLiveWt
                  raphanus_raphanistrum.StemLiveWt as R_StemLiveWt
                  raphanus_raphanistrum.GrainWt as R_GrainWt
                  raphanus_raphanistrum.Yield as R_yield
                  wheat.Height as W_height
                  wheat.LAI as W_lai
                  wheat.LeafNumber as W_LeafNumber
                  wheat.LeafNumberDead as W_LeafNumberDead
                  wheat.Biomass as W_biomass
                  wheat.LeafLiveWt as W_LeafLiveWt
                  wheat.StemLiveWt as W_StemLiveWt
                  wheat.GrainWt as W_GrainWt
                  wheat.Yield as W_yield
              events Reporting Frequency: event=daily
        simulation W100R30SWIM
          metfile met: filename=Roseworthy.met
          clock
            start_date = 09/06/2003  # Enter the start date of the simulation
            end_date = 31/12/2003  # Enter the end date of the simulation
          summaryfile
          area paddock
            surfaceom surface organic matter
              PoolName = wheat  # Organic Matter pool name
              type = wheat  # Organic Matter type
              mass = 1000  # Initial surface residue (kg/ha)
              cnr = 80  # C:N ratio of initial residue
              standing_fraction = 0  # Fraction of residue standing
            fertiliser
            folder Manager folder
              manager Harvesting radish
                # Harvesting criteria
                crop = raphanus_raphanistrum  # Enter name of crop to harvest when ripe
                on end_of_day:
                script: same as in Mixtures.SWIM.2003.W100R15SWIM.paddock.Manager folder.Harvesting radish
              manager Harvesting wheat
                # Harvesting criteria
                crop = wheat  # Enter name of crop to harvest when ripe
                on end_of_day:
                script: same as in Mixtures.SWIM.2003.W100R15SWIM.paddock.Manager folder.Harvesting radish
              operations Operations Schedule
                10/06/2003  Raphanus_raphanistrum sow population = 30, sowing_depth = 10, cultivar =  radish_SA, row_spacing = 170, crop_class = plant
                10/06/2003  fertiliser apply amount = 57 (kg/ha), depth = 50 (mm), type = NO3_N
                10/06/2003  fertiliser apply amount = 12 (kg/ha), depth = 50 (mm), type = NO3_N
                10/06/2003  wheat sow population = 100, sowing_depth = 30, cultivar = hartog, row_spacing = 250, crop_class = plant
            Raphanus_raphanistrum
            wheat
            micromet: soilalbedo=0.23; a_interception=0.0; b_interception=0.0; c_interception=0.0; d_interception=0.0
            canopy Canopy (plays with Micromet)
              intercrop = raphanus_raphanistrum wheat  # Enter crop names to intercrop
              dolight = yes  # Do the light competition? - set to 'No' if only for swapping
            Soil Buckby (Roseworthy): same as Mixtures.SWIM.2003.W100R15SWIM.paddock.Buckby (Roseworthy)
            outputfile: filename=W100R30SWIM.out; title=W100R30SWIM
              variables: same as Mixtures.SWIM.2003.W100R15SWIM.paddock.outputfile.Variables
              events Reporting Frequency: event=daily
        simulation W100R60SWIM
          metfile met: filename=Roseworthy.met
          clock
            start_date = 09/06/2003  # Enter the start date of the simulation
            end_date = 31/12/2003  # Enter the end date of the simulation
          summaryfile
          area paddock
            surfaceom surface organic matter
              PoolName = wheat  # Organic Matter pool name
              type = wheat  # Organic Matter type
              mass = 1000  # Initial surface residue (kg/ha)
              cnr = 80  # C:N ratio of initial residue
              standing_fraction = 0  # Fraction of residue standing
            fertiliser
            folder Manager folder
              manager Harvesting radish
                # Harvesting criteria
                crop = raphanus_raphanistrum  # Enter name of crop to harvest when ripe
                on end_of_day:
                script: same as in Mixtures.SWIM.2003.W100R15SWIM.paddock.Manager folder.Harvesting radish
              manager Harvesting wheat
                # Harvesting criteria
                crop = wheat  # Enter name of crop to harvest when ripe
                on end_of_day:
                script: same as in Mixtures.SWIM.2003.W100R15SWIM.paddock.Manager folder.Harvesting radish
              operations Operations Schedule
                10/06/2003  Raphanus_raphanistrum sow population =60, sowing_depth = 10, cultivar =  radish_SA, row_spacing = 120, crop_class = plant
                10/06/2003  fertiliser apply amount = 57 (kg/ha), depth = 50 (mm), type = NO3_N
                10/06/2003  fertiliser apply amount = 12 (kg/ha), depth = 50 (mm), type = NO3_N
                10/06/2003  wheat sow population = 100, sowing_depth = 30, cultivar = hartog, row_spacing = 250, crop_class = plant
            Raphanus_raphanistrum
            wheat
            micromet: soilalbedo=0.23; a_interception=0.0; b_interception=0.0; c_interception=0.0; d_interception=0.0
            canopy Canopy (plays with Micromet)
              intercrop = raphanus_raphanistrum wheat  # Enter crop names to intercrop
              dolight = yes  # Do the light competition? - set to 'No' if only for swapping
            Soil Buckby (Roseworthy): same as Mixtures.SWIM.2003.W100R15SWIM.paddock.Buckby (Roseworthy)
            outputfile: filename=W100R60SWIM.out; title=W100R60SWIM
              variables: same as Mixtures.SWIM.2003.W100R15SWIM.paddock.outputfile.Variables
              events Reporting Frequency: event=daily
        simulation W200R15SWIM
          metfile met: filename=Roseworthy.met
          clock
            start_date = 09/06/2003  # Enter the start date of the simulation
            end_date = 31/12/2003  # Enter the end date of the simulation
          summaryfile
          area paddock
            surfaceom surface organic matter
              PoolName = wheat  # Organic Matter pool name
              type = wheat  # Organic Matter type
              mass = 1000  # Initial surface residue (kg/ha)
              cnr = 80  # C:N ratio of initial residue
              standing_fraction = 0  # Fraction of residue standing
            fertiliser
            folder Manager folder
              manager Harvesting radish
                # Harvesting criteria
                crop = raphanus_raphanistrum  # Enter name of crop to harvest when ripe
                on end_of_day:
                script: same as in Mixtures.SWIM.2003.W100R15SWIM.paddock.Manager folder.Harvesting radish
              manager Harvesting wheat
                # Harvesting criteria
                crop = wheat  # Enter name of crop to harvest when ripe
                on end_of_day:
                script: same as in Mixtures.SWIM.2003.W100R15SWIM.paddock.Manager folder.Harvesting radish
              operations Operations Schedule
                10/06/2003  Raphanus_raphanistrum sow population =15, sowing_depth = 10, cultivar =  radish_SA, row_spacing = 250, crop_class = plant
                10/06/2003  fertiliser apply amount = 57 (kg/ha), depth = 50 (mm), type = NO3_N
                10/06/2003  fertiliser apply amount = 12 (kg/ha), depth = 50 (mm), type = NO3_N
                10/06/2003  wheat sow population = 200, sowing_depth = 30, cultivar = hartog, row_spacing = 250, crop_class = plant
            Raphanus_raphanistrum
            wheat
            micromet: soilalbedo=0.23; a_interception=0.0; b_interception=0.0; c_interception=0.0; d_interception=0.0
            canopy Canopy (plays with Micromet)
              intercrop = raphanus_raphanistrum wheat  # Enter crop names to intercrop
              dolight = yes  # Do the light competition? - set to 'No' if only for swapping
            Soil Buckby (Roseworthy): same as Mixtures.SWIM.2003.W100R15SWIM.paddock.Buckby (Roseworthy)
            outputfile: filename=W200R15SWIM.out; title=W200R15SWIM
              variables: same as Mixtures.SWIM.2003.W100R15SWIM.paddock.outputfile.Variables
              events Reporting Frequency: event=daily
        simulation W200R30SWIM
          metfile met: filename=Roseworthy.met
          clock
            start_date = 09/06/2003  # Enter the start date of the simulation
            end_date = 31/12/2003  # Enter the end date of the simulation
          summaryfile
          area paddock
            surfaceom surface organic matter
              PoolName = wheat  # Organic Matter pool name
              type = wheat  # Organic Matter type
              mass = 1000  # Initial surface residue (kg/ha)
              cnr = 80  # C:N ratio of initial residue
              standing_fraction = 0  # Fraction of residue standing
            fertiliser
            folder Manager folder
              manager Harvesting radish
                # Harvesting criteria
                crop = raphanus_raphanistrum  # Enter name of crop to harvest when ripe
                on end_of_day:
                script: same as in Mixtures.SWIM.2003.W100R15SWIM.paddock.Manager folder.Harvesting radish
              manager Harvesting wheat
                # Harvesting criteria
                crop = wheat  # Enter name of crop to harvest when ripe
                on end_of_day:
                script: same as in Mixtures.SWIM.2003.W100R15SWIM.paddock.Manager folder.Harvesting radish
              operations Operations Schedule
                10/06/2003  Raphanus_raphanistrum sow population = 30, sowing_depth = 10, cultivar =  radish_SA, row_spacing = 170, crop_class = plant
                10/06/2003  fertiliser apply amount = 57 (kg/ha), depth = 50 (mm), type = NO3_N
                10/06/2003  fertiliser apply amount = 12 (kg/ha), depth = 50 (mm), type = NO3_N
                10/06/2003  wheat sow population = 200, sowing_depth = 30, cultivar = hartog, row_spacing = 250, crop_class = plant
            Raphanus_raphanistrum
            wheat
            micromet: soilalbedo=0.23; a_interception=0.0; b_interception=0.0; c_interception=0.0; d_interception=0.0
            canopy Canopy (plays with Micromet)
              intercrop = raphanus_raphanistrum wheat  # Enter crop names to intercrop
              dolight = yes  # Do the light competition? - set to 'No' if only for swapping
            Soil Buckby (Roseworthy): same as Mixtures.SWIM.2003.W100R15SWIM.paddock.Buckby (Roseworthy)
            outputfile: filename=W200R30SWIM.out; title=W200R30SWIM
              variables: same as Mixtures.SWIM.2003.W100R15SWIM.paddock.outputfile.Variables
              events Reporting Frequency: event=daily
        simulation W200R60SWIM
          metfile met: filename=Roseworthy.met
          clock
            start_date = 09/06/2003  # Enter the start date of the simulation
            end_date = 31/12/2003  # Enter the end date of the simulation
          summaryfile
          area paddock
            surfaceom surface organic matter
              PoolName = wheat  # Organic Matter pool name
              type = wheat  # Organic Matter type
              mass = 1000  # Initial surface residue (kg/ha)
              cnr = 80  # C:N ratio of initial residue
              standing_fraction = 0  # Fraction of residue standing
            fertiliser
            folder Manager folder
              manager Harvesting radish
                # Harvesting criteria
                crop = raphanus_raphanistrum  # Enter name of crop to harvest when ripe
                on end_of_day:
                script: same as in Mixtures.SWIM.2003.W100R15SWIM.paddock.Manager folder.Harvesting radish
              manager Harvesting wheat
                # Harvesting criteria
                crop = wheat  # Enter name of crop to harvest when ripe
                on end_of_day:
                script: same as in Mixtures.SWIM.2003.W100R15SWIM.paddock.Manager folder.Harvesting radish
              operations Operations Schedule
                10/06/2003  Raphanus_raphanistrum sow population =60, sowing_depth = 10, cultivar =  radish_SA, row_spacing = 120, crop_class = plant
                10/06/2003  fertiliser apply amount = 57 (kg/ha), depth = 50 (mm), type = NO3_N
                10/06/2003  fertiliser apply amount = 12 (kg/ha), depth = 50 (mm), type = NO3_N
                10/06/2003  wheat sow population = 200, sowing_depth = 30, cultivar = hartog, row_spacing = 250, crop_class = plant
            Raphanus_raphanistrum
            wheat
            micromet: soilalbedo=0.23; a_interception=0.0; b_interception=0.0; c_interception=0.0; d_interception=0.0
            canopy Canopy (plays with Micromet)
              intercrop = raphanus_raphanistrum wheat  # Enter crop names to intercrop
              dolight = yes  # Do the light competition? - set to 'No' if only for swapping
            Soil Buckby (Roseworthy): same as Mixtures.SWIM.2003.W100R15SWIM.paddock.Buckby (Roseworthy)
            outputfile: filename=W200R60SWIM.out; title=W200R60SWIM
              variables: same as Mixtures.SWIM.2003.W100R15SWIM.paddock.outputfile.Variables
              events Reporting Frequency: event=daily
        simulation W400R15SWIM
          metfile met: filename=Roseworthy.met
          clock
            start_date = 09/06/2003  # Enter the start date of the simulation
            end_date = 31/12/2003  # Enter the end date of the simulation
          summaryfile
          area paddock
            surfaceom surface organic matter
              PoolName = wheat  # Organic Matter pool name
              type = wheat  # Organic Matter type
              mass = 1000  # Initial surface residue (kg/ha)
              cnr = 80  # C:N ratio of initial residue
              standing_fraction = 0  # Fraction of residue standing
            fertiliser
            folder Manager folder
              manager Harvesting radish
                # Harvesting criteria
                crop = raphanus_raphanistrum  # Enter name of crop to harvest when ripe
                on end_of_day:
                script: same as in Mixtures.SWIM.2003.W100R15SWIM.paddock.Manager folder.Harvesting radish
              manager Harvesting wheat
                # Harvesting criteria
                crop = wheat  # Enter name of crop to harvest when ripe
                on end_of_day:
                script: same as in Mixtures.SWIM.2003.W100R15SWIM.paddock.Manager folder.Harvesting radish
              operations Operations Schedule
                10/06/2003  Raphanus_raphanistrum sow population =15, sowing_depth = 10, cultivar =  radish_SA, row_spacing = 250, crop_class = plant
                10/06/2003  fertiliser apply amount = 57 (kg/ha), depth = 50 (mm), type = NO3_N
                10/06/2003  fertiliser apply amount = 12 (kg/ha), depth = 50 (mm), type = NO3_N
                10/06/2003  wheat sow population = 400, sowing_depth = 30, cultivar = hartog, row_spacing = 250, crop_class = plant
            Raphanus_raphanistrum
            wheat
            micromet: soilalbedo=0.23; a_interception=0.0; b_interception=0.0; c_interception=0.0; d_interception=0.0
            canopy Canopy (plays with Micromet)
              intercrop = raphanus_raphanistrum wheat  # Enter crop names to intercrop
              dolight = yes  # Do the light competition? - set to 'No' if only for swapping
            Soil Buckby (Roseworthy): same as Mixtures.SWIM.2003.W100R15SWIM.paddock.Buckby (Roseworthy)
            outputfile: filename=W400R15SWIM.out; title=W400R15SWIM
              variables: same as Mixtures.SWIM.2003.W100R15SWIM.paddock.outputfile.Variables
              events Reporting Frequency: event=daily
        simulation W400R30SWIM
          metfile met: filename=Roseworthy.met
          clock
            start_date = 09/06/2003  # Enter the start date of the simulation
            end_date = 31/12/2003  # Enter the end date of the simulation
          summaryfile
          area paddock
            surfaceom surface organic matter
              PoolName = wheat  # Organic Matter pool name
              type = wheat  # Organic Matter type
              mass = 1000  # Initial surface residue (kg/ha)
              cnr = 80  # C:N ratio of initial residue
              standing_fraction = 0  # Fraction of residue standing
            fertiliser
            folder Manager folder
              manager Harvesting radish
                # Harvesting criteria
                crop = raphanus_raphanistrum  # Enter name of crop to harvest when ripe
                on end_of_day:
                script: same as in Mixtures.SWIM.2003.W100R15SWIM.paddock.Manager folder.Harvesting radish
              manager Harvesting wheat
                # Harvesting criteria
                crop = wheat  # Enter name of crop to harvest when ripe
                on end_of_day:
                script: same as in Mixtures.SWIM.2003.W100R15SWIM.paddock.Manager folder.Harvesting radish
              operations Operations Schedule
                10/06/2003  Raphanus_raphanistrum sow population = 30, sowing_depth = 10, cultivar =  radish_SA, row_spacing = 170, crop_class = plant
                10/06/2003  fertiliser apply amount = 57 (kg/ha), depth = 50 (mm), type = NO3_N
                10/06/2003  fertiliser apply amount = 12 (kg/ha), depth = 50 (mm), type = NO3_N
                10/06/2003  wheat sow population = 400, sowing_depth = 30, cultivar = hartog, row_spacing = 250, crop_class = plant
            Raphanus_raphanistrum
            wheat
            micromet: soilalbedo=0.23; a_interception=0.0; b_interception=0.0; c_interception=0.0; d_interception=0.0
            canopy Canopy (plays with Micromet)
              intercrop = raphanus_raphanistrum wheat  # Enter crop names to intercrop
              dolight = yes  # Do the light competition? - set to 'No' if only for swapping
            Soil Buckby (Roseworthy): same as Mixtures.SWIM.2003.W100R15SWIM.paddock.Buckby (Roseworthy)
            outputfile: filename=W400R30SWIM.out; title=W400R30SWIM
              variables: same as Mixtures.SWIM.2003.W100R15SWIM.paddock.outputfile.Variables
              events Reporting Frequency: event=daily
        simulation W400R60SWIM
          metfile met: filename=Roseworthy.met
          clock
            start_date = 09/06/2003  # Enter the start date of the simulation
            end_date = 31/12/2003  # Enter the end date of the simulation
          summaryfile
          area paddock
            surfaceom surface organic matter
              PoolName = wheat  # Organic Matter pool name
              type = wheat  # Organic Matter type
              mass = 1000  # Initial surface residue (kg/ha)
              cnr = 80  # C:N ratio of initial residue
              standing_fraction = 0  # Fraction of residue standing
            fertiliser
            folder Manager folder
              manager Harvesting radish
                # Harvesting criteria
                crop = raphanus_raphanistrum  # Enter name of crop to harvest when ripe
                on end_of_day:
                script: same as in Mixtures.SWIM.2003.W100R15SWIM.paddock.Manager folder.Harvesting radish
              manager Harvesting wheat
                # Harvesting criteria
                crop = wheat  # Enter name of crop to harvest when ripe
                on end_of_day:
                script: same as in Mixtures.SWIM.2003.W100R15SWIM.paddock.Manager folder.Harvesting radish
              operations Operations Schedule
                10/06/2003  Raphanus_raphanistrum sow population =60, sowing_depth = 10, cultivar =  radish_SA, row_spacing = 120, crop_class = plant
                10/06/2003  fertiliser apply amount = 57 (kg/ha), depth = 50 (mm), type = NO3_N
                10/06/2003  fertiliser apply amount = 12 (kg/ha), depth = 50 (mm), type = NO3_N
                10/06/2003  wheat sow population = 400, sowing_depth = 30, cultivar = hartog, row_spacing = 250, crop_class = plant
            Raphanus_raphanistrum
            wheat
            micromet: soilalbedo=0.23; a_interception=0.0; b_interception=0.0; c_interception=0.0; d_interception=0.0
            canopy Canopy (plays with Micromet)
              intercrop = raphanus_raphanistrum wheat  # Enter crop names to intercrop
              dolight = yes  # Do the light competition? - set to 'No' if only for swapping
            Soil Buckby (Roseworthy): same as Mixtures.SWIM.2003.W100R15SWIM.paddock.Buckby (Roseworthy)
            outputfile: filename=W400R60SWIM.out; title=W400R60SWIM
              variables: same as Mixtures.SWIM.2003.W100R15SWIM.paddock.outputfile.Variables
              events Reporting Frequency: event=daily
      folder 2004
        simulation 84W100R0Ry200SWIM
          metfile met: filename=Roseworthy.met
          clock
            start_date = 16/06/2004  # Enter the start date of the simulation
            end_date = 31/12/2004  # Enter the end date of the simulation
          summaryfile
          area paddock
            surfaceom surface organic matter
              PoolName = wheat  # Organic Matter pool name
              type = wheat  # Organic Matter type
              mass = 1000  # Initial surface residue (kg/ha)
              cnr = 80  # C:N ratio of initial residue
              standing_fraction = 0  # Fraction of residue standing
            fertiliser
            outputfile: filename=84W100R0Ry200SWIM.out; title=84W100R0Ry200SWIM
              variables
                variable:
                  day
                  year
                  dd/mm/yyyy as date
                  wheat.Height as W_height
                  wheat.LAI as W_lai
                  wheat.LeafNumber as W_LeafNumber
                  wheat.LeafNumberDead as W_LeafNumberDead
                  wheat.Biomass as W_biomass
                  wheat.LeafLiveWt as W_LeafLiveWt
                  wheat.StemLiveWt as W_StemLiveWt
                  wheat.GrainWt as W_GrainWt
                  wheat.Yield as W_yield
                  wheat.green_biomass as W_green_biomass
                  lolium_rigidum.Height as Ry_height
                  lolium_rigidum.LAI as Ry_lai
                  lolium_rigidum.LeafNumber as Ry_LeafNumber
                  lolium_rigidum.LeafNumberDead as Ry_LeafNumberDead
                  lolium_rigidum.Biomass as Ry_biomass
                  lolium_rigidum.LeafLiveWt as Ry_LeafLiveWt
                  lolium_rigidum.StemLiveWt as Ry_StemLiveWt
                  lolium_rigidum.GrainWt as Ry_GrainWt
                  lolium_rigidum.Yield as Ry_yield
                  lolium_rigidum.green_biomass as Ry_green_biomass
              events Reporting Frequency: event=daily
            folder Manager folder
              operations Operations Schedule
                17/06/2004  wheat sow population =100, sowing_depth = 10, cultivar = hartog, row_spacing = 250, crop_class = plant
                17/06/2004  fertiliser apply amount = 57 (kg/ha), depth = 50 (mm), type = NO3_N
                17/06/2004  fertiliser apply amount = 12 (kg/ha), depth = 50 (mm), type = NO3_N
                17/06/2004  lolium_rigidum sow population =200, sowing_depth = 10, cultivar = guard, row_spacing = 250, crop_class = plant
              manager Harvest wheat
                # Harvesting criteria
                crop = wheat  # Enter name of crop to harvest when ripe
                on end_of_day:
                script: same as in Mixtures.SWIM.2003.W100R15SWIM.paddock.Manager folder.Harvesting radish
              manager Harvest rye
                # Harvesting criteria
                crop = Lolium_rigidum  # Enter name of crop to harvest when ripe
                on end_of_day:
                script: same as in Mixtures.SWIM.2003.W100R15SWIM.paddock.Manager folder.Harvesting radish
            outputfile stress: filename=84W100R0Ry200SWIM stress.out; title=84W100R0Ry200SWIM stress
              variables
                variables: day, year, dd/mm/yyyy as date, NStressExpansion, NStressGrain, NStressPheno, NStressPhoto, WaterStressExpansion, WaterStressFixation, WaterStressPheno, WaterStressPhoto, sw, esw
              events Reporting Frequency: event=daily
            Soil Buckby (Roseworthy)1: Site=Roseworthy; Region=Mid North; State=South Australia; Country=Australia
              SoilType = Red Brown Earth  # Soil description
              NearestTown = Roseworthy
              ApsoilNumber = 300
              Latitude = -34.5  # Latitude (WGS84)
              Longitude = 138.686  # Longitude (WGS84)
              LocationAccuracy = +-20m
              DataSource = Characterisation 2005 by University of Adelaide, CSIRO Sustainable Ecosystems and DWLBC. Measurement site located adjacent to site described by Soil and Land Information Group, Department of Water, Land and Biodiversity Conservation, South Australia.
              Comments = Soil naming structure: \soils\Australia\South Australia\Region\Classification (Location APSoil No). LB code: RWN3; Low-moderate clay duplex soil with moderate CEC, moderate-high bulk density.Texture change about 10cm. Slaking or dispersion likely in the l
              Water
                Thickness  KS  BD    AirDry  LL15   DUL    SAT
                200        50  1.33  0.05    0.104  0.3    0.35
                200        50  1.22  0.05    0.104  0.3    0.35
                200        50  1.33  0.09    0.115  0.3    0.35
                200        50  1.38  0.11    0.146  0.3    0.35
                200        50  1.44  0.12    0.178  0.3    0.35
                200        50  1.53  0.13    0.202  0.336  0.38
                200        50  1.47  0.14    0.257  0.358  0.41
                200        50  1.49  0.15    0.318  0.387  0.41
                200        50  1.52  0.16    0.354  0.4    0.41
                DUL source: Field measured and checked for sensibility (layer 2, 4)
                SoilCrop wheat: LL=[0.104, 0.104, 0.12, 0.16, 0.19, 0.25, 0.358, 0.387, 0.4]; KL=[0.06, 0.06, 0.06, 0.06, 0.4, 0.4, 0.2, 0.2, 0.2]; XF=[1, 1, 1, 1, 1, 1, 1, 1, 1]
                SoilCrop lolium_rigidum: LL=[0.104, 0.104, 0.12, 0.16, 0.19, 0.25, 0.358, 0.387, 0.4]; KL=[0.06, 0.06, 0.06, 0.06, 0.4, 0.4, 0.2, 0.2, 0.2]; XF=[1, 1, 1, 1, 1, 1, 1, 1, 1]
              SoilOrganicMatter: same as Mixtures.SWIM.2003.W100R15SWIM.paddock.Buckby (Roseworthy).SoilOrganicMatter
              Analysis: same as Mixtures.SWIM.2003.W100R15SWIM.paddock.Buckby (Roseworthy).Analysis
              Sample Soil sample
                Thickness  NO3  NH4   SW
                200        19   34    0.3
                200        12   10.5  0.3
                200        8    3     0.3
                200        2.5  2     0.3
                200        2.5  1.5   0.3
                200        5    1     0.336
                200        6    1     0.358
                200        8    1     0.387
                200        9    1     0.4
              Swim: same as Mixtures.SWIM.2003.W100R15SWIM.paddock.Buckby (Roseworthy).Swim
            wheat
              ModifyKL = yes  # Modify KL using CL, EC or ESP if found?
            canopy Canopy (plays with Micromet)
              intercrop = wheat lolium_rigidum  # Enter crop names to intercrop
              dolight = yes  # Do the light competition? - set to 'No' if only for swapping
            micromet: soilalbedo=0.23; a_interception=0.0; b_interception=0.0; c_interception=0.0; d_interception=0.0
            Lolium_rigidum
        simulation 84W200R0Ry200SWIM -> /simulations/Mixtures/SoilWat/2004/84W100R0Ry200
          area paddock -> /simulations/Mixtures/SoilWat/2004/84W100R0Ry200/paddock
            outputfile: filename=84W200R0Ry200SWIM.out; title=84W200R0Ry200SWIM
              variables -> /simulations/Mixtures/SoilWat/2004/84W100R0Ry200/paddock/outputfile/Variables
              events Reporting Frequency -> /simulations/Mixtures/SoilWat/2004/84W100R0Ry200/paddock/outputfile/Reporting Frequency
            folder Manager folder -> /simulations/Mixtures/SoilWat/2004/84W100R0Ry200/paddock/Manager folder
              operations Operations Schedule
                17/06/2004  wheat sow population =200, sowing_depth = 10, cultivar = hartog, row_spacing = 250, crop_class = plant
                17/06/2004  fertiliser apply amount = 57 (kg/ha), depth = 50 (mm), type = NO3_N
                17/06/2004  fertiliser apply amount = 12 (kg/ha), depth = 50 (mm), type = NO3_N
                17/06/2004  lolium_rigidum sow population =200, sowing_depth = 10, cultivar = guard, row_spacing = 250, crop_class = plant
            outputfile stress: filename=84W200R0Ry200SWIM stress.out; title=84W200R0Ry200SWIM stress
              variables -> /simulations/Mixtures/SoilWat/2004/84W100R0Ry200/paddock/stress/Variables
              events Reporting Frequency -> /simulations/Mixtures/SoilWat/2004/84W100R0Ry200/paddock/stress/Reporting Frequency
            Soil Buckby (Roseworthy)1 -> /simulations/Mixtures/SoilWat/2004/84W100R0Ry200/paddock/Buckby (Roseworthy)1
              Swim: same as Mixtures.SWIM.2003.W100R15SWIM.paddock.Buckby (Roseworthy).Swim
        simulation 84W400R0Ry200SWIM -> /simulations/Mixtures/SoilWat/2004/84W100R0Ry200
          area paddock -> /simulations/Mixtures/SoilWat/2004/84W100R0Ry200/paddock
            outputfile: filename=84W400R0Ry200SWIM.out; title=84W400R0Ry200SWIM
              variables -> /simulations/Mixtures/SoilWat/2004/84W100R0Ry200/paddock/outputfile/Variables
              events Reporting Frequency -> /simulations/Mixtures/SoilWat/2004/84W100R0Ry200/paddock/outputfile/Reporting Frequency
            folder Manager folder -> /simulations/Mixtures/SoilWat/2004/84W100R0Ry200/paddock/Manager folder
              operations Operations Schedule
                17/06/2004  wheat sow population =400, sowing_depth = 10, cultivar = hartog, row_spacing = 250, crop_class = plant
                17/06/2004  fertiliser apply amount = 57 (kg/ha), depth = 50 (mm), type = NO3_N
                17/06/2004  fertiliser apply amount = 12 (kg/ha), depth = 50 (mm), type = NO3_N
                17/06/2004  lolium_rigidum sow population =200, sowing_depth = 10, cultivar = guard, row_spacing = 250, crop_class = plant
            outputfile stress: filename=84W400R0Ry200SWIM stress.out; title=84W400R0Ry200SWIM stress
              variables -> /simulations/Mixtures/SoilWat/2004/84W100R0Ry200/paddock/stress/Variables
              events Reporting Frequency -> /simulations/Mixtures/SoilWat/2004/84W100R0Ry200/paddock/stress/Reporting Frequency
            Soil Buckby (Roseworthy)1 -> /simulations/Mixtures/SoilWat/2004/84W100R0Ry200/paddock/Buckby (Roseworthy)1
              Swim: same as Mixtures.SWIM.2003.W100R15SWIM.paddock.Buckby (Roseworthy).Swim
        simulation 84W100R15Ry200SWIM -> /simulations/Mixtures/SoilWat/2004/84W100R0Ry200
          area paddock -> /simulations/Mixtures/SoilWat/2004/84W100R0Ry200/paddock
            outputfile: filename=84W100R15Ry200SWIM.out; title=84W100R15Ry200SWIM
              variables
                variable:
                  day
                  year
                  dd/mm/yyyy as date
                  wheat.Height as W_height
                  wheat.LAI as W_lai
                  wheat.LeafNumber as W_LeafNumber
                  wheat.LeafNumberDead as W_LeafNumberDead
                  wheat.Biomass as W_biomass
                  wheat.LeafLiveWt as W_LeafLiveWt
                  wheat.StemLiveWt as W_StemLiveWt
                  wheat.GrainWt as W_GrainWt
                  wheat.Yield as W_yield
                  wheat.green_biomass as W_green_biomass
                  lolium_rigidum.Height as Ry_height
                  lolium_rigidum.LAI as Ry_lai
                  lolium_rigidum.LeafNumber as Ry_LeafNumber
                  lolium_rigidum.LeafNumberDead as Ry_LeafNumberDead
                  lolium_rigidum.Biomass as Ry_biomass
                  lolium_rigidum.LeafLiveWt as Ry_LeafLiveWt
                  lolium_rigidum.StemLiveWt as Ry_StemLiveWt
                  lolium_rigidum.GrainWt as Ry_GrainWt
                  lolium_rigidum.Yield as Ry_yield
                  lolium_rigidum.green_biomass as Ry_green_biomass
                  raphanus_raphanistrumheight as R_height
                  raphanus_raphanistrumlai as R_lai
                  raphanus_raphanistrumLeafNumber as R_LeafNumber
                  raphanus_raphanistrumLeafNumberDead as R_LeafNumberDead
                  raphanus_raphanistrumbiomass as R_biomass
                  raphanus_raphanistrumLeafLiveWt as R_LeafLiveWt
                  raphanus_raphanistrumStemLiveWt as R_StemLiveWt
                  raphanus_raphanistrumGrainWt as R_GrainWt
                  raphanus_raphanistrumyield as R_yield
                  raphanus_raphanistrumgreen_biomass as R_green_biomass
              events Reporting Frequency -> /simulations/Mixtures/SoilWat/2004/84W100R0Ry200/paddock/outputfile/Reporting Frequency
            folder Manager folder -> /simulations/Mixtures/SoilWat/2004/84W100R0Ry200/paddock/Manager folder
              operations Operations Schedule
                17/06/2004  wheat sow population =100, sowing_depth = 10, cultivar = hartog, row_spacing = 250, crop_class = plant
                17/06/2004  fertiliser apply amount = 57 (kg/ha), depth = 50 (mm), type = NO3_N
                17/06/2004  fertiliser apply amount = 12 (kg/ha), depth = 50 (mm), type = NO3_N
                17/06/2004  lolium_rigidum sow population =200, sowing_depth = 10, cultivar = guard, row_spacing = 250, crop_class = plant
                17/06/2004  raphanus_raphanistrum sow population = 15, sowing_depth = 10, cultivar =  radish_SA, row_spacing = 400, crop_class = plant
              manager Harvest radish
                # Harvesting criteria
                crop = raphanus_raphanistrum  # Enter name of crop to harvest when ripe
                on end_of_day:
                script: same as in Mixtures.SWIM.2003.W100R15SWIM.paddock.Manager folder.Harvesting radish
            outputfile stress: filename=84W100R15Ry200SWIM stress.out; title=84W100R15Ry200SWIM stress
              variables -> /simulations/Mixtures/SoilWat/2004/84W100R0Ry200/paddock/stress/Variables
              events Reporting Frequency -> /simulations/Mixtures/SoilWat/2004/84W100R0Ry200/paddock/stress/Reporting Frequency
            Soil Buckby (Roseworthy)1 -> /simulations/Mixtures/SoilWat/2004/84W100R0Ry200/paddock/Buckby (Roseworthy)1
              Water
                Thickness  KS  BD    AirDry  LL15   DUL    SAT
                200        50  1.33  0.05    0.104  0.3    0.35
                200        50  1.22  0.05    0.104  0.3    0.35
                200        50  1.33  0.09    0.115  0.3    0.35
                200        50  1.38  0.11    0.146  0.3    0.35
                200        50  1.44  0.12    0.178  0.3    0.35
                200        50  1.53  0.13    0.202  0.336  0.38
                200        50  1.47  0.14    0.257  0.358  0.41
                200        50  1.49  0.15    0.318  0.387  0.41
                200        50  1.52  0.16    0.354  0.4    0.41
                DUL source: Field measured and checked for sensibility (layer 2, 4)
                SoilCrop raphanus_raphanistrum: LL=[0.104, 0.104, 0.12, 0.16, 0.19, 0.25, 0.358, 0.387, 0.4]; KL=[0.06, 0.06, 0.06, 0.06, 0.4, 0.4, 0.2, 0.2, 0.2]; XF=[1, 1, 1, 1, 1, 1, 1, 1, 1]
                SoilCrop wheat: LL=[0.104, 0.104, 0.12, 0.16, 0.19, 0.25, 0.358, 0.387, 0.4]; KL=[0.06, 0.06, 0.06, 0.06, 0.4, 0.4, 0.2, 0.2, 0.2]; XF=[1, 1, 1, 1, 1, 1, 1, 1, 1]
                SoilCrop lolium_rigidum: LL=[0.104, 0.104, 0.12, 0.16, 0.19, 0.25, 0.358, 0.387, 0.4]; KL=[0.06, 0.06, 0.06, 0.06, 0.4, 0.4, 0.2, 0.2, 0.2]; XF=[1, 1, 1, 1, 1, 1, 1, 1, 1]
              Swim: same as Mixtures.SWIM.2003.W100R15SWIM.paddock.Buckby (Roseworthy).Swim
            canopy Canopy (plays with Micromet)
              intercrop = wheat lolium_rigidum raphanus_raphanistrum  # Enter crop names to intercrop
              dolight = yes  # Do the light competition? - set to 'No' if only for swapping
            Raphanus_raphanistrum
        simulation 84W100R30Ry200SWIM -> /simulations/Mixtures/SoilWat/2004/84W100R0Ry200
          area paddock -> /simulations/Mixtures/SoilWat/2004/84W100R0Ry200/paddock
            outputfile: filename=84W100R30Ry200SWIM.out; title=84W100R30Ry200SWIM
              variables: same as Mixtures.SWIM.2004.84W100R15Ry200SWIM.paddock.outputfile.Variables
              events Reporting Frequency -> /simulations/Mixtures/SoilWat/2004/84W100R0Ry200/paddock/outputfile/Reporting Frequency
            folder Manager folder -> /simulations/Mixtures/SoilWat/2004/84W100R0Ry200/paddock/Manager folder
              operations Operations Schedule
                17/06/2004  wheat sow population =100, sowing_depth = 10, cultivar = hartog, row_spacing = 250, crop_class = plant
                17/06/2004  fertiliser apply amount = 57 (kg/ha), depth = 50 (mm), type = NO3_N
                17/06/2004  fertiliser apply amount = 12 (kg/ha), depth = 50 (mm), type = NO3_N
                17/06/2004  lolium_rigidum sow population =200, sowing_depth = 10, cultivar = guard, row_spacing = 250, crop_class = plant
                17/06/2004  raphanus_raphanistrum sow population = 30, sowing_depth = 10, cultivar =  radish_SA, row_spacing = 170, crop_class = plant
              manager Harvest radish
                # Harvesting criteria
                crop = raphanus_raphanistrum  # Enter name of crop to harvest when ripe
                on end_of_day:
                script: same as in Mixtures.SWIM.2003.W100R15SWIM.paddock.Manager folder.Harvesting radish
            outputfile stress: filename=84W100R30Ry200SWIM stress.out; title=84W100R30Ry200SWIM stress
              variables -> /simulations/Mixtures/SoilWat/2004/84W100R0Ry200/paddock/stress/Variables
              events Reporting Frequency -> /simulations/Mixtures/SoilWat/2004/84W100R0Ry200/paddock/stress/Reporting Frequency
            Soil Buckby (Roseworthy)1 -> /simulations/Mixtures/SoilWat/2004/84W100R0Ry200/paddock/Buckby (Roseworthy)1
              Water: same as Mixtures.SWIM.2004.84W100R15Ry200SWIM.paddock.Buckby (Roseworthy)1.Water
              Swim: same as Mixtures.SWIM.2003.W100R15SWIM.paddock.Buckby (Roseworthy).Swim
            canopy Canopy (plays with Micromet)
              intercrop = wheat lolium_rigidum raphanus_raphanistrum  # Enter crop names to intercrop
              dolight = yes  # Do the light competition? - set to 'No' if only for swapping
            Raphanus_raphanistrum
        simulation 84W100R60Ry200SWIM -> /simulations/Mixtures/SoilWat/2004/84W100R0Ry200
          area paddock -> /simulations/Mixtures/SoilWat/2004/84W100R0Ry200/paddock
            outputfile: filename=84W100R60Ry200SWIM.out; title=84W100R60Ry200SWIM
              variables: same as Mixtures.SWIM.2004.84W100R15Ry200SWIM.paddock.outputfile.Variables
              events Reporting Frequency -> /simulations/Mixtures/SoilWat/2004/84W100R0Ry200/paddock/outputfile/Reporting Frequency
            folder Manager folder -> /simulations/Mixtures/SoilWat/2004/84W100R0Ry200/paddock/Manager folder
              operations Operations Schedule
                17/06/2004  wheat sow population =100, sowing_depth = 10, cultivar = hartog, row_spacing = 250, crop_class = plant
                17/06/2004  fertiliser apply amount = 57 (kg/ha), depth = 50 (mm), type = NO3_N
                17/06/2004  fertiliser apply amount = 12 (kg/ha), depth = 50 (mm), type = NO3_N
                17/06/2004  lolium_rigidum sow population =200, sowing_depth = 10, cultivar = guard, row_spacing = 250, crop_class = plant
                17/06/2004  raphanus_raphanistrum sow population = 60, sowing_depth = 10, cultivar =  radish_SA, row_spacing = 120, crop_class = plant
              manager Harvest radish
                # Harvesting criteria
                crop = raphanus_raphanistrum  # Enter name of crop to harvest when ripe
                on end_of_day:
                script: same as in Mixtures.SWIM.2003.W100R15SWIM.paddock.Manager folder.Harvesting radish
            outputfile stress: filename=84W100R60Ry200SWIM stress.out; title=84W100R60Ry200SWIM stress
              variables -> /simulations/Mixtures/SoilWat/2004/84W100R0Ry200/paddock/stress/Variables
              events Reporting Frequency -> /simulations/Mixtures/SoilWat/2004/84W100R0Ry200/paddock/stress/Reporting Frequency
            Soil Buckby (Roseworthy)1 -> /simulations/Mixtures/SoilWat/2004/84W100R0Ry200/paddock/Buckby (Roseworthy)1
              Water: same as Mixtures.SWIM.2004.84W100R15Ry200SWIM.paddock.Buckby (Roseworthy)1.Water
              Swim: same as Mixtures.SWIM.2003.W100R15SWIM.paddock.Buckby (Roseworthy).Swim
            canopy Canopy (plays with Micromet)
              intercrop = wheat lolium_rigidum raphanus_raphanistrum  # Enter crop names to intercrop
              dolight = yes  # Do the light competition? - set to 'No' if only for swapping
            Raphanus_raphanistrum
        simulation 84W200R15Ry200SWIM -> /simulations/Mixtures/SoilWat/2004/84W100R0Ry200
          area paddock -> /simulations/Mixtures/SoilWat/2004/84W100R0Ry200/paddock
            outputfile: filename=84W200R15Ry200SWIM.out; title=84W200R15Ry200SWIM
              variables: same as Mixtures.SWIM.2004.84W100R15Ry200SWIM.paddock.outputfile.Variables
              events Reporting Frequency -> /simulations/Mixtures/SoilWat/2004/84W100R0Ry200/paddock/outputfile/Reporting Frequency
            folder Manager folder -> /simulations/Mixtures/SoilWat/2004/84W100R0Ry200/paddock/Manager folder
              operations Operations Schedule
                17/06/2004  wheat sow population =200, sowing_depth = 10, cultivar = hartog, row_spacing = 250, crop_class = plant
                17/06/2004  fertiliser apply amount = 57 (kg/ha), depth = 50 (mm), type = NO3_N
                17/06/2004  fertiliser apply amount = 12 (kg/ha), depth = 50 (mm), type = NO3_N
                17/06/2004  lolium_rigidum sow population =200, sowing_depth = 10, cultivar = guard, row_spacing = 250, crop_class = plant
                17/06/2004  raphanus_raphanistrum sow population = 15, sowing_depth = 10, cultivar =  radish_SA, row_spacing = 400, crop_class = plant
              manager Harvest radish
                # Harvesting criteria
                crop = raphanus_raphanistrum  # Enter name of crop to harvest when ripe
                on end_of_day:
                script: same as in Mixtures.SWIM.2003.W100R15SWIM.paddock.Manager folder.Harvesting radish
            outputfile stress: filename=84W200R15Ry200SWIM stress.out; title=84W200R15Ry200SWIM stress
              variables -> /simulations/Mixtures/SoilWat/2004/84W100R0Ry200/paddock/stress/Variables
              events Reporting Frequency -> /simulations/Mixtures/SoilWat/2004/84W100R0Ry200/paddock/stress/Reporting Frequency
            Soil Buckby (Roseworthy)1 -> /simulations/Mixtures/SoilWat/2004/84W100R0Ry200/paddock/Buckby (Roseworthy)1
              Water: same as Mixtures.SWIM.2004.84W100R15Ry200SWIM.paddock.Buckby (Roseworthy)1.Water
              Swim: same as Mixtures.SWIM.2003.W100R15SWIM.paddock.Buckby (Roseworthy).Swim
            canopy Canopy (plays with Micromet)
              intercrop = wheat lolium_rigidum raphanus_raphanistrum  # Enter crop names to intercrop
              dolight = yes  # Do the light competition? - set to 'No' if only for swapping
            Raphanus_raphanistrum
        simulation 84W200R30Ry200SWIM -> /simulations/Mixtures/SoilWat/2004/84W100R0Ry200
          area paddock -> /simulations/Mixtures/SoilWat/2004/84W100R0Ry200/paddock
            outputfile: filename=84W200R30Ry200SWIM.out; title=84W200R30Ry200SWIM
              variables: same as Mixtures.SWIM.2004.84W100R15Ry200SWIM.paddock.outputfile.Variables
              events Reporting Frequency -> /simulations/Mixtures/SoilWat/2004/84W100R0Ry200/paddock/outputfile/Reporting Frequency
            folder Manager folder -> /simulations/Mixtures/SoilWat/2004/84W100R0Ry200/paddock/Manager folder
              operations Operations Schedule
                17/06/2004  wheat sow population=200, sowing_depth = 10, cultivar = hartog, row_spacing = 250, crop_class = plant
                17/06/2004  fertiliser apply amount = 57 (kg/ha), depth = 50 (mm), type = NO3_N
                17/06/2004  fertiliser apply amount = 12 (kg/ha), depth = 50 (mm), type = NO3_N
                17/06/2004  lolium_rigidum sow population =200, sowing_depth = 10, cultivar = guard, row_spacing = 250, crop_class = plant
                17/06/2004  raphanus_raphanistrum sow population = 30, sowing_depth = 10, cultivar =  radish_SA, row_spacing = 170, crop_class = plant
              manager Harvest radish
                # Harvesting criteria
                crop = raphanus_raphanistrum  # Enter name of crop to harvest when ripe
                on end_of_day:
                script: same as in Mixtures.SWIM.2003.W100R15SWIM.paddock.Manager folder.Harvesting radish
            outputfile stress: filename=84W200R30Ry200SWIM stress.out; title=84W200R30Ry200SWIM stress
              variables -> /simulations/Mixtures/SoilWat/2004/84W100R0Ry200/paddock/stress/Variables
              events Reporting Frequency -> /simulations/Mixtures/SoilWat/2004/84W100R0Ry200/paddock/stress/Reporting Frequency
            Soil Buckby (Roseworthy)1 -> /simulations/Mixtures/SoilWat/2004/84W100R0Ry200/paddock/Buckby (Roseworthy)1
              Water: same as Mixtures.SWIM.2004.84W100R15Ry200SWIM.paddock.Buckby (Roseworthy)1.Water
              Swim: same as Mixtures.SWIM.2003.W100R15SWIM.paddock.Buckby (Roseworthy).Swim
            canopy Canopy (plays with Micromet)
              intercrop = wheat lolium_rigidum raphanus_raphanistrum  # Enter crop names to intercrop
              dolight = yes  # Do the light competition? - set to 'No' if only for swapping
            Raphanus_raphanistrum
        simulation 84W200R60Ry200SWIM -> /simulations/Mixtures/SoilWat/2004/84W100R0Ry200
          area paddock -> /simulations/Mixtures/SoilWat/2004/84W100R0Ry200/paddock
            outputfile: filename=84W200R60Ry200SWIM.out; title=84W200R60Ry200SWIM
              variables: same as Mixtures.SWIM.2004.84W100R15Ry200SWIM.paddock.outputfile.Variables
              events Reporting Frequency -> /simulations/Mixtures/SoilWat/2004/84W100R0Ry200/paddock/outputfile/Reporting Frequency
            folder Manager folder -> /simulations/Mixtures/SoilWat/2004/84W100R0Ry200/paddock/Manager folder
              operations Operations Schedule
                17/06/2004  wheat sow population=200, sowing_depth = 10, cultivar = hartog, row_spacing = 250, crop_class = plant
                17/06/2004  fertiliser apply amount = 57 (kg/ha), depth = 50 (mm), type = NO3_N
                17/06/2004  fertiliser apply amount = 12 (kg/ha), depth = 50 (mm), type = NO3_N
                17/06/2004  lolium_rigidum sow population =200, sowing_depth = 10, cultivar = guard, row_spacing = 250, crop_class = plant
                17/06/2004  raphanus_raphanistrum sow population = 60, sowing_depth = 10, cultivar =  radish_SA, row_spacing = 120, crop_class = plant
              manager Harvest radish
                # Harvesting criteria
                crop = raphanus_raphanistrum  # Enter name of crop to harvest when ripe
                on end_of_day:
                script: same as in Mixtures.SWIM.2003.W100R15SWIM.paddock.Manager folder.Harvesting radish
            outputfile stress: filename=84W200R60Ry200SWIM stress.out; title=84W200R60Ry200SWIM stress
              variables -> /simulations/Mixtures/SoilWat/2004/84W100R0Ry200/paddock/stress/Variables
              events Reporting Frequency -> /simulations/Mixtures/SoilWat/2004/84W100R0Ry200/paddock/stress/Reporting Frequency
            Soil Buckby (Roseworthy)1 -> /simulations/Mixtures/SoilWat/2004/84W100R0Ry200/paddock/Buckby (Roseworthy)1
              Water: same as Mixtures.SWIM.2004.84W100R15Ry200SWIM.paddock.Buckby (Roseworthy)1.Water
              Swim: same as Mixtures.SWIM.2003.W100R15SWIM.paddock.Buckby (Roseworthy).Swim
            canopy Canopy (plays with Micromet)
              intercrop = wheat lolium_rigidum raphanus_raphanistrum  # Enter crop names to intercrop
              dolight = yes  # Do the light competition? - set to 'No' if only for swapping
            Raphanus_raphanistrum
        simulation 84W400R15Ry200SWIM -> /simulations/Mixtures/SoilWat/2004/84W100R0Ry200
          area paddock -> /simulations/Mixtures/SoilWat/2004/84W100R0Ry200/paddock
            outputfile: filename=84W400R15Ry200SWIM.out; title=84W400R15Ry200SWIM
              variables: same as Mixtures.SWIM.2004.84W100R15Ry200SWIM.paddock.outputfile.Variables
              events Reporting Frequency -> /simulations/Mixtures/SoilWat/2004/84W100R0Ry200/paddock/outputfile/Reporting Frequency
            folder Manager folder -> /simulations/Mixtures/SoilWat/2004/84W100R0Ry200/paddock/Manager folder
              operations Operations Schedule
                17/06/2004  wheat sow population=400, sowing_depth = 10, cultivar = hartog, row_spacing = 250, crop_class = plant
                17/06/2004  fertiliser apply amount = 57 (kg/ha), depth = 50 (mm), type = NO3_N
                17/06/2004  fertiliser apply amount = 12 (kg/ha), depth = 50 (mm), type = NO3_N
                17/06/2004  lolium_rigidum sow population =200, sowing_depth = 10, cultivar = guard, row_spacing = 250, crop_class = plant
                17/06/2004  raphanus_raphanistrum sow population = 15, sowing_depth = 10, cultivar =  radish_SA, row_spacing = 400, crop_class = plant
              manager Harvest radish
                # Harvesting criteria
                crop = raphanus_raphanistrum  # Enter name of crop to harvest when ripe
                on end_of_day:
                script: same as in Mixtures.SWIM.2003.W100R15SWIM.paddock.Manager folder.Harvesting radish
            outputfile stress: filename=84W400R15Ry200SWIM stress.out; title=84W400R15Ry200SWIM stress
              variables -> /simulations/Mixtures/SoilWat/2004/84W100R0Ry200/paddock/stress/Variables
              events Reporting Frequency -> /simulations/Mixtures/SoilWat/2004/84W100R0Ry200/paddock/stress/Reporting Frequency
            Soil Buckby (Roseworthy)1 -> /simulations/Mixtures/SoilWat/2004/84W100R0Ry200/paddock/Buckby (Roseworthy)1
              Water: same as Mixtures.SWIM.2004.84W100R15Ry200SWIM.paddock.Buckby (Roseworthy)1.Water
              Swim: same as Mixtures.SWIM.2003.W100R15SWIM.paddock.Buckby (Roseworthy).Swim
            canopy Canopy (plays with Micromet)
              intercrop = wheat lolium_rigidum raphanus_raphanistrum  # Enter crop names to intercrop
              dolight = yes  # Do the light competition? - set to 'No' if only for swapping
            Raphanus_raphanistrum
        simulation 84W400R30Ry200SWIM -> /simulations/Mixtures/SoilWat/2004/84W100R0Ry200
          area paddock -> /simulations/Mixtures/SoilWat/2004/84W100R0Ry200/paddock
            outputfile: filename=84W400R30Ry200SWIM.out; title=84W400R30Ry200SWIM
              variables: same as Mixtures.SWIM.2004.84W100R15Ry200SWIM.paddock.outputfile.Variables
              events Reporting Frequency -> /simulations/Mixtures/SoilWat/2004/84W100R0Ry200/paddock/outputfile/Reporting Frequency
            folder Manager folder -> /simulations/Mixtures/SoilWat/2004/84W100R0Ry200/paddock/Manager folder
              operations Operations Schedule
                17/06/2004  wheat sow population=400, sowing_depth = 10, cultivar = hartog, row_spacing = 250, crop_class = plant
                17/06/2004  fertiliser apply amount = 57 (kg/ha), depth = 50 (mm), type = NO3_N
                17/06/2004  fertiliser apply amount = 12 (kg/ha), depth = 50 (mm), type = NO3_N
                17/06/2004  lolium_rigidum sow population =200, sowing_depth = 10, cultivar = guard, row_spacing = 250, crop_class = plant
                17/06/2004  raphanus_raphanistrum sow population = 30, sowing_depth = 10, cultivar =  radish_SA, row_spacing = 170, crop_class = plant
              manager Harvest radish
                # Harvesting criteria
                crop = raphanus_raphanistrum  # Enter name of crop to harvest when ripe
                on end_of_day:
                script: same as in Mixtures.SWIM.2003.W100R15SWIM.paddock.Manager folder.Harvesting radish
            outputfile stress: filename=84W400R30Ry200SWIM stress.out; title=84W400R30Ry200SWIM stress
              variables -> /simulations/Mixtures/SoilWat/2004/84W100R0Ry200/paddock/stress/Variables
              events Reporting Frequency -> /simulations/Mixtures/SoilWat/2004/84W100R0Ry200/paddock/stress/Reporting Frequency
            Soil Buckby (Roseworthy)1 -> /simulations/Mixtures/SoilWat/2004/84W100R0Ry200/paddock/Buckby (Roseworthy)1
              Water: same as Mixtures.SWIM.2004.84W100R15Ry200SWIM.paddock.Buckby (Roseworthy)1.Water
              Swim: same as Mixtures.SWIM.2003.W100R15SWIM.paddock.Buckby (Roseworthy).Swim
            canopy Canopy (plays with Micromet)
              intercrop = wheat lolium_rigidum raphanus_raphanistrum  # Enter crop names to intercrop
              dolight = yes  # Do the light competition? - set to 'No' if only for swapping
            Raphanus_raphanistrum
        simulation 84W400R60Ry200SWIM -> /simulations/Mixtures/SoilWat/2004/84W100R0Ry200
          area paddock -> /simulations/Mixtures/SoilWat/2004/84W100R0Ry200/paddock
            outputfile: filename=84W400R60Ry200SWIM.out; title=84W400R60Ry200SWIM
              variables: same as Mixtures.SWIM.2004.84W100R15Ry200SWIM.paddock.outputfile.Variables
              events Reporting Frequency -> /simulations/Mixtures/SoilWat/2004/84W100R0Ry200/paddock/outputfile/Reporting Frequency
            folder Manager folder -> /simulations/Mixtures/SoilWat/2004/84W100R0Ry200/paddock/Manager folder
              operations Operations Schedule
                17/06/2004  wheat sow population=400, sowing_depth = 10, cultivar = hartog, row_spacing = 250, crop_class = plant
                17/06/2004  fertiliser apply amount = 57 (kg/ha), depth = 50 (mm), type = NO3_N
                17/06/2004  fertiliser apply amount = 12 (kg/ha), depth = 50 (mm), type = NO3_N
                17/06/2004  lolium_rigidum sow population =200, sowing_depth = 10, cultivar = guard, row_spacing = 250, crop_class = plant
                17/06/2004  raphanus_raphanistrum sow population = 60, sowing_depth = 10, cultivar =  radish_SA, row_spacing = 120, crop_class = plant
              manager Harvest radish
                # Harvesting criteria
                crop = raphanus_raphanistrum  # Enter name of crop to harvest when ripe
                on end_of_day:
                script: same as in Mixtures.SWIM.2003.W100R15SWIM.paddock.Manager folder.Harvesting radish
            outputfile stress: filename=84W400R60Ry200SWIM stress.out; title=84W400R60Ry200SWIM stress
              variables -> /simulations/Mixtures/SoilWat/2004/84W100R0Ry200/paddock/stress/Variables
              events Reporting Frequency -> /simulations/Mixtures/SoilWat/2004/84W100R0Ry200/paddock/stress/Reporting Frequency
            Soil Buckby (Roseworthy)1 -> /simulations/Mixtures/SoilWat/2004/84W100R0Ry200/paddock/Buckby (Roseworthy)1
              Water: same as Mixtures.SWIM.2004.84W100R15Ry200SWIM.paddock.Buckby (Roseworthy)1.Water
              Swim: same as Mixtures.SWIM.2003.W100R15SWIM.paddock.Buckby (Roseworthy).Swim
            canopy Canopy (plays with Micromet)
              intercrop = wheat lolium_rigidum raphanus_raphanistrum  # Enter crop names to intercrop
              dolight = yes  # Do the light competition? - set to 'No' if only for swapping
            Raphanus_raphanistrum
        simulation 84W0R15Ry200SWIM -> /simulations/Mixtures/SoilWat/2004/84W100R0Ry200
          area paddock -> /simulations/Mixtures/SoilWat/2004/84W100R0Ry200/paddock
            outputfile: filename=84W0R15Ry200SWIM.out; title=84W0R15Ry200SWIM
              variables
                variable:
                  day
                  year
                  dd/mm/yyyy as date
                  lolium_rigidum.Height as Ry_height
                  lolium_rigidum.LAI as Ry_lai
                  lolium_rigidum.LeafNumber as Ry_LeafNumber
                  lolium_rigidum.LeafNumberDead as Ry_LeafNumberDead
                  lolium_rigidum.Biomass as Ry_biomass
                  lolium_rigidum.LeafLiveWt as Ry_LeafLiveWt
                  lolium_rigidum.StemLiveWt as Ry_StemLiveWt
                  lolium_rigidum.GrainWt as Ry_GrainWt
                  lolium_rigidum.Yield as Ry_yield
                  lolium_rigidum.green_biomass as Ry_green_biomass
                  raphanus_raphanistrum.Height as R_height
                  raphanus_raphanistrum.LAI as R_lai
                  raphanus_raphanistrum.LeafNumber as R_LeafNumber
                  raphanus_raphanistrum.LeafNumberDead as R_LeafNumberDead
                  raphanus_raphanistrum.Biomass as R_biomass
                  raphanus_raphanistrum.LeafLiveWt as R_LeafLiveWt
                  raphanus_raphanistrum.StemLiveWt as R_StemLiveWt
                  raphanus_raphanistrum.GrainWt as R_GrainWt
                  raphanus_raphanistrum.Yield as R_yield
                  raphanus_raphanistrum.green_biomass as R_green_biomass
              events Reporting Frequency -> /simulations/Mixtures/SoilWat/2004/84W100R0Ry200/paddock/outputfile/Reporting Frequency
            folder Manager folder -> /simulations/Mixtures/SoilWat/2004/84W100R0Ry200/paddock/Manager folder
              operations Operations Schedule
                17/06/2004  fertiliser apply amount = 57 (kg/ha), depth = 50 (mm), type = NO3_N
                17/06/2004  fertiliser apply amount = 12 (kg/ha), depth = 50 (mm), type = NO3_N
                17/06/2004  lolium_rigidum sow population =200, sowing_depth = 10, cultivar = guard, row_spacing = 250, crop_class = plant
                17/06/2004  raphanus_raphanistrum sow population = 15, sowing_depth = 10, cultivar =  radish_SA, row_spacing = 400, crop_class = plant
              manager Harvest radish
                # Harvesting criteria
                crop = raphanus_raphanistrum  # Enter name of crop to harvest when ripe
                on end_of_day:
                script: same as in Mixtures.SWIM.2003.W100R15SWIM.paddock.Manager folder.Harvesting radish
            outputfile stress: filename=84W0R15Ry200SWIM stress.out; title=84W0R15Ry200SWIM stress
              variables -> /simulations/Mixtures/SoilWat/2004/84W100R0Ry200/paddock/stress/Variables
              events Reporting Frequency -> /simulations/Mixtures/SoilWat/2004/84W100R0Ry200/paddock/stress/Reporting Frequency
            Soil Buckby (Roseworthy)1 -> /simulations/Mixtures/SoilWat/2004/84W100R0Ry200/paddock/Buckby (Roseworthy)1
              Water: same as Mixtures.SWIM.2004.84W100R15Ry200SWIM.paddock.Buckby (Roseworthy)1.Water
              Swim: same as Mixtures.SWIM.2003.W100R15SWIM.paddock.Buckby (Roseworthy).Swim
            canopy Canopy (plays with Micromet)
              intercrop = lolium_rigidum raphanus_raphanistrum  # Enter crop names to intercrop
              dolight = yes  # Do the light competition? - set to 'No' if only for swapping
            Raphanus_raphanistrum
        simulation 84W0R30Ry200SWIM -> /simulations/Mixtures/SoilWat/2004/84W100R0Ry200
          area paddock -> /simulations/Mixtures/SoilWat/2004/84W100R0Ry200/paddock
            outputfile: filename=84W0R30Ry200SWIM.out; title=84W0R30Ry200SWIM
              variables: same as Mixtures.SWIM.2004.84W0R15Ry200SWIM.paddock.outputfile.Variables
              events Reporting Frequency -> /simulations/Mixtures/SoilWat/2004/84W100R0Ry200/paddock/outputfile/Reporting Frequency
            folder Manager folder -> /simulations/Mixtures/SoilWat/2004/84W100R0Ry200/paddock/Manager folder
              operations Operations Schedule
                17/06/2004  fertiliser apply amount = 57 (kg/ha), depth = 50 (mm), type = NO3_N
                17/06/2004  fertiliser apply amount = 12 (kg/ha), depth = 50 (mm), type = NO3_N
                17/06/2004  lolium_rigidum sow population =200, sowing_depth = 10, cultivar = guard, row_spacing = 250, crop_class = plant
                17/06/2004  raphanus_raphanistrum sow population = 15, sowing_depth = 10, cultivar =  radish_SA, row_spacing = 170, crop_class = plant
              manager Harvest radish
                # Harvesting criteria
                crop = raphanus_raphanistrum  # Enter name of crop to harvest when ripe
                on end_of_day:
                script: same as in Mixtures.SWIM.2003.W100R15SWIM.paddock.Manager folder.Harvesting radish
            outputfile stress: filename=84W0R30Ry200SWIM stress.out; title=84W0R30Ry200SWIM stress
              variables -> /simulations/Mixtures/SoilWat/2004/84W100R0Ry200/paddock/stress/Variables
              events Reporting Frequency -> /simulations/Mixtures/SoilWat/2004/84W100R0Ry200/paddock/stress/Reporting Frequency
            Soil Buckby (Roseworthy)1 -> /simulations/Mixtures/SoilWat/2004/84W100R0Ry200/paddock/Buckby (Roseworthy)1
              Water: same as Mixtures.SWIM.2004.84W100R15Ry200SWIM.paddock.Buckby (Roseworthy)1.Water
              Swim: same as Mixtures.SWIM.2003.W100R15SWIM.paddock.Buckby (Roseworthy).Swim
            canopy Canopy (plays with Micromet)
              intercrop = lolium_rigidum raphanus_raphanistrum  # Enter crop names to intercrop
              dolight = yes  # Do the light competition? - set to 'No' if only for swapping
            Raphanus_raphanistrum
        simulation 84W0R60Ry200SWIM -> /simulations/Mixtures/SoilWat/2004/84W100R0Ry200
          area paddock -> /simulations/Mixtures/SoilWat/2004/84W100R0Ry200/paddock
            outputfile: filename=84W0R60Ry200SWIM.out; title=84W0R60Ry200SWIM
              variables: same as Mixtures.SWIM.2004.84W0R15Ry200SWIM.paddock.outputfile.Variables
              events Reporting Frequency -> /simulations/Mixtures/SoilWat/2004/84W100R0Ry200/paddock/outputfile/Reporting Frequency
            folder Manager folder -> /simulations/Mixtures/SoilWat/2004/84W100R0Ry200/paddock/Manager folder
              operations Operations Schedule
                17/06/2004  fertiliser apply amount = 57 (kg/ha), depth = 50 (mm), type = NO3_N
                17/06/2004  fertiliser apply amount = 12 (kg/ha), depth = 50 (mm), type = NO3_N
                17/06/2004  lolium_rigidum sow population =200, sowing_depth = 10, cultivar = guard, row_spacing = 250, crop_class = plant
                17/06/2004  raphanus_raphanistrum sow population = 60, sowing_depth = 10, cultivar =  radish_SA, row_spacing = 120, crop_class = plant
              manager Harvest radish
                # Harvesting criteria
                crop = raphanus_raphanistrum  # Enter name of crop to harvest when ripe
                on end_of_day:
                script: same as in Mixtures.SWIM.2003.W100R15SWIM.paddock.Manager folder.Harvesting radish
            outputfile stress: filename=84W0R60Ry200SWIM stress.out; title=84W0R60Ry200SWIM stress
              variables -> /simulations/Mixtures/SoilWat/2004/84W100R0Ry200/paddock/stress/Variables
              events Reporting Frequency -> /simulations/Mixtures/SoilWat/2004/84W100R0Ry200/paddock/stress/Reporting Frequency
            Soil Buckby (Roseworthy)1 -> /simulations/Mixtures/SoilWat/2004/84W100R0Ry200/paddock/Buckby (Roseworthy)1
              Water: same as Mixtures.SWIM.2004.84W100R15Ry200SWIM.paddock.Buckby (Roseworthy)1.Water
              Swim: same as Mixtures.SWIM.2003.W100R15SWIM.paddock.Buckby (Roseworthy).Swim
            canopy Canopy (plays with Micromet)
              intercrop = lolium_rigidum raphanus_raphanistrum  # Enter crop names to intercrop
              dolight = yes  # Do the light competition? - set to 'No' if only for swapping
            Raphanus_raphanistrum
    folder SoilWat
      folder 2003
        simulation W100R15
          metfile met: filename=Roseworthy.met
          clock
            start_date = 09/06/2003  # Enter the start date of the simulation
            end_date = 31/12/2003  # Enter the end date of the simulation
          summaryfile
          area paddock
            surfaceom surface organic matter
              PoolName = wheat  # Organic Matter pool name
              type = wheat  # Organic Matter type
              mass = 1000  # Initial surface residue (kg/ha)
              cnr = 80  # C:N ratio of initial residue
              standing_fraction = 0  # Fraction of residue standing
            fertiliser
            folder Manager folder: same as Mixtures.SWIM.2003.W100R15SWIM.paddock.Manager folder
            Raphanus_raphanistrum
            wheat
            micromet: soilalbedo=0.23; a_interception=0.0; b_interception=0.0; c_interception=0.0; d_interception=0.0
            canopy Canopy (plays with Micromet)
              intercrop = raphanus_raphanistrum wheat  # Enter crop names to intercrop
              dolight = yes  # Do the light competition? - set to 'No' if only for swapping
            Soil Buckby (Roseworthy): Site=Roseworthy; Region=Mid North; State=South Australia; Country=Australia
              SoilType = Red Brown Earth  # Soil description
              NearestTown = Roseworthy
              ApsoilNumber = 300
              Latitude = -34.5  # Latitude (WGS84)
              Longitude = 138.686  # Longitude (WGS84)
              LocationAccuracy = +-20m
              DataSource = Characterisation 2005 by University of Adelaide, CSIRO Sustainable Ecosystems and DWLBC. Measurement site located adjacent to site described by Soil and Land Information Group, Department of Water, Land and Biodiversity Conservation, South Australia.
              Comments = Soil naming structure: \soils\Australia\South Australia\Region\Classification (Location APSoil No). LB code: RWN3; Low-moderate clay duplex soil with moderate CEC, moderate-high bulk density.Texture change about 10cm. Slaking or dispersion likely in the l
              Water: same as Mixtures.SWIM.2003.W100R15SWIM.paddock.Buckby (Roseworthy).Water
              SoilOrganicMatter: same as Mixtures.SWIM.2003.W100R15SWIM.paddock.Buckby (Roseworthy).SoilOrganicMatter
              Analysis: same as Mixtures.SWIM.2003.W100R15SWIM.paddock.Buckby (Roseworthy).Analysis
              Sample Soil sample
                Thickness  NO3  NH4   SW
                200        19   34    0.3
                200        12   10.5  0.3
                200        8    3     0.3
                200        2.5  2     0.3
                200        2.5  1.5   0.3
                200        5    1     0.336
                200        6    1     0.358
                200        8    1     0.387
                200        9    1     0.4
              SoilWater: Thickness=[200, 200, 200, 200, 200, 200, 200, 200, 200]; SWCON=[0.2, 0.2, 0.2, 0.2, 0.2, 0.2, 0.2, 0.2, 0.2]
                SummerCona = 3.5
                SummerU = 6
                SummerDate = 1-Nov
                WinterCona = 2
                WinterU = 2
                WinterDate = 1-Apr
                DiffusConst = 88
                DiffusSlope = 35.4
                Salb = 0.13
                CN2Bare = 80
                CNRed = 20
                CNCov = 0.8
            outputfile: filename=W100R15.out; title=W100R15
              variables: same as Mixtures.SWIM.2003.W100R15SWIM.paddock.outputfile.Variables
              events Reporting Frequency: event=daily
        simulation W100R30 -> /simulations/Mixtures/SoilWat/2003/W100R15
          area paddock -> /simulations/Mixtures/SoilWat/2003/W100R15/paddock
            folder Manager folder -> /simulations/Mixtures/SoilWat/2003/W100R15/paddock/Manager folder
              operations Operations Schedule: same as Mixtures.SWIM.2003.W100R30SWIM.paddock.Manager folder.Operations Schedule
            outputfile: filename=W100R30.out; title=W100R30
              variables -> /simulations/Mixtures/SoilWat/2003/W100R15/paddock/outputfile/Variables
              events Reporting Frequency -> /simulations/Mixtures/SoilWat/2003/W100R15/paddock/outputfile/Reporting Frequency
        simulation W100R60 -> /simulations/Mixtures/SoilWat/2003/W100R15
          area paddock -> /simulations/Mixtures/SoilWat/2003/W100R15/paddock
            folder Manager folder -> /simulations/Mixtures/SoilWat/2003/W100R15/paddock/Manager folder
              operations Operations Schedule: same as Mixtures.SWIM.2003.W100R60SWIM.paddock.Manager folder.Operations Schedule
            outputfile: filename=W100R60.out; title=W100R60
              variables -> /simulations/Mixtures/SoilWat/2003/W100R15/paddock/outputfile/Variables
              events Reporting Frequency -> /simulations/Mixtures/SoilWat/2003/W100R15/paddock/outputfile/Reporting Frequency
        simulation W200R15 -> /simulations/Mixtures/SoilWat/2003/W100R15
          area paddock -> /simulations/Mixtures/SoilWat/2003/W100R15/paddock
            folder Manager folder -> /simulations/Mixtures/SoilWat/2003/W100R15/paddock/Manager folder
              operations Operations Schedule: same as Mixtures.SWIM.2003.W200R15SWIM.paddock.Manager folder.Operations Schedule
            outputfile: filename=W200R15.out; title=W200R15
              variables -> /simulations/Mixtures/SoilWat/2003/W100R15/paddock/outputfile/Variables
              events Reporting Frequency -> /simulations/Mixtures/SoilWat/2003/W100R15/paddock/outputfile/Reporting Frequency
        simulation W200R30 -> /simulations/Mixtures/SoilWat/2003/W100R15
          area paddock -> /simulations/Mixtures/SoilWat/2003/W100R15/paddock
            folder Manager folder -> /simulations/Mixtures/SoilWat/2003/W100R15/paddock/Manager folder
              operations Operations Schedule: same as Mixtures.SWIM.2003.W200R30SWIM.paddock.Manager folder.Operations Schedule
            outputfile: filename=W200R30.out; title=W200R30
              variables -> /simulations/Mixtures/SoilWat/2003/W100R15/paddock/outputfile/Variables
              events Reporting Frequency -> /simulations/Mixtures/SoilWat/2003/W100R15/paddock/outputfile/Reporting Frequency
        simulation W200R60 -> /simulations/Mixtures/SoilWat/2003/W100R15
          area paddock -> /simulations/Mixtures/SoilWat/2003/W100R15/paddock
            folder Manager folder -> /simulations/Mixtures/SoilWat/2003/W100R15/paddock/Manager folder
              operations Operations Schedule: same as Mixtures.SWIM.2003.W200R60SWIM.paddock.Manager folder.Operations Schedule
            outputfile: filename=W200R60.out; title=W200R60
              variables -> /simulations/Mixtures/SoilWat/2003/W100R15/paddock/outputfile/Variables
              events Reporting Frequency -> /simulations/Mixtures/SoilWat/2003/W100R15/paddock/outputfile/Reporting Frequency
        simulation W400R15 -> /simulations/Mixtures/SoilWat/2003/W100R15
          area paddock -> /simulations/Mixtures/SoilWat/2003/W100R15/paddock
            folder Manager folder -> /simulations/Mixtures/SoilWat/2003/W100R15/paddock/Manager folder
              operations Operations Schedule: same as Mixtures.SWIM.2003.W400R15SWIM.paddock.Manager folder.Operations Schedule
            outputfile: filename=W400R15.out; title=W400R15
              variables -> /simulations/Mixtures/SoilWat/2003/W100R15/paddock/outputfile/Variables
              events Reporting Frequency -> /simulations/Mixtures/SoilWat/2003/W100R15/paddock/outputfile/Reporting Frequency
        simulation W400R30 -> /simulations/Mixtures/SoilWat/2003/W100R15
          area paddock -> /simulations/Mixtures/SoilWat/2003/W100R15/paddock
            folder Manager folder -> /simulations/Mixtures/SoilWat/2003/W100R15/paddock/Manager folder
              operations Operations Schedule: same as Mixtures.SWIM.2003.W400R30SWIM.paddock.Manager folder.Operations Schedule
            outputfile: filename=W400R30.out; title=W400R30
              variables -> /simulations/Mixtures/SoilWat/2003/W100R15/paddock/outputfile/Variables
              events Reporting Frequency -> /simulations/Mixtures/SoilWat/2003/W100R15/paddock/outputfile/Reporting Frequency
        simulation W400R60 -> /simulations/Mixtures/SoilWat/2003/W100R15
          area paddock -> /simulations/Mixtures/SoilWat/2003/W100R15/paddock
            folder Manager folder -> /simulations/Mixtures/SoilWat/2003/W100R15/paddock/Manager folder
              operations Operations Schedule: same as Mixtures.SWIM.2003.W400R60SWIM.paddock.Manager folder.Operations Schedule
            outputfile: filename=W400R60.out; title=W400R60
              variables -> /simulations/Mixtures/SoilWat/2003/W100R15/paddock/outputfile/Variables
              events Reporting Frequency -> /simulations/Mixtures/SoilWat/2003/W100R15/paddock/outputfile/Reporting Frequency
      folder 2004
        simulation 84W100R0Ry200
          metfile met: filename=Roseworthy.met
          clock
            start_date = 16/06/2004  # Enter the start date of the simulation
            end_date = 31/12/2004  # Enter the end date of the simulation
          summaryfile
          area paddock
            surfaceom surface organic matter
              PoolName = wheat  # Organic Matter pool name
              type = wheat  # Organic Matter type
              mass = 1000  # Initial surface residue (kg/ha)
              cnr = 80  # C:N ratio of initial residue
              standing_fraction = 0  # Fraction of residue standing
            fertiliser
            outputfile: filename=84W100R0Ry200.out; title=84W100R0Ry200
              variables: same as Mixtures.SWIM.2004.84W100R0Ry200SWIM.paddock.outputfile.Variables
              events Reporting Frequency: event=daily
            folder Manager folder: same as Mixtures.SWIM.2004.84W100R0Ry200SWIM.paddock.Manager folder
            outputfile stress: filename=84W100R0Ry200 stress.out; title=84W100R0Ry200 stress
              variables
                variables: day, year, dd/mm/yyyy as date, NStressExpansion, NStressGrain, NStressPheno, NStressPhoto, WaterStressExpansion, WaterStressFixation, WaterStressPheno, WaterStressPhoto, sw, esw
              events Reporting Frequency: event=daily
            Soil Buckby (Roseworthy)1: Site=Roseworthy; Region=Mid North; State=South Australia; Country=Australia
              SoilType = Red Brown Earth  # Soil description
              NearestTown = Roseworthy
              ApsoilNumber = 300
              Latitude = -34.5  # Latitude (WGS84)
              Longitude = 138.686  # Longitude (WGS84)
              LocationAccuracy = +-20m
              DataSource = Characterisation 2005 by University of Adelaide, CSIRO Sustainable Ecosystems and DWLBC. Measurement site located adjacent to site described by Soil and Land Information Group, Department of Water, Land and Biodiversity Conservation, South Australia.
              Comments = Soil naming structure: \soils\Australia\South Australia\Region\Classification (Location APSoil No). LB code: RWN3; Low-moderate clay duplex soil with moderate CEC, moderate-high bulk density.Texture change about 10cm. Slaking or dispersion likely in the l
              Water: same as Mixtures.SWIM.2004.84W100R0Ry200SWIM.paddock.Buckby (Roseworthy)1.Water
              SoilWater: same as Mixtures.SoilWat.2003.W100R15.paddock.Buckby (Roseworthy).SoilWater
              SoilOrganicMatter: same as Mixtures.SWIM.2003.W100R15SWIM.paddock.Buckby (Roseworthy).SoilOrganicMatter
              Analysis: same as Mixtures.SWIM.2003.W100R15SWIM.paddock.Buckby (Roseworthy).Analysis
              Sample Soil sample
                Thickness  NO3  NH4   SW
                200        19   34    0.3
                200        12   10.5  0.3
                200        8    3     0.3
                200        2.5  2     0.3
                200        2.5  1.5   0.3
                200        5    1     0.336
                200        6    1     0.358
                200        8    1     0.387
                200        9    1     0.4
            wheat
              ModifyKL = yes  # Modify KL using CL, EC or ESP if found?
            canopy Canopy (plays with Micromet)
              intercrop = wheat lolium_rigidum  # Enter crop names to intercrop
              dolight = yes  # Do the light competition? - set to 'No' if only for swapping
            micromet: soilalbedo=0.23; a_interception=0.0; b_interception=0.0; c_interception=0.0; d_interception=0.0
            Lolium_rigidum
        simulation 84W200R0Ry200 -> /simulations/Mixtures/SoilWat/2004/84W100R0Ry200
          area paddock -> /simulations/Mixtures/SoilWat/2004/84W100R0Ry200/paddock
            outputfile: filename=84W200R0Ry200.out; title=84W200R0Ry200
              variables -> /simulations/Mixtures/SoilWat/2004/84W100R0Ry200/paddock/outputfile/Variables
              events Reporting Frequency -> /simulations/Mixtures/SoilWat/2004/84W100R0Ry200/paddock/outputfile/Reporting Frequency
            folder Manager folder -> /simulations/Mixtures/SoilWat/2004/84W100R0Ry200/paddock/Manager folder
              operations Operations Schedule: same as Mixtures.SWIM.2004.84W200R0Ry200SWIM.paddock.Manager folder.Operations Schedule
            outputfile stress: filename=84W200R0Ry200 stress.out; title=84W200R0Ry200 stress
              variables -> /simulations/Mixtures/SoilWat/2004/84W100R0Ry200/paddock/stress/Variables
              events Reporting Frequency -> /simulations/Mixtures/SoilWat/2004/84W100R0Ry200/paddock/stress/Reporting Frequency
        simulation 84W400R0Ry200 -> /simulations/Mixtures/SoilWat/2004/84W100R0Ry200
          area paddock -> /simulations/Mixtures/SoilWat/2004/84W100R0Ry200/paddock
            outputfile: filename=84W400R0Ry200.out; title=84W400R0Ry200
              variables -> /simulations/Mixtures/SoilWat/2004/84W100R0Ry200/paddock/outputfile/Variables
              events Reporting Frequency -> /simulations/Mixtures/SoilWat/2004/84W100R0Ry200/paddock/outputfile/Reporting Frequency
            folder Manager folder -> /simulations/Mixtures/SoilWat/2004/84W100R0Ry200/paddock/Manager folder
              operations Operations Schedule: same as Mixtures.SWIM.2004.84W400R0Ry200SWIM.paddock.Manager folder.Operations Schedule
            outputfile stress: filename=84W400R0Ry200 stress.out; title=84W400R0Ry200 stress
              variables -> /simulations/Mixtures/SoilWat/2004/84W100R0Ry200/paddock/stress/Variables
              events Reporting Frequency -> /simulations/Mixtures/SoilWat/2004/84W100R0Ry200/paddock/stress/Reporting Frequency
        simulation 84W100R15Ry200 -> /simulations/Mixtures/SoilWat/2004/84W100R0Ry200
          area paddock -> /simulations/Mixtures/SoilWat/2004/84W100R0Ry200/paddock
            outputfile: filename=84W100R15Ry200.out; title=84W100R15Ry200
              variables: same as Mixtures.SWIM.2004.84W100R15Ry200SWIM.paddock.outputfile.Variables
              events Reporting Frequency -> /simulations/Mixtures/SoilWat/2004/84W100R0Ry200/paddock/outputfile/Reporting Frequency
            folder Manager folder -> /simulations/Mixtures/SoilWat/2004/84W100R0Ry200/paddock/Manager folder
              operations Operations Schedule: same as Mixtures.SWIM.2004.84W100R15Ry200SWIM.paddock.Manager folder.Operations Schedule
              manager Harvest radish
                # Harvesting criteria
                crop = raphanus_raphanistrum  # Enter name of crop to harvest when ripe
                on end_of_day:
                script: same as in Mixtures.SWIM.2003.W100R15SWIM.paddock.Manager folder.Harvesting radish
            outputfile stress: filename=84W100R15Ry200 stress.out; title=84W100R15Ry200 stress
              variables -> /simulations/Mixtures/SoilWat/2004/84W100R0Ry200/paddock/stress/Variables
              events Reporting Frequency -> /simulations/Mixtures/SoilWat/2004/84W100R0Ry200/paddock/stress/Reporting Frequency
            Soil Buckby (Roseworthy)1 -> /simulations/Mixtures/SoilWat/2004/84W100R0Ry200/paddock/Buckby (Roseworthy)1
              Water: same as Mixtures.SWIM.2004.84W100R15Ry200SWIM.paddock.Buckby (Roseworthy)1.Water
            canopy Canopy (plays with Micromet)
              intercrop = wheat lolium_rigidum raphanus_raphanistrum  # Enter crop names to intercrop
              dolight = yes  # Do the light competition? - set to 'No' if only for swapping
            Raphanus_raphanistrum
        simulation 84W100R30Ry200 -> /simulations/Mixtures/SoilWat/2004/84W100R0Ry200
          area paddock -> /simulations/Mixtures/SoilWat/2004/84W100R0Ry200/paddock
            outputfile: filename=84W100R30Ry200.out; title=84W100R30Ry200
              variables: same as Mixtures.SWIM.2004.84W100R15Ry200SWIM.paddock.outputfile.Variables
              events Reporting Frequency -> /simulations/Mixtures/SoilWat/2004/84W100R0Ry200/paddock/outputfile/Reporting Frequency
            folder Manager folder -> /simulations/Mixtures/SoilWat/2004/84W100R0Ry200/paddock/Manager folder
              operations Operations Schedule: same as Mixtures.SWIM.2004.84W100R30Ry200SWIM.paddock.Manager folder.Operations Schedule
              manager Harvest radish
                # Harvesting criteria
                crop = raphanus_raphanistrum  # Enter name of crop to harvest when ripe
                on end_of_day:
                script: same as in Mixtures.SWIM.2003.W100R15SWIM.paddock.Manager folder.Harvesting radish
            outputfile stress: filename=84W100R30Ry200 stress.out; title=84W100R30Ry200 stress
              variables -> /simulations/Mixtures/SoilWat/2004/84W100R0Ry200/paddock/stress/Variables
              events Reporting Frequency -> /simulations/Mixtures/SoilWat/2004/84W100R0Ry200/paddock/stress/Reporting Frequency
            Soil Buckby (Roseworthy)1 -> /simulations/Mixtures/SoilWat/2004/84W100R0Ry200/paddock/Buckby (Roseworthy)1
              Water: same as Mixtures.SWIM.2004.84W100R15Ry200SWIM.paddock.Buckby (Roseworthy)1.Water
            canopy Canopy (plays with Micromet)
              intercrop = wheat lolium_rigidum raphanus_raphanistrum  # Enter crop names to intercrop
              dolight = yes  # Do the light competition? - set to 'No' if only for swapping
            Raphanus_raphanistrum
        simulation 84W100R60Ry200 -> /simulations/Mixtures/SoilWat/2004/84W100R0Ry200
          area paddock -> /simulations/Mixtures/SoilWat/2004/84W100R0Ry200/paddock
            outputfile: filename=84W100R60Ry200.out; title=84W100R60Ry200
              variables: same as Mixtures.SWIM.2004.84W100R15Ry200SWIM.paddock.outputfile.Variables
              events Reporting Frequency -> /simulations/Mixtures/SoilWat/2004/84W100R0Ry200/paddock/outputfile/Reporting Frequency
            folder Manager folder -> /simulations/Mixtures/SoilWat/2004/84W100R0Ry200/paddock/Manager folder
              operations Operations Schedule: same as Mixtures.SWIM.2004.84W100R60Ry200SWIM.paddock.Manager folder.Operations Schedule
              manager Harvest radish
                # Harvesting criteria
                crop = raphanus_raphanistrum  # Enter name of crop to harvest when ripe
                on end_of_day:
                script: same as in Mixtures.SWIM.2003.W100R15SWIM.paddock.Manager folder.Harvesting radish
            outputfile stress: filename=84W100R60Ry200 stress.out; title=84W100R60Ry200 stress
              variables -> /simulations/Mixtures/SoilWat/2004/84W100R0Ry200/paddock/stress/Variables
              events Reporting Frequency -> /simulations/Mixtures/SoilWat/2004/84W100R0Ry200/paddock/stress/Reporting Frequency
            Soil Buckby (Roseworthy)1 -> /simulations/Mixtures/SoilWat/2004/84W100R0Ry200/paddock/Buckby (Roseworthy)1
              Water: same as Mixtures.SWIM.2004.84W100R15Ry200SWIM.paddock.Buckby (Roseworthy)1.Water
            canopy Canopy (plays with Micromet)
              intercrop = wheat lolium_rigidum raphanus_raphanistrum  # Enter crop names to intercrop
              dolight = yes  # Do the light competition? - set to 'No' if only for swapping
            Raphanus_raphanistrum
        simulation 84W200R15Ry200 -> /simulations/Mixtures/SoilWat/2004/84W100R0Ry200
          area paddock -> /simulations/Mixtures/SoilWat/2004/84W100R0Ry200/paddock
            outputfile: filename=84W200R15Ry200.out; title=84W200R15Ry200
              variables: same as Mixtures.SWIM.2004.84W100R15Ry200SWIM.paddock.outputfile.Variables
              events Reporting Frequency -> /simulations/Mixtures/SoilWat/2004/84W100R0Ry200/paddock/outputfile/Reporting Frequency
            folder Manager folder -> /simulations/Mixtures/SoilWat/2004/84W100R0Ry200/paddock/Manager folder
              operations Operations Schedule: same as Mixtures.SWIM.2004.84W200R15Ry200SWIM.paddock.Manager folder.Operations Schedule
              manager Harvest radish
                # Harvesting criteria
                crop = raphanus_raphanistrum  # Enter name of crop to harvest when ripe
                on end_of_day:
                script: same as in Mixtures.SWIM.2003.W100R15SWIM.paddock.Manager folder.Harvesting radish
            outputfile stress: filename=84W200R15Ry200 stress.out; title=84W200R15Ry200 stress
              variables -> /simulations/Mixtures/SoilWat/2004/84W100R0Ry200/paddock/stress/Variables
              events Reporting Frequency -> /simulations/Mixtures/SoilWat/2004/84W100R0Ry200/paddock/stress/Reporting Frequency
            Soil Buckby (Roseworthy)1 -> /simulations/Mixtures/SoilWat/2004/84W100R0Ry200/paddock/Buckby (Roseworthy)1
              Water: same as Mixtures.SWIM.2004.84W100R15Ry200SWIM.paddock.Buckby (Roseworthy)1.Water
            canopy Canopy (plays with Micromet)
              intercrop = wheat lolium_rigidum raphanus_raphanistrum  # Enter crop names to intercrop
              dolight = yes  # Do the light competition? - set to 'No' if only for swapping
            Raphanus_raphanistrum
        simulation 84W200R30Ry200 -> /simulations/Mixtures/SoilWat/2004/84W100R0Ry200
          area paddock -> /simulations/Mixtures/SoilWat/2004/84W100R0Ry200/paddock
            outputfile: filename=84W200R30Ry200.out; title=84W200R30Ry200
              variables: same as Mixtures.SWIM.2004.84W100R15Ry200SWIM.paddock.outputfile.Variables
              events Reporting Frequency -> /simulations/Mixtures/SoilWat/2004/84W100R0Ry200/paddock/outputfile/Reporting Frequency
            folder Manager folder -> /simulations/Mixtures/SoilWat/2004/84W100R0Ry200/paddock/Manager folder
              operations Operations Schedule: same as Mixtures.SWIM.2004.84W200R30Ry200SWIM.paddock.Manager folder.Operations Schedule
              manager Harvest radish
                # Harvesting criteria
                crop = raphanus_raphanistrum  # Enter name of crop to harvest when ripe
                on end_of_day:
                script: same as in Mixtures.SWIM.2003.W100R15SWIM.paddock.Manager folder.Harvesting radish
            outputfile stress: filename=84W200R30Ry200 stress.out; title=84W200R30Ry200 stress
              variables -> /simulations/Mixtures/SoilWat/2004/84W100R0Ry200/paddock/stress/Variables
              events Reporting Frequency -> /simulations/Mixtures/SoilWat/2004/84W100R0Ry200/paddock/stress/Reporting Frequency
            Soil Buckby (Roseworthy)1 -> /simulations/Mixtures/SoilWat/2004/84W100R0Ry200/paddock/Buckby (Roseworthy)1
              Water: same as Mixtures.SWIM.2004.84W100R15Ry200SWIM.paddock.Buckby (Roseworthy)1.Water
            canopy Canopy (plays with Micromet)
              intercrop = wheat lolium_rigidum raphanus_raphanistrum  # Enter crop names to intercrop
              dolight = yes  # Do the light competition? - set to 'No' if only for swapping
            Raphanus_raphanistrum
        simulation 84W200R60Ry200 -> /simulations/Mixtures/SoilWat/2004/84W100R0Ry200
          area paddock -> /simulations/Mixtures/SoilWat/2004/84W100R0Ry200/paddock
            outputfile: filename=84W200R60Ry200.out; title=84W200R60Ry200
              variables: same as Mixtures.SWIM.2004.84W100R15Ry200SWIM.paddock.outputfile.Variables
              events Reporting Frequency -> /simulations/Mixtures/SoilWat/2004/84W100R0Ry200/paddock/outputfile/Reporting Frequency
            folder Manager folder -> /simulations/Mixtures/SoilWat/2004/84W100R0Ry200/paddock/Manager folder
              operations Operations Schedule: same as Mixtures.SWIM.2004.84W200R60Ry200SWIM.paddock.Manager folder.Operations Schedule
              manager Harvest radish
                # Harvesting criteria
                crop = raphanus_raphanistrum  # Enter name of crop to harvest when ripe
                on end_of_day:
                script: same as in Mixtures.SWIM.2003.W100R15SWIM.paddock.Manager folder.Harvesting radish
            outputfile stress: filename=84W200R60Ry200 stress.out; title=84W200R60Ry200 stress
              variables -> /simulations/Mixtures/SoilWat/2004/84W100R0Ry200/paddock/stress/Variables
              events Reporting Frequency -> /simulations/Mixtures/SoilWat/2004/84W100R0Ry200/paddock/stress/Reporting Frequency
            Soil Buckby (Roseworthy)1 -> /simulations/Mixtures/SoilWat/2004/84W100R0Ry200/paddock/Buckby (Roseworthy)1
              Water: same as Mixtures.SWIM.2004.84W100R15Ry200SWIM.paddock.Buckby (Roseworthy)1.Water
            canopy Canopy (plays with Micromet)
              intercrop = wheat lolium_rigidum raphanus_raphanistrum  # Enter crop names to intercrop
              dolight = yes  # Do the light competition? - set to 'No' if only for swapping
            Raphanus_raphanistrum
        simulation 84W400R15Ry200 -> /simulations/Mixtures/SoilWat/2004/84W100R0Ry200
          area paddock -> /simulations/Mixtures/SoilWat/2004/84W100R0Ry200/paddock
            outputfile: filename=84W400R15Ry200.out; title=84W400R15Ry200
              variables: same as Mixtures.SWIM.2004.84W100R15Ry200SWIM.paddock.outputfile.Variables
              events Reporting Frequency -> /simulations/Mixtures/SoilWat/2004/84W100R0Ry200/paddock/outputfile/Reporting Frequency
            folder Manager folder -> /simulations/Mixtures/SoilWat/2004/84W100R0Ry200/paddock/Manager folder
              operations Operations Schedule: same as Mixtures.SWIM.2004.84W400R15Ry200SWIM.paddock.Manager folder.Operations Schedule
              manager Harvest radish
                # Harvesting criteria
                crop = raphanus_raphanistrum  # Enter name of crop to harvest when ripe
                on end_of_day:
                script: same as in Mixtures.SWIM.2003.W100R15SWIM.paddock.Manager folder.Harvesting radish
            outputfile stress: filename=84W400R15Ry200 stress.out; title=84W400R15Ry200 stress
              variables -> /simulations/Mixtures/SoilWat/2004/84W100R0Ry200/paddock/stress/Variables
              events Reporting Frequency -> /simulations/Mixtures/SoilWat/2004/84W100R0Ry200/paddock/stress/Reporting Frequency
            Soil Buckby (Roseworthy)1 -> /simulations/Mixtures/SoilWat/2004/84W100R0Ry200/paddock/Buckby (Roseworthy)1
              Water: same as Mixtures.SWIM.2004.84W100R15Ry200SWIM.paddock.Buckby (Roseworthy)1.Water
            canopy Canopy (plays with Micromet)
              intercrop = wheat lolium_rigidum raphanus_raphanistrum  # Enter crop names to intercrop
              dolight = yes  # Do the light competition? - set to 'No' if only for swapping
            Raphanus_raphanistrum
        simulation 84W400R30Ry200 -> /simulations/Mixtures/SoilWat/2004/84W100R0Ry200
          area paddock -> /simulations/Mixtures/SoilWat/2004/84W100R0Ry200/paddock
            outputfile: filename=84W400R30Ry200.out; title=84W400R30Ry200
              variables: same as Mixtures.SWIM.2004.84W100R15Ry200SWIM.paddock.outputfile.Variables
              events Reporting Frequency -> /simulations/Mixtures/SoilWat/2004/84W100R0Ry200/paddock/outputfile/Reporting Frequency
            folder Manager folder -> /simulations/Mixtures/SoilWat/2004/84W100R0Ry200/paddock/Manager folder
              operations Operations Schedule: same as Mixtures.SWIM.2004.84W400R30Ry200SWIM.paddock.Manager folder.Operations Schedule
              manager Harvest radish
                # Harvesting criteria
                crop = raphanus_raphanistrum  # Enter name of crop to harvest when ripe
                on end_of_day:
                script: same as in Mixtures.SWIM.2003.W100R15SWIM.paddock.Manager folder.Harvesting radish
            outputfile stress: filename=84W400R30Ry200 stress.out; title=84W400R30Ry200 stress
              variables -> /simulations/Mixtures/SoilWat/2004/84W100R0Ry200/paddock/stress/Variables
              events Reporting Frequency -> /simulations/Mixtures/SoilWat/2004/84W100R0Ry200/paddock/stress/Reporting Frequency
            Soil Buckby (Roseworthy)1 -> /simulations/Mixtures/SoilWat/2004/84W100R0Ry200/paddock/Buckby (Roseworthy)1
              Water: same as Mixtures.SWIM.2004.84W100R15Ry200SWIM.paddock.Buckby (Roseworthy)1.Water
            canopy Canopy (plays with Micromet)
              intercrop = wheat lolium_rigidum raphanus_raphanistrum  # Enter crop names to intercrop
              dolight = yes  # Do the light competition? - set to 'No' if only for swapping
            Raphanus_raphanistrum
        simulation 84W400R60Ry200 -> /simulations/Mixtures/SoilWat/2004/84W100R0Ry200
          area paddock -> /simulations/Mixtures/SoilWat/2004/84W100R0Ry200/paddock
            outputfile: filename=84W400R60Ry200.out; title=84W400R60Ry200
              variables: same as Mixtures.SWIM.2004.84W100R15Ry200SWIM.paddock.outputfile.Variables
              events Reporting Frequency -> /simulations/Mixtures/SoilWat/2004/84W100R0Ry200/paddock/outputfile/Reporting Frequency
            folder Manager folder -> /simulations/Mixtures/SoilWat/2004/84W100R0Ry200/paddock/Manager folder
              operations Operations Schedule: same as Mixtures.SWIM.2004.84W400R60Ry200SWIM.paddock.Manager folder.Operations Schedule
              manager Harvest radish
                # Harvesting criteria
                crop = raphanus_raphanistrum  # Enter name of crop to harvest when ripe
                on end_of_day:
                script: same as in Mixtures.SWIM.2003.W100R15SWIM.paddock.Manager folder.Harvesting radish
            outputfile stress: filename=84W400R60Ry200 stress.out; title=84W400R60Ry200 stress
              variables -> /simulations/Mixtures/SoilWat/2004/84W100R0Ry200/paddock/stress/Variables
              events Reporting Frequency -> /simulations/Mixtures/SoilWat/2004/84W100R0Ry200/paddock/stress/Reporting Frequency
            Soil Buckby (Roseworthy)1 -> /simulations/Mixtures/SoilWat/2004/84W100R0Ry200/paddock/Buckby (Roseworthy)1
              Water: same as Mixtures.SWIM.2004.84W100R15Ry200SWIM.paddock.Buckby (Roseworthy)1.Water
            canopy Canopy (plays with Micromet)
              intercrop = wheat lolium_rigidum raphanus_raphanistrum  # Enter crop names to intercrop
              dolight = yes  # Do the light competition? - set to 'No' if only for swapping
            Raphanus_raphanistrum
        simulation 84W0R15Ry200 -> /simulations/Mixtures/SoilWat/2004/84W100R0Ry200
          area paddock -> /simulations/Mixtures/SoilWat/2004/84W100R0Ry200/paddock
            outputfile: filename=84W0R15Ry200.out; title=84W0R15Ry200
              variables: same as Mixtures.SWIM.2004.84W0R15Ry200SWIM.paddock.outputfile.Variables
              events Reporting Frequency -> /simulations/Mixtures/SoilWat/2004/84W100R0Ry200/paddock/outputfile/Reporting Frequency
            folder Manager folder -> /simulations/Mixtures/SoilWat/2004/84W100R0Ry200/paddock/Manager folder
              operations Operations Schedule: same as Mixtures.SWIM.2004.84W0R15Ry200SWIM.paddock.Manager folder.Operations Schedule
              manager Harvest radish
                # Harvesting criteria
                crop = raphanus_raphanistrum  # Enter name of crop to harvest when ripe
                on end_of_day:
                script: same as in Mixtures.SWIM.2003.W100R15SWIM.paddock.Manager folder.Harvesting radish
            outputfile stress: filename=84W0R15Ry200 stress.out; title=84W0R15Ry200 stress
              variables -> /simulations/Mixtures/SoilWat/2004/84W100R0Ry200/paddock/stress/Variables
              events Reporting Frequency -> /simulations/Mixtures/SoilWat/2004/84W100R0Ry200/paddock/stress/Reporting Frequency
            Soil Buckby (Roseworthy)1 -> /simulations/Mixtures/SoilWat/2004/84W100R0Ry200/paddock/Buckby (Roseworthy)1
              Water: same as Mixtures.SWIM.2004.84W100R15Ry200SWIM.paddock.Buckby (Roseworthy)1.Water
            canopy Canopy (plays with Micromet)
              intercrop = lolium_rigidum raphanus_raphanistrum  # Enter crop names to intercrop
              dolight = yes  # Do the light competition? - set to 'No' if only for swapping
            Raphanus_raphanistrum
        simulation 84W0R30Ry200 -> /simulations/Mixtures/SoilWat/2004/84W100R0Ry200
          area paddock -> /simulations/Mixtures/SoilWat/2004/84W100R0Ry200/paddock
            outputfile: filename=84W0R30Ry200.out; title=84W0R30Ry200
              variables: same as Mixtures.SWIM.2004.84W0R15Ry200SWIM.paddock.outputfile.Variables
              events Reporting Frequency -> /simulations/Mixtures/SoilWat/2004/84W100R0Ry200/paddock/outputfile/Reporting Frequency
            folder Manager folder -> /simulations/Mixtures/SoilWat/2004/84W100R0Ry200/paddock/Manager folder
              operations Operations Schedule: same as Mixtures.SWIM.2004.84W0R30Ry200SWIM.paddock.Manager folder.Operations Schedule
              manager Harvest radish
                # Harvesting criteria
                crop = raphanus_raphanistrum  # Enter name of crop to harvest when ripe
                on end_of_day:
                script: same as in Mixtures.SWIM.2003.W100R15SWIM.paddock.Manager folder.Harvesting radish
            outputfile stress: filename=84W0R30Ry200 stress.out; title=84W0R30Ry200 stress
              variables -> /simulations/Mixtures/SoilWat/2004/84W100R0Ry200/paddock/stress/Variables
              events Reporting Frequency -> /simulations/Mixtures/SoilWat/2004/84W100R0Ry200/paddock/stress/Reporting Frequency
            Soil Buckby (Roseworthy)1 -> /simulations/Mixtures/SoilWat/2004/84W100R0Ry200/paddock/Buckby (Roseworthy)1
              Water: same as Mixtures.SWIM.2004.84W100R15Ry200SWIM.paddock.Buckby (Roseworthy)1.Water
            canopy Canopy (plays with Micromet)
              intercrop = lolium_rigidum raphanus_raphanistrum  # Enter crop names to intercrop
              dolight = yes  # Do the light competition? - set to 'No' if only for swapping
            Raphanus_raphanistrum
        simulation 84W0R60Ry200 -> /simulations/Mixtures/SoilWat/2004/84W100R0Ry200
          area paddock -> /simulations/Mixtures/SoilWat/2004/84W100R0Ry200/paddock
            outputfile: filename=84W0R60Ry200.out; title=84W0R60Ry200
              variables: same as Mixtures.SWIM.2004.84W0R15Ry200SWIM.paddock.outputfile.Variables
              events Reporting Frequency -> /simulations/Mixtures/SoilWat/2004/84W100R0Ry200/paddock/outputfile/Reporting Frequency
            folder Manager folder -> /simulations/Mixtures/SoilWat/2004/84W100R0Ry200/paddock/Manager folder
              operations Operations Schedule: same as Mixtures.SWIM.2004.84W0R60Ry200SWIM.paddock.Manager folder.Operations Schedule
              manager Harvest radish
                # Harvesting criteria
                crop = raphanus_raphanistrum  # Enter name of crop to harvest when ripe
                on end_of_day:
                script: same as in Mixtures.SWIM.2003.W100R15SWIM.paddock.Manager folder.Harvesting radish
            outputfile stress: filename=84W0R60Ry200 stress.out; title=84W0R60Ry200 stress
              variables -> /simulations/Mixtures/SoilWat/2004/84W100R0Ry200/paddock/stress/Variables
              events Reporting Frequency -> /simulations/Mixtures/SoilWat/2004/84W100R0Ry200/paddock/stress/Reporting Frequency
            Soil Buckby (Roseworthy)1 -> /simulations/Mixtures/SoilWat/2004/84W100R0Ry200/paddock/Buckby (Roseworthy)1
              Water: same as Mixtures.SWIM.2004.84W100R15Ry200SWIM.paddock.Buckby (Roseworthy)1.Water
            canopy Canopy (plays with Micromet)
              intercrop = lolium_rigidum raphanus_raphanistrum  # Enter crop names to intercrop
              dolight = yes  # Do the light competition? - set to 'No' if only for swapping
            Raphanus_raphanistrum
  factorial Factorials
    settings: fn=1
  folder Monocultures
    folder SWIM
      folder 2003
        simulation W0R15SWIM
          metfile met: filename=Roseworthy.met
          clock
            start_date = 09/06/2003  # Enter the start date of the simulation
            end_date = 31/12/2003  # Enter the end date of the simulation
          summaryfile
          area paddock
            surfaceom surface organic matter
              PoolName = wheat  # Organic Matter pool name
              type = wheat  # Organic Matter type
              mass = 1000  # Initial surface residue (kg/ha)
              cnr = 80  # C:N ratio of initial residue
              standing_fraction = 0  # Fraction of residue standing
            fertiliser
            outputfile: filename=W0R15SWIM.out; title=W0R15SWIM
              variables
                variable:
                  day
                  year
                  dd/mm/yyyy as date
                  height as R_height
                  lai as R_lai
                  LeafNumber as R_LeafNumber
                  LeafNumberDead as R_LeafNumberDead
                  biomass as R_biomass
                  LeafLiveWt as R_LeafLiveWt
                  StemLiveWt as R_StemLiveWt
                  GrainWt as R_GrainWt
                  yield as R_yield
                  green_biomass as R_green_biomass
              events Reporting Frequency: event=daily
            folder Manager folder
              manager Harvesting rule
                # Harvesting criteria
                crop = raphanus_raphanistrum  # Enter name of crop to harvest when ripe
                on end_of_day:
                script: same as in Mixtures.SWIM.2003.W100R15SWIM.paddock.Manager folder.Harvesting radish
              operations Operations Schedule
                10/06/2003  Raphanus_raphanistrum sow population =15, sowing_depth = 30, cultivar = radish_SA, row_spacing = 400, crop_class = plant
                10/06/2003  fertiliser apply amount = 57 (kg/ha), depth = 50 (mm), type = NO3_N
                10/06/2003  fertiliser apply amount = 12 (kg/ha), depth = 50 (mm), type = NO3_N
            Raphanus_raphanistrum
            outputfile stress: filename=W0R15SWIM stress.out; title=W0R15SWIM stress
              variables
                variables: day, year, dd/mm/yyyy as date, NStressExpansion, NStressGrain, NStressPheno, NStressPhoto, WaterStressExpansion, WaterStressFixation, WaterStressPheno, WaterStressPhoto, sw, esw
              events Reporting Frequency: event=daily
            Soil Buckby (Roseworthy): Site=Roseworthy; Region=Mid North; State=South Australia; Country=Australia
              SoilType = Red Brown Earth  # Soil description
              NearestTown = Roseworthy
              ApsoilNumber = 300
              Latitude = -34.5  # Latitude (WGS84)
              Longitude = 138.686  # Longitude (WGS84)
              LocationAccuracy = +-20m
              DataSource = Characterisation 2005 by University of Adelaide, CSIRO Sustainable Ecosystems and DWLBC. Measurement site located adjacent to site described by Soil and Land Information Group, Department of Water, Land and Biodiversity Conservation, South Australia.
              Comments = Soil naming structure: \soils\Australia\South Australia\Region\Classification (Location APSoil No). LB code: RWN3; Low-moderate clay duplex soil with moderate CEC, moderate-high bulk density.Texture change about 10cm. Slaking or dispersion likely in the l
              Water
                Thickness  KS  BD    AirDry  LL15   DUL    SAT
                200        50  1.33  0.05    0.104  0.3    0.35
                200        50  1.22  0.05    0.104  0.3    0.35
                200        50  1.33  0.09    0.115  0.3    0.35
                200        50  1.38  0.11    0.146  0.3    0.35
                200        50  1.44  0.12    0.178  0.3    0.35
                200        50  1.53  0.13    0.202  0.336  0.38
                200        50  1.47  0.14    0.257  0.358  0.41
                200        50  1.49  0.15    0.318  0.387  0.41
                200        50  1.52  0.16    0.354  0.4    0.41
                DUL source: Field measured and checked for sensibility (layer 2, 4)
                SoilCrop wheat: LL=[0.104, 0.104, 0.12, 0.16, 0.19, 0.25, 0.358, 0.387, 0.4]; KL=[0.06, 0.06, 0.06, 0.06, 0.4, 0.4, 0.2, 0.2, 0.2]; XF=[1, 1, 1, 1, 1, 1, 1, 1, 1]
                SoilCrop raphanus_raphanistrum
                  LL=[0.104, 0.104, 0.12, 0.146, 0.178, 0.202, 0.258, 0.357, 0.4]
                  KL=[0.06, 0.06, 0.06, 0.06, 0.06, 0.06, 0.04, 0.04, 0.04]
                  XF=[1, 1, 1, 1, 1, 1, 1, 1, 1]
                SoilCrop peas: same as Mixtures.SWIM.2003.W100R15SWIM.paddock.Buckby (Roseworthy).Water.peas
              SoilOrganicMatter: same as Mixtures.SWIM.2003.W100R15SWIM.paddock.Buckby (Roseworthy).SoilOrganicMatter
              Analysis: same as Mixtures.SWIM.2003.W100R15SWIM.paddock.Buckby (Roseworthy).Analysis
              Sample Soil sample
                Thickness  NO3  NH4   SW
                200        19   34    0.3
                200        12   10.5  0.3
                200        8    3     0.3
                200        2.5  2     0.3
                200        2.5  1.5   0.3
                200        5    1     0.336
                200        6    1     0.358
                200        8    1     0.387
                200        9    1     0.4
              Swim: same as Mixtures.SWIM.2003.W100R15SWIM.paddock.Buckby (Roseworthy).Swim
        simulation W0R30SWIM -> /simulations/Monocultures/SWIM/2003/W0R15SWIM
          clock
            start_date = 01/04/2003  # Enter the start date of the simulation
            end_date = 31/12/2003  # Enter the end date of the simulation
          area paddock -> /simulations/Monocultures/SWIM/2003/W0R15SWIM/paddock
            folder Manager folder -> /simulations/Monocultures/SWIM/2003/W0R15SWIM/paddock/Manager folder
              operations Operations Schedule
                10/06/2003  Raphanus_raphanistrum sow population =30, sowing_depth = 10, cultivar = radish_SA, row_spacing = 170, crop_class = plant
                10/06/2003  fertiliser apply amount = 123 (kg/ha), depth = 50 (mm), type = urea()
                10/06/2003  fertiliser apply amount = 19 (kg/ha), depth = 50 (mm), type = nh4_n()
            outputfile: filename=W0R30SWIM.out; title=W0R30SWIM
              variables -> /simulations/Monocultures/SWIM/2003/W0R15SWIM/paddock/outputfile/Variables
              events Reporting Frequency -> /simulations/Monocultures/SWIM/2003/W0R15SWIM/paddock/outputfile/Reporting Frequency
            outputfile stress: filename=W0R30SWIM stress.out; title=W0R30SWIM stress
              variables -> /simulations/Monocultures/SWIM/2003/W0R15SWIM/paddock/stress/Variables
              events Reporting Frequency -> /simulations/Monocultures/SWIM/2003/W0R15SWIM/paddock/stress/Reporting Frequency
            Soil Buckby (Roseworthy) -> /simulations/Monocultures/SWIM/2003/W0R15SWIM/paddock/Buckby (Roseworthy)
              Swim -> /simulations/Monocultures/SWIM/2003/W0R15SWIM/paddock/Buckby (Roseworthy)/Swim: VC=false; Diagnostics=false
                SwimSoluteParameters -> /simulations/Monocultures/SWIM/2003/W0R15SWIM/paddock/Buckby (Roseworthy)/Swim/SwimSoluteParameters
                SwimWaterTable -> /simulations/Monocultures/SWIM/2003/W0R15SWIM/paddock/Buckby (Roseworthy)/Swim/SwimWaterTable
                SwimSubsurfaceDrain -> /simulations/Monocultures/SWIM/2003/W0R15SWIM/paddock/Buckby (Roseworthy)/Swim/SwimSubsurfaceDrain
        simulation W0R60SWIM -> /simulations/Monocultures/SWIM/2003/W0R15SWIM
          clock
            start_date = 01/04/2003  # Enter the start date of the simulation
            end_date = 31/12/2003  # Enter the end date of the simulation
          area paddock -> /simulations/Monocultures/SWIM/2003/W0R15SWIM/paddock
            folder Manager folder -> /simulations/Monocultures/SWIM/2003/W0R15SWIM/paddock/Manager folder
              operations Operations Schedule
                10/06/2003  Raphanus_raphanistrum sow population =60, sowing_depth = 10, cultivar = radish_SA, row_spacing = 120, crop_class = plant
                10/06/2003  fertiliser apply amount = 123 (kg/ha), depth = 50 (mm), type = urea()
                10/06/2003  fertiliser apply amount = 19 (kg/ha), depth = 50 (mm), type = nh4_n()
            outputfile: filename=W0R60SWIM.out; title=W0R60SWIM
              variables -> /simulations/Monocultures/SWIM/2003/W0R15SWIM/paddock/outputfile/Variables
              events Reporting Frequency -> /simulations/Monocultures/SWIM/2003/W0R15SWIM/paddock/outputfile/Reporting Frequency
            Soil Buckby (Roseworthy) -> /simulations/Monocultures/SWIM/2003/W0R15SWIM/paddock/Buckby (Roseworthy)
              Swim -> /simulations/Monocultures/SWIM/2003/W0R15SWIM/paddock/Buckby (Roseworthy)/Swim: same as Monocultures.SWIM.2003.W0R30SWIM.paddock.Buckby (Roseworthy).Swim
        simulation W100R0SWIM -> /simulations/Monocultures/SWIM/2003/W0R15SWIM
          area paddock -> /simulations/Monocultures/SWIM/2003/W0R15SWIM/paddock
            outputfile: filename=W100R0SWIM.out; title=W100R0SWIM
              variables
                variable:
                  day
                  year
                  dd/mm/yyyy as date
                  height as W_height
                  lai as W_lai
                  LeafNumber as W_LeafNumber
                  LeafNumberDead as W_LeafNumberDead
                  biomass as W_biomass
                  LeafLiveWt as W_LeafLiveWt
                  StemLiveWt as W_StemLiveWt
                  GrainWt as W_GrainWt
                  yield as W_yield
                  green_biomass as W_green_biomass
              events Reporting Frequency -> /simulations/Monocultures/SWIM/2003/W0R15SWIM/paddock/outputfile/Reporting Frequency
            folder Manager folder -> /simulations/Monocultures/SWIM/2003/W0R15SWIM/paddock/Manager folder
              manager Harvesting rule
                # Harvesting criteria
                crop = wheat  # Enter name of crop to harvest when ripe
                on end_of_day:
                script: same as in Mixtures.SWIM.2003.W100R15SWIM.paddock.Manager folder.Harvesting radish
              operations Operations Schedule
                10/06/2003  wheat sow population = 100, sowing_depth = 30, cultivar = hartog, row_spacing = 250, crop_class = plant
                10/06/2003  fertiliser apply amount = 57 (kg/ha), depth = 50 (mm), type = NO3_N
                10/06/2003  fertiliser apply amount = 12 (kg/ha), depth = 50 (mm), type = NO3_N
            outputfile stress: filename=W100R0SWIM stress.out; title=W100R0SWIM stress
              variables -> /simulations/Monocultures/SWIM/2003/W0R15SWIM/paddock/stress/Variables
              events Reporting Frequency -> /simulations/Monocultures/SWIM/2003/W0R15SWIM/paddock/stress/Reporting Frequency
            Soil Buckby (Roseworthy) -> /simulations/Monocultures/SWIM/2003/W0R15SWIM/paddock/Buckby (Roseworthy)
              Swim -> /simulations/Monocultures/SWIM/2003/W0R15SWIM/paddock/Buckby (Roseworthy)/Swim: same as Monocultures.SWIM.2003.W0R30SWIM.paddock.Buckby (Roseworthy).Swim
            wheat
              ModifyKL = yes  # Modify KL using CL, EC or ESP if found?
        simulation W200R0SWIM -> /simulations/Monocultures/SWIM/2003/W0R15SWIM
          area paddock -> /simulations/Monocultures/SWIM/2003/W0R15SWIM/paddock
            outputfile: filename=W200R0SWIM.out; title=W200R0SWIM
              variables
                variable:
                  day
                  year
                  dd/mm/yyyy as date
                  height as W_height
                  lai as W_lai
                  LeafNumber as W_LeafNumber
                  LeafNumberDead as W_LeafNumberDead
                  biomass as W_biomass
                  LeafLiveWt as W_LeafLiveWt
                  StemLiveWt as W_StemLiveWt
                  GrainWt as W_GrainWt
                  yield as W_yield
                  green_biomass as W_green_biomass
              events Reporting Frequency -> /simulations/Monocultures/SWIM/2003/W0R15SWIM/paddock/outputfile/Reporting Frequency
            folder Manager folder -> /simulations/Monocultures/SWIM/2003/W0R15SWIM/paddock/Manager folder
              manager Harvesting rule
                # Harvesting criteria
                crop = wheat  # Enter name of crop to harvest when ripe
                on end_of_day:
                script: same as in Mixtures.SWIM.2003.W100R15SWIM.paddock.Manager folder.Harvesting radish
              operations Operations Schedule
                10/06/2003  wheat sow population = 200, sowing_depth = 30, cultivar = hartog, row_spacing = 250, crop_class = plant
                10/06/2003  fertiliser apply amount = 57 (kg/ha), depth = 50 (mm), type = NO3_N
                10/06/2003  fertiliser apply amount = 12 (kg/ha), depth = 50 (mm), type = NO3_N
            outputfile stress: filename=W200R0SWIM stress.out; title=W200R0SWIM stress
              variables -> /simulations/Monocultures/SWIM/2003/W0R15SWIM/paddock/stress/Variables
              events Reporting Frequency -> /simulations/Monocultures/SWIM/2003/W0R15SWIM/paddock/stress/Reporting Frequency
            Soil Buckby (Roseworthy) -> /simulations/Monocultures/SWIM/2003/W0R15SWIM/paddock/Buckby (Roseworthy)
              Swim -> /simulations/Monocultures/SWIM/2003/W0R15SWIM/paddock/Buckby (Roseworthy)/Swim: same as Monocultures.SWIM.2003.W0R30SWIM.paddock.Buckby (Roseworthy).Swim
            wheat
              ModifyKL = yes  # Modify KL using CL, EC or ESP if found?
        simulation W400R0SWIM -> /simulations/Monocultures/SWIM/2003/W0R15SWIM
          area paddock -> /simulations/Monocultures/SWIM/2003/W0R15SWIM/paddock
            outputfile: filename=W400R0SWIM.out; title=W400R0SWIM
              variables
                variable:
                  day
                  year
                  dd/mm/yyyy as date
                  height as W_height
                  lai as W_lai
                  LeafNumber as W_LeafNumber
                  LeafNumberDead as W_LeafNumberDead
                  biomass as W_biomass
                  LeafLiveWt as W_LeafLiveWt
                  StemLiveWt as W_StemLiveWt
                  GrainWt as W_GrainWt
                  yield as W_yield
                  green_biomass as W_green_biomass
              events Reporting Frequency -> /simulations/Monocultures/SWIM/2003/W0R15SWIM/paddock/outputfile/Reporting Frequency
            folder Manager folder -> /simulations/Monocultures/SWIM/2003/W0R15SWIM/paddock/Manager folder
              manager Harvesting rule
                # Harvesting criteria
                crop = wheat  # Enter name of crop to harvest when ripe
                on end_of_day:
                script: same as in Mixtures.SWIM.2003.W100R15SWIM.paddock.Manager folder.Harvesting radish
              operations Operations Schedule
                10/06/2003  wheat sow population = 400, sowing_depth = 30, cultivar = hartog, row_spacing = 250, crop_class = plant
                10/06/2003  fertiliser apply amount = 57 (kg/ha), depth = 50 (mm), type = NO3_N
                10/06/2003  fertiliser apply amount = 12 (kg/ha), depth = 50 (mm), type = NO3_N
            outputfile stress: filename=W400R0SWIM stress.out; title=W400R0SWIM stress
              variables -> /simulations/Monocultures/SWIM/2003/W0R15SWIM/paddock/stress/Variables
              events Reporting Frequency -> /simulations/Monocultures/SWIM/2003/W0R15SWIM/paddock/stress/Reporting Frequency
            Soil Buckby (Roseworthy) -> /simulations/Monocultures/SWIM/2003/W0R15SWIM/paddock/Buckby (Roseworthy)
              Swim -> /simulations/Monocultures/SWIM/2003/W0R15SWIM/paddock/Buckby (Roseworthy)/Swim: same as Monocultures.SWIM.2003.W0R30SWIM.paddock.Buckby (Roseworthy).Swim
            wheat
              ModifyKL = yes  # Modify KL using CL, EC or ESP if found?
      folder 2004
        simulation 84W0R15Ry0SWIM
          metfile met: filename=Roseworthy.met
          clock
            start_date = 16/06/2004  # Enter the start date of the simulation
            end_date = 31/12/2004  # Enter the end date of the simulation
          summaryfile
          area paddock
            surfaceom surface organic matter
              PoolName = wheat  # Organic Matter pool name
              type = wheat  # Organic Matter type
              mass = 1000  # Initial surface residue (kg/ha)
              cnr = 80  # C:N ratio of initial residue
              standing_fraction = 0  # Fraction of residue standing
            fertiliser
            outputfile: filename=84W0R15Ry0SWIM.out; title=84W0R15Ry0SWIM
              variables
                variable:
                  day
                  year
                  dd/mm/yyyy as date
                  height as R_height
                  lai as R_lai
                  LeafNumber as R_LeafNumber
                  LeafNumberDead as R_LeafNumberDead
                  biomass as R_biomass
                  LeafLiveWt as R_LeafLiveWt
                  StemLiveWt as R_StemLiveWt
                  GrainWt as R_GrainWt
                  yield as R_yield
                  green_biomass as R_green_biomass
              events Reporting Frequency: event=daily
            folder Manager folder
              manager Harvesting rule
                # Harvesting criteria
                crop = raphanus_raphanistrum  # Enter name of crop to harvest when ripe
                on end_of_day:
                script: same as in Mixtures.SWIM.2003.W100R15SWIM.paddock.Manager folder.Harvesting radish
              operations Operations Schedule
                17/06/2004  Raphanus_raphanistrum sow population =15, sowing_depth = 10, cultivar = radish_SA, row_spacing = 250, crop_class = plant
                17/06/2004  fertiliser apply amount = 57 (kg/ha), depth = 50 (mm), type = NO3_N
                17/06/2004  fertiliser apply amount = 12 (kg/ha), depth = 50 (mm), type = NO3_N
            Raphanus_raphanistrum
            outputfile stress: filename=84W0R15Ry0SWIM stress.out; title=84W0R15Ry0SWIM stress
              variables
                variables: day, year, dd/mm/yyyy as date, NStressExpansion, NStressGrain, NStressPheno, NStressPhoto, WaterStressExpansion, WaterStressFixation, WaterStressPheno, WaterStressPhoto, sw, esw
              events Reporting Frequency: event=daily
            Soil Buckby (Roseworthy)1: same as Monocultures.SWIM.2003.W0R15SWIM.paddock.Buckby (Roseworthy)
        simulation 84W0R30Ry0SWIM -> /simulations/Monocultures/SWIM/2004/84W0R15Ry0SWIM
          area paddock -> /simulations/Monocultures/SWIM/2004/84W0R15Ry0SWIM/paddock
            outputfile: filename=84W0R30Ry0SWIM.out; title=84W0R30Ry0SWIM
              variables -> /simulations/Monocultures/SWIM/2004/84W0R15Ry0SWIM/paddock/outputfile/Variables
              events Reporting Frequency -> /simulations/Monocultures/SWIM/2004/84W0R15Ry0SWIM/paddock/outputfile/Reporting Frequency
            folder Manager folder -> /simulations/Monocultures/SWIM/2004/84W0R15Ry0SWIM/paddock/Manager folder
              operations Operations Schedule
                17/06/2004  Raphanus_raphanistrum sow population =30, sowing_depth = 10, cultivar = radish_SA, row_spacing = 170, crop_class = plant
                17/06/2004  fertiliser apply amount = 57 (kg/ha), depth = 50 (mm), type = NO3_N
                17/06/2004  fertiliser apply amount = 12 (kg/ha), depth = 50 (mm), type = NO3_N
            outputfile stress: filename=84W0R30Ry0SWIM stress.out; title=84W0R30Ry0SWIM stress
              variables -> /simulations/Monocultures/SWIM/2004/84W0R15Ry0SWIM/paddock/stress/Variables
              events Reporting Frequency -> /simulations/Monocultures/SWIM/2004/84W0R15Ry0SWIM/paddock/stress/Reporting Frequency
            Soil Buckby (Roseworthy): Site=Roseworthy; Region=Mid North; State=South Australia; Country=Australia
              SoilType = Red Brown Earth  # Soil description
              NearestTown = Roseworthy
              ApsoilNumber = 300
              Latitude = -34.5  # Latitude (WGS84)
              Longitude = 138.686  # Longitude (WGS84)
              LocationAccuracy = +-20m
              DataSource = Characterisation 2005 by University of Adelaide, CSIRO Sustainable Ecosystems and DWLBC. Measurement site located adjacent to site described by Soil and Land Information Group, Department of Water, Land and Biodiversity Conservation, South Australia.
              Comments = Soil naming structure: \soils\Australia\South Australia\Region\Classification (Location APSoil No). LB code: RWN3; Low-moderate clay duplex soil with moderate CEC, moderate-high bulk density.Texture change about 10cm. Slaking or dispersion likely in the l
              SoilOrganicMatter: same as Mixtures.SWIM.2003.W100R15SWIM.paddock.Buckby (Roseworthy).SoilOrganicMatter
              Analysis: same as Mixtures.SWIM.2003.W100R15SWIM.paddock.Buckby (Roseworthy).Analysis
              Sample Soil sample
                Thickness  NO3  NH4   SW
                200        19   34    0.3
                200        12   10.5  0.3
                200        8    3     0.3
                200        2.5  2     0.3
                200        2.5  1.5   0.3
                200        5    1     0.336
                200        6    1     0.358
                200        8    1     0.387
                200        9    1     0.4
              Swim: same as Mixtures.SWIM.2003.W100R15SWIM.paddock.Buckby (Roseworthy).Swim
              Water -> /simulations/Monocultures/SWIM/2004/84W0R15Ry0SWIM/paddock/Buckby (Roseworthy)1/Water
        simulation 84W0R60Ry0SWIM -> /simulations/Monocultures/SWIM/2004/84W0R15Ry0SWIM
          area paddock -> /simulations/Monocultures/SWIM/2004/84W0R15Ry0SWIM/paddock
            outputfile: filename=84W0R60Ry0SWIM.out; title=84W0R60Ry0SWIM
              variables -> /simulations/Monocultures/SWIM/2004/84W0R15Ry0SWIM/paddock/outputfile/Variables
              events Reporting Frequency -> /simulations/Monocultures/SWIM/2004/84W0R15Ry0SWIM/paddock/outputfile/Reporting Frequency
            folder Manager folder -> /simulations/Monocultures/SWIM/2004/84W0R15Ry0SWIM/paddock/Manager folder
              operations Operations Schedule
                17/06/2004  Raphanus_raphanistrum sow population =30, sowing_depth = 10, cultivar = radish_SA, row_spacing = 120, crop_class = plant
                17/06/2004  fertiliser apply amount = 57 (kg/ha), depth = 50 (mm), type = NO3_N
                17/06/2004  fertiliser apply amount = 12 (kg/ha), depth = 50 (mm), type = NO3_N
            outputfile stress: filename=84W0R60Ry0SWIM stress.out; title=84W0R60Ry0SWIM stress
              variables -> /simulations/Monocultures/SWIM/2004/84W0R15Ry0SWIM/paddock/stress/Variables
              events Reporting Frequency -> /simulations/Monocultures/SWIM/2004/84W0R15Ry0SWIM/paddock/stress/Reporting Frequency
            Soil Buckby (Roseworthy): same as Monocultures.SWIM.2004.84W0R30Ry0SWIM.paddock.Buckby (Roseworthy)
        simulation 84W100R0Ry0SWIM -> /simulations/Monocultures/SWIM/2004/84W0R15Ry0SWIM
          area paddock -> /simulations/Monocultures/SWIM/2004/84W0R15Ry0SWIM/paddock
            outputfile: filename=84W100R0Ry0SWIM.out; title=84W100R0Ry0SWIM
              variables
                variable:
                  day
                  year
                  dd/mm/yyyy as date
                  height as W_height
                  lai as W_lai
                  LeafNumber as W_LeafNumber
                  LeafNumberDead as W_LeafNumberDead
                  biomass as W_biomass
                  LeafLiveWt as W_LeafLiveWt
                  StemLiveWt as W_StemLiveWt
                  GrainWt as W_GrainWt
                  yield as W_yield
                  green_biomass as W_green_biomass
              events Reporting Frequency -> /simulations/Monocultures/SWIM/2004/84W0R15Ry0SWIM/paddock/outputfile/Reporting Frequency
            folder Manager folder -> /simulations/Monocultures/SWIM/2004/84W0R15Ry0SWIM/paddock/Manager folder
              manager Harvesting rule
                # Harvesting criteria
                crop = wheat  # Enter name of crop to harvest when ripe
                on end_of_day:
                script: same as in Mixtures.SWIM.2003.W100R15SWIM.paddock.Manager folder.Harvesting radish
              operations Operations Schedule
                17/06/2004  wheat sow population =100, sowing_depth = 10, cultivar = hartog, row_spacing = 250, crop_class = plant
                17/06/2004  fertiliser apply amount = 57 (kg/ha), depth = 50 (mm), type = NO3_N
                17/06/2004  fertiliser apply amount = 12 (kg/ha), depth = 50 (mm), type = NO3_N
            outputfile stress: filename=84W100R0Ry0SWIM stress.out; title=84W100R0Ry0SWIM stress
              variables -> /simulations/Monocultures/SWIM/2004/84W0R15Ry0SWIM/paddock/stress/Variables
              events Reporting Frequency -> /simulations/Monocultures/SWIM/2004/84W0R15Ry0SWIM/paddock/stress/Reporting Frequency
            Soil Buckby (Roseworthy)1 -> /simulations/Monocultures/SWIM/2004/84W0R15Ry0SWIM/paddock/Buckby (Roseworthy)1
              Swim -> /simulations/Monocultures/SWIM/2004/84W0R15Ry0SWIM/paddock/Buckby (Roseworthy)1/Swim: VC=false; Diagnostics=false
                SwimSoluteParameters -> /simulations/Monocultures/SWIM/2004/84W0R15Ry0SWIM/paddock/Buckby (Roseworthy)1/Swim/SwimSoluteParameters
                SwimWaterTable -> /simulations/Monocultures/SWIM/2004/84W0R15Ry0SWIM/paddock/Buckby (Roseworthy)1/Swim/SwimWaterTable
                SwimSubsurfaceDrain -> /simulations/Monocultures/SWIM/2004/84W0R15Ry0SWIM/paddock/Buckby (Roseworthy)1/Swim/SwimSubsurfaceDrain
            wheat
              ModifyKL = yes  # Modify KL using CL, EC or ESP if found?
        simulation 84W200R0Ry0SWIM -> /simulations/Monocultures/SWIM/2004/84W0R15Ry0SWIM
          area paddock -> /simulations/Monocultures/SWIM/2004/84W0R15Ry0SWIM/paddock
            outputfile: filename=84W200R0Ry0SWIM.out; title=84W200R0Ry0SWIM
              variables
                variable:
                  day
                  year
                  dd/mm/yyyy as date
                  height as W_height
                  lai as W_lai
                  LeafNumber as W_LeafNumber
                  LeafNumberDead as W_LeafNumberDead
                  biomass as W_biomass
                  LeafLiveWt as W_LeafLiveWt
                  StemLiveWt as W_StemLiveWt
                  GrainWt as W_GrainWt
                  yield as W_yield
                  green_biomass as W_green_biomass
              events Reporting Frequency -> /simulations/Monocultures/SWIM/2004/84W0R15Ry0SWIM/paddock/outputfile/Reporting Frequency
            folder Manager folder -> /simulations/Monocultures/SWIM/2004/84W0R15Ry0SWIM/paddock/Manager folder
              manager Harvesting rule
                # Harvesting criteria
                crop = wheat  # Enter name of crop to harvest when ripe
                on end_of_day:
                script: same as in Mixtures.SWIM.2003.W100R15SWIM.paddock.Manager folder.Harvesting radish
              operations Operations Schedule
                17/06/2004  wheat sow population = 200, sowing_depth = 10, cultivar = hartog, row_spacing = 250, crop_class = plant
                17/06/2004  fertiliser apply amount = 57 (kg/ha), depth = 50 (mm), type = NO3_N
                17/06/2004  fertiliser apply amount = 12 (kg/ha), depth = 50 (mm), type = NO3_N
            outputfile stress: filename=84W200R0Ry0SWIM stress.out; title=84W200R0Ry0SWIM stress
              variables -> /simulations/Monocultures/SWIM/2004/84W0R15Ry0SWIM/paddock/stress/Variables
              events Reporting Frequency -> /simulations/Monocultures/SWIM/2004/84W0R15Ry0SWIM/paddock/stress/Reporting Frequency
            Soil Buckby (Roseworthy)1 -> /simulations/Monocultures/SWIM/2004/84W0R15Ry0SWIM/paddock/Buckby (Roseworthy)1
              Swim -> /simulations/Monocultures/SWIM/2004/84W0R15Ry0SWIM/paddock/Buckby (Roseworthy)1/Swim: same as Monocultures.SWIM.2004.84W100R0Ry0SWIM.paddock.Buckby (Roseworthy)1.Swim
            wheat
              ModifyKL = yes  # Modify KL using CL, EC or ESP if found?
        simulation 84W400R0Ry0SWIM -> /simulations/Monocultures/SWIM/2004/84W0R15Ry0SWIM
          area paddock -> /simulations/Monocultures/SWIM/2004/84W0R15Ry0SWIM/paddock
            outputfile: filename=84W400R0Ry0SWIM.out; title=84W400R0Ry0SWIM
              variables
                variable:
                  day
                  year
                  dd/mm/yyyy as date
                  height as W_height
                  lai as W_lai
                  LeafNumber as W_LeafNumber
                  LeafNumberDead as W_LeafNumberDead
                  biomass as W_biomass
                  LeafLiveWt as W_LeafLiveWt
                  StemLiveWt as W_StemLiveWt
                  GrainWt as W_GrainWt
                  yield as W_yield
                  green_biomass as W_green_biomass
              events Reporting Frequency -> /simulations/Monocultures/SWIM/2004/84W0R15Ry0SWIM/paddock/outputfile/Reporting Frequency
            folder Manager folder -> /simulations/Monocultures/SWIM/2004/84W0R15Ry0SWIM/paddock/Manager folder
              manager Harvesting rule
                # Harvesting criteria
                crop = wheat  # Enter name of crop to harvest when ripe
                on end_of_day:
                script: same as in Mixtures.SWIM.2003.W100R15SWIM.paddock.Manager folder.Harvesting radish
              operations Operations Schedule
                17/06/2004  wheat sow population = 400, sowing_depth = 10, cultivar = hartog, row_spacing = 250, crop_class = plant
                17/06/2004  fertiliser apply amount = 57 (kg/ha), depth = 50 (mm), type = NO3_N
                17/06/2004  fertiliser apply amount = 12 (kg/ha), depth = 50 (mm), type = NO3_N
            outputfile stress: filename=84W400R0Ry0SWIM stress.out; title=84W400R0Ry0SWIM stress
              variables -> /simulations/Monocultures/SWIM/2004/84W0R15Ry0SWIM/paddock/stress/Variables
              events Reporting Frequency -> /simulations/Monocultures/SWIM/2004/84W0R15Ry0SWIM/paddock/stress/Reporting Frequency
            Soil Buckby (Roseworthy)1 -> /simulations/Monocultures/SWIM/2004/84W0R15Ry0SWIM/paddock/Buckby (Roseworthy)1
              Swim -> /simulations/Monocultures/SWIM/2004/84W0R15Ry0SWIM/paddock/Buckby (Roseworthy)1/Swim: same as Monocultures.SWIM.2004.84W100R0Ry0SWIM.paddock.Buckby (Roseworthy)1.Swim
            wheat
              ModifyKL = yes  # Modify KL using CL, EC or ESP if found?
    folder SoilWat
      folder 2003
        simulation W0R15
          metfile met: filename=Roseworthy.met
          clock
            start_date = 09/06/2003  # Enter the start date of the simulation
            end_date = 31/12/2003  # Enter the end date of the simulation
          summaryfile
          area paddock
            surfaceom surface organic matter
              PoolName = wheat  # Organic Matter pool name
              type = wheat  # Organic Matter type
              mass = 1000  # Initial surface residue (kg/ha)
              cnr = 80  # C:N ratio of initial residue
              standing_fraction = 0  # Fraction of residue standing
            fertiliser
            outputfile: filename=W0R15.out; title=W0R15
              variables
                variable:
                  day
                  year
                  dd/mm/yyyy as date
                  height as R_height
                  lai as R_lai
                  LeafNumber as R_LeafNumber
                  LeafNumberDead as R_LeafNumberDead
                  biomass as R_biomass
                  LeafLiveWt as R_LeafLiveWt
                  StemLiveWt as R_StemLiveWt
                  GrainWt as R_GrainWt
                  yield as R_yield
                  green_biomass as R_green_biomass
              events Reporting Frequency: event=daily
            folder Manager folder: same as Monocultures.SWIM.2003.W0R15SWIM.paddock.Manager folder
            Raphanus_raphanistrum
            outputfile stress: filename=W0R15 stress.out; title=W0R15 stress
              variables
                variables: day, year, dd/mm/yyyy as date, NStressExpansion, NStressGrain, NStressPheno, NStressPhoto, WaterStressExpansion, WaterStressFixation, WaterStressPheno, WaterStressPhoto, sw, esw
              events Reporting Frequency: event=daily
            Soil Buckby (Roseworthy): Site=Roseworthy; Region=Mid North; State=South Australia; Country=Australia
              SoilType = Red Brown Earth  # Soil description
              NearestTown = Roseworthy
              ApsoilNumber = 300
              Latitude = -34.5  # Latitude (WGS84)
              Longitude = 138.686  # Longitude (WGS84)
              LocationAccuracy = +-20m
              DataSource = Characterisation 2005 by University of Adelaide, CSIRO Sustainable Ecosystems and DWLBC. Measurement site located adjacent to site described by Soil and Land Information Group, Department of Water, Land and Biodiversity Conservation, South Australia.
              Comments = Soil naming structure: \soils\Australia\South Australia\Region\Classification (Location APSoil No). LB code: RWN3; Low-moderate clay duplex soil with moderate CEC, moderate-high bulk density.Texture change about 10cm. Slaking or dispersion likely in the l
              Water
                Thickness  BD    AirDry  LL15   DUL    SAT
                200        1.33  0.05    0.104  0.3    0.35
                200        1.22  0.05    0.104  0.3    0.35
                200        1.33  0.09    0.115  0.3    0.35
                200        1.38  0.11    0.146  0.3    0.35
                200        1.44  0.12    0.178  0.3    0.35
                200        1.53  0.13    0.202  0.336  0.38
                200        1.47  0.14    0.257  0.358  0.41
                200        1.49  0.15    0.318  0.387  0.41
                200        1.52  0.16    0.354  0.4    0.41
                DUL source: Field measured and checked for sensibility (layer 2, 4)
                SoilCrop wheat: LL=[0.104, 0.104, 0.12, 0.16, 0.19, 0.25, 0.358, 0.387, 0.4]; KL=[0.06, 0.06, 0.06, 0.06, 0.4, 0.4, 0.2, 0.2, 0.2]; XF=[1, 1, 1, 1, 1, 1, 1, 1, 1]
                SoilCrop raphanus_raphanistrum
                  LL=[0.104, 0.104, 0.12, 0.146, 0.178, 0.202, 0.258, 0.357, 0.4]
                  KL=[0.06, 0.06, 0.06, 0.06, 0.06, 0.06, 0.04, 0.04, 0.04]
                  XF=[1, 1, 1, 1, 1, 1, 1, 1, 1]
                SoilCrop peas: same as Mixtures.SWIM.2003.W100R15SWIM.paddock.Buckby (Roseworthy).Water.peas
              SoilWater: same as Mixtures.SoilWat.2003.W100R15.paddock.Buckby (Roseworthy).SoilWater
              SoilOrganicMatter: same as Mixtures.SWIM.2003.W100R15SWIM.paddock.Buckby (Roseworthy).SoilOrganicMatter
              Analysis: same as Mixtures.SWIM.2003.W100R15SWIM.paddock.Buckby (Roseworthy).Analysis
              Sample Soil sample
                Thickness  NO3  NH4   SW
                200        19   34    0.3
                200        12   10.5  0.3
                200        8    3     0.3
                200        2.5  2     0.3
                200        2.5  1.5   0.3
                200        5    1     0.336
                200        6    1     0.358
                200        8    1     0.387
                200        9    1     0.4
        simulation W0R30 -> /simulations/Monocultures/SoilWat/2003/W0R15
          clock
            start_date = 01/04/2003  # Enter the start date of the simulation
            end_date = 31/12/2003  # Enter the end date of the simulation
          area paddock -> /simulations/Monocultures/SoilWat/2003/W0R15/paddock
            folder Manager folder -> /simulations/Monocultures/SoilWat/2003/W0R15/paddock/Manager folder
              operations Operations Schedule: same as Monocultures.SWIM.2003.W0R30SWIM.paddock.Manager folder.Operations Schedule
            outputfile: filename=W0R30.out; title=W0R30
              variables -> /simulations/Monocultures/SoilWat/2003/W0R15/paddock/outputfile/Variables
              events Reporting Frequency -> /simulations/Monocultures/SoilWat/2003/W0R15/paddock/outputfile/Reporting Frequency
            outputfile stress: filename=W0R30 stress.out; title=W0R30 stress
              variables -> /simulations/Monocultures/SoilWat/2003/W0R15/paddock/stress/Variables
              events Reporting Frequency -> /simulations/Monocultures/SoilWat/2003/W0R15/paddock/stress/Reporting Frequency
        simulation W0R60 -> /simulations/Monocultures/SoilWat/2003/W0R15
          clock
            start_date = 01/04/2003  # Enter the start date of the simulation
            end_date = 31/12/2003  # Enter the end date of the simulation
          area paddock -> /simulations/Monocultures/SoilWat/2003/W0R15/paddock
            folder Manager folder -> /simulations/Monocultures/SoilWat/2003/W0R15/paddock/Manager folder
              operations Operations Schedule: same as Monocultures.SWIM.2003.W0R60SWIM.paddock.Manager folder.Operations Schedule
            outputfile: filename=W0R60.out; title=W0R60
              variables -> /simulations/Monocultures/SoilWat/2003/W0R15/paddock/outputfile/Variables
              events Reporting Frequency -> /simulations/Monocultures/SoilWat/2003/W0R15/paddock/outputfile/Reporting Frequency
        simulation W100R0 -> /simulations/Monocultures/SoilWat/2003/W0R15
          area paddock -> /simulations/Monocultures/SoilWat/2003/W0R15/paddock
            outputfile: filename=W100R0.out; title=W100R0
              variables
                variable:
                  day
                  year
                  dd/mm/yyyy as date
                  height as W_height
                  lai as W_lai
                  LeafNumber as W_LeafNumber
                  LeafNumberDead as W_LeafNumberDead
                  biomass as W_biomass
                  LeafLiveWt as W_LeafLiveWt
                  StemLiveWt as W_StemLiveWt
                  GrainWt as W_GrainWt
                  yield as W_yield
                  green_biomass as W_green_biomass
              events Reporting Frequency -> /simulations/Monocultures/SoilWat/2003/W0R15/paddock/outputfile/Reporting Frequency
            folder Manager folder -> /simulations/Monocultures/SoilWat/2003/W0R15/paddock/Manager folder
              manager Harvesting rule
                # Harvesting criteria
                crop = wheat  # Enter name of crop to harvest when ripe
                on end_of_day:
                script: same as in Mixtures.SWIM.2003.W100R15SWIM.paddock.Manager folder.Harvesting radish
              operations Operations Schedule: same as Monocultures.SWIM.2003.W100R0SWIM.paddock.Manager folder.Operations Schedule
            outputfile stress: filename=W100R0 stress.out; title=W100R0 stress
              variables -> /simulations/Monocultures/SoilWat/2003/W0R15/paddock/stress/Variables
              events Reporting Frequency -> /simulations/Monocultures/SoilWat/2003/W0R15/paddock/stress/Reporting Frequency
            wheat
              ModifyKL = yes  # Modify KL using CL, EC or ESP if found?
        simulation W200R0 -> /simulations/Monocultures/SoilWat/2003/W0R15
          area paddock -> /simulations/Monocultures/SoilWat/2003/W0R15/paddock
            outputfile: filename=W200R0.out; title=W200R0
              variables
                variable:
                  day
                  year
                  dd/mm/yyyy as date
                  height as W_height
                  lai as W_lai
                  LeafNumber as W_LeafNumber
                  LeafNumberDead as W_LeafNumberDead
                  biomass as W_biomass
                  LeafLiveWt as W_LeafLiveWt
                  StemLiveWt as W_StemLiveWt
                  GrainWt as W_GrainWt
                  yield as W_yield
                  green_biomass as W_green_biomass
              events Reporting Frequency -> /simulations/Monocultures/SoilWat/2003/W0R15/paddock/outputfile/Reporting Frequency
            folder Manager folder -> /simulations/Monocultures/SoilWat/2003/W0R15/paddock/Manager folder
              manager Harvesting rule
                # Harvesting criteria
                crop = wheat  # Enter name of crop to harvest when ripe
                on end_of_day:
                script: same as in Mixtures.SWIM.2003.W100R15SWIM.paddock.Manager folder.Harvesting radish
              operations Operations Schedule: same as Monocultures.SWIM.2003.W200R0SWIM.paddock.Manager folder.Operations Schedule
            outputfile stress: filename=W200R0 stress.out; title=W200R0 stress
              variables -> /simulations/Monocultures/SoilWat/2003/W0R15/paddock/stress/Variables
              events Reporting Frequency -> /simulations/Monocultures/SoilWat/2003/W0R15/paddock/stress/Reporting Frequency
            wheat
              ModifyKL = yes  # Modify KL using CL, EC or ESP if found?
        simulation W400R0 -> /simulations/Monocultures/SoilWat/2003/W0R15
          area paddock -> /simulations/Monocultures/SoilWat/2003/W0R15/paddock
            outputfile: filename=W400R0.out; title=W400R0
              variables
                variable:
                  day
                  year
                  dd/mm/yyyy as date
                  height as W_height
                  lai as W_lai
                  LeafNumber as W_LeafNumber
                  LeafNumberDead as W_LeafNumberDead
                  biomass as W_biomass
                  LeafLiveWt as W_LeafLiveWt
                  StemLiveWt as W_StemLiveWt
                  GrainWt as W_GrainWt
                  yield as W_yield
                  green_biomass as W_green_biomass
              events Reporting Frequency -> /simulations/Monocultures/SoilWat/2003/W0R15/paddock/outputfile/Reporting Frequency
            folder Manager folder -> /simulations/Monocultures/SoilWat/2003/W0R15/paddock/Manager folder
              manager Harvesting rule
                # Harvesting criteria
                crop = wheat  # Enter name of crop to harvest when ripe
                on end_of_day:
                script: same as in Mixtures.SWIM.2003.W100R15SWIM.paddock.Manager folder.Harvesting radish
              operations Operations Schedule: same as Monocultures.SWIM.2003.W400R0SWIM.paddock.Manager folder.Operations Schedule
            outputfile stress: filename=W400R0 stress.out; title=W400R0 stress
              variables -> /simulations/Monocultures/SoilWat/2003/W0R15/paddock/stress/Variables
              events Reporting Frequency -> /simulations/Monocultures/SoilWat/2003/W0R15/paddock/stress/Reporting Frequency
            wheat
              ModifyKL = yes  # Modify KL using CL, EC or ESP if found?
      folder 2004
        simulation 84W0R15Ry0
          metfile met: filename=Roseworthy.met
          clock
            start_date = 16/06/2004  # Enter the start date of the simulation
            end_date = 31/12/2004  # Enter the end date of the simulation
          summaryfile
          area paddock
            surfaceom surface organic matter
              PoolName = wheat  # Organic Matter pool name
              type = wheat  # Organic Matter type
              mass = 1000  # Initial surface residue (kg/ha)
              cnr = 80  # C:N ratio of initial residue
              standing_fraction = 0  # Fraction of residue standing
            fertiliser
            outputfile: filename=84W0R15Ry0.out; title=84W0R15Ry0
              variables
                variable:
                  day
                  year
                  dd/mm/yyyy as date
                  height as R_height
                  lai as R_lai
                  LeafNumber as R_LeafNumber
                  LeafNumberDead as R_LeafNumberDead
                  biomass as R_biomass
                  LeafLiveWt as R_LeafLiveWt
                  StemLiveWt as R_StemLiveWt
                  GrainWt as R_GrainWt
                  yield as R_yield
                  green_biomass as R_green_biomass
              events Reporting Frequency: event=daily
            folder Manager folder: same as Monocultures.SWIM.2004.84W0R15Ry0SWIM.paddock.Manager folder
            Raphanus_raphanistrum
            outputfile stress: filename=84W0R15Ry0 stress.out; title=84W0R15Ry0 stress
              variables
                variables: day, year, dd/mm/yyyy as date, NStressExpansion, NStressGrain, NStressPheno, NStressPhoto, WaterStressExpansion, WaterStressFixation, WaterStressPheno, WaterStressPhoto, sw, esw
              events Reporting Frequency: event=daily
            Soil Buckby (Roseworthy)1: same as Monocultures.SoilWat.2003.W0R15.paddock.Buckby (Roseworthy)
        simulation 84W0R30Ry0 -> /simulations/Monocultures/SoilWat/2004/84W0R15Ry0
          area paddock -> /simulations/Monocultures/SoilWat/2004/84W0R15Ry0/paddock
            outputfile: filename=84W0R30Ry0.out; title=84W0R30Ry0
              variables -> /simulations/Monocultures/SoilWat/2004/84W0R15Ry0/paddock/outputfile/Variables
              events Reporting Frequency -> /simulations/Monocultures/SoilWat/2004/84W0R15Ry0/paddock/outputfile/Reporting Frequency
            folder Manager folder -> /simulations/Monocultures/SoilWat/2004/84W0R15Ry0/paddock/Manager folder
              operations Operations Schedule: same as Monocultures.SWIM.2004.84W0R30Ry0SWIM.paddock.Manager folder.Operations Schedule
            outputfile stress: filename=84W0R30Ry0 stress.out; title=84W0R30Ry0 stress
              variables -> /simulations/Monocultures/SoilWat/2004/84W0R15Ry0/paddock/stress/Variables
              events Reporting Frequency -> /simulations/Monocultures/SoilWat/2004/84W0R15Ry0/paddock/stress/Reporting Frequency
            Soil Buckby (Roseworthy): same as Monocultures.SoilWat.2003.W0R15.paddock.Buckby (Roseworthy)
        simulation 84W0R60Ry0 -> /simulations/Monocultures/SoilWat/2004/84W0R15Ry0
          area paddock -> /simulations/Monocultures/SoilWat/2004/84W0R15Ry0/paddock
            outputfile: filename=84W0R60Ry0.out; title=84W0R60Ry0
              variables -> /simulations/Monocultures/SoilWat/2004/84W0R15Ry0/paddock/outputfile/Variables
              events Reporting Frequency -> /simulations/Monocultures/SoilWat/2004/84W0R15Ry0/paddock/outputfile/Reporting Frequency
            folder Manager folder -> /simulations/Monocultures/SoilWat/2004/84W0R15Ry0/paddock/Manager folder
              operations Operations Schedule: same as Monocultures.SWIM.2004.84W0R60Ry0SWIM.paddock.Manager folder.Operations Schedule
            outputfile stress: filename=84W0R60Ry0 stress.out; title=84W0R60Ry0 stress
              variables -> /simulations/Monocultures/SoilWat/2004/84W0R15Ry0/paddock/stress/Variables
              events Reporting Frequency -> /simulations/Monocultures/SoilWat/2004/84W0R15Ry0/paddock/stress/Reporting Frequency
            Soil Buckby (Roseworthy): same as Monocultures.SoilWat.2003.W0R15.paddock.Buckby (Roseworthy)
        simulation 84W100R0Ry0 -> /simulations/Monocultures/SoilWat/2004/84W0R15Ry0
          area paddock -> /simulations/Monocultures/SoilWat/2004/84W0R15Ry0/paddock
            outputfile: filename=84W100R0Ry0.out; title=84W100R0Ry0
              variables
                variable:
                  day
                  year
                  dd/mm/yyyy as date
                  height as W_height
                  lai as W_lai
                  LeafNumber as W_LeafNumber
                  LeafNumberDead as W_LeafNumberDead
                  biomass as W_biomass
                  LeafLiveWt as W_LeafLiveWt
                  StemLiveWt as W_StemLiveWt
                  GrainWt as W_GrainWt
                  yield as W_yield
                  green_biomass as W_green_biomass
              events Reporting Frequency -> /simulations/Monocultures/SoilWat/2004/84W0R15Ry0/paddock/outputfile/Reporting Frequency
            folder Manager folder -> /simulations/Monocultures/SoilWat/2004/84W0R15Ry0/paddock/Manager folder
              manager Harvesting rule
                # Harvesting criteria
                crop = wheat  # Enter name of crop to harvest when ripe
                on end_of_day:
                script: same as in Mixtures.SWIM.2003.W100R15SWIM.paddock.Manager folder.Harvesting radish
              operations Operations Schedule: same as Monocultures.SWIM.2004.84W100R0Ry0SWIM.paddock.Manager folder.Operations Schedule
            outputfile stress: filename=84W100R0Ry0 stress.out; title=84W100R0Ry0 stress
              variables -> /simulations/Monocultures/SoilWat/2004/84W0R15Ry0/paddock/stress/Variables
              events Reporting Frequency -> /simulations/Monocultures/SoilWat/2004/84W0R15Ry0/paddock/stress/Reporting Frequency
            wheat
              ModifyKL = yes  # Modify KL using CL, EC or ESP if found?
        simulation 84W200R0Ry0 -> /simulations/Monocultures/SoilWat/2004/84W0R15Ry0
          area paddock -> /simulations/Monocultures/SoilWat/2004/84W0R15Ry0/paddock
            outputfile: filename=84W200R0Ry0.out; title=84W200R0Ry0
              variables
                variable:
                  day
                  year
                  dd/mm/yyyy as date
                  height as W_height
                  lai as W_lai
                  LeafNumber as W_LeafNumber
                  LeafNumberDead as W_LeafNumberDead
                  biomass as W_biomass
                  LeafLiveWt as W_LeafLiveWt
                  StemLiveWt as W_StemLiveWt
                  GrainWt as W_GrainWt
                  yield as W_yield
                  green_biomass as W_green_biomass
              events Reporting Frequency -> /simulations/Monocultures/SoilWat/2004/84W0R15Ry0/paddock/outputfile/Reporting Frequency
            folder Manager folder -> /simulations/Monocultures/SoilWat/2004/84W0R15Ry0/paddock/Manager folder
              manager Harvesting rule
                # Harvesting criteria
                crop = wheat  # Enter name of crop to harvest when ripe
                on end_of_day:
                script: same as in Mixtures.SWIM.2003.W100R15SWIM.paddock.Manager folder.Harvesting radish
              operations Operations Schedule: same as Monocultures.SWIM.2004.84W200R0Ry0SWIM.paddock.Manager folder.Operations Schedule
            outputfile stress: filename=84W200R0Ry0 stress.out; title=84W200R0Ry0 stress
              variables -> /simulations/Monocultures/SoilWat/2004/84W0R15Ry0/paddock/stress/Variables
              events Reporting Frequency -> /simulations/Monocultures/SoilWat/2004/84W0R15Ry0/paddock/stress/Reporting Frequency
            wheat
              ModifyKL = yes  # Modify KL using CL, EC or ESP if found?
        simulation 84W400R0Ry0 -> /simulations/Monocultures/SoilWat/2004/84W0R15Ry0
          area paddock -> /simulations/Monocultures/SoilWat/2004/84W0R15Ry0/paddock
            outputfile: filename=84W400R0Ry0.out; title=84W400R0Ry0
              variables
                variable:
                  day
                  year
                  dd/mm/yyyy as date
                  height as W_height
                  lai as W_lai
                  LeafNumber as W_LeafNumber
                  LeafNumberDead as W_LeafNumberDead
                  biomass as W_biomass
                  LeafLiveWt as W_LeafLiveWt
                  StemLiveWt as W_StemLiveWt
                  GrainWt as W_GrainWt
                  yield as W_yield
                  green_biomass as W_green_biomass
              events Reporting Frequency -> /simulations/Monocultures/SoilWat/2004/84W0R15Ry0/paddock/outputfile/Reporting Frequency
            folder Manager folder -> /simulations/Monocultures/SoilWat/2004/84W0R15Ry0/paddock/Manager folder
              manager Harvesting rule
                # Harvesting criteria
                crop = wheat  # Enter name of crop to harvest when ripe
                on end_of_day:
                script: same as in Mixtures.SWIM.2003.W100R15SWIM.paddock.Manager folder.Harvesting radish
              operations Operations Schedule: same as Monocultures.SWIM.2004.84W400R0Ry0SWIM.paddock.Manager folder.Operations Schedule
            outputfile stress: filename=84W400R0Ry0 stress.out; title=84W400R0Ry0 stress
              variables -> /simulations/Monocultures/SoilWat/2004/84W0R15Ry0/paddock/stress/Variables
              events Reporting Frequency -> /simulations/Monocultures/SoilWat/2004/84W0R15Ry0/paddock/stress/Reporting Frequency
            wheat
              ModifyKL = yes  # Modify KL using CL, EC or ESP if found?
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