folder simulations: version=27
  simulation raphanus_raphanistrum_15
    metfile met: filename=Roseworthy.met
    clock
      start_date = 09/06/2003  # Enter the start date of the simulation
      end_date = 31/12/2003  # Enter the end date of the simulation
    summaryfile: filename=Continuous Wheat Simulation.sum
    area paddock
      raphanus_raphanistrum2
      surfaceom surface organic matter
        PoolName = wheat  # Organic Matter pool name
        type = wheat  # Organic Matter type
        mass = 1000  # Initial surface residue (kg/ha)
        cnr = 80  # C:N ratio of initial residue
        standing_fraction = 0  # Fraction of residue standing
      fertiliser
      outputfile
        variables
          variables: dd/mm/yyyy as Date, height, esw, abovegroundwt, Leaflivewt, StemLiveWt, LeafLAI, StageCodeValue, LeafFullyExpandedNodeNo, PhenologyCurrentStageName, PhenologyCurrentPhaseName, StageCodeValue
        events Reporting Frequency: event=daily
      soil Buckby (Roseworthy): Country=Australia; Site=Roseworthy; Region=Mid North; State=South Australia
        SoilType = Red Brown Earth  # Classification
        NearestTown = Roseworthy
        ApsoilNumber = 300
        Latitude = -34.5  # Latitude (WGS84)
        Longitude = 138.686  # Longitude (WGS84)
        LocationAccuracy = +-20m
        DataSource = Characterisation 2005 by University of Adelaide, CSIRO Sustainable Ecosystems and DWLBC. Measurement site located adjacent to site described by Soil and Land Information Group, Department of Water, Land and Biodiversity Conservation, South Australia.
        Comments = Soil naming structure: \soils\Australia\South Australia\Region\Classification (Location APSoil No). LB code: RWN3; Low-moderate clay duplex soil with moderate CEC, moderate-high bulk density.Texture change about 10cm. Slaking or dispersion likely in the l
        Water
          Layer:
            Thickness (mm)  BD (g/cc)  Airdry (mm/mm)  LL15 (mm/mm)  DUL (mm/mm)  SAT (mm/mm)
            200             1.33       0.05            0.104         0.3          0.35
            200             1.22       0.05            0.104         0.3          0.35
            200             1.33       0.09            0.115         0.3          0.35
            200             1.38       0.11            0.146         0.3          0.35
            200             1.44       0.12            0.178         0.3          0.35
            200             1.53       0.13            0.202         0.336        0.38
            200             1.47       0.14            0.257         0.358        0.41
            200             1.49       0.15            0.318         0.387        0.41
            200             1.52       0.16            0.354         0.4          0.41
          SoilCrop wheat
            Layer:
              Thickness (mm)  ll (mm/mm)  kl (/day)  xf (0-1)
              200             0.104       0.06       1
              200             0.104       0.06       1
              200             0.12        0.06       1
              200             0.16        0.06       1
              200             0.19        0.4        1
              200             0.25        0.4        1
              200             0.358       0.2        1
              200             0.387       0.2        1
              200             0.4         0.2        1
          SoilCrop raphanus_raphanistrum
            Layer:
              Thickness (mm)  ll (mm/mm)  kl (/day)  xf (0-1)
              200             0.104       0.06       1
              200             0.128       0.06       1
              200             0.18        0.06       1
              200             0.22        0.06       1
              200             0.262       0.06       1
              200             0.336       0.06       1
              200             0.358       0.04       1
              200             0.387       0.04       1
              200             0.4         0.04       1
          SoilCrop peas
            Layer:
              Thickness (mm)  ll (mm/mm)  kl (/day)  xf (0-1)
              150             0.07        0.06       1
              150             0.22        0.06       1
              300             0.22        0.06       1
              300             0.28        0.06       1
              300             0.27        0.06       0.4
              300             0.23        0.06       0.32
          SoilCrop raphanus_raphanistrum2: same as raphanus_raphanistrum_15.paddock.Buckby (Roseworthy).Water.raphanus_raphanistrum
        SoilWat
          Layer:
            Thickness (mm)  SWCON (0-1)
            200             0.2
            200             0.2
            200             0.2
            200             0.2
            200             0.2
            200             0.2
            200             0.2
            200             0.2
            200             0.2
          SummerCona = 3.5
          SummerU = 6
          SummerDate = 1-Nov
          WinterCona = 2.5
          WinterU = 4
          WinterDate = 1-Apr
          DiffusConst = 88
          DiffusSlope = 35.4
          Salb = 0.13
          Cn2Bare = 80
          CnRed = 20
          CnCov = 0.8
        SoilOrganicMatter
          Layer:
            Thickness (mm)  OC (Walkley Black %)  FBIOM (0-1)  FINERT (0-1)
            200             1.42                  0.035        0.3
            200             0.66                  0.025        0.5
            200             0.36                  0.015        0.6
            200             0.29                  0.01         0.75
            200             0.26                  0.01         0.9
            200             0.21                  0.01         0.99
            200             0.12                  0.01         0.99
            200             0.1                   0.01         0.99
            200             0.07                  0.01         0.99
          RootCn = 20
          RootWt = 1000
          SoilCn = 24.7
          EnrACoeff = 7.4
          EnrBCoeff = 0.2
        Analysis
          Layer:
            Thickness (mm)  Rocks (%)  Texture                EC (1:5 dS/m)  PH (1:5 water)  CL (mg/kg)  CEC (cmol+/kg)  Ca (cmol+/kg)  Mg (cmol+/kg)  Na (cmol+/kg)  K (cmol+/kg)  ESP (%)  ParticleSizeSand (%)  ParticleSizeSilt (%)  ParticleSizeClay (%)
            150             0          Sandy loam             0.1            7.8             21          13.7            9.2            3.3            0.5            0.7           3.64964  73                    4                     22
            150             0          Light sandy clay loam  0.2            8.3             28          25.7            16.7           7.1            1.2            0.7           4.66926  44                    4                     52
            300             0          Medium clay            0.2            9.1             66          23.6            13.8           7.2            2              0.6           8.47458  39                    8                     53
            300             0          Medium clay            0.5            9.9             250         25              8.5            8.9            6.9            0.7           27.6     39                    8                     52
            300             0          Medium clay            0.9            9.7             510         26.1            5.7            9.6            9.8            1             37.5479  48                    7                     45
            300             0          Medium clay            1              9.5             736         24.8            3.8            9.8            10.2           1             41.129   51                    5                     43
        InitWater: RelativeTo=raphanus_raphanistrum
          PercentMethod: Percent=1; Distributed=Filled from top
        Sample Initial nitrogen
          Layer:
            Thickness  no3 (kg/ha)  nh4 (kg/ha)
            200        30           5
            1800       20           1
      folder Manager folder
        manager Harvesting rule
          # Harvesting criteria
          crop = raphanus_raphanistrum2  # Enter name of crop to harvest when ripe
          on end_of_day:
```
           if [crop].StageName = 'harvest_ripe' or [crop].plant_status = 'dead' then
              [crop]  harvest
              [crop]  end_crop
           endif
```
        operations Operations Schedule
          10/06/2003  fertiliser apply amount = 123 (kg/ha), depth = 50 (mm), type = urea()
          10/06/2003  fertiliser apply amount = 19 (kg/ha), depth = 50 (mm), type = nh4_n()
          10/06/2003  raphanus_raphanistrum2  sow population =15, depth = 20, cultivar = radish1, MaxCover = 1.0, BudNumber = 1, row_spacing = 250, crop_class = plant
      outputfile Daily: filename=Lawes06 Planting1Wet.out
        variables My Variables
          variable:
            dd/mm/yyyy as Date
            day
            DAS
            PhenologyCurrentPhaseName
            PhenologyThermalTimeValue
            AboveGroundWt
            LeafCohortNo
            LeafLAI
            LeafTranspiration
            LeafWaterDemand
            RootWaterSupply
            eo
            es
            TotalET
            evap
            WaterSupplyDemandRatio
            PhenologyThermalTimeValue
            LeafPhotosynthesisFtValue
            LeafPhotosynthesisFvpdValue
            LeafFinalNodeNo
            LeafDeadNodeNo
            LeafFullyExpandedNodeNo
            sw_dep()
            SW60
            LeafLiveWt
            StemLiveWt
            sw
            no3
            RootDepth
            StageCodeValue
            PhenologyVernalisationCumulativeVD
            PhenologyJuvenileCumulativeTT
            StageCodeValue
            LeafDMSupply
            FloretLiveWt
            LeafSLAcheck
            Height
            LeafExpansionStressValue
            LeafFw
            LeafSpecificArea
            Interception
            peta
            petr
        events My Variables Events: event=Daily
  simulation Lawes06P1Wet
    clock
      start_date = 29/03/2003  # Select the start date of the simulation
      end_date = 03/07/2003  # Select the end date of the simulation
    log
    summaryfile: filename=Lawes06.sum
    metfile met: filename=Roseworthy.met
    area Paddock
      raphanus_raphanistrum2
      micromet
        soilalbedo = 0.23
        a_interception = 0
        b_interception = 0
        c_interception = 0.1
        d_interception = 0
      folder Manager folder
        manager Sow on a fixed date
          # Sowing criteria
          date = 4-Apr-2003  # Enter sowing date (dd-mmm)
          # Sowing parameters
          crop = raphanus_raphanistrum2  # Enter name of crop to sow
          density = 4  # Enter sowing density (plants/m2)
          depth = 50  # Enter sowing depth (mm)
          cultivar = radish1  # Enter cultivar
          row_spacing = 600  # Enter row spacing (mm)
          class = transplant  # Enter Crop Class
          on start_of_day:
```
      if (today = date('[date]') then
                    [crop] sow population =[density], depth = [depth], cultivar = [cultivar], MaxCover = 1.0, BudNumber = 1, row_spacing = [row_spacing], crop_class = [class]
        endif
```
        operations LeafHarvests
          24-Apr-2006  LeafOutput do_output
          10-May-2006  LeafOutput do_output
          23-May-2006  LeafOutput do_output
          22-Jun-2006  LeafOutput do_output
        operations
          5/04/2006  irrigation apply amount = 45
          6/04/2006  irrigation apply amount = 0
          7/04/2006  irrigation apply amount = 0
          8/04/2006  irrigation apply amount = 31
          9/04/2006  irrigation apply amount = 0
          10/04/2006  irrigation apply amount = 0
          11/04/2006  irrigation apply amount = 8.03775459513155
          12/04/2006  irrigation apply amount = 0
          13/04/2006  irrigation apply amount = 0
          14/04/2006  irrigation apply amount = 0
          15/04/2006  irrigation apply amount = 5.06706408345752
          16/04/2006  irrigation apply amount = 0
          17/04/2006  irrigation apply amount = 0
          18/04/2006  irrigation apply amount = 7.38201689021368
          19/04/2006  irrigation apply amount = 0
          20/04/2006  irrigation apply amount = 0
          21/04/2006  irrigation apply amount = 0
          22/04/2006  irrigation apply amount = 7.83904619970193
          23/04/2006  irrigation apply amount = 0
          24/04/2006  irrigation apply amount = 0
          25/04/2006  irrigation apply amount = 6.29316420014084
          26/04/2006  irrigation apply amount = 0
          27/04/2006  irrigation apply amount = 0
          28/04/2006  irrigation apply amount = 0
          29/04/2006  irrigation apply amount = 4.03100775193798
          30/04/2006  irrigation apply amount = 0
          1/05/2006  irrigation apply amount = 0
          2/05/2006  irrigation apply amount = 6.26924987580732
          3/05/2006  irrigation apply amount = 0
          4/05/2006  irrigation apply amount = 2.81888653981678
          5/05/2006  irrigation apply amount = 0
          6/05/2006  irrigation apply amount = 6.28611698379147
          7/05/2006  irrigation apply amount = 0
          8/05/2006  irrigation apply amount = 0
          9/05/2006  irrigation apply amount = 6.2649753347427
          10/05/2006  irrigation apply amount = 0
          11/05/2006  irrigation apply amount = 6.35658914728682
          12/05/2006  irrigation apply amount = 0
          13/05/2006  irrigation apply amount = 8.21095571095574
          14/05/2006  irrigation apply amount = 0
          15/05/2006  irrigation apply amount = 0
          16/05/2006  irrigation apply amount = 6.04073522106314
          17/05/2006  irrigation apply amount = 0
          18/05/2006  irrigation apply amount = 0
          19/05/2006  irrigation apply amount = 0
          20/05/2006  irrigation apply amount = 6.42191142191142
          21/05/2006  irrigation apply amount = 0
          22/05/2006  irrigation apply amount = 0
          23/05/2006  irrigation apply amount = 8.29607550919024
          24/05/2006  irrigation apply amount = 0
          25/05/2006  irrigation apply amount = 0
          26/05/2006  irrigation apply amount = 0
          27/05/2006  irrigation apply amount = 8.11227024341781
          28/05/2006  irrigation apply amount = 0
          29/05/2006  irrigation apply amount = 0
          30/05/2006  irrigation apply amount = 6.4977645305515
          31/05/2006  irrigation apply amount = 0
          1/06/2006  irrigation apply amount = 0
          2/06/2006  irrigation apply amount = 0
          3/06/2006  irrigation apply amount = 0
          4/06/2006  irrigation apply amount = 9.72180824639839
          5/06/2006  irrigation apply amount = 0
          6/06/2006  irrigation apply amount = 3.12468951813224
          7/06/2006  irrigation apply amount = 0
          8/06/2006  irrigation apply amount = 6.45802285146548
          9/06/2006  irrigation apply amount = 0
          10/06/2006  irrigation apply amount = 6.60705414803763
          11/06/2006  irrigation apply amount = 0
          12/06/2006  irrigation apply amount = 0
          13/06/2006  irrigation apply amount = 6.63189269746643
          14/06/2006  irrigation apply amount = 0
          15/06/2006  irrigation apply amount = 0
          16/06/2006  irrigation apply amount = 0
          17/06/2006  irrigation apply amount = 8.37059115747631
          18/06/2006  irrigation apply amount = 0
          19/06/2006  irrigation apply amount = 0
          20/06/2006  irrigation apply amount = 0
          21/06/2006  irrigation apply amount = 0
          22/06/2006  irrigation apply amount = 3.38301043219085
          22/06/2006  raphanus_raphanistrum2 harvest
          22/06/2006  raphanus_raphanistrum2 EndCrop
          24/06/2006  irrigation apply amount = 6.78589170392443
        manager Calculations
          on init:
```
TotalET = 0.0
DAS = 0
SW60 = 0
```
          on end_of_day:
```
TotalET = raphanus_raphanistrum2.LeafTranspiration + es
!TotalET = es

if raphanus_raphanistrum2.LeafLAI > 0 then
  DAS = DAS + 1
endif

SW60 = sw_dep(1) + sw_dep(2) + sw_dep(3)
```
      fertiliser
      surfaceom surface organic matter
        PoolName = wheat  # Organic Matter pool name
        type = wheat  # Organic Matter type
        mass = 1000  # Initial surface residue (kg/ha)
        cnr = 80  # C:N ration of initial residue
        standing_fraction = 0  # Fraction of residue standing
      outputfile Daily: filename=Lawes06 Planting1Wet.out
        variables My Variables
          variable:
            dd/mm/yyyy as Date
            day
            DAS
            PhenologyCurrentPhaseName
            PhenologyThermalTimeValue
            AboveGroundWt
            LeafCohortNo
            LeafLAI
            LeafTranspiration
            LeafWaterDemand
            RootWaterSupply
            eo
            es
            TotalET
            evap
            WaterSupplyDemandRatio
            PhenologyThermalTimeValue
            LeafPhotosynthesisFtValue
            LeafPhotosynthesisFvpdValue
            Irrigation.irrigation
            LeafFinalNodeNo
            LeafDeadNodeNo
            LeafFullyExpandedNodeNo
            sw_dep()
            SW60
            LeafLiveWt
            StemLiveWt
            sw
            no3
            RootDepth
            StageCodeValue
            PhenologyVernalisationCumulativeVD
            PhenologyJuvenileCumulativeTT
            StageCodeValue
            LeafDMSupply
            FloretLiveWt
            LeafSLAcheck
            Height
            LeafExpansionStressValue
            LeafFw
            LeafSpecificArea
            Interception
            peta
            petr
        events My Variables Events: event=Daily
      Soil DPIGatton: Site=UQ, Lawes; Region=Lockyer; irrigation_layer=2
        SoilType = Prarie  # Classification
        NearestTown = Gatton, Q 4343
        NaturalVegetation = Blue Gum, Moreton Bay Ash, Tea Tree
        Comment = oc and ph estimated  # Comments
        Water
          Layer:
            Thickness (mm)  BD (g/cc)  AirDry (mm/mm)  LL15 (mm/mm)  DUL (mm/mm)  SAT (mm/mm)
            150             1.26       0.14            0.2           0.35         0.38
            150             1.45       0.2             0.21          0.38         0.41
            300             1.27       0.2             0.21          0.38         0.41
            300             1.33       0.2             0.21          0.44         0.47
            300             1.41       0.2             0.21          0.4          0.43
          SoilCrop SweetCorn
            Layer:
              Thickness (mm)  LL (mm/mm)  KL (/day)  XF (0-1)
              150             0.140       0.200      1.000
              150             0.210       0.080      0.300
              300             0.300       0.080      1.000
              300             0.310       0.040      1.000
              300             0.270       0.040      1.000
          SoilCrop Broccoli
            Layer:
              Thickness (mm)  LL (mm/mm)  KL (/day)  XF (0-1)
              150             0.2         0.12       1
              150             0.21        0.08       1
              300             0.25        0.06       1
              300             0.26        0.02       1
              300             0.26        0.02       0
          SoilCrop raphanus_raphanistrum2: same as Lawes06P1Wet.Paddock.DPIGatton.Water.Broccoli
        SoilWat: SummerCona=5; SummerU=5; SummerDate=1-sep; WinterCona=2; WinterU=4; WinterDate=1-may; DiffusConst=40; DiffusSlope=16; Salb=0.13; CN2Bare=95; CNRed=20; CNCov=0.8
          Layer:
            Thickness (mm)  SWCON (0-1)
            150             0.6
            150             0.6
            300             0.6
            300             0.6
            300             0.6
        SoilOrganicMatter: RootCN=40; RootWT=200; SoilCN=12.5; EnrACoeff=7.4; EnrBCoeff=0.2
          Layer:
            Thickness (mm)  OC (Total %)  FBiom (0-1)  FInert (0-1)
            150             1.250         0.030        0.400
            150             1.060         0.020        0.600
            300             0.810         0.010        0.800
            300             0.700         0.010        0.900
            300             0.700         0.010        0.950
        Analysis
          Layer:
            Thickness (mm)  PH (1:5 water)
            150             7
            150             7
            300             7
            300             7
            300             7
        Sample Initial nitrogen
          Layer:
            Thickness (mm)  NO3 (ppm)  NH4 (ppm)
            150             52.9101    52.9102
            150             9.2        0.10002
            300             11.8       0.10002
            300             11.2       0.10002
            300             10.3       0.10002
        Sample Initial water
          Layer:
            Thickness (mm)  SW (mm/mm)
            150             0.264
            150             0.344
            300             0.362
            300             0.42
            300             0.37
      irrigation
        automatic_irrigation = off  # switch
        asw_depth = 600  # Depth to which ASW is calculated. (mm)
        crit_fr_asw = 0.5  # Fraction of ASW below which irrigation is applied (0-1.0)
        irrigation_efficiency = 1  # Efficiency of the irrigation. (0-1.0)
        default_no3_conc = 0  # Nitrate concentration (ppm N)
        default_nh4_conc = 0  # Ammonium concentration (ppm N)
        default_cl_conc = 0  # Chloride concentration (ppm Cl)
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