folder Simulations: version=32
  simulation MelliodoraW30
    clock
      start_date = 01/01/1889  # Select the start date of the simulation
      end_date = 04/09/2006  # Select the end date of the simulation
    summaryfile
    metfile met -> /Simulations/shared/met
    area paddock
      operations
        21-feb  Emelliodora establish plants = 62500, init_section = seedling
        21-feb  'Wellcamp Water' reset
        21-feb  Irrigation apply amount = 30
        21-aug  emelliodora kill
      outputfile -> /Simulations/shared/outputfile: filename=MelliodoraW30.out; title=MelliodoraW30
        variables -> /Simulations/shared/outputfile/Variables
        events Reporting Frequency -> /Simulations/shared/outputfile/Reporting Frequency
      irrigation
        automatic_irrigation = off
        asw_depth = 600.0  # Depth to which ASW is calculated. (mm)
        crit_fr_asw = 0.5  # Fraction of ASW below which irrigation is applied (0-1.0)
        irrigation_efficiency = 1.0  # Efficiency of the irrigation. (0-1.0)
        default_no3_conc = 0.0  # Nitrate concentration (ppm N)
        default_nh4_conc = 0.0  # Ammonium concentration (ppm N)
        default_cl_conc = 0.0  # Chloride concentration (ppm Cl)
      surfaceom surface organic matter -> /Simulations/shared/surface organic matter
      Emelliodora -> /Simulations/shared/Emelliodora
      manager OutputCalculator -> /Simulations/shared/OutputCalculator
      micromet: soilalbedo=0.13; a_interception=0.0; b_interception=0.0; c_interception=0.0; d_interception=0.0
      soil WellCamp -> /Simulations/shared/WellCamp
  simulation MelliodoraW60
    clock
      start_date = 01/01/1889  # Select the start date of the simulation
      end_date = 04/09/2006  # Select the end date of the simulation
    summaryfile
    metfile met -> /Simulations/shared/met
    area paddock
      operations
        21-feb  Emelliodora establish plants = 62500, init_section = seedling
        21-feb  'Wellcamp Water' reset
        21-feb  Irrigation apply amount = 60
        21-aug  emelliodora kill
      outputfile -> /Simulations/shared/outputfile: filename=MelliodoraW60.out; title=MelliodoraW60
        variables -> /Simulations/shared/outputfile/Variables
        events Reporting Frequency -> /Simulations/shared/outputfile/Reporting Frequency
      irrigation: same as MelliodoraW30.paddock.Irrigation
      surfaceom surface organic matter -> /Simulations/shared/surface organic matter
      Emelliodora -> /Simulations/shared/Emelliodora
      manager OutputCalculator -> /Simulations/shared/OutputCalculator
      micromet: soilalbedo=0.13; a_interception=0.0; b_interception=0.0; c_interception=0.0; d_interception=0.0
      soil WellCamp -> /Simulations/shared/WellCamp
  simulation MelliodoraW90
    clock
      start_date = 01/01/1889  # Select the start date of the simulation
      end_date = 04/09/2006  # Select the end date of the simulation
    summaryfile
    metfile met -> /Simulations/shared/met
    area paddock
      operations
        21-feb  Emelliodora establish plants = 62500, init_section = seedling
        21-feb  'Wellcamp Water' reset
        21-feb  Irrigation apply amount = 90
        21-aug  emelliodora kill
      outputfile -> /Simulations/shared/outputfile: filename=MelliodoraW90.out; title=MelliodoraW90
        variables -> /Simulations/shared/outputfile/Variables
        events Reporting Frequency -> /Simulations/shared/outputfile/Reporting Frequency
      irrigation: same as MelliodoraW30.paddock.Irrigation
      surfaceom surface organic matter -> /Simulations/shared/surface organic matter
      Emelliodora -> /Simulations/shared/Emelliodora
      manager OutputCalculator -> /Simulations/shared/OutputCalculator
      micromet: soilalbedo=0.13; a_interception=0.0; b_interception=0.0; c_interception=0.0; d_interception=0.0
      soil WellCamp -> /Simulations/shared/WellCamp
  folder shared
    outputfile: filename=.out
      variables
        variable:
          dd/mm/yyyy as Date  # Date (dd/mm/yyyy)
          day
          lai
          adm_green(1) as stem_wt
          foliage_mass as leaf_wt
          fw
          fn
          rain
          irrigation
          es
          sw
          sw_dep()
          ft
          plantleaf
          plantstem
          plantla
          plantbiomass
          swsi
          plants
          slai
          no3()
          nh4()
          root_depth
          rlv
          ep
          eo
          rtr
          sw150
          petr
          peta
          ffasw
          height
          ftcanopy
          sw_demand
          sw_supply
          runoff
          cum_stress
          esw
          fwcanopy
          ga
          biomass
          fvpd
      events Reporting Frequency: event=emelliodora.killing  # Melliodora Killing
    Emelliodora
    surfaceom surface organic matter
      PoolName = wheat  # Organic Matter pool name
      type = wheat  # Organic Matter type
      mass = 0.1  # Initial surface residue (kg/ha)
      cnr = 80.0  # C:N ratio of initial residue
      standing_fraction = 0.0  # Fraction of residue standing
    metfile met: filename=%apsim%\Tests\MetFiles\Dalby.met
    climatechange ShelterEffects
      maxtmodifier = 0  # Change in maximum temperature in degrees celsius
      mintmodifier = 0  # Change in minimum temperature in degrees celsius
      rainmodifier = 0  # Relative change in rainfall
      radiationmodifier = 0.82  # Relative change in radiation
      co2 = 350  # Atmospheric C02 concentration (ppm)
    manager OutputCalculator
      on init:
```
 
plantbiomass = 0 
plantleaf = 0
plantstem = 0
plantla = 0
SWSI = 0
nodes = 0
RTR = 0
sw150 = 0
windspeed = 5.55 ! (m/s) ! 20 km/h average at both 9am and 3pm
```
      on endofday:
```
if lai > 0 then
   plantbiomass = biomass/plants*1000
   plantleaf = foliage_mass/plants*1000
   plantstem = adm_green(1)/ plants*1000
   plantla = lai * 10000 / plants
   SWSI = SWSI + (1.0 - swdef_photo)
   RTR = ep / (eo * cover_green)
endif
  sw150 = sw_dep(1) + sw_dep(2) + sw_dep(3) + sw_dep(4) + sw_dep(5) + sw_dep(6)
  sw60 = sw_dep(1) + sw_dep(2) + sw_dep(3)
  ll60 = ll15_dep(1) + ll15_dep(2) + ll15_dep(3)
  dul60 = dul_dep(1) + dul_dep(2) + dul_dep(3)
```
    soil WellCamp: LocalName=Waco; Site=Jimbour; Region=South East Queensland
      ec=[0.84, 0.84, 0.84, 0.84]
      SoilType = Black Vertosol  # Soil description
      NearestTown = Jimbour, Q 4352
      NaturalVegetation = Grassland, mainly Qld bluegrass
      InitWater Initial water: RelativeTo=Emelliodora
        PercentMethod: Percent=0.00; Distributed=Filled from top
      Water
        Layer:
          Thickness (mm)  BD (g/cc)  AirDry (mm/mm)  LL15 (mm/mm)  DUL (mm/mm)  SAT (mm/mm)
          150             0.9        0.19            0.19          0.54         0.59
          150             1.01       0.25            0.32          0.52         0.58
          300             1.02       0.3             0.38          0.52         0.59
          300             1          0.25            0.3           0.48         0.53
          300             1.06       0.21            0.25          0.42         0.47
          300             1.14       0.21            0.28          0.4          0.45
          300             1.23       0.21            0.3           0.4          0.45
          300             1.23       0.21            0.3           0.4          0.45
          400             1.23       0.21            0.3           0.4          0.45
          500             1.23       0.21            0.3           0.4          0.45
          500             1.23       0.21            0.3           0.4          0.45
          500             1.23       0.21            0.3           0.4          0.45
        SoilCrop Emelliodora
          Layer:
            Thickness (mm)  LL (mm/mm)  KL (/day)  XF (0-1)
            150             0.19        0.013      0.21
            150             0.32        0.013      0.2
            300             0.38        0.017      1
            300             0.3         0.02       1
            300             0.25        0.025      1
            300             0.28        0.025      1
            300             0.3         0.025      1
            300             0.3         0.025      1
            400             0.3         0.025      1
            500             0.3         0.025      1
            500             0.3         0.025      0
            500             0.3         0.025      0
      SoilWat: SummerCona=5; SummerU=5; SummerDate=1-Nov; WinterCona=5; WinterU=5; WinterDate=1-Apr; DiffusConst=20; DiffusSlope=8; Salb=0.09; Cn2Bare=85; CnRed=0; CnCov=0.8
        Layer:
          Thickness (mm)  SWCON (0-1)
          150             0.3
          150             0.3
          300             0.3
          300             0.3
          300             0.3
          300             0.3
          300             0.3
          300             0.3
          400             0.3
          500             0.3
          500             0.3
          500             0.3
      SoilOrganicMatter: RootCn=40; RootWt=200; SoilCn=12.5; EnrACoeff=7.4; EnrBCoeff=0.2
        Layer:
          Thickness (mm)  OC (Total %)  FBiom (0-1)  FInert (0-1)
          150             1.04          0.025        0.4
          150             0.89          0.02         0.6
          300             0.89          0.015        0.8
          300             0.89          0.01         0.9
          300             0.77          0.01         0.95
          300             0.45          0.01         0.95
          300             0.45          0.01         0.95
          300             0.45          0.01         0.95
          400             0.45          0.01         0.95
          500             0.45          0.01         0.95
          500             0.45          0.01         0.95
          500             0.45          0.01         0.95
      Analysis
        Layer:
          Thickness (mm)  EC (1:5 dS/m)  PH (1:5 water)
          150             0.2            8.4
          150             0.25           8.8
          300             0.31           9
          300             0.4            9.2
          300             0.59           9.2
          300             0.84           9.1
          300             0.84           9.1
          300             0.84           9.1
          400             -              9.1
          500             -              9.1
          500             -              9.1
          500             -              9.1
      Sample Initial nitrogen
        Layer:
          Thickness (mm)  NO3 (ppm)  NH4 (ppm)
          150             6.503      0.599
          150             5          0.100
          300             5          0.100
          300             5          0.100
          300             5          0.100
          300             5          0.100
          300             5          0.100
          300             5          0.100
          400             5          0.100
          500             5          0.100
          500             5          0.100
          500             5          0.100
