folder LettuceSensibility: version=32
  simulation PatagoniaBaseline
    clock
      start_date = 1/01/1961  # Select the start date of the simulation
      end_date = 30/12/1990  # Select the end date of the simulation
    summaryfile
    metfile met: filename=UQ Gatton_historical.met
    area May1
      folder Manager folder
        manager Sow on a fixed date
          # Sowing criteria
          date = 1-may  # Enter sowing date (dd-mmm)
          # Sowing parameters
          crop = lettuce  # Enter name of crop to sow
          density = 6  # Enter sowing density (plants/m2)
          depth = 50  # Enter sowing depth (mm)
          cultivar = patagonia  # Enter cultivar
          row_spacing = 600  # Enter row spacing (mm)
          on start_of_day:
```
      if (today = date('[date]') then
                    [crop] sow plants =[density], sowing_depth = [depth], cultivar = [cultivar], row_spacing = [row_spacing]
        endif
```
        manager Harvest on a Growth Stage
          # Harvesting criteria
          stage = maturity  # Enter stage name
          # Harvesting parameters
          crop = lettuce  # Enter name of crop to sow
          on start_of_day:
```
        if ([crop].StageName = '[stage]') then
                    [crop] harvest
                    [crop] end_crop
        endif
```
      lettuce
      outputfile: filename=PatagoniaBaseline May1.out; title=PatagoniaBaseline May1
        variables
          variable:
            year  # Year
            day  # Day
            sowing_date  # Day number of sowing
            maturity_das  # Days from sowing to maturity
            Avmax  # Average Maxt in crop
            Avmin  # Average Mint in crop
        events Reporting Frequency: event=harvesting  # Day
      soil -> /LettuceSensibility/shared/Soil
        Sample Soil sample
          Layer:
            {Thickness (mm)=3000, NO3 (ppm)=0, NH4 (ppm)=0, SW (mm/mm)=0}
      tracker
        variable:
          average of maxt on start_of_day from sowing to now as AvMax  # Sum of rainfall from sowing to now
          average of mint on start_of_day from sowing to now as AvMin  # Sum of rainfall from sowing to now
    area May15
      folder Manager folder
        manager Sow on a fixed date
          # Sowing criteria
          date = 15-may  # Enter sowing date (dd-mmm)
          # Sowing parameters
          crop = lettuce  # Enter name of crop to sow
          density = 6  # Enter sowing density (plants/m2)
          depth = 50  # Enter sowing depth (mm)
          cultivar = patagonia  # Enter cultivar
          row_spacing = 600  # Enter row spacing (mm)
          on start_of_day:
          script: same as in PatagoniaBaseline.May1.Manager folder.Sow on a fixed date
        manager Harvest on a Growth Stage
          # Harvesting criteria
          stage = maturity  # Enter stage name
          # Harvesting parameters
          crop = lettuce  # Enter name of crop to sow
          on start_of_day:
```
        if ([crop].StageName = '[stage]') then
                    [crop] harvest
                    [crop] end_crop
        endif
```
      lettuce
      outputfile: filename=PatagoniaBaseline May15.out; title=PatagoniaBaseline May15
        variables
          variable:
            year  # Year
            day  # Day
            sowing_date  # Day number of sowing
            maturity_das  # Days from sowing to maturity
            Avmax  # Average Maxt in crop
            Avmin  # Average Mint in crop
        events Reporting Frequency: event=harvesting  # Day
      soil -> /LettuceSensibility/shared/Soil
        Sample Soil sample
          Layer:
            {Thickness (mm)=3000, NO3 (ppm)=0, NH4 (ppm)=0, SW (mm/mm)=0}
      tracker
        variable:
          average of maxt on start_of_day from sowing to now as AvMax  # Sum of rainfall from sowing to now
          average of mint on start_of_day from sowing to now as AvMin  # Sum of rainfall from sowing to now
    area jun1
      folder Manager folder
        manager Sow on a fixed date
          # Sowing criteria
          date = 1-jun  # Enter sowing date (dd-mmm)
          # Sowing parameters
          crop = lettuce  # Enter name of crop to sow
          density = 6  # Enter sowing density (plants/m2)
          depth = 50  # Enter sowing depth (mm)
          cultivar = patagonia  # Enter cultivar
          row_spacing = 600  # Enter row spacing (mm)
          on start_of_day:
          script: same as in PatagoniaBaseline.May1.Manager folder.Sow on a fixed date
        manager Harvest on a Growth Stage
          # Harvesting criteria
          stage = maturity  # Enter stage name
          # Harvesting parameters
          crop = lettuce  # Enter name of crop to sow
          on start_of_day:
```
        if ([crop].StageName = '[stage]') then
                    [crop] harvest
                    [crop] end_crop
        endif
```
      lettuce
      outputfile: filename=PatagoniaBaseline jun1.out; title=PatagoniaBaseline jun1
        variables
          variable:
            year  # Year
            day  # Day
            sowing_date  # Day number of sowing
            maturity_das  # Days from sowing to maturity
            Avmax  # Average Maxt in crop
            Avmin  # Average Mint in crop
        events Reporting Frequency: event=harvesting  # Day
      soil -> /LettuceSensibility/shared/Soil
        Sample Soil sample
          Layer:
            {Thickness (mm)=3000, NO3 (ppm)=0, NH4 (ppm)=0, SW (mm/mm)=0}
      tracker
        variable:
          average of maxt on start_of_day from sowing to now as AvMax  # Sum of rainfall from sowing to now
          average of mint on start_of_day from sowing to now as AvMin  # Sum of rainfall from sowing to now
    area jun15
      folder Manager folder
        manager Sow on a fixed date
          # Sowing criteria
          date = 15-jun  # Enter sowing date (dd-mmm)
          # Sowing parameters
          crop = lettuce  # Enter name of crop to sow
          density = 6  # Enter sowing density (plants/m2)
          depth = 50  # Enter sowing depth (mm)
          cultivar = patagonia  # Enter cultivar
          row_spacing = 600  # Enter row spacing (mm)
          on start_of_day:
          script: same as in PatagoniaBaseline.May1.Manager folder.Sow on a fixed date
        manager Harvest on a Growth Stage
          # Harvesting criteria
          stage = maturity  # Enter stage name
          # Harvesting parameters
          crop = lettuce  # Enter name of crop to sow
          on start_of_day:
```
        if ([crop].StageName = '[stage]') then
                    [crop] harvest
                    [crop] end_crop
        endif
```
      lettuce
      outputfile: filename=PatagoniaBaseline jun15.out; title=PatagoniaBaseline jun15
        variables
          variable:
            year  # Year
            day  # Day
            sowing_date  # Day number of sowing
            maturity_das  # Days from sowing to maturity
            Avmax  # Average Maxt in crop
            Avmin  # Average Mint in crop
        events Reporting Frequency: event=harvesting  # Day
      soil -> /LettuceSensibility/shared/Soil
        Sample Soil sample
          Layer:
            {Thickness (mm)=3000, NO3 (ppm)=0, NH4 (ppm)=0, SW (mm/mm)=0}
      tracker
        variable:
          average of maxt on start_of_day from sowing to now as AvMax  # Sum of rainfall from sowing to now
          average of mint on start_of_day from sowing to now as AvMin  # Sum of rainfall from sowing to now
    area jul1
      folder Manager folder
        manager Sow on a fixed date
          # Sowing criteria
          date = 1-jul  # Enter sowing date (dd-mmm)
          # Sowing parameters
          crop = lettuce  # Enter name of crop to sow
          density = 6  # Enter sowing density (plants/m2)
          depth = 50  # Enter sowing depth (mm)
          cultivar = patagonia  # Enter cultivar
          row_spacing = 600  # Enter row spacing (mm)
          on start_of_day:
          script: same as in PatagoniaBaseline.May1.Manager folder.Sow on a fixed date
        manager Harvest on a Growth Stage
          # Harvesting criteria
          stage = maturity  # Enter stage name
          # Harvesting parameters
          crop = lettuce  # Enter name of crop to sow
          on start_of_day:
```
        if ([crop].StageName = '[stage]') then
                    [crop] harvest
                    [crop] end_crop
        endif
```
      lettuce
      outputfile: filename=PatagoniaBaseline jul1.out; title=PatagoniaBaseline jul1
        variables
          variable:
            year  # Year
            day  # Day
            sowing_date  # Day number of sowing
            maturity_das  # Days from sowing to maturity
            Avmax  # Average Maxt in crop
            Avmin  # Average Mint in crop
        events Reporting Frequency: event=harvesting  # Day
      soil -> /LettuceSensibility/shared/Soil
        Sample Soil sample
          Layer:
            {Thickness (mm)=3000, NO3 (ppm)=0, NH4 (ppm)=0, SW (mm/mm)=0}
      tracker
        variable:
          average of maxt on start_of_day from sowing to now as AvMax  # Sum of rainfall from sowing to now
          average of mint on start_of_day from sowing to now as AvMin  # Sum of rainfall from sowing to now
  simulation Patagonia2020Low
    clock
      start_date = 1/01/1961  # Select the start date of the simulation
      end_date = 30/12/1990  # Select the end date of the simulation
    summaryfile
    metfile met: filename=Gatton_2020low.met
    area May1
      folder Manager folder: same as PatagoniaBaseline.May1.Manager folder
      lettuce
      outputfile: filename=Patagonia2020Low May1.out; title=Patagonia2020Low May1
        variables
          variable:
            year  # Year
            day  # Day
            sowing_date  # Day number of sowing
            maturity_das  # Days from sowing to maturity
            Avmax  # Average Maxt in crop
            Avmin  # Average Mint in crop
        events Reporting Frequency: event=harvesting  # Day
      soil -> /LettuceSensibility/shared/Soil
        Sample Soil sample
          Layer:
            {Thickness (mm)=3000, NO3 (ppm)=0, NH4 (ppm)=0, SW (mm/mm)=0}
      tracker
        variable:
          average of maxt on start_of_day from sowing to now as AvMax  # Sum of rainfall from sowing to now
          average of mint on start_of_day from sowing to now as AvMin  # Sum of rainfall from sowing to now
    area May15
      folder Manager folder: same as PatagoniaBaseline.May15.Manager folder
      lettuce
      outputfile: filename=Patagonia2020Low May15.out; title=Patagonia2020Low May15
        variables
          variable:
            year  # Year
            day  # Day
            sowing_date  # Day number of sowing
            maturity_das  # Days from sowing to maturity
            Avmax  # Average Maxt in crop
            Avmin  # Average Mint in crop
        events Reporting Frequency: event=harvesting  # Day
      soil -> /LettuceSensibility/shared/Soil
        Sample Soil sample
          Layer:
            {Thickness (mm)=3000, NO3 (ppm)=0, NH4 (ppm)=0, SW (mm/mm)=0}
      tracker
        variable:
          average of maxt on start_of_day from sowing to now as AvMax  # Sum of rainfall from sowing to now
          average of mint on start_of_day from sowing to now as AvMin  # Sum of rainfall from sowing to now
    area jun1
      folder Manager folder: same as PatagoniaBaseline.jun1.Manager folder
      lettuce
      outputfile: filename=Patagonia2020Low jun1.out; title=Patagonia2020Low jun1
        variables
          variable:
            year  # Year
            day  # Day
            sowing_date  # Day number of sowing
            maturity_das  # Days from sowing to maturity
            Avmax  # Average Maxt in crop
            Avmin  # Average Mint in crop
        events Reporting Frequency: event=harvesting  # Day
      soil -> /LettuceSensibility/shared/Soil
        Sample Soil sample
          Layer:
            {Thickness (mm)=3000, NO3 (ppm)=0, NH4 (ppm)=0, SW (mm/mm)=0}
      tracker
        variable:
          average of maxt on start_of_day from sowing to now as AvMax  # Sum of rainfall from sowing to now
          average of mint on start_of_day from sowing to now as AvMin  # Sum of rainfall from sowing to now
    area jun15
      folder Manager folder: same as PatagoniaBaseline.jun15.Manager folder
      lettuce
      outputfile: filename=Patagonia2020Low jun15.out; title=Patagonia2020Low jun15
        variables
          variable:
            year  # Year
            day  # Day
            sowing_date  # Day number of sowing
            maturity_das  # Days from sowing to maturity
            Avmax  # Average Maxt in crop
            Avmin  # Average Mint in crop
        events Reporting Frequency: event=harvesting  # Day
      soil -> /LettuceSensibility/shared/Soil
        Sample Soil sample
          Layer:
            {Thickness (mm)=3000, NO3 (ppm)=0, NH4 (ppm)=0, SW (mm/mm)=0}
      tracker
        variable:
          average of maxt on start_of_day from sowing to now as AvMax  # Sum of rainfall from sowing to now
          average of mint on start_of_day from sowing to now as AvMin  # Sum of rainfall from sowing to now
    area jul1
      folder Manager folder: same as PatagoniaBaseline.jul1.Manager folder
      lettuce
      outputfile: filename=Patagonia2020Low jul1.out; title=Patagonia2020Low jul1
        variables
          variable:
            year  # Year
            day  # Day
            sowing_date  # Day number of sowing
            maturity_das  # Days from sowing to maturity
            Avmax  # Average Maxt in crop
            Avmin  # Average Mint in crop
        events Reporting Frequency: event=harvesting  # Day
      soil -> /LettuceSensibility/shared/Soil
        Sample Soil sample
          Layer:
            {Thickness (mm)=3000, NO3 (ppm)=0, NH4 (ppm)=0, SW (mm/mm)=0}
      tracker
        variable:
          average of maxt on start_of_day from sowing to now as AvMax  # Sum of rainfall from sowing to now
          average of mint on start_of_day from sowing to now as AvMin  # Sum of rainfall from sowing to now
  simulation Patagonia2020High
    clock
      start_date = 1/01/1961  # Select the start date of the simulation
      end_date = 30/12/1990  # Select the end date of the simulation
    summaryfile
    metfile met: filename=Gatton_2020high.met
    area May1
      folder Manager folder: same as PatagoniaBaseline.May1.Manager folder
      lettuce
      outputfile: filename=Patagonia2020High May1.out; title=Patagonia2020High May1
        variables
          variable:
            year  # Year
            day  # Day
            sowing_date  # Day number of sowing
            maturity_das  # Days from sowing to maturity
            Avmax  # Average Maxt in crop
            Avmin  # Average Mint in crop
        events Reporting Frequency: event=harvesting  # Day
      soil -> /LettuceSensibility/shared/Soil
        Sample Soil sample
          Layer:
            {Thickness (mm)=3000, NO3 (ppm)=0, NH4 (ppm)=0, SW (mm/mm)=0}
      tracker
        variable:
          average of maxt on start_of_day from sowing to now as AvMax  # Sum of rainfall from sowing to now
          average of mint on start_of_day from sowing to now as AvMin  # Sum of rainfall from sowing to now
    area May15
      folder Manager folder: same as PatagoniaBaseline.May15.Manager folder
      lettuce
      outputfile: filename=Patagonia2020High May15.out; title=Patagonia2020High May15
        variables
          variable:
            year  # Year
            day  # Day
            sowing_date  # Day number of sowing
            maturity_das  # Days from sowing to maturity
            Avmax  # Average Maxt in crop
            Avmin  # Average Mint in crop
        events Reporting Frequency: event=harvesting  # Day
      soil -> /LettuceSensibility/shared/Soil
        Sample Soil sample
          Layer:
            {Thickness (mm)=3000, NO3 (ppm)=0, NH4 (ppm)=0, SW (mm/mm)=0}
      tracker
        variable:
          average of maxt on start_of_day from sowing to now as AvMax  # Sum of rainfall from sowing to now
          average of mint on start_of_day from sowing to now as AvMin  # Sum of rainfall from sowing to now
    area jun1
      folder Manager folder: same as PatagoniaBaseline.jun1.Manager folder
      lettuce
      outputfile: filename=Patagonia2020High jun1.out; title=Patagonia2020High jun1
        variables
          variable:
            year  # Year
            day  # Day
            sowing_date  # Day number of sowing
            maturity_das  # Days from sowing to maturity
            Avmax  # Average Maxt in crop
            Avmin  # Average Mint in crop
        events Reporting Frequency: event=harvesting  # Day
      soil -> /LettuceSensibility/shared/Soil
        Sample Soil sample
          Layer:
            {Thickness (mm)=3000, NO3 (ppm)=0, NH4 (ppm)=0, SW (mm/mm)=0}
      tracker
        variable:
          average of maxt on start_of_day from sowing to now as AvMax  # Sum of rainfall from sowing to now
          average of mint on start_of_day from sowing to now as AvMin  # Sum of rainfall from sowing to now
    area jun15
      folder Manager folder: same as PatagoniaBaseline.jun15.Manager folder
      lettuce
      outputfile: filename=Patagonia2020High jun15.out; title=Patagonia2020High jun15
        variables
          variable:
            year  # Year
            day  # Day
            sowing_date  # Day number of sowing
            maturity_das  # Days from sowing to maturity
            Avmax  # Average Maxt in crop
            Avmin  # Average Mint in crop
        events Reporting Frequency: event=harvesting  # Day
      soil -> /LettuceSensibility/shared/Soil
        Sample Soil sample
          Layer:
            {Thickness (mm)=3000, NO3 (ppm)=0, NH4 (ppm)=0, SW (mm/mm)=0}
      tracker
        variable:
          average of maxt on start_of_day from sowing to now as AvMax  # Sum of rainfall from sowing to now
          average of mint on start_of_day from sowing to now as AvMin  # Sum of rainfall from sowing to now
    area jul1
      folder Manager folder: same as PatagoniaBaseline.jul1.Manager folder
      lettuce
      outputfile: filename=Patagonia2020High jul1.out; title=Patagonia2020High jul1
        variables
          variable:
            year  # Year
            day  # Day
            sowing_date  # Day number of sowing
            maturity_das  # Days from sowing to maturity
            Avmax  # Average Maxt in crop
            Avmin  # Average Mint in crop
        events Reporting Frequency: event=harvesting  # Day
      soil -> /LettuceSensibility/shared/Soil
        Sample Soil sample
          Layer:
            {Thickness (mm)=3000, NO3 (ppm)=0, NH4 (ppm)=0, SW (mm/mm)=0}
      tracker
        variable:
          average of maxt on start_of_day from sowing to now as AvMax  # Sum of rainfall from sowing to now
          average of mint on start_of_day from sowing to now as AvMin  # Sum of rainfall from sowing to now
  folder shared
    soil: Site=Brookstead; Region=Darling Downs; State=Queensland
      Comment = Soil naming structure: \State\Region\Classification-Local Name (Site/district and locator number)  # Comments
      NearestTown = Brookstead, Q 4352
      NaturalVegetation = Queensland bluegrass
      DataSource = CSIRO Sustainable Ecosystems, Toowoomba
      InitNitrogen Initial nitrogen
        PercentMethod: Percent=0
      InitWater Initial water
        percentmethod: percent=1; distributed=filled from top
      Water
        Layer:
          Thickness (mm)  BD (g/cc)  AirDry (mm/mm)  LL15 (mm/mm)  DUL (mm/mm)  SAT (mm/mm)
          150             1.05       0.13            0.25          0.52         0.57
          150             1.16       0.2             0.25          0.48         0.53
          300             1.19       0.25            0.25          0.47         0.52
          300             1.18       0.25            0.25          0.47         0.52
          300             1.24       0.25            0.25          0.45         0.5
          300             1.31       0.25            0.25          0.42         0.47
          300             1.35       0.25            0.25          0.41         0.46
        SoilCrop lettuce
          Layer:
            Thickness (mm)  LL (mm/mm)  KL (/day)  XF (0-1)
            150             0.25        0.06       1
            150             0.25        0.06       1
            300             0.25        0.06       1
            300             0.25        0.06       1
            300             0.25        0.06       1
            300             0.25        0.06       1
            300             0.25        0.06       1
      SoilWat: SummerCona=3.5; SummerU=6; SummerDate=1-nov; WinterCona=2.5; WinterU=4; WinterDate=1-apr; DiffusConst=40; DiffusSlope=16; Salb=0.12; CN2Bare=73; CNRed=20; CNCov=0.8
        Layer:
          Thickness (mm)  SWCON (0-1)
          150             0.3
          150             0.3
          300             0.3
          300             0.3
          300             0.3
          300             0.3
          300             0.3
      SoilOrganicMatter: RootCN=40; RootWT=1000; SoilCN=12; EnrACoeff=7.4; EnrBCoeff=0.2
        Layer:
          Thickness (mm)  OC (Total %)  FBiom (0-1)  FInert (0-1)
          150             1.19          0.04         0.4
          150             1.01          0.02         0.6
          300             0.45          0.02         0.8
          300             0.3           0.02         1
          300             0.2           0.01         1
          300             0.16          0.01         1
          300             0.17          0.01         1
      Analysis
        Layer:
          Thickness (mm)  PH (1:5 water)
          150             8.2
          150             8.5
          300             8.6
          300             8.6
          300             7.4
          300             5.3
          300             5.3
  simulation AnnieBaseline
    clock
      start_date = 1/01/1961  # Select the start date of the simulation
      end_date = 30/12/1990  # Select the end date of the simulation
    summaryfile
    metfile met: filename=UQ Gatton_historical.met
    area Apr1
      folder Manager folder
        manager Sow on a fixed date
          # Sowing criteria
          date = 1-apr  # Enter sowing date (dd-mmm)
          # Sowing parameters
          crop = lettuce  # Enter name of crop to sow
          density = 6  # Enter sowing density (plants/m2)
          depth = 50  # Enter sowing depth (mm)
          cultivar = Annie  # Enter cultivar
          row_spacing = 600  # Enter row spacing (mm)
          on start_of_day:
          script: same as in PatagoniaBaseline.May1.Manager folder.Sow on a fixed date
        manager Harvest on a Growth Stage
          # Harvesting criteria
          stage = maturity  # Enter stage name
          # Harvesting parameters
          crop = lettuce  # Enter name of crop to sow
          on start_of_day:
```
        if ([crop].StageName = '[stage]') then
                    [crop] harvest
                    [crop] end_crop
        endif
```
      lettuce
      outputfile: filename=AnnieBaseline Apr1.out; title=AnnieBaseline Apr1
        variables
          variable:
            year  # Year
            day  # Day
            sowing_date  # Day number of sowing
            maturity_das  # Days from sowing to maturity
            Avmax  # Average Maxt in crop
            Avmin  # Average Mint in crop
        events Reporting Frequency: event=harvesting  # Day
      soil -> /LettuceSensibility/shared/Soil
        Sample Soil sample
          Layer:
            {Thickness (mm)=3000, NO3 (ppm)=0, NH4 (ppm)=0, SW (mm/mm)=0}
      tracker
        variable:
          average of maxt on start_of_day from sowing to now as AvMax  # Sum of rainfall from sowing to now
          average of mint on start_of_day from sowing to now as AvMin  # Sum of rainfall from sowing to now
    area Apr15
      folder Manager folder
        manager Sow on a fixed date
          # Sowing criteria
          date = 15-Apr  # Enter sowing date (dd-mmm)
          # Sowing parameters
          crop = lettuce  # Enter name of crop to sow
          density = 6  # Enter sowing density (plants/m2)
          depth = 50  # Enter sowing depth (mm)
          cultivar = Annie  # Enter cultivar
          row_spacing = 600  # Enter row spacing (mm)
          on start_of_day:
          script: same as in PatagoniaBaseline.May1.Manager folder.Sow on a fixed date
        manager Harvest on a Growth Stage
          # Harvesting criteria
          stage = maturity  # Enter stage name
          # Harvesting parameters
          crop = lettuce  # Enter name of crop to sow
          on start_of_day:
```
        if ([crop].StageName = '[stage]') then
                    [crop] harvest
                    [crop] end_crop
        endif
```
      lettuce
      outputfile: filename=AnnieBaseline Apr15.out; title=AnnieBaseline Apr15
        variables
          variable:
            year  # Year
            day  # Day
            sowing_date  # Day number of sowing
            maturity_das  # Days from sowing to maturity
            Avmax  # Average Maxt in crop
            Avmin  # Average Mint in crop
        events Reporting Frequency: event=harvesting  # Day
      soil -> /LettuceSensibility/shared/Soil
        Sample Soil sample
          Layer:
            {Thickness (mm)=3000, NO3 (ppm)=0, NH4 (ppm)=0, SW (mm/mm)=0}
      tracker
        variable:
          average of maxt on start_of_day from sowing to now as AvMax  # Sum of rainfall from sowing to now
          average of mint on start_of_day from sowing to now as AvMin  # Sum of rainfall from sowing to now
    area jul15
      folder Manager folder
        manager Sow on a fixed date
          # Sowing criteria
          date = 15-Jul  # Enter sowing date (dd-mmm)
          # Sowing parameters
          crop = lettuce  # Enter name of crop to sow
          density = 6  # Enter sowing density (plants/m2)
          depth = 50  # Enter sowing depth (mm)
          cultivar = Annie  # Enter cultivar
          row_spacing = 600  # Enter row spacing (mm)
          on start_of_day:
          script: same as in PatagoniaBaseline.May1.Manager folder.Sow on a fixed date
        manager Harvest on a Growth Stage
          # Harvesting criteria
          stage = maturity  # Enter stage name
          # Harvesting parameters
          crop = lettuce  # Enter name of crop to sow
          on start_of_day:
```
        if ([crop].StageName = '[stage]') then
                    [crop] harvest
                    [crop] end_crop
        endif
```
      lettuce
      outputfile: filename=AnnieBaseline jul15.out; title=AnnieBaseline jul15
        variables
          variable:
            year  # Year
            day  # Day
            sowing_date  # Day number of sowing
            maturity_das  # Days from sowing to maturity
            Avmax  # Average Maxt in crop
            Avmin  # Average Mint in crop
        events Reporting Frequency: event=harvesting  # Day
      soil -> /LettuceSensibility/shared/Soil
        Sample Soil sample
          Layer:
            {Thickness (mm)=3000, NO3 (ppm)=0, NH4 (ppm)=0, SW (mm/mm)=0}
      tracker
        variable:
          average of maxt on start_of_day from sowing to now as AvMax  # Sum of rainfall from sowing to now
          average of mint on start_of_day from sowing to now as AvMin  # Sum of rainfall from sowing to now
    area Aug1
      folder Manager folder
        manager Sow on a fixed date
          # Sowing criteria
          date = 1-Aug  # Enter sowing date (dd-mmm)
          # Sowing parameters
          crop = lettuce  # Enter name of crop to sow
          density = 6  # Enter sowing density (plants/m2)
          depth = 50  # Enter sowing depth (mm)
          cultivar = Annie  # Enter cultivar
          row_spacing = 600  # Enter row spacing (mm)
          on start_of_day:
          script: same as in PatagoniaBaseline.May1.Manager folder.Sow on a fixed date
        manager Harvest on a Growth Stage
          # Harvesting criteria
          stage = maturity  # Enter stage name
          # Harvesting parameters
          crop = lettuce  # Enter name of crop to sow
          on start_of_day:
```
        if ([crop].StageName = '[stage]') then
                    [crop] harvest
                    [crop] end_crop
        endif
```
      lettuce
      outputfile: filename=AnnieBaseline Aug1.out; title=AnnieBaseline Aug1
        variables
          variable:
            year  # Year
            day  # Day
            sowing_date  # Day number of sowing
            maturity_das  # Days from sowing to maturity
            Avmax  # Average Maxt in crop
            Avmin  # Average Mint in crop
        events Reporting Frequency: event=harvesting  # Day
      soil -> /LettuceSensibility/shared/Soil
        Sample Soil sample
          Layer:
            {Thickness (mm)=3000, NO3 (ppm)=0, NH4 (ppm)=0, SW (mm/mm)=0}
      tracker
        variable:
          average of maxt on start_of_day from sowing to now as AvMax  # Sum of rainfall from sowing to now
          average of mint on start_of_day from sowing to now as AvMin  # Sum of rainfall from sowing to now
    area Aug15
      folder Manager folder
        manager Sow on a fixed date
          # Sowing criteria
          date = 15-Aug  # Enter sowing date (dd-mmm)
          # Sowing parameters
          crop = lettuce  # Enter name of crop to sow
          density = 6  # Enter sowing density (plants/m2)
          depth = 50  # Enter sowing depth (mm)
          cultivar = Annie  # Enter cultivar
          row_spacing = 600  # Enter row spacing (mm)
          on start_of_day:
          script: same as in PatagoniaBaseline.May1.Manager folder.Sow on a fixed date
        manager Harvest on a Growth Stage
          # Harvesting criteria
          stage = maturity  # Enter stage name
          # Harvesting parameters
          crop = lettuce  # Enter name of crop to sow
          on start_of_day:
```
        if ([crop].StageName = '[stage]') then
                    [crop] harvest
                    [crop] end_crop
        endif
```
      lettuce
      outputfile: filename=AnnieBaseline Aug15.out; title=AnnieBaseline Aug15
        variables
          variable:
            year  # Year
            day  # Day
            sowing_date  # Day number of sowing
            maturity_das  # Days from sowing to maturity
            Avmax  # Average Maxt in crop
            Avmin  # Average Mint in crop
        events Reporting Frequency: event=harvesting  # Day
      soil -> /LettuceSensibility/shared/Soil
        Sample Soil sample
          Layer:
            {Thickness (mm)=3000, NO3 (ppm)=0, NH4 (ppm)=0, SW (mm/mm)=0}
      tracker
        variable:
          average of maxt on start_of_day from sowing to now as AvMax  # Sum of rainfall from sowing to now
          average of mint on start_of_day from sowing to now as AvMin  # Sum of rainfall from sowing to now
  simulation Annie2020Low
    clock
      start_date = 1/01/1961  # Select the start date of the simulation
      end_date = 30/12/1990  # Select the end date of the simulation
    summaryfile
    metfile met: filename=Gatton_2020low.met
    area Apr1
      folder Manager folder: same as AnnieBaseline.Apr1.Manager folder
      lettuce
      outputfile: filename=Annie2020Low Apr1.out; title=Annie2020Low Apr1
        variables
          variable:
            year  # Year
            day  # Day
            sowing_date  # Day number of sowing
            maturity_das  # Days from sowing to maturity
            Avmax  # Average Maxt in crop
            Avmin  # Average Mint in crop
        events Reporting Frequency: event=harvesting  # Day
      soil -> /LettuceSensibility/shared/Soil
        Sample Soil sample
          Layer:
            {Thickness (mm)=3000, NO3 (ppm)=0, NH4 (ppm)=0, SW (mm/mm)=0}
      tracker
        variable:
          average of maxt on start_of_day from sowing to now as AvMax  # Sum of rainfall from sowing to now
          average of mint on start_of_day from sowing to now as AvMin  # Sum of rainfall from sowing to now
    area Apr15
      folder Manager folder: same as AnnieBaseline.Apr15.Manager folder
      lettuce
      outputfile: filename=Annie2020Low Apr15.out; title=Annie2020Low Apr15
        variables
          variable:
            year  # Year
            day  # Day
            sowing_date  # Day number of sowing
            maturity_das  # Days from sowing to maturity
            Avmax  # Average Maxt in crop
            Avmin  # Average Mint in crop
        events Reporting Frequency: event=harvesting  # Day
      soil -> /LettuceSensibility/shared/Soil
        Sample Soil sample
          Layer:
            {Thickness (mm)=3000, NO3 (ppm)=0, NH4 (ppm)=0, SW (mm/mm)=0}
      tracker
        variable:
          average of maxt on start_of_day from sowing to now as AvMax  # Sum of rainfall from sowing to now
          average of mint on start_of_day from sowing to now as AvMin  # Sum of rainfall from sowing to now
    area jul15
      folder Manager folder: same as AnnieBaseline.jul15.Manager folder
      lettuce
      outputfile: filename=Annie2020Low jul15.out; title=Annie2020Low jul15
        variables
          variable:
            year  # Year
            day  # Day
            sowing_date  # Day number of sowing
            maturity_das  # Days from sowing to maturity
            Avmax  # Average Maxt in crop
            Avmin  # Average Mint in crop
        events Reporting Frequency: event=harvesting  # Day
      soil -> /LettuceSensibility/shared/Soil
        Sample Soil sample
          Layer:
            {Thickness (mm)=3000, NO3 (ppm)=0, NH4 (ppm)=0, SW (mm/mm)=0}
      tracker
        variable:
          average of maxt on start_of_day from sowing to now as AvMax  # Sum of rainfall from sowing to now
          average of mint on start_of_day from sowing to now as AvMin  # Sum of rainfall from sowing to now
    area Aug1
      folder Manager folder: same as AnnieBaseline.Aug1.Manager folder
      lettuce
      outputfile: filename=Annie2020Low Aug1.out; title=Annie2020Low Aug1
        variables
          variable:
            year  # Year
            day  # Day
            sowing_date  # Day number of sowing
            maturity_das  # Days from sowing to maturity
            Avmax  # Average Maxt in crop
            Avmin  # Average Mint in crop
        events Reporting Frequency: event=harvesting  # Day
      soil -> /LettuceSensibility/shared/Soil
        Sample Soil sample
          Layer:
            {Thickness (mm)=3000, NO3 (ppm)=0, NH4 (ppm)=0, SW (mm/mm)=0}
      tracker
        variable:
          average of maxt on start_of_day from sowing to now as AvMax  # Sum of rainfall from sowing to now
          average of mint on start_of_day from sowing to now as AvMin  # Sum of rainfall from sowing to now
    area Aug15
      folder Manager folder: same as AnnieBaseline.Aug15.Manager folder
      lettuce
      outputfile: filename=Annie2020Low Aug15.out; title=Annie2020Low Aug15
        variables
          variable:
            year  # Year
            day  # Day
            sowing_date  # Day number of sowing
            maturity_das  # Days from sowing to maturity
            Avmax  # Average Maxt in crop
            Avmin  # Average Mint in crop
        events Reporting Frequency: event=harvesting  # Day
      soil -> /LettuceSensibility/shared/Soil
        Sample Soil sample
          Layer:
            {Thickness (mm)=3000, NO3 (ppm)=0, NH4 (ppm)=0, SW (mm/mm)=0}
      tracker
        variable:
          average of maxt on start_of_day from sowing to now as AvMax  # Sum of rainfall from sowing to now
          average of mint on start_of_day from sowing to now as AvMin  # Sum of rainfall from sowing to now
  simulation Annie2020High
    clock
      start_date = 1/01/1961  # Select the start date of the simulation
      end_date = 30/12/1990  # Select the end date of the simulation
    summaryfile
    metfile met: filename=Gatton_2020high.met
    area Apr1
      folder Manager folder: same as AnnieBaseline.Apr1.Manager folder
      lettuce
      outputfile: filename=Annie2020High Apr1.out; title=Annie2020High Apr1
        variables
          variable:
            year  # Year
            day  # Day
            sowing_date  # Day number of sowing
            maturity_das  # Days from sowing to maturity
            Avmax  # Average Maxt in crop
            Avmin  # Average Mint in crop
        events Reporting Frequency: event=harvesting  # Day
      soil -> /LettuceSensibility/shared/Soil
        Sample Soil sample
          Layer:
            {Thickness (mm)=3000, NO3 (ppm)=0, NH4 (ppm)=0, SW (mm/mm)=0}
      tracker
        variable:
          average of maxt on start_of_day from sowing to now as AvMax  # Sum of rainfall from sowing to now
          average of mint on start_of_day from sowing to now as AvMin  # Sum of rainfall from sowing to now
    area Apr15
      folder Manager folder: same as AnnieBaseline.Apr15.Manager folder
      lettuce
      outputfile: filename=Annie2020High Apr15.out; title=Annie2020High Apr15
        variables
          variable:
            year  # Year
            day  # Day
            sowing_date  # Day number of sowing
            maturity_das  # Days from sowing to maturity
            Avmax  # Average Maxt in crop
            Avmin  # Average Mint in crop
        events Reporting Frequency: event=harvesting  # Day
      soil -> /LettuceSensibility/shared/Soil
        Sample Soil sample
          Layer:
            {Thickness (mm)=3000, NO3 (ppm)=0, NH4 (ppm)=0, SW (mm/mm)=0}
      tracker
        variable:
          average of maxt on start_of_day from sowing to now as AvMax  # Sum of rainfall from sowing to now
          average of mint on start_of_day from sowing to now as AvMin  # Sum of rainfall from sowing to now
    area jul15
      folder Manager folder: same as AnnieBaseline.jul15.Manager folder
      lettuce
      outputfile: filename=Annie2020High jul15.out; title=Annie2020High jul15
        variables
          variable:
            year  # Year
            day  # Day
            sowing_date  # Day number of sowing
            maturity_das  # Days from sowing to maturity
            Avmax  # Average Maxt in crop
            Avmin  # Average Mint in crop
        events Reporting Frequency: event=harvesting  # Day
      soil -> /LettuceSensibility/shared/Soil
        Sample Soil sample
          Layer:
            {Thickness (mm)=3000, NO3 (ppm)=0, NH4 (ppm)=0, SW (mm/mm)=0}
      tracker
        variable:
          average of maxt on start_of_day from sowing to now as AvMax  # Sum of rainfall from sowing to now
          average of mint on start_of_day from sowing to now as AvMin  # Sum of rainfall from sowing to now
    area Aug1
      folder Manager folder: same as AnnieBaseline.Aug1.Manager folder
      lettuce
      outputfile: filename=Annie2020High Aug1.out; title=Annie2020High Aug1
        variables
          variable:
            year  # Year
            day  # Day
            sowing_date  # Day number of sowing
            maturity_das  # Days from sowing to maturity
            Avmax  # Average Maxt in crop
            Avmin  # Average Mint in crop
        events Reporting Frequency: event=harvesting  # Day
      soil -> /LettuceSensibility/shared/Soil
        Sample Soil sample
          Layer:
            {Thickness (mm)=3000, NO3 (ppm)=0, NH4 (ppm)=0, SW (mm/mm)=0}
      tracker
        variable:
          average of maxt on start_of_day from sowing to now as AvMax  # Sum of rainfall from sowing to now
          average of mint on start_of_day from sowing to now as AvMin  # Sum of rainfall from sowing to now
    area Aug15
      folder Manager folder: same as AnnieBaseline.Aug15.Manager folder
      lettuce
      outputfile: filename=Annie2020High Aug15.out; title=Annie2020High Aug15
        variables
          variable:
            year  # Year
            day  # Day
            sowing_date  # Day number of sowing
            maturity_das  # Days from sowing to maturity
            Avmax  # Average Maxt in crop
            Avmin  # Average Mint in crop
        events Reporting Frequency: event=harvesting  # Day
      soil -> /LettuceSensibility/shared/Soil
        Sample Soil sample
          Layer:
            {Thickness (mm)=3000, NO3 (ppm)=0, NH4 (ppm)=0, SW (mm/mm)=0}
      tracker
        variable:
          average of maxt on start_of_day from sowing to now as AvMax  # Sum of rainfall from sowing to now
          average of mint on start_of_day from sowing to now as AvMin  # Sum of rainfall from sowing to now
  simulation PatagoniaCurrent
    clock
      start_date = 1/01/1991  # Select the start date of the simulation
      end_date = 30/12/2006  # Select the end date of the simulation
    summaryfile
    metfile met: filename=UQ Gatton_historical.met
    area May1
      folder Manager folder: same as PatagoniaBaseline.May1.Manager folder
      lettuce
      outputfile: filename=PatagoniaCurrent May1.out; title=PatagoniaCurrent May1
        variables
          variable:
            year  # Year
            day  # Day
            sowing_date  # Day number of sowing
            maturity_das  # Days from sowing to maturity
            Avmax  # Average Maxt in crop
            Avmin  # Average Mint in crop
        events Reporting Frequency: event=harvesting  # Day
      soil -> /LettuceSensibility/shared/Soil
        Sample Soil sample
          Layer:
            {Thickness (mm)=3000, NO3 (ppm)=0, NH4 (ppm)=0, SW (mm/mm)=0}
      tracker
        variable:
          average of maxt on start_of_day from sowing to now as AvMax  # Sum of rainfall from sowing to now
          average of mint on start_of_day from sowing to now as AvMin  # Sum of rainfall from sowing to now
    area May15
      folder Manager folder: same as PatagoniaBaseline.May15.Manager folder
      lettuce
      outputfile: filename=PatagoniaCurrent May15.out; title=PatagoniaCurrent May15
        variables
          variable:
            year  # Year
            day  # Day
            sowing_date  # Day number of sowing
            maturity_das  # Days from sowing to maturity
            Avmax  # Average Maxt in crop
            Avmin  # Average Mint in crop
        events Reporting Frequency: event=harvesting  # Day
      soil -> /LettuceSensibility/shared/Soil
        Sample Soil sample
          Layer:
            {Thickness (mm)=3000, NO3 (ppm)=0, NH4 (ppm)=0, SW (mm/mm)=0}
      tracker
        variable:
          average of maxt on start_of_day from sowing to now as AvMax  # Sum of rainfall from sowing to now
          average of mint on start_of_day from sowing to now as AvMin  # Sum of rainfall from sowing to now
    area jun1
      folder Manager folder: same as PatagoniaBaseline.jun1.Manager folder
      lettuce
      outputfile: filename=PatagoniaCurrent jun1.out; title=PatagoniaCurrent jun1
        variables
          variable:
            year  # Year
            day  # Day
            sowing_date  # Day number of sowing
            maturity_das  # Days from sowing to maturity
            Avmax  # Average Maxt in crop
            Avmin  # Average Mint in crop
        events Reporting Frequency: event=harvesting  # Day
      soil -> /LettuceSensibility/shared/Soil
        Sample Soil sample
          Layer:
            {Thickness (mm)=3000, NO3 (ppm)=0, NH4 (ppm)=0, SW (mm/mm)=0}
      tracker
        variable:
          average of maxt on start_of_day from sowing to now as AvMax  # Sum of rainfall from sowing to now
          average of mint on start_of_day from sowing to now as AvMin  # Sum of rainfall from sowing to now
    area jun15
      folder Manager folder: same as PatagoniaBaseline.jun15.Manager folder
      lettuce
      outputfile: filename=PatagoniaCurrent jun15.out; title=PatagoniaCurrent jun15
        variables
          variable:
            year  # Year
            day  # Day
            sowing_date  # Day number of sowing
            maturity_das  # Days from sowing to maturity
            Avmax  # Average Maxt in crop
            Avmin  # Average Mint in crop
        events Reporting Frequency: event=harvesting  # Day
      soil -> /LettuceSensibility/shared/Soil
        Sample Soil sample
          Layer:
            {Thickness (mm)=3000, NO3 (ppm)=0, NH4 (ppm)=0, SW (mm/mm)=0}
      tracker
        variable:
          average of maxt on start_of_day from sowing to now as AvMax  # Sum of rainfall from sowing to now
          average of mint on start_of_day from sowing to now as AvMin  # Sum of rainfall from sowing to now
    area jul1
      folder Manager folder: same as PatagoniaBaseline.jul1.Manager folder
      lettuce
      outputfile: filename=PatagoniaCurrent jul1.out; title=PatagoniaCurrent jul1
        variables
          variable:
            year  # Year
            day  # Day
            sowing_date  # Day number of sowing
            maturity_das  # Days from sowing to maturity
            Avmax  # Average Maxt in crop
            Avmin  # Average Mint in crop
        events Reporting Frequency: event=harvesting  # Day
      soil -> /LettuceSensibility/shared/Soil
        Sample Soil sample
          Layer:
            {Thickness (mm)=3000, NO3 (ppm)=0, NH4 (ppm)=0, SW (mm/mm)=0}
      tracker
        variable:
          average of maxt on start_of_day from sowing to now as AvMax  # Sum of rainfall from sowing to now
          average of mint on start_of_day from sowing to now as AvMin  # Sum of rainfall from sowing to now
  simulation AnnieCurrent
    clock
      start_date = 1/01/1991  # Select the start date of the simulation
      end_date = 30/12/2006  # Select the end date of the simulation
    summaryfile
    metfile met: filename=UQ Gatton_historical.met
    area Apr1
      folder Manager folder: same as AnnieBaseline.Apr1.Manager folder
      lettuce
      outputfile: filename=AnnieCurrent Apr1.out; title=AnnieCurrent Apr1
        variables
          variable:
            year  # Year
            day  # Day
            sowing_date  # Day number of sowing
            maturity_das  # Days from sowing to maturity
            Avmax  # Average Maxt in crop
            Avmin  # Average Mint in crop
        events Reporting Frequency: event=harvesting  # Day
      soil -> /LettuceSensibility/shared/Soil
        Sample Soil sample
          Layer:
            {Thickness (mm)=3000, NO3 (ppm)=0, NH4 (ppm)=0, SW (mm/mm)=0}
      tracker
        variable:
          average of maxt on start_of_day from sowing to now as AvMax  # Sum of rainfall from sowing to now
          average of mint on start_of_day from sowing to now as AvMin  # Sum of rainfall from sowing to now
    area Apr15
      folder Manager folder: same as AnnieBaseline.Apr15.Manager folder
      lettuce
      outputfile: filename=AnnieCurrent Apr15.out; title=AnnieCurrent Apr15
        variables
          variable:
            year  # Year
            day  # Day
            sowing_date  # Day number of sowing
            maturity_das  # Days from sowing to maturity
            Avmax  # Average Maxt in crop
            Avmin  # Average Mint in crop
        events Reporting Frequency: event=harvesting  # Day
      soil -> /LettuceSensibility/shared/Soil
        Sample Soil sample
          Layer:
            {Thickness (mm)=3000, NO3 (ppm)=0, NH4 (ppm)=0, SW (mm/mm)=0}
      tracker
        variable:
          average of maxt on start_of_day from sowing to now as AvMax  # Sum of rainfall from sowing to now
          average of mint on start_of_day from sowing to now as AvMin  # Sum of rainfall from sowing to now
    area jul15
      folder Manager folder: same as AnnieBaseline.jul15.Manager folder
      lettuce
      outputfile: filename=AnnieCurrent jul15.out; title=AnnieCurrent jul15
        variables
          variable:
            year  # Year
            day  # Day
            sowing_date  # Day number of sowing
            maturity_das  # Days from sowing to maturity
            Avmax  # Average Maxt in crop
            Avmin  # Average Mint in crop
        events Reporting Frequency: event=harvesting  # Day
      soil -> /LettuceSensibility/shared/Soil
        Sample Soil sample
          Layer:
            {Thickness (mm)=3000, NO3 (ppm)=0, NH4 (ppm)=0, SW (mm/mm)=0}
      tracker
        variable:
          average of maxt on start_of_day from sowing to now as AvMax  # Sum of rainfall from sowing to now
          average of mint on start_of_day from sowing to now as AvMin  # Sum of rainfall from sowing to now
    area Aug1
      folder Manager folder: same as AnnieBaseline.Aug1.Manager folder
      lettuce
      outputfile: filename=AnnieCurrent Aug1.out; title=AnnieCurrent Aug1
        variables
          variable:
            year  # Year
            day  # Day
            sowing_date  # Day number of sowing
            maturity_das  # Days from sowing to maturity
            Avmax  # Average Maxt in crop
            Avmin  # Average Mint in crop
        events Reporting Frequency: event=harvesting  # Day
      soil -> /LettuceSensibility/shared/Soil
        Sample Soil sample
          Layer:
            {Thickness (mm)=3000, NO3 (ppm)=0, NH4 (ppm)=0, SW (mm/mm)=0}
      tracker
        variable:
          average of maxt on start_of_day from sowing to now as AvMax  # Sum of rainfall from sowing to now
          average of mint on start_of_day from sowing to now as AvMin  # Sum of rainfall from sowing to now
    area Aug15
      folder Manager folder: same as AnnieBaseline.Aug15.Manager folder
      lettuce
      outputfile: filename=AnnieCurrent Aug15.out; title=AnnieCurrent Aug15
        variables
          variable:
            year  # Year
            day  # Day
            sowing_date  # Day number of sowing
            maturity_das  # Days from sowing to maturity
            Avmax  # Average Maxt in crop
            Avmin  # Average Mint in crop
        events Reporting Frequency: event=harvesting  # Day
      soil -> /LettuceSensibility/shared/Soil
        Sample Soil sample
          Layer:
            {Thickness (mm)=3000, NO3 (ppm)=0, NH4 (ppm)=0, SW (mm/mm)=0}
      tracker
        variable:
          average of maxt on start_of_day from sowing to now as AvMax  # Sum of rainfall from sowing to now
          average of mint on start_of_day from sowing to now as AvMin  # Sum of rainfall from sowing to now
