folder simulations: version=36; creator=Apsim 7.6-r3482
  simulation Population110
    metfile met: filename=%apsim%\Tests\Validation\OilPalm\Hargy.met
    clock
      start_date = 01/03/1996  # Enter the start date of the simulation
      end_date = 29/09/2010  # Enter the end date of the simulation
    summaryfile
    area Block
      OilPalm
        UnderstoryCoverGreen = 0.4
        UnderstoryLegumeFraction = 0.5
      fertiliser
      surfaceom surface organic matter
        PoolName = oilpalm oilpalmstem  # Organic Matter pool name
        type = oilpalm oilpalmstem  # Organic Matter type
        mass = 24000 63000  # Initial surface residue (kg/ha)
        cnr = 39 145  # C:N ratio of initial residue
        standing_fraction = 0 0  # Fraction of residue standing
        memo
          24 t Fronds at 1.14% N = 274 kgN
          63 t Trunk at 0.3% N = 189 kg N

          Overall N% = 0.533% = C:N 75
      manager Palm Management
        planting_date = 01/03/1996
        population = 110  # Plant Population (/ha)
        cultivar = Dami
        year1N = 0.14  # N applied in year 1 (kg/palm)
        year2N = 0.3  # N applied in year 2 (kg/palm)
        year3N = 0.6  # N applied in year 3 (kg/palm)
        year4N = 0.9  # N applied in year 4 (kg/palm)
        MatureN = 1.05  # N applied to mature palms (kg/palm)
        on start_of_day:
```
ppsm = [population]/10000

! Add Trunk from previous plantation
!'surface organic matter' add_surfaceom type=OilPalm, name=trunk, mass=63000, cnr=133, cpr=200


endif

if today = date('[planting_date]') then
    OilPalm sow population = ppsm, depth = 200, cultivar = [cultivar], maxcover = 1.0, budnumber = 1, row_spacing = [row_width], crop_class = plant  
endif


if today = date('15-jan') or today = date('15-may') or today = date('15-sep') then
   if age <= 1 then
      Nrate = [population] * [year1N] / 3
   elseif age <= 2 then
      Nrate = [population] * [year2N] / 3
   elseif age <= 3 then
      Nrate = [population] * [year3N] / 3
   elseif age <= 4 then
      Nrate = [population] * [year4N] / 3
   else
      Nrate = [population] *  [MatureN]/ 3
   endif           

   fertiliser apply amount = Nrate, type = nh4no3, depth = 1
endif
```
        on Init:
```
Plant_population = 0
```
      Soil: SoilType=Higaturu Series; Site=Sangara Estate; NearestTown=Popondetta; Region=Oro Province; Country=Papua New Guinea; Latitude=-8.7667; Longitude=148.2333; Comments=Volcanic Ash alluvial deposited
        DataSource=Soil OC from OPRA 2009 Annual Report. BD from Banabas PhD Thesis. SAT = total porosity, DUL = SAT - 0.05, LL = DUL-0.1, AD = LL/3
        Water
          Thickness  BD    AirDry  LL15   DUL    SAT
          100        1.22  0.127   0.38   0.48   0.53
          200        1.22  0.127   0.38   0.48   0.53
          300        1.43  0.1     0.3    0.4    0.45
          300        1.14  0.137   0.41   0.51   0.56
          300        1.15  0.135   0.406  0.506  0.556
          300        1.15  0.135   0.406  0.506  0.556
          500        1.43  0.1     0.3    0.4    0.45
          500        1.43  0.1     0.3    0.4    0.45
          500        1.43  0.1     0.3    0.4    0.45
          500        1.43  0.1     0.3    0.4    0.45
          500        1.43  0.1     0.3    0.4    0.45
          1000       1.43  0.1     0.3    0.4    0.45
          SoilCrop OilPalm
            LL=[0.38, 0.38, 0.3, 0.41, 0.406, 0.406, 0.3, 0.3, 0.3, 0.3, 0.3, 0.3]
            KL=[0.03, 0.02, 0.02, 0.01, 0.01, 0.01, 0.01, 0.01, 0.01, 0.01, 0.01, 0.01]
            XF=[1, 1, 1, 1, 1, 1, 1, 1, 1, 1, 1, 1]
        SoilWater: SummerCona=5; SummerU=5; SummerDate=1-Nov; WinterCona=5; WinterU=5; WinterDate=1-Apr; DiffusConst=88; DiffusSlope=35.4; Salb=0.18; CN2Bare=68; CNRed=20; CNCov=0.8; Slope=0; DischargeWidth=0; CatchmentArea=0; MaxPond=0; Thickness=[100, 200, 300, 300, 300, 300]; SWCON=[0.7, 0.7, 0.7, 0.7, 0.7, 0.7]
        SoilOrganicMatter: RootCN=30; RootWt=3000; SoilCN=10; EnrACoeff=7.4; EnrBCoeff=0.2; OCUnits=Total
          Thickness  OC    FBiom  FInert
          100        2.3   0.04   0.18
          100        1.06  0.03   0.4
          100        0.65  0.015  0.62
          300        0.5   0.01   0.8
          300        0.4   0.01   0.99
          4100       0.4   0.01   0.99
        Analysis: Thickness=[100, 100, 100, 300, 300, 4100]; PH=[6.3, 6.4, 6.7, 6.8, 6.8, 6.8]; PHUnits=Water; BoronUnits=HotWater
        InitialWater Initial water: FractionFull=1; PercentMethod=EvenlyDistributed
        Sample Initial nitrogen: NO3Units=kgha; NH4Units=ppm; SWUnits=Volumetric; OCUnits=Total; PHUnits=Water
          Thickness  NO3  NH4
          100        217  0
          200        30   0
          300        5    0
          300        5    0
          300        0    0
          3800       0    0
      outputfile AnnualOutput: filename=Population110 Block AnnualOutput.out; title=Population110 Block AnnualOutput
        variables
          variables: year, dd/mm/yyyy as Date, OilPalm.Age, AnnualYield, CumulativeFrondNumber, AnnualBunches, AnnualRain, AnnualEo, AnnualNPP, AnnualNFixation, UnderstoryCoverGreen
        events Reporting Frequency: event=end_year
      outputfile MonthlyOutput: filename=Population110 Block MonthlyOutput.out; title=Population110 Block MonthlyOutput
        variables
          variable:
            year
            dd/mm/yyyy as Date
            Age
            Month
            MonthlyRain
            MonthlyPalmBunches
            MonthlyPalmYield
            MonthlyPalmBunchSize
            LAI
            Stemmass
            oc(1)
            oc(2)
            oc(3)
            carbon_tot()
            nit_tot()
            MonthlyN2O
            MonthlyNLeach
            MonthlyDenit
            surfaceom_wt_oilpalmstem as FelledStemMass
            surfaceom_wt_oilpalm as FrondPileMass
        events Reporting Frequency: event=end_month
      tracker
        variable:
          sum of HarvestFFB on harvesting from AnnualOutput.reported to now as AnnualYield
          sum of HarvestBunches on harvesting from AnnualOutput.reported to now as AnnualBunches
          sum of Rain on post from AnnualOutput.reported to now as AnnualRain
          sum of eo on post from AnnualOutput.reported to now as AnnualEo
          sum of dltDM on post from AnnualOutput.reported to now as AnnualNPP
          sum of n2o_atm() on post from MonthlyOutput.reported to now as MonthlyN2O
          sum of leach_no3 on post from MonthlyOutput.reported to now as MonthlyNLeach
          sum of dnit() on post from MonthlyOutput.reported to now as MonthlyDenit
          sum of UnderstoryNFixation on post from AnnualOutput.reported to now as AnnualNFixation
          sum of Rain on post from MonthlyOutput.reported to now as MonthlyRain
          sum of HarvestFFB on harvesting from MonthlyOutput.reported to now as MonthlyYield
  simulation Population148 -> /simulations/Population110
    area Block -> /simulations/Population110/Block
      manager Palm Management
        planting_date = 01/03/1996
        population = 148  # Plant Population (/ha)
        cultivar = Dami
        year1N = 0.14  # N applied in year 1 (kg/palm)
        year2N = 0.3  # N applied in year 2 (kg/palm)
        year3N = 0.6  # N applied in year 3 (kg/palm)
        year4N = 0.9  # N applied in year 4 (kg/palm)
        MatureN = 1.05  # N applied to mature palms (kg/palm)
        on start_of_day:
        script: same as in Population110.Block.Palm Management
        on Init:
```
Plant_population = 0
```
      outputfile AnnualOutput -> /simulations/Population110/Block/AnnualOutput: filename=Population148 Block AnnualOutput.out; title=Population148 Block AnnualOutput
        variables -> /simulations/Population110/Block/AnnualOutput/Variables
        events Reporting Frequency -> /simulations/Population110/Block/AnnualOutput/Reporting Frequency
      outputfile MonthlyOutput -> /simulations/Population110/Block/MonthlyOutput: filename=Population148 Block MonthlyOutput.out; title=Population148 Block MonthlyOutput
        variables -> /simulations/Population110/Block/MonthlyOutput/Variables
        events Reporting Frequency -> /simulations/Population110/Block/MonthlyOutput/Reporting Frequency
  simulation Population186 -> /simulations/Population110
    area Block -> /simulations/Population110/Block
      manager Palm Management
        planting_date = 01/03/1996
        population = 186  # Plant Population (/ha)
        cultivar = Dami
        year1N = 0.14  # N applied in year 1 (kg/palm)
        year2N = 0.3  # N applied in year 2 (kg/palm)
        year3N = 0.6  # N applied in year 3 (kg/palm)
        year4N = 0.9  # N applied in year 4 (kg/palm)
        MatureN = 1.05  # N applied to mature palms (kg/palm)
        on start_of_day:
        script: same as in Population110.Block.Palm Management
        on Init:
```
Plant_population = 0
```
      outputfile AnnualOutput -> /simulations/Population110/Block/AnnualOutput: filename=Population186 Block AnnualOutput.out; title=Population186 Block AnnualOutput
        variables -> /simulations/Population110/Block/AnnualOutput/Variables
        events Reporting Frequency -> /simulations/Population110/Block/AnnualOutput/Reporting Frequency
      outputfile MonthlyOutput -> /simulations/Population110/Block/MonthlyOutput: filename=Population186 Block MonthlyOutput.out; title=Population186 Block MonthlyOutput
        variables -> /simulations/Population110/Block/MonthlyOutput/Variables
        events Reporting Frequency -> /simulations/Population110/Block/MonthlyOutput/Reporting Frequency
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