memo
  A wheat crop sown on 300 mm of wet soil.
  Soil PAWC of 136mm (P. Poulton pers comm)
  Starting soil NO3 of 66 kg/ha
  Sown mid May 30 kg/ha N at sowing, 30 kg/ha N mid August as a top dressing
  Wheat yields should fall between 1 t/ha and 4 t/ha (P. Poulton pers comm)
memo
  These simulations compare predictions with District Agronomists  estimate of average yields at Dalby and Roma for average or ideal sowing moisture conditions.
  A wheat crop sown on differing depths of wet soil with profile PAWC of 130 mm at Roma and  400mm at Dalby.
  100 kg/ha N is applied at Dalby and 40 kg/ha at Roma.
  Sown mid May.
memo
  Simulations to be compared to Warra long term trial yields.
  A wheat crop sown on 600 or 1500 mm of wet soil with either 10 or 75 kg/ha of N applied at sowing.  Soil PAWC of 200mm (Properties from Dr M Probert).  Starting soil NO3 of 50 kg/ha (similarto Trials 0N treatments) for low N system and 100 kg/ha for high N system.  Sown mid May.

  Predicted Wheat Yields should
  1) rarely exceed 4.5 - 5 t/ha for the high N treatments  and 2 t/ha for the low N treatments.
  2) get down to below 1 t/ha for low sowing PAWC and 2 t/ha for high sowing PAWC.

  Predicted Grain N% should
  1) Decrease from 3% at 1 t/ha to 2% at 4.5 t/ha for the High N conditions.
  2) Decrease from 2.5 % at 1 t/ha to 1.5% at 2 t/ha  for the Low N conditions.
memo
  Simulations to be compared to Warra long term trial yields.
  A wheat crop sown on 600 or 1500 mm of wet soil with either 10 or 75 kg/ha of N applied at sowing.  Soil PAWC of 200mm (Properties from Dr M Probert).  Starting soil NO3 of 50 kg/ha (similarto Trials 0N treatments) for low N system and 100 kg/ha for high N system.  Sown mid May.

  Predicted Wheat Yields should
  1) rarely exceed 4.5 - 5 t/ha for the high N treatments  and 2 t/ha for the low N treatments.
  2) get down to below 1 t/ha for low sowing PAWC and 2 t/ha for high sowing PAWC.

  Predicted Grain N% should
  1) Decrease from 3% at 1 t/ha to 2% at 4.5 t/ha for the High N conditions.
  2) Decrease from 2.5 % at 1 t/ha to 1.5% at 2 t/ha  for the Low N conditions.
memo
  These simulations compare predictions with District Agronomists estimate of average yields at Gunnedah and Walgett for average or ideal sowing moisture conditions.
  A wheat crop sown on 750 or 1500 mm of wet soil with profile PAWC of 250mm.
  Starting soil NO3 of 40 kg/ha .  Sown mid May.

  Average Yields for normal sowing soil moisture conditions should be 4 t/ha for Gunnedah and 3 t/ha for Walgett.
  Average Yields for good sowing soil moisture conditions should be 5 t/ha for Gunndeah and 4.5 t/ha for Walgett.
memo
  Simulations to be compared to Roseworthy long term experimental yields.
  A wheat crop sown on 200mm of wet soil with either 40 or 120 kg/ha of N in the soil at sowing.
  Soil PAWC of XXXmm  (Properties from Dr B. Bellotti).  The crop is sown mid May.
   base application of 40 kg/ha of N is applied at sowing with an optional second application of 40kg/ha in August.
memo
   These simulations compare predictions with data for Walpeup Research Station found in O'Leary and Conner, Agric. Systems, 52 (1996) pp. 31-55.

  A wheat crop sown on 200 mm of wet soil for a sandy soil  (93mm PAWC to 1m) . Starting soil NO3 of 150 kg/ha assuming previous legume phase .
  Sown mid May. 10 kg/ha N is applied at sowing.

  Yields should return up to 4 t/ha.  The authors never measured a yield below 1t/ha but this would reflect the nature of the experimental seasons.

  Grain nitrogen concentrations should reach 3% for low yields,  2.5 % for 2 t/ha crops and 2% for high yields.
memo
   These simulations compare predictions with data for Walpeup Research Station found in O'Leary and Conner, Agric. Systems, 52 (1996) pp. 31-55.

  A wheat crop sown on 200 mm of wet soil for a sandy soil  (93mm PAWC to 1m) . Starting soil NO3 of 150 kg/ha assuming previous legume phase .
  Sown mid May. 10 kg/ha N is applied at sowing.

  Yields should return up to 4 t/ha.  The authors never measured a yield below 1t/ha but this would reflect the nature of the experimental seasons.

  Grain nitrogen concentrations should reach 3% for low yields,  2.5 % for 2 t/ha crops and 2% for high yields.
memo
  These simulations compare predictions with District Agronomists estimate of average yields at Mingenew, WA.

  A wheat crop sown on 300 mm of wet soil for a red sandy clay loam (240mm PAWC) or a deep Sand (120 mm PAWC).  Starting soil NO3 of 100 kg/ha .
  Sown mid May.  10 kg/ha N is applied at sowing with a further 40kg/ha N as a top dressing.

  Yields should vary between 1 t/ha and 5 t/ha with a median or over 3 t/ha(N. Dalgliesh pers com).  There should be no large effect of soil type.
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