folder Simulations: version=36; creator=Apsim 7.7-r3765
  simulation SlopeEffectsOnWeatherOutputs
    clock
      start_date = 01/07/2000  # Enter the start date of the simulation
      end_date = 30/06/2001  # Enter the end date of the simulation
    memo info
                    TEST  -  effects of topography (slope and aspect) on weather

           Simple test for the outputs of SlopeEffectsOnWeather and the effect of varying detail on weather data
              - All paddocks with a moderately steep slope (30o), north facing, and with changes to rain, wind and vp
              - First paddock has only the minimum weather data
              - Second paddock has basic, or typical, weather data
              - Third paddock has comprehensive weather data
              - All outputs from SlopeEffectsOnWeather are exposed

          >> NOTE:  when not defined in the weather file, the value of vp is calculated by the MetFile.
                 In this case re-setting it using SlopeEffectsOnWeather (or a manager) will result in and error

                  » By RCichota
    summaryfile
    area Pdk1-MinimumWData
      manager AuxManager
        on init:
```
Tmean = 0
```
        on start_of_day:
```
 Tmean = 0.5 * (mint + maxt)
```
      manager2 Cut rotation for AgPasture
        # Setting up a cut rotation for AgPasture
        CutPasture_StartDate = 01/01/1900  # Date to start rotation (dd/mm/yyyy)
        CutPasture_EndDate = 31/12/2100  # Date to end rotation (dd/mm/yyyy)
        # Parameters defining the interval and amount to remove
        CutTriggerType = Fixed interval  # Choose the cut trigger type
        CutInterval = 21  # If trigger is interval between cuttings, enter its value (days)
        UpperThreshold = 2000  # If trigger is the sward standing mass, enter the amount (kgDM/ha)
        RemoveAmountType = Down to residual DM  # Choose how the amount to be removed will be computed
        Amount2Remove = 185  # If targeting amount, enter the value to remove at each cut (kgDM/ha)
        LowerThreshold = 1500  # Enter the minimum residual DM after cut (kgDM/ha)
        # Parameters for the management of cut material
        ResidueTreatmentType = Return as dung & urine  # Choose the treatment type for the cut material
        DMRemovalOption = Based on digestibility  # What fraction of DM will be removed from field (0-1)
        FracN2Remove = 0.15  # What fraction of N will be removed from field (0-1)
        # If returning cut material as dung & urine
        NinDungChoice = Set proportion returned  # Choose how N content in dung will be defined
        FracN2Dung = 0.4  # If setting the proportion of N returned in dung, enter the value (0-1)
        CNratioDung = 0.0  # If defining the C:N ratio of dung, enter its value
```vb
Imports System
Imports ModelFramework

'This manager sets up a cutting rotation for AgPasture. The rotation is bounded between two dates. Cuts happens in the first day,
' if possible, and thereof can follow various rotation types. Cut is done on above ground stem and leaf DM (dead and green).
' + Cut trigger types:
'  - Fixed interval:
'     Cut is allowed at given days only (set by start rotation date and then at regular intervals)
'     Cut happens if amount to remove is set or if existing DM is greater than LowerTheshold
'  - Target interval: 
'     Cut is allowed from given days (begins at start rotation date and at regular intervals after last cut)
'     Cut happens if amount to remove is set or if existing DM is greater than LowerTheshold
'  - Target standing mass:
'     Cut is allowed when existing DM reaches the target value (UpperThreshold, which can be variable)
'     Cut always happens (unless UpperThreshold is bellow LowerTheshold
'
' + Remove amount options:
'  - Set amount: The amount to remove is fixed, if this amount is not available, no cut is performed
'  - Target amount: The amount is the smallest of a given value and difference between existing DM and a target (LowerTheshold of CoverTarget)
'  - Down to residual DM: Amount to remove is the difference between existing DM and minimum residual DM (option is not valid if CutTrigger is 'Target DM cover')
'
' + Manage residues options:
'  - Return as residue: A fraction of the DM cut is added as grass residue to the surfaceOM module;
'  - Return as dung & urine: A fraction of the amount cut is returned to the soil as evenly distributed urine and dung. 
'     This is a very simplified approach where the fractions of DM (C) and N to be removed are set separately. Also,
'      the partition of N between urine and dung is set by the user. 
'     N urine is added as urea fertiliser (top 10cm) and the remaining DM and N are added to surfaceOM as dung (RuminantDung_PastureFed).
'  + Defining the N content in dung:
'    - Set proportion returned: A fraction of N not removed from field is returned in dung. This is defined by FracN2Dung.
'    - Set CN ratio: The used defines a C:N ratio for dung. Defined by CNratioDung. Note that this option may alter the Amount returned as urine (to ensure mass balance).


'-->  Last uptaded in: 20/Jun/2015 ..................


Public Class Script 
   
   'Parameter variables:
   <param> Private CutPasture_StartDate As String        'Date to start the cutting rotation
   <param> Private CutPasture_EndDate As String          'Date to end cutting rotation

   <param> Private CutTriggerType As String              'The cut trigger type
   <param> Private CutInterval As Integer                'The interval between cuts, if cut type is fixed intervals (days)
   <param> Private UpperThreshold As String              'The DM amount to trigger a cut, if cut type is target DM (kg/ha, DM above ground), (values will be interpolated using DoY)

   <param> Private RemoveAmountType As String            'The way to compute how much pasture is cut
   <param> Private Amount2Remove As Double               'The amount of DM to be removed at each cut, limited to residual DM (LowerThreshold) (kg/ha, DM above ground)
   <param> Private LowerThreshold As String              'The residual DM amount left after cut (kg/ha, DM above ground); cut only happens if DM is greater than this (values will be interpolated using DoY)

   <param> Private ResidueTreatmentType As String        'The treatment to the material cut
   <param> Private DMRemovalOption As String             'The option to remove DM, based on digestibility of a fraction (0-1)
   <param> Private FracN2Remove As Double                'Fraction of the N in the material cut that is removed from simulation (0-1)
   <param> Private NinDungChoice As String               'The way N in dung is defined,either SetProportionReturned or SetCNratio
   <param> Private FracN2Dung As Double                  'The fraction of returned N that goes into dung, if return is as dung and urine (0-1)
   <param> Private CNratioDung As Double                 'The C:N ratio of dung, if return is as dung and urine
         
   'Links and events:
   <Link> Private MyAgPasture As AgPasture
   <Link> Private MySelf As Component
   <[Event]()> Public Event Graze As GrazeDelegate
   <[Event]()> Public Event BiomassRemoved As BiomassRemovedDelegate
   <Link> Private MyFert As Fertiliser
   '<[Event]()> Public Event FertiliserApplication As FertiliserApplicationDelegate

   
   'Variables read from other modules
   <Input> Private today As DateTime                     'Today's date
   <Input> Private day As Integer                        'Today's day of year
   
   'Outputs
   <Output><Units("")> Public Can_Cut As String                      'Whether today is a cutting day
   <Output><Units("")> Public Has_Cut As String                      'Whether today's cut was done
   <Output><Units("kg/ha")> Public harvested_dm As Double            'Pasture DM harvested today (kg/ha)
   <Output><Units("kgN/ha")> Public harvested_n As Double            'N harvested today
   <Output><Units("kg/ha")> Public removed_dm As Double              'DM removed from the simulation
   <Output><Units("kgN/ha")> Public removed_n As Double              'N removed from the simulation
   <Output><Units("kgN/ha")> Public returned_dm As Double            'DM returned to the paddock
   <Output><Units("kgN/ha")> Public returned_n As Double             'N returned to the paddock
   <Output><Units("kgN/ha")> Public NReturn_asDung As Double         'N returned as dung (SurfOM)
   <Output><Units("kgN/ha")> Public NReturn_asUrine As Double        'N returned as urine (urea)
   <Output><Units("kg/ha/day")> Public GrowthRateCalc As Double      'Average growth rate for this cut
   <Output><Units("%")> Public Nconc_inRemoved As Double             'N concentration on the cut material
   <Output><Units("days")> Public DaysAfterCut As Integer            'Number of days after last cut
   <Output><Units("kg/ha")> Public TodaysTargetCover As Double       'Target cover for today
   <Output><Units("kg/ha")> Public TodaysTargetPreGraze As Double    'Pregrazing target for today
   <Output><Units("kg/ha")> Public TodaysTargetResidual As Double    'Residual target for today
   <Output><Units("kg/ha")> Public PreHarvestDM As Double            'Total standing DM (Stem + Leaf) before cut
   <Output><Units("kg/ha")> Public PostHarvestDM As Double           'Total standing DM (Stem + Leaf) after cut

   'Internal variables
   Private StartDate As DateTime                'The date when cutting starts (in date format)
   Private EndDate As DateTime                  'The date when cuttings finish (in date format)
   Private FracDM2Remove As Double              'The fraction of DM to be removed from the simulation (0-1)
   Private TargetPreGrazeDays() As Integer      'The days at which each target pregraze DM is valid
   Private TargetPreGrazeValues() As Double     'The target standing DM for different periods over the year
   Private TargetResidualDays() As Integer      'The days at which each target residual DM is valid
   Private TargetResidualValues() As Double     'The target residuals for different periods over the year
   Private Allow_Cut As String                  'Whether cutting are allowed
   
   <EventHandler()> Public Sub OnInitialised()

      'Put the dates into date format:
      StartDate = DateTime.Parse(CutPasture_StartDate & " 06:00:00 am")
      EndDate = DateTime.Parse(CutPasture_EndDate & " 06:00:00 pm")
                  
      'Set the target pregraze arrays
      TargetPreGrazeValues = makeArray(UpperThreshold)
      TargetPreGrazeDays = setDays(TargetPreGrazeValues)
      'Set the target residuals arrays
      TargetResidualValues = makeArray(LowerThreshold)
      TargetResidualDays = setDays(TargetResidualValues)
            
      'Reset variables
      DaysAfterCut = CutInterval - 1
      Allow_Cut = "no" 
      Can_Cut = Allow_Cut
      Has_Cut = "no"
      TodaysTargetCover = 0.0
  
      'The fraction of DM to remove
      ' - DMRemovalOption can be a value (0-1 = FracDM2Remove) or a string, which tell us that FracDM2Remove is based on digestibility
      If DMRemovalOption.ToLower = "based on digestibility" Then
         FracDM2Remove = MyAgPasture.HarvestedDigestibility
      Else
         Try
            FracDM2Remove = DMRemovalOption
            If (FracDM2Remove < 0) Or FracDM2Remove > 1 Then
               Throw New Exception("Fraction of DM to remove is out of bounds")
            End If
         Catch
            Throw New Exception("Fraction of DM to remove is not valid")
         End Try
      End If
      'The fraction of N to remove
      If (FracN2Remove < 0) Or FracN2Remove > 1 Then
         Throw New Exception("Fraction of N to remove is out of bounds")
      End If
      'How to return residues (DM and N)
      If ResidueTreatmentType.Contains("urine") Then
         If NinDungChoice.Contains("proportion") Then
            If (FracN2Dung < 0 Or FracN2Dung > 1) Then
               Throw New Exception("Proportion of N to return as dung is out of bounds")
            End If
         Else If NinDungChoice.Contains("CN ratio") Then
            If (CNratioDung < 0 Or CNratioDung > 50) Then
               Throw New Exception("C:N ratio of dung is out of bounds")
            End If
         Else
            Throw New Exception("Choice for setting N content in dung is not valid")
         End If
      End If
      
      'Check whether choices are allowed and prepare messages     
      Dim myMessage1 As String
      Dim myMessage2 As String
      Select Case CutTriggerType.ToLower
         Case "fixed interval"
            If RemoveAmountType.ToLower.Contains("interval") Then
               Throw New Exception("Fixed interval trigger is not valid with Cut amount defined by 'set interval'")
            ElseIf RemoveAmountType.ToLower.Contains("amount") Then
               myMessage2 = "   remove " & RemoveAmountType.ToLower & " = " & Amount2Remove.ToString("#0") & " kg/ha"
            Else
               myMessage2 = "   remove " & RemoveAmountType.ToLower & " = [" & LowerThreshold & "] kg/ha"
            End If
            myMessage1 = ", cut only every " & CutInterval.ToString & " days"
         Case "target interval"
            If RemoveAmountType.ToLower.Contains("interval") Then
               Throw New Exception("Target interval trigger is not valid with cut amount defined by 'set interval'")
            ElseIf RemoveAmountType.ToLower.Contains("amount") Then
               myMessage2 = "   remove " & RemoveAmountType.ToLower & " = " & Amount2Remove.ToString("#0") & " kg/ha"
            Else
               myMessage2 = "   remove " & RemoveAmountType.ToLower & " = [" & LowerThreshold & "] kg/ha"
            End If
            myMessage1 = ", cut every " & CutInterval.ToString & " days, or when possible"
         Case "target standing mass" 
            If RemoveAmountType.ToLower.Contains("interval") Then
               Throw New Exception("Target standing mass trigger is not valid with cut amount defined by 'set interval'")
            ElseIf RemoveAmountType.ToLower.Contains("amount") Then
               myMessage2 = "   remove " & RemoveAmountType.ToLower & " = " & Amount2Remove.ToString("#0") & " kg/ha"
            Else
               myMessage2 = "   remove " & RemoveAmountType.ToLower & " = [" & LowerThreshold & "] kg/ha"
            End If
            myMessage1 = ", cut when DM reaches [" & UpperThreshold & "] kgDM/ha"
         Case Else
            Throw New Exception("Cut trigger type is not valid")
      End Select
      
      'write messages on summary file
      Console.WriteLine("")
      Console.WriteLine("   Cut rotation for AgPasture initialised")
      Console.WriteLine("     rotation rule valid between " & StartDate.ToString("dd/MM/yyyy") & " and " & EndDate.ToString("dd/MM/yyyy"))
      Console.WriteLine("     cut type: " & CutTriggerType & myMessage1)
      Console.WriteLine(myMessage2)
      Dim myValue1 As Double = (1 - FracDM2Remove) * 100
      Console.WriteLine("     fraction to " & ResidueTreatmentType.ToLower & ": " & myValue1.ToString("#0.0") & "%")
      Console.WriteLine("")
      
   End Sub
      
   <EventHandler()> Public Sub OnPrepare()
      
      PreHarvestDM = MyAgPasture.StandingHerbageWt
      Dim preharvest_dm As Double = PreHarvestDM
      Dim preharvest_n As Double = MyAgPasture.StandingHerbageN
      Dim Amount2Cut As Double
      Dim AmountCuttable As Double
      
      'Reset variables:
      Has_Cut = "no"
      harvested_dm = 0.0
      harvested_n = 0.0
      removed_dm = 0.0
      removed_n = 0.0
      returned_dm = 0.0
      returned_n = 0.0
      GrowthRateCalc = 0.0
      Nconc_inRemoved = 0.0
      NReturn_asDung = 0.0
      NReturn_asUrine = 0.0
      DaysAfterCut = DaysAfterCut + 1
      TodaysTargetResidual = InterpolateVals(day, TargetResidualDays, TargetResidualValues)
      
      'Decide whether cut is allowed:
      If (Today.Date >= StartDate.Date And Today.Date <= EndDate.Date) Then
         Select Case CutTriggerType.ToLower
            Case "fixed interval"
               'Allways send an Allow_Cut if interval is right, it will be reset in the end of the day
               If DaysAfterCut >= CutInterval Then
                  Allow_Cut = "yes"
               Else
                  Allow_Cut = "no"  'always reset allow_cut
               End If
            Case "target interval" 
               'Allways send an Allow_Cut if interval is right, it will be reset only if cut actually happens (depends on amount type)
               If DaysAfterCut >= CutInterval Then
                  Allow_Cut = "yes"
               End If
            Case "target standing mass"
               'Send an Allow_Cut if DM amount is above the target (UpperThreshold/TodaysTargetPreGraze), it will be reset if cut actually happens
               TodaysTargetPreGraze = InterpolateVals(day, TargetPreGrazeDays, TargetPreGrazeValues)
               If preharvest_dm >= TodaysTargetPreGraze Then
                  Allow_Cut = "yes"
               End If
         End Select

         'The use of these avoid (or at least reduces) problems when two managers are used in the same simulation
         Can_Cut = Allow_Cut

         'Decide how much to cut:
         If Allow_Cut = "yes" Then
            Select Case RemoveAmountType.ToLower
               Case "set amount"
                  Amount2Cut = Amount2Remove
                  If CutTriggerType.ToLower = "fixed interval" Then
                     AmountCuttable = preharvest_dm
                  Else
                     AmountCuttable = math.Max(0, preharvest_dm - TodaysTargetResidual)
                  End If
               Case "target amount"
                  Amount2Cut = math.Min(math.Max(0, preharvest_dm - TodaysTargetResidual), Amount2Remove)
                  AmountCuttable = math.Max(0, preharvest_dm - TodaysTargetResidual)
               Case "down to residual dm"
                  Amount2Cut = math.Max(0, preharvest_dm - TodaysTargetResidual)
                  AmountCuttable = math.Max(0, preharvest_dm - TodaysTargetResidual)
               Case Else
                  Throw New Exception("Option to compute DM amount to remove is not valid")
            End Select              

            'Decide whether cut actually happens:
            If (AmountCuttable >= Amount2Cut) Then
               Call CutPasture(Amount2Cut)
               'reset cut variables
               DaysAfterCut = 0
               Has_Cut = "yes"
               Allow_Cut = "no"
               PostHarvestDM = MyAgPasture.StandingHerbageWt
            End If
         Else
            Amount2Cut = 0
            AmountCuttable = 0
         End If         
      End If

   End Sub 


   Sub CutPasture(ByVal Amount2Cut As Double) 
       
      ' --------------------------------------------------------------------------------------------
      ' Cutting pasture
      ' --------------------------------------------------------------------------------------------
            
      Dim CutData As New GrazeType
      CutData.sender = "Manager"
      CutData.amount = Amount2Cut
      Cutdata.type = "SetRemoveAmount"
      RaiseEvent Graze(CutData)
      harvested_dm = MyAgPasture.HarvestedWt
      harvested_n = MyAgPasture.HarvestedN

      GrowthRateCalc = harvested_dm / DaysAfterCut
      If harvested_dm > 0 Then
         Nconc_inRemoved = harvested_n * 100 / harvested_dm
      End If
                  
      'Let user know (via summary) that a cut was made
      Console.WriteLine(Today.ToString("dd MMMM yyyy") + " (Day of year=" + Today.DayOfYear.ToString + "), " & MySelf.Name & ":")
      Console.WriteLine("     Removing " + harvested_dm.ToString("#0") + "kg DM/ha, with " & harvested_n.ToString("#0.0") & "kg N/ha")

      ' -- Residue management -------------------------------------------------------------------------
      If DMRemovalOption.ToLower = "based on digestibility" Then
         FracDM2Remove = MyAgPasture.HarvestedDigestibility
      End If
      removed_dm = harvested_dm * FracDM2Remove
      removed_n = harvested_n * FracN2Remove
      returned_dm = harvested_dm - removed_dm 
      returned_n = harvested_n - removed_n 
      
      If returned_dm < 0.0 Then
         Throw New Exception("Return_DM value is negative")
      End If
      If returned_n < 0.0 Then
         Throw New Exception("Return_N value is negative")
      End If
      
      If ResidueTreatmentType.ToLower = "return as residue" Then
         If FracDM2Remove < 1 Then
            Dim SOMData As New BiomassRemovedType
            SOMData.crop_type = "grass"
            SOMData.dm_type = New String() {SOMData.crop_type}
            SOMData.dlt_crop_dm = New Single() {returned_dm}
            SOMData.dlt_dm_n = New Single() {returned_n}
            SOMData.dlt_dm_p = New Single() {0.0}
            SOMData.fraction_to_residue = New Single() {1.0}
            RaiseEvent BiomassRemoved(SOMData)     'this works
         End If
         
      ElseIf ResidueTreatmentType.ToLower = "return as dung & urine" Then
         ' It is advised that dung and urine return should be done using another manager or modules, such as 'UrinePatch' 
         
         If NinDungChoice.Contains("proportion") Then
            NReturn_asDung = returned_n * FracN2Dung
         Else If NinDungChoice.Contains("CN ratio") Then
            NReturn_asDung = returned_dm / CNratioDung
         End If
         NReturn_asUrine = math.Max(0, returned_n - NReturn_asDung)

         If NReturn_asDung > returned_n Then
            Throw New Exception("Amount of N to return as dung is larger than total return, check proportion or CN ratio")
         End If

         Dim SOMData As New BiomassRemovedType
         SOMData.crop_type = "RuminantDung_PastureFed"
         SOMData.dm_type = New String() {SOMData.crop_type}
         SOMData.dlt_crop_dm = New Single() {returned_dm}
         SOMData.dlt_dm_n = New Single() {NReturn_asDung}
         SOMData.dlt_dm_p = New Single() {0.0}
         SOMData.fraction_to_residue = New Single() {1.0}
         RaiseEvent BiomassRemoved(SOMData)
         
         If NReturn_asUrine > 0 Then
            Dim UrineData As New FertiliserApplicationType
            UrineData.Amount = NReturn_asUrine
            UrineData.Depth = 10
            UrineData.Type = "urea_n"
            Myfert.Apply(UrineData)
            'RaiseEvent FertiliserApplication(UrineData)   ' This doesn't work
         End If
         
      Else
         Throw New Exception("Residue management type is not valid")
      End If
      
   End Sub
 
   Function makeArray(ByVal ArrayString As String) As Double()
      
      'Get the string with values from the user interface and put the values in an numeric array
      
      Dim MyArray_string As String()
      Dim MyArray_numeric As Double()
      Dim Separator As Char() = " "
      
      '1-Split string into array
      MyArray_string = ArrayString.Split(Separator, StringSplitOptions.RemoveEmptyEntries)
      
      '2-convert array into type single
      ReDim MyArray_numeric(MyArray_string.Length - 1)      
      For i As Integer = 0 To MyArray_numeric.length - 1
         MyArray_numeric(i) = CDbl(MyArray_string(i))
      Next
      Return MyArray_numeric
      
   End Function
   
   Function setDays(ByVal yArray As Double()) As Integer()
      
      'Define the day of year for each value on yArray - first value, day=1; last value day = 365; dates in between spread evenly (rounded)
      Dim NumDates = yArray.Length
      Dim xArray(yArray.Length - 1) As Integer
      xArray(0) = 1
      If NumDates < 366 Then
         If yArray.Length > 1 Then
            xArray(yArray.Length - 1) = 365
            If yArray.Length > 2 Then
               For i As Integer = 0 To yArray.Length - 1
                  xArray(i) = 365 * i / (yArray.Length - 1)
               Next
            End If
         End If
      Else
         Throw New Exception("Number of items on CoverTarget greater than maximum allowed (365)")
      End If
      Return xArray
      
   End Function

   Function InterpolateVals(ByVal my_x As Integer, ByVal xArray As Integer(), ByVal yArray As Double()) As Double
      
      'Find out the value correspondig to my_x in the function described by the x and y arrays
      Dim my_y As Double
      If my_x <= xArray(0) Then
         'values below x(0) are set to y(0)
         my_y = yArray(0)
      ElseIf my_x >= xArray(xArray.length - 1) Then
         'value above x(n) are set to y(n)
         my_y = yArray(yArray.length - 1)
      Else
         'find the nearest neighbours and interpolate (linear)
         For i As Integer = 1 To xArray.length - 1
            If my_x <= xArray(i) Then
               my_y = yArray(i - 1) + ((my_x - xArray(i - 1)) * (yArray(i) - yArray(i - 1)) / (xArray(i) - xArray(i - 1)))
               i = xArray.length 
            End If
         Next
      End If
      Return my_y
      
   End Function

End Class
```
      metfile met
        filename=%apsim%\Tests\SlopeEffectsOnWeather\Outputs\LincolnExcerpt1.met
      SlopeEffectsOnWeather
        # General description of the site
        SlopeAngle = 30  # Slope angle, from horizontal (degrees)
        AspectAngle = 180  # Aspect angle, clockwise from south (degrees)
        Altitude = 50  # Mean altitude (meters above sea level)
        SurroundsAlbedo = 0.2  # Albedo of surrounding environment (0-1)
        # Parameters to adjust solar radiation
        A_diffuseR = -3.664  # Parameter A of diffuse radiation function
        B_diffuseR = 7.011  # Parameter B of diffuse radiation function
        TurbidityCoefficient = 0.95  # Mean air turbidity for direct radiation (0-1)
        defaultWindSpeed = 0.0  # Default value for wind speed, used when not supplied in met file (m/s)
        # Parameters to adjust min and max temperatures
        aT0 = 1.61  # Parameter aT0, change in temperature as function of radiation (oC per MJ/m2/day)
        bT = 0.88  # Parameter bT, exponent to modify the rate of change (>0.0)
        cT = 0.12  # Parameter cT, accounts for wind effects (0-1)
        FN = 0.81  # Parameter FN, used for negative delta radiation (0-1)
        FM = 0.50  # Parameter FM, adjust for minimum temperatures (0-1)
        # Parameters to adjust other variables (not function of slope)
        dRain = 5.0  # Relative change in daily rainfall (%)
        dWind = 25.0  # Relative change in mean wind speed (%)
        dVapPressure = -10.0  # Relative change in mean vapour pressure (%)
      micromet
        soilalbedo = 0.23
        a_interception = 0
        b_interception = 0
        c_interception = 0
        d_interception = 0
      fertiliser
      irrigation
        automatic_irrigation = on
        asw_depth = 600  # Depth to which ASW is calculated. (mm)
        crit_fr_asw = 0.5  # Fraction of ASW below which irrigation is applied (0-1.0)
        irrigation_efficiency = 1  # Efficiency of the irrigation. (0-1.0)
        irrigation_allocation = off  # Allocation limits
        allocation = 0  # Allocation in mm
        default_no3_conc = 0  # Nitrate concentration (ppm N)
        default_nh4_conc = 0  # Ammonium concentration (ppm N)
        default_cl_conc = 0  # Chloride concentration (ppm Cl)
      surfaceom SurfaceOrganicMatter
        PoolName = AgPasture  # Organic Matter pool name
        type = grass  # Organic Matter type
        mass = 1000  # Initial surface residue (kg/ha)
        cnr = 15  # C:N ratio of initial residue
        standing_fraction = 0  # Fraction of residue standing
      Soil SoilLismore: SoilType=0; Site=Winchmore; NearestTown=Winchmore; Region=Canterbury; State=New Zealand; NaturalVegetation=0; ApsoilNumber=0; Latitude=0; Longitude=0; LocationAccuracy=0; YearOfSampling=0; DataSource=published soil profile description (as an example)
        Analysis: Thickness=[100, 200, 300, 300, 300, 300, 300]; PH=[5.9, 5.9, 5.9, 5.9, 5.9, 5.9, 5.9]; PHUnits=Water; BoronUnits=HotWater
        Water
          Thickness  BD    AirDry  LL15  DUL   SAT   KS
          100        1.25  0.06    0.14  0.32  0.45  100
          200        1.31  0.06    0.14  0.32  0.45  100
          300        1.23  0.03    0.03  0.07  0.15  200
          300        1.24  0.03    0.03  0.05  0.08  250
          300        1.25  0.03    0.03  0.05  0.08  250
          300        1.26  0.03    0.03  0.05  0.08  350
          300        1.29  0.03    0.03  0.05  0.08  500
          SoilCrop ryegrass_clover: LL=[0.14, 0.14, 0.03, 0.03, 0.03, 0.03, 0.03]; KL=[0.1, 0.1, 0.1, 0.02, 0, 0, 0]; XF=[1, 1, 1, 1, 0, 0, 0]
          SoilCrop agpasture: LL=[0.14, 0.14, 0.03, 0.03, 0.03, 0.03, 0.03]; KL=[0.1, 0.1, 0.1, 0.02, 0, 0, 0]; XF=[1, 1, 1, 1, 0, 0, 0]
          SoilCrop ryegrass: LL=[0.14, 0.14, 0.03, 0.03, 0.03, 0.03, 0.03]; KL=[0.1, 0.1, 0.1, 0.02, 0, 0, 0]; XF=[1, 1, 1, 1, 0, 0, 0]
          SoilCrop clover: LL=[0.14, 0.14, 0.03, 0.03, 0.03, 0.03, 0.03]; KL=[0.1, 0.1, 0.1, 0.02, 0, 0, 0]; XF=[1, 1, 1, 1, 0, 0, 0]
          SoilCrop maize: LL=[0.14, 0.14, 0.03, 0.02, 0.02, 0.02, 0.02]; KL=[0.06, 0.06, 0.06, 0.06, 0.06, 0.06, 0.06]; XF=[1, 1, 1, 1, 1, 1, 1]
          SoilCrop cotton: LL=[0.14, 0.14, 0.03, 0.02, 0.02, 0.02, 0.02]; KL=[0.1, 0.1, 0.1, 0.1, 0.09, 0.07, 0.05]; XF=[1, 1, 1, 1, 1, 1, 1]
          SoilCrop sorghum: LL=[0.14, 0.14, 0.03, 0.02, 0.02, 0.02, 0.02]; KL=[0.07, 0.07, 0.07, 0.05, 0.05, 0.04, 0.03]; XF=[1, 1, 1, 1, 1, 1, 0.9]
          SoilCrop slurp: LL=[0.14, 0.14, 0.03, 0.02, 0.02, 0.02, 0.02]; KL=[0.06, 0.06, 0.06, 0.06, 0.06, 0.06, 0.06]; XF=[1, 1, 1, 1, 1, 1, 1]
        SoilWater: SummerCona=3.5; SummerU=6; SummerDate=1-Nov; WinterCona=2; WinterU=2; WinterDate=1-apr; DiffusConst=88; DiffusSlope=35; Salb=0.13; CN2Bare=73; CNRed=20; CNCov=0.8; Thickness=[100, 200, 300, 300, 300, 300, 300]; SWCON=[0.4, 0.5, 0.6, 0.6, 0.8, 0.8, 0.8]
        SoilOrganicMatter: RootCN=40; RootWt=800; SoilCN=11.3; EnrACoeff=7.4; EnrBCoeff=0.2; OCUnits=Total
          Thickness  OC   FBiom  FInert
          100        4    0.04   0.3
          200        2.5  0.02   0.5
          300        0.5  0.02   0.6
          300        0.1  0.01   0.8
          300        0.1  0.01   1
          300        0    0      1
          300        0    0      1
        Sample Initial nitrogen: NO3Units=kgha; NH4Units=kgha; SWUnits=Volumetric; OCUnits=Total; PHUnits=Water
          Thickness  NO3  NH4
          150        10   0.5
          350        10   0.5
          500        5    0.5
          800        5    0.5
        InitialWater Initial water: FractionFull=0.99; PercentMethod=FilledFromTop
      AgPasture
        # Initial values for each species to be simulated
        SpeciesToSimulate = Ryegrass    WhiteClover  # Name of the species to be simulated
        InitialShootDM = 1500   500  # Initial above ground dry matter weight (kgDM/ha)
        InitialRootDM = 450     150  # Initial root dry matter weight (kgDM/ha)
        InitialRootDepth = 750     350  # Initial rooting depth (mm)
        WaterUptakeSource = calc  # Water uptake done by AgPasture (calc) or by apsim?
      outputfile: filename=SlopeEffectsOnWeatherOutputs Pdk1-MinimumWData.out; title=SlopeEffectsOnWeatherOutputs Pdk1-MinimumWData
        variables
          variables: dd/mmm/yyyy as Date, StandingHerbageWt, HarvestedWt, Rain, RainMeasured, Wind, WindSpeedMeasured, vp, VPMeasured, rh, rhmin, rhmax, RHMeasured, RHmeanMeasured, RHminMeasured, RHmaxMeasured, Radn, RadnMeasured, ExtraterrestrialRadn, RadnDirect, RadnDiffuse, RadnReflected, FracRadnDirect, FracRadnDiffuse, FracRadnReflected, ClearnessIndex, DiffuseRadnFraction, DirRadnRatio, DiffRadnRatio, day_length, MaxDirSunlightLength, ActualDirSunlightLength, AtmosphericPressure, MinT, MaxT, TminMeasured, TmaxMeasured, TmeanActual, Tmean as TmeanMeasured, dltTmin, dltTmax
        events Reporting Frequency: event=end_day
    area Pdk2-BasicWData -> /Simulations/SlopeEffectsOnWeatherOutputs/Pdk1-MinimumWData
      metfile met
        filename=%apsim%\Tests\SlopeEffectsOnWeather\Outputs\LincolnExcerpt2.met
      outputfile -> /Simulations/SlopeEffectsOnWeatherOutputs/Pdk1-MinimumWData/outputfile: filename=SlopeEffectsOnWeatherOutputs Pdk2-BasicWData.out; title=SlopeEffectsOnWeatherOutputs Pdk2-BasicWData
        variables -> /Simulations/SlopeEffectsOnWeatherOutputs/Pdk1-MinimumWData/outputfile/Variables
        events Reporting Frequency -> /Simulations/SlopeEffectsOnWeatherOutputs/Pdk1-MinimumWData/outputfile/Reporting Frequency
    area Pdk3-ComprehensiveWData -> /Simulations/SlopeEffectsOnWeatherOutputs/Pdk1-MinimumWData
      metfile met
        filename=%apsim%\Tests\SlopeEffectsOnWeather\Outputs\LincolnExcerpt3.met
      outputfile -> /Simulations/SlopeEffectsOnWeatherOutputs/Pdk1-MinimumWData/outputfile: filename=SlopeEffectsOnWeatherOutputs Pdk3-ComprehensiveWData.out; title=SlopeEffectsOnWeatherOutputs Pdk3-ComprehensiveWData
        variables -> /Simulations/SlopeEffectsOnWeatherOutputs/Pdk1-MinimumWData/outputfile/Variables
        events Reporting Frequency -> /Simulations/SlopeEffectsOnWeatherOutputs/Pdk1-MinimumWData/outputfile/Reporting Frequency
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