folder Simulations: version=36; creator=Apsim 7.7-r3765
  simulation SlopeEffectsOnWeather
    clock
      start_date = 1/07/1980  # Enter the start date of the simulation
      end_date = 30/06/1981  # Enter the end date of the simulation
    memo info
                    TEST  -  effects of topography (slope and aspect) on weather

           Simple test for the module SlopeEffectsOnWeather
              - First paddock is flat, no changes
              - Second paddock is a 20degrees slope, north facing
              - Third paddock is a 20degrees slope, south facing
              - Fourth paddock is flat, but with changes set for rain and wind

                  » By RCichota
    summaryfile
    area Pdk-Flat
      manager Regular harvest or grazing (with return)
        # Regular harvest or grazing
        AgPasture = agpasture  # Enter pasture type
        date1 = 01/07/1900  # Enter the first harvest or grazing date
        amount_type = SetResidueAmount  # Select the amount type
        amount = 1500  # Enter herbage amount (kg/ha)
        interval = 21  # Enter the intervals between harvest or grazing (days)
        # Material returns
        dm_frac = 0.85  # Fraction of nitrogen returned as excreta
        urine_n_frac = 0.6  # Fraction of returned nitrogen in urine
        urine_depth = 150  # Urine deposit depth (mm)
        on end_of_day:
```
account = account + 1
dm_som = 0
dm_removed = 0
n_returned =0
n_removed =0
n_som = 0
n_urine = 0
n_urine1 = 0
n_urine2 = 0
if ( (today = date('[date1]')) or
     (today >date('[date1]') and account = [interval] )) then
              account = 0
              '[AgPasture]' graze type = '[amount_type]', amount = [amount] (kg/ha)
              digest = HarvestedDigestibility                 
              dm_som = HarvestedWt * (1-digest)
                        
              n_removed  = HarvestedN *(1.0-[dm_frac])
              n_returned = HarvestedN * [dm_frac]
              n_som      = n_returned * ( 1.0 - [urine_n_frac] )
              n_urine    = n_returned *  [urine_n_frac]  
              n_urine1 = 0.6 * n_urine
              n_urine2 = 0.4 * n_urine
               'SurfaceOrganicMatter' add_surfaceom name = '[AgPasture]', type =  grass, mass = dm_som (kg/ha), n = n_som (kg/ha), cpr  = 1.0 () 
              'fertiliser' apply amount =  n_urine1  (kg/ha), depth = 50  (mm), type = urea_n ()
              'fertiliser' apply amount =  n_urine2  (kg/ha), depth = 150 (mm), type = urea_n ()
 endif
```
        on init:
```
account = 0
```
      metfile met: filename=%apsim%\Examples\MetFiles\lincoln.met
      SlopeEffectsOnWeather
        # General description of the site
        SlopeAngle = 0.0  # Slope angle, from horizontal (degrees)
        AspectAngle = 0.0  # Aspect angle, clockwise from south (degrees)
        Altitude = 0.0  # Mean altitude (meters above sea level)
        SurroundsAlbedo = 0.2  # Albedo of surrounding environment (0-1)
        # Parameters to adjust solar radiation
        A_diffuseR = -3.664  # Parameter A of diffuse radiation function
        B_diffuseR = 7.011  # Parameter B of diffuse radiation function
        TurbidityCoefficient = 0.95  # Mean air turbidity for direct radiation (0-1)
        defaultWindSpeed = 0.0  # Default value for wind speed, used when not supplied in met file (m/s)
        # Parameters to adjust min and max temperatures
        aT0 = 1.61  # Parameter aT0, change in temperature as function of radiation (oC per MJ/m2/day)
        bT = 0.88  # Parameter bT, exponent to modify the rate of change (>0.0)
        cT = 0.12  # Parameter cT, accounts for wind effects (0-1)
        FN = 0.81  # Parameter FN, used for negative delta radiation (0-1)
        FM = 0.50  # Parameter FM, adjust for minimum temperatures (0-1)
        # Parameters to adjust other variables (not function of slope)
        dRain = 0.0  # Relative change in daily rainfall (%)
        dWind = 0.0  # Relative change in mean wind speed (%)
        dVapPressure = 0.0  # Relative change in mean vapour pressure (%)
      micromet
        soilalbedo = 0.23
        a_interception = 0
        b_interception = 0
        c_interception = 0
        d_interception = 0
      fertiliser
      irrigation
        automatic_irrigation = on
        asw_depth = 600  # Depth to which ASW is calculated. (mm)
        crit_fr_asw = 0.5  # Fraction of ASW below which irrigation is applied (0-1.0)
        irrigation_efficiency = 1  # Efficiency of the irrigation. (0-1.0)
        irrigation_allocation = off  # Allocation limits
        allocation = 0  # Allocation in mm
        default_no3_conc = 0  # Nitrate concentration (ppm N)
        default_nh4_conc = 0  # Ammonium concentration (ppm N)
        default_cl_conc = 0  # Chloride concentration (ppm Cl)
      surfaceom SurfaceOrganicMatter
        PoolName = AgPasture  # Organic Matter pool name
        type = grass  # Organic Matter type
        mass = 1000  # Initial surface residue (kg/ha)
        cnr = 15  # C:N ratio of initial residue
        standing_fraction = 0  # Fraction of residue standing
      Soil SoilLismore: SoilType=Stony Silt Loam; Site=Winchmore; NearestTown=Winchmore; Region=Canterbury; State=New Zealand; NaturalVegetation=0; ApsoilNumber=0; Latitude=0; Longitude=0; LocationAccuracy=0; YearOfSampling=0; DataSource=published soil profile description (as an example)
        Analysis: Thickness=[100, 200, 300, 300, 300, 300, 300]; PH=[5.9, 5.9, 5.9, 5.9, 5.9, 5.9, 5.9]; PHUnits=Water; BoronUnits=HotWater
        Water
          Thickness  BD    AirDry  LL15  DUL   SAT   KS
          100        1.25  0.06    0.14  0.32  0.45  100
          200        1.31  0.06    0.14  0.32  0.45  100
          300        1.23  0.03    0.03  0.07  0.15  200
          300        1.24  0.03    0.03  0.05  0.08  250
          300        1.25  0.03    0.03  0.05  0.08  250
          300        1.26  0.03    0.03  0.05  0.08  350
          300        1.29  0.03    0.03  0.05  0.08  500
          SoilCrop ryegrass_clover: LL=[0.14, 0.14, 0.03, 0.03, 0.03, 0.03, 0.03]; KL=[0.1, 0.1, 0.1, 0.02, 0, 0, 0]; XF=[1, 1, 1, 1, 0, 0, 0]
          SoilCrop agpasture: LL=[0.14, 0.14, 0.03, 0.03, 0.03, 0.03, 0.03]; KL=[0.1, 0.1, 0.1, 0.02, 0, 0, 0]; XF=[1, 1, 1, 1, 0, 0, 0]
          SoilCrop ryegrass: LL=[0.14, 0.14, 0.03, 0.03, 0.03, 0.03, 0.03]; KL=[0.1, 0.1, 0.1, 0.02, 0, 0, 0]; XF=[1, 1, 1, 1, 0, 0, 0]
          SoilCrop clover: LL=[0.14, 0.14, 0.03, 0.03, 0.03, 0.03, 0.03]; KL=[0.1, 0.1, 0.1, 0.02, 0, 0, 0]; XF=[1, 1, 1, 1, 0, 0, 0]
          SoilCrop maize: LL=[0.14, 0.14, 0.03, 0.02, 0.02, 0.02, 0.02]; KL=[0.06, 0.06, 0.06, 0.06, 0.06, 0.06, 0.06]; XF=[1, 1, 1, 1, 1, 1, 1]
          SoilCrop cotton: LL=[0.14, 0.14, 0.03, 0.02, 0.02, 0.02, 0.02]; KL=[0.1, 0.1, 0.1, 0.1, 0.09, 0.07, 0.05]; XF=[1, 1, 1, 1, 1, 1, 1]
          SoilCrop sorghum: LL=[0.14, 0.14, 0.03, 0.02, 0.02, 0.02, 0.02]; KL=[0.07, 0.07, 0.07, 0.05, 0.05, 0.04, 0.03]; XF=[1, 1, 1, 1, 1, 1, 0.9]
          SoilCrop slurp: LL=[0.14, 0.14, 0.03, 0.02, 0.02, 0.02, 0.02]; KL=[0.06, 0.06, 0.06, 0.06, 0.06, 0.06, 0.06]; XF=[1, 1, 1, 1, 1, 1, 1]
        SoilWater: SummerCona=3.5; SummerU=6; SummerDate=1-Nov; WinterCona=2; WinterU=2; WinterDate=1-apr; DiffusConst=88; DiffusSlope=35; Salb=0.13; CN2Bare=73; CNRed=20; CNCov=0.8; Thickness=[100, 200, 300, 300, 300, 300, 300]; SWCON=[0.4, 0.5, 0.6, 0.6, 0.8, 0.8, 0.8]
        SoilOrganicMatter: RootCN=40; RootWt=800; SoilCN=11.3; EnrACoeff=7.4; EnrBCoeff=0.2; OCUnits=Total
          Thickness  OC   FBiom  FInert
          100        4    0.04   0.3
          200        2.5  0.02   0.5
          300        0.5  0.02   0.6
          300        0.1  0.01   0.8
          300        0.1  0.01   1
          300        0    0      1
          300        0    0      1
        Sample Initial nitrogen: NO3Units=ppm; NH4Units=ppm; SWUnits=Volumetric; OCUnits=Total; PHUnits=Water
          Thickness  NO3  NH4
          150        10   0.5
          350        10   0.5
          500        5    0.5
          800        5    0.5
        InitialWater Initial water: FractionFull=0.99; PercentMethod=FilledFromTop
      AgPasture
        # Initial values for each species to be simulated
        SpeciesToSimulate = Ryegrass    WhiteClover  # Name of the species to be simulated
        InitialShootDM = 1500   500  # Initial above ground dry matter weight (kgDM/ha)
        InitialRootDM = 450     150  # Initial root dry matter weight (kgDM/ha)
        InitialRootDepth = 750     350  # Initial rooting depth (mm)
        WaterUptakeSource = calc  # Water uptake done by AgPasture (calc) or by apsim?
      outputfile: filename=SlopeEffectsOnWeather Pdk-Flat.out; title=SlopeEffectsOnWeather Pdk-Flat
        variables
          variables: dd/mmm/yyyy as Date, StandingHerbageWt, HerbageGrowthWt, HarvestedWt, ExtraterrestrialRadn, RadnMeasured, radn as RadnAdjusted, mean as TmeanMeasured, TmeanActual as TmeanAdjusted, RainMeasured, Rain, WindSpeedMeasured, Wind, GLFTemperature, GLFWaterSupply, sw_dep(1)
        events Reporting Frequency: event=end_day
    area Pdk-North20 -> /Simulations/SlopeEffectsOnWeather/Pdk-Flat
      SlopeEffectsOnWeather
        # General description of the site
        SlopeAngle = 20.0  # Slope angle, from horizontal (degrees)
        AspectAngle = 180  # Aspect angle, clockwise from south (degrees)
        Altitude = 50  # Mean altitude (meters above sea level)
        SurroundsAlbedo = 0.2  # Albedo of surrounding environment (0-1)
        # Parameters to adjust solar radiation
        A_diffuseR = -3.664  # Parameter A of diffuse radiation function
        B_diffuseR = 7.011  # Parameter B of diffuse radiation function
        TurbidityCoefficient = 0.95  # Mean air turbidity for direct radiation (0-1)
        defaultWindSpeed = 0.0  # Default value for wind speed, used when not supplied in met file (m/s)
        # Parameters to adjust min and max temperatures
        aT0 = 1.61  # Parameter aT0, change in temperature as function of radiation (oC per MJ/m2/day)
        bT = 0.88  # Parameter bT, exponent to modify the rate of change (>0.0)
        cT = 0.12  # Parameter cT, accounts for wind effects (0-1)
        FN = 0.81  # Parameter FN, used for negative delta radiation (0-1)
        FM = 0.50  # Parameter FM, adjust for minimum temperatures (0-1)
        # Parameters to adjust other variables (not function of slope)
        dRain = 0.0  # Relative change in daily rainfall (%)
        dWind = 0.0  # Relative change in mean wind speed (%)
        dVapPressure = 0.0  # Relative change in mean vapour pressure (%)
      outputfile -> /Simulations/SlopeEffectsOnWeather/Pdk-Flat/outputfile: filename=SlopeEffectsOnWeather Pdk-North20.out; title=SlopeEffectsOnWeather Pdk-North20
        variables -> /Simulations/SlopeEffectsOnWeather/Pdk-Flat/outputfile/Variables
        events Reporting Frequency -> /Simulations/SlopeEffectsOnWeather/Pdk-Flat/outputfile/Reporting Frequency
    area Pdk-South20 -> /Simulations/SlopeEffectsOnWeather/Pdk-Flat
      SlopeEffectsOnWeather
        # General description of the site
        SlopeAngle = 20.0  # Slope angle, from horizontal (degrees)
        AspectAngle = 0.0  # Aspect angle, clockwise from south (degrees)
        Altitude = 50  # Mean altitude (meters above sea level)
        SurroundsAlbedo = 0.2  # Albedo of surrounding environment (0-1)
        # Parameters to adjust solar radiation
        A_diffuseR = -3.664  # Parameter A of diffuse radiation function
        B_diffuseR = 7.011  # Parameter B of diffuse radiation function
        TurbidityCoefficient = 0.95  # Mean air turbidity for direct radiation (0-1)
        defaultWindSpeed = 0.0  # Default value for wind speed, used when not supplied in met file (m/s)
        # Parameters to adjust min and max temperatures
        aT0 = 1.61  # Parameter aT0, change in temperature as function of radiation (oC per MJ/m2/day)
        bT = 0.88  # Parameter bT, exponent to modify the rate of change (>0.0)
        cT = 0.12  # Parameter cT, accounts for wind effects (0-1)
        FN = 0.81  # Parameter FN, used for negative delta radiation (0-1)
        FM = 0.50  # Parameter FM, adjust for minimum temperatures (0-1)
        # Parameters to adjust other variables (not function of slope)
        dRain = 0.0  # Relative change in daily rainfall (%)
        dWind = 0.0  # Relative change in mean wind speed (%)
        dVapPressure = 0.0  # Relative change in mean vapour pressure (%)
      outputfile -> /Simulations/SlopeEffectsOnWeather/Pdk-Flat/outputfile: filename=SlopeEffectsOnWeather Pdk-South20.out; title=SlopeEffectsOnWeather Pdk-South20
        variables -> /Simulations/SlopeEffectsOnWeather/Pdk-Flat/outputfile/Variables
        events Reporting Frequency -> /Simulations/SlopeEffectsOnWeather/Pdk-Flat/outputfile/Reporting Frequency
    area Pdk-FlatRain -> /Simulations/SlopeEffectsOnWeather/Pdk-Flat
      SlopeEffectsOnWeather
        # General description of the site
        SlopeAngle = 0.0  # Slope angle, from horizontal (degrees)
        AspectAngle = 0.0  # Aspect angle, clockwise from south (degrees)
        Altitude = 50  # Mean altitude (meters above sea level)
        SurroundsAlbedo = 0.2  # Albedo of surrounding environment (0-1)
        # Parameters to adjust solar radiation
        A_diffuseR = -3.664  # Parameter A of diffuse radiation function
        B_diffuseR = 7.011  # Parameter B of diffuse radiation function
        TurbidityCoefficient = 0.95  # Mean air turbidity for direct radiation (0-1)
        defaultWindSpeed = 0.0  # Default value for wind speed, used when not supplied in met file (m/s)
        # Parameters to adjust min and max temperatures
        aT0 = 1.61  # Parameter aT0, change in temperature as function of radiation (oC per MJ/m2/day)
        bT = 0.88  # Parameter bT, exponent to modify the rate of change (>0.0)
        cT = 0.12  # Parameter cT, accounts for wind effects (0-1)
        FN = 0.81  # Parameter FN, used for negative delta radiation (0-1)
        FM = 0.50  # Parameter FM, adjust for minimum temperatures (0-1)
        # Parameters to adjust other variables (not function of slope)
        dRain = -20.0  # Relative change in daily rainfall (%)
        dWind = 25.0  # Relative change in mean wind speed (%)
        dVapPressure = 0.0  # Relative change in mean vapour pressure (%)
      outputfile -> /Simulations/SlopeEffectsOnWeather/Pdk-Flat/outputfile: filename=SlopeEffectsOnWeather Pdk-FlatRain.out; title=SlopeEffectsOnWeather Pdk-FlatRain
        variables -> /Simulations/SlopeEffectsOnWeather/Pdk-Flat/outputfile/Variables
        events Reporting Frequency -> /Simulations/SlopeEffectsOnWeather/Pdk-Flat/outputfile/Reporting Frequency
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