folder Sample: version=36
  simulation Slurp
    clock: start_date=1/7/1988; end_date=30/7/1988
    metfile met: filename=%apsim%/Examples/MetFiles/DALBY.MET
    summaryfile
    area paddock
      manager
        on start_of_day:
```
            if (day = 183 and year = 1988) then
               slurp sow cultivar=slurpcultivar
            endif
            slurp.leaflai = slurp.leaflai - 0.1
            slurp.leaflaidead = slurp.leaflaidead + 0.1
            slurp.height = slurp.height + 10.
```
        on end_of_day:
```
            report do_output
```
      Soil: Latitude=0; Longitude=0
        InitialWater Initial water: FractionFull=1; PercentMethod=FilledFromTop; RelativeTo=ll15
        Water
          Thickness  BD    AirDry  LL15  DUL    SAT
          150        1.3   0.1     0.23  0.45   0.5
          150        1.3   0.2     0.24  0.459  0.509
          300        1.29  0.2     0.24  0.45   0.51
          300        1.31  0.2     0.25  0.44   0.505
          300        1.35  0.2     0.26  0.42   0.49
          300        1.36  0.2     0.27  0.42   0.48
          300        1.36  0.2     0.28  0.41   0.48
          SoilCrop Barley: LL=[0.29, 0.29, 0.32, 0.38, 0.39, 0.39, 0.41]; KL=[0.1, 0.1, 0.08, 0.06, 0.04, 0.02, 0.01]; XF=[1, 1, 1, 1, 1, 1, 1]
          SoilCrop Chickpea: LL=[0.29, 0.29, 0.36, 0.43, 0.51, 0.5, 0.5]; KL=[0.1, 0.1, 0.08, 0.06, 0.04, 0.02, 0.01]; XF=[1, 1, 1, 1, 1, 1, 1]
          SoilCrop Lucerne: LL=[0.29, 0.29, 0.29, 0.29, 0.3, 0.31, 0.32]; KL=[0.1, 0.1, 0.1, 0.1, 0.09, 0.09, 0.09]; XF=[1, 1, 1, 1, 1, 1, 1]
          SoilCrop Maize: LL=[0.29, 0.29, 0.34, 0.34, 0.37, 0.4, 0.42]; KL=[0.1, 0.1, 0.1, 0.08, 0.06, 0.04, 0.02]; XF=[1, 1, 1, 1, 1, 1, 1]
          SoilCrop Perennial Grass: LL=[0.29, 0.29, 0.39, 0.41, 0.4, 0.4, 0.41]; KL=[0.1, 0.1, 0.1, 0.1, 0.09, 0.07, 0.05]; XF=[1, 1, 1, 1, 1, 1, 1]
          SoilCrop Sorghum: LL=[0.29, 0.29, 0.35, 0.38, 0.4, 0.4, 0.4]; KL=[0.1, 0.1, 0.1, 0.08, 0.06, 0.04, 0.02]; XF=[1, 1, 1, 1, 1, 1, 1]
          SoilCrop Wheat: LL=[0.29, 0.29, 0.32, 0.32, 0.35, 0.38, 0.41]; KL=[0.1, 0.1, 0.08, 0.06, 0.04, 0.02, 0.01]; XF=[1, 1, 1, 1, 1, 1, 1]
          SoilCrop Slurp: LL=[0.29, 0.29, 0.29, 0.29, 0.3, 0.31, 0.32]; KL=[0.06, 0.06, 0.06, 0.06, 0.06, 0.06, 0.06]; XF=[1, 1, 1, 1, 1, 1, 1]
          SoilCrop SlurpRoot: LL=[0.29, 0.29, 0.29, 0.29, 0.3, 0.31, 0.32]; KL=[0.06, 0.06, 0.06, 0.06, 0.06, 0.06, 0.06]; XF=[1, 1, 1, 1, 1, 1, 1]
        SoilWater: SummerCona=3.5; SummerU=6; SummerDate=1-Nov; WinterCona=3.5; WinterU=6; WinterDate=1-Apr; DiffusConst=40; DiffusSlope=16; Salb=0.13; CN2Bare=73; CNRed=20; CNCov=0.8; Thickness=[150, 150, 300, 300, 300, 300, 300]; SWCON=[0.2, 0.2, 0.2, 0.2, 0.2, 0.2, 0.2]
        SoilOrganicMatter: RootCN=40; RootWt=200; SoilCN=12.5; EnrACoeff=7.4; EnrBCoeff=0.2; OCUnits=Total
          Thickness  OC    FBiom  FInert
          150        1.04  0.025  0.4
          150        0.89  0.02   0.6
          300        0.89  0.015  0.8
          300        0.89  0.01   0.9
          300        0.77  0.01   0.95
          300        0.45  0.01   0.95
          300        0.27  0.01   0.95
        Analysis: PHUnits=Water; BoronUnits=HotWater
          Thickness  EC    PH
          150        0.2   8.4
          150        0.25  8.8
          300        0.31  9
          300        0.4   9.2
          300        0.59  9.2
          300        0.84  9.1
          300        0.93  9
        Sample Initial nitrogen: NO3Units=ppm; NH4Units=ppm; SWUnits=Volumetric; OCUnits=Total; PHUnits=Water
          Thickness  NO3    NH4
          150        6.503  0.599004
          150        2.101  0.100001
          300        2.101  0.100001
          300        1.701  0.100001
          300        1.701  0.100001
          300        1.701  0.100001
          300        1.701  0.100001
      micromet: soilalbedo=0.23; a_interception=0.0; b_interception=0.0; c_interception=0.0; d_interception=0.0
      slurp
      root slurproot
      outputfile report: filename=Slurp report.out; title=Slurp report
        variables
          variables: day, year, slurp.crop_type, slurp.leafwaterdemand, slurp.rootwateruptake, micromet.peta, micromet.petr, slurp.cover_tot, slurp.cover_green, slurp.height, sw_dep
