folder simulations: version=36; creator=Apsim 7.5-r3285
  simulation T1
    clock
      start_date = 01/06/1985  # Enter the start date of the simulation
      end_date = 01/02/1986  # Enter the end date of the simulation
    summaryfile
    TreeMicroClimate
      inputFilename = %apsim%\Tests\SoilArbitrator\norain.met
    SoilArbitrator
    area TreeField
      SimpleTree
      manager2 FieldProps
        area = 1  # Area of field (m^2)
        dry = no
        hot = no
        shaded = no
        distToTree = 0  # distance between tree and field (0 for tree in this field)
```csharp
using System;
using ModelFramework;

public class Script 
{      
   [Link] Paddock MyPaddock; // Can be used to dynamically get access to simulation structure and variables
   [Param] int area;
   [Param] string dry;
   [Param] string hot;
   [Param] string shaded;
   [Output] string isDry {get{return dry;}}
   [Output] string isHot {get{return hot;}}
   [Output] string isShaded {get{return shaded;}}
   [Output] int fieldArea;

   // The following event handler will be called once at the beginning of the simulation
   [EventHandler] public void OnInitialised()
   {
      fieldArea = area;
   }
      
   // The following event handler will be called each day at the beginning of the day
   [EventHandler] public void OnPrepare()
   {
   }
   
}
```
      surfaceom SurfaceOrganicMatter
        PoolName = wheat  # Organic Matter pool name
        type = wheat  # Organic Matter type
        mass = 0  # Initial surface residue (kg/ha)
        cnr = 80.0  # C:N ratio of initial residue
        standing_fraction = 0.0  # Fraction of residue standing
      fertiliser
      outputfile: filename=T1 TreeField.out; title=T1 TreeField
        variables My Variables
          variables: dd/mm/yyyy as Date, sw_dep(), day, year, yield, biomass, plant_status, sw_demand
        events Reporting Frequency: event=end_day
      LocalClimate
      Soil: SoilType=Generic NZ heavy; LocalName=Brigalow; State=Hawke's Bay; NaturalVegetation=Brigalow, belah, wilga; Latitude=0; Longitude=0
        InitialWater Initial water: FractionFull=1; PercentMethod=EvenlyDistributed; RelativeTo=ll15
        Water
          Thickness  BD   AirDry  LL15  DUL   SAT  KS
          150        1.4  0.08    0.16  0.32  0.4  50
          150        1.4  0.08    0.16  0.32  0.4  50
          300        1.3  0.08    0.16  0.32  0.4  50
          400        1.3  0.08    0.16  0.32  0.4  50
          300        1.3  0.08    0.16  0.32  0.4  50
          300        1.3  0.08    0.16  0.32  0.4  50
          300        1.3  0.08    0.16  0.32  0.4  50
          SoilCrop Wheat: LL=[0.16, 0.16, 0.16, 0.16, 0.16, 0.16, 0.16]; KL=[0.08, 0.08, 0.07, 0.06, 0.03, 0.02, 0.01]; XF=[1, 1, 1, 1, 1, 1, 1]
          SoilCrop Barley: LL=[0.16, 0.16, 0.16, 0.16, 0.16, 0.16, 0.16]; KL=[0.08, 0.08, 0.07, 0.06, 0.03, 0.02, 0.01]; XF=[1, 1, 1, 1, 1, 1, 1]
          SoilCrop Oats: LL=[0.16, 0.16, 0.16, 0.16, 0.16, 0.16, 0.16]; KL=[0.08, 0.08, 0.07, 0.06, 0.03, 0.02, 0.01]; XF=[1, 1, 1, 1, 1, 1, 1]
          SoilCrop Canola: LL=[0.16, 0.16, 0.16, 0.16, 0.16, 0.16, 0.16]; KL=[0.08, 0.08, 0.07, 0.06, 0.03, 0.02, 0.01]; XF=[1, 1, 1, 1, 1, 1, 1]
          SoilCrop FieldPea: LL=[0.16, 0.16, 0.16, 0.16, 0.16, 0.16, 0.16]; KL=[0.08, 0.08, 0.07, 0.06, 0.03, 0.02, 0.01]; XF=[1, 1, 1, 1, 1, 1, 1]
          SoilCrop potato: LL=[0.16, 0.16, 0.16, 0.16, 0.16, 0.16, 0.16]; KL=[0.08, 0.08, 0.07, 0.06, 0.03, 0.02, 0.01]; XF=[1, 1, 1, 1, 1, 1, 1]
          SoilCrop maize: LL=[0.16, 0.16, 0.16, 0.16, 0.16, 0.16, 0.16]; KL=[0.08, 0.08, 0.07, 0.06, 0.03, 0.02, 0.01]; XF=[1, 1, 1, 1, 1, 1, 1]
        SoilWater: SummerDate=1-Nov; WinterDate=1-Apr; DiffusConst=40; DiffusSlope=16; Salb=0.13; CN2Bare=1; Thickness=[150, 150, 300, 400, 300, 300, 300]; SWCON=[0.3, 0.3, 0.3, 0.3, 0.3, 0.3, 0.3]
          zero: SummerCona, SummerU, WinterCona, WinterU, CNRed, CNCov, Slope, DischargeWidth, CatchmentArea, MaxPond
        SoilOrganicMatter: RootCN=40; RootWt=200; SoilCN=12.5; EnrACoeff=7.4; EnrBCoeff=0.2; OCUnits=Total
          Thickness  OC   FBiom  FInert
          150        4.5  0.03   0.4
          150        3    0.02   0.6
          300        1.5  0.01   0.8
          300        0.7  0.01   0.9
          300        0.3  0.01   0.95
          300        0.1  0.01   0.95
          300        0.1  0.01   0.95
        Analysis: Thickness=[150, 150, 300, 300, 300, 300, 300]; PH=[7, 7, 7, 7, 7, 7, 7]
        Sample Initial nitrogen: NO3Units=kgha
          Thickness  NO3  NH4
          150        20   2
          150        10   1
          300        5    0.6
          300        2    0.1
          300        1    0.1
          300        1    0.1
          300        1    0.1
  simulation T4
    clock
      start_date = 01/06/1985  # Enter the start date of the simulation
      end_date = 01/02/1986  # Enter the end date of the simulation
    summaryfile
    TreeMicroClimate
      inputFilename = %apsim%\Tests\SoilArbitrator\norain.met
    SoilArbitrator
    area TreeField
      SimpleTree
      manager2 FieldProps
        area = 4  # Area of field (m^2)
        dry = no
        hot = no
        shaded = no
        distToTree = 0  # distance between tree and field (0 for tree in this field)
        script: same as in T1.TreeField.FieldProps
      surfaceom SurfaceOrganicMatter
        PoolName = wheat  # Organic Matter pool name
        type = wheat  # Organic Matter type
        mass = 0  # Initial surface residue (kg/ha)
        cnr = 80.0  # C:N ratio of initial residue
        standing_fraction = 0.0  # Fraction of residue standing
      fertiliser
      outputfile: filename=T4 TreeField.out; title=T4 TreeField
        variables My Variables
          variables: dd/mm/yyyy as Date, sw_dep(), day, year, yield, biomass, plant_status, sw_demand
        events Reporting Frequency: event=end_day
      LocalClimate
      Soil: same as T1.TreeField.Soil
  simulation T9
    clock
      start_date = 01/06/1985  # Enter the start date of the simulation
      end_date = 01/02/1986  # Enter the end date of the simulation
    summaryfile
    TreeMicroClimate
      inputFilename = %apsim%\Tests\SoilArbitrator\norain.met
    SoilArbitrator
    area TreeField
      SimpleTree
      manager2 FieldProps
        area = 9  # Area of field (m^2)
        dry = no
        hot = no
        shaded = no
        distToTree = 0  # distance between tree and field (0 for tree in this field)
        script: same as in T1.TreeField.FieldProps
      surfaceom SurfaceOrganicMatter
        PoolName = wheat  # Organic Matter pool name
        type = wheat  # Organic Matter type
        mass = 0  # Initial surface residue (kg/ha)
        cnr = 80.0  # C:N ratio of initial residue
        standing_fraction = 0.0  # Fraction of residue standing
      fertiliser
      outputfile: filename=T9 TreeField.out; title=T9 TreeField
        variables My Variables
          variables: dd/mm/yyyy as Date, sw_dep(), day, year, yield, biomass, plant_status, sw_demand
        events Reporting Frequency: event=end_day
      LocalClimate
      Soil: same as T1.TreeField.Soil
  simulation T16
    clock
      start_date = 01/06/1985  # Enter the start date of the simulation
      end_date = 01/02/1986  # Enter the end date of the simulation
    summaryfile
    TreeMicroClimate
      inputFilename = %apsim%\Tests\SoilArbitrator\norain.met
    SoilArbitrator
    area TreeField
      SimpleTree
      manager2 FieldProps
        area = 16  # Area of field (m^2)
        dry = no
        hot = no
        shaded = no
        distToTree = 0  # distance between tree and field (0 for tree in this field)
        script: same as in T1.TreeField.FieldProps
      surfaceom SurfaceOrganicMatter
        PoolName = wheat  # Organic Matter pool name
        type = wheat  # Organic Matter type
        mass = 0  # Initial surface residue (kg/ha)
        cnr = 80.0  # C:N ratio of initial residue
        standing_fraction = 0.0  # Fraction of residue standing
      fertiliser
      outputfile: filename=T16 TreeField.out; title=T16 TreeField
        variables My Variables
          variables: dd/mm/yyyy as Date, sw_dep(), day, year, yield, biomass, plant_status, sw_demand
        events Reporting Frequency: event=end_day
      LocalClimate
      Soil: same as T1.TreeField.Soil
  folder multi paddock
    simulation T4M
      clock
        start_date = 01/06/1985  # Enter the start date of the simulation
        end_date = 01/02/1986  # Enter the end date of the simulation
      summaryfile
      TreeMicroClimate
        inputFilename = %apsim%\Tests\SoilArbitrator\norain.met
      SoilArbitrator
      area TreeField
        SimpleTree
        manager2 FieldProps: same as T1.TreeField.FieldProps
        surfaceom SurfaceOrganicMatter
          PoolName = wheat  # Organic Matter pool name
          type = wheat  # Organic Matter type
          mass = 0  # Initial surface residue (kg/ha)
          cnr = 80.0  # C:N ratio of initial residue
          standing_fraction = 0.0  # Fraction of residue standing
        fertiliser
        outputfile: filename=T4M TreeField.out; title=T4M TreeField
          variables My Variables
            variables: dd/mm/yyyy as Date, sw_dep(), day, year, yield, biomass, plant_status, sw_demand
          events Reporting Frequency: event=end_day
        LocalClimate
        Soil: same as T1.TreeField.Soil
      area TreeField1
        manager2 FieldProps: same as T1.TreeField.FieldProps
        surfaceom SurfaceOrganicMatter
          PoolName = wheat  # Organic Matter pool name
          type = wheat  # Organic Matter type
          mass = 0  # Initial surface residue (kg/ha)
          cnr = 80.0  # C:N ratio of initial residue
          standing_fraction = 0.0  # Fraction of residue standing
        fertiliser
        outputfile: filename=T4M TreeField1.out; title=T4M TreeField1
          variables My Variables
            variables: dd/mm/yyyy as Date, sw_dep(), day, year, yield, biomass, plant_status, sw_demand
          events Reporting Frequency: event=end_day
        LocalClimate
        Soil: same as T1.TreeField.Soil
      area TreeField2
        manager2 FieldProps: same as T1.TreeField.FieldProps
        surfaceom SurfaceOrganicMatter
          PoolName = wheat  # Organic Matter pool name
          type = wheat  # Organic Matter type
          mass = 0  # Initial surface residue (kg/ha)
          cnr = 80.0  # C:N ratio of initial residue
          standing_fraction = 0.0  # Fraction of residue standing
        fertiliser
        outputfile: filename=T4M TreeField2.out; title=T4M TreeField2
          variables My Variables
            variables: dd/mm/yyyy as Date, sw_dep(), day, year, yield, biomass, plant_status, sw_demand
          events Reporting Frequency: event=end_day
        LocalClimate
        Soil: same as T1.TreeField.Soil
      area TreeField3
        manager2 FieldProps: same as T1.TreeField.FieldProps
        surfaceom SurfaceOrganicMatter
          PoolName = wheat  # Organic Matter pool name
          type = wheat  # Organic Matter type
          mass = 0  # Initial surface residue (kg/ha)
          cnr = 80.0  # C:N ratio of initial residue
          standing_fraction = 0.0  # Fraction of residue standing
        fertiliser
        outputfile: filename=T4M TreeField3.out; title=T4M TreeField3
          variables My Variables
            variables: dd/mm/yyyy as Date, sw_dep(), day, year, yield, biomass, plant_status, sw_demand
          events Reporting Frequency: event=end_day
        LocalClimate
        Soil: same as T1.TreeField.Soil
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