folder simulations: version=36; creator=Apsim 7.5-r3285
  folder Maize
    simulation MaizeWithArbitrator
      metfile met: filename=%apsim%\Tests\SoilArbitrator\norain.met
      clock
        start_date = 01/06/1985  # Enter the start date of the simulation
        end_date = 01/02/1986  # Enter the end date of the simulation
      summaryfile
      SoilArbitrator
      area MaizeField
        surfaceom SurfaceOrganicMatter
          PoolName = wheat  # Organic Matter pool name
          type = wheat  # Organic Matter type
          mass = 0  # Initial surface residue (kg/ha)
          cnr = 80.0  # C:N ratio of initial residue
          standing_fraction = 0.0  # Fraction of residue standing
        outputfile: filename=MaizeWithArbitrator MaizeField.out; title=MaizeWithArbitrator MaizeField
          variables My Variables
            variables: dd/mm/yyyy as Date, esw, day, year, yield, stover, biomass, mint, maxt, radn, rain, kl, lai, ll, ll_dep, sw_dep, sw_demand
          events Reporting Frequency: event=end_day
        Soil: ASCOrder=Vertosol; ASCSubOrder=Black; SoilType=Clay; Site=Dalby; NearestTown=Dalby, Q 4405; Region=Darling Downs and Granite Belt; State=Queensland; Country=Australia; ApsoilNumber=27; Latitude=-27.12; Longitude=151.305; LocationAccuracy=+/- 20m; DataSource=CSIRO Sustainable Ecosystems, Toowoomba
          Water
            Thickness  BD    AirDry  LL15  DUL   SAT
            150        1.25  0.115   0.23  0.45  0.5
            150        1.31  0.184   0.23  0.43  0.48
            300        1.23  0.23    0.23  0.46  0.51
            300        1.24  0.23    0.23  0.45  0.5
            300        1.25  0.23    0.23  0.45  0.5
            300        1.26  0.23    0.23  0.44  0.49
            300        1.29  0.23    0.23  0.43  0.48
            BD, DUL source: Field measured and checked for sensibility
            AirDry, LL15 source: Estimated based on local knowledge
            SAT source: Calculated from measured, estimated or calculated BD
            SoilCrop maize: LL=[0.23, 0.24, 0.29, 0.34, 0.37, 0.38, 0.39]; KL=[0.07, 0.07, 0.07, 0.05, 0.05, 0.04, 0.03]; XF=[1, 1, 1, 1, 1, 1, 1]
            SoilCrop sorghum: LL=[0.23, 0.24, 0.29, 0.34, 0.37, 0.38, 0.39]; KL=[0.07, 0.07, 0.07, 0.05, 0.05, 0.04, 0.03]; XF=[1, 1, 1, 1, 1, 1, 1]
              LL source: Field measured and checked for sensibility
          SoilWater: SummerCona=0; SummerU=0; SummerDate=1-Nov; WinterCona=0; WinterU=0; WinterDate=1-Apr; DiffusConst=40; DiffusSlope=16; Salb=0.12; CN2Bare=73; CNRed=20; CNCov=0.8; Thickness=[150, 150, 300, 300, 300, 300, 300]; SWCON=[0.3, 0.3, 0.3, 0.3, 0.3, 0.3, 0.3]
          SoilOrganicMatter: RootCN=40; RootWt=1000; SoilCN=12; EnrACoeff=7.4; EnrBCoeff=0.2; OCUnits=WalkleyBlack
            Thickness  OC        FBiom  FInert
            150        0.915385  0.04   0.4
            150        0.776923  0.02   0.6
            300        0.346154  0.02   0.8
            300        0.230769  0.02   1
            300        0.153846  0.01   1
            300        0.123077  0.01   1
            300        0.130769  0.01   1
            OC source: Estimated based on local knowledge
          Analysis: Thickness=[150, 150, 300, 300, 300, 300, 300]; PH=[8.2, 8.5, 8.6, 8.6, 7.4, 5.3, 5.3]; PHUnits=Water; BoronUnits=HotWater
            PH source: Estimated based on local knowledge
          Sample Initial nitrogen: NO3Units=kgha; NH4Units=ppm; SWUnits=Volumetric; OCUnits=Total; PHUnits=Water
            Thickness  NO3  NH4  SW
            150        0    0    0.45
            150        0    0    0.43
            300        0    0    0.46
            300        0    0    0.45
            300        0    0    0.45
            300        0    0    0.44
            300        0    0    0.43
        fertiliser
        folder Manager folder
          manager Sow on a fixed date
            # Sowing criteria
            date = 10-jul  # Enter sowing date (dd-mmm)
            # Sowing parameters
            crop = maize  # Enter name of crop to sow
            density = 2  # Enter sowing density (plants/m2)
            depth = 50  # Enter sowing depth (mm)
            cultivar = makueni  # Enter cultivar
            class = plant  # Enter crop growth class
            row_spacing = 500  # Enter row spacing (mm)
            on start_of_day:
```
        if (today = date('[date]') then
              [crop] sow plants =[density], sowing_depth = [depth], cultivar = [cultivar], row_spacing = [row_spacing], crop_class = [class]
         endif
```
          manager Remove all residues on a fixed date
            # Removal criteria
            date = 1-may  # Date to remove residues (dd-mmm)
            surfaceommodule = SurfaceOrganicMatter  # Name of your surface organic matter module
            on start_of_day:
```
         if today = date('[date]') then
            '[surfaceommodule]' tillage type = user_defined, f_incorp = 1.0 (), tillage_depth = 0.0 ()
         endif
```
          manager Harvesting rule
            # Harvesting criteria
            crop = maize  # Enter name of crop to harvest when ripe
            on end_of_day:
```
           if ('[crop]' = 'cotton') then
              if ([crop].ozcot_status > 0) then
                  [crop] harvest
              endif
           elseif ([crop].StageName = 'harvest_ripe' or [crop].plant_status = 'dead') then
              [crop]  harvest
              [crop]  end_crop
           endif
```
          manager Fertilise at sowing
            # When should fertiliser be applied
            modulename = maize  # On which module should the event come from
            eventname = sowing  # On which event should fertiliser be applied
            # Fertiliser application details
            fertmodule = fertiliser  # Module used to apply the fertiliser
            fert_amount_sow = 200  # Amount of starter fertiliser at sowing (kg/ha)
            fert_type_sow = urea_N  # Sowing fertiliser type
            on [modulename].[eventname]:
```
        [fertmodule] apply amount = [fert_amount_sow] (kg/ha), depth = 50 (mm), type = [fert_type_sow]
```
        maize
        manager2 FieldProps
          area = 1  # Area of field (m^2)
          dry = yes
          hot = yes
          shaded = no
          distToTree = 0  # distance between tree and field (0 for tree in this field)
```csharp
using System;
using ModelFramework;

public class Script 
{      
   [Link] Paddock MyPaddock; // Can be used to dynamically get access to simulation structure and variables
   [Param] int area;
   [Param] string dry;
   [Param] string hot;
   [Param] string shaded;
   [Output] string isDry {get{return dry;}}
   [Output] string isHot {get{return hot;}}
   [Output] string isShaded {get{return shaded;}}
   [Output] int fieldArea;

   // The following event handler will be called once at the beginning of the simulation
   [EventHandler] public void OnInitialised()
   {
      fieldArea = area;
   }
      
   // The following event handler will be called each day at the beginning of the day
   [EventHandler] public void OnPrepare()
   {
   }
   
}
```
    simulation MaizeNoArbitrator
      metfile met: filename=%apsim%\Tests\SoilArbitrator\norain.met
      clock
        start_date = 01/06/1985  # Enter the start date of the simulation
        end_date = 01/02/1986  # Enter the end date of the simulation
      summaryfile
      area MaizeField
        surfaceom SurfaceOrganicMatter
          PoolName = wheat  # Organic Matter pool name
          type = wheat  # Organic Matter type
          mass = 0  # Initial surface residue (kg/ha)
          cnr = 80.0  # C:N ratio of initial residue
          standing_fraction = 0.0  # Fraction of residue standing
        outputfile: filename=MaizeNoArbitrator MaizeField.out; title=MaizeNoArbitrator MaizeField
          variables My Variables
            variables: dd/mm/yyyy as Date, esw, day, year, yield, stover, biomass, mint, maxt, radn, rain, kl, lai, ll, ll_dep, sw_dep, sw_demand, n_stress_expan, n_stress_grain, n_stress_pheno, n_stress_photo
          events Reporting Frequency: event=end_day
        Soil: same as Maize.MaizeWithArbitrator.MaizeField.Soil
        fertiliser
        folder Manager folder: same as Maize.MaizeWithArbitrator.MaizeField.Manager folder
        maize
  folder Wheat
    simulation WheatWithArbitrator
      metfile met: filename=%apsim%\Tests\SoilArbitrator\norain.met
      clock
        start_date = 01/06/1985  # Enter the start date of the simulation
        end_date = 01/02/1986  # Enter the end date of the simulation
      summaryfile
      SoilArbitrator
      area WheatField
        manager2 FieldProps
          area = 1  # Area of field (m^2)
          dry = no
          hot = no
          shaded = no
          distToTree = 0  # distance between tree and field (0 for tree in this field)
          script: same as in Maize.MaizeWithArbitrator.MaizeField.FieldProps
        surfaceom SurfaceOrganicMatter
          PoolName = wheat  # Organic Matter pool name
          type = wheat  # Organic Matter type
          mass = 0  # Initial surface residue (kg/ha)
          cnr = 80.0  # C:N ratio of initial residue
          standing_fraction = 0.0  # Fraction of residue standing
        fertiliser
        folder Manager folder
          manager Sow on a fixed date
            # Sowing criteria
            date = 10-jul  # Enter sowing date (dd-mmm)
            # Sowing parameters
            crop = wheat  # Enter name of crop to sow
            density = 150  # Enter sowing density (plants/m2)
            depth = 50  # Enter sowing depth (mm)
            cultivar = bolac  # Enter cultivar
            class = plant  # Enter crop growth class
            row_spacing = 500  # Enter row spacing (mm)
            on start_of_day:
            script: same as in Maize.MaizeWithArbitrator.MaizeField.Manager folder.Sow on a fixed date
          manager Remove all residues on a fixed date: same as Maize.MaizeWithArbitrator.MaizeField.Manager folder.Remove all residues on a fixed date
          manager Harvesting rule
            # Harvesting criteria
            crop = wheat  # Enter name of crop to harvest when ripe
            on end_of_day:
            script: same as in Maize.MaizeWithArbitrator.MaizeField.Manager folder.Harvesting rule
        outputfile: filename=WheatWithArbitrator WheatField.out; title=WheatWithArbitrator WheatField
          variables My Variables
            variables: dd/mm/yyyy as Date, esw, day, year, yield, stover, biomass, mint, maxt, radn, rain, kl, lai, ll, ll_dep, sw_dep, plant_status
          events Reporting Frequency: event=end_day
        Soil: ASCOrder=Vertosol; ASCSubOrder=Black; SoilType=Clay; Site=Dalby; NearestTown=Dalby, Q 4405; Region=Darling Downs and Granite Belt; State=Queensland; Country=Australia; ApsoilNumber=27; Latitude=-27.12; Longitude=151.305; LocationAccuracy=+/- 20m; DataSource=CSIRO Sustainable Ecosystems, Toowoomba
          Water
            Thickness  BD    AirDry  LL15  DUL   SAT
            150        1.25  0.115   0.23  0.45  0.5
            150        1.31  0.184   0.23  0.43  0.48
            300        1.23  0.23    0.23  0.46  0.51
            300        1.24  0.23    0.23  0.45  0.5
            300        1.25  0.23    0.23  0.45  0.5
            300        1.26  0.23    0.23  0.44  0.49
            300        1.29  0.23    0.23  0.43  0.48
            BD, DUL source: Field measured and checked for sensibility
            AirDry, LL15 source: Estimated based on local knowledge
            SAT source: Calculated from measured, estimated or calculated BD
            SoilCrop maize: LL=[0.23, 0.24, 0.29, 0.34, 0.37, 0.38, 0.39]; KL=[0.07, 0.07, 0.07, 0.05, 0.05, 0.04, 0.03]; XF=[1, 1, 1, 1, 1, 1, 1]
            SoilCrop wheat: LL=[0.23, 0.24, 0.29, 0.34, 0.37, 0.38, 0.39]; KL=[0.07, 0.07, 0.07, 0.05, 0.05, 0.04, 0.03]; XF=[1, 1, 1, 1, 1, 1, 1]
          SoilWater: same as Maize.MaizeWithArbitrator.MaizeField.Soil.SoilWater
          SoilOrganicMatter: same as Maize.MaizeWithArbitrator.MaizeField.Soil.SoilOrganicMatter
          Analysis: same as Maize.MaizeWithArbitrator.MaizeField.Soil.Analysis
          Sample Initial nitrogen: NO3Units=kgha; NH4Units=ppm; SWUnits=Volumetric; OCUnits=Total; PHUnits=Water
            Thickness  NO3  NH4  SW
            150        0    0    0.45
            150        0    0    0.43
            300        0    0    0.46
            300        0    0    0.45
            300        0    0    0.45
            300        0    0    0.44
            300        0    0    0.43
        wheat
          ModifyKL = yes  # Modify KL using CL, EC or ESP if found?
    simulation WheatNoArbitrator
      metfile met: filename=%apsim%\Tests\SoilArbitrator\norain.met
      clock
        start_date = 01/06/1985  # Enter the start date of the simulation
        end_date = 01/02/1986  # Enter the end date of the simulation
      summaryfile
      area WheatField
        surfaceom SurfaceOrganicMatter
          PoolName = wheat  # Organic Matter pool name
          type = wheat  # Organic Matter type
          mass = 0  # Initial surface residue (kg/ha)
          cnr = 80.0  # C:N ratio of initial residue
          standing_fraction = 0.0  # Fraction of residue standing
        fertiliser
        folder Manager folder: same as Wheat.WheatWithArbitrator.WheatField.Manager folder
        outputfile: filename=WheatNoArbitrator WheatField.out; title=WheatNoArbitrator WheatField
          variables My Variables
            variables: dd/mm/yyyy as Date, esw, day, year, yield, stover, biomass, mint, maxt, radn, rain, kl, lai, ll, ll_dep, sw_dep, plant_status
          events Reporting Frequency: event=end_day
        Soil: same as Wheat.WheatWithArbitrator.WheatField.Soil
        wheat
          ModifyKL = yes  # Modify KL using CL, EC or ESP if found?
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