folder simulations: version=36; creator=Apsim 7.7-r3829
  simulation Agroforestry
    clock
      start_date = 01/06/1985  # Enter the start date of the simulation
      end_date = 01/02/1986  # Enter the end date of the simulation
    summaryfile
    TreeMicroClimate
      inputFilename = %apsim%\Tests\SoilArbitrator\norain.met
    SoilArbitrator
    area TreeField
      SimpleTree
      manager2 FieldProps
        area = 1  # Area of field (m^2)
        dry = no
        hot = no
        shaded = no
        distToTree = 0  # distance between tree and field (0 for tree in this field)
```csharp
using System;
using ModelFramework;

public class Script 
{      
   [Link] Paddock MyPaddock; // Can be used to dynamically get access to simulation structure and variables
   [Param] int area;
   [Param] string dry;
   [Param] string hot;
   [Param] string shaded;
   [Output] string isDry {get{return dry;}}
   [Output] string isHot {get{return hot;}}
   [Output] string isShaded {get{return shaded;}}
   [Output] int fieldArea;

   // The following event handler will be called once at the beginning of the simulation
   [EventHandler] public void OnInitialised()
   {
      fieldArea = area;
   }
      
   // The following event handler will be called each day at the beginning of the day
   [EventHandler] public void OnPrepare()
   {
   }
   
}
```
      surfaceom SurfaceOrganicMatter
        PoolName = wheat  # Organic Matter pool name
        type = wheat  # Organic Matter type
        mass = 0  # Initial surface residue (kg/ha)
        cnr = 80.0  # C:N ratio of initial residue
        standing_fraction = 0.0  # Fraction of residue standing
      fertiliser
      outputfile: filename=Agroforestry TreeField.out; title=Agroforestry TreeField
        variables My Variables
          variables: dd/mm/yyyy as Date, sw_dep(), day, year, yield, biomass, plant_status, sw_demand
        events Reporting Frequency: event=end_day
      LocalClimate
      Soil: SoilType=Generic NZ heavy; LocalName=Brigalow; State=Hawke's Bay; NaturalVegetation=Brigalow, belah, wilga; Latitude=0; Longitude=0
        InitialWater Initial water: FractionFull=1; PercentMethod=FilledFromTop; RelativeTo=ll15
        Water
          Thickness  BD   AirDry  LL15  DUL   SAT  KS
          150        1.4  0.08    0.16  0.32  0.4  50
          150        1.4  0.08    0.16  0.32  0.4  50
          300        1.3  0.08    0.16  0.32  0.4  50
          400        1.3  0.08    0.16  0.32  0.4  50
          300        1.3  0.08    0.16  0.32  0.4  50
          300        1.3  0.08    0.16  0.32  0.4  50
          300        1.3  0.08    0.16  0.32  0.4  50
          SoilCrop Wheat: LL=[0.16, 0.16, 0.16, 0.16, 0.16, 0.16, 0.16]; KL=[0.08, 0.08, 0.07, 0.06, 0.03, 0.02, 0.01]; XF=[1, 1, 1, 1, 1, 1, 1]
          SoilCrop Barley: LL=[0.16, 0.16, 0.16, 0.16, 0.16, 0.16, 0.16]; KL=[0.08, 0.08, 0.07, 0.06, 0.03, 0.02, 0.01]; XF=[1, 1, 1, 1, 1, 1, 1]
          SoilCrop Oats: LL=[0.16, 0.16, 0.16, 0.16, 0.16, 0.16, 0.16]; KL=[0.08, 0.08, 0.07, 0.06, 0.03, 0.02, 0.01]; XF=[1, 1, 1, 1, 1, 1, 1]
          SoilCrop Canola: LL=[0.16, 0.16, 0.16, 0.16, 0.16, 0.16, 0.16]; KL=[0.08, 0.08, 0.07, 0.06, 0.03, 0.02, 0.01]; XF=[1, 1, 1, 1, 1, 1, 1]
          SoilCrop FieldPea: LL=[0.16, 0.16, 0.16, 0.16, 0.16, 0.16, 0.16]; KL=[0.08, 0.08, 0.07, 0.06, 0.03, 0.02, 0.01]; XF=[1, 1, 1, 1, 1, 1, 1]
          SoilCrop potato: LL=[0.16, 0.16, 0.16, 0.16, 0.16, 0.16, 0.16]; KL=[0.08, 0.08, 0.07, 0.06, 0.03, 0.02, 0.01]; XF=[1, 1, 1, 1, 1, 1, 1]
          SoilCrop maize: LL=[0.16, 0.16, 0.16, 0.16, 0.16, 0.16, 0.16]; KL=[0.08, 0.08, 0.07, 0.06, 0.03, 0.02, 0.01]; XF=[1, 1, 1, 1, 1, 1, 1]
        SoilWater: SummerDate=1-Nov; WinterDate=1-Apr; DiffusConst=40; DiffusSlope=16; Salb=0.13; CN2Bare=1; Thickness=[150, 150, 300, 400, 300, 300, 300]; SWCON=[0.3, 0.3, 0.3, 0.3, 0.3, 0.3, 0.3]
          zero: SummerCona, SummerU, WinterCona, WinterU, CNRed, CNCov, Slope, DischargeWidth, CatchmentArea, MaxPond
        SoilOrganicMatter: RootCN=40; RootWt=200; SoilCN=12.5; EnrACoeff=7.4; EnrBCoeff=0.2; OCUnits=Total
          Thickness  OC   FBiom  FInert
          150        4.5  0.03   0.4
          150        3    0.02   0.6
          300        1.5  0.01   0.8
          300        0.7  0.01   0.9
          300        0.3  0.01   0.95
          300        0.1  0.01   0.95
          300        0.1  0.01   0.95
        Analysis: Thickness=[150, 150, 300, 300, 300, 300, 300]; PH=[7, 7, 7, 7, 7, 7, 7]
        Sample Initial nitrogen: NO3Units=kgha
          Thickness  NO3  NH4
          150        20   2
          150        10   1
          300        5    0.6
          300        2    0.1
          300        1    0.1
          300        1    0.1
          300        1    0.1
    area MaizeField
      manager2 FieldProps: same as Agroforestry.TreeField.FieldProps
      LocalClimate
      surfaceom SurfaceOrganicMatter
        PoolName = wheat  # Organic Matter pool name
        type = wheat  # Organic Matter type
        mass = 0  # Initial surface residue (kg/ha)
        cnr = 80.0  # C:N ratio of initial residue
        standing_fraction = 0.0  # Fraction of residue standing
      outputfile -> /simulations/Agroforestry/TreeField/outputfile: filename=Agroforestry MaizeField.out; title=Agroforestry MaizeField
        variables My Variables -> /simulations/Agroforestry/TreeField/outputfile/My Variables
        events Reporting Frequency -> /simulations/Agroforestry/TreeField/outputfile/Reporting Frequency
      fertiliser
      folder Manager folder
        manager Sow on a fixed date
          # Sowing criteria
          date = 1-jun  # Enter sowing date (dd-mmm)
          # Sowing parameters
          crop = maize  # Enter name of crop to sow
          density = 3  # Enter sowing density (plants/m2)
          depth = 50  # Enter sowing depth (mm)
          cultivar = makueni  # Enter cultivar
          class = plant  # Enter crop growth class
          row_spacing = 500  # Enter row spacing (mm)
          on start_of_day:
```
        if (today = date('[date]') then
              [crop] sow plants =[density], sowing_depth = [depth], cultivar = [cultivar], row_spacing = [row_spacing], crop_class = [class]
         endif
```
        manager Remove all residues on a fixed date
          # Removal criteria
          date = 1-may  # Date to remove residues (dd-mmm)
          surfaceommodule = SurfaceOrganicMatter  # Name of your surface organic matter module
          on start_of_day:
```
         if today = date('[date]') then
            '[surfaceommodule]' tillage type = user_defined, f_incorp = 1.0 (), tillage_depth = 0.0 ()
         endif
```
        manager Harvesting rule
          # Harvesting criteria
          crop = maize  # Enter name of crop to harvest when ripe
          on end_of_day:
```
           if ('[crop]' = 'cotton') then
              if ([crop].ozcot_status > 0) then
                  [crop] harvest
              endif
           elseif ([crop].StageName = 'harvest_ripe' or [crop].plant_status = 'dead') then
              [crop]  harvest
              [crop]  end_crop
           endif
```
      maize
      Soil: SoilType=Generic NZ heavy; LocalName=Brigalow; State=Hawke's Bay; NaturalVegetation=Brigalow, belah, wilga; Latitude=0; Longitude=0
        InitialWater Initial water: FractionFull=1; PercentMethod=FilledFromTop; RelativeTo=ll15
        Water: same as Agroforestry.TreeField.Soil.Water
        SoilWater: same as Agroforestry.TreeField.Soil.SoilWater
        SoilOrganicMatter: same as Agroforestry.TreeField.Soil.SoilOrganicMatter
        Analysis: Thickness=[150, 150, 300, 300, 300, 300, 300]; PH=[7, 7, 7, 7, 7, 7, 7]
        Sample Initial nitrogen: NO3Units=kgha; NH4Units=ppm; SWUnits=Volumetric; OCUnits=Total; PHUnits=Water
          Thickness  NO3  NH4
          150        20   2
          150        10   1
          300        5    0.6
          300        2    0.1
          300        1    0.1
          300        1    0.1
          300        1    0.1
  simulation AgroforestryIrrigated
    clock
      start_date = 01/06/1985  # Enter the start date of the simulation
      end_date = 01/02/1986  # Enter the end date of the simulation
    summaryfile
    TreeMicroClimate
      inputFilename = %apsim%\Tests\SoilArbitrator\norain.met
    SoilArbitrator
    area TreeField
      SimpleTree
      manager2 FieldProps
        area = 1  # Area of field (m^2)
        dry = yes
        hot = yes
        shaded = no
        distToTree = 0  # distance between tree and field (0 for tree in this field)
        script: same as in Agroforestry.TreeField.FieldProps
      surfaceom SurfaceOrganicMatter
        PoolName = wheat  # Organic Matter pool name
        type = wheat  # Organic Matter type
        mass = 0  # Initial surface residue (kg/ha)
        cnr = 80.0  # C:N ratio of initial residue
        standing_fraction = 0.0  # Fraction of residue standing
      fertiliser
      outputfile: filename=AgroforestryIrrigated TreeField.out; title=AgroforestryIrrigated TreeField
        variables My Variables
          variables: dd/mm/yyyy as Date, sw_dep(), day, year, yield, biomass, plant_status, sw_demand
        events Reporting Frequency: event=end_day
      LocalClimate
      Soil: SoilType=Generic NZ heavy; LocalName=Brigalow; State=Hawke's Bay; NaturalVegetation=Brigalow, belah, wilga; Latitude=0; Longitude=0
        InitialWater Initial water: FractionFull=1; PercentMethod=EvenlyDistributed; RelativeTo=ll15
        Water
          Thickness  BD   AirDry  LL15  DUL   SAT  KS
          150        1.4  0.08    0.16  0.32  0.4  50
          150        1.4  0.16    0.16  0.32  0.4  50
          300        1.3  0.16    0.16  0.32  0.4  50
          400        1.3  0.16    0.16  0.32  0.4  50
          300        1.3  0.16    0.16  0.32  0.4  50
          300        1.3  0.16    0.16  0.32  0.4  50
          300        1.3  0.16    0.16  0.32  0.4  50
          SoilCrop Wheat: LL=[0.16, 0.16, 0.16, 0.16, 0.16, 0.16, 0.16]; KL=[0.08, 0.08, 0.07, 0.06, 0.03, 0.02, 0.01]; XF=[1, 1, 1, 1, 1, 1, 1]
          SoilCrop Barley: LL=[0.16, 0.16, 0.16, 0.16, 0.16, 0.16, 0.16]; KL=[0.08, 0.08, 0.07, 0.06, 0.03, 0.02, 0.01]; XF=[1, 1, 1, 1, 1, 1, 1]
          SoilCrop Oats: LL=[0.16, 0.16, 0.16, 0.16, 0.16, 0.16, 0.16]; KL=[0.08, 0.08, 0.07, 0.06, 0.03, 0.02, 0.01]; XF=[1, 1, 1, 1, 1, 1, 1]
          SoilCrop Canola: LL=[0.16, 0.16, 0.16, 0.16, 0.16, 0.16, 0.16]; KL=[0.08, 0.08, 0.07, 0.06, 0.03, 0.02, 0.01]; XF=[1, 1, 1, 1, 1, 1, 1]
          SoilCrop FieldPea: LL=[0.16, 0.16, 0.16, 0.16, 0.16, 0.16, 0.16]; KL=[0.08, 0.08, 0.07, 0.06, 0.03, 0.02, 0.01]; XF=[1, 1, 1, 1, 1, 1, 1]
          SoilCrop potato: LL=[0.16, 0.16, 0.16, 0.16, 0.16, 0.16, 0.16]; KL=[0.08, 0.08, 0.07, 0.06, 0.03, 0.02, 0.01]; XF=[1, 1, 1, 1, 1, 1, 1]
          SoilCrop maize: LL=[0.16, 0.16, 0.16, 0.16, 0.16, 0.16, 0.16]; KL=[0.08, 0.08, 0.07, 0.06, 0.03, 0.02, 0.01]; XF=[1, 1, 1, 1, 1, 1, 1]
        SoilWater: same as Agroforestry.TreeField.Soil.SoilWater
        SoilOrganicMatter: same as Agroforestry.TreeField.Soil.SoilOrganicMatter
        Analysis: Thickness=[150, 150, 300, 300, 300, 300, 300]; PH=[7, 7, 7, 7, 7, 7, 7]
        Sample Initial nitrogen: NO3Units=kgha
          Thickness  NO3  NH4
          150        20   2
          150        10   1
          300        5    0.6
          300        2    0.1
          300        1    0.1
          300        1    0.1
          300        1    0.1
      irrigation
        automatic_irrigation = on
        asw_depth = 600  # Depth to which ASW is calculated. (mm)
        crit_fr_asw = 0.5  # Fraction of ASW below which irrigation is applied (0-1.0)
        irrigation_efficiency = 1  # Efficiency of the irrigation. (0-1.0)
        irrigation_allocation = off  # Allocation limits
        allocation = 0  # Allocation in mm
        default_no3_conc = 0.0  # Nitrate concentration (ppm N)
        default_nh4_conc = 0.0  # Ammonium concentration (ppm N)
        default_cl_conc = 0.0  # Chloride concentration (ppm Cl)
    area MaizeField
      manager2 FieldProps: same as Agroforestry.TreeField.FieldProps
      LocalClimate
      surfaceom SurfaceOrganicMatter
        PoolName = wheat  # Organic Matter pool name
        type = wheat  # Organic Matter type
        mass = 0  # Initial surface residue (kg/ha)
        cnr = 80.0  # C:N ratio of initial residue
        standing_fraction = 0.0  # Fraction of residue standing
      outputfile -> /simulations/Agroforestry/TreeField/outputfile: filename=AgroforestryIrrigated MaizeField.out; title=AgroforestryIrrigated MaizeField
        variables My Variables -> /simulations/Agroforestry/TreeField/outputfile/My Variables
        events Reporting Frequency -> /simulations/Agroforestry/TreeField/outputfile/Reporting Frequency
      fertiliser
      folder Manager folder: same as Agroforestry.MaizeField.Manager folder
      maize
      Soil: same as AgroforestryIrrigated.TreeField.Soil
      irrigation: same as AgroforestryIrrigated.TreeField.Irrigation
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