folder SoilNitrogen_BasicTests: version=36
  folder WithSoilN
    PlugIns
      PlugIn=[%apsim%\UserInterface\ApsimUIPlugIn.xml, %apsim%\UserInterface\SoilTypes.xml, %apsim%\UserInterface\Graph.xml, %apsim%\UserInterface\Ausfarm.xml, %apsim%\UserInterface\DevelopersPlugIn.xml, %apsim%\Model\SlurryTank.xml, %apsim%\Model\PHmodel.xml, %apsim%\Model\simpleBuilding.xml, %apsim%\Model\atmosphere.xml, %apsim%\Model\Accum.xml, %apsim%\Model\AgPasture.xml, %apsim%\Model\Bambatsi.xml, %apsim%\Model\Barley.xml, %apsim%\Model\Br.xml, %apsim%\Model\Bore.xml, %apsim%\Model\Broccoli.xml, %apsim%\Model\ButterflyPea.xml, %apsim%\Model\Canola.xml, %apsim%\Model\Canopy.xml, %apsim%\Model\Centro.xml, %apsim%\Model\Channel.xml, %apsim%\Model\Chickpea.xml, %apsim%\Model\Cl.xml, %apsim%\Model\Climatechange.xml, %apsim%\Model\Clock.xml, %apsim%\Model\Cotton2.xml, %apsim%\Model\Cowpea.xml, %apsim%\Model\CropUI.xml, %apsim%\Model\Dam.xml, %apsim%\Model\DCD.xml, %apsim%\Model\EGrandis.xml, %apsim%\Model\EMelliodora.xml, %apsim%\Model\Eo.xml, %apsim%\Model\EPopulnea.xml, %apsim%\Model\Erosion.xml, %apsim%\Model\Events.xml, %apsim%\Model\Fababean.xml, %apsim%\Model\Factorial.xml, %apsim%\Model\Factor.xml, %apsim%\Model\FactorComplex.xml, %apsim%\Model\FrenchBean.xml, %apsim%\Model\Fertiliser.xml, %apsim%\Model\Fieldpea.xml, %apsim%\Model\Gcm_data.xml, %apsim%\Model\Grasp.xml, %apsim%\Model\Graz.xml, %apsim%\Model\Growth.xml, %apsim%\Model\Horsegram.xml, %apsim%\Model\Ini.xml, %apsim%\Model\InitWater.xml, %apsim%\Model\Input.xml, %apsim%\Model\Irrigation.xml, %apsim%\Model\KWTest.xml, %apsim%\Model\Lablab.xml, %apsim%\Model\Lettuce.xml, %apsim%\Model\Log.xml, %apsim%\Model\Lucerne.xml, %apsim%\Model\Lupin.xml, %apsim%\Model\Maize.xml, %apsim%\Model\MaizeZ.xml, %apsim%\Model\Manager.xml, %apsim%\Model\Map.xml, %apsim%\Model\Memo.xml, %apsim%\Model\MetFile.xml, %apsim%\Model\MicroMet.xml, %apsim%\Model\Millet.xml, %apsim%\Model\Millet1.xml, %apsim%\Model\Millet2.xml, %apsim%\Model\Millet3.xml, %apsim%\Model\Millet4.xml, %apsim%\Model\Millet5.xml, %apsim%\Model\Mucuna.xml, %apsim%\Model\Mungbean.xml, %apsim%\Model\Navybean.xml, %apsim%\Model\Oats.xml, %apsim%\Model\Ocean_data.xml, %apsim%\Model\Operations.xml, %apsim%\Model\Orobanche.xml, %apsim%\Model\Oryza.xml, %apsim%\Model\Oryza2.xml, %apsim%\Model\OutputFile.xml, %apsim%\Model\Ozcot.xml, %apsim%\Model\Patchinput.xml, %apsim%\Model\Peanut.xml, %apsim%\Model\Pigeonpea.xml, %apsim%\Model\Pond.xml, %apsim%\Model\Potato.xml, %apsim%\Model\RotPlot.xml, %apsim%\Model\RugPlotUI.xml, %apsim%\Model\Root.xml, %apsim%\Model\Rule.xml, %apsim%\Model\Script.xml, %apsim%\Model\Seedling.xml, %apsim%\Model\SiloInput.xml, %apsim%\Model\Slurp.xml, %apsim%\Model\Soi.xml, %apsim%\Model\Soil.xml, %apsim%\Model\SoilNui.xml, %apsim%\Model\SoilTemp.xml, %apsim%\Model\Sorghum.xml, %apsim%\Model\SorghumConstants.xml, %apsim%\Model\SorghumGenotype.xml, %apsim%\Model\Soybean.xml, %apsim%\Model\Stylo.xml, %apsim%\Model\Sugar.xml, %apsim%\Model\Summaryfile.xml, %apsim%\Model\Sunflower.xml, %apsim%\Model\SurfaceOM.xml, %apsim%\Model\SweetCorn.xml, %apsim%\Model\SweetSorghum.xml, %apsim%\Model\SWIM2.xml, %apsim%\Model\SWIM2ui.xml, %apsim%\Model\SWIM2ui2.xml, %apsim%\Model\Sysbal.xml, %apsim%\Model\SysBal2.xml, %apsim%\Model\Tcllink.xml, %apsim%\Model\Tclmanager.xml, %apsim%\Model\Tclui.xml, %apsim%\Model\TextOutput.xml, %apsim%\Model\Tracker.xml, %apsim%\Model\Tree.xml, %apsim%\Model\Variables.xml, %apsim%\Model\Venlink.xml, %apsim%\Model\vine.xml, %apsim%\Model\WaterSupply.xml, %apsim%\Model\Weed.xml, %apsim%\Model\Wheat.xml, %apsim%\Model\YPCalc.xml, %apsim%\Model\UrinePatch.xml, %apsim%\Model\Soil with new nitrogen model.xml]
    simulation Sim01-SoilN - BareBare
      clock
        start_date = 01/01/2000
        end_date = 10/02/2000
      metfile met: filename=%apsim%\Tests\SoilNitrogen\BasicTests\optimum.met
      memo Info
        ++++++++++++++++++  TEST 01 ++++++++++++++++++

           Description:
              - Stable climate;
              - two soils, a free draining and a clayey;
              - Bare soil;
              - No initial mineral N;
              - No initial organic matter;
              - No initial surface residues;
              - No additions of residues or mineral N;

        +++++++++++++++++++++++++++++++++++++++++++++
      summaryfile
      area Paddock1-LD
        fertiliser
        surfaceom Surface Organic Matter
          PoolName = Residue1  # Organic Matter pool name
          type = grass  # Organic Matter type
          mass = 0  # Initial surface residue (kg/ha)
          cnr = 15  # C:N ratio of initial residue
          standing_fraction = 0  # Fraction of residue standing
        Soil LowDrainageSoil
          Water
            Thickness  BD    AirDry  LL15  DUL    SAT
            150        1.3   0.175   0.2   0.4    0.5
            150        1.3   0.25    0.25  0.425  0.5
            300        1.3   0.3     0.3   0.45   0.5
            300        1.35  0.3     0.3   0.45   0.49
            300        1.35  0.32    0.32  0.44   0.48
            300        1.4   0.35    0.35  0.42   0.47
            SoilCrop agpasture: LL=[0.2, 0.25, 0.3, 0.3, 0.32, 0.35]; KL=[0.2, 0.15, 0.06, 0.02, 0, 0]; XF=[1, 1, 1, 1, 1, 0]
          SoilWater: SummerCona=2.5; SummerU=4; SummerDate=1-Nov; WinterCona=2.5; WinterU=4; WinterDate=1-Apr; DiffusConst=88.; DiffusSlope=35.4; Salb=0.13; CN2Bare=80; CNRed=20; CNCov=.8; Thickness=[150, 150, 300, 300, 300, 300]; SWCON=[0.3, 0.25, 0.2, 0.2, 0.175, 0.175]
          SoilOrganicMatter
            Thickness  OC  FBiom  FInert
            150        0   0.035  0.45
            150        0   0.025  0.525
            300        0   0.015  0.675
            300        0   0.01   0.85
            300        0   0.01   0.95
            300        0   0.01   0.998
            RootCN = 30
            RootWt = 0
            SoilCN = 12.5
            EnrACoeff = 7.4
            EnrBCoeff = 0.2
          Analysis
            Thickness  Texture  MunsellColour  PH   CEC   ParticleSizeSand  ParticleSizeSilt  ParticleSizeClay
            150        999999   999999         6.5  15    10                60                30
            150        999999   999999         6.5  15    10                60                30
            300        999999   999999         6.5  12.5  10                60                30
            300        999999   999999         6.5  10    10                60                30
            300        999999   999999         6.5  7.5   10                60                30
            300        999999   999999         6.5  7.5   10                60                30
          Sample Initial nitrogen: NO3Units=kgha
            Thickness  NO3  NH4
            150        0    0
            150        0    0
            300        0    0
            300        0    0
            300        0    0
            300        0    0
          Sample Initial water: Thickness=[150, 150, 300, 300, 300, 300]; SW=[0.35, 0.415, 0.445, 0.445, 0.435, 0.42]
        outputfile Report: filename=Sim01-SoilN - BareBare Paddock1-LD Report.out; title=Sim01-SoilN - BareBare Paddock1-LD Report
          variables
            variable:
              dd/mmm/yyyy as Date
              day as DoY
              urea() as UreaTotal format 3
              nh4() as NH4Total format 3
              no3() as NO3Total format 3
              surfaceom_n as SurfaceOM_N format 2
              fom_n() as FOM_N format 2
              biom_n() as Biom_N format 2
              hum_n() as Hum_N format 1
              totaln as PlantN format 3
              fertiliser as FertiliserN format 1
              dlt_urea_hydrol() as HydrolisedN format 3
              nitrification() as NitrifiedN format 3
              dnit() as DenitrifiedN format 3
              leach_no3 as LeachedNO3 format 3
              dlt_n_min_res() as NetMineralisedResidue format 3
              dlt_n_min_tot() as NetMineralisedHumus format 3
              n2o_atm() as N2Oemissions format 3
              surfaceom_c as SurfaceOM_C format 2
              fom_c() as FOM_C format 2
              biom_c() as Biom_C format 2
              hum_c() as Hum_C format 1
              oc() as OCTotal  format 2
              es as Evaporation format 2
              ep as Transpiration format 2
              drain as Drain format 2
              dlayer format 1
              no3 format 2
              nh4 format 2
              fom_n format 3
              biom_n format 3
              hum_n format 2
              fom_c format 3
              biom_c format 3
              hum_c format 2
              st as SoilTemperature format 2
          events ReportingFrequency: event=end_day
      area Paddock2-HD -> /SoilNitrogen_BasicTests/WithSoilN/Sim01-SoilN - BareBare/Paddock1-LD
        Soil HighDrainageSoil
          Water
            Thickness  BD    AirDry  LL15   DUL    SAT
            150        1.25  0.075   0.1    0.35   0.525
            150        1.3   0.1     0.11   0.36   0.5
            300        1.3   0.125   0.125  0.375  0.5
            300        1.3   0.125   0.125  0.375  0.5
            300        1.35  0.125   0.125  0.375  0.45
            300        1.4   0.125   0.125  0.35   0.45
            SoilCrop agpasture: LL=[0.1, 0.11, 0.125, 0.125, 0.125, 0.125]; KL=[0.2, 0.2, 0.1, 0.05, 0, 0]; XF=[1, 1, 1, 1, 1, 0]
          SoilWater: Thickness=[150, 150, 300, 300, 300, 300]; SWCON=[0.5, 0.45, 0.4, 0.4, 0.4, 0.4]
            SummerCona = 2.5
            SummerU = 4
            SummerDate = 1-Nov
            WinterCona = 2.5
            WinterU = 4
            WinterDate = 1-Apr
            DiffusConst = 88
            DiffusSlope = 35
            Salb = 0.13
            CN2Bare = 80
            CNRed = 20
            CNCov = 0.8
          SoilOrganicMatter
            Thickness  OC  FBiom  FInert
            150        0   0.035  0.4
            150        0   0.025  0.5
            300        0   0.015  0.65
            300        0   0.01   0.85
            300        0   0.01   0.95
            300        0   0.01   0.998
            RootCN = 30
            RootWt = 0
            SoilCN = 12.5
            EnrACoeff = 7.4
            EnrBCoeff = 0.2
          Analysis
            Thickness  Texture  MunsellColour  PH   CEC   ParticleSizeSand  ParticleSizeSilt  ParticleSizeClay
            150        999999   999999         6.5  15    20                60                20
            150        999999   999999         6.5  12.5  20                60                20
            300        999999   999999         6.5  10    20                60                20
            300        999999   999999         6.5  7.5   20                60                20
            300        999999   999999         6.5  5     20                60                20
            300        999999   999999         6.5  5     20                60                20
          Sample Initial nitrogen
            Thickness  NO3  NH4
            150        0    0
            150        0    0
            300        0    0
            300        0    0
            300        0    0
            300        0    0
          Sample Initial water: Thickness=[150, 150, 300, 300, 300, 300]; SW=[0.3, 0.35, 0.37, 0.37, 0.37, 0.35]
        outputfile Report -> /SoilNitrogen_BasicTests/WithSoilN/Sim01-SoilN - BareBare/Paddock1-LD/Report: filename=Sim01-SoilN - BareBare Paddock2-HD Report.out; title=Sim01-SoilN - BareBare Paddock2-HD Report
          variables -> /SoilNitrogen_BasicTests/WithSoilN/Sim01-SoilN - BareBare/Paddock1-LD/Report/Variables
          events ReportingFrequency -> /SoilNitrogen_BasicTests/WithSoilN/Sim01-SoilN - BareBare/Paddock1-LD/Report/ReportingFrequency
    simulation Sim02-SoilN - Bare+NO3 -> /SoilNitrogen_BasicTests/WithSoilN/Sim01-SoilN - BareBare
      memo Info
        ++++++++++++++++++  TEST 02 ++++++++++++++++++

           Description:
              - Stable climate;
              - two soils, a free draining and a clayey;
              - Bare soil;
              - Initial mineral N = 60 kg/ha as NO3;
              - No initial organic matter;
              - No initial surface residues;
              - No additions of residues or mineral N;

        +++++++++++++++++++++++++++++++++++++++++++++
      area Paddock1-LD -> /SoilNitrogen_BasicTests/WithSoilN/Sim01-SoilN - BareBare/Paddock1-LD
        Soil LowDrainageSoil
          Water: same as WithSoilN.Sim01-SoilN - BareBare.Paddock1-LD.LowDrainageSoil.Water
          SoilWater: same as WithSoilN.Sim01-SoilN - BareBare.Paddock1-LD.LowDrainageSoil.SoilWater
          SoilOrganicMatter: same as WithSoilN.Sim01-SoilN - BareBare.Paddock1-LD.LowDrainageSoil.SoilOrganicMatter
          Analysis: same as WithSoilN.Sim01-SoilN - BareBare.Paddock1-LD.LowDrainageSoil.Analysis
          Sample Initial nitrogen: NO3Units=kgha
            Thickness  NO3  NH4
            150        10   0
            150        10   0
            300        10   0
            300        10   0
            300        10   0
            300        10   0
          Sample Initial water: Thickness=[150, 150, 300, 300, 300, 300]; SW=[0.35, 0.415, 0.445, 0.445, 0.435, 0.42]
        outputfile Report -> /SoilNitrogen_BasicTests/WithSoilN/Sim01-SoilN - BareBare/Paddock1-LD/Report: filename=Sim02-SoilN - Bare+NO3 Paddock1-LD Report.out; title=Sim02-SoilN - Bare+NO3 Paddock1-LD Report
          variables -> /SoilNitrogen_BasicTests/WithSoilN/Sim01-SoilN - BareBare/Paddock1-LD/Report/Variables
          events ReportingFrequency -> /SoilNitrogen_BasicTests/WithSoilN/Sim01-SoilN - BareBare/Paddock1-LD/Report/ReportingFrequency
      area Paddock2-HD -> /SoilNitrogen_BasicTests/WithSoilN/Sim01-SoilN - BareBare/Paddock2-HD
        Soil HighDrainageSoil
          Water: same as WithSoilN.Sim01-SoilN - BareBare.Paddock2-HD.HighDrainageSoil.Water
          SoilWater: same as WithSoilN.Sim01-SoilN - BareBare.Paddock2-HD.HighDrainageSoil.SoilWater
          SoilOrganicMatter: same as WithSoilN.Sim01-SoilN - BareBare.Paddock2-HD.HighDrainageSoil.SoilOrganicMatter
          Analysis: same as WithSoilN.Sim01-SoilN - BareBare.Paddock2-HD.HighDrainageSoil.Analysis
          Sample Initial nitrogen: NO3Units=kgha
            Thickness  NO3  NH4
            150        10   0
            150        10   0
            300        10   0
            300        10   0
            300        10   0
            300        10   0
          Sample Initial water: Thickness=[150, 150, 300, 300, 300, 300]; SW=[0.3, 0.35, 0.37, 0.37, 0.37, 0.35]
        outputfile Report -> /SoilNitrogen_BasicTests/WithSoilN/Sim01-SoilN - BareBare/Paddock2-HD/Report: filename=Sim02-SoilN - Bare+NO3 Paddock2-HD Report.out; title=Sim02-SoilN - Bare+NO3 Paddock2-HD Report
          variables -> /SoilNitrogen_BasicTests/WithSoilN/Sim01-SoilN - BareBare/Paddock2-HD/Report/Variables
          events ReportingFrequency -> /SoilNitrogen_BasicTests/WithSoilN/Sim01-SoilN - BareBare/Paddock2-HD/Report/ReportingFrequency
    simulation Sim03-SoilN - Bare+NH4 -> /SoilNitrogen_BasicTests/WithSoilN/Sim01-SoilN - BareBare
      memo Info
        ++++++++++++++++++  TEST 03 ++++++++++++++++++

           Description:
              - Stable climate;
              - two soils, a free draining and a clayey;
              - Bare soil;
              - Initial mineral N = 60 kg/ha as NH4;
              - No initial organic matter;
              - No initial surface residues;
              - No additions of residues or mineral N;

        +++++++++++++++++++++++++++++++++++++++++++++
      area Paddock1-LD -> /SoilNitrogen_BasicTests/WithSoilN/Sim01-SoilN - BareBare/Paddock1-LD
        Soil LowDrainageSoil
          Water: same as WithSoilN.Sim01-SoilN - BareBare.Paddock1-LD.LowDrainageSoil.Water
          SoilWater: same as WithSoilN.Sim01-SoilN - BareBare.Paddock1-LD.LowDrainageSoil.SoilWater
          SoilOrganicMatter: same as WithSoilN.Sim01-SoilN - BareBare.Paddock1-LD.LowDrainageSoil.SoilOrganicMatter
          Analysis: same as WithSoilN.Sim01-SoilN - BareBare.Paddock1-LD.LowDrainageSoil.Analysis
          Sample Initial nitrogen: NH4Units=kgha
            Thickness  NO3  NH4
            150        0    10
            150        0    10
            300        0    10
            300        0    10
            300        0    10
            300        0    10
          Sample Initial water: Thickness=[150, 150, 300, 300, 300, 300]; SW=[0.35, 0.415, 0.445, 0.445, 0.435, 0.42]
        AgPasture (disabled)
          Nspecies = 2  # Number of species
          thisCropName = AgPasture  # Crop name shown as on the simulation tree
          cropName = ryegrass whiteclover  # Species names
          dmtotal = 1500      350  # Initial shoot dry matter (kg/ha)
          dmlitter = 250        50  # Initial litter dry matter (kg/ha)
          dmgreenmin = 500        50  # Minimum green dry matter (kg/ha)
          rootDepth = 750        300  # Root depth (mm)
          rlvp = 1.00   0.25   0.10   0.05  0.00   0.00  # Root distribution of swards (relative to each soil layer)
          WaterUptakeSource = calc  # Water uptake done by AgPasture (calc) or by apsim?
        outputfile Report -> /SoilNitrogen_BasicTests/WithSoilN/Sim01-SoilN - BareBare/Paddock1-LD/Report: filename=Sim03-SoilN - Bare+NH4 Paddock1-LD Report.out; title=Sim03-SoilN - Bare+NH4 Paddock1-LD Report
          variables -> /SoilNitrogen_BasicTests/WithSoilN/Sim01-SoilN - BareBare/Paddock1-LD/Report/Variables
          events ReportingFrequency -> /SoilNitrogen_BasicTests/WithSoilN/Sim01-SoilN - BareBare/Paddock1-LD/Report/ReportingFrequency
      area Paddock2-HD -> /SoilNitrogen_BasicTests/WithSoilN/Sim01-SoilN - BareBare/Paddock2-HD
        Soil HighDrainageSoil
          Water: same as WithSoilN.Sim01-SoilN - BareBare.Paddock2-HD.HighDrainageSoil.Water
          SoilWater: same as WithSoilN.Sim01-SoilN - BareBare.Paddock2-HD.HighDrainageSoil.SoilWater
          SoilOrganicMatter: same as WithSoilN.Sim01-SoilN - BareBare.Paddock2-HD.HighDrainageSoil.SoilOrganicMatter
          Analysis: same as WithSoilN.Sim01-SoilN - BareBare.Paddock2-HD.HighDrainageSoil.Analysis
          Sample Initial nitrogen: NH4Units=kgha
            Thickness  NO3  NH4
            150        0    10
            150        0    10
            300        0    10
            300        0    10
            300        0    10
            300        0    10
          Sample Initial water: Thickness=[150, 150, 300, 300, 300, 300]; SW=[0.3, 0.35, 0.37, 0.37, 0.37, 0.35]
        outputfile Report -> /SoilNitrogen_BasicTests/WithSoilN/Sim01-SoilN - BareBare/Paddock2-HD/Report: filename=Sim03-SoilN - Bare+NH4 Paddock2-HD Report.out; title=Sim03-SoilN - Bare+NH4 Paddock2-HD Report
          variables -> /SoilNitrogen_BasicTests/WithSoilN/Sim01-SoilN - BareBare/Paddock2-HD/Report/Variables
          events ReportingFrequency -> /SoilNitrogen_BasicTests/WithSoilN/Sim01-SoilN - BareBare/Paddock2-HD/Report/ReportingFrequency
    simulation Sim04-SoilN - Bare+Hum -> /SoilNitrogen_BasicTests/WithSoilN/Sim01-SoilN - BareBare
      memo Info
        ++++++++++++++++++  TEST 04 ++++++++++++++++++

           Description:
              - Stable climate;
              - two soils, a free draining and a clayey;
              - Bare soil;
              - No initial mineral N;
              - Initial organic matter = about 125 tonnes hum, 10ton N;
              - No initial surface residues;
              - No additions of residues or mineral N;

        +++++++++++++++++++++++++++++++++++++++++++++
      area Paddock1-LD -> /SoilNitrogen_BasicTests/WithSoilN/Sim01-SoilN - BareBare/Paddock1-LD
        Soil LowDrainageSoil
          Water: same as WithSoilN.Sim01-SoilN - BareBare.Paddock1-LD.LowDrainageSoil.Water
          SoilWater: same as WithSoilN.Sim01-SoilN - BareBare.Paddock1-LD.LowDrainageSoil.SoilWater
          SoilOrganicMatter
            Thickness  OC    FBiom  FInert
            150        3     0.035  0.45
            150        1.5   0.025  0.525
            300        0.5   0.015  0.675
            300        0.25  0.01   0.85
            300        0.1   0.01   0.95
            300        0.1   0.01   0.998
            RootCN = 30
            RootWt = 0
            SoilCN = 12.5
            EnrACoeff = 7.4
            EnrBCoeff = 0.2
          Analysis: same as WithSoilN.Sim01-SoilN - BareBare.Paddock1-LD.LowDrainageSoil.Analysis
          Sample Initial nitrogen
            Thickness  NO3  NH4
            150        0    0
            150        0    0
            300        0    0
            300        0    0
            300        0    0
            300        0    0
          Sample Initial water: Thickness=[150, 150, 300, 300, 300, 300]; SW=[0.35, 0.415, 0.445, 0.445, 0.435, 0.42]
        outputfile Report -> /SoilNitrogen_BasicTests/WithSoilN/Sim01-SoilN - BareBare/Paddock1-LD/Report: filename=Sim04-SoilN - Bare+Hum Paddock1-LD Report.out; title=Sim04-SoilN - Bare+Hum Paddock1-LD Report
          variables -> /SoilNitrogen_BasicTests/WithSoilN/Sim01-SoilN - BareBare/Paddock1-LD/Report/Variables
          events ReportingFrequency -> /SoilNitrogen_BasicTests/WithSoilN/Sim01-SoilN - BareBare/Paddock1-LD/Report/ReportingFrequency
      area Paddock2-HD -> /SoilNitrogen_BasicTests/WithSoilN/Sim01-SoilN - BareBare/Paddock2-HD
        Soil HighDrainageSoil
          Water: same as WithSoilN.Sim01-SoilN - BareBare.Paddock2-HD.HighDrainageSoil.Water
          SoilWater: same as WithSoilN.Sim01-SoilN - BareBare.Paddock2-HD.HighDrainageSoil.SoilWater
          SoilOrganicMatter
            Thickness  OC    FBiom  FInert
            150        3     0.035  0.4
            150        1.5   0.025  0.5
            300        0.5   0.015  0.65
            300        0.25  0.01   0.85
            300        0.1   0.01   0.95
            300        0.1   0.01   0.998
            RootCN = 30
            RootWt = 0
            SoilCN = 12.5
            EnrACoeff = 7.4
            EnrBCoeff = 0.2
          Analysis: same as WithSoilN.Sim01-SoilN - BareBare.Paddock2-HD.HighDrainageSoil.Analysis
          Sample Initial nitrogen
            Thickness  NO3  NH4
            150        0    0
            150        0    0
            300        0    0
            300        0    0
            300        0    0
            300        0    0
          Sample Initial water: Thickness=[150, 150, 300, 300, 300, 300]; SW=[0.3, 0.35, 0.37, 0.37, 0.37, 0.35]
        outputfile Report -> /SoilNitrogen_BasicTests/WithSoilN/Sim01-SoilN - BareBare/Paddock2-HD/Report: filename=Sim04-SoilN - Bare+Hum Paddock2-HD Report.out; title=Sim04-SoilN - Bare+Hum Paddock2-HD Report
          variables -> /SoilNitrogen_BasicTests/WithSoilN/Sim01-SoilN - BareBare/Paddock2-HD/Report/Variables
          events ReportingFrequency -> /SoilNitrogen_BasicTests/WithSoilN/Sim01-SoilN - BareBare/Paddock2-HD/Report/ReportingFrequency
    simulation Sim05-SoilN - Bare+FOM -> /SoilNitrogen_BasicTests/WithSoilN/Sim01-SoilN - BareBare
      memo Info
        ++++++++++++++++++  TEST 05 ++++++++++++++++++

           Description:
              - Stable climate;
              - two soils, a free draining and a clayey;
              - Bare soil;
              - No initial mineral N;
              - Initial organic matter = 1000kg fom, 13kg N;
              - No initial surface residues;
              - No additions of residues or mineral N;

        +++++++++++++++++++++++++++++++++++++++++++++
      area Paddock1-LD -> /SoilNitrogen_BasicTests/WithSoilN/Sim01-SoilN - BareBare/Paddock1-LD
        Soil LowDrainageSoil
          Water: same as WithSoilN.Sim01-SoilN - BareBare.Paddock1-LD.LowDrainageSoil.Water
          SoilWater: same as WithSoilN.Sim01-SoilN - BareBare.Paddock1-LD.LowDrainageSoil.SoilWater
          SoilOrganicMatter
            Thickness  OC  FBiom  FInert
            150        0   0.035  0.45
            150        0   0.025  0.525
            300        0   0.015  0.675
            300        0   0.01   0.85
            300        0   0.01   0.95
            300        0   0.01   0.998
            RootCN = 30
            RootWt = 1000
            SoilCN = 12.5
            EnrACoeff = 7.4
            EnrBCoeff = 0.2
          Analysis: same as WithSoilN.Sim01-SoilN - BareBare.Paddock1-LD.LowDrainageSoil.Analysis
          Sample Initial nitrogen
            Thickness  NO3  NH4
            150        0    0
            150        0    0
            300        0    0
            300        0    0
            300        0    0
            300        0    0
          Sample Initial water: Thickness=[150, 150, 300, 300, 300, 300]; SW=[0.35, 0.415, 0.445, 0.445, 0.435, 0.42]
        outputfile Report -> /SoilNitrogen_BasicTests/WithSoilN/Sim01-SoilN - BareBare/Paddock1-LD/Report: filename=Sim05-SoilN - Bare+FOM Paddock1-LD Report.out; title=Sim05-SoilN - Bare+FOM Paddock1-LD Report
          variables -> /SoilNitrogen_BasicTests/WithSoilN/Sim01-SoilN - BareBare/Paddock1-LD/Report/Variables
          events ReportingFrequency -> /SoilNitrogen_BasicTests/WithSoilN/Sim01-SoilN - BareBare/Paddock1-LD/Report/ReportingFrequency
      area Paddock2-HD -> /SoilNitrogen_BasicTests/WithSoilN/Sim01-SoilN - BareBare/Paddock2-HD
        Soil HighDrainageSoil
          Water: same as WithSoilN.Sim01-SoilN - BareBare.Paddock2-HD.HighDrainageSoil.Water
          SoilWater: same as WithSoilN.Sim01-SoilN - BareBare.Paddock2-HD.HighDrainageSoil.SoilWater
          SoilOrganicMatter
            Thickness  OC  FBiom  FInert
            150        0   0.035  0.4
            150        0   0.025  0.5
            300        0   0.015  0.65
            300        0   0.01   0.85
            300        0   0.01   0.95
            300        0   0.01   0.998
            RootCN = 30
            RootWt = 1000
            SoilCN = 12.5
            EnrACoeff = 7.4
            EnrBCoeff = 0.2
          Analysis: same as WithSoilN.Sim01-SoilN - BareBare.Paddock2-HD.HighDrainageSoil.Analysis
          Sample Initial nitrogen
            Thickness  NO3  NH4
            150        0    0
            150        0    0
            300        0    0
            300        0    0
            300        0    0
            300        0    0
          Sample Initial water: Thickness=[150, 150, 300, 300, 300, 300]; SW=[0.3, 0.35, 0.37, 0.37, 0.37, 0.35]
        outputfile Report -> /SoilNitrogen_BasicTests/WithSoilN/Sim01-SoilN - BareBare/Paddock2-HD/Report: filename=Sim05-SoilN - Bare+FOM Paddock2-HD Report.out; title=Sim05-SoilN - Bare+FOM Paddock2-HD Report
          variables -> /SoilNitrogen_BasicTests/WithSoilN/Sim01-SoilN - BareBare/Paddock2-HD/Report/Variables
          events ReportingFrequency -> /SoilNitrogen_BasicTests/WithSoilN/Sim01-SoilN - BareBare/Paddock2-HD/Report/ReportingFrequency
    simulation Sim06-SoilN - Bare+SurfOM -> /SoilNitrogen_BasicTests/WithSoilN/Sim01-SoilN - BareBare
      memo Info
        ++++++++++++++++++  TEST 06 ++++++++++++++++++

           Description:
              - Stable climate;
              - two soils, a free draining and a clayey;
              - Bare soil;
              - No initial mineral N;
              - No initial organic matter;
              - Initial surface residues = 1000kg, 27kg N;
              - No additions of residues or mineral N;

        +++++++++++++++++++++++++++++++++++++++++++++
      area Paddock1-LD -> /SoilNitrogen_BasicTests/WithSoilN/Sim01-SoilN - BareBare/Paddock1-LD
        surfaceom Surface Organic Matter
          PoolName = Residue1  # Organic Matter pool name
          type = grass  # Organic Matter type
          mass = 1000  # Initial surface residue (kg/ha)
          cnr = 15  # C:N ratio of initial residue
          standing_fraction = 0  # Fraction of residue standing
        Soil LowDrainageSoil
          Water: same as WithSoilN.Sim01-SoilN - BareBare.Paddock1-LD.LowDrainageSoil.Water
          SoilWater: same as WithSoilN.Sim01-SoilN - BareBare.Paddock1-LD.LowDrainageSoil.SoilWater
          SoilOrganicMatter: same as WithSoilN.Sim01-SoilN - BareBare.Paddock1-LD.LowDrainageSoil.SoilOrganicMatter
          Analysis: same as WithSoilN.Sim01-SoilN - BareBare.Paddock1-LD.LowDrainageSoil.Analysis
          Sample Initial nitrogen
            Thickness  NO3  NH4  SW
            150        0    0    0.35
            150        0    0    0.415
            300        0    0    0.445
            300        0    0    0.445
            300        0    0    0.435
            300        0    0    0.42
          Sample Initial water: Thickness=[150, 150, 300, 300, 300, 300]; SW=[0.35, 0.415, 0.445, 0.445, 0.435, 0.42]
        outputfile Report -> /SoilNitrogen_BasicTests/WithSoilN/Sim01-SoilN - BareBare/Paddock1-LD/Report: filename=Sim06-SoilN - Bare+SurfOM Paddock1-LD Report.out; title=Sim06-SoilN - Bare+SurfOM Paddock1-LD Report
          variables -> /SoilNitrogen_BasicTests/WithSoilN/Sim01-SoilN - BareBare/Paddock1-LD/Report/Variables
          events ReportingFrequency -> /SoilNitrogen_BasicTests/WithSoilN/Sim01-SoilN - BareBare/Paddock1-LD/Report/ReportingFrequency
      area Paddock2-HD -> /SoilNitrogen_BasicTests/WithSoilN/Sim01-SoilN - BareBare/Paddock2-HD
        outputfile Report -> /SoilNitrogen_BasicTests/WithSoilN/Sim01-SoilN - BareBare/Paddock2-HD/Report: filename=Sim06-SoilN - Bare+SurfOM Paddock2-HD Report.out; title=Sim06-SoilN - Bare+SurfOM Paddock2-HD Report
          variables -> /SoilNitrogen_BasicTests/WithSoilN/Sim01-SoilN - BareBare/Paddock2-HD/Report/Variables
          events ReportingFrequency -> /SoilNitrogen_BasicTests/WithSoilN/Sim01-SoilN - BareBare/Paddock2-HD/Report/ReportingFrequency
    simulation Sim07-SoilN - Bare+Urea -> /SoilNitrogen_BasicTests/WithSoilN/Sim01-SoilN - BareBare
      memo Info
        ++++++++++++++++++  TEST 07 ++++++++++++++++++

           Description:
              - Stable climate;
              - two soils, a free draining and a clayey;
              - Bare soil;
              - No initial mineral N;
              - No initial organic matter;
              - No initial surface residues;
              - No additions of residues;
              - Apply 100kg urea_N;

        +++++++++++++++++++++++++++++++++++++++++++++
      area Paddock1-LD -> /SoilNitrogen_BasicTests/WithSoilN/Sim01-SoilN - BareBare/Paddock1-LD
        operations Operations Schedule
          5-Jan  Fertiliser apply amount=50 (kg/ha), depth=100 (mm), type=urea_n
          5-Jan  Fertiliser apply amount=50 (kg/ha), depth=200 (mm), type=urea_n
        Soil LowDrainageSoil: same as WithSoilN.Sim06-SoilN - Bare+SurfOM.Paddock1-LD.LowDrainageSoil
        outputfile Report -> /SoilNitrogen_BasicTests/WithSoilN/Sim01-SoilN - BareBare/Paddock1-LD/Report: filename=Sim07-SoilN - Bare+Urea Paddock1-LD Report.out; title=Sim07-SoilN - Bare+Urea Paddock1-LD Report
          variables -> /SoilNitrogen_BasicTests/WithSoilN/Sim01-SoilN - BareBare/Paddock1-LD/Report/Variables
          events ReportingFrequency -> /SoilNitrogen_BasicTests/WithSoilN/Sim01-SoilN - BareBare/Paddock1-LD/Report/ReportingFrequency
      area Paddock2-HD -> /SoilNitrogen_BasicTests/WithSoilN/Sim01-SoilN - BareBare/Paddock2-HD
        outputfile Report -> /SoilNitrogen_BasicTests/WithSoilN/Sim01-SoilN - BareBare/Paddock2-HD/Report: filename=Sim07-SoilN - Bare+Urea Paddock2-HD Report.out; title=Sim07-SoilN - Bare+Urea Paddock2-HD Report
          variables -> /SoilNitrogen_BasicTests/WithSoilN/Sim01-SoilN - BareBare/Paddock2-HD/Report/Variables
          events ReportingFrequency -> /SoilNitrogen_BasicTests/WithSoilN/Sim01-SoilN - BareBare/Paddock2-HD/Report/ReportingFrequency
    simulation Sim08-SoilN - Bare+NO3+NH4 -> /SoilNitrogen_BasicTests/WithSoilN/Sim01-SoilN - BareBare
      memo Info
        ++++++++++++++++++  TEST 08 ++++++++++++++++++

           Description:
              - Stable climate;
              - two soils, a free draining and a clayey;
              - Bare soil;
              - Initial mineral N = 60kg as NO3 + 60kg as NH4;
              - No initial organic matter;
              - No initial surface residues;
              - No additions of residues or mineral N;

        +++++++++++++++++++++++++++++++++++++++++++++
      area Paddock1-LD -> /SoilNitrogen_BasicTests/WithSoilN/Sim01-SoilN - BareBare/Paddock1-LD
        Soil LowDrainageSoil
          Water: same as WithSoilN.Sim01-SoilN - BareBare.Paddock1-LD.LowDrainageSoil.Water
          SoilWater: same as WithSoilN.Sim01-SoilN - BareBare.Paddock1-LD.LowDrainageSoil.SoilWater
          SoilOrganicMatter: same as WithSoilN.Sim01-SoilN - BareBare.Paddock1-LD.LowDrainageSoil.SoilOrganicMatter
          Analysis: same as WithSoilN.Sim01-SoilN - BareBare.Paddock1-LD.LowDrainageSoil.Analysis
          Sample Initial nitrogen: NO3Units=kgha; NH4Units=kgha
            Thickness  NO3  NH4
            150        10   10
            150        10   10
            300        10   10
            300        10   10
            300        10   10
            300        10   10
          Sample Initial water: Thickness=[150, 150, 300, 300, 300, 300]; SW=[0.35, 0.415, 0.445, 0.445, 0.435, 0.42]
        outputfile Report -> /SoilNitrogen_BasicTests/WithSoilN/Sim01-SoilN - BareBare/Paddock1-LD/Report: filename=Sim08-SoilN - Bare+NO3+NH4 Paddock1-LD Report.out; title=Sim08-SoilN - Bare+NO3+NH4 Paddock1-LD Report
          variables -> /SoilNitrogen_BasicTests/WithSoilN/Sim01-SoilN - BareBare/Paddock1-LD/Report/Variables
          events ReportingFrequency -> /SoilNitrogen_BasicTests/WithSoilN/Sim01-SoilN - BareBare/Paddock1-LD/Report/ReportingFrequency
      area Paddock2-HD -> /SoilNitrogen_BasicTests/WithSoilN/Sim01-SoilN - BareBare/Paddock2-HD
        Soil HighDrainageSoil
          Water: same as WithSoilN.Sim01-SoilN - BareBare.Paddock2-HD.HighDrainageSoil.Water
          SoilWater: same as WithSoilN.Sim01-SoilN - BareBare.Paddock2-HD.HighDrainageSoil.SoilWater
          SoilOrganicMatter: same as WithSoilN.Sim01-SoilN - BareBare.Paddock2-HD.HighDrainageSoil.SoilOrganicMatter
          Analysis: same as WithSoilN.Sim01-SoilN - BareBare.Paddock2-HD.HighDrainageSoil.Analysis
          Sample Initial nitrogen: NO3Units=kgha; NH4Units=kgha
            Thickness  NO3  NH4
            150        10   10
            150        10   10
            300        10   10
            300        10   10
            300        10   10
            300        10   10
          Sample Initial water: Thickness=[150, 150, 300, 300, 300, 300]; SW=[0.3, 0.35, 0.37, 0.37, 0.37, 0.35]
        outputfile Report -> /SoilNitrogen_BasicTests/WithSoilN/Sim01-SoilN - BareBare/Paddock2-HD/Report: filename=Sim08-SoilN - Bare+NO3+NH4 Paddock2-HD Report.out; title=Sim08-SoilN - Bare+NO3+NH4 Paddock2-HD Report
          variables -> /SoilNitrogen_BasicTests/WithSoilN/Sim01-SoilN - BareBare/Paddock2-HD/Report/Variables
          events ReportingFrequency -> /SoilNitrogen_BasicTests/WithSoilN/Sim01-SoilN - BareBare/Paddock2-HD/Report/ReportingFrequency
    simulation Sim09-SoilN - Bare+Hum+NO3 -> /SoilNitrogen_BasicTests/WithSoilN/Sim01-SoilN - BareBare
      memo Info
        ++++++++++++++++++  TEST 09 ++++++++++++++++++

           Description:
              - Stable climate;
              - two soils, a free draining and a clayey;
              - Bare soil;
              - Initial mineral N = 60kg as NO3;
              - Initial organic matter = about 125 tonnes hum, 10ton N;
              - No initial surface residues;
              - No additions of residues or mineral N;

        +++++++++++++++++++++++++++++++++++++++++++++
      area Paddock1-LD -> /SoilNitrogen_BasicTests/WithSoilN/Sim01-SoilN - BareBare/Paddock1-LD
        Soil LowDrainageSoil
          Water: same as WithSoilN.Sim01-SoilN - BareBare.Paddock1-LD.LowDrainageSoil.Water
          SoilWater: same as WithSoilN.Sim01-SoilN - BareBare.Paddock1-LD.LowDrainageSoil.SoilWater
          SoilOrganicMatter: same as WithSoilN.Sim04-SoilN - Bare+Hum.Paddock1-LD.LowDrainageSoil.SoilOrganicMatter
          Analysis: same as WithSoilN.Sim01-SoilN - BareBare.Paddock1-LD.LowDrainageSoil.Analysis
          Sample Initial nitrogen: NO3Units=kgha
            Thickness  NO3  NH4
            150        10   0
            150        10   0
            300        10   0
            300        10   0
            300        10   0
            300        10   0
          Sample Initial water: Thickness=[150, 150, 300, 300, 300, 300]; SW=[0.35, 0.415, 0.445, 0.445, 0.435, 0.42]
        outputfile Report -> /SoilNitrogen_BasicTests/WithSoilN/Sim01-SoilN - BareBare/Paddock1-LD/Report: filename=Sim09-SoilN - Bare+Hum+NO3 Paddock1-LD Report.out; title=Sim09-SoilN - Bare+Hum+NO3 Paddock1-LD Report
          variables -> /SoilNitrogen_BasicTests/WithSoilN/Sim01-SoilN - BareBare/Paddock1-LD/Report/Variables
          events ReportingFrequency -> /SoilNitrogen_BasicTests/WithSoilN/Sim01-SoilN - BareBare/Paddock1-LD/Report/ReportingFrequency
      area Paddock2-HD -> /SoilNitrogen_BasicTests/WithSoilN/Sim01-SoilN - BareBare/Paddock2-HD
        Soil HighDrainageSoil
          Water: same as WithSoilN.Sim01-SoilN - BareBare.Paddock2-HD.HighDrainageSoil.Water
          SoilWater: same as WithSoilN.Sim01-SoilN - BareBare.Paddock2-HD.HighDrainageSoil.SoilWater
          SoilOrganicMatter: same as WithSoilN.Sim04-SoilN - Bare+Hum.Paddock2-HD.HighDrainageSoil.SoilOrganicMatter
          Analysis: same as WithSoilN.Sim01-SoilN - BareBare.Paddock2-HD.HighDrainageSoil.Analysis
          Sample Initial nitrogen: NO3Units=kgha
            Thickness  NO3  NH4
            150        10   0
            150        10   0
            300        10   0
            300        10   0
            300        10   0
            300        10   0
          Sample Initial water
            Thickness  NO3  SW
            150        10   0.3
            150        10   0.35
            300        10   0.37
            300        10   0.37
            300        10   0.37
            300        10   0.35
        outputfile Report -> /SoilNitrogen_BasicTests/WithSoilN/Sim01-SoilN - BareBare/Paddock2-HD/Report: filename=Sim09-SoilN - Bare+Hum+NO3 Paddock2-HD Report.out; title=Sim09-SoilN - Bare+Hum+NO3 Paddock2-HD Report
          variables -> /SoilNitrogen_BasicTests/WithSoilN/Sim01-SoilN - BareBare/Paddock2-HD/Report/Variables
          events ReportingFrequency -> /SoilNitrogen_BasicTests/WithSoilN/Sim01-SoilN - BareBare/Paddock2-HD/Report/ReportingFrequency
    simulation Sim10-SoilN - Bare+Hum+NH4 -> /SoilNitrogen_BasicTests/WithSoilN/Sim01-SoilN - BareBare
      memo Info
        ++++++++++++++++++  TEST 10 ++++++++++++++++++

           Description:
              - Stable climate;
              - two soils, a free draining and a clayey;
              - Bare soil;
              - Initial mineral N = 60kg as NH4;
              - Initial organic matter = about 125 tonnes hum, 10ton N;
              - No initial surface residues;
              - No additions of residues or mineral N;

        +++++++++++++++++++++++++++++++++++++++++++++
      area Paddock1-LD -> /SoilNitrogen_BasicTests/WithSoilN/Sim01-SoilN - BareBare/Paddock1-LD
        Soil LowDrainageSoil
          Water: same as WithSoilN.Sim01-SoilN - BareBare.Paddock1-LD.LowDrainageSoil.Water
          SoilWater: same as WithSoilN.Sim01-SoilN - BareBare.Paddock1-LD.LowDrainageSoil.SoilWater
          SoilOrganicMatter: same as WithSoilN.Sim04-SoilN - Bare+Hum.Paddock1-LD.LowDrainageSoil.SoilOrganicMatter
          Analysis: same as WithSoilN.Sim01-SoilN - BareBare.Paddock1-LD.LowDrainageSoil.Analysis
          Sample Initial nitrogen: NO3Units=kgha; NH4Units=kgha
            Thickness  NO3  NH4
            150        0    10
            150        0    10
            300        0    10
            300        0    10
            300        0    10
            300        0    10
          Sample Initial water: Thickness=[150, 150, 300, 300, 300, 300]; SW=[0.35, 0.415, 0.445, 0.445, 0.435, 0.42]
        outputfile Report -> /SoilNitrogen_BasicTests/WithSoilN/Sim01-SoilN - BareBare/Paddock1-LD/Report: filename=Sim10-SoilN - Bare+Hum+NH4 Paddock1-LD Report.out; title=Sim10-SoilN - Bare+Hum+NH4 Paddock1-LD Report
          variables -> /SoilNitrogen_BasicTests/WithSoilN/Sim01-SoilN - BareBare/Paddock1-LD/Report/Variables
          events ReportingFrequency -> /SoilNitrogen_BasicTests/WithSoilN/Sim01-SoilN - BareBare/Paddock1-LD/Report/ReportingFrequency
      area Paddock2-HD -> /SoilNitrogen_BasicTests/WithSoilN/Sim01-SoilN - BareBare/Paddock2-HD
        Soil HighDrainageSoil
          Water: same as WithSoilN.Sim01-SoilN - BareBare.Paddock2-HD.HighDrainageSoil.Water
          SoilWater: same as WithSoilN.Sim01-SoilN - BareBare.Paddock2-HD.HighDrainageSoil.SoilWater
          SoilOrganicMatter: same as WithSoilN.Sim04-SoilN - Bare+Hum.Paddock2-HD.HighDrainageSoil.SoilOrganicMatter
          Analysis: same as WithSoilN.Sim01-SoilN - BareBare.Paddock2-HD.HighDrainageSoil.Analysis
          Sample Initial nitrogen: NO3Units=kgha; NH4Units=kgha
            Thickness  NO3  NH4
            150        0    10
            150        0    10
            300        0    10
            300        0    10
            300        0    10
            300        0    10
          Sample Initial water
            Thickness  NO3  SW
            150        10   0.3
            150        10   0.35
            300        10   0.37
            300        10   0.37
            300        10   0.37
            300        10   0.35
        outputfile Report -> /SoilNitrogen_BasicTests/WithSoilN/Sim01-SoilN - BareBare/Paddock2-HD/Report: filename=Sim10-SoilN - Bare+Hum+NH4 Paddock2-HD Report.out; title=Sim10-SoilN - Bare+Hum+NH4 Paddock2-HD Report
          variables -> /SoilNitrogen_BasicTests/WithSoilN/Sim01-SoilN - BareBare/Paddock2-HD/Report/Variables
          events ReportingFrequency -> /SoilNitrogen_BasicTests/WithSoilN/Sim01-SoilN - BareBare/Paddock2-HD/Report/ReportingFrequency
    simulation Sim11-SoilN - Bare+FOM+NH4 -> /SoilNitrogen_BasicTests/WithSoilN/Sim01-SoilN - BareBare
      memo Info
        ++++++++++++++++++  TEST 11 ++++++++++++++++++

           Description:
              - Stable climate;
              - two soils, a free draining and a clayey;
              - Bare soil;
              - Initial mineral N = 60kg as NH4;
              - Initial organic matter = 1000kg fom, 13kg N;
              - No initial surface residues;
              - No additions of residues or mineral N;

        +++++++++++++++++++++++++++++++++++++++++++++
      area Paddock1-LD -> /SoilNitrogen_BasicTests/WithSoilN/Sim01-SoilN - BareBare/Paddock1-LD
        Soil LowDrainageSoil
          Water: same as WithSoilN.Sim01-SoilN - BareBare.Paddock1-LD.LowDrainageSoil.Water
          SoilWater: same as WithSoilN.Sim01-SoilN - BareBare.Paddock1-LD.LowDrainageSoil.SoilWater
          SoilOrganicMatter: same as WithSoilN.Sim05-SoilN - Bare+FOM.Paddock1-LD.LowDrainageSoil.SoilOrganicMatter
          Analysis: same as WithSoilN.Sim01-SoilN - BareBare.Paddock1-LD.LowDrainageSoil.Analysis
          Sample Initial nitrogen: NO3Units=kgha; NH4Units=kgha
            Thickness  NO3  NH4
            150        0    10
            150        0    10
            300        0    10
            300        0    10
            300        0    10
            300        0    10
          Sample Initial water: Thickness=[150, 150, 300, 300, 300, 300]; SW=[0.35, 0.415, 0.445, 0.445, 0.435, 0.42]
        outputfile Report -> /SoilNitrogen_BasicTests/WithSoilN/Sim01-SoilN - BareBare/Paddock1-LD/Report: filename=Sim11-SoilN - Bare+FOM+NH4 Paddock1-LD Report.out; title=Sim11-SoilN - Bare+FOM+NH4 Paddock1-LD Report
          variables -> /SoilNitrogen_BasicTests/WithSoilN/Sim01-SoilN - BareBare/Paddock1-LD/Report/Variables
          events ReportingFrequency -> /SoilNitrogen_BasicTests/WithSoilN/Sim01-SoilN - BareBare/Paddock1-LD/Report/ReportingFrequency
      area Paddock2-HD -> /SoilNitrogen_BasicTests/WithSoilN/Sim01-SoilN - BareBare/Paddock2-HD
        Soil HighDrainageSoil
          Water: same as WithSoilN.Sim01-SoilN - BareBare.Paddock2-HD.HighDrainageSoil.Water
          SoilWater: same as WithSoilN.Sim01-SoilN - BareBare.Paddock2-HD.HighDrainageSoil.SoilWater
          SoilOrganicMatter: same as WithSoilN.Sim05-SoilN - Bare+FOM.Paddock2-HD.HighDrainageSoil.SoilOrganicMatter
          Analysis: same as WithSoilN.Sim01-SoilN - BareBare.Paddock2-HD.HighDrainageSoil.Analysis
          Sample Initial nitrogen: NO3Units=kgha; NH4Units=kgha
            Thickness  NO3  NH4
            150        0    10
            150        0    10
            300        0    10
            300        0    10
            300        0    10
            300        0    10
          Sample Initial water
            Thickness  NO3  SW
            150        10   0.3
            150        10   0.35
            300        10   0.37
            300        10   0.37
            300        10   0.37
            300        10   0.35
        outputfile Report -> /SoilNitrogen_BasicTests/WithSoilN/Sim01-SoilN - BareBare/Paddock2-HD/Report: filename=Sim11-SoilN - Bare+FOM+NH4 Paddock2-HD Report.out; title=Sim11-SoilN - Bare+FOM+NH4 Paddock2-HD Report
          variables -> /SoilNitrogen_BasicTests/WithSoilN/Sim01-SoilN - BareBare/Paddock2-HD/Report/Variables
          events ReportingFrequency -> /SoilNitrogen_BasicTests/WithSoilN/Sim01-SoilN - BareBare/Paddock2-HD/Report/ReportingFrequency
    simulation Sim12-SoilN - Bare+SurfOM+NH4 -> /SoilNitrogen_BasicTests/WithSoilN/Sim01-SoilN - BareBare
      memo Info
        ++++++++++++++++++  TEST 12 ++++++++++++++++++

           Description:
              - Stable climate;
              - two soils, a free draining and a clayey;
              - Bare soil;
              - Initial mineral N = 60kg as NH4;
              - No initial organic matter;
              - Initial surface residues = 1000kg, 27kg N;
              - No additions of residues or mineral N;

        +++++++++++++++++++++++++++++++++++++++++++++
      area Paddock1-LD -> /SoilNitrogen_BasicTests/WithSoilN/Sim01-SoilN - BareBare/Paddock1-LD
        surfaceom Surface Organic Matter
          PoolName = Residue1  # Organic Matter pool name
          type = grass  # Organic Matter type
          mass = 1000  # Initial surface residue (kg/ha)
          cnr = 15  # C:N ratio of initial residue
          standing_fraction = 0  # Fraction of residue standing
        Soil LowDrainageSoil
          Water: same as WithSoilN.Sim01-SoilN - BareBare.Paddock1-LD.LowDrainageSoil.Water
          SoilWater: same as WithSoilN.Sim01-SoilN - BareBare.Paddock1-LD.LowDrainageSoil.SoilWater
          SoilOrganicMatter: same as WithSoilN.Sim01-SoilN - BareBare.Paddock1-LD.LowDrainageSoil.SoilOrganicMatter
          Analysis: same as WithSoilN.Sim01-SoilN - BareBare.Paddock1-LD.LowDrainageSoil.Analysis
          Sample Initial nitrogen: NO3Units=kgha; NH4Units=kgha
            Thickness  NO3  NH4
            150        0    10
            150        0    10
            300        0    10
            300        0    10
            300        0    10
            300        0    10
          Sample Initial water: Thickness=[150, 150, 300, 300, 300, 300]; SW=[0.35, 0.415, 0.445, 0.445, 0.435, 0.42]
        outputfile Report -> /SoilNitrogen_BasicTests/WithSoilN/Sim01-SoilN - BareBare/Paddock1-LD/Report: filename=Sim12-SoilN - Bare+SurfOM+NH4 Paddock1-LD Report.out; title=Sim12-SoilN - Bare+SurfOM+NH4 Paddock1-LD Report
          variables -> /SoilNitrogen_BasicTests/WithSoilN/Sim01-SoilN - BareBare/Paddock1-LD/Report/Variables
          events ReportingFrequency -> /SoilNitrogen_BasicTests/WithSoilN/Sim01-SoilN - BareBare/Paddock1-LD/Report/ReportingFrequency
      area Paddock2-HD -> /SoilNitrogen_BasicTests/WithSoilN/Sim01-SoilN - BareBare/Paddock2-HD
        Soil HighDrainageSoil
          Water: same as WithSoilN.Sim01-SoilN - BareBare.Paddock2-HD.HighDrainageSoil.Water
          SoilWater: same as WithSoilN.Sim01-SoilN - BareBare.Paddock2-HD.HighDrainageSoil.SoilWater
          SoilOrganicMatter: same as WithSoilN.Sim01-SoilN - BareBare.Paddock2-HD.HighDrainageSoil.SoilOrganicMatter
          Analysis: same as WithSoilN.Sim01-SoilN - BareBare.Paddock2-HD.HighDrainageSoil.Analysis
          Sample Initial nitrogen: NO3Units=kgha; NH4Units=kgha
            Thickness  NO3  NH4
            150        0    10
            150        0    10
            300        0    10
            300        0    10
            300        0    10
            300        0    10
          Sample Initial water
            Thickness  NO3  SW
            150        10   0.3
            150        10   0.35
            300        10   0.37
            300        10   0.37
            300        10   0.37
            300        10   0.35
        outputfile Report -> /SoilNitrogen_BasicTests/WithSoilN/Sim01-SoilN - BareBare/Paddock2-HD/Report: filename=Sim12-SoilN - Bare+SurfOM+NH4 Paddock2-HD Report.out; title=Sim12-SoilN - Bare+SurfOM+NH4 Paddock2-HD Report
          variables -> /SoilNitrogen_BasicTests/WithSoilN/Sim01-SoilN - BareBare/Paddock2-HD/Report/Variables
          events ReportingFrequency -> /SoilNitrogen_BasicTests/WithSoilN/Sim01-SoilN - BareBare/Paddock2-HD/Report/ReportingFrequency
    simulation Sim13-SoilN - Bare+Hum+FOM -> /SoilNitrogen_BasicTests/WithSoilN/Sim01-SoilN - BareBare
      memo Info
        ++++++++++++++++++  TEST 13 ++++++++++++++++++

           Description:
              - Stable climate;
              - two soils, a free draining and a clayey;
              - Bare soil;
              - No initial mineral N;
              - Initial organic matter = about 125 tonnes hum, 10ton N + 1000kg fom, 13kg N;
              - No initial surface residues;
              - No additions of residues or mineral N;

        +++++++++++++++++++++++++++++++++++++++++++++
      area Paddock1-LD -> /SoilNitrogen_BasicTests/WithSoilN/Sim01-SoilN - BareBare/Paddock1-LD
        Soil LowDrainageSoil
          Water: same as WithSoilN.Sim01-SoilN - BareBare.Paddock1-LD.LowDrainageSoil.Water
          SoilWater: same as WithSoilN.Sim01-SoilN - BareBare.Paddock1-LD.LowDrainageSoil.SoilWater
          SoilOrganicMatter
            Thickness  OC    FBiom  FInert
            150        3     0.035  0.45
            150        1.5   0.025  0.525
            300        0.5   0.015  0.675
            300        0.25  0.01   0.85
            300        0.1   0.01   0.95
            300        0.1   0.01   0.998
            RootCN = 30
            RootWt = 1000
            SoilCN = 12.5
            EnrACoeff = 7.4
            EnrBCoeff = 0.2
          Analysis: same as WithSoilN.Sim01-SoilN - BareBare.Paddock1-LD.LowDrainageSoil.Analysis
          Sample Initial nitrogen: NO3Units=kgha; NH4Units=kgha
            Thickness  NO3  NH4
            150        0    0
            150        0    0
            300        0    0
            300        0    0
            300        0    0
            300        0    0
          Sample Initial water: Thickness=[150, 150, 300, 300, 300, 300]; SW=[0.35, 0.415, 0.445, 0.445, 0.435, 0.42]
        outputfile Report -> /SoilNitrogen_BasicTests/WithSoilN/Sim01-SoilN - BareBare/Paddock1-LD/Report: filename=Sim13-SoilN - Bare+Hum+FOM Paddock1-LD Report.out; title=Sim13-SoilN - Bare+Hum+FOM Paddock1-LD Report
          variables -> /SoilNitrogen_BasicTests/WithSoilN/Sim01-SoilN - BareBare/Paddock1-LD/Report/Variables
          events ReportingFrequency -> /SoilNitrogen_BasicTests/WithSoilN/Sim01-SoilN - BareBare/Paddock1-LD/Report/ReportingFrequency
      area Paddock2-HD -> /SoilNitrogen_BasicTests/WithSoilN/Sim01-SoilN - BareBare/Paddock2-HD
        Soil HighDrainageSoil
          Water: same as WithSoilN.Sim01-SoilN - BareBare.Paddock2-HD.HighDrainageSoil.Water
          SoilWater: same as WithSoilN.Sim01-SoilN - BareBare.Paddock2-HD.HighDrainageSoil.SoilWater
          SoilOrganicMatter
            Thickness  OC    FBiom  FInert
            150        3     0.035  0.4
            150        1.5   0.025  0.5
            300        0.5   0.015  0.65
            300        0.25  0.01   0.85
            300        0.1   0.01   0.95
            300        0.1   0.01   0.998
            RootCN = 30
            RootWt = 1000
            SoilCN = 12.5
            EnrACoeff = 7.4
            EnrBCoeff = 0.2
          Analysis: same as WithSoilN.Sim01-SoilN - BareBare.Paddock2-HD.HighDrainageSoil.Analysis
          Sample Initial nitrogen: NO3Units=kgha; NH4Units=kgha
            Thickness  NO3  NH4
            150        0    0
            150        0    0
            300        0    0
            300        0    0
            300        0    0
            300        0    0
          Sample Initial water
            Thickness  NO3  SW
            150        10   0.3
            150        10   0.35
            300        10   0.37
            300        10   0.37
            300        10   0.37
            300        10   0.35
        outputfile Report -> /SoilNitrogen_BasicTests/WithSoilN/Sim01-SoilN - BareBare/Paddock2-HD/Report: filename=Sim13-SoilN - Bare+Hum+FOM Paddock2-HD Report.out; title=Sim13-SoilN - Bare+Hum+FOM Paddock2-HD Report
          variables -> /SoilNitrogen_BasicTests/WithSoilN/Sim01-SoilN - BareBare/Paddock2-HD/Report/Variables
          events ReportingFrequency -> /SoilNitrogen_BasicTests/WithSoilN/Sim01-SoilN - BareBare/Paddock2-HD/Report/ReportingFrequency
    simulation Sim14-SoilN - Bare+Hum+FOM+NH4 -> /SoilNitrogen_BasicTests/WithSoilN/Sim01-SoilN - BareBare
      memo Info
        ++++++++++++++++++  TEST 14 ++++++++++++++++++

           Description:
              - Stable climate;
              - two soils, a free draining and a clayey;
              - Bare soil;
              - Initial mineral N = 60kg as NH4;
              - Initial organic matter = about 125 tonnes hum, 10ton N + 1000kg fom, 13kg N;
              - No initial surface residues;
              - No additions of residues or mineral N;

        +++++++++++++++++++++++++++++++++++++++++++++
      area Paddock1-LD -> /SoilNitrogen_BasicTests/WithSoilN/Sim01-SoilN - BareBare/Paddock1-LD
        Soil LowDrainageSoil
          Water: same as WithSoilN.Sim01-SoilN - BareBare.Paddock1-LD.LowDrainageSoil.Water
          SoilWater: same as WithSoilN.Sim01-SoilN - BareBare.Paddock1-LD.LowDrainageSoil.SoilWater
          SoilOrganicMatter: same as WithSoilN.Sim13-SoilN - Bare+Hum+FOM.Paddock1-LD.LowDrainageSoil.SoilOrganicMatter
          Analysis: same as WithSoilN.Sim01-SoilN - BareBare.Paddock1-LD.LowDrainageSoil.Analysis
          Sample Initial nitrogen: NO3Units=kgha; NH4Units=kgha
            Thickness  NO3  NH4
            150        0    10
            150        0    10
            300        0    10
            300        0    10
            300        0    10
            300        0    10
          Sample Initial water: Thickness=[150, 150, 300, 300, 300, 300]; SW=[0.35, 0.415, 0.445, 0.445, 0.435, 0.42]
        outputfile Report -> /SoilNitrogen_BasicTests/WithSoilN/Sim01-SoilN - BareBare/Paddock1-LD/Report: filename=Sim14-SoilN - Bare+Hum+FOM+NH4 Paddock1-LD Report.out; title=Sim14-SoilN - Bare+Hum+FOM+NH4 Paddock1-LD Report
          variables -> /SoilNitrogen_BasicTests/WithSoilN/Sim01-SoilN - BareBare/Paddock1-LD/Report/Variables
          events ReportingFrequency -> /SoilNitrogen_BasicTests/WithSoilN/Sim01-SoilN - BareBare/Paddock1-LD/Report/ReportingFrequency
      area Paddock2-HD -> /SoilNitrogen_BasicTests/WithSoilN/Sim01-SoilN - BareBare/Paddock2-HD
        Soil HighDrainageSoil
          Water: same as WithSoilN.Sim01-SoilN - BareBare.Paddock2-HD.HighDrainageSoil.Water
          SoilWater: same as WithSoilN.Sim01-SoilN - BareBare.Paddock2-HD.HighDrainageSoil.SoilWater
          SoilOrganicMatter: same as WithSoilN.Sim13-SoilN - Bare+Hum+FOM.Paddock2-HD.HighDrainageSoil.SoilOrganicMatter
          Analysis: same as WithSoilN.Sim01-SoilN - BareBare.Paddock2-HD.HighDrainageSoil.Analysis
          Sample Initial nitrogen: NO3Units=kgha; NH4Units=kgha
            Thickness  NO3  NH4
            150        0    10
            150        0    10
            300        0    10
            300        0    10
            300        0    10
            300        0    10
          Sample Initial water
            Thickness  NO3  SW
            150        10   0.3
            150        10   0.35
            300        10   0.37
            300        10   0.37
            300        10   0.37
            300        10   0.35
        outputfile Report -> /SoilNitrogen_BasicTests/WithSoilN/Sim01-SoilN - BareBare/Paddock2-HD/Report: filename=Sim14-SoilN - Bare+Hum+FOM+NH4 Paddock2-HD Report.out; title=Sim14-SoilN - Bare+Hum+FOM+NH4 Paddock2-HD Report
          variables -> /SoilNitrogen_BasicTests/WithSoilN/Sim01-SoilN - BareBare/Paddock2-HD/Report/Variables
          events ReportingFrequency -> /SoilNitrogen_BasicTests/WithSoilN/Sim01-SoilN - BareBare/Paddock2-HD/Report/ReportingFrequency
    simulation Sim15-SoilN - Bare+Hum+FOM+SurfOM+NH4 -> /SoilNitrogen_BasicTests/WithSoilN/Sim01-SoilN - BareBare
      memo Info
        ++++++++++++++++++  TEST 15 ++++++++++++++++++

           Description:
              - Stable climate;
              - two soils, a free draining and a clayey;
              - Bare soil;
              - Initial mineral N = 60kg as NH4;
              - Initial organic matter = about 125 tonnes hum, 10ton N + 1000kg fom, 13kg N;
              - Initial surface residues = 1000kg, 27kg N;
              - No additions of residues or mineral N;

        +++++++++++++++++++++++++++++++++++++++++++++
      area Paddock1-LD -> /SoilNitrogen_BasicTests/WithSoilN/Sim01-SoilN - BareBare/Paddock1-LD
        surfaceom Surface Organic Matter
          PoolName = Residue1  # Organic Matter pool name
          type = grass  # Organic Matter type
          mass = 1000  # Initial surface residue (kg/ha)
          cnr = 15  # C:N ratio of initial residue
          standing_fraction = 0  # Fraction of residue standing
        Soil LowDrainageSoil: same as WithSoilN.Sim14-SoilN - Bare+Hum+FOM+NH4.Paddock1-LD.LowDrainageSoil
        outputfile Report -> /SoilNitrogen_BasicTests/WithSoilN/Sim01-SoilN - BareBare/Paddock1-LD/Report: title=Sim15-SoilN - Bare+Hum+FOM+SurfOM+NH4 Paddock1-LD Report
          filename=Sim15-SoilN - Bare+Hum+FOM+SurfOM+NH4 Paddock1-LD Report.out
          variables -> /SoilNitrogen_BasicTests/WithSoilN/Sim01-SoilN - BareBare/Paddock1-LD/Report/Variables
          events ReportingFrequency -> /SoilNitrogen_BasicTests/WithSoilN/Sim01-SoilN - BareBare/Paddock1-LD/Report/ReportingFrequency
      area Paddock2-HD -> /SoilNitrogen_BasicTests/WithSoilN/Sim01-SoilN - BareBare/Paddock2-HD
        Soil HighDrainageSoil: same as WithSoilN.Sim14-SoilN - Bare+Hum+FOM+NH4.Paddock2-HD.HighDrainageSoil
        outputfile Report -> /SoilNitrogen_BasicTests/WithSoilN/Sim01-SoilN - BareBare/Paddock2-HD/Report: title=Sim15-SoilN - Bare+Hum+FOM+SurfOM+NH4 Paddock2-HD Report
          filename=Sim15-SoilN - Bare+Hum+FOM+SurfOM+NH4 Paddock2-HD Report.out
          variables -> /SoilNitrogen_BasicTests/WithSoilN/Sim01-SoilN - BareBare/Paddock2-HD/Report/Variables
          events ReportingFrequency -> /SoilNitrogen_BasicTests/WithSoilN/Sim01-SoilN - BareBare/Paddock2-HD/Report/ReportingFrequency
    simulation Sim16-SoilN - Bare+Hum+FOM+SurfOM+N -> /SoilNitrogen_BasicTests/WithSoilN/Sim01-SoilN - BareBare
      memo Info
        ++++++++++++++++++  TEST 16 ++++++++++++++++++

           Description:
              - Stable climate;
              - two soils, a free draining and a clayey;
              - Bare soil;
              - Initial mineral N = 30kg as NO3 + 30kg as NH4;
              - Initial organic matter = about 125 tonnes hum, 10ton N + 1000kg fom, 13kg N;
              - Initial surface residues = 1000kg, 27kg N;
              - No additions of residues or mineral N;

        +++++++++++++++++++++++++++++++++++++++++++++
      area Paddock1-LD -> /SoilNitrogen_BasicTests/WithSoilN/Sim01-SoilN - BareBare/Paddock1-LD
        surfaceom Surface Organic Matter
          PoolName = Residue1  # Organic Matter pool name
          type = grass  # Organic Matter type
          mass = 1000  # Initial surface residue (kg/ha)
          cnr = 15  # C:N ratio of initial residue
          standing_fraction = 0  # Fraction of residue standing
        Soil LowDrainageSoil
          Water: same as WithSoilN.Sim01-SoilN - BareBare.Paddock1-LD.LowDrainageSoil.Water
          SoilWater: same as WithSoilN.Sim01-SoilN - BareBare.Paddock1-LD.LowDrainageSoil.SoilWater
          SoilOrganicMatter: same as WithSoilN.Sim13-SoilN - Bare+Hum+FOM.Paddock1-LD.LowDrainageSoil.SoilOrganicMatter
          Analysis: same as WithSoilN.Sim01-SoilN - BareBare.Paddock1-LD.LowDrainageSoil.Analysis
          Sample Initial nitrogen: NO3Units=kgha; NH4Units=kgha
            Thickness  NO3  NH4
            150        5    5
            150        5    5
            300        5    5
            300        5    5
            300        5    5
            300        5    5
          Sample Initial water: Thickness=[150, 150, 300, 300, 300, 300]; SW=[0.35, 0.415, 0.445, 0.445, 0.435, 0.42]
        outputfile Report -> /SoilNitrogen_BasicTests/WithSoilN/Sim01-SoilN - BareBare/Paddock1-LD/Report: filename=Sim16-SoilN - Bare+Hum+FOM+SurfOM+N Paddock1-LD Report.out; title=Sim16-SoilN - Bare+Hum+FOM+SurfOM+N Paddock1-LD Report
          variables -> /SoilNitrogen_BasicTests/WithSoilN/Sim01-SoilN - BareBare/Paddock1-LD/Report/Variables
          events ReportingFrequency -> /SoilNitrogen_BasicTests/WithSoilN/Sim01-SoilN - BareBare/Paddock1-LD/Report/ReportingFrequency
      area Paddock2-HD -> /SoilNitrogen_BasicTests/WithSoilN/Sim01-SoilN - BareBare/Paddock2-HD
        Soil HighDrainageSoil
          Water: same as WithSoilN.Sim01-SoilN - BareBare.Paddock2-HD.HighDrainageSoil.Water
          SoilWater: same as WithSoilN.Sim01-SoilN - BareBare.Paddock2-HD.HighDrainageSoil.SoilWater
          SoilOrganicMatter: same as WithSoilN.Sim13-SoilN - Bare+Hum+FOM.Paddock2-HD.HighDrainageSoil.SoilOrganicMatter
          Analysis: same as WithSoilN.Sim01-SoilN - BareBare.Paddock2-HD.HighDrainageSoil.Analysis
          Sample Initial nitrogen: NO3Units=kgha; NH4Units=kgha
            Thickness  NO3  NH4
            150        5    5
            150        5    5
            300        5    5
            300        5    5
            300        5    5
            300        5    5
          Sample Initial water
            Thickness  NO3  SW
            150        10   0.3
            150        10   0.35
            300        10   0.37
            300        10   0.37
            300        10   0.37
            300        10   0.35
        outputfile Report -> /SoilNitrogen_BasicTests/WithSoilN/Sim01-SoilN - BareBare/Paddock2-HD/Report: filename=Sim16-SoilN - Bare+Hum+FOM+SurfOM+N Paddock2-HD Report.out; title=Sim16-SoilN - Bare+Hum+FOM+SurfOM+N Paddock2-HD Report
          variables -> /SoilNitrogen_BasicTests/WithSoilN/Sim01-SoilN - BareBare/Paddock2-HD/Report/Variables
          events ReportingFrequency -> /SoilNitrogen_BasicTests/WithSoilN/Sim01-SoilN - BareBare/Paddock2-HD/Report/ReportingFrequency
    simulation Sim17-SoilN - Bare+Hum+FOM+SurfOM+N+Urea -> /SoilNitrogen_BasicTests/WithSoilN/Sim01-SoilN - BareBare
      memo Info
        ++++++++++++++++++  TEST 17 ++++++++++++++++++

           Description:
              - Stable climate;
              - two soils, a free draining and a clayey;
              - Bare soil;
              - Initial mineral N = 30kg as NO3 + 30kg as NH4;
              - Initial organic matter = about 125 tonnes hum, 10ton N + 1000kg fom, 13kg N;
              - No initial surface residues;
              - No additions of residues;
              - Apply 100kg urea_N;

        +++++++++++++++++++++++++++++++++++++++++++++
      area Paddock1-LD -> /SoilNitrogen_BasicTests/WithSoilN/Sim01-SoilN - BareBare/Paddock1-LD
        operations Operations Schedule
          5-Jan  Fertiliser apply amount=50 (kg/ha), depth=100 (mm), type=urea_n
          5-Jan  Fertiliser apply amount=50 (kg/ha), depth=200 (mm), type=urea_n
        surfaceom Surface Organic Matter
          PoolName = Residue1  # Organic Matter pool name
          type = grass  # Organic Matter type
          mass = 1000  # Initial surface residue (kg/ha)
          cnr = 15  # C:N ratio of initial residue
          standing_fraction = 0  # Fraction of residue standing
        Soil LowDrainageSoil: same as WithSoilN.Sim16-SoilN - Bare+Hum+FOM+SurfOM+N.Paddock1-LD.LowDrainageSoil
        outputfile Report -> /SoilNitrogen_BasicTests/WithSoilN/Sim01-SoilN - BareBare/Paddock1-LD/Report: title=Sim17-SoilN - Bare+Hum+FOM+SurfOM+N+Urea Paddock1-LD Report
          filename=Sim17-SoilN - Bare+Hum+FOM+SurfOM+N+Urea Paddock1-LD Report.out
          variables -> /SoilNitrogen_BasicTests/WithSoilN/Sim01-SoilN - BareBare/Paddock1-LD/Report/Variables
          events ReportingFrequency -> /SoilNitrogen_BasicTests/WithSoilN/Sim01-SoilN - BareBare/Paddock1-LD/Report/ReportingFrequency
      area Paddock2-HD -> /SoilNitrogen_BasicTests/WithSoilN/Sim01-SoilN - BareBare/Paddock2-HD
        Soil HighDrainageSoil: same as WithSoilN.Sim16-SoilN - Bare+Hum+FOM+SurfOM+N.Paddock2-HD.HighDrainageSoil
        outputfile Report -> /SoilNitrogen_BasicTests/WithSoilN/Sim01-SoilN - BareBare/Paddock2-HD/Report: title=Sim17-SoilN - Bare+Hum+FOM+SurfOM+N+Urea Paddock2-HD Report
          filename=Sim17-SoilN - Bare+Hum+FOM+SurfOM+N+Urea Paddock2-HD Report.out
          variables -> /SoilNitrogen_BasicTests/WithSoilN/Sim01-SoilN - BareBare/Paddock2-HD/Report/Variables
          events ReportingFrequency -> /SoilNitrogen_BasicTests/WithSoilN/Sim01-SoilN - BareBare/Paddock2-HD/Report/ReportingFrequency
    simulation Sim18-SoilN - Bare+N+addOM -> /SoilNitrogen_BasicTests/WithSoilN/Sim01-SoilN - BareBare
      memo Info
        ++++++++++++++++++  TEST 18 ++++++++++++++++++

           Description:
              - Stable climate;
              - two soils, a free draining and a clayey;
              - Bare soil;
              - Initial mineral N = 30kg as NO3 + 30kg as NH4;
              - No initial organic matter;
              - No initial surface residues;
              - Added 1200kg fom, 24kg N + 1000kg residues, 20kg N;
              - No additions of mineral N;

        +++++++++++++++++++++++++++++++++++++++++++++
      area Paddock1-LD -> /SoilNitrogen_BasicTests/WithSoilN/Sim01-SoilN - BareBare/Paddock1-LD
        operations Operations Schedule
          10-Jan  'LowDrainageSoil nitrogen' incorpfom type = grass, amount=500 300 200 100 50 50, cnr=20 20 20 20 20 20
          20-Jan  'surface organic matter' add_surfaceom name = Residue2, type = grass, mass = 1000 (kg/ha), cnr = 20, cpr = 0
        Soil LowDrainageSoil
          Water: same as WithSoilN.Sim01-SoilN - BareBare.Paddock1-LD.LowDrainageSoil.Water
          SoilWater: same as WithSoilN.Sim01-SoilN - BareBare.Paddock1-LD.LowDrainageSoil.SoilWater
          SoilOrganicMatter: same as WithSoilN.Sim01-SoilN - BareBare.Paddock1-LD.LowDrainageSoil.SoilOrganicMatter
          Analysis: same as WithSoilN.Sim01-SoilN - BareBare.Paddock1-LD.LowDrainageSoil.Analysis
          Sample Initial nitrogen: NO3Units=kgha; NH4Units=kgha
            Thickness  NO3  NH4
            150        5    5
            150        5    5
            300        5    5
            300        5    5
            300        5    5
            300        5    5
          Sample Initial water: Thickness=[150, 150, 300, 300, 300, 300]; SW=[0.35, 0.415, 0.445, 0.445, 0.435, 0.42]
        outputfile Report -> /SoilNitrogen_BasicTests/WithSoilN/Sim01-SoilN - BareBare/Paddock1-LD/Report: filename=Sim18-SoilN - Bare+N+addOM Paddock1-LD Report.out; title=Sim18-SoilN - Bare+N+addOM Paddock1-LD Report
          variables -> /SoilNitrogen_BasicTests/WithSoilN/Sim01-SoilN - BareBare/Paddock1-LD/Report/Variables
          events ReportingFrequency -> /SoilNitrogen_BasicTests/WithSoilN/Sim01-SoilN - BareBare/Paddock1-LD/Report/ReportingFrequency
      area Paddock2-HD -> /SoilNitrogen_BasicTests/WithSoilN/Sim01-SoilN - BareBare/Paddock2-HD
        operations Operations Schedule
          10-Jan  'HighDrainageSoil nitrogen' incorpfom type = grass, amount=500 300 200 100 50 50, cnr=20 20 20 20 20 20
          20-Jan  'surface organic matter' add_surfaceom name = Residue2, type = grass, mass = 1000 (kg/ha), cnr = 20, cpr = 0
        Soil HighDrainageSoil
          Water: same as WithSoilN.Sim01-SoilN - BareBare.Paddock2-HD.HighDrainageSoil.Water
          SoilWater: same as WithSoilN.Sim01-SoilN - BareBare.Paddock2-HD.HighDrainageSoil.SoilWater
          SoilOrganicMatter: same as WithSoilN.Sim01-SoilN - BareBare.Paddock2-HD.HighDrainageSoil.SoilOrganicMatter
          Analysis: same as WithSoilN.Sim01-SoilN - BareBare.Paddock2-HD.HighDrainageSoil.Analysis
          Sample Initial nitrogen: NO3Units=kgha; NH4Units=kgha
            Thickness  NO3  NH4
            150        5    5
            150        5    5
            300        5    5
            300        5    5
            300        5    5
            300        5    5
          Sample Initial water: Thickness=[150, 150, 300, 300, 300, 300]; SW=[0.3, 0.35, 0.37, 0.37, 0.37, 0.35]
        outputfile Report -> /SoilNitrogen_BasicTests/WithSoilN/Sim01-SoilN - BareBare/Paddock2-HD/Report: filename=Sim18-SoilN - Bare+N+addOM Paddock2-HD Report.out; title=Sim18-SoilN - Bare+N+addOM Paddock2-HD Report
          variables -> /SoilNitrogen_BasicTests/WithSoilN/Sim01-SoilN - BareBare/Paddock2-HD/Report/Variables
          events ReportingFrequency -> /SoilNitrogen_BasicTests/WithSoilN/Sim01-SoilN - BareBare/Paddock2-HD/Report/ReportingFrequency
    simulation Sim19-SoilN - Bare+Hum+N+addOM -> /SoilNitrogen_BasicTests/WithSoilN/Sim01-SoilN - BareBare
      memo Info
        ++++++++++++++++++  TEST 19 ++++++++++++++++++

           Description:
              - Stable climate;
              - two soils, a free draining and a clayey;
              - Bare soil;
              - Initial mineral N = 30kg as NO3 + 30kg as NH4;
              - Initial organic matter = about 125 tonnes hum, 10ton N;
              - No initial surface residues;
              - Added 1200kg fom, 24kg N + 1000kg residues, 20kg N;
              - No additions of mineral N;

        +++++++++++++++++++++++++++++++++++++++++++++
      area Paddock1-LD -> /SoilNitrogen_BasicTests/WithSoilN/Sim01-SoilN - BareBare/Paddock1-LD
        operations Operations Schedule
          10-Jan  'LowDrainageSoil nitrogen' incorpfom type = grass, amount=500 300 200 100 50 50, cnr=20 20 20 20 20 20
          20-Jan  'surface organic matter' add_surfaceom name = Residue2, type = grass, mass = 1000 (kg/ha), cnr = 20, cpr = 0
        Soil LowDrainageSoil
          Water: same as WithSoilN.Sim01-SoilN - BareBare.Paddock1-LD.LowDrainageSoil.Water
          SoilWater: same as WithSoilN.Sim01-SoilN - BareBare.Paddock1-LD.LowDrainageSoil.SoilWater
          SoilOrganicMatter: same as WithSoilN.Sim04-SoilN - Bare+Hum.Paddock1-LD.LowDrainageSoil.SoilOrganicMatter
          Analysis: same as WithSoilN.Sim01-SoilN - BareBare.Paddock1-LD.LowDrainageSoil.Analysis
          Sample Initial nitrogen: NO3Units=kgha; NH4Units=kgha
            Thickness  NO3  NH4
            150        5    5
            150        5    5
            300        5    5
            300        5    5
            300        5    5
            300        5    5
          Sample Initial water: Thickness=[150, 150, 300, 300, 300, 300]; SW=[0.35, 0.415, 0.445, 0.445, 0.435, 0.42]
        outputfile Report -> /SoilNitrogen_BasicTests/WithSoilN/Sim01-SoilN - BareBare/Paddock1-LD/Report: filename=Sim19-SoilN - Bare+Hum+N+addOM Paddock1-LD Report.out; title=Sim19-SoilN - Bare+Hum+N+addOM Paddock1-LD Report
          variables -> /SoilNitrogen_BasicTests/WithSoilN/Sim01-SoilN - BareBare/Paddock1-LD/Report/Variables
          events ReportingFrequency -> /SoilNitrogen_BasicTests/WithSoilN/Sim01-SoilN - BareBare/Paddock1-LD/Report/ReportingFrequency
      area Paddock2-HD -> /SoilNitrogen_BasicTests/WithSoilN/Sim01-SoilN - BareBare/Paddock2-HD
        operations Operations Schedule
          10-Jan  'HighDrainageSoil nitrogen' incorpfom type = grass, amount=500 300 200 100 50 50, cnr=20 20 20 20 20 20
          20-Jan  'surface organic matter' add_surfaceom name = Residue2, type = grass, mass = 1000 (kg/ha), cnr = 20, cpr = 0
        Soil HighDrainageSoil
          Water: same as WithSoilN.Sim01-SoilN - BareBare.Paddock2-HD.HighDrainageSoil.Water
          SoilWater: same as WithSoilN.Sim01-SoilN - BareBare.Paddock2-HD.HighDrainageSoil.SoilWater
          SoilOrganicMatter: same as WithSoilN.Sim04-SoilN - Bare+Hum.Paddock2-HD.HighDrainageSoil.SoilOrganicMatter
          Analysis: same as WithSoilN.Sim01-SoilN - BareBare.Paddock2-HD.HighDrainageSoil.Analysis
          Sample Initial nitrogen: NO3Units=kgha; NH4Units=kgha
            Thickness  NO3  NH4
            150        5    5
            150        5    5
            300        5    5
            300        5    5
            300        5    5
            300        5    5
          Sample Initial water: Thickness=[150, 150, 300, 300, 300, 300]; SW=[0.3, 0.35, 0.37, 0.37, 0.37, 0.35]
        outputfile Report -> /SoilNitrogen_BasicTests/WithSoilN/Sim01-SoilN - BareBare/Paddock2-HD/Report: filename=Sim19-SoilN - Bare+Hum+N+addOM Paddock2-HD Report.out; title=Sim19-SoilN - Bare+Hum+N+addOM Paddock2-HD Report
          variables -> /SoilNitrogen_BasicTests/WithSoilN/Sim01-SoilN - BareBare/Paddock2-HD/Report/Variables
          events ReportingFrequency -> /SoilNitrogen_BasicTests/WithSoilN/Sim01-SoilN - BareBare/Paddock2-HD/Report/ReportingFrequency
    simulation Sim20-SoilN - Bare+Hum+N+add2OMa -> /SoilNitrogen_BasicTests/WithSoilN/Sim01-SoilN - BareBare
      memo Info
        ++++++++++++++++++  TEST 20 ++++++++++++++++++

           Description:
              - Stable climate;
              - two soils, a free draining and a clayey;
              - Bare soil;
              - Initial mineral N = 30kg as NO3 + 30kg as NH4;
              - Initial organic matter = about 125 tonnes hum, 10ton N;
              - No initial surface residues;
              - Added 2 times 1200kg fom (cn=40 and cn=15)
              - No additions of mineral N;

        +++++++++++++++++++++++++++++++++++++++++++++
      area Paddock1-LD -> /SoilNitrogen_BasicTests/WithSoilN/Sim01-SoilN - BareBare/Paddock1-LD
        operations Operations Schedule
          5-Jan  'LowDrainageSoil nitrogen' incorpfom type = grass, amount=500 300 200 100 50 50, cnr=40 40 40 40 40 40
          25-Jan  'LowDrainageSoil nitrogen' incorpfom type = grass, amount=500 300 200 100 50 50, cnr=15 15 15 15 15 15
        Soil LowDrainageSoil: same as WithSoilN.Sim19-SoilN - Bare+Hum+N+addOM.Paddock1-LD.LowDrainageSoil
        outputfile Report -> /SoilNitrogen_BasicTests/WithSoilN/Sim01-SoilN - BareBare/Paddock1-LD/Report: filename=Sim20-SoilN - Bare+Hum+N+add2OMa Paddock1-LD Report.out; title=Sim20-SoilN - Bare+Hum+N+add2OMa Paddock1-LD Report
          variables -> /SoilNitrogen_BasicTests/WithSoilN/Sim01-SoilN - BareBare/Paddock1-LD/Report/Variables
          events ReportingFrequency -> /SoilNitrogen_BasicTests/WithSoilN/Sim01-SoilN - BareBare/Paddock1-LD/Report/ReportingFrequency
      area Paddock2-HD -> /SoilNitrogen_BasicTests/WithSoilN/Sim01-SoilN - BareBare/Paddock2-HD
        operations Operations Schedule
          5-Jan  'HighDrainageSoil nitrogen' incorpfom type = grass, amount=500 300 200 100 50 50, cnr=40 40 40 40 40 40
          25-Jan  'HighDrainageSoil nitrogen' incorpfom type = grass, amount=500 300 200 100 50 50, cnr=15 15 15 15 15 15
        Soil HighDrainageSoil: same as WithSoilN.Sim19-SoilN - Bare+Hum+N+addOM.Paddock2-HD.HighDrainageSoil
        outputfile Report -> /SoilNitrogen_BasicTests/WithSoilN/Sim01-SoilN - BareBare/Paddock2-HD/Report: filename=Sim20-SoilN - Bare+Hum+N+add2OMa Paddock2-HD Report.out; title=Sim20-SoilN - Bare+Hum+N+add2OMa Paddock2-HD Report
          variables -> /SoilNitrogen_BasicTests/WithSoilN/Sim01-SoilN - BareBare/Paddock2-HD/Report/Variables
          events ReportingFrequency -> /SoilNitrogen_BasicTests/WithSoilN/Sim01-SoilN - BareBare/Paddock2-HD/Report/ReportingFrequency
    simulation Sim21-SoilN - Bare+Hum+N+addOM+Urea -> /SoilNitrogen_BasicTests/WithSoilN/Sim01-SoilN - BareBare
      memo Info
        ++++++++++++++++++  TEST 21 ++++++++++++++++++

           Description:
              - Stable climate;
              - two soils, a free draining and a clayey;
              - Bare soil;
              - Initial mineral N = 30kg as NO3 + 30kg as NH4;
              - Initial organic matter = about 125 tonnes hum, 10ton N;
              - No initial surface residues;
              - Added 1200kg fom, 24kg N + 1000kg residues, 20kg N;
              - Apply 100kg urea_N;

        +++++++++++++++++++++++++++++++++++++++++++++
      area Paddock1-LD -> /SoilNitrogen_BasicTests/WithSoilN/Sim01-SoilN - BareBare/Paddock1-LD
        operations Operations Schedule
          10-Jan  'LowDrainageSoil nitrogen' incorpfom type = grass, amount=500 300 200 100 50 50, cnr=20 20 20 20 20 20
          15-Jan  Fertiliser apply amount=50 (kg/ha), depth=100 (mm), type=urea_n
          20-Jan  'surface organic matter' add_surfaceom name = Residue2, type = grass, mass = 1000 (kg/ha), cnr = 20, cpr = 0
        Soil LowDrainageSoil: same as WithSoilN.Sim19-SoilN - Bare+Hum+N+addOM.Paddock1-LD.LowDrainageSoil
        outputfile Report -> /SoilNitrogen_BasicTests/WithSoilN/Sim01-SoilN - BareBare/Paddock1-LD/Report: filename=Sim21-SoilN - Bare+Hum+N+addOM+Urea Paddock1-LD Report.out; title=Sim21-SoilN - Bare+Hum+N+addOM+Urea Paddock1-LD Report
          variables -> /SoilNitrogen_BasicTests/WithSoilN/Sim01-SoilN - BareBare/Paddock1-LD/Report/Variables
          events ReportingFrequency -> /SoilNitrogen_BasicTests/WithSoilN/Sim01-SoilN - BareBare/Paddock1-LD/Report/ReportingFrequency
      area Paddock2-HD -> /SoilNitrogen_BasicTests/WithSoilN/Sim01-SoilN - BareBare/Paddock2-HD
        operations Operations Schedule
          10-Jan  'HighDrainageSoil nitrogen' incorpfom type = grass, amount=500 300 200 100 50 50, cnr=20 20 20 20 20 20
          15-Jan  Fertiliser apply amount=50 (kg/ha), depth=100 (mm), type=urea_n
          20-Jan  'surface organic matter' add_surfaceom name = Residue2, type = grass, mass = 1000 (kg/ha), cnr = 20, cpr = 0
        Soil HighDrainageSoil: same as WithSoilN.Sim19-SoilN - Bare+Hum+N+addOM.Paddock2-HD.HighDrainageSoil
        outputfile Report -> /SoilNitrogen_BasicTests/WithSoilN/Sim01-SoilN - BareBare/Paddock2-HD/Report: filename=Sim21-SoilN - Bare+Hum+N+addOM+Urea Paddock2-HD Report.out; title=Sim21-SoilN - Bare+Hum+N+addOM+Urea Paddock2-HD Report
          variables -> /SoilNitrogen_BasicTests/WithSoilN/Sim01-SoilN - BareBare/Paddock2-HD/Report/Variables
          events ReportingFrequency -> /SoilNitrogen_BasicTests/WithSoilN/Sim01-SoilN - BareBare/Paddock2-HD/Report/ReportingFrequency
    simulation Sim22-SoilN - Bare+Hum+FOM+SurfOM+N+addOM -> /SoilNitrogen_BasicTests/WithSoilN/Sim01-SoilN - BareBare
      memo Info
        ++++++++++++++++++  TEST 22 ++++++++++++++++++

           Description:
              - Stable climate;
              - two soils, a free draining and a clayey;
              - Bare soil;
              - Initial mineral N = 30kg as NO3 + 30kg as NH4;
              - Initial organic matter = about 125 tonnes hum, 10ton N + 1000kg fom, 13kg N;
              - Initial surface residues = 1000kg, 27kg N;
              - Added 2 times 1000kg residues (cn=15 and cn=30);
              - No additions of mineral N;

        +++++++++++++++++++++++++++++++++++++++++++++
      area Paddock1-LD -> /SoilNitrogen_BasicTests/WithSoilN/Sim01-SoilN - BareBare/Paddock1-LD
        operations Operations Schedule
          5-Jan  'surface organic matter' add_surfaceom name = Residue2, type = grass, mass = 500 (kg/ha), cnr = 15, cpr = 0
          25-Jan  'surface organic matter' add_surfaceom name = Residue2, type = grass, mass = 500 (kg/ha), cnr = 30, cpr = 0
        surfaceom Surface Organic Matter
          PoolName = Residue1 Residue2  # Organic Matter pool name
          type = grass grass  # Organic Matter type
          mass = 500 500  # Initial surface residue (kg/ha)
          cnr = 15 30  # C:N ratio of initial residue
          standing_fraction = 0 0  # Fraction of residue standing
        Soil LowDrainageSoil: same as WithSoilN.Sim16-SoilN - Bare+Hum+FOM+SurfOM+N.Paddock1-LD.LowDrainageSoil
        outputfile Report -> /SoilNitrogen_BasicTests/WithSoilN/Sim01-SoilN - BareBare/Paddock1-LD/Report
          filename=Sim22-SoilN - Bare+Hum+FOM+SurfOM+N+addOM Paddock1-LD Report.out
          title=Sim22-SoilN - Bare+Hum+FOM+SurfOM+N+addOM Paddock1-LD Report
          variables -> /SoilNitrogen_BasicTests/WithSoilN/Sim01-SoilN - BareBare/Paddock1-LD/Report/Variables
          events ReportingFrequency -> /SoilNitrogen_BasicTests/WithSoilN/Sim01-SoilN - BareBare/Paddock1-LD/Report/ReportingFrequency
      area Paddock2-HD -> /SoilNitrogen_BasicTests/WithSoilN/Sim01-SoilN - BareBare/Paddock2-HD
        Soil HighDrainageSoil: same as WithSoilN.Sim16-SoilN - Bare+Hum+FOM+SurfOM+N.Paddock2-HD.HighDrainageSoil
        outputfile Report -> /SoilNitrogen_BasicTests/WithSoilN/Sim01-SoilN - BareBare/Paddock2-HD/Report
          filename=Sim22-SoilN - Bare+Hum+FOM+SurfOM+N+addOM Paddock2-HD Report.out
          title=Sim22-SoilN - Bare+Hum+FOM+SurfOM+N+addOM Paddock2-HD Report
          variables -> /SoilNitrogen_BasicTests/WithSoilN/Sim01-SoilN - BareBare/Paddock2-HD/Report/Variables
          events ReportingFrequency -> /SoilNitrogen_BasicTests/WithSoilN/Sim01-SoilN - BareBare/Paddock2-HD/Report/ReportingFrequency
    simulation Sim23-SoilN - Wheat+N+urea -> /SoilNitrogen_BasicTests/WithSoilN/Sim01-SoilN - BareBare
      memo Info
        ++++++++++++++++++  TEST 01 ++++++++++++++++++

           Description:
              - Stable climate;
              - two soils, a free draining and a clayey;
              - Wheat planted;
              - Initial mineral N = 30kg as NO3 + 30kg as NH4;
              - No initial organic matter;
              - No initial surface residues;
              - No additions of residues;
              - Apply 50kg urea_N;

        +++++++++++++++++++++++++++++++++++++++++++++
      area Paddock1-LD -> /SoilNitrogen_BasicTests/WithSoilN/Sim01-SoilN - BareBare/Paddock1-LD
        operations Operations Schedule
          1-Jan  wheat sow cultivar = hartog, plants = 120, sowing_depth = 30 (mm)
          20-Jan  Fertiliser apply amount=50 (kg/ha), depth=100 (mm), type=urea_n
        Soil LowDrainageSoil
          Water
            Thickness  BD    AirDry  LL15  DUL    SAT
            150        1.3   0.175   0.2   0.4    0.5
            150        1.3   0.25    0.25  0.425  0.5
            300        1.3   0.3     0.3   0.45   0.5
            300        1.35  0.3     0.3   0.45   0.49
            300        1.35  0.32    0.32  0.44   0.48
            300        1.4   0.35    0.35  0.42   0.47
            SoilCrop wheat: LL=[0.2, 0.25, 0.3, 0.3, 0.32, 0.35]; KL=[0.2, 0.15, 0.06, 0.02, 0, 0]; XF=[1, 1, 1, 1, 1, 0]
          SoilWater: same as WithSoilN.Sim01-SoilN - BareBare.Paddock1-LD.LowDrainageSoil.SoilWater
          SoilOrganicMatter: same as WithSoilN.Sim01-SoilN - BareBare.Paddock1-LD.LowDrainageSoil.SoilOrganicMatter
          Analysis: same as WithSoilN.Sim01-SoilN - BareBare.Paddock1-LD.LowDrainageSoil.Analysis
          Sample Initial nitrogen: NO3Units=kgha; NH4Units=kgha
            Thickness  NO3  NH4
            150        5    5
            150        5    5
            300        5    5
            300        5    5
            300        5    5
            300        5    5
          Sample Initial water: Thickness=[150, 150, 300, 300, 300, 300]; SW=[0.35, 0.415, 0.445, 0.445, 0.435, 0.42]
        wheat
        outputfile Report -> /SoilNitrogen_BasicTests/WithSoilN/Sim01-SoilN - BareBare/Paddock1-LD/Report: filename=Sim23-SoilN - Wheat+N+urea Paddock1-LD Report.out; title=Sim23-SoilN - Wheat+N+urea Paddock1-LD Report
          variables -> /SoilNitrogen_BasicTests/WithSoilN/Sim01-SoilN - BareBare/Paddock1-LD/Report/Variables
          events ReportingFrequency -> /SoilNitrogen_BasicTests/WithSoilN/Sim01-SoilN - BareBare/Paddock1-LD/Report/ReportingFrequency
      area Paddock2-HD -> /SoilNitrogen_BasicTests/WithSoilN/Sim01-SoilN - BareBare/Paddock2-HD
        Soil HighDrainageSoil
          Water
            Thickness  BD    AirDry  LL15   DUL    SAT
            150        1.25  0.075   0.1    0.35   0.525
            150        1.3   0.1     0.11   0.36   0.5
            300        1.3   0.125   0.125  0.375  0.5
            300        1.3   0.125   0.125  0.375  0.5
            300        1.35  0.125   0.125  0.375  0.45
            300        1.4   0.125   0.125  0.35   0.45
            SoilCrop wheat: LL=[0.1, 0.11, 0.125, 0.125, 0.125, 0.125]; KL=[0.2, 0.2, 0.1, 0.05, 0, 0]; XF=[1, 1, 1, 1, 1, 0]
          SoilWater: same as WithSoilN.Sim01-SoilN - BareBare.Paddock2-HD.HighDrainageSoil.SoilWater
          SoilOrganicMatter: same as WithSoilN.Sim01-SoilN - BareBare.Paddock2-HD.HighDrainageSoil.SoilOrganicMatter
          Analysis: same as WithSoilN.Sim01-SoilN - BareBare.Paddock2-HD.HighDrainageSoil.Analysis
          Sample Initial nitrogen: NO3Units=kgha; NH4Units=kgha
            Thickness  NO3  NH4
            150        5    5
            150        5    5
            300        5    5
            300        5    5
            300        5    5
            300        5    5
          Sample Initial water: Thickness=[150, 150, 300, 300, 300, 300]; SW=[0.3, 0.35, 0.37, 0.37, 0.37, 0.35]
        wheat
        outputfile Report -> /SoilNitrogen_BasicTests/WithSoilN/Sim01-SoilN - BareBare/Paddock2-HD/Report: filename=Sim23-SoilN - Wheat+N+urea Paddock2-HD Report.out; title=Sim23-SoilN - Wheat+N+urea Paddock2-HD Report
          variables -> /SoilNitrogen_BasicTests/WithSoilN/Sim01-SoilN - BareBare/Paddock2-HD/Report/Variables
          events ReportingFrequency -> /SoilNitrogen_BasicTests/WithSoilN/Sim01-SoilN - BareBare/Paddock2-HD/Report/ReportingFrequency
    simulation Sim24-SoilN - Wheat+Hum+N+urea -> /SoilNitrogen_BasicTests/WithSoilN/Sim01-SoilN - BareBare
      memo Info
        ++++++++++++++++++  TEST 24 ++++++++++++++++++

           Description:
              - Stable climate;
              - two soils, a free draining and a clayey;
              - Wheat planted;
              - Initial mineral N = 30kg as NO3 + 30kg as NH4;
              - Initial organic matter = about 125 tonnes hum, 10ton N;
              - No initial surface residues;
              - No additions of residues (besides crop senescence);
              - Apply 50kg urea_N;

        +++++++++++++++++++++++++++++++++++++++++++++
      area Paddock1-LD -> /SoilNitrogen_BasicTests/WithSoilN/Sim01-SoilN - BareBare/Paddock1-LD
        operations Operations Schedule
          1-Jan  wheat sow cultivar = hartog, plants = 120, sowing_depth = 30 (mm)
          20-Jan  Fertiliser apply amount=50 (kg/ha), depth=100 (mm), type=urea_n
        surfaceom Surface Organic Matter
          PoolName = Residue1  # Organic Matter pool name
          type = grass  # Organic Matter type
          mass = 0  # Initial surface residue (kg/ha)
          cnr = 15  # C:N ratio of initial residue
          standing_fraction = 0  # Fraction of residue standing
        Soil LowDrainageSoil
          Water: same as WithSoilN.Sim23-SoilN - Wheat+N+urea.Paddock1-LD.LowDrainageSoil.Water
          SoilWater: same as WithSoilN.Sim01-SoilN - BareBare.Paddock1-LD.LowDrainageSoil.SoilWater
          SoilOrganicMatter: same as WithSoilN.Sim04-SoilN - Bare+Hum.Paddock1-LD.LowDrainageSoil.SoilOrganicMatter
          Analysis: same as WithSoilN.Sim01-SoilN - BareBare.Paddock1-LD.LowDrainageSoil.Analysis
          Sample Initial nitrogen: NO3Units=kgha; NH4Units=kgha
            Thickness  NO3  NH4
            150        5    5
            150        5    5
            300        5    5
            300        5    5
            300        5    5
            300        5    5
          Sample Initial water: Thickness=[150, 150, 300, 300, 300, 300]; SW=[0.35, 0.415, 0.445, 0.445, 0.435, 0.42]
        wheat
        outputfile Report -> /SoilNitrogen_BasicTests/WithSoilN/Sim01-SoilN - BareBare/Paddock1-LD/Report: filename=Sim24-SoilN - Wheat+Hum+N+urea Paddock1-LD Report.out; title=Sim24-SoilN - Wheat+Hum+N+urea Paddock1-LD Report
          variables -> /SoilNitrogen_BasicTests/WithSoilN/Sim01-SoilN - BareBare/Paddock1-LD/Report/Variables
          events ReportingFrequency -> /SoilNitrogen_BasicTests/WithSoilN/Sim01-SoilN - BareBare/Paddock1-LD/Report/ReportingFrequency
      area Paddock2-HD -> /SoilNitrogen_BasicTests/WithSoilN/Sim01-SoilN - BareBare/Paddock2-HD
        Soil HighDrainageSoil
          Water: same as WithSoilN.Sim23-SoilN - Wheat+N+urea.Paddock2-HD.HighDrainageSoil.Water
          SoilWater: same as WithSoilN.Sim01-SoilN - BareBare.Paddock2-HD.HighDrainageSoil.SoilWater
          SoilOrganicMatter: same as WithSoilN.Sim04-SoilN - Bare+Hum.Paddock2-HD.HighDrainageSoil.SoilOrganicMatter
          Analysis: same as WithSoilN.Sim01-SoilN - BareBare.Paddock2-HD.HighDrainageSoil.Analysis
          Sample Initial nitrogen: NO3Units=kgha; NH4Units=kgha
            Thickness  NO3  NH4
            150        5    5
            150        5    5
            300        5    5
            300        5    5
            300        5    5
            300        5    5
          Sample Initial water: Thickness=[150, 150, 300, 300, 300, 300]; SW=[0.3, 0.35, 0.37, 0.37, 0.37, 0.35]
        wheat
        outputfile Report -> /SoilNitrogen_BasicTests/WithSoilN/Sim01-SoilN - BareBare/Paddock2-HD/Report: filename=Sim24-SoilN - Wheat+Hum+N+urea Paddock2-HD Report.out; title=Sim24-SoilN - Wheat+Hum+N+urea Paddock2-HD Report
          variables -> /SoilNitrogen_BasicTests/WithSoilN/Sim01-SoilN - BareBare/Paddock2-HD/Report/Variables
          events ReportingFrequency -> /SoilNitrogen_BasicTests/WithSoilN/Sim01-SoilN - BareBare/Paddock2-HD/Report/ReportingFrequency
    simulation Sim25-SoilN - Wheat+Hum+FOM+SurfOM+N+urea -> /SoilNitrogen_BasicTests/WithSoilN/Sim01-SoilN - BareBare
      memo Info
        ++++++++++++++++++  TEST 25 ++++++++++++++++++

           Description:
              - Stable climate;
              - two soils, a free draining and a clayey;
              - Wheat planted;
              - Initial mineral N = 30kg as NO3 + 30kg as NH4;
              - Initial organic matter = about 125 tonnes hum, 10ton N + 1000kg fom, 13kg N;
              - Initial surface residues = 1000kg, 27kg N;
              - No additions of residues (besides crop senescence);
              - Apply 50kg urea_N;

        +++++++++++++++++++++++++++++++++++++++++++++
      area Paddock1-LD -> /SoilNitrogen_BasicTests/WithSoilN/Sim01-SoilN - BareBare/Paddock1-LD
        operations Operations Schedule
          1-Jan  wheat sow cultivar = hartog, plants = 120, sowing_depth = 30 (mm)
          20-Jan  Fertiliser apply amount=50 (kg/ha), depth=100 (mm), type=urea_n
        surfaceom Surface Organic Matter
          PoolName = Residue1  # Organic Matter pool name
          type = grass  # Organic Matter type
          mass = 1000  # Initial surface residue (kg/ha)
          cnr = 15  # C:N ratio of initial residue
          standing_fraction = 0  # Fraction of residue standing
        Soil LowDrainageSoil
          Water: same as WithSoilN.Sim23-SoilN - Wheat+N+urea.Paddock1-LD.LowDrainageSoil.Water
          SoilWater: same as WithSoilN.Sim01-SoilN - BareBare.Paddock1-LD.LowDrainageSoil.SoilWater
          SoilOrganicMatter: same as WithSoilN.Sim13-SoilN - Bare+Hum+FOM.Paddock1-LD.LowDrainageSoil.SoilOrganicMatter
          Analysis: same as WithSoilN.Sim01-SoilN - BareBare.Paddock1-LD.LowDrainageSoil.Analysis
          Sample Initial nitrogen: NO3Units=kgha; NH4Units=kgha
            Thickness  NO3  NH4
            150        5    5
            150        5    5
            300        5    5
            300        5    5
            300        5    5
            300        5    5
          Sample Initial water: Thickness=[150, 150, 300, 300, 300, 300]; SW=[0.35, 0.415, 0.445, 0.445, 0.435, 0.42]
        wheat
        outputfile Report -> /SoilNitrogen_BasicTests/WithSoilN/Sim01-SoilN - BareBare/Paddock1-LD/Report
          filename=Sim25-SoilN - Wheat+Hum+FOM+SurfOM+N+urea Paddock1-LD Report.out
          title=Sim25-SoilN - Wheat+Hum+FOM+SurfOM+N+urea Paddock1-LD Report
          variables -> /SoilNitrogen_BasicTests/WithSoilN/Sim01-SoilN - BareBare/Paddock1-LD/Report/Variables
          events ReportingFrequency -> /SoilNitrogen_BasicTests/WithSoilN/Sim01-SoilN - BareBare/Paddock1-LD/Report/ReportingFrequency
      area Paddock2-HD -> /SoilNitrogen_BasicTests/WithSoilN/Sim01-SoilN - BareBare/Paddock2-HD
        Soil HighDrainageSoil
          Water: same as WithSoilN.Sim23-SoilN - Wheat+N+urea.Paddock2-HD.HighDrainageSoil.Water
          SoilWater: same as WithSoilN.Sim01-SoilN - BareBare.Paddock2-HD.HighDrainageSoil.SoilWater
          SoilOrganicMatter: same as WithSoilN.Sim13-SoilN - Bare+Hum+FOM.Paddock2-HD.HighDrainageSoil.SoilOrganicMatter
          Analysis: same as WithSoilN.Sim01-SoilN - BareBare.Paddock2-HD.HighDrainageSoil.Analysis
          Sample Initial nitrogen: NO3Units=kgha; NH4Units=kgha
            Thickness  NO3  NH4
            150        5    5
            150        5    5
            300        5    5
            300        5    5
            300        5    5
            300        5    5
          Sample Initial water: Thickness=[150, 150, 300, 300, 300, 300]; SW=[0.3, 0.35, 0.37, 0.37, 0.37, 0.35]
        wheat
        outputfile Report -> /SoilNitrogen_BasicTests/WithSoilN/Sim01-SoilN - BareBare/Paddock2-HD/Report
          filename=Sim25-SoilN - Wheat+Hum+FOM+SurfOM+N+urea Paddock2-HD Report.out
          title=Sim25-SoilN - Wheat+Hum+FOM+SurfOM+N+urea Paddock2-HD Report
          variables -> /SoilNitrogen_BasicTests/WithSoilN/Sim01-SoilN - BareBare/Paddock2-HD/Report/Variables
          events ReportingFrequency -> /SoilNitrogen_BasicTests/WithSoilN/Sim01-SoilN - BareBare/Paddock2-HD/Report/ReportingFrequency
  folder WithSoilNitrogen
    PlugIns: same as WithSoilN.PlugIns
    simulation Sim01-SoilNitrogen - BareBare -> /SoilNitrogen_BasicTests/WithSoilN/Sim01-SoilN - BareBare
      area Paddock1-LD -> /SoilNitrogen_BasicTests/WithSoilN/Sim01-SoilN - BareBare/Paddock1-LD
        outputfile Report -> /SoilNitrogen_BasicTests/WithSoilN/Sim01-SoilN - BareBare/Paddock1-LD/Report: filename=Sim01-SoilNitrogen - BareBare Paddock1-LD Report.out; title=Sim01-SoilNitrogen - BareBare Paddock1-LD Report
          variables -> /SoilNitrogen_BasicTests/WithSoilN/Sim01-SoilN - BareBare/Paddock1-LD/Report/Variables
          events ReportingFrequency -> /SoilNitrogen_BasicTests/WithSoilN/Sim01-SoilN - BareBare/Paddock1-LD/Report/ReportingFrequency
      area Paddock2-HD -> /SoilNitrogen_BasicTests/WithSoilN/Sim01-SoilN - BareBare/Paddock2-HD
        outputfile Report -> /SoilNitrogen_BasicTests/WithSoilN/Sim01-SoilN - BareBare/Paddock2-HD/Report: filename=Sim01-SoilNitrogen - BareBare Paddock2-HD Report.out; title=Sim01-SoilNitrogen - BareBare Paddock2-HD Report
          variables -> /SoilNitrogen_BasicTests/WithSoilN/Sim01-SoilN - BareBare/Paddock2-HD/Report/Variables
          events ReportingFrequency -> /SoilNitrogen_BasicTests/WithSoilN/Sim01-SoilN - BareBare/Paddock2-HD/Report/ReportingFrequency
    simulation Sim02-SoilNitrogen - Bare+NO3 -> /SoilNitrogen_BasicTests/WithSoilN/Sim02-SoilN - Bare+NO3
      area Paddock1-LD -> /SoilNitrogen_BasicTests/WithSoilN/Sim02-SoilN - Bare+NO3/Paddock1-LD
        outputfile Report -> /SoilNitrogen_BasicTests/WithSoilN/Sim02-SoilN - Bare+NO3/Paddock1-LD/Report: filename=Sim02-SoilNitrogen - Bare+NO3 Paddock1-LD Report.out; title=Sim02-SoilNitrogen - Bare+NO3 Paddock1-LD Report
          variables -> /SoilNitrogen_BasicTests/WithSoilN/Sim02-SoilN - Bare+NO3/Paddock1-LD/Report/Variables
          events ReportingFrequency -> /SoilNitrogen_BasicTests/WithSoilN/Sim02-SoilN - Bare+NO3/Paddock1-LD/Report/ReportingFrequency
      area Paddock2-HD -> /SoilNitrogen_BasicTests/WithSoilN/Sim02-SoilN - Bare+NO3/Paddock2-HD
        outputfile Report -> /SoilNitrogen_BasicTests/WithSoilN/Sim02-SoilN - Bare+NO3/Paddock2-HD/Report: filename=Sim02-SoilNitrogen - Bare+NO3 Paddock2-HD Report.out; title=Sim02-SoilNitrogen - Bare+NO3 Paddock2-HD Report
          variables -> /SoilNitrogen_BasicTests/WithSoilN/Sim02-SoilN - Bare+NO3/Paddock2-HD/Report/Variables
          events ReportingFrequency -> /SoilNitrogen_BasicTests/WithSoilN/Sim02-SoilN - Bare+NO3/Paddock2-HD/Report/ReportingFrequency
    simulation Sim03-SoilNitrogen - Bare+NH4 -> /SoilNitrogen_BasicTests/WithSoilN/Sim03-SoilN - Bare+NH4
      area Paddock1-LD -> /SoilNitrogen_BasicTests/WithSoilN/Sim03-SoilN - Bare+NH4/Paddock1-LD
        outputfile Report -> /SoilNitrogen_BasicTests/WithSoilN/Sim03-SoilN - Bare+NH4/Paddock1-LD/Report: filename=Sim03-SoilNitrogen - Bare+NH4 Paddock1-LD Report.out; title=Sim03-SoilNitrogen - Bare+NH4 Paddock1-LD Report
          variables -> /SoilNitrogen_BasicTests/WithSoilN/Sim03-SoilN - Bare+NH4/Paddock1-LD/Report/Variables
          events ReportingFrequency -> /SoilNitrogen_BasicTests/WithSoilN/Sim03-SoilN - Bare+NH4/Paddock1-LD/Report/ReportingFrequency
      area Paddock2-HD -> /SoilNitrogen_BasicTests/WithSoilN/Sim03-SoilN - Bare+NH4/Paddock2-HD
        outputfile Report -> /SoilNitrogen_BasicTests/WithSoilN/Sim03-SoilN - Bare+NH4/Paddock2-HD/Report: filename=Sim03-SoilNitrogen - Bare+NH4 Paddock2-HD Report.out; title=Sim03-SoilNitrogen - Bare+NH4 Paddock2-HD Report
          variables -> /SoilNitrogen_BasicTests/WithSoilN/Sim03-SoilN - Bare+NH4/Paddock2-HD/Report/Variables
          events ReportingFrequency -> /SoilNitrogen_BasicTests/WithSoilN/Sim03-SoilN - Bare+NH4/Paddock2-HD/Report/ReportingFrequency
    simulation Sim04-SoilNitrogen - Bare+Hum -> /SoilNitrogen_BasicTests/WithSoilN/Sim04-SoilN - Bare+Hum
      area Paddock1-LD -> /SoilNitrogen_BasicTests/WithSoilN/Sim04-SoilN - Bare+Hum/Paddock1-LD
        outputfile Report -> /SoilNitrogen_BasicTests/WithSoilN/Sim04-SoilN - Bare+Hum/Paddock1-LD/Report: filename=Sim04-SoilNitrogen - Bare+Hum Paddock1-LD Report.out; title=Sim04-SoilNitrogen - Bare+Hum Paddock1-LD Report
          variables -> /SoilNitrogen_BasicTests/WithSoilN/Sim04-SoilN - Bare+Hum/Paddock1-LD/Report/Variables
          events ReportingFrequency -> /SoilNitrogen_BasicTests/WithSoilN/Sim04-SoilN - Bare+Hum/Paddock1-LD/Report/ReportingFrequency
      area Paddock2-HD -> /SoilNitrogen_BasicTests/WithSoilN/Sim04-SoilN - Bare+Hum/Paddock2-HD
        outputfile Report -> /SoilNitrogen_BasicTests/WithSoilN/Sim04-SoilN - Bare+Hum/Paddock2-HD/Report: filename=Sim04-SoilNitrogen - Bare+Hum Paddock2-HD Report.out; title=Sim04-SoilNitrogen - Bare+Hum Paddock2-HD Report
          variables -> /SoilNitrogen_BasicTests/WithSoilN/Sim04-SoilN - Bare+Hum/Paddock2-HD/Report/Variables
          events ReportingFrequency -> /SoilNitrogen_BasicTests/WithSoilN/Sim04-SoilN - Bare+Hum/Paddock2-HD/Report/ReportingFrequency
    simulation Sim05-SoilNitrogen - Bare+FOM -> /SoilNitrogen_BasicTests/WithSoilN/Sim05-SoilN - Bare+FOM
      area Paddock1-LD -> /SoilNitrogen_BasicTests/WithSoilN/Sim05-SoilN - Bare+FOM/Paddock1-LD
        outputfile Report -> /SoilNitrogen_BasicTests/WithSoilN/Sim05-SoilN - Bare+FOM/Paddock1-LD/Report: filename=Sim05-SoilNitrogen - Bare+FOM Paddock1-LD Report.out; title=Sim05-SoilNitrogen - Bare+FOM Paddock1-LD Report
          variables -> /SoilNitrogen_BasicTests/WithSoilN/Sim05-SoilN - Bare+FOM/Paddock1-LD/Report/Variables
          events ReportingFrequency -> /SoilNitrogen_BasicTests/WithSoilN/Sim05-SoilN - Bare+FOM/Paddock1-LD/Report/ReportingFrequency
      area Paddock2-HD -> /SoilNitrogen_BasicTests/WithSoilN/Sim05-SoilN - Bare+FOM/Paddock2-HD
        outputfile Report -> /SoilNitrogen_BasicTests/WithSoilN/Sim05-SoilN - Bare+FOM/Paddock2-HD/Report: filename=Sim05-SoilNitrogen - Bare+FOM Paddock2-HD Report.out; title=Sim05-SoilNitrogen - Bare+FOM Paddock2-HD Report
          variables -> /SoilNitrogen_BasicTests/WithSoilN/Sim05-SoilN - Bare+FOM/Paddock2-HD/Report/Variables
          events ReportingFrequency -> /SoilNitrogen_BasicTests/WithSoilN/Sim05-SoilN - Bare+FOM/Paddock2-HD/Report/ReportingFrequency
    simulation Sim06-SoilNitrogen - Bare+SurfOM -> /SoilNitrogen_BasicTests/WithSoilN/Sim06-SoilN - Bare+SurfOM
      area Paddock1-LD -> /SoilNitrogen_BasicTests/WithSoilN/Sim06-SoilN - Bare+SurfOM/Paddock1-LD
        outputfile Report -> /SoilNitrogen_BasicTests/WithSoilN/Sim06-SoilN - Bare+SurfOM/Paddock1-LD/Report: filename=Sim06-SoilNitrogen - Bare+SurfOM Paddock1-LD Report.out; title=Sim06-SoilNitrogen - Bare+SurfOM Paddock1-LD Report
          variables -> /SoilNitrogen_BasicTests/WithSoilN/Sim06-SoilN - Bare+SurfOM/Paddock1-LD/Report/Variables
          events ReportingFrequency -> /SoilNitrogen_BasicTests/WithSoilN/Sim06-SoilN - Bare+SurfOM/Paddock1-LD/Report/ReportingFrequency
      area Paddock2-HD -> /SoilNitrogen_BasicTests/WithSoilN/Sim06-SoilN - Bare+SurfOM/Paddock2-HD
        outputfile Report -> /SoilNitrogen_BasicTests/WithSoilN/Sim06-SoilN - Bare+SurfOM/Paddock2-HD/Report: filename=Sim06-SoilNitrogen - Bare+SurfOM Paddock2-HD Report.out; title=Sim06-SoilNitrogen - Bare+SurfOM Paddock2-HD Report
          variables -> /SoilNitrogen_BasicTests/WithSoilN/Sim06-SoilN - Bare+SurfOM/Paddock2-HD/Report/Variables
          events ReportingFrequency -> /SoilNitrogen_BasicTests/WithSoilN/Sim06-SoilN - Bare+SurfOM/Paddock2-HD/Report/ReportingFrequency
    simulation Sim07-SoilNitrogen - Bare+Urea -> /SoilNitrogen_BasicTests/WithSoilN/Sim07-SoilN - Bare+Urea
      area Paddock1-LD -> /SoilNitrogen_BasicTests/WithSoilN/Sim07-SoilN - Bare+Urea/Paddock1-LD
        outputfile Report -> /SoilNitrogen_BasicTests/WithSoilN/Sim07-SoilN - Bare+Urea/Paddock1-LD/Report: filename=Sim07-SoilNitrogen - Bare+Urea Paddock1-LD Report.out; title=Sim07-SoilNitrogen - Bare+Urea Paddock1-LD Report
          variables -> /SoilNitrogen_BasicTests/WithSoilN/Sim07-SoilN - Bare+Urea/Paddock1-LD/Report/Variables
          events ReportingFrequency -> /SoilNitrogen_BasicTests/WithSoilN/Sim07-SoilN - Bare+Urea/Paddock1-LD/Report/ReportingFrequency
      area Paddock2-HD -> /SoilNitrogen_BasicTests/WithSoilN/Sim07-SoilN - Bare+Urea/Paddock2-HD
        outputfile Report -> /SoilNitrogen_BasicTests/WithSoilN/Sim07-SoilN - Bare+Urea/Paddock2-HD/Report: filename=Sim07-SoilNitrogen - Bare+Urea Paddock2-HD Report.out; title=Sim07-SoilNitrogen - Bare+Urea Paddock2-HD Report
          variables -> /SoilNitrogen_BasicTests/WithSoilN/Sim07-SoilN - Bare+Urea/Paddock2-HD/Report/Variables
          events ReportingFrequency -> /SoilNitrogen_BasicTests/WithSoilN/Sim07-SoilN - Bare+Urea/Paddock2-HD/Report/ReportingFrequency
    simulation Sim08-SoilNitrogen - Bare+NO3+NH4 -> /SoilNitrogen_BasicTests/WithSoilN/Sim08-SoilN - Bare+NO3+NH4
      area Paddock1-LD -> /SoilNitrogen_BasicTests/WithSoilN/Sim08-SoilN - Bare+NO3+NH4/Paddock1-LD
        outputfile Report -> /SoilNitrogen_BasicTests/WithSoilN/Sim08-SoilN - Bare+NO3+NH4/Paddock1-LD/Report: filename=Sim08-SoilNitrogen - Bare+NO3+NH4 Paddock1-LD Report.out; title=Sim08-SoilNitrogen - Bare+NO3+NH4 Paddock1-LD Report
          variables -> /SoilNitrogen_BasicTests/WithSoilN/Sim08-SoilN - Bare+NO3+NH4/Paddock1-LD/Report/Variables
          events ReportingFrequency -> /SoilNitrogen_BasicTests/WithSoilN/Sim08-SoilN - Bare+NO3+NH4/Paddock1-LD/Report/ReportingFrequency
      area Paddock2-HD -> /SoilNitrogen_BasicTests/WithSoilN/Sim08-SoilN - Bare+NO3+NH4/Paddock2-HD
        outputfile Report -> /SoilNitrogen_BasicTests/WithSoilN/Sim08-SoilN - Bare+NO3+NH4/Paddock2-HD/Report: filename=Sim08-SoilNitrogen - Bare+NO3+NH4 Paddock2-HD Report.out; title=Sim08-SoilNitrogen - Bare+NO3+NH4 Paddock2-HD Report
          variables -> /SoilNitrogen_BasicTests/WithSoilN/Sim08-SoilN - Bare+NO3+NH4/Paddock2-HD/Report/Variables
          events ReportingFrequency -> /SoilNitrogen_BasicTests/WithSoilN/Sim08-SoilN - Bare+NO3+NH4/Paddock2-HD/Report/ReportingFrequency
    simulation Sim09-SoilNitrogen - Bare+Hum+NO3 -> /SoilNitrogen_BasicTests/WithSoilN/Sim09-SoilN - Bare+Hum+NO3
      area Paddock1-LD -> /SoilNitrogen_BasicTests/WithSoilN/Sim09-SoilN - Bare+Hum+NO3/Paddock1-LD
        outputfile Report -> /SoilNitrogen_BasicTests/WithSoilN/Sim09-SoilN - Bare+Hum+NO3/Paddock1-LD/Report: filename=Sim09-SoilNitrogen - Bare+Hum+NO3 Paddock1-LD Report.out; title=Sim09-SoilNitrogen - Bare+Hum+NO3 Paddock1-LD Report
          variables -> /SoilNitrogen_BasicTests/WithSoilN/Sim09-SoilN - Bare+Hum+NO3/Paddock1-LD/Report/Variables
          events ReportingFrequency -> /SoilNitrogen_BasicTests/WithSoilN/Sim09-SoilN - Bare+Hum+NO3/Paddock1-LD/Report/ReportingFrequency
      area Paddock2-HD -> /SoilNitrogen_BasicTests/WithSoilN/Sim09-SoilN - Bare+Hum+NO3/Paddock2-HD
        outputfile Report -> /SoilNitrogen_BasicTests/WithSoilN/Sim09-SoilN - Bare+Hum+NO3/Paddock2-HD/Report: filename=Sim09-SoilNitrogen - Bare+Hum+NO3 Paddock2-HD Report.out; title=Sim09-SoilNitrogen - Bare+Hum+NO3 Paddock2-HD Report
          variables -> /SoilNitrogen_BasicTests/WithSoilN/Sim09-SoilN - Bare+Hum+NO3/Paddock2-HD/Report/Variables
          events ReportingFrequency -> /SoilNitrogen_BasicTests/WithSoilN/Sim09-SoilN - Bare+Hum+NO3/Paddock2-HD/Report/ReportingFrequency
    simulation Sim10-SoilNitrogen - Bare+Hum+NH4 -> /SoilNitrogen_BasicTests/WithSoilN/Sim10-SoilN - Bare+Hum+NH4
      area Paddock1-LD -> /SoilNitrogen_BasicTests/WithSoilN/Sim10-SoilN - Bare+Hum+NH4/Paddock1-LD
        outputfile Report -> /SoilNitrogen_BasicTests/WithSoilN/Sim10-SoilN - Bare+Hum+NH4/Paddock1-LD/Report: filename=Sim10-SoilNitrogen - Bare+Hum+NH4 Paddock1-LD Report.out; title=Sim10-SoilNitrogen - Bare+Hum+NH4 Paddock1-LD Report
          variables -> /SoilNitrogen_BasicTests/WithSoilN/Sim10-SoilN - Bare+Hum+NH4/Paddock1-LD/Report/Variables
          events ReportingFrequency -> /SoilNitrogen_BasicTests/WithSoilN/Sim10-SoilN - Bare+Hum+NH4/Paddock1-LD/Report/ReportingFrequency
      area Paddock2-HD -> /SoilNitrogen_BasicTests/WithSoilN/Sim10-SoilN - Bare+Hum+NH4/Paddock2-HD
        outputfile Report -> /SoilNitrogen_BasicTests/WithSoilN/Sim10-SoilN - Bare+Hum+NH4/Paddock2-HD/Report: filename=Sim10-SoilNitrogen - Bare+Hum+NH4 Paddock2-HD Report.out; title=Sim10-SoilNitrogen - Bare+Hum+NH4 Paddock2-HD Report
          variables -> /SoilNitrogen_BasicTests/WithSoilN/Sim10-SoilN - Bare+Hum+NH4/Paddock2-HD/Report/Variables
          events ReportingFrequency -> /SoilNitrogen_BasicTests/WithSoilN/Sim10-SoilN - Bare+Hum+NH4/Paddock2-HD/Report/ReportingFrequency
    simulation Sim11-SoilNitrogen - Bare+FOM+NH4 -> /SoilNitrogen_BasicTests/WithSoilN/Sim11-SoilN - Bare+FOM+NH4
      area Paddock1-LD -> /SoilNitrogen_BasicTests/WithSoilN/Sim11-SoilN - Bare+FOM+NH4/Paddock1-LD
        outputfile Report -> /SoilNitrogen_BasicTests/WithSoilN/Sim11-SoilN - Bare+FOM+NH4/Paddock1-LD/Report: filename=Sim11-SoilNitrogen - Bare+FOM+NH4 Paddock1-LD Report.out; title=Sim11-SoilNitrogen - Bare+FOM+NH4 Paddock1-LD Report
          variables -> /SoilNitrogen_BasicTests/WithSoilN/Sim11-SoilN - Bare+FOM+NH4/Paddock1-LD/Report/Variables
          events ReportingFrequency -> /SoilNitrogen_BasicTests/WithSoilN/Sim11-SoilN - Bare+FOM+NH4/Paddock1-LD/Report/ReportingFrequency
      area Paddock2-HD -> /SoilNitrogen_BasicTests/WithSoilN/Sim11-SoilN - Bare+FOM+NH4/Paddock2-HD
        outputfile Report -> /SoilNitrogen_BasicTests/WithSoilN/Sim11-SoilN - Bare+FOM+NH4/Paddock2-HD/Report: filename=Sim11-SoilNitrogen - Bare+FOM+NH4 Paddock2-HD Report.out; title=Sim11-SoilNitrogen - Bare+FOM+NH4 Paddock2-HD Report
          variables -> /SoilNitrogen_BasicTests/WithSoilN/Sim11-SoilN - Bare+FOM+NH4/Paddock2-HD/Report/Variables
          events ReportingFrequency -> /SoilNitrogen_BasicTests/WithSoilN/Sim11-SoilN - Bare+FOM+NH4/Paddock2-HD/Report/ReportingFrequency
    simulation Sim12-SoilNitrogen - Bare+SurfOM+NH4 -> /SoilNitrogen_BasicTests/WithSoilN/Sim12-SoilN - Bare+SurfOM+NH4
      area Paddock1-LD -> /SoilNitrogen_BasicTests/WithSoilN/Sim12-SoilN - Bare+SurfOM+NH4/Paddock1-LD
        outputfile Report -> /SoilNitrogen_BasicTests/WithSoilN/Sim12-SoilN - Bare+SurfOM+NH4/Paddock1-LD/Report: filename=Sim12-SoilNitrogen - Bare+SurfOM+NH4 Paddock1-LD Report.out; title=Sim12-SoilNitrogen - Bare+SurfOM+NH4 Paddock1-LD Report
          variables -> /SoilNitrogen_BasicTests/WithSoilN/Sim12-SoilN - Bare+SurfOM+NH4/Paddock1-LD/Report/Variables
          events ReportingFrequency -> /SoilNitrogen_BasicTests/WithSoilN/Sim12-SoilN - Bare+SurfOM+NH4/Paddock1-LD/Report/ReportingFrequency
      area Paddock2-HD -> /SoilNitrogen_BasicTests/WithSoilN/Sim12-SoilN - Bare+SurfOM+NH4/Paddock2-HD
        outputfile Report -> /SoilNitrogen_BasicTests/WithSoilN/Sim12-SoilN - Bare+SurfOM+NH4/Paddock2-HD/Report: filename=Sim12-SoilNitrogen - Bare+SurfOM+NH4 Paddock2-HD Report.out; title=Sim12-SoilNitrogen - Bare+SurfOM+NH4 Paddock2-HD Report
          variables -> /SoilNitrogen_BasicTests/WithSoilN/Sim12-SoilN - Bare+SurfOM+NH4/Paddock2-HD/Report/Variables
          events ReportingFrequency -> /SoilNitrogen_BasicTests/WithSoilN/Sim12-SoilN - Bare+SurfOM+NH4/Paddock2-HD/Report/ReportingFrequency
    simulation Sim13-SoilNitrogen - Bare+Hum+FOM -> /SoilNitrogen_BasicTests/WithSoilN/Sim13-SoilN - Bare+Hum+FOM
      area Paddock1-LD -> /SoilNitrogen_BasicTests/WithSoilN/Sim13-SoilN - Bare+Hum+FOM/Paddock1-LD
        outputfile Report -> /SoilNitrogen_BasicTests/WithSoilN/Sim13-SoilN - Bare+Hum+FOM/Paddock1-LD/Report: filename=Sim13-SoilNitrogen - Bare+Hum+FOM Paddock1-LD Report.out; title=Sim13-SoilNitrogen - Bare+Hum+FOM Paddock1-LD Report
          variables -> /SoilNitrogen_BasicTests/WithSoilN/Sim13-SoilN - Bare+Hum+FOM/Paddock1-LD/Report/Variables
          events ReportingFrequency -> /SoilNitrogen_BasicTests/WithSoilN/Sim13-SoilN - Bare+Hum+FOM/Paddock1-LD/Report/ReportingFrequency
      area Paddock2-HD -> /SoilNitrogen_BasicTests/WithSoilN/Sim13-SoilN - Bare+Hum+FOM/Paddock2-HD
        outputfile Report -> /SoilNitrogen_BasicTests/WithSoilN/Sim13-SoilN - Bare+Hum+FOM/Paddock2-HD/Report: filename=Sim13-SoilNitrogen - Bare+Hum+FOM Paddock2-HD Report.out; title=Sim13-SoilNitrogen - Bare+Hum+FOM Paddock2-HD Report
          variables -> /SoilNitrogen_BasicTests/WithSoilN/Sim13-SoilN - Bare+Hum+FOM/Paddock2-HD/Report/Variables
          events ReportingFrequency -> /SoilNitrogen_BasicTests/WithSoilN/Sim13-SoilN - Bare+Hum+FOM/Paddock2-HD/Report/ReportingFrequency
    simulation Sim14-SoilNitrogen - Bare+Hum+FOM+NH4 -> /SoilNitrogen_BasicTests/WithSoilN/Sim14-SoilN - Bare+Hum+FOM+NH4
      area Paddock1-LD -> /SoilNitrogen_BasicTests/WithSoilN/Sim14-SoilN - Bare+Hum+FOM+NH4/Paddock1-LD
        outputfile Report -> /SoilNitrogen_BasicTests/WithSoilN/Sim14-SoilN - Bare+Hum+FOM+NH4/Paddock1-LD/Report: title=Sim14-SoilNitrogen - Bare+Hum+FOM+NH4 Paddock1-LD Report
          filename=Sim14-SoilNitrogen - Bare+Hum+FOM+NH4 Paddock1-LD Report.out
          variables -> /SoilNitrogen_BasicTests/WithSoilN/Sim14-SoilN - Bare+Hum+FOM+NH4/Paddock1-LD/Report/Variables
          events ReportingFrequency -> /SoilNitrogen_BasicTests/WithSoilN/Sim14-SoilN - Bare+Hum+FOM+NH4/Paddock1-LD/Report/ReportingFrequency
      area Paddock2-HD -> /SoilNitrogen_BasicTests/WithSoilN/Sim14-SoilN - Bare+Hum+FOM+NH4/Paddock2-HD
        outputfile Report -> /SoilNitrogen_BasicTests/WithSoilN/Sim14-SoilN - Bare+Hum+FOM+NH4/Paddock2-HD/Report: title=Sim14-SoilNitrogen - Bare+Hum+FOM+NH4 Paddock2-HD Report
          filename=Sim14-SoilNitrogen - Bare+Hum+FOM+NH4 Paddock2-HD Report.out
          variables -> /SoilNitrogen_BasicTests/WithSoilN/Sim14-SoilN - Bare+Hum+FOM+NH4/Paddock2-HD/Report/Variables
          events ReportingFrequency -> /SoilNitrogen_BasicTests/WithSoilN/Sim14-SoilN - Bare+Hum+FOM+NH4/Paddock2-HD/Report/ReportingFrequency
    simulation Sim15-SoilNitrogen - Bare+Hum+FOM+SurfOM+NH4 -> /SoilNitrogen_BasicTests/WithSoilN/Sim15-SoilN - Bare+Hum+FOM+SurfOM+NH4
      area Paddock1-LD -> /SoilNitrogen_BasicTests/WithSoilN/Sim15-SoilN - Bare+Hum+FOM+SurfOM+NH4/Paddock1-LD
        outputfile Report -> /SoilNitrogen_BasicTests/WithSoilN/Sim15-SoilN - Bare+Hum+FOM+SurfOM+NH4/Paddock1-LD/Report
          filename=Sim15-SoilNitrogen - Bare+Hum+FOM+SurfOM+NH4 Paddock1-LD Report.out
          title=Sim15-SoilNitrogen - Bare+Hum+FOM+SurfOM+NH4 Paddock1-LD Report
          variables -> /SoilNitrogen_BasicTests/WithSoilN/Sim15-SoilN - Bare+Hum+FOM+SurfOM+NH4/Paddock1-LD/Report/Variables
          events ReportingFrequency -> /SoilNitrogen_BasicTests/WithSoilN/Sim15-SoilN - Bare+Hum+FOM+SurfOM+NH4/Paddock1-LD/Report/ReportingFrequency
      area Paddock2-HD -> /SoilNitrogen_BasicTests/WithSoilN/Sim15-SoilN - Bare+Hum+FOM+SurfOM+NH4/Paddock2-HD
        outputfile Report -> /SoilNitrogen_BasicTests/WithSoilN/Sim15-SoilN - Bare+Hum+FOM+SurfOM+NH4/Paddock2-HD/Report
          filename=Sim15-SoilNitrogen - Bare+Hum+FOM+SurfOM+NH4 Paddock2-HD Report.out
          title=Sim15-SoilNitrogen - Bare+Hum+FOM+SurfOM+NH4 Paddock2-HD Report
          variables -> /SoilNitrogen_BasicTests/WithSoilN/Sim15-SoilN - Bare+Hum+FOM+SurfOM+NH4/Paddock2-HD/Report/Variables
          events ReportingFrequency -> /SoilNitrogen_BasicTests/WithSoilN/Sim15-SoilN - Bare+Hum+FOM+SurfOM+NH4/Paddock2-HD/Report/ReportingFrequency
    simulation Sim16-SoilNitrogen - Bare+Hum+FOM+SurfOM+N -> /SoilNitrogen_BasicTests/WithSoilN/Sim16-SoilN - Bare+Hum+FOM+SurfOM+N
      area Paddock1-LD -> /SoilNitrogen_BasicTests/WithSoilN/Sim16-SoilN - Bare+Hum+FOM+SurfOM+N/Paddock1-LD
        outputfile Report -> /SoilNitrogen_BasicTests/WithSoilN/Sim16-SoilN - Bare+Hum+FOM+SurfOM+N/Paddock1-LD/Report
          filename=Sim16-SoilNitrogen - Bare+Hum+FOM+SurfOM+N Paddock1-LD Report.out
          title=Sim16-SoilNitrogen - Bare+Hum+FOM+SurfOM+N Paddock1-LD Report
          variables -> /SoilNitrogen_BasicTests/WithSoilN/Sim16-SoilN - Bare+Hum+FOM+SurfOM+N/Paddock1-LD/Report/Variables
          events ReportingFrequency -> /SoilNitrogen_BasicTests/WithSoilN/Sim16-SoilN - Bare+Hum+FOM+SurfOM+N/Paddock1-LD/Report/ReportingFrequency
      area Paddock2-HD -> /SoilNitrogen_BasicTests/WithSoilN/Sim16-SoilN - Bare+Hum+FOM+SurfOM+N/Paddock2-HD
        outputfile Report -> /SoilNitrogen_BasicTests/WithSoilN/Sim16-SoilN - Bare+Hum+FOM+SurfOM+N/Paddock2-HD/Report
          filename=Sim16-SoilNitrogen - Bare+Hum+FOM+SurfOM+N Paddock2-HD Report.out
          title=Sim16-SoilNitrogen - Bare+Hum+FOM+SurfOM+N Paddock2-HD Report
          variables -> /SoilNitrogen_BasicTests/WithSoilN/Sim16-SoilN - Bare+Hum+FOM+SurfOM+N/Paddock2-HD/Report/Variables
          events ReportingFrequency -> /SoilNitrogen_BasicTests/WithSoilN/Sim16-SoilN - Bare+Hum+FOM+SurfOM+N/Paddock2-HD/Report/ReportingFrequency
    simulation Sim17-SoilNitrogen - Bare+Hum+FOM+SurfOM+N+Urea -> /SoilNitrogen_BasicTests/WithSoilN/Sim17-SoilN - Bare+Hum+FOM+SurfOM+N+Urea
      area Paddock1-LD -> /SoilNitrogen_BasicTests/WithSoilN/Sim17-SoilN - Bare+Hum+FOM+SurfOM+N+Urea/Paddock1-LD
        outputfile Report -> /SoilNitrogen_BasicTests/WithSoilN/Sim17-SoilN - Bare+Hum+FOM+SurfOM+N+Urea/Paddock1-LD/Report
          filename=Sim17-SoilNitrogen - Bare+Hum+FOM+SurfOM+N+Urea Paddock1-LD Report.out
          title=Sim17-SoilNitrogen - Bare+Hum+FOM+SurfOM+N+Urea Paddock1-LD Report
          variables -> /SoilNitrogen_BasicTests/WithSoilN/Sim17-SoilN - Bare+Hum+FOM+SurfOM+N+Urea/Paddock1-LD/Report/Variables
          events ReportingFrequency -> /SoilNitrogen_BasicTests/WithSoilN/Sim17-SoilN - Bare+Hum+FOM+SurfOM+N+Urea/Paddock1-LD/Report/ReportingFrequency
      area Paddock2-HD -> /SoilNitrogen_BasicTests/WithSoilN/Sim17-SoilN - Bare+Hum+FOM+SurfOM+N+Urea/Paddock2-HD
        outputfile Report -> /SoilNitrogen_BasicTests/WithSoilN/Sim17-SoilN - Bare+Hum+FOM+SurfOM+N+Urea/Paddock2-HD/Report
          filename=Sim17-SoilNitrogen - Bare+Hum+FOM+SurfOM+N+Urea Paddock2-HD Report.out
          title=Sim17-SoilNitrogen - Bare+Hum+FOM+SurfOM+N+Urea Paddock2-HD Report
          variables -> /SoilNitrogen_BasicTests/WithSoilN/Sim17-SoilN - Bare+Hum+FOM+SurfOM+N+Urea/Paddock2-HD/Report/Variables
          events ReportingFrequency -> /SoilNitrogen_BasicTests/WithSoilN/Sim17-SoilN - Bare+Hum+FOM+SurfOM+N+Urea/Paddock2-HD/Report/ReportingFrequency
    simulation Sim18-SoilNitrogen - Bare+N+addOM -> /SoilNitrogen_BasicTests/WithSoilN/Sim18-SoilN - Bare+N+addOM
      area Paddock1-LD -> /SoilNitrogen_BasicTests/WithSoilN/Sim18-SoilN - Bare+N+addOM/Paddock1-LD
        outputfile Report -> /SoilNitrogen_BasicTests/WithSoilN/Sim18-SoilN - Bare+N+addOM/Paddock1-LD/Report: filename=Sim18-SoilNitrogen - Bare+N+addOM Paddock1-LD Report.out; title=Sim18-SoilNitrogen - Bare+N+addOM Paddock1-LD Report
          variables -> /SoilNitrogen_BasicTests/WithSoilN/Sim18-SoilN - Bare+N+addOM/Paddock1-LD/Report/Variables
          events ReportingFrequency -> /SoilNitrogen_BasicTests/WithSoilN/Sim18-SoilN - Bare+N+addOM/Paddock1-LD/Report/ReportingFrequency
      area Paddock2-HD -> /SoilNitrogen_BasicTests/WithSoilN/Sim18-SoilN - Bare+N+addOM/Paddock2-HD
        outputfile Report -> /SoilNitrogen_BasicTests/WithSoilN/Sim18-SoilN - Bare+N+addOM/Paddock2-HD/Report: filename=Sim18-SoilNitrogen - Bare+N+addOM Paddock2-HD Report.out; title=Sim18-SoilNitrogen - Bare+N+addOM Paddock2-HD Report
          variables -> /SoilNitrogen_BasicTests/WithSoilN/Sim18-SoilN - Bare+N+addOM/Paddock2-HD/Report/Variables
          events ReportingFrequency -> /SoilNitrogen_BasicTests/WithSoilN/Sim18-SoilN - Bare+N+addOM/Paddock2-HD/Report/ReportingFrequency
    simulation Sim19-SoilNitrogen - Bare+Hum+N+addOM -> /SoilNitrogen_BasicTests/WithSoilN/Sim19-SoilN - Bare+Hum+N+addOM
      area Paddock1-LD -> /SoilNitrogen_BasicTests/WithSoilN/Sim19-SoilN - Bare+Hum+N+addOM/Paddock1-LD
        outputfile Report -> /SoilNitrogen_BasicTests/WithSoilN/Sim19-SoilN - Bare+Hum+N+addOM/Paddock1-LD/Report: title=Sim19-SoilNitrogen - Bare+Hum+N+addOM Paddock1-LD Report
          filename=Sim19-SoilNitrogen - Bare+Hum+N+addOM Paddock1-LD Report.out
          variables -> /SoilNitrogen_BasicTests/WithSoilN/Sim19-SoilN - Bare+Hum+N+addOM/Paddock1-LD/Report/Variables
          events ReportingFrequency -> /SoilNitrogen_BasicTests/WithSoilN/Sim19-SoilN - Bare+Hum+N+addOM/Paddock1-LD/Report/ReportingFrequency
      area Paddock2-HD -> /SoilNitrogen_BasicTests/WithSoilN/Sim19-SoilN - Bare+Hum+N+addOM/Paddock2-HD
        outputfile Report -> /SoilNitrogen_BasicTests/WithSoilN/Sim19-SoilN - Bare+Hum+N+addOM/Paddock2-HD/Report: title=Sim19-SoilNitrogen - Bare+Hum+N+addOM Paddock2-HD Report
          filename=Sim19-SoilNitrogen - Bare+Hum+N+addOM Paddock2-HD Report.out
          variables -> /SoilNitrogen_BasicTests/WithSoilN/Sim19-SoilN - Bare+Hum+N+addOM/Paddock2-HD/Report/Variables
          events ReportingFrequency -> /SoilNitrogen_BasicTests/WithSoilN/Sim19-SoilN - Bare+Hum+N+addOM/Paddock2-HD/Report/ReportingFrequency
    simulation Sim20-SoilNitrogen - Bare+Hum+N+add2OMa -> /SoilNitrogen_BasicTests/WithSoilN/Sim20-SoilN - Bare+Hum+N+add2OMa
      area Paddock1-LD -> /SoilNitrogen_BasicTests/WithSoilN/Sim20-SoilN - Bare+Hum+N+add2OMa/Paddock1-LD
        outputfile Report -> /SoilNitrogen_BasicTests/WithSoilN/Sim20-SoilN - Bare+Hum+N+add2OMa/Paddock1-LD/Report: title=Sim20-SoilNitrogen - Bare+Hum+N+add2OMa Paddock1-LD Report
          filename=Sim20-SoilNitrogen - Bare+Hum+N+add2OMa Paddock1-LD Report.out
          variables -> /SoilNitrogen_BasicTests/WithSoilN/Sim20-SoilN - Bare+Hum+N+add2OMa/Paddock1-LD/Report/Variables
          events ReportingFrequency -> /SoilNitrogen_BasicTests/WithSoilN/Sim20-SoilN - Bare+Hum+N+add2OMa/Paddock1-LD/Report/ReportingFrequency
      area Paddock2-HD -> /SoilNitrogen_BasicTests/WithSoilN/Sim20-SoilN - Bare+Hum+N+add2OMa/Paddock2-HD
        outputfile Report -> /SoilNitrogen_BasicTests/WithSoilN/Sim20-SoilN - Bare+Hum+N+add2OMa/Paddock2-HD/Report: title=Sim20-SoilNitrogen - Bare+Hum+N+add2OMa Paddock2-HD Report
          filename=Sim20-SoilNitrogen - Bare+Hum+N+add2OMa Paddock2-HD Report.out
          variables -> /SoilNitrogen_BasicTests/WithSoilN/Sim20-SoilN - Bare+Hum+N+add2OMa/Paddock2-HD/Report/Variables
          events ReportingFrequency -> /SoilNitrogen_BasicTests/WithSoilN/Sim20-SoilN - Bare+Hum+N+add2OMa/Paddock2-HD/Report/ReportingFrequency
    simulation Sim21-SoilNitrogen - Bare+Hum+N+addOM+Urea -> /SoilNitrogen_BasicTests/WithSoilN/Sim21-SoilN - Bare+Hum+N+addOM+Urea
      area Paddock1-LD -> /SoilNitrogen_BasicTests/WithSoilN/Sim21-SoilN - Bare+Hum+N+addOM+Urea/Paddock1-LD
        outputfile Report -> /SoilNitrogen_BasicTests/WithSoilN/Sim21-SoilN - Bare+Hum+N+addOM+Urea/Paddock1-LD/Report
          filename=Sim21-SoilNitrogen - Bare+Hum+N+addOM+Urea Paddock1-LD Report.out
          title=Sim21-SoilNitrogen - Bare+Hum+N+addOM+Urea Paddock1-LD Report
          variables -> /SoilNitrogen_BasicTests/WithSoilN/Sim21-SoilN - Bare+Hum+N+addOM+Urea/Paddock1-LD/Report/Variables
          events ReportingFrequency -> /SoilNitrogen_BasicTests/WithSoilN/Sim21-SoilN - Bare+Hum+N+addOM+Urea/Paddock1-LD/Report/ReportingFrequency
      area Paddock2-HD -> /SoilNitrogen_BasicTests/WithSoilN/Sim21-SoilN - Bare+Hum+N+addOM+Urea/Paddock2-HD
        outputfile Report -> /SoilNitrogen_BasicTests/WithSoilN/Sim21-SoilN - Bare+Hum+N+addOM+Urea/Paddock2-HD/Report
          filename=Sim21-SoilNitrogen - Bare+Hum+N+addOM+Urea Paddock2-HD Report.out
          title=Sim21-SoilNitrogen - Bare+Hum+N+addOM+Urea Paddock2-HD Report
          variables -> /SoilNitrogen_BasicTests/WithSoilN/Sim21-SoilN - Bare+Hum+N+addOM+Urea/Paddock2-HD/Report/Variables
          events ReportingFrequency -> /SoilNitrogen_BasicTests/WithSoilN/Sim21-SoilN - Bare+Hum+N+addOM+Urea/Paddock2-HD/Report/ReportingFrequency
    simulation Sim22-SoilNitrogen - Bare+Hum+FOM+SurfOM+N+addOM -> /SoilNitrogen_BasicTests/WithSoilN/Sim22-SoilN - Bare+Hum+FOM+SurfOM+N+addOM
      area Paddock1-LD -> /SoilNitrogen_BasicTests/WithSoilN/Sim22-SoilN - Bare+Hum+FOM+SurfOM+N+addOM/Paddock1-LD
        outputfile Report -> /SoilNitrogen_BasicTests/WithSoilN/Sim22-SoilN - Bare+Hum+FOM+SurfOM+N+addOM/Paddock1-LD/Report
          filename=Sim22-SoilNitrogen - Bare+Hum+FOM+SurfOM+N+addOM Paddock1-LD Report.out
          title=Sim22-SoilNitrogen - Bare+Hum+FOM+SurfOM+N+addOM Paddock1-LD Report
          variables -> /SoilNitrogen_BasicTests/WithSoilN/Sim22-SoilN - Bare+Hum+FOM+SurfOM+N+addOM/Paddock1-LD/Report/Variables
          events ReportingFrequency -> /SoilNitrogen_BasicTests/WithSoilN/Sim22-SoilN - Bare+Hum+FOM+SurfOM+N+addOM/Paddock1-LD/Report/ReportingFrequency
      area Paddock2-HD -> /SoilNitrogen_BasicTests/WithSoilN/Sim22-SoilN - Bare+Hum+FOM+SurfOM+N+addOM/Paddock2-HD
        outputfile Report -> /SoilNitrogen_BasicTests/WithSoilN/Sim22-SoilN - Bare+Hum+FOM+SurfOM+N+addOM/Paddock2-HD/Report
          filename=Sim22-SoilNitrogen - Bare+Hum+FOM+SurfOM+N+addOM Paddock2-HD Report.out
          title=Sim22-SoilNitrogen - Bare+Hum+FOM+SurfOM+N+addOM Paddock2-HD Report
          variables -> /SoilNitrogen_BasicTests/WithSoilN/Sim22-SoilN - Bare+Hum+FOM+SurfOM+N+addOM/Paddock2-HD/Report/Variables
          events ReportingFrequency -> /SoilNitrogen_BasicTests/WithSoilN/Sim22-SoilN - Bare+Hum+FOM+SurfOM+N+addOM/Paddock2-HD/Report/ReportingFrequency
    simulation Sim23-SoilNitrogen - Wheat+N+urea -> /SoilNitrogen_BasicTests/WithSoilN/Sim23-SoilN - Wheat+N+urea
      area Paddock1-LD -> /SoilNitrogen_BasicTests/WithSoilN/Sim23-SoilN - Wheat+N+urea/Paddock1-LD
        outputfile Report -> /SoilNitrogen_BasicTests/WithSoilN/Sim23-SoilN - Wheat+N+urea/Paddock1-LD/Report: filename=Sim23-SoilNitrogen - Wheat+N+urea Paddock1-LD Report.out; title=Sim23-SoilNitrogen - Wheat+N+urea Paddock1-LD Report
          variables -> /SoilNitrogen_BasicTests/WithSoilN/Sim23-SoilN - Wheat+N+urea/Paddock1-LD/Report/Variables
          events ReportingFrequency -> /SoilNitrogen_BasicTests/WithSoilN/Sim23-SoilN - Wheat+N+urea/Paddock1-LD/Report/ReportingFrequency
      area Paddock2-HD -> /SoilNitrogen_BasicTests/WithSoilN/Sim23-SoilN - Wheat+N+urea/Paddock2-HD
        outputfile Report -> /SoilNitrogen_BasicTests/WithSoilN/Sim23-SoilN - Wheat+N+urea/Paddock2-HD/Report: filename=Sim23-SoilNitrogen - Wheat+N+urea Paddock2-HD Report.out; title=Sim23-SoilNitrogen - Wheat+N+urea Paddock2-HD Report
          variables -> /SoilNitrogen_BasicTests/WithSoilN/Sim23-SoilN - Wheat+N+urea/Paddock2-HD/Report/Variables
          events ReportingFrequency -> /SoilNitrogen_BasicTests/WithSoilN/Sim23-SoilN - Wheat+N+urea/Paddock2-HD/Report/ReportingFrequency
    simulation Sim24-SoilNitrogen - Wheat+Hum+N+urea -> /SoilNitrogen_BasicTests/WithSoilN/Sim24-SoilN - Wheat+Hum+N+urea
      area Paddock1-LD -> /SoilNitrogen_BasicTests/WithSoilN/Sim24-SoilN - Wheat+Hum+N+urea/Paddock1-LD
        outputfile Report -> /SoilNitrogen_BasicTests/WithSoilN/Sim24-SoilN - Wheat+Hum+N+urea/Paddock1-LD/Report: title=Sim24-SoilNitrogen - Wheat+Hum+N+urea Paddock1-LD Report
          filename=Sim24-SoilNitrogen - Wheat+Hum+N+urea Paddock1-LD Report.out
          variables -> /SoilNitrogen_BasicTests/WithSoilN/Sim24-SoilN - Wheat+Hum+N+urea/Paddock1-LD/Report/Variables
          events ReportingFrequency -> /SoilNitrogen_BasicTests/WithSoilN/Sim24-SoilN - Wheat+Hum+N+urea/Paddock1-LD/Report/ReportingFrequency
      area Paddock2-HD -> /SoilNitrogen_BasicTests/WithSoilN/Sim24-SoilN - Wheat+Hum+N+urea/Paddock2-HD
        outputfile Report -> /SoilNitrogen_BasicTests/WithSoilN/Sim24-SoilN - Wheat+Hum+N+urea/Paddock2-HD/Report: title=Sim24-SoilNitrogen - Wheat+Hum+N+urea Paddock2-HD Report
          filename=Sim24-SoilNitrogen - Wheat+Hum+N+urea Paddock2-HD Report.out
          variables -> /SoilNitrogen_BasicTests/WithSoilN/Sim24-SoilN - Wheat+Hum+N+urea/Paddock2-HD/Report/Variables
          events ReportingFrequency -> /SoilNitrogen_BasicTests/WithSoilN/Sim24-SoilN - Wheat+Hum+N+urea/Paddock2-HD/Report/ReportingFrequency
    simulation Sim25-SoilNitrogen - Wheat+Hum+FOM+SurfOM+N+urea -> /SoilNitrogen_BasicTests/WithSoilN/Sim25-SoilN - Wheat+Hum+FOM+SurfOM+N+urea
      area Paddock1-LD -> /SoilNitrogen_BasicTests/WithSoilN/Sim25-SoilN - Wheat+Hum+FOM+SurfOM+N+urea/Paddock1-LD
        outputfile Report -> /SoilNitrogen_BasicTests/WithSoilN/Sim25-SoilN - Wheat+Hum+FOM+SurfOM+N+urea/Paddock1-LD/Report
          filename=Sim25-SoilNitrogen - Wheat+Hum+FOM+SurfOM+N+urea Paddock1-LD Report.out
          title=Sim25-SoilNitrogen - Wheat+Hum+FOM+SurfOM+N+urea Paddock1-LD Report
          variables -> /SoilNitrogen_BasicTests/WithSoilN/Sim25-SoilN - Wheat+Hum+FOM+SurfOM+N+urea/Paddock1-LD/Report/Variables
          events ReportingFrequency -> /SoilNitrogen_BasicTests/WithSoilN/Sim25-SoilN - Wheat+Hum+FOM+SurfOM+N+urea/Paddock1-LD/Report/ReportingFrequency
      area Paddock2-HD -> /SoilNitrogen_BasicTests/WithSoilN/Sim25-SoilN - Wheat+Hum+FOM+SurfOM+N+urea/Paddock2-HD
        surfaceom Surface Organic Matter
          PoolName = Residue1  # Organic Matter pool name
          type = grass  # Organic Matter type
          mass = 0  # Initial surface residue (kg/ha)
          cnr = 15  # C:N ratio of initial residue
          standing_fraction = 0  # Fraction of residue standing
        outputfile Report -> /SoilNitrogen_BasicTests/WithSoilN/Sim25-SoilN - Wheat+Hum+FOM+SurfOM+N+urea/Paddock2-HD/Report
          filename=Sim25-SoilNitrogen - Wheat+Hum+FOM+SurfOM+N+urea Paddock2-HD Report.out
          title=Sim25-SoilNitrogen - Wheat+Hum+FOM+SurfOM+N+urea Paddock2-HD Report
          variables -> /SoilNitrogen_BasicTests/WithSoilN/Sim25-SoilN - Wheat+Hum+FOM+SurfOM+N+urea/Paddock2-HD/Report/Variables
          events ReportingFrequency -> /SoilNitrogen_BasicTests/WithSoilN/Sim25-SoilN - Wheat+Hum+FOM+SurfOM+N+urea/Paddock2-HD/Report/ReportingFrequency
  folder Comparisons
    folder Bare+MinN
      simulation Sim01-Comp - SoilN Bare+MinN
        clock
          start_date = 01/01/2000
          end_date = 30/04/2000
        metfile met: filename=%apsim%\Tests\SoilNitrogen\BasicTests\optimum.met
        memo Info
          ++++++++++++++++++  TEST 08 ++++++++++++++++++

             Description:
                - Stable climate;
                - two soils, a free draining and a clayey;
                - Bare soil;
                - Initial mineral N = 60kg as NO3 + 60kg as NH4;
                - No initial organic matter;
                - No initial surface residues;
                - No additions of residues;
                - Apply 100kg urea_N;

          +++++++++++++++++++++++++++++++++++++++++++++
        PlugIns: same as WithSoilN.PlugIns
        summaryfile
        area Paddock1-LD
          operations Operations Schedule
            25-Jan  Fertiliser apply amount=50 (kg/ha), depth=100 (mm), type=urea_n
            25-Jan  Fertiliser apply amount=50 (kg/ha), depth=200 (mm), type=urea_n
          fertiliser
          surfaceom Surface Organic Matter
            PoolName = Residue1  # Organic Matter pool name
            type = grass  # Organic Matter type
            mass = 0  # Initial surface residue (kg/ha)
            cnr = 15  # C:N ratio of initial residue
            standing_fraction = 0  # Fraction of residue standing
          Soil LowDrainageSoil: same as WithSoilN.Sim08-SoilN - Bare+NO3+NH4.Paddock1-LD.LowDrainageSoil
          outputfile Report: filename=Sim01-Comp - SoilN Bare+MinN Paddock1-LD Report.out; title=Sim01-Comp - SoilN Bare+MinN Paddock1-LD Report
            variables: same as WithSoilN.Sim01-SoilN - BareBare.Paddock1-LD.Report.Variables
            events ReportingFrequency: event=end_day
        area Paddock2-HD -> /SoilNitrogen_BasicTests/Comparisons/Bare+MinN/Sim01-Comp - SoilN Bare+MinN/Paddock1-LD
          Soil HighDrainageSoil: same as WithSoilN.Sim08-SoilN - Bare+NO3+NH4.Paddock2-HD.HighDrainageSoil
          outputfile Report -> /SoilNitrogen_BasicTests/Comparisons/Bare+MinN/Sim01-Comp - SoilN Bare+MinN/Paddock1-LD/Report: filename=Sim01-Comp - SoilN Bare+MinN Paddock2-HD Report.out; title=Sim01-Comp - SoilN Bare+MinN Paddock2-HD Report
            variables -> /SoilNitrogen_BasicTests/Comparisons/Bare+MinN/Sim01-Comp - SoilN Bare+MinN/Paddock1-LD/Report/Variables
            events ReportingFrequency -> /SoilNitrogen_BasicTests/Comparisons/Bare+MinN/Sim01-Comp - SoilN Bare+MinN/Paddock1-LD/Report/ReportingFrequency
      simulation Sim01-Comp - SoilNitrogen Bare+MinN -> /SoilNitrogen_BasicTests/Comparisons/Bare+MinN/Sim01-Comp - SoilN Bare+MinN
        PlugIns: same as WithSoilN.PlugIns
        area Paddock1-LD -> /SoilNitrogen_BasicTests/Comparisons/Bare+MinN/Sim01-Comp - SoilN Bare+MinN/Paddock1-LD
          outputfile Report -> /SoilNitrogen_BasicTests/Comparisons/Bare+MinN/Sim01-Comp - SoilN Bare+MinN/Paddock1-LD/Report: filename=Sim01-Comp - SoilNitrogen Bare+MinN Paddock1-LD Report.out; title=Sim01-Comp - SoilNitrogen Bare+MinN Paddock1-LD Report
            variables -> /SoilNitrogen_BasicTests/Comparisons/Bare+MinN/Sim01-Comp - SoilN Bare+MinN/Paddock1-LD/Report/Variables
            events ReportingFrequency -> /SoilNitrogen_BasicTests/Comparisons/Bare+MinN/Sim01-Comp - SoilN Bare+MinN/Paddock1-LD/Report/ReportingFrequency
        area Paddock2-HD -> /SoilNitrogen_BasicTests/Comparisons/Bare+MinN/Sim01-Comp - SoilN Bare+MinN/Paddock2-HD
          outputfile Report -> /SoilNitrogen_BasicTests/Comparisons/Bare+MinN/Sim01-Comp - SoilN Bare+MinN/Paddock2-HD/Report: filename=Sim01-Comp - SoilNitrogen Bare+MinN Paddock2-HD Report.out; title=Sim01-Comp - SoilNitrogen Bare+MinN Paddock2-HD Report
            variables -> /SoilNitrogen_BasicTests/Comparisons/Bare+MinN/Sim01-Comp - SoilN Bare+MinN/Paddock2-HD/Report/Variables
            events ReportingFrequency -> /SoilNitrogen_BasicTests/Comparisons/Bare+MinN/Sim01-Comp - SoilN Bare+MinN/Paddock2-HD/Report/ReportingFrequency
    folder Bare+SOM+MinN -> /SoilNitrogen_BasicTests/Comparisons/Bare+MinN
      simulation Sim02-Comp - SoilN Bare+SOM+MinN -> /SoilNitrogen_BasicTests/Comparisons/Bare+MinN/Sim01-Comp - SoilN Bare+MinN
        area Paddock1-LD -> /SoilNitrogen_BasicTests/Comparisons/Bare+MinN/Sim01-Comp - SoilN Bare+MinN/Paddock1-LD
          Soil LowDrainageSoil
            Water: same as WithSoilN.Sim01-SoilN - BareBare.Paddock1-LD.LowDrainageSoil.Water
            SoilWater: same as WithSoilN.Sim01-SoilN - BareBare.Paddock1-LD.LowDrainageSoil.SoilWater
            SoilOrganicMatter: same as WithSoilN.Sim13-SoilN - Bare+Hum+FOM.Paddock1-LD.LowDrainageSoil.SoilOrganicMatter
            Analysis: same as WithSoilN.Sim01-SoilN - BareBare.Paddock1-LD.LowDrainageSoil.Analysis
            Sample Initial nitrogen: NO3Units=kgha; NH4Units=kgha
              Thickness  NO3  NH4
              150        10   10
              150        10   10
              300        10   10
              300        10   10
              300        10   10
              300        10   10
            Sample Initial water: Thickness=[150, 150, 300, 300, 300, 300]; SW=[0.35, 0.415, 0.445, 0.445, 0.435, 0.42]
          outputfile Report -> /SoilNitrogen_BasicTests/Comparisons/Bare+MinN/Sim01-Comp - SoilN Bare+MinN/Paddock1-LD/Report: filename=Sim02-Comp - SoilN Bare+SOM+MinN Paddock1-LD Report.out; title=Sim02-Comp - SoilN Bare+SOM+MinN Paddock1-LD Report
            variables -> /SoilNitrogen_BasicTests/Comparisons/Bare+MinN/Sim01-Comp - SoilN Bare+MinN/Paddock1-LD/Report/Variables
            events ReportingFrequency -> /SoilNitrogen_BasicTests/Comparisons/Bare+MinN/Sim01-Comp - SoilN Bare+MinN/Paddock1-LD/Report/ReportingFrequency
        area Paddock2-HD -> /SoilNitrogen_BasicTests/Comparisons/Bare+MinN/Sim01-Comp - SoilN Bare+MinN/Paddock2-HD
          Soil HighDrainageSoil
            Water: same as WithSoilN.Sim01-SoilN - BareBare.Paddock2-HD.HighDrainageSoil.Water
            SoilWater: same as WithSoilN.Sim01-SoilN - BareBare.Paddock2-HD.HighDrainageSoil.SoilWater
            SoilOrganicMatter: same as WithSoilN.Sim13-SoilN - Bare+Hum+FOM.Paddock2-HD.HighDrainageSoil.SoilOrganicMatter
            Analysis: same as WithSoilN.Sim01-SoilN - BareBare.Paddock2-HD.HighDrainageSoil.Analysis
            Sample Initial nitrogen: NO3Units=kgha; NH4Units=kgha
              Thickness  NO3  NH4
              150        10   10
              150        10   10
              300        10   10
              300        10   10
              300        10   10
              300        10   10
            Sample Initial water: Thickness=[150, 150, 300, 300, 300, 300]; SW=[0.3, 0.35, 0.37, 0.37, 0.37, 0.35]
          outputfile Report -> /SoilNitrogen_BasicTests/Comparisons/Bare+MinN/Sim01-Comp - SoilN Bare+MinN/Paddock2-HD/Report: filename=Sim02-Comp - SoilN Bare+SOM+MinN Paddock2-HD Report.out; title=Sim02-Comp - SoilN Bare+SOM+MinN Paddock2-HD Report
            variables -> /SoilNitrogen_BasicTests/Comparisons/Bare+MinN/Sim01-Comp - SoilN Bare+MinN/Paddock2-HD/Report/Variables
            events ReportingFrequency -> /SoilNitrogen_BasicTests/Comparisons/Bare+MinN/Sim01-Comp - SoilN Bare+MinN/Paddock2-HD/Report/ReportingFrequency
      simulation Sim02-Comp - SoilNitrogen Bare+SOM+MinN -> /SoilNitrogen_BasicTests/Comparisons/Bare+MinN/Sim01-Comp - SoilNitrogen Bare+MinN
        area Paddock1-LD -> /SoilNitrogen_BasicTests/Comparisons/Bare+MinN/Sim01-Comp - SoilNitrogen Bare+MinN/Paddock1-LD
          Soil LowDrainageSoil: same as Comparisons.Bare+SOM+MinN.Sim02-Comp - SoilN Bare+SOM+MinN.Paddock1-LD.LowDrainageSoil
          outputfile Report -> /SoilNitrogen_BasicTests/Comparisons/Bare+MinN/Sim01-Comp - SoilNitrogen Bare+MinN/Paddock1-LD/Report: title=Sim02-Comp - SoilNitrogen Bare+SOM+MinN Paddock1-LD Report
            filename=Sim02-Comp - SoilNitrogen Bare+SOM+MinN Paddock1-LD Report.out
            variables -> /SoilNitrogen_BasicTests/Comparisons/Bare+MinN/Sim01-Comp - SoilNitrogen Bare+MinN/Paddock1-LD/Report/Variables
            events ReportingFrequency -> /SoilNitrogen_BasicTests/Comparisons/Bare+MinN/Sim01-Comp - SoilNitrogen Bare+MinN/Paddock1-LD/Report/ReportingFrequency
        area Paddock2-HD -> /SoilNitrogen_BasicTests/Comparisons/Bare+MinN/Sim01-Comp - SoilNitrogen Bare+MinN/Paddock2-HD
          Soil HighDrainageSoil: same as Comparisons.Bare+SOM+MinN.Sim02-Comp - SoilN Bare+SOM+MinN.Paddock2-HD.HighDrainageSoil
          outputfile Report -> /SoilNitrogen_BasicTests/Comparisons/Bare+MinN/Sim01-Comp - SoilNitrogen Bare+MinN/Paddock2-HD/Report: title=Sim02-Comp - SoilNitrogen Bare+SOM+MinN Paddock2-HD Report
            filename=Sim02-Comp - SoilNitrogen Bare+SOM+MinN Paddock2-HD Report.out
            variables -> /SoilNitrogen_BasicTests/Comparisons/Bare+MinN/Sim01-Comp - SoilNitrogen Bare+MinN/Paddock2-HD/Report/Variables
            events ReportingFrequency -> /SoilNitrogen_BasicTests/Comparisons/Bare+MinN/Sim01-Comp - SoilNitrogen Bare+MinN/Paddock2-HD/Report/ReportingFrequency
    folder Wheat+SOM+MinN -> /SoilNitrogen_BasicTests/Comparisons/Bare+MinN
      simulation Sim03-Comp - SoilN Wheat+SOM+MinN -> /SoilNitrogen_BasicTests/Comparisons/Bare+MinN/Sim01-Comp - SoilN Bare+MinN
        area Paddock1-LD -> /SoilNitrogen_BasicTests/Comparisons/Bare+MinN/Sim01-Comp - SoilN Bare+MinN/Paddock1-LD
          operations Operations Schedule
            1-Jan  wheat sow cultivar = hartog, plants = 120, sowing_depth = 30 (mm)
            25-Jan  Fertiliser apply amount=50 (kg/ha), depth=100 (mm), type=urea_n
          Soil LowDrainageSoil
            Water
              Thickness  BD    AirDry  LL15  DUL    SAT
              150        1.3   0.175   0.2   0.4    0.5
              150        1.3   0.25    0.25  0.425  0.5
              300        1.3   0.3     0.3   0.45   0.5
              300        1.35  0.3     0.3   0.45   0.49
              300        1.35  0.32    0.32  0.44   0.48
              300        1.4   0.35    0.35  0.42   0.47
              SoilCrop agpasture: LL=[0.2, 0.25, 0.3, 0.3, 0.32, 0.35]; KL=[0.2, 0.15, 0.06, 0.02, 0, 0]; XF=[1, 1, 1, 1, 1, 0]
              SoilCrop wheat: LL=[0.2, 0.25, 0.3, 0.3, 0.32, 0.35]; KL=[0.2, 0.15, 0.06, 0.02, 0, 0]; XF=[1, 1, 1, 1, 1, 0]
            SoilWater: same as WithSoilN.Sim01-SoilN - BareBare.Paddock1-LD.LowDrainageSoil.SoilWater
            SoilOrganicMatter: same as WithSoilN.Sim13-SoilN - Bare+Hum+FOM.Paddock1-LD.LowDrainageSoil.SoilOrganicMatter
            Analysis: same as WithSoilN.Sim01-SoilN - BareBare.Paddock1-LD.LowDrainageSoil.Analysis
            Sample Initial nitrogen: NO3Units=kgha; NH4Units=kgha
              Thickness  NO3  NH4
              150        10   10
              150        10   10
              300        10   10
              300        10   10
              300        10   10
              300        10   10
            Sample Initial water: Thickness=[150, 150, 300, 300, 300, 300]; SW=[0.35, 0.415, 0.445, 0.445, 0.435, 0.42]
          wheat
          outputfile Report -> /SoilNitrogen_BasicTests/Comparisons/Bare+MinN/Sim01-Comp - SoilN Bare+MinN/Paddock1-LD/Report: filename=Sim03-Comp - SoilN Wheat+SOM+MinN Paddock1-LD Report.out; title=Sim03-Comp - SoilN Wheat+SOM+MinN Paddock1-LD Report
            variables -> /SoilNitrogen_BasicTests/Comparisons/Bare+MinN/Sim01-Comp - SoilN Bare+MinN/Paddock1-LD/Report/Variables
            events ReportingFrequency -> /SoilNitrogen_BasicTests/Comparisons/Bare+MinN/Sim01-Comp - SoilN Bare+MinN/Paddock1-LD/Report/ReportingFrequency
        area Paddock2-HD -> /SoilNitrogen_BasicTests/Comparisons/Bare+MinN/Sim01-Comp - SoilN Bare+MinN/Paddock2-HD
          Soil HighDrainageSoil
            Water
              Thickness  BD    AirDry  LL15   DUL    SAT
              150        1.25  0.075   0.1    0.35   0.525
              150        1.3   0.1     0.11   0.36   0.5
              300        1.3   0.125   0.125  0.375  0.5
              300        1.3   0.125   0.125  0.375  0.5
              300        1.35  0.125   0.125  0.375  0.45
              300        1.4   0.125   0.125  0.35   0.45
              SoilCrop agpasture: LL=[0.1, 0.11, 0.125, 0.125, 0.125, 0.125]; KL=[0.2, 0.2, 0.1, 0.05, 0, 0]; XF=[1, 1, 1, 1, 1, 0]
              SoilCrop wheat: LL=[0.1, 0.11, 0.125, 0.125, 0.125, 0.125]; KL=[0.2, 0.2, 0.1, 0.05, 0, 0]; XF=[1, 1, 1, 1, 1, 0]
            SoilWater: same as WithSoilN.Sim01-SoilN - BareBare.Paddock2-HD.HighDrainageSoil.SoilWater
            SoilOrganicMatter: same as WithSoilN.Sim13-SoilN - Bare+Hum+FOM.Paddock2-HD.HighDrainageSoil.SoilOrganicMatter
            Analysis: same as WithSoilN.Sim01-SoilN - BareBare.Paddock2-HD.HighDrainageSoil.Analysis
            Sample Initial nitrogen: NO3Units=kgha; NH4Units=kgha
              Thickness  NO3  NH4
              150        10   10
              150        10   10
              300        10   10
              300        10   10
              300        10   10
              300        10   10
            Sample Initial water: Thickness=[150, 150, 300, 300, 300, 300]; SW=[0.3, 0.35, 0.37, 0.37, 0.37, 0.35]
          outputfile Report -> /SoilNitrogen_BasicTests/Comparisons/Bare+MinN/Sim01-Comp - SoilN Bare+MinN/Paddock2-HD/Report: filename=Sim03-Comp - SoilN Wheat+SOM+MinN Paddock2-HD Report.out; title=Sim03-Comp - SoilN Wheat+SOM+MinN Paddock2-HD Report
            variables -> /SoilNitrogen_BasicTests/Comparisons/Bare+MinN/Sim01-Comp - SoilN Bare+MinN/Paddock2-HD/Report/Variables
            events ReportingFrequency -> /SoilNitrogen_BasicTests/Comparisons/Bare+MinN/Sim01-Comp - SoilN Bare+MinN/Paddock2-HD/Report/ReportingFrequency
      simulation Sim03-Comp - SoilNitrogen Wheat+SOM+MinN -> /SoilNitrogen_BasicTests/Comparisons/Bare+MinN/Sim01-Comp - SoilNitrogen Bare+MinN
        area Paddock1-LD -> /SoilNitrogen_BasicTests/Comparisons/Bare+MinN/Sim01-Comp - SoilNitrogen Bare+MinN/Paddock1-LD
          Soil LowDrainageSoil: same as Comparisons.Wheat+SOM+MinN.Sim03-Comp - SoilN Wheat+SOM+MinN.Paddock1-LD.LowDrainageSoil
          outputfile Report -> /SoilNitrogen_BasicTests/Comparisons/Bare+MinN/Sim01-Comp - SoilNitrogen Bare+MinN/Paddock1-LD/Report: title=Sim03-Comp - SoilNitrogen Wheat+SOM+MinN Paddock1-LD Report
            filename=Sim03-Comp - SoilNitrogen Wheat+SOM+MinN Paddock1-LD Report.out
            variables -> /SoilNitrogen_BasicTests/Comparisons/Bare+MinN/Sim01-Comp - SoilNitrogen Bare+MinN/Paddock1-LD/Report/Variables
            events ReportingFrequency -> /SoilNitrogen_BasicTests/Comparisons/Bare+MinN/Sim01-Comp - SoilNitrogen Bare+MinN/Paddock1-LD/Report/ReportingFrequency
        area Paddock2-HD -> /SoilNitrogen_BasicTests/Comparisons/Bare+MinN/Sim01-Comp - SoilNitrogen Bare+MinN/Paddock2-HD
          Soil HighDrainageSoil: same as Comparisons.Wheat+SOM+MinN.Sim03-Comp - SoilN Wheat+SOM+MinN.Paddock2-HD.HighDrainageSoil
          outputfile Report -> /SoilNitrogen_BasicTests/Comparisons/Bare+MinN/Sim01-Comp - SoilNitrogen Bare+MinN/Paddock2-HD/Report: title=Sim03-Comp - SoilNitrogen Wheat+SOM+MinN Paddock2-HD Report
            filename=Sim03-Comp - SoilNitrogen Wheat+SOM+MinN Paddock2-HD Report.out
            variables -> /SoilNitrogen_BasicTests/Comparisons/Bare+MinN/Sim01-Comp - SoilNitrogen Bare+MinN/Paddock2-HD/Report/Variables
            events ReportingFrequency -> /SoilNitrogen_BasicTests/Comparisons/Bare+MinN/Sim01-Comp - SoilNitrogen Bare+MinN/Paddock2-HD/Report/ReportingFrequency
    folder
      simulation Sim26-SoilN - Continuous_Wheat
        clock
          start_date = 01/03/2000
          end_date = 01/03/2001
        metfile met: filename=%apsim%\Examples\MetFiles\lincoln.met
        memo Info
          ++++++++++++++++++  TEST 26 ++++++++++++++++++

             Description:
                - Lincoln, NZ climate;
                - two soils, a free draining and a clayey;
                - Wakanui wheat planted each year on 1st April and harvested when reaches maturity;
                - Initial mineral N = 30kg as NO3 + 30kg as NH4;
                - Initial organic matter = about 125 tonnes hum, 10ton N + 1000kg fom, 13kg N;
                - Initial surface residues = 1000kg, 27kg N;
                - No additions of residues (besides crop senescence);
                - Apply 70kg urea_N on 15th Aug, 1st Sept and 1st Oct each year;
                - Automatic irrigation calculated to 600mm, triggered at 50 % of ASW;
                - Simulation runs for 10 years 2000 to 2010

          +++++++++++++++++++++++++++++++++++++++++++++
        PlugIns
          PlugIn=[%apsim%\UserInterface\ApsimUIPlugIn.xml, %apsim%\UserInterface\SoilTypes.xml, %apsim%\UserInterface\Graph.xml, %apsim%\UserInterface\Ausfarm.xml, %apsim%\UserInterface\DevelopersPlugIn.xml, %apsim%\Model\SlurryTank.xml, %apsim%\Model\WHEATSTRAW.xml, %apsim%\Model\WASHWATER.xml, %apsim%\Model\animalSection.xml, %apsim%\Model\floor.xml, %apsim%\Model\PigHousing.xml, %apsim%\Model\PHmodel.xml, %apsim%\Model\simpleBuilding.xml, %apsim%\Model\atmosphere.xml, %apsim%\Model\Accum.xml, %apsim%\Model\AgPasture.xml, %apsim%\Model\Bambatsi.xml, %apsim%\Model\Barley.xml, %apsim%\Model\Br.xml, %apsim%\Model\Bore.xml, %apsim%\Model\Broccoli.xml, %apsim%\Model\ButterflyPea.xml, %apsim%\Model\Canola.xml, %apsim%\Model\Canopy.xml, %apsim%\Model\Centro.xml, %apsim%\Model\Channel.xml, %apsim%\Model\Chickpea.xml, %apsim%\Model\Cl.xml, %apsim%\Model\Climatechange.xml, %apsim%\Model\Clock.xml, %apsim%\Model\Cotton2.xml, %apsim%\Model\Cowpea.xml, %apsim%\Model\CropUI.xml, %apsim%\Model\Dam.xml, %apsim%\Model\DCD.xml, %apsim%\Model\EGrandis.xml, %apsim%\Model\EMelliodora.xml, %apsim%\Model\Eo.xml, %apsim%\Model\EPopulnea.xml, %apsim%\Model\Erosion.xml, %apsim%\Model\Events.xml, %apsim%\Model\Fababean.xml, %apsim%\Model\Factorial.xml, %apsim%\Model\Factor.xml, %apsim%\Model\FactorComplex.xml, %apsim%\Model\FrenchBean.xml, %apsim%\Model\Fertiliser.xml, %apsim%\Model\Fieldpea.xml, %apsim%\Model\Gcm_data.xml, %apsim%\Model\Grasp.xml, %apsim%\Model\Graz.xml, %apsim%\Model\Growth.xml, %apsim%\Model\Horsegram.xml, %apsim%\Model\Ini.xml, %apsim%\Model\InitWater.xml, %apsim%\Model\Input.xml, %apsim%\Model\Irrigation.xml, %apsim%\Model\KWTest.xml, %apsim%\Model\Lablab.xml, %apsim%\Model\Lettuce.xml, %apsim%\Model\Log.xml, %apsim%\Model\Lucerne.xml, %apsim%\Model\Lupin.xml, %apsim%\Model\Maize.xml, %apsim%\Model\MaizeZ.xml, %apsim%\Model\Manager.xml, %apsim%\Model\Map.xml, %apsim%\Model\Memo.xml, %apsim%\Model\MetFile.xml, %apsim%\Model\MicroMet.xml, %apsim%\Model\Millet.xml, %apsim%\Model\Millet1.xml, %apsim%\Model\Millet2.xml, %apsim%\Model\Millet3.xml, %apsim%\Model\Millet4.xml, %apsim%\Model\Millet5.xml, %apsim%\Model\Mucuna.xml, %apsim%\Model\Mungbean.xml, %apsim%\Model\Navybean.xml, %apsim%\Model\Oats.xml, %apsim%\Model\Ocean_data.xml, %apsim%\Model\Operations.xml, %apsim%\Model\Orobanche.xml, %apsim%\Model\Oryza.xml, %apsim%\Model\Oryza2.xml, %apsim%\Model\OutputFile.xml, %apsim%\Model\Ozcot.xml, %apsim%\Model\Patchinput.xml, %apsim%\Model\Peanut.xml, %apsim%\Model\Pigeonpea.xml, %apsim%\Model\Pond.xml, %apsim%\Model\Potato.xml, %apsim%\Model\RotPlot.xml, %apsim%\Model\RugPlotUI.xml, %apsim%\Model\Root.xml, %apsim%\Model\Rule.xml, %apsim%\Model\Script.xml, %apsim%\Model\Seedling.xml, %apsim%\Model\SiloInput.xml, %apsim%\Model\Slurp.xml, %apsim%\Model\Soi.xml, %apsim%\Model\Soil.xml, %apsim%\Model\SoilNui.xml, %apsim%\Model\SoilTemp.xml, %apsim%\Model\Sorghum.xml, %apsim%\Model\SorghumConstants.xml, %apsim%\Model\SorghumGenotype.xml, %apsim%\Model\Soybean.xml, %apsim%\Model\Stylo.xml, %apsim%\Model\Sugar.xml, %apsim%\Model\Summaryfile.xml, %apsim%\Model\Sunflower.xml, %apsim%\Model\SurfaceOM.xml, %apsim%\Model\SweetCorn.xml, %apsim%\Model\SweetSorghum.xml, %apsim%\Model\SWIM2.xml, %apsim%\Model\SWIM2ui.xml, %apsim%\Model\SWIM2ui2.xml, %apsim%\Model\Sysbal.xml, %apsim%\Model\SysBal2.xml, %apsim%\Model\Tcllink.xml, %apsim%\Model\Tclmanager.xml, %apsim%\Model\Tclui.xml, %apsim%\Model\TextOutput.xml, %apsim%\Model\Tracker.xml, %apsim%\Model\Tree.xml, %apsim%\Model\Variables.xml, %apsim%\Model\Venlink.xml, %apsim%\Model\vine.xml, %apsim%\Model\WaterSupply.xml, %apsim%\Model\Weed.xml, %apsim%\Model\Wheat.xml, %apsim%\Model\YPCalc.xml, %apsim%\Model\Soil with new nitrogen model.xml]
        summaryfile
        area Paddock1-LD
          manager Sow on a fixed date
            # Sowing criteria
            date = 1-Apr  # Enter sowing date (dd-mmm)
            # Sowing parameters
            crop = wheat  # Enter name of crop to sow
            density = 400  # Enter sowing density (plants/m2)
            depth = 30  # Enter sowing depth (mm)
            cultivar = Wakaniu  # Enter cultivar
            class = plant  # Enter crop growth class
            row_spacing = 150  # Enter row spacing (mm)
            on start_of_day:
```
        if (today = date('[date]') then
              [crop] sow plants =[density], sowing_depth = [depth], cultivar = [cultivar], row_spacing = [row_spacing], crop_class = [class]
         endif
```
          manager Harvesting rule
            # Harvesting criteria
            crop = wheat  # Enter name of crop to harvest when ripe
            on end_of_day:
```
           if ('[crop]' = 'cotton') then
              if ([crop].ozcot_status > 0) then
                  [crop] harvest
              endif
           elseif ([crop].StageName = 'harvest_ripe' or [crop].plant_status = 'dead') then
              [crop]  harvest
              [crop]  end_crop
           endif
```
          operations Operations Schedule
            15-Aug  Fertiliser apply amount=70 (kg/ha), depth=100 (mm), type=urea_n
            1-Sept  Fertiliser apply amount=70 (kg/ha), depth=100 (mm), type=urea_n
            1-Oct  Fertiliser apply amount=70 (kg/ha), depth=100 (mm), type=urea_n
          fertiliser
          irrigation
            automatic_irrigation = on
            asw_depth = 600  # Depth to which ASW is calculated. (mm)
            crit_fr_asw = 0.5  # Fraction of ASW below which irrigation is applied (0-1.0)
            irrigation_efficiency = 1  # Efficiency of the irrigation. (0-1.0)
            irrigation_allocation = off  # Allocation limits
            allocation = 0  # Allocation in mm
            default_no3_conc = 0.0  # Nitrate concentration (ppm N)
            default_nh4_conc = 0.0  # Ammonium concentration (ppm N)
            default_cl_conc = 0.0  # Chloride concentration (ppm Cl)
          surfaceom Surface Organic Matter
            PoolName = Residue1  # Organic Matter pool name
            type = grass  # Organic Matter type
            mass = 1000  # Initial surface residue (kg/ha)
            cnr = 15  # C:N ratio of initial residue
            standing_fraction = 0  # Fraction of residue standing
          Soil LowDrainageSoil: Latitude=0; Longitude=0
            Water: same as WithSoilN.Sim23-SoilN - Wheat+N+urea.Paddock1-LD.LowDrainageSoil.Water
            SoilWater: same as WithSoilN.Sim01-SoilN - BareBare.Paddock1-LD.LowDrainageSoil.SoilWater
            SoilOrganicMatter: same as WithSoilN.Sim13-SoilN - Bare+Hum+FOM.Paddock1-LD.LowDrainageSoil.SoilOrganicMatter
            Analysis: same as WithSoilN.Sim01-SoilN - BareBare.Paddock1-LD.LowDrainageSoil.Analysis
            Sample Initial nitrogen: NO3Units=kgha; NH4Units=kgha
              Thickness  NO3  NH4
              150        5    5
              150        5    5
              300        5    5
              300        5    5
              300        5    5
              300        5    5
            Sample Initial water: Thickness=[150, 150, 300, 300, 300, 300]; SW=[0.35, 0.415, 0.445, 0.445, 0.435, 0.42]
            SoilTemperature2: MaxTTimeDefault=14; BoundaryLayerConductanceSource=calc; BoundaryLayerConductance=20; BoundaryLayerConductanceIterations=1; NetRadiationSource=calc; DefaultWindSpeed=3; DefaultAltitude=18; DefaultInstrumentHeight=1.2; BareSoilHeight=57
          wheat
          outputfile Report: filename=Sim26-SoilN - Continuous_Wheat Paddock1-LD Report.out; title=Sim26-SoilN - Continuous_Wheat Paddock1-LD Report
            variables
              variable:
                dd/mmm/yyyy as Date
                day as DoY
                urea() as UreaTotal format 3
                nh4() as NH4Total format 3
                no3() as NO3Total format 3
                surfaceom_n as SurfaceOM_N format 2
                fom_n() as FOM_N format 2
                biom_n() as Biom_N format 2
                hum_n() as Hum_N format 1
                totaln as PlantN format 3
                fertiliser as FertiliserN format 1
                dlt_urea_hydrol() as HydrolisedN format 3
                nitrification() as NitrifiedN format 3
                dnit() as DenitrifiedN format 3
                leach_no3 as LeachedNO3 format 3
                dlt_n_min_res() as NetMineralisedResidue format 3
                dlt_n_min_tot() as NetMineralisedHumus format 3
                n2o_atm() as N2Oemissions format 3
                surfaceom_c as SurfaceOM_C format 2
                fom_c() as FOM_C format 2
                biom_c() as Biom_C format 2
                hum_c() as Hum_C format 1
                oc() as OCTotal  format 2
                es as Evaporation format 2
                ep as Transpiration format 2
                drain as Drain format 2
                dlayer format 1
                no3 format 2
                nh4 format 2
                fom_n format 3
                biom_n format 3
                hum_n format 2
                fom_c format 3
                biom_c format 3
                hum_c format 2
                st as SoilTemperature format 2
            events ReportingFrequency: event=end_day
        area Paddock1-HD -> /SoilNitrogen_BasicTests/Comparisons/folder/Sim26-SoilN - Continuous_Wheat/Paddock1-LD
          Soil HighDrainageSoil: Latitude=0; Longitude=0
            Water: same as WithSoilN.Sim23-SoilN - Wheat+N+urea.Paddock2-HD.HighDrainageSoil.Water
            SoilWater: same as WithSoilN.Sim01-SoilN - BareBare.Paddock2-HD.HighDrainageSoil.SoilWater
            SoilOrganicMatter: same as WithSoilN.Sim13-SoilN - Bare+Hum+FOM.Paddock1-LD.LowDrainageSoil.SoilOrganicMatter
            Analysis: same as WithSoilN.Sim01-SoilN - BareBare.Paddock2-HD.HighDrainageSoil.Analysis
            Sample Initial nitrogen: NO3Units=kgha; NH4Units=kgha
              Thickness  NO3  NH4
              150        5    5
              150        5    5
              300        5    5
              300        5    5
              300        5    5
              300        5    5
            Sample Initial water: Thickness=[150, 150, 300, 300, 300, 300]; SW=[0.3, 0.35, 0.37, 0.37, 0.37, 0.35]
            SoilTemperature2: MaxTTimeDefault=14; BoundaryLayerConductanceSource=calc; BoundaryLayerConductance=20; BoundaryLayerConductanceIterations=1; NetRadiationSource=calc; DefaultWindSpeed=3; DefaultAltitude=18; DefaultInstrumentHeight=1.2; BareSoilHeight=57
          outputfile Report -> /SoilNitrogen_BasicTests/Comparisons/folder/Sim26-SoilN - Continuous_Wheat/Paddock1-LD/Report: filename=Sim26-SoilN - Continuous_Wheat Paddock1-HD Report.out; title=Sim26-SoilN - Continuous_Wheat Paddock1-HD Report
            variables -> /SoilNitrogen_BasicTests/Comparisons/folder/Sim26-SoilN - Continuous_Wheat/Paddock1-LD/Report/Variables
            events ReportingFrequency -> /SoilNitrogen_BasicTests/Comparisons/folder/Sim26-SoilN - Continuous_Wheat/Paddock1-LD/Report/ReportingFrequency
      simulation Sim26-SoilNitrogen - Continuous_Wheat -> /SoilNitrogen_BasicTests/Comparisons/folder/Sim26-SoilN - Continuous_Wheat
        PlugIns: same as Comparisons.folder.Sim26-SoilN - Continuous_Wheat.PlugIns
        area Paddock1-LD -> /SoilNitrogen_BasicTests/Comparisons/folder/Sim26-SoilN - Continuous_Wheat/Paddock1-LD
          outputfile Report -> /SoilNitrogen_BasicTests/Comparisons/folder/Sim26-SoilN - Continuous_Wheat/Paddock1-LD/Report: title=Sim26-SoilNitrogen - Continuous_Wheat Paddock1-LD Report
            filename=Sim26-SoilNitrogen - Continuous_Wheat Paddock1-LD Report.out
            variables -> /SoilNitrogen_BasicTests/Comparisons/folder/Sim26-SoilN - Continuous_Wheat/Paddock1-LD/Report/Variables
            events ReportingFrequency -> /SoilNitrogen_BasicTests/Comparisons/folder/Sim26-SoilN - Continuous_Wheat/Paddock1-LD/Report/ReportingFrequency
        area Paddock1-HD -> /SoilNitrogen_BasicTests/Comparisons/folder/Sim26-SoilN - Continuous_Wheat/Paddock1-HD
          outputfile Report -> /SoilNitrogen_BasicTests/Comparisons/folder/Sim26-SoilN - Continuous_Wheat/Paddock1-HD/Report: title=Sim26-SoilNitrogen - Continuous_Wheat Paddock1-HD Report
            filename=Sim26-SoilNitrogen - Continuous_Wheat Paddock1-HD Report.out
            variables -> /SoilNitrogen_BasicTests/Comparisons/folder/Sim26-SoilN - Continuous_Wheat/Paddock1-HD/Report/Variables
            events ReportingFrequency -> /SoilNitrogen_BasicTests/Comparisons/folder/Sim26-SoilN - Continuous_Wheat/Paddock1-HD/Report/ReportingFrequency
    folder Wheat+SOM+MinN+Irrig
      simulation Sim04-Comp - SoilN Wheat+SOM+MinN+Irrig
        clock
          start_date = 01/01/2000
          end_date = 30/04/2000
        metfile met: filename=%apsim%\Tests\SoilNitrogen\BasicTests\optimum.met
        memo Info: same as Comparisons.Bare+MinN.Sim01-Comp - SoilN Bare+MinN.Info
        PlugIns: same as WithSoilN.PlugIns
        summaryfile
        area Paddock1-LD
          operations Operations Schedule
            2-Jan  wheat sow cultivar = Wakaniu, plants = 400, sowing_depth = 30 (mm), row_spacing = 150, crop_class = plant
            25-Jan  Fertiliser apply amount=70 (kg/ha), depth=100 (mm), type=urea_n
            25-Feb  Fertiliser apply amount=70 (kg/ha), depth=100 (mm), type=urea_n
          fertiliser
          irrigation: same as Comparisons.folder.Sim26-SoilN - Continuous_Wheat.Paddock1-LD.Irrigation
          surfaceom Surface Organic Matter
            PoolName = Residue1  # Organic Matter pool name
            type = grass  # Organic Matter type
            mass = 0  # Initial surface residue (kg/ha)
            cnr = 15  # C:N ratio of initial residue
            standing_fraction = 0  # Fraction of residue standing
          Soil LowDrainageSoil: same as Comparisons.Wheat+SOM+MinN.Sim03-Comp - SoilN Wheat+SOM+MinN.Paddock1-LD.LowDrainageSoil
          wheat
          outputfile Report: title=Sim04-Comp - SoilN Wheat+SOM+MinN+Irrig Paddock1-LD Report
            filename=Sim04-Comp - SoilN Wheat+SOM+MinN+Irrig Paddock1-LD Report.out
            variables: same as WithSoilN.Sim01-SoilN - BareBare.Paddock1-LD.Report.Variables
            events ReportingFrequency: event=end_day
        area Paddock1-HD -> /SoilNitrogen_BasicTests/Comparisons/Wheat+SOM+MinN+Irrig/Sim04-Comp - SoilN Wheat+SOM+MinN+Irrig/Paddock1-LD
          Soil HighDrainageSoil
            Water: same as WithSoilN.Sim23-SoilN - Wheat+N+urea.Paddock2-HD.HighDrainageSoil.Water
            SoilWater: same as WithSoilN.Sim01-SoilN - BareBare.Paddock2-HD.HighDrainageSoil.SoilWater
            SoilOrganicMatter: same as WithSoilN.Sim13-SoilN - Bare+Hum+FOM.Paddock1-LD.LowDrainageSoil.SoilOrganicMatter
            Analysis: same as WithSoilN.Sim01-SoilN - BareBare.Paddock2-HD.HighDrainageSoil.Analysis
            Sample Initial nitrogen: NO3Units=kgha; NH4Units=kgha
              Thickness  NO3  NH4
              150        5    5
              150        5    5
              300        5    5
              300        5    5
              300        5    5
              300        5    5
            Sample Initial water: Thickness=[150, 150, 300, 300, 300, 300]; SW=[0.3, 0.35, 0.37, 0.37, 0.37, 0.35]
          outputfile Report -> /SoilNitrogen_BasicTests/Comparisons/Wheat+SOM+MinN+Irrig/Sim04-Comp - SoilN Wheat+SOM+MinN+Irrig/Paddock1-LD/Report: title=Sim04-Comp - SoilN Wheat+SOM+MinN+Irrig Paddock1-HD Report
            filename=Sim04-Comp - SoilN Wheat+SOM+MinN+Irrig Paddock1-HD Report.out
            variables -> /SoilNitrogen_BasicTests/Comparisons/Wheat+SOM+MinN+Irrig/Sim04-Comp - SoilN Wheat+SOM+MinN+Irrig/Paddock1-LD/Report/Variables
            events ReportingFrequency -> /SoilNitrogen_BasicTests/Comparisons/Wheat+SOM+MinN+Irrig/Sim04-Comp - SoilN Wheat+SOM+MinN+Irrig/Paddock1-LD/Report/ReportingFrequency
      simulation Sim04-Comp - SoilNitrogen Wheat+SOM+MinN+Irrig -> /SoilNitrogen_BasicTests/Comparisons/Wheat+SOM+MinN+Irrig/Sim04-Comp - SoilN Wheat+SOM+MinN+Irrig
        PlugIns: same as WithSoilN.PlugIns
        area Paddock1-LD -> /SoilNitrogen_BasicTests/Comparisons/Wheat+SOM+MinN+Irrig/Sim04-Comp - SoilN Wheat+SOM+MinN+Irrig/Paddock1-LD
          outputfile Report -> /SoilNitrogen_BasicTests/Comparisons/Wheat+SOM+MinN+Irrig/Sim04-Comp - SoilN Wheat+SOM+MinN+Irrig/Paddock1-LD/Report
            filename=Sim04-Comp - SoilNitrogen Wheat+SOM+MinN+Irrig Paddock1-LD Report.out
            title=Sim04-Comp - SoilNitrogen Wheat+SOM+MinN+Irrig Paddock1-LD Report
            variables -> /SoilNitrogen_BasicTests/Comparisons/Wheat+SOM+MinN+Irrig/Sim04-Comp - SoilN Wheat+SOM+MinN+Irrig/Paddock1-LD/Report/Variables
            events ReportingFrequency -> /SoilNitrogen_BasicTests/Comparisons/Wheat+SOM+MinN+Irrig/Sim04-Comp - SoilN Wheat+SOM+MinN+Irrig/Paddock1-LD/Report/ReportingFrequency
        area Paddock1-HD -> /SoilNitrogen_BasicTests/Comparisons/Wheat+SOM+MinN+Irrig/Sim04-Comp - SoilN Wheat+SOM+MinN+Irrig/Paddock1-HD
          outputfile Report -> /SoilNitrogen_BasicTests/Comparisons/Wheat+SOM+MinN+Irrig/Sim04-Comp - SoilN Wheat+SOM+MinN+Irrig/Paddock1-HD/Report
            filename=Sim04-Comp - SoilNitrogen Wheat+SOM+MinN+Irrig Paddock1-HD Report.out
            title=Sim04-Comp - SoilNitrogen Wheat+SOM+MinN+Irrig Paddock1-HD Report
            variables -> /SoilNitrogen_BasicTests/Comparisons/Wheat+SOM+MinN+Irrig/Sim04-Comp - SoilN Wheat+SOM+MinN+Irrig/Paddock1-HD/Report/Variables
            events ReportingFrequency -> /SoilNitrogen_BasicTests/Comparisons/Wheat+SOM+MinN+Irrig/Sim04-Comp - SoilN Wheat+SOM+MinN+Irrig/Paddock1-HD/Report/ReportingFrequency
    folder Wheat+SOM+MinN+Irrig1
      simulation Sim05-Comp - SoilN Wheat+SOM+MinN+Irrig
        clock
          start_date = 01/01/2000
          end_date = 30/04/2000
        metfile met: filename=%apsim%\Examples\MetFiles\lincoln.met
        memo Info: same as Comparisons.Bare+MinN.Sim01-Comp - SoilN Bare+MinN.Info
        PlugIns: same as WithSoilN.PlugIns
        summaryfile
        area Paddock1-LD
          operations Operations Schedule: same as Comparisons.Wheat+SOM+MinN+Irrig.Sim04-Comp - SoilN Wheat+SOM+MinN+Irrig.Paddock1-LD.Operations Schedule
          fertiliser
          irrigation: same as Comparisons.folder.Sim26-SoilN - Continuous_Wheat.Paddock1-LD.Irrigation
          surfaceom Surface Organic Matter
            PoolName = Residue1  # Organic Matter pool name
            type = grass  # Organic Matter type
            mass = 0  # Initial surface residue (kg/ha)
            cnr = 15  # C:N ratio of initial residue
            standing_fraction = 0  # Fraction of residue standing
          Soil LowDrainageSoil: same as Comparisons.Wheat+SOM+MinN.Sim03-Comp - SoilN Wheat+SOM+MinN.Paddock1-LD.LowDrainageSoil
          wheat
          outputfile Report: title=Sim05-Comp - SoilN Wheat+SOM+MinN+Irrig Paddock1-LD Report
            filename=Sim05-Comp - SoilN Wheat+SOM+MinN+Irrig Paddock1-LD Report.out
            variables: same as WithSoilN.Sim01-SoilN - BareBare.Paddock1-LD.Report.Variables
            events ReportingFrequency: event=end_day
        area Paddock1-HD -> /SoilNitrogen_BasicTests/Comparisons/Wheat+SOM+MinN+Irrig1/Sim05-Comp - SoilN Wheat+SOM+MinN+Irrig/Paddock1-LD
          Soil HighDrainageSoil: same as Comparisons.Wheat+SOM+MinN+Irrig.Sim04-Comp - SoilN Wheat+SOM+MinN+Irrig.Paddock1-HD.HighDrainageSoil
          outputfile Report -> /SoilNitrogen_BasicTests/Comparisons/Wheat+SOM+MinN+Irrig1/Sim05-Comp - SoilN Wheat+SOM+MinN+Irrig/Paddock1-LD/Report: title=Sim05-Comp - SoilN Wheat+SOM+MinN+Irrig Paddock1-HD Report
            filename=Sim05-Comp - SoilN Wheat+SOM+MinN+Irrig Paddock1-HD Report.out
            variables -> /SoilNitrogen_BasicTests/Comparisons/Wheat+SOM+MinN+Irrig1/Sim05-Comp - SoilN Wheat+SOM+MinN+Irrig/Paddock1-LD/Report/Variables
            events ReportingFrequency -> /SoilNitrogen_BasicTests/Comparisons/Wheat+SOM+MinN+Irrig1/Sim05-Comp - SoilN Wheat+SOM+MinN+Irrig/Paddock1-LD/Report/ReportingFrequency
      simulation Sim05-Comp - SoilNitrogen Wheat+SOM+MinN+Irrig -> /SoilNitrogen_BasicTests/Comparisons/Wheat+SOM+MinN+Irrig1/Sim05-Comp - SoilN Wheat+SOM+MinN+Irrig
        PlugIns: same as WithSoilN.PlugIns
        area Paddock1-LD -> /SoilNitrogen_BasicTests/Comparisons/Wheat+SOM+MinN+Irrig1/Sim05-Comp - SoilN Wheat+SOM+MinN+Irrig/Paddock1-LD
          outputfile Report -> /SoilNitrogen_BasicTests/Comparisons/Wheat+SOM+MinN+Irrig1/Sim05-Comp - SoilN Wheat+SOM+MinN+Irrig/Paddock1-LD/Report
            filename=Sim05-Comp - SoilNitrogen Wheat+SOM+MinN+Irrig Paddock1-LD Report.out
            title=Sim05-Comp - SoilNitrogen Wheat+SOM+MinN+Irrig Paddock1-LD Report
            variables -> /SoilNitrogen_BasicTests/Comparisons/Wheat+SOM+MinN+Irrig1/Sim05-Comp - SoilN Wheat+SOM+MinN+Irrig/Paddock1-LD/Report/Variables
            events ReportingFrequency -> /SoilNitrogen_BasicTests/Comparisons/Wheat+SOM+MinN+Irrig1/Sim05-Comp - SoilN Wheat+SOM+MinN+Irrig/Paddock1-LD/Report/ReportingFrequency
        area Paddock1-HD -> /SoilNitrogen_BasicTests/Comparisons/Wheat+SOM+MinN+Irrig1/Sim05-Comp - SoilN Wheat+SOM+MinN+Irrig/Paddock1-HD
          outputfile Report -> /SoilNitrogen_BasicTests/Comparisons/Wheat+SOM+MinN+Irrig1/Sim05-Comp - SoilN Wheat+SOM+MinN+Irrig/Paddock1-HD/Report
            filename=Sim05-Comp - SoilNitrogen Wheat+SOM+MinN+Irrig Paddock1-HD Report.out
            title=Sim05-Comp - SoilNitrogen Wheat+SOM+MinN+Irrig Paddock1-HD Report
            variables -> /SoilNitrogen_BasicTests/Comparisons/Wheat+SOM+MinN+Irrig1/Sim05-Comp - SoilN Wheat+SOM+MinN+Irrig/Paddock1-HD/Report/Variables
            events ReportingFrequency -> /SoilNitrogen_BasicTests/Comparisons/Wheat+SOM+MinN+Irrig1/Sim05-Comp - SoilN Wheat+SOM+MinN+Irrig/Paddock1-HD/Report/ReportingFrequency
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