folder Simulations: version=36; creator=Apsim 7.6-r3384
  folder Test1-SWIM2-Bare+TypicSoil
    memo Info
      ++++++++++++++++++++  TEST 37 +++++++++++++++++++++++++++++++++++++++++++++++++++++++++++

         Description:
            - Artificial climate, smooth mild temperate;
            - Two generic soils, a free draining and a poorly drained;
            - Bare soil;
            - Initial mineral N: 30kgN/ha as NO3 + 30kgN/ha as NH4;
            - Initial soil organic matter composed of humus and FOM;
            - Iinitial surface residues of 1000kgDM/ha;
            - No additions of residues or mineral N;

            >> Using SWIM2ui as water module  <<

         Expected output:
            - All outputs with valid values (numeric mostly);
            - This is the complete basic soil run under bare cover conditions;
    simulation SimTest1-SoilN
      clock
        start_date = 01/07/2000
        end_date = 31/12/2000
      metfile met: filename=%apsim%\Examples\MetFiles\MildTemperate.met
      PlugIns
        PlugIn=[%apsim%\UserInterface\ApsimUIPlugIn.xml, %apsim%\UserInterface\SoilTypes.xml, %apsim%\UserInterface\Graph.xml, %apsim%\UserInterface\Ausfarm.xml, %apsim%\UserInterface\DevelopersPlugIn.xml, %apsim%\Model\SlurryTank.xml, %apsim%\Model\PHmodel.xml, %apsim%\Model\simpleBuilding.xml, %apsim%\Model\atmosphere.xml, %apsim%\Model\Accum.xml, %apsim%\Model\AgPasture.xml, %apsim%\Model\Bambatsi.xml, %apsim%\Model\Barley.xml, %apsim%\Model\Br.xml, %apsim%\Model\Bore.xml, %apsim%\Model\Broccoli.xml, %apsim%\Model\ButterflyPea.xml, %apsim%\Model\Canola.xml, %apsim%\Model\Canopy.xml, %apsim%\Model\Centro.xml, %apsim%\Model\Channel.xml, %apsim%\Model\Chickpea.xml, %apsim%\Model\Cl.xml, %apsim%\Model\Climatechange.xml, %apsim%\Model\Clock.xml, %apsim%\Model\Cotton2.xml, %apsim%\Model\Cowpea.xml, %apsim%\Model\CropUI.xml, %apsim%\Model\Dam.xml, %apsim%\Model\DCD.xml, %apsim%\Model\EGrandis.xml, %apsim%\Model\EMelliodora.xml, %apsim%\Model\Eo.xml, %apsim%\Model\EPopulnea.xml, %apsim%\Model\Erosion.xml, %apsim%\Model\Events.xml, %apsim%\Model\Fababean.xml, %apsim%\Model\Factorial.xml, %apsim%\Model\Factor.xml, %apsim%\Model\FactorComplex.xml, %apsim%\Model\FrenchBean.xml, %apsim%\Model\Fertiliser.xml, %apsim%\Model\Fieldpea.xml, %apsim%\Model\Gcm_data.xml, %apsim%\Model\Grasp.xml, %apsim%\Model\Graz.xml, %apsim%\Model\Growth.xml, %apsim%\Model\Horsegram.xml, %apsim%\Model\Ini.xml, %apsim%\Model\InitWater.xml, %apsim%\Model\Input.xml, %apsim%\Model\Irrigation.xml, %apsim%\Model\KWTest.xml, %apsim%\Model\Lablab.xml, %apsim%\Model\Lettuce.xml, %apsim%\Model\Log.xml, %apsim%\Model\Lucerne.xml, %apsim%\Model\Lupin.xml, %apsim%\Model\Maize.xml, %apsim%\Model\MaizeZ.xml, %apsim%\Model\Manager.xml, %apsim%\Model\Map.xml, %apsim%\Model\Memo.xml, %apsim%\Model\MetFile.xml, %apsim%\Model\MicroMet.xml, %apsim%\Model\Millet.xml, %apsim%\Model\Millet1.xml, %apsim%\Model\Millet2.xml, %apsim%\Model\Millet3.xml, %apsim%\Model\Millet4.xml, %apsim%\Model\Millet5.xml, %apsim%\Model\Mucuna.xml, %apsim%\Model\Mungbean.xml, %apsim%\Model\Navybean.xml, %apsim%\Model\Oats.xml, %apsim%\Model\Ocean_data.xml, %apsim%\Model\Operations.xml, %apsim%\Model\Orobanche.xml, %apsim%\Model\Oryza.xml, %apsim%\Model\Oryza2.xml, %apsim%\Model\OutputFile.xml, %apsim%\Model\Ozcot.xml, %apsim%\Model\Patchinput.xml, %apsim%\Model\Peanut.xml, %apsim%\Model\Pigeonpea.xml, %apsim%\Model\Pond.xml, %apsim%\Model\Potato.xml, %apsim%\Model\RotPlot.xml, %apsim%\Model\RugPlotUI.xml, %apsim%\Model\Root.xml, %apsim%\Model\Rule.xml, %apsim%\Model\Script.xml, %apsim%\Model\Seedling.xml, %apsim%\Model\SiloInput.xml, %apsim%\Model\Slurp.xml, %apsim%\Model\Soi.xml, %apsim%\Model\Soil.xml, %apsim%\Model\SoilNui.xml, %apsim%\Model\SoilTemp.xml, %apsim%\Model\Sorghum.xml, %apsim%\Model\SorghumConstants.xml, %apsim%\Model\SorghumGenotype.xml, %apsim%\Model\Soybean.xml, %apsim%\Model\Stylo.xml, %apsim%\Model\Sugar.xml, %apsim%\Model\Summaryfile.xml, %apsim%\Model\Sunflower.xml, %apsim%\Model\SurfaceOM.xml, %apsim%\Model\SweetCorn.xml, %apsim%\Model\SweetSorghum.xml, %apsim%\Model\SWIM2.xml, %apsim%\Model\SWIM2ui.xml, %apsim%\Model\SWIM2ui2.xml, %apsim%\Model\Sysbal.xml, %apsim%\Model\SysBal2.xml, %apsim%\Model\Tcllink.xml, %apsim%\Model\Tclmanager.xml, %apsim%\Model\Tclui.xml, %apsim%\Model\TextOutput.xml, %apsim%\Model\Tracker.xml, %apsim%\Model\Tree.xml, %apsim%\Model\Variables.xml, %apsim%\Model\Venlink.xml, %apsim%\Model\vine.xml, %apsim%\Model\WaterSupply.xml, %apsim%\Model\Weed.xml, %apsim%\Model\Wheat.xml, %apsim%\Model\YPCalc.xml, %apsim%\Model\UrinePatch.xml, %apsim%\Model\Soil with new nitrogen model.xml, %apsim%\Model\SoilNitrogen.xml, %apsim%\Model\Soil with new water and nitrogen models.xml]
      summaryfile
      area Paddock1-LightSoil
        folder ManagerFolder
          manager2 Aux-Outputs
            # This script help to organise some outputs
```csharp
using System;
using ModelFramework;

public class Script 
{      

   [Link] Paddock myPaddock;
   
   [Input(IsOptional=true)] double[] n_demanded;
   [Input(IsOptional=true)] double totaln;
   [Input(IsOptional=true)] double totalwt;
   [Input(IsOptional=true)] double ep;

   [Input(IsOptional=true)] double[] NitrogenSupplyLayers;
   [Input(IsOptional=true)] double TotalPlantN;
   [Input(IsOptional=true)] double TotalPlantWt;
   [Input(IsOptional=true)] double WaterUptake;
      
   [Output] string SoilName;
   [Output] double PlantTotalN;
   [Output] double PlantTotalC;
   [Output] double PlantTranspiration;
   
   [EventHandler] public void OnInitialised()
   {
      
      foreach(Component myModule in myPaddock.Children)
      {
         if(myModule.Name.Contains(" Nitrogen"))
         {
            SoilName = myModule.Name.Split(' ')[0];
         }
      }
   }

   [EventHandler] public void OnPost()
   {
      if (n_demanded != null)
      {
         PlantTotalN = totaln;
         PlantTotalC = 0.4 * totalwt;
         PlantTranspiration = ep;
      }
      else if (NitrogenSupplyLayers != null)
      {
         PlantTotalN = TotalPlantN;
         PlantTotalC = 0.4 * TotalPlantWt;
         PlantTranspiration = WaterUptake;
      }
      else
      {
         PlantTotalN = 0.0;
         PlantTranspiration = 0.0;
      }
   }
}
```
        fertiliser
        surfaceom SurfaceOrganicMatter
          PoolName = Residue1  # Organic Matter pool name
          type = grass  # Organic Matter type
          mass = 1000  # Initial surface residue (kg/ha)
          cnr = 20  # C:N ratio of initial residue
          standing_fraction = 0  # Fraction of residue standing
        manager Med-LightSoil Nitrogen (dummy)
          on init:
```
! This module does nothing. It is here so that the name of the soil can be captured by the Aux-Outputs manager
```
        SWIM2ui2
          # SWIM boundary conditions
          top_boundary_condition = 0  # Choose top boundary condition (0=inf conduct; 1=const potential; 2=limtd conduct)
          runoff = 1  # Choose runnof/pond condition (0=all runoff; 1=all pond; 2=calc runoff)
          bottom_boundary_condition = 0  # Choose bottom boundary condition (0=set pot grad; 1=set potential; 2=impermeable;3=seepage)
          run_solutes = urea  nh4  no3  # Type list of solutes SWIM will move
          max_water_increment = 10  # Type base water increment value
          # Description of soil profile
          x = 0   10   20   40   60   80   120  180   220   280   320   380   420   480   570   630   720   780   870   930   1070  1130  1270  1290  1410   1410   1500  # Enter the values of x for each layer
          soil_type = A_SL_mC  A_SL_mC  A_SL_mC  A_SL_mC  A_SL_mC  A_SL_mC  A_SL_mC  -  -  -  B1_SL_mC  B1_SL_mC  B1_SL_mC  B1_SL_mC  -  B2_SL_mC  B2_SL_mC  B2_SL_mC  B2_SL_mC  -  -  -  BC_SL_mC  BC_SL_mC  BC_SL_mC  BC_SL_mC  BC_SL_mC  # Enter the tags for each layer
          psi = -100  -100  -100  -100  -100  -100  -100  -100  -100  -100  -100  -100  -100  -100  -100  -100  -100  -100  -100  -100  -100  -100  -100  -100  -100  -100  -100  -100  # Enter the inital values of psi for each layer
          ini Ini_SWIM2: filename=%apsim%\Tests\SoilNitrogen\ini_SWIMui2(Generic).xml
        SoilNui
          # Parameters to initialise soil organic matter
          root_wt = 1000  # Type the amount of dead roots in the soil (kg/ha)
          root_cn = 30  # Type the C:N ratio of dead roots
          soil_cn = 12.5  # Type the C:N ratio of soil humus
          # Enter the values for each layer
          ph = 6.0    6.0    6.0    6.0    6.0    6.0    6.0    6.0    6.0    6.0    6.0    6.0    6.0    6.0    6.0    6.0    6.0    6.0    6.0    6.0    6.0    6.0    6.0    6.0    6.0    6.0    6.0  # Type the inital soil pH
          oc = 3.50   3.50   3.50   3.50   3.50   3.50   3.50   1.53   1.53   1.53   1.09   1.09   1.09   1.09   1.09   0.66   0.66   0.66   0.66   0.44   0.44   0.44   0.26   0.26   0.26   0.26   0.26  # Type the initial soil organic carbon content (%)
          fbiom = 0.371  0.371  0.371  0.371  0.371  0.371  0.371  0.686  0.686  0.686  0.857  0.857  0.857  0.857  0.857  0.909  0.909  0.909  0.909  0.954  0.954  0.954  0.989  0.989  0.989  0.989  0.989  # Type the microbial biomass fraction of OC (0-1)
          finert = 0.080  0.080  0.080  0.080  0.079  0.075  0.060  0.040  0.023  0.013  0.008  0.008  0.008  0.008  0.008  0.008  0.008  0.008  0.008  0.008  0.008  0.008  0.008  0.008  0.008  0.008  0.008  # Type the inert fraction of soil humus (0-1)
          no3ppm = 1.667  1.667  1.667  1.667  1.667  1.667  1.667  1.449  1.449  1.449  0.667  0.667  0.667  0.667  0.667  0.641  0.641  0.641  0.641  0.617  0.617  0.617  0.595  0.595  0.595  0.595  0.595  # Type the initial concentration of NO3 is the soil (ppm)
          nh4ppm = 1.667  1.667  1.667  1.667  1.667  1.667  1.667  1.449  1.449  1.449  0.667  0.667  0.667  0.667  0.667  0.641  0.641  0.641  0.641  0.617  0.617  0.617  0.595  0.595  0.595  0.595  0.595  # Type the initial concentration of NH4 is the soil (ppm)
          ureappm = 0.000  0.000  0.000  0.000  0.000  0.000  0.000  0.000  0.000  0.000  0.000  0.000  0.000  0.000  0.000  0.000  0.000  0.000  0.000  0.000  0.000  0.000  0.000  0.000  0.000  0.000  0.000  # Type the initial concentration of urea is the soil (ppm)
          # Other parameters
          nitrification_pot = 40  # Maximum potential nitrification rate (ug NH4/g soil/day)
          nh4_at_half_pot = 90  # NH4 concentration at half of nitrification rate (ppm)
          opt_temp = 32  # Optimal temperatures for mineralis. and nitrif. (oC)
        outputfile Results: filename=SimTest1-SoilN Paddock1-LightSoil Results.out; title=SimTest1-SoilN Paddock1-LightSoil Results
          variables
            variable:
              dd/mmm/yyyy as Date
              day as DoY
              urea() as UreaTotal format 5
              nh4() as NH4Total format 5
              no3() as NO3Total format 5
              surfaceom_n as SurfaceOM_N format 5
              fom_n() as FOM_N format 5
              biom_n() as Biom_N format 5
              hum_n() as Hum_N format 5
              PlantTotalN as PlantTotalN format 5
              fertiliser as FertiliserN format 5
              dlt_urea_hydrol() as HydrolisedN format 5
              nitrification() as NitrifiedN format 5
              dnit() as DenitrifiedN format 5
              leach_no3 as LeachedNO3 format 5
              dlt_n_min_res() as NetMineralisedResidue format 5
              dlt_n_min_tot() as NetMineralisedHumus format 5
              n2o_atm() as N2Oemissions format 5
              dlt_n_loss_in_sed as dltN_sediments format 5
              surfaceom_c as SurfaceOM_C format 5
              fom_c() as FOM_C format 5
              biom_c() as Biom_C format 5
              hum_c() as Hum_C format 5
              oc() as OCTotal format 5
              PlantTotalC format 5
              dlt_res_c_atm as CO2fromResidues format 5
              dlt_fom_c_atm() as CO2fromFOM format 5
              dlt_biom_c_atm() as CO2fromMBiomass format 5
              dlt_hum_c_atm() as CO2fromHumus format 5
              dlt_c_loss_in_sed as dltC_sediments format 5
              es as Evaporation format 5
              PlantTranspiration as PlantTranspiration format 5
              drain as Drain format 5
              Runoff format 5
              dlayer format 5
              urea format 5
              nh4 format 5
              no3 format 5
              fom_n format 5
              biom_n format 5
              hum_n format 5
              fom_c format 5
              biom_c format 5
              hum_c format 5
              st format 7
              sw_dep format 5
              SoilName
          events ReportingFrequency: event=end_day
    simulation SimTest1-SoilNitrogen
      clock
        start_date = 01/07/2000
        end_date = 31/12/2000
      metfile met: filename=%apsim%\Examples\MetFiles\MildTemperate.met
      PlugIns: same as Test1-SWIM2-Bare+TypicSoil.SimTest1-SoilN.PlugIns
      summaryfile
      area Paddock1-LightSoil
        folder ManagerFolder: same as Test1-SWIM2-Bare+TypicSoil.SimTest1-SoilN.Paddock1-LightSoil.ManagerFolder
        fertiliser
        surfaceom SurfaceOrganicMatter
          PoolName = Residue1  # Organic Matter pool name
          type = grass  # Organic Matter type
          mass = 1000  # Initial surface residue (kg/ha)
          cnr = 20  # C:N ratio of initial residue
          standing_fraction = 0  # Fraction of residue standing
        manager Med-LightSoil Nitrogen (dummy)
          on init:
          script: same as in Test1-SWIM2-Bare+TypicSoil.SimTest1-SoilN.Paddock1-LightSoil.Med-LightSoil Nitrogen (dummy)
        SWIM2ui2: same as Test1-SWIM2-Bare+TypicSoil.SimTest1-SoilN.Paddock1-LightSoil.SWIM2ui2
        SoilNitrogen
          # Parameters to initialise soil organic matter
          root_wt = 1000  # Type the initial FOM amount in the soil (kgDM/ha)
          root_cn = 30  # Type the initial C:N ratio of FOM
          soil_cn = 12.5  # Type the C:N ratio of soil humus
          # Enter the values for each layer
          ph = 6.0    6.0    6.0    6.0    6.0    6.0    6.0    6.0    6.0    6.0    6.0    6.0    6.0    6.0    6.0    6.0    6.0    6.0    6.0    6.0    6.0    6.0    6.0    6.0    6.0    6.0    6.0  # Type the inital soil pH
          oc = 3.50   3.50   3.50   3.50   3.50   3.50   3.50   1.53   1.53   1.53   1.09   1.09   1.09   1.09   1.09   0.66   0.66   0.66   0.66   0.44   0.44   0.44   0.26   0.26   0.26   0.26   0.26  # Type the initial soil organic carbon content (%)
          fbiom = 0.371  0.371  0.371  0.371  0.371  0.371  0.371  0.686  0.686  0.686  0.857  0.857  0.857  0.857  0.857  0.909  0.909  0.909  0.909  0.954  0.954  0.954  0.989  0.989  0.989  0.989  0.989  # Type the microbial biomass fraction of OC (0-1)
          finert = 0.080  0.080  0.080  0.080  0.079  0.075  0.060  0.040  0.023  0.013  0.008  0.008  0.008  0.008  0.008  0.008  0.008  0.008  0.008  0.008  0.008  0.008  0.008  0.008  0.008  0.008  0.008  # Type the inert fraction of soil humus (0-1)
          no3ppm = 1.667  1.667  1.667  1.667  1.667  1.667  1.667  1.449  1.449  1.449  0.667  0.667  0.667  0.667  0.667  0.641  0.641  0.641  0.641  0.617  0.617  0.617  0.595  0.595  0.595  0.595  0.595  # Type the initial concentration of NO3 is the soil (ppm)
          nh4ppm = 1.667  1.667  1.667  1.667  1.667  1.667  1.667  1.449  1.449  1.449  0.667  0.667  0.667  0.667  0.667  0.641  0.641  0.641  0.641  0.617  0.617  0.617  0.595  0.595  0.595  0.595  0.595  # Type the initial concentration of NH4 is the soil (ppm)
          ureappm = 0.000  0.000  0.000  0.000  0.000  0.000  0.000  0.000  0.000  0.000  0.000  0.000  0.000  0.000  0.000  0.000  0.000  0.000  0.000  0.000  0.000  0.000  0.000  0.000  0.000  0.000  0.000  # Type the initial concentration of urea is the soil (ppm)
          # Other parameters
          nitrification_pot = 40  # Maximum potential nitrification rate (ug NH4/g soil/day)
          nh4_at_half_pot = 90  # NH4 concentration at half of nitrification rate (ppm)
          opt_temp = 32  # Optimal temperatures for mineralis. and nitrif. (oC)
        outputfile Results: filename=SimTest1-SoilNitrogen Paddock1-LightSoil Results.out; title=SimTest1-SoilNitrogen Paddock1-LightSoil Results
          variables: same as Test1-SWIM2-Bare+TypicSoil.SimTest1-SoilN.Paddock1-LightSoil.Results.Variables
          events ReportingFrequency: event=end_day
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