folder Simulations: version=36; creator=Apsim 7.6-r3383
  memo GeneralInfo
    ++++++++++++++++++++  Setting up tests  +++++++++++++++++++++++++++++++++++++++++++++++++++++++++++

       Each test consist of a folder that contains simulations, each running with a different version of SoilN/SoilNitrogen,
               controlled by PlugIns module. The test folder themselves are linked to Test01-BareBare (i.e. linking the graphs).
       The idea for these tests is that each simulation set would excercise one soilN process/pool at time, the rest is equal.
       The tests are derived from the Sim00-Base simulation, to which the simulations in each test and most of their modules
               are linked. The exceptions are:
          - PlugIns, which are never linked;
          - SurfaceOrganicMatter, which are linked within each simulations test;
          - Soil node, which is linked within each test;
          - For simulations with more than one paddock (for varying soil type), the paddocks are linked within each simulation;
          - Managers and OperationSchedule are added according to the tests needs, linked within each test;
          - Within each test, the simulation is copied-linked (with the exception of PlugIns) and renamed, so it can simulate
               another version of the SoilNitrogen module - This can be done by copying Test00-Base and replicating its sim00.

       Notes:
          - The AuxOutput scripts ensures that some variables (from plants) always have a valid value, it collects data from
              the plant module, if exists, and outputs them with a common name;
          - The graphs have filter so one can choose which paddock will be seen in the graph;
          - To expose some of the differences between versions, the number of decimal places in the outputs  were increased.

          - The tag "TypicSoil" is used to represent the soil parameterised with 'typical' properties. That means that it is assumed
               that the soils would have these characteristics on a typical initialisation. Here, when referring to one of the soil
               properties (e.g. Hum, NH4, etc), it means that all parameters are set to zero and that property to its value in the
               'typical' parameterisation. These values are [roughly]:
                + Initial mineral N = 30kg as NO3 + 30kg as NH4, homogeneously distributed in the soil;
                + Initial soil organic matter = about 105 tonnes as soil OC (1330 and 1085 kgC/ha as M.Biomass in the light and
                     heavy soils, respectively). This is OC= 3.5, 1.5, 0.5, 0.25, 0.1, 0.1%;
                + Initial soil fresh OM = 1000 kg/ha, distributed over the whole soil profile, as per default parameters;
                + Initial surface residues = 1000kg/ha, nothing standing;

     - - - - - - - - - - - - - - - - - - - - - - - - - - - - - - - - - - - - - - - - - - - - - - - - - - - - - - - - - - - - - - - - - - - - - - - - - - - - - - - -
       Soil water module:
          - Most simulation use the 'default' SoilWat module;
          - Tests 31 to 35 use SWIM3         >>> Note that there is an error when using this module  !!
          - Tests 36 to 39 use SWIM2ui      >>> Note that wheat crop does not work with swim2, so Test38 is incomplete

    GENERAL NOTE
      >> There is an obvious difference between SoilN and SoilNitrogen with respect to number precision: soilN uses sigle
     number precision while soilNitrogen use double.  This should cause minor deviations and in most cases should balance
     out (as deviations can be positive as well as negative).  However, there are situations that this is not so. When drainage
     is very small ('summer' conditions) the amount of N leached can be below the difference in number precision, which
     means SoilN ignore the values, but SoilNitrogen does not. If this conditions presist for a while (such as with the weather
     used in these tests the errors will not balance out and may add up to considerable amounts (still very small tough).  So,
     looking in detail, the difference in N content on the lower layers consistently increases. This is thus just because those
     small values for leaching are more often ignored than not by soilN. Setting a threshold (about 5.0E-7) will make the
     differences be much smaller. This was done on the testing phase only and are not truly implemented.
  simulation Sim00-Base
    clock
      start_date = 01/07/2000
      end_date = 31/12/2000
    metfile met: filename=%apsim%\Examples\MetFiles\MildTemperate.met
    PlugIns
      PlugIn=[%apsim%\UserInterface\ApsimUIPlugIn.xml, %apsim%\UserInterface\SoilTypes.xml, %apsim%\UserInterface\Graph.xml, %apsim%\UserInterface\Ausfarm.xml, %apsim%\UserInterface\DevelopersPlugIn.xml, %apsim%\Model\SlurryTank.xml, %apsim%\Model\PHmodel.xml, %apsim%\Model\simpleBuilding.xml, %apsim%\Model\atmosphere.xml, %apsim%\Model\Accum.xml, %apsim%\Model\AgPasture.xml, %apsim%\Model\Bambatsi.xml, %apsim%\Model\Barley.xml, %apsim%\Model\Br.xml, %apsim%\Model\Bore.xml, %apsim%\Model\Broccoli.xml, %apsim%\Model\ButterflyPea.xml, %apsim%\Model\Canola.xml, %apsim%\Model\Canopy.xml, %apsim%\Model\Centro.xml, %apsim%\Model\Channel.xml, %apsim%\Model\Chickpea.xml, %apsim%\Model\Cl.xml, %apsim%\Model\Climatechange.xml, %apsim%\Model\Clock.xml, %apsim%\Model\Cotton2.xml, %apsim%\Model\Cowpea.xml, %apsim%\Model\CropUI.xml, %apsim%\Model\Dam.xml, %apsim%\Model\DCD.xml, %apsim%\Model\EGrandis.xml, %apsim%\Model\EMelliodora.xml, %apsim%\Model\Eo.xml, %apsim%\Model\EPopulnea.xml, %apsim%\Model\Erosion.xml, %apsim%\Model\Events.xml, %apsim%\Model\Fababean.xml, %apsim%\Model\Factorial.xml, %apsim%\Model\Factor.xml, %apsim%\Model\FactorComplex.xml, %apsim%\Model\FrenchBean.xml, %apsim%\Model\Fertiliser.xml, %apsim%\Model\Fieldpea.xml, %apsim%\Model\Gcm_data.xml, %apsim%\Model\Grasp.xml, %apsim%\Model\Graz.xml, %apsim%\Model\Growth.xml, %apsim%\Model\Horsegram.xml, %apsim%\Model\Ini.xml, %apsim%\Model\InitWater.xml, %apsim%\Model\Input.xml, %apsim%\Model\Irrigation.xml, %apsim%\Model\KWTest.xml, %apsim%\Model\Lablab.xml, %apsim%\Model\Lettuce.xml, %apsim%\Model\Log.xml, %apsim%\Model\Lucerne.xml, %apsim%\Model\Lupin.xml, %apsim%\Model\Maize.xml, %apsim%\Model\MaizeZ.xml, %apsim%\Model\Manager.xml, %apsim%\Model\Map.xml, %apsim%\Model\Memo.xml, %apsim%\Model\MetFile.xml, %apsim%\Model\MicroMet.xml, %apsim%\Model\Millet.xml, %apsim%\Model\Millet1.xml, %apsim%\Model\Millet2.xml, %apsim%\Model\Millet3.xml, %apsim%\Model\Millet4.xml, %apsim%\Model\Millet5.xml, %apsim%\Model\Mucuna.xml, %apsim%\Model\Mungbean.xml, %apsim%\Model\Navybean.xml, %apsim%\Model\Oats.xml, %apsim%\Model\Ocean_data.xml, %apsim%\Model\Operations.xml, %apsim%\Model\Orobanche.xml, %apsim%\Model\Oryza.xml, %apsim%\Model\Oryza2.xml, %apsim%\Model\OutputFile.xml, %apsim%\Model\Ozcot.xml, %apsim%\Model\Patchinput.xml, %apsim%\Model\Peanut.xml, %apsim%\Model\Pigeonpea.xml, %apsim%\Model\Pond.xml, %apsim%\Model\Potato.xml, %apsim%\Model\RotPlot.xml, %apsim%\Model\RugPlotUI.xml, %apsim%\Model\Root.xml, %apsim%\Model\Rule.xml, %apsim%\Model\Script.xml, %apsim%\Model\Seedling.xml, %apsim%\Model\SiloInput.xml, %apsim%\Model\Slurp.xml, %apsim%\Model\Soi.xml, %apsim%\Model\Soil.xml, %apsim%\Model\SoilNui.xml, %apsim%\Model\SoilTemp.xml, %apsim%\Model\Sorghum.xml, %apsim%\Model\SorghumConstants.xml, %apsim%\Model\SorghumGenotype.xml, %apsim%\Model\Soybean.xml, %apsim%\Model\Stylo.xml, %apsim%\Model\Sugar.xml, %apsim%\Model\Summaryfile.xml, %apsim%\Model\Sunflower.xml, %apsim%\Model\SurfaceOM.xml, %apsim%\Model\SweetCorn.xml, %apsim%\Model\SweetSorghum.xml, %apsim%\Model\SWIM2.xml, %apsim%\Model\SWIM2ui.xml, %apsim%\Model\SWIM2ui2.xml, %apsim%\Model\Sysbal.xml, %apsim%\Model\SysBal2.xml, %apsim%\Model\Tcllink.xml, %apsim%\Model\Tclmanager.xml, %apsim%\Model\Tclui.xml, %apsim%\Model\TextOutput.xml, %apsim%\Model\Tracker.xml, %apsim%\Model\Tree.xml, %apsim%\Model\Variables.xml, %apsim%\Model\Venlink.xml, %apsim%\Model\vine.xml, %apsim%\Model\WaterSupply.xml, %apsim%\Model\Weed.xml, %apsim%\Model\Wheat.xml, %apsim%\Model\YPCalc.xml, %apsim%\Model\UrinePatch.xml, %apsim%\Model\Soil with new nitrogen model.xml, %apsim%\Model\SoilNitrogen.xml]
    memo Info
      ++++++++++++++++++++  TEST 00 +++++++++++++++++++++++++++++++++++++++++++++++++++++++++++

         This is a base simulation for creating test for SoilN-SoilNitrogen comparisons.

         Description:
            - Artificial climate, smooth mild temperate;
            - Two generic soils, a free draining and a poorly drained;
            - Bare soil on most sims, wheat and agpasture in few;
            - Variations tested:
               . Initial mineral N;
               . Initial organic matter;
               . Initial surface residues;
               . Additions of residues or fresh OM;
               . Additions of mineral N;

      +++++++++++++++++++++++++++++++++++++++++++++++++
    summaryfile
    area Paddock1
      folder ManagerFolder
        manager2 Aux-Outputs
          # This script help to organise some outputs
```csharp
using System;
using ModelFramework;

public class Script 
{      

   [Link] Paddock myPaddock;
   
   [Input(IsOptional=true)] double[] n_demanded;
   [Input(IsOptional=true)] double totaln;
   [Input(IsOptional=true)] double totalwt;
   [Input(IsOptional=true)] double ep;

   [Input(IsOptional=true)] double[] NitrogenSupplyLayers;
   [Input(IsOptional=true)] double TotalPlantN;
   [Input(IsOptional=true)] double TotalPlantWt;
   [Input(IsOptional=true)] double WaterUptake;
      
   [Output] string SoilName;
   [Output] double PlantTotalN;
   [Output] double PlantTotalC;
   [Output] double PlantTranspiration;
   
   [EventHandler] public void OnInitialised()
   {
      
      foreach(Component myModule in myPaddock.Children)
      {
         if(myModule.Name.Contains(" Nitrogen"))
         {
            SoilName = myModule.Name.Split(' ')[0];
         }
      }
   }

   [EventHandler] public void OnPost()
   {
      if (n_demanded != null)
      {
         PlantTotalN = totaln;
         PlantTotalC = 0.4 * totalwt;
         PlantTranspiration = ep;
      }
      else if (NitrogenSupplyLayers != null)
      {
         PlantTotalN = TotalPlantN;
         PlantTotalC = 0.4 * TotalPlantWt;
         PlantTranspiration = WaterUptake;
      }
      else
      {
         PlantTotalN = 0.0;
         PlantTranspiration = 0.0;
      }
   }
}
```
        manager HarvestingRule (disabled)
          # Harvesting criteria
          crop = wheat  # Enter name of crop to harvest when ripe
          on end_of_day:
```
if ('[crop]' = 'cotton') then
   if ([crop].ozcot_status > 0) then
     [crop] harvest
   endif
elseif ([crop].StageName = 'harvest_ripe' or [crop].plant_status = 'dead') then
   [crop] harvest
   [crop] end_crop
endif
```
        manager CutAgPasture (disabled)
          # Cut or graze rotation
          CutPasture_start_date = 01/01/1900  # Enter date to start rotation (dd/mm/yyyy)
          CutPasture_end_date = 31/12/2100  # Enter date to end rotation (dd/mm/yyyy)
          AgPasture_type = AgPasture  # Enter pasture type
          rotation_type = Fixed intervals  # Enter the rotation type
          cut_interval = 21  # Enter the interval between cuts/grazings (days)
          upper_threshold = 2000  # Enter the sward DM to trigger cut (kg/ha)
          lower_threshold = 1500  # Enter the residual DM after cut (kg/ha)
          # Management of cut/grazed material
          treatment_type = Return as residue  # Enter the treatment type for the cut/grazed material
          remove_dm_frac = 0.98  # Enter fraction of DM that is removed from field (0-1)
          remove_n_frac = 0.98  # Enter fraction of N that is removed from field (0-1)
          dung_fraction = 0.0  # Enter proportion of N returned in dung (0-1)
          on init:
```
! -->   Last updated in: 11/July/2011  ..........
! . Author: Rogerio Cichota

days_after_cut = [cut_interval] - 1
Do_Cut = 'FALSE'
Has_Cut = 'FALSE'
harvested_dm =0
harvested_n = 0
removed_dm = 0.0
removed_n = 0.0
return_dm = 0.0
return_n = 0.0
GrowthRateCalc = 0
n_conc_total = 0
```
          on start_of_day:
```
if today >= date('[CutPasture_start_date]') and today <= date('[CutPasture_end_date]') then

   preharvest_dm = [AgPasture_type].StemWt + [AgPasture_type].LeafWt
   preharvest_n = [AgPasture_type].StemN + [AgPasture_type].LeafN
   harvested_dm = 0.0
   harvested_n = 0.0
   removed_dm = 0.0
   removed_n = 0.0
   return_dm = 0.0
   return_n = 0.0
   GrowthRateCalc = 0.0
   n_conc_removed = 0.0
   days_after_cut = days_after_cut + 1
   Has_Cut = 'FALSE'

   if '[rotation_type]' = 'Fixed intervals' then
      if days_after_cut = [cut_interval] then
         Do_Cut = 'TRUE'
      else
         Do_Cut = 'FALSE'
      endif
   elseif '[rotation_type]' = 'Target mass' then
      if preharvest_dm >= [upper_threshold] then
         Do_Cut = 'TRUE'
      else
         Do_Cut = 'FALSE'
      endif
   endif

endif   ! of today

If Do_Cut = 'TRUE' then
   
!- Cut or graze ---------------------------------------------------------------------------------------

   if preharvest_dm > [lower_threshold] then
      [AgPasture_type] graze type = 'residue', amount = [lower_threshold]
      Has_Cut = 'TRUE'
      harvested_dm = [AgPasture_type].HarvestWt
      harvested_n = [AgPasture_type].HarvestN
      GrowthRateCalc = harvested_dm/days_after_cut
      if harvested_dm > 0 then
         n_conc_removed = harvested_n*100/harvested_dm
      endif
      days_after_cut = 0

!- Residue management -------------------------------------------------------------------------
      removed_dm =  harvested_dm* [remove_dm_frac]
      removed_n = harvested_n* [remove_n_frac]
      return_dm = harvested_dm - removed_dm 
      return_n = harvested_n - removed_n 

      if '[treatment_type]' = 'Return as residue' and [remove_dm_frac] < 1 then
         'SurfaceOrganicMatter' add_surfaceom name = grass, type = grass, mass =  return_dm (kg/ha), n = return_n (kg/ha), cpr = 0
      elseif '[treatment_type]' = 'Return as dung & urine' then
         ! It is advised that dung and urine return should be done using other manager, 'Urine_patch' or 'Apply or return N and water'
         N_on_dung = return_n * [dung_fraction]
         N_on_urine = return_n - N_on_dung
         'SurfaceOrganicMatter' add_surfaceom name = dung, type = RuminantDung_PastureFed, mass =  return_dm (kg/ha), n = N_on_dung (kg/ha), cpr = 0
         if N_on_urine > 0 then
            fertiliser apply amount = N_on_urine (kg/ha), depth = 10 (mm), type = urea_n ()
         endif
      endif
   endif

endif  ! of Do_Cut
```
        operations OperationsSchedule(1) (disabled)
          10-Jan  'MediumSedimentarySoil nitrogen' incorpfom type = grass, amount=500 300 200 100 50 50, cnr=20 20 20 20 20 20
          20-Jan  'MediumSedimentarySoil nitrogen' incorpfompool type = grass, amount=500 300 200 100 50 50, cnr=20 20 20 20 20 20
          30-Jan  'SurfaceOrganicMatter' add_surfaceom name = Residue2, type = grass, mass = 1000 (kg/ha), cnr = 20, cpr = 0
          10-Feb  'SurfaceOrganicMatter' tillage type = 'user_defined', f_incorp = 0.5 (0-1), tillage_depth = 250. (mm)
        operations OperationsSchedule(2) (disabled)
          5-Jan  wheat sow cultivar = Wakaniu, plants = 400, sowing_depth = 30 (mm), row_spacing = 150, crop_class = plant
          20-Jan  Fertiliser apply amount=50 (kg/ha), depth=100 (mm), type=urea_n
          30-Mar  Fertiliser apply amount=50 (kg/ha), depth=100 (mm), type=urea_n
      fertiliser
      surfaceom SurfaceOrganicMatter
        PoolName = Residue1  # Organic Matter pool name
        type = grass  # Organic Matter type
        mass = 0  # Initial surface residue (kg/ha)
        cnr = 20  # C:N ratio of initial residue
        standing_fraction = 0  # Fraction of residue standing
      Soil MediumSedimentarySoil: LocalName=Generic medium sedimentary soil; Country=New Zealand; Latitude=0; Longitude=0; DataSource=Hypothetical medium texture soil of sedimentary origin
        Analysis: PHUnits=Water; BoronUnits=HotWater
          Thickness  PH   CEC   ParticleSizeSand  ParticleSizeSilt  ParticleSizeClay
          150        6.5  15    20                60                20
          150        6.5  14.5  20                60                20
          300        6.5  12    20                60                20
          300        6.5  8     20                60                20
          300        6.5  6.3   20                60                20
          300        6.5  6     20                60                20
        Water
          Thickness  BD    AirDry  LL15  DUL    SAT    KS
          150        1.1   0.15    0.2   0.39   0.52   2500
          150        1.05  0.21    0.21  0.4    0.51   1500
          300        1.1   0.22    0.22  0.4    0.5    1000
          300        1.15  0.21    0.21  0.395  0.485  1000
          300        1.22  0.21    0.21  0.38   0.47   1000
          300        1.3   0.22    0.22  0.36   0.455  1000
          SoilCrop wheat: LL=[0.2, 0.21, 0.22, 0.21, 0.21, 0.22]; KL=[0.25, 0.15, 0.06, 0.01, 0, 0]; XF=[1, 1, 1, 1, 0, 0]
          SoilCrop agpasture: LL=[0.2, 0.21, 0.22, 0.21, 0.21, 0.22]; KL=[0.25, 0.17, 0.08, 0.02, 0, 0]; XF=[1, 1, 1, 1, 0, 0]
        SoilWater: SummerCona=3; SummerU=5; SummerDate=1-Nov; WinterCona=3; WinterU=5; WinterDate=1-Apr; DiffusConst=88; DiffusSlope=35; Salb=0.13; CN2Bare=60; CNRed=20; CNCov=0.8; Thickness=[150, 150, 300, 300, 300, 300]; SWCON=[0.4, 0.33, 0.29, 0.29, 0.3, 0.3]
        SoilOrganicMatter: RootCN=30; RootWt=0; SoilCN=12.5; EnrACoeff=7.4; EnrBCoeff=0.2; OCUnits=Total
          Thickness  OC  FBiom  FInert
          150        0   0.035  0.45
          150        0   0.025  0.6
          300        0   0.015  0.8
          300        0   0.01   0.92
          300        0   0.01   0.96
          300        0   0.01   0.995
        Sample Initial nitrogen: NO3Units=kgha; NH4Units=kgha; SWUnits=Volumetric; OCUnits=Total; PHUnits=Water
          Thickness  NO3  NH4
          150        0    0
          150        0    0
          300        0    0
          300        0    0
          300        0    0
          300        0    0
        InitialWater: FractionFull=1; PercentMethod=EvenlyDistributed; RelativeTo=ll15
      outputfile Results: filename=Sim00-Base Paddock1 Results.out; title=Sim00-Base Paddock1 Results
        variables
          variable:
            dd/mmm/yyyy as Date
            day as DoY
            urea() as UreaTotal format 5
            nh4() as NH4Total format 5
            no3() as NO3Total format 5
            surfaceom_n as SurfaceOM_N format 5
            fom_n() as FOM_N format 5
            biom_n() as Biom_N format 5
            hum_n() as Hum_N format 5
            PlantTotalN as PlantTotalN format 5
            fertiliser as FertiliserN format 5
            dlt_urea_hydrol() as HydrolisedN format 5
            nitrification() as NitrifiedN format 5
            dnit() as DenitrifiedN format 5
            leach_no3 as LeachedNO3 format 5
            dlt_n_min_res() as NetMineralisedResidue format 5
            dlt_n_min_tot() as NetMineralisedHumus format 5
            n2o_atm() as N2Oemissions format 5
            dlt_n_loss_in_sed as dltN_sediments format 5
            surfaceom_c as SurfaceOM_C format 5
            fom_c() as FOM_C format 5
            biom_c() as Biom_C format 5
            hum_c() as Hum_C format 5
            oc() as OCTotal format 5
            PlantTotalC format 5
            dlt_res_c_atm as CO2fromResidues format 5
            dlt_fom_c_atm() as CO2fromFOM format 5
            dlt_biom_c_atm() as CO2fromMBiomass format 5
            dlt_hum_c_atm() as CO2fromHumus format 5
            dlt_c_loss_in_sed as dltC_sediments format 5
            es as Evaporation format 5
            PlantTranspiration as PlantTranspiration format 5
            drain as Drain format 5
            Runoff format 5
            dlayer format 5
            urea format 5
            nh4 format 5
            no3 format 5
            fom_n format 5
            biom_n format 5
            hum_n format 5
            fom_c format 5
            biom_c format 5
            hum_c format 5
            st format 7
            sw_dep format 5
            SoilName
        events ReportingFrequency: event=end_day
  folder Test01-BareBare
    memo Info
      ++++++++++++++++++++  TEST 39 +++++++++++++++++++++++++++++++++++++++++++++++++++++++++++

         Description:
            - Artificial climate, smooth mild temperate;
            - Two generic soils, a free draining and a poorly drained;
            - Wheat crop;
            - Initial mineral N: 30kgN/ha as NO3 + 30kgN/ha as NH4;
            - Initial soil organic matter composed of humus and FOM;
            - Initial surface residues of 1000kgDM/ha;
            - No additions of residues;
            - Adding 50kgN/ha as urea in two dates;

            >> Using SWIM2ui as water module  <<

         Expected output:
            - All outputs with valid values (numeric mostly);
            - This is the complete basic soil run under cropping conditions (wheat);

         NOTE: these simulations will break when wheat is sown, as it cannot communicate with SWIM (hopefully this will be solved in the future)
                       Simulation were deleted meanwhile
    simulation Sim01-SoilN -> /Simulations/Sim00-Base
      PlugIns
        PlugIn=[%apsim%\UserInterface\ApsimUIPlugIn.xml, %apsim%\UserInterface\SoilTypes.xml, %apsim%\UserInterface\Graph.xml, %apsim%\UserInterface\Ausfarm.xml, %apsim%\UserInterface\DevelopersPlugIn.xml, %apsim%\Model\SlurryTank.xml, %apsim%\Model\PHmodel.xml, %apsim%\Model\simpleBuilding.xml, %apsim%\Model\atmosphere.xml, %apsim%\Model\Accum.xml, %apsim%\Model\AgPasture.xml, %apsim%\Model\Bambatsi.xml, %apsim%\Model\Barley.xml, %apsim%\Model\Br.xml, %apsim%\Model\Bore.xml, %apsim%\Model\Broccoli.xml, %apsim%\Model\ButterflyPea.xml, %apsim%\Model\Canola.xml, %apsim%\Model\Canopy.xml, %apsim%\Model\Centro.xml, %apsim%\Model\Channel.xml, %apsim%\Model\Chickpea.xml, %apsim%\Model\Cl.xml, %apsim%\Model\Climatechange.xml, %apsim%\Model\Clock.xml, %apsim%\Model\Cotton2.xml, %apsim%\Model\Cowpea.xml, %apsim%\Model\CropUI.xml, %apsim%\Model\Dam.xml, %apsim%\Model\DCD.xml, %apsim%\Model\EGrandis.xml, %apsim%\Model\EMelliodora.xml, %apsim%\Model\Eo.xml, %apsim%\Model\EPopulnea.xml, %apsim%\Model\Erosion.xml, %apsim%\Model\Events.xml, %apsim%\Model\Fababean.xml, %apsim%\Model\Factorial.xml, %apsim%\Model\Factor.xml, %apsim%\Model\FactorComplex.xml, %apsim%\Model\FrenchBean.xml, %apsim%\Model\Fertiliser.xml, %apsim%\Model\Fieldpea.xml, %apsim%\Model\Gcm_data.xml, %apsim%\Model\Grasp.xml, %apsim%\Model\Graz.xml, %apsim%\Model\Growth.xml, %apsim%\Model\Horsegram.xml, %apsim%\Model\Ini.xml, %apsim%\Model\InitWater.xml, %apsim%\Model\Input.xml, %apsim%\Model\Irrigation.xml, %apsim%\Model\KWTest.xml, %apsim%\Model\Lablab.xml, %apsim%\Model\Lettuce.xml, %apsim%\Model\Log.xml, %apsim%\Model\Lucerne.xml, %apsim%\Model\Lupin.xml, %apsim%\Model\Maize.xml, %apsim%\Model\MaizeZ.xml, %apsim%\Model\Manager.xml, %apsim%\Model\Map.xml, %apsim%\Model\Memo.xml, %apsim%\Model\MetFile.xml, %apsim%\Model\MicroMet.xml, %apsim%\Model\Millet.xml, %apsim%\Model\Millet1.xml, %apsim%\Model\Millet2.xml, %apsim%\Model\Millet3.xml, %apsim%\Model\Millet4.xml, %apsim%\Model\Millet5.xml, %apsim%\Model\Mucuna.xml, %apsim%\Model\Mungbean.xml, %apsim%\Model\Navybean.xml, %apsim%\Model\Oats.xml, %apsim%\Model\Ocean_data.xml, %apsim%\Model\Operations.xml, %apsim%\Model\Orobanche.xml, %apsim%\Model\Oryza.xml, %apsim%\Model\Oryza2.xml, %apsim%\Model\OutputFile.xml, %apsim%\Model\Ozcot.xml, %apsim%\Model\Patchinput.xml, %apsim%\Model\Peanut.xml, %apsim%\Model\Pigeonpea.xml, %apsim%\Model\Pond.xml, %apsim%\Model\Potato.xml, %apsim%\Model\RotPlot.xml, %apsim%\Model\RugPlotUI.xml, %apsim%\Model\Root.xml, %apsim%\Model\Rule.xml, %apsim%\Model\Script.xml, %apsim%\Model\Seedling.xml, %apsim%\Model\SiloInput.xml, %apsim%\Model\Slurp.xml, %apsim%\Model\Soi.xml, %apsim%\Model\Soil.xml, %apsim%\Model\SoilNui.xml, %apsim%\Model\SoilTemp.xml, %apsim%\Model\Sorghum.xml, %apsim%\Model\SorghumConstants.xml, %apsim%\Model\SorghumGenotype.xml, %apsim%\Model\Soybean.xml, %apsim%\Model\Stylo.xml, %apsim%\Model\Sugar.xml, %apsim%\Model\Summaryfile.xml, %apsim%\Model\Sunflower.xml, %apsim%\Model\SurfaceOM.xml, %apsim%\Model\SweetCorn.xml, %apsim%\Model\SweetSorghum.xml, %apsim%\Model\SWIM2.xml, %apsim%\Model\SWIM2ui.xml, %apsim%\Model\SWIM2ui2.xml, %apsim%\Model\Sysbal.xml, %apsim%\Model\SysBal2.xml, %apsim%\Model\Tcllink.xml, %apsim%\Model\Tclmanager.xml, %apsim%\Model\Tclui.xml, %apsim%\Model\TextOutput.xml, %apsim%\Model\Tracker.xml, %apsim%\Model\Tree.xml, %apsim%\Model\Variables.xml, %apsim%\Model\Venlink.xml, %apsim%\Model\vine.xml, %apsim%\Model\WaterSupply.xml, %apsim%\Model\Weed.xml, %apsim%\Model\Wheat.xml, %apsim%\Model\YPCalc.xml, %apsim%\Model\UrinePatch.xml, %apsim%\Model\Soil with new nitrogen model.xml, %apsim%\Model\SoilNitrogen.xml, %apsim%\Model\Soil with new water and nitrogen models.xml]
      area Paddock1-LightSoil -> /Simulations/Sim00-Base/Paddock1
        Soil Med-LightSoil: LocalName=Generic medium-light sedimentary soil; Country=New Zealand; Latitude=0; Longitude=0
          DataSource=Hypothetical medium to light texture soil of sedimentary origin (moderately high drainage)
          Analysis: PHUnits=Water; BoronUnits=HotWater
            Thickness  PH   CEC  ParticleSizeSand  ParticleSizeSilt  ParticleSizeClay
            150        6.5  15   30                60                10
            150        6.5  14   30                60                10
            300        6.5  10   30                60                10
            300        6.5  6    30                60                10
            300        6.5  5    30                60                10
            300        6.5  5    30                60                10
          Water
            Thickness  BD    AirDry  LL15  DUL    SAT   KS
            150        1.1   0.075   0.12  0.34   0.52  10000
            150        1.05  0.15    0.15  0.35   0.5   8500
            300        1.1   0.16    0.16  0.345  0.49  7500
            300        1.15  0.15    0.15  0.33   0.48  7500
            300        1.22  0.14    0.14  0.315  0.46  8000
            300        1.3   0.13    0.13  0.3    0.45  10000
            SoilCrop agpasture: LL=[0.12, 0.15, 0.16, 0.15, 0.14, 0.13]; KL=[0.2, 0.2, 0.1, 0.05, 0, 0]; XF=[1, 1, 1, 1, 0, 0]
            SoilCrop wheat: LL=[0.12, 0.15, 0.16, 0.15, 0.14, 0.13]; KL=[0.2, 0.2, 0.1, 0.05, 0, 0]; XF=[1, 1, 1, 1, 0, 0]
          SoilWater: SummerCona=3; SummerU=5; SummerDate=1-Nov; WinterCona=3; WinterU=5; WinterDate=1-Apr; DiffusConst=88; DiffusSlope=35; Salb=0.13; CN2Bare=50; CNRed=20; CNCov=0.8; Thickness=[150, 150, 300, 300, 300, 300]; SWCON=[0.5, 0.45, 0.4, 0.4, 0.4, 0.4]
          SoilOrganicMatter: RootCN=30; RootWt=0; SoilCN=12.5; EnrACoeff=7.4; EnrBCoeff=0.2; OCUnits=Total
            Thickness  OC  FBiom  FInert
            150        0   0.035  0.4
            150        0   0.025  0.55
            300        0   0.015  0.765
            300        0   0.01   0.9
            300        0   0.01   0.95
            300        0   0.01   0.994
          Sample Initial nitrogen: NO3Units=kgha; NH4Units=kgha; SWUnits=Volumetric; OCUnits=Total; PHUnits=Water
            Thickness  NO3  NH4
            150        0    0
            150        0    0
            300        0    0
            300        0    0
            300        0    0
            300        0    0
          InitialWater: FractionFull=1; PercentMethod=EvenlyDistributed; RelativeTo=ll15
        outputfile Results -> /Simulations/Sim00-Base/Paddock1/Results: filename=Sim01-SoilN Paddock1-LightSoil Results.out; title=Sim01-SoilN Paddock1-LightSoil Results
          variables -> /Simulations/Sim00-Base/Paddock1/Results/Variables
          events ReportingFrequency -> /Simulations/Sim00-Base/Paddock1/Results/ReportingFrequency
      area Paddock2-HeavySoil -> /Simulations/Test01-BareBare/Sim01-SoilN/Paddock1-LightSoil
        Soil Med-HeavySoil: LocalName=Generic medium-heavy sedimentary soil; Country=New Zealand; Latitude=0; Longitude=0
          DataSource=Hypothetical medium to heavy texture soil of sedimentary origin (moderately poorly drained)
          Analysis: PHUnits=Water; BoronUnits=HotWater
            Thickness  PH   CEC  ParticleSizeSand  ParticleSizeSilt  ParticleSizeClay
            150        6.5  15   10                60                30
            150        6.5  15   10                60                30
            300        6.5  13   10                60                30
            300        6.5  10   10                60                30
            300        6.5  8    10                60                30
            300        6.5  7.5  10                60                30
          Water
            Thickness  BD    AirDry  LL15   DUL   SAT    KS
            150        1.1   0.18    0.23   0.41  0.52   75
            150        1.05  0.25    0.25   0.44  0.51   75
            300        1.1   0.28    0.28   0.46  0.503  50
            300        1.15  0.29    0.29   0.46  0.495  25
            300        1.22  0.295   0.295  0.45  0.483  25
            300        1.3   0.3     0.3    0.44  0.47   50
            SoilCrop agpasture: LL=[0.23, 0.25, 0.28, 0.29, 0.295, 0.3]; KL=[0.2, 0.15, 0.06, 0.02, 0, 0]; XF=[1, 1, 1, 1, 0, 0]
            SoilCrop wheat: LL=[0.23, 0.25, 0.28, 0.29, 0.295, 0.3]; KL=[0.2, 0.15, 0.06, 0.02, 0, 0]; XF=[1, 1, 1, 1, 0, 0]
          SoilWater: SummerCona=3; SummerU=5; SummerDate=1-Nov; WinterCona=3; WinterU=5; WinterDate=1-Apr; DiffusConst=88; DiffusSlope=35; Salb=0.13; CN2Bare=75; CNRed=20; CNCov=0.8; Thickness=[150, 150, 300, 300, 300, 300]; SWCON=[0.3, 0.25, 0.2, 0.19, 0.18, 0.2]
          SoilOrganicMatter: RootCN=30; RootWt=0; SoilCN=12.5; EnrACoeff=7.4; EnrBCoeff=0.2; OCUnits=Total
            Thickness  OC  FBiom  FInert
            150        0   0.035  0.5
            150        0   0.025  0.65
            300        0   0.015  0.835
            300        0   0.01   0.94
            300        0   0.01   0.97
            300        0   0.01   0.996
          Sample Initial nitrogen -> /Simulations/Test01-BareBare/Sim01-SoilN/Paddock1-LightSoil/Med-LightSoil/Initial nitrogen
          InitialWater: FractionFull=1; PercentMethod=EvenlyDistributed; RelativeTo=ll15
        outputfile Results -> /Simulations/Test01-BareBare/Sim01-SoilN/Paddock1-LightSoil/Results: filename=Sim01-SoilN Paddock2-HeavySoil Results.out; title=Sim01-SoilN Paddock2-HeavySoil Results
          variables -> /Simulations/Test01-BareBare/Sim01-SoilN/Paddock1-LightSoil/Results/Variables
          events ReportingFrequency -> /Simulations/Test01-BareBare/Sim01-SoilN/Paddock1-LightSoil/Results/ReportingFrequency
    simulation Sim01-SoilNitrogen -> /Simulations/Test01-BareBare/Sim01-SoilN
      PlugIns: same as Test01-BareBare.Sim01-SoilN.PlugIns
      area Paddock1-LightSoil -> /Simulations/Test01-BareBare/Sim01-SoilN/Paddock1-LightSoil
        outputfile Results -> /Simulations/Test01-BareBare/Sim01-SoilN/Paddock1-LightSoil/Results: filename=Sim01-SoilNitrogen Paddock1-LightSoil Results.out; title=Sim01-SoilNitrogen Paddock1-LightSoil Results
          variables -> /Simulations/Test01-BareBare/Sim01-SoilN/Paddock1-LightSoil/Results/Variables
          events ReportingFrequency -> /Simulations/Test01-BareBare/Sim01-SoilN/Paddock1-LightSoil/Results/ReportingFrequency
      area Paddock2-HeavySoil -> /Simulations/Test01-BareBare/Sim01-SoilN/Paddock2-HeavySoil
        outputfile Results -> /Simulations/Test01-BareBare/Sim01-SoilN/Paddock2-HeavySoil/Results: filename=Sim01-SoilNitrogen Paddock2-HeavySoil Results.out; title=Sim01-SoilNitrogen Paddock2-HeavySoil Results
          variables -> /Simulations/Test01-BareBare/Sim01-SoilN/Paddock2-HeavySoil/Results/Variables
          events ReportingFrequency -> /Simulations/Test01-BareBare/Sim01-SoilN/Paddock2-HeavySoil/Results/ReportingFrequency
  folder Test02-Bare+NO3 -> /Simulations/Test01-BareBare
    memo Info
      ++++++++++++++++++++  TEST 02 +++++++++++++++++++++++++++++++++++++++++++++++++++++++++++

         Description:
            - Artificial climate, smooth mild temperate;
            - Two generic soils, a free draining and a poorly drained;
            - Bare soil;
            - Initial mineral N: 60kgN/ha as NO3;
            - No initial soil organic matter;
            - No initial surface residues;
            - No additions of residues or mineral N;

         Expected output:
            - All outputs with valid values (numeric mostly);
            - Some variables involving mineral N should have values,
               . Changes are due to leaching or denitrification as there is no NH4 nor organic pools;
    simulation Sim02-SoilN -> /Simulations/Test01-BareBare/Sim01-SoilN
      PlugIns: same as Test01-BareBare.Sim01-SoilN.PlugIns
      area Paddock1-LightSoil -> /Simulations/Test01-BareBare/Sim01-SoilN/Paddock1-LightSoil
        surfaceom SurfaceOrganicMatter
          PoolName = Residue1  # Organic Matter pool name
          type = grass  # Organic Matter type
          mass = 0  # Initial surface residue (kg/ha)
          cnr = 20  # C:N ratio of initial residue
          standing_fraction = 0  # Fraction of residue standing
        Soil Med-LightSoil: LocalName=Generic medium-light sedimentary soil; Country=New Zealand; Latitude=0; Longitude=0
          DataSource=Hypothetical medium to light texture soil of sedimentary origin (moderately high drainage)
          Analysis: same as Test01-BareBare.Sim01-SoilN.Paddock1-LightSoil.Med-LightSoil.Analysis
          Water: same as Test01-BareBare.Sim01-SoilN.Paddock1-LightSoil.Med-LightSoil.Water
          SoilWater: same as Test01-BareBare.Sim01-SoilN.Paddock1-LightSoil.Med-LightSoil.SoilWater
          SoilOrganicMatter: RootCN=30; RootWt=0; SoilCN=12.5; EnrACoeff=7.4; EnrBCoeff=0.2; OCUnits=Total
            Thickness  OC  FBiom  FInert
            150        0   0.035  0.4
            150        0   0.025  0.55
            300        0   0.015  0.765
            300        0   0.01   0.9
            300        0   0.01   0.95
            300        0   0.01   0.994
          Sample Initial nitrogen: NO3Units=kgha; NH4Units=kgha; SWUnits=Volumetric; OCUnits=Total; PHUnits=Water
            Thickness  NO3  NH4
            150        10   0
            150        10   0
            300        10   0
            300        10   0
            300        10   0
            300        10   0
          InitialWater: FractionFull=1; PercentMethod=EvenlyDistributed; RelativeTo=ll15
        outputfile Results -> /Simulations/Test01-BareBare/Sim01-SoilN/Paddock1-LightSoil/Results: filename=Sim02-SoilN Paddock1-LightSoil Results.out; title=Sim02-SoilN Paddock1-LightSoil Results
          variables -> /Simulations/Test01-BareBare/Sim01-SoilN/Paddock1-LightSoil/Results/Variables
          events ReportingFrequency -> /Simulations/Test01-BareBare/Sim01-SoilN/Paddock1-LightSoil/Results/ReportingFrequency
      area Paddock2-HeavySoil -> /Simulations/Test01-BareBare/Sim01-SoilN/Paddock2-HeavySoil
        Soil Med-HeavySoil: LocalName=Generic medium-heavy sedimentary soil; Country=New Zealand; Latitude=0; Longitude=0
          DataSource=Hypothetical medium to heavy texture soil of sedimentary origin (moderately poorly drained)
          Analysis: same as Test01-BareBare.Sim01-SoilN.Paddock2-HeavySoil.Med-HeavySoil.Analysis
          Water: same as Test01-BareBare.Sim01-SoilN.Paddock2-HeavySoil.Med-HeavySoil.Water
          SoilWater: same as Test01-BareBare.Sim01-SoilN.Paddock2-HeavySoil.Med-HeavySoil.SoilWater
          SoilOrganicMatter: RootCN=30; RootWt=0; SoilCN=12.5; EnrACoeff=7.4; EnrBCoeff=0.2; OCUnits=Total
            Thickness  OC  FBiom  FInert
            150        0   0.035  0.5
            150        0   0.025  0.65
            300        0   0.015  0.835
            300        0   0.01   0.94
            300        0   0.01   0.97
            300        0   0.01   0.996
          Sample Initial nitrogen -> /Simulations/Test02-Bare+NO3/Sim02-SoilN/Paddock1-LightSoil/Med-LightSoil/Initial nitrogen
          InitialWater: FractionFull=1; PercentMethod=EvenlyDistributed; RelativeTo=ll15
        outputfile Results -> /Simulations/Test01-BareBare/Sim01-SoilN/Paddock2-HeavySoil/Results: filename=Sim02-SoilN Paddock2-HeavySoil Results.out; title=Sim02-SoilN Paddock2-HeavySoil Results
          variables -> /Simulations/Test01-BareBare/Sim01-SoilN/Paddock2-HeavySoil/Results/Variables
          events ReportingFrequency -> /Simulations/Test01-BareBare/Sim01-SoilN/Paddock2-HeavySoil/Results/ReportingFrequency
    simulation Sim02-SoilNitrogen -> /Simulations/Test02-Bare+NO3/Sim02-SoilN
      PlugIns: same as Test01-BareBare.Sim01-SoilN.PlugIns
      area Paddock1-LightSoil -> /Simulations/Test02-Bare+NO3/Sim02-SoilN/Paddock1-LightSoil
        outputfile Results -> /Simulations/Test02-Bare+NO3/Sim02-SoilN/Paddock1-LightSoil/Results: filename=Sim02-SoilNitrogen Paddock1-LightSoil Results.out; title=Sim02-SoilNitrogen Paddock1-LightSoil Results
          variables -> /Simulations/Test02-Bare+NO3/Sim02-SoilN/Paddock1-LightSoil/Results/Variables
          events ReportingFrequency -> /Simulations/Test02-Bare+NO3/Sim02-SoilN/Paddock1-LightSoil/Results/ReportingFrequency
      area Paddock2-HeavySoil -> /Simulations/Test02-Bare+NO3/Sim02-SoilN/Paddock2-HeavySoil
        outputfile Results -> /Simulations/Test02-Bare+NO3/Sim02-SoilN/Paddock2-HeavySoil/Results: filename=Sim02-SoilNitrogen Paddock2-HeavySoil Results.out; title=Sim02-SoilNitrogen Paddock2-HeavySoil Results
          variables -> /Simulations/Test02-Bare+NO3/Sim02-SoilN/Paddock2-HeavySoil/Results/Variables
          events ReportingFrequency -> /Simulations/Test02-Bare+NO3/Sim02-SoilN/Paddock2-HeavySoil/Results/ReportingFrequency
  folder Test03-Bare+NH4 -> /Simulations/Test01-BareBare
    memo Info
      ++++++++++++++++++++  TEST 03 +++++++++++++++++++++++++++++++++++++++++++++++++++++++++++

         Description:
            - Artificial climate, smooth mild temperate;
            - Two generic soils, a free draining and a poorly drained;
            - Bare soil;
            - Initial mineral N: 60kgN/ha as NH4;
            - No initial soil organic matter;
            - No initial surface residues;
            - No additions of residues or mineral N;

         Expected output:
            - All outputs with valid values (numeric mostly);
            - Variables involving mineral N should have values,
    simulation Sim03-SoilN -> /Simulations/Test01-BareBare/Sim01-SoilN
      PlugIns: same as Test01-BareBare.Sim01-SoilN.PlugIns
      area Paddock1-LightSoil -> /Simulations/Test01-BareBare/Sim01-SoilN/Paddock1-LightSoil
        surfaceom SurfaceOrganicMatter
          PoolName = Residue1  # Organic Matter pool name
          type = grass  # Organic Matter type
          mass = 0  # Initial surface residue (kg/ha)
          cnr = 20  # C:N ratio of initial residue
          standing_fraction = 0  # Fraction of residue standing
        Soil Med-LightSoil: LocalName=Generic medium-light sedimentary soil; Country=New Zealand; Latitude=0; Longitude=0
          DataSource=Hypothetical medium to light texture soil of sedimentary origin (moderately high drainage)
          Analysis: same as Test01-BareBare.Sim01-SoilN.Paddock1-LightSoil.Med-LightSoil.Analysis
          Water: same as Test01-BareBare.Sim01-SoilN.Paddock1-LightSoil.Med-LightSoil.Water
          SoilWater: same as Test01-BareBare.Sim01-SoilN.Paddock1-LightSoil.Med-LightSoil.SoilWater
          SoilOrganicMatter: RootCN=30; RootWt=0; SoilCN=12.5; EnrACoeff=7.4; EnrBCoeff=0.2; OCUnits=Total
            Thickness  OC  FBiom  FInert
            150        0   0.035  0.4
            150        0   0.025  0.55
            300        0   0.015  0.765
            300        0   0.01   0.9
            300        0   0.01   0.95
            300        0   0.01   0.994
          Sample Initial nitrogen: NO3Units=kgha; NH4Units=kgha; SWUnits=Volumetric; OCUnits=Total; PHUnits=Water
            Thickness  NO3  NH4
            150        0    5
            150        0    5
            300        0    5
            300        0    5
            300        0    5
            300        0    5
          InitialWater: FractionFull=1; PercentMethod=EvenlyDistributed; RelativeTo=ll15
        outputfile Results -> /Simulations/Test01-BareBare/Sim01-SoilN/Paddock1-LightSoil/Results: filename=Sim03-SoilN Paddock1-LightSoil Results.out; title=Sim03-SoilN Paddock1-LightSoil Results
          variables -> /Simulations/Test01-BareBare/Sim01-SoilN/Paddock1-LightSoil/Results/Variables
          events ReportingFrequency -> /Simulations/Test01-BareBare/Sim01-SoilN/Paddock1-LightSoil/Results/ReportingFrequency
      area Paddock2-HeavySoil -> /Simulations/Test01-BareBare/Sim01-SoilN/Paddock2-HeavySoil
        Soil Med-HeavySoil: LocalName=Generic medium-heavy sedimentary soil; Country=New Zealand; Latitude=0; Longitude=0
          DataSource=Hypothetical medium to heavy texture soil of sedimentary origin (moderately poorly drained)
          Analysis: same as Test01-BareBare.Sim01-SoilN.Paddock2-HeavySoil.Med-HeavySoil.Analysis
          Water: same as Test01-BareBare.Sim01-SoilN.Paddock2-HeavySoil.Med-HeavySoil.Water
          SoilWater: same as Test01-BareBare.Sim01-SoilN.Paddock2-HeavySoil.Med-HeavySoil.SoilWater
          SoilOrganicMatter: RootCN=30; RootWt=0; SoilCN=12.5; EnrACoeff=7.4; EnrBCoeff=0.2; OCUnits=Total
            Thickness  OC  FBiom  FInert
            150        0   0.035  0.5
            150        0   0.025  0.65
            300        0   0.015  0.835
            300        0   0.01   0.94
            300        0   0.01   0.97
            300        0   0.01   0.996
          Sample Initial nitrogen -> /Simulations/Test03-Bare+NH4/Sim03-SoilN/Paddock1-LightSoil/Med-LightSoil/Initial nitrogen
          InitialWater: FractionFull=1; PercentMethod=EvenlyDistributed; RelativeTo=ll15
        outputfile Results -> /Simulations/Test01-BareBare/Sim01-SoilN/Paddock2-HeavySoil/Results: filename=Sim03-SoilN Paddock2-HeavySoil Results.out; title=Sim03-SoilN Paddock2-HeavySoil Results
          variables -> /Simulations/Test01-BareBare/Sim01-SoilN/Paddock2-HeavySoil/Results/Variables
          events ReportingFrequency -> /Simulations/Test01-BareBare/Sim01-SoilN/Paddock2-HeavySoil/Results/ReportingFrequency
    simulation Sim03-SoilNitrogen -> /Simulations/Test03-Bare+NH4/Sim03-SoilN
      PlugIns: same as Test01-BareBare.Sim01-SoilN.PlugIns
      area Paddock1-LightSoil -> /Simulations/Test03-Bare+NH4/Sim03-SoilN/Paddock1-LightSoil
        outputfile Results -> /Simulations/Test03-Bare+NH4/Sim03-SoilN/Paddock1-LightSoil/Results: filename=Sim03-SoilNitrogen Paddock1-LightSoil Results.out; title=Sim03-SoilNitrogen Paddock1-LightSoil Results
          variables -> /Simulations/Test03-Bare+NH4/Sim03-SoilN/Paddock1-LightSoil/Results/Variables
          events ReportingFrequency -> /Simulations/Test03-Bare+NH4/Sim03-SoilN/Paddock1-LightSoil/Results/ReportingFrequency
      area Paddock2-HeavySoil -> /Simulations/Test03-Bare+NH4/Sim03-SoilN/Paddock2-HeavySoil
        outputfile Results -> /Simulations/Test03-Bare+NH4/Sim03-SoilN/Paddock2-HeavySoil/Results: filename=Sim03-SoilNitrogen Paddock2-HeavySoil Results.out; title=Sim03-SoilNitrogen Paddock2-HeavySoil Results
          variables -> /Simulations/Test03-Bare+NH4/Sim03-SoilN/Paddock2-HeavySoil/Results/Variables
          events ReportingFrequency -> /Simulations/Test03-Bare+NH4/Sim03-SoilN/Paddock2-HeavySoil/Results/ReportingFrequency
  folder Test04-Bare+Hum -> /Simulations/Test01-BareBare
    memo Info
      ++++++++++++++++++++  TEST 04 +++++++++++++++++++++++++++++++++++++++++++++++++++++++++++

         Description:
            - Artificial climate, smooth mild temperate;
            - Two generic soils, a free draining and a poorly drained;
            - Bare soil;
            - No initial mineral N;
            - Initial sol organic matter composed of only humus (indeed biomass+active humus+inert);
            - No initial surface residues;
            - No additions of residues or mineral N;

         Expected output:
            - All outputs with valid values (numeric mostly);
            - Most variables should show changes;
               . Changes focusing on biomass and humus

      ++++++++++++++++++++  TEST 04 +++++++++++++++++++++++++++++++++++++++++++++++++++++++++++

         Description:
            - Artificial climate, smooth mild temperate;
            - Two generic soils, a free draining and a poorly drained;
            - Bare soil;
            - No initial mineral N;
            - Initial organic matter composed of only humus;
            - No initial surface residues;
            - No additions of residues or mineral N;

         Expected output:
            - All outputs with valid values (numeric mostly);
            - Most values equal to zero, as there is no mineral solutes or organic pools;
            - Soil temperature is simulated by SoilN/SoilNitrogen, so it should show values
               . This is the main output here, the values should be nearly equal for both models;
    simulation Sim04-SoilN -> /Simulations/Test01-BareBare/Sim01-SoilN
      PlugIns: same as Test01-BareBare.Sim01-SoilN.PlugIns
      area Paddock1-LightSoil -> /Simulations/Test01-BareBare/Sim01-SoilN/Paddock1-LightSoil
        surfaceom SurfaceOrganicMatter
          PoolName = Residue1  # Organic Matter pool name
          type = grass  # Organic Matter type
          mass = 0  # Initial surface residue (kg/ha)
          cnr = 20  # C:N ratio of initial residue
          standing_fraction = 0  # Fraction of residue standing
        Soil Med-LightSoil: LocalName=Generic medium-light sedimentary soil; Country=New Zealand; Latitude=0; Longitude=0
          DataSource=Hypothetical medium to light texture soil of sedimentary origin (moderately high drainage)
          Analysis: same as Test01-BareBare.Sim01-SoilN.Paddock1-LightSoil.Med-LightSoil.Analysis
          Water: same as Test01-BareBare.Sim01-SoilN.Paddock1-LightSoil.Med-LightSoil.Water
          SoilWater: same as Test01-BareBare.Sim01-SoilN.Paddock1-LightSoil.Med-LightSoil.SoilWater
          SoilOrganicMatter: RootCN=30; RootWt=0; SoilCN=12.5; EnrACoeff=7.4; EnrBCoeff=0.2; OCUnits=Total
            Thickness  OC    FBiom  FInert
            150        3.5   0.035  0.4
            150        1.5   0.025  0.55
            300        0.5   0.015  0.765
            300        0.25  0.01   0.9
            300        0.1   0.01   0.95
            300        0.1   0.01   0.994
          Sample Initial nitrogen: NO3Units=kgha; NH4Units=kgha; SWUnits=Volumetric; OCUnits=Total; PHUnits=Water
            Thickness  NO3  NH4
            150        0    0
            150        0    0
            300        0    0
            300        0    0
            300        0    0
            300        0    0
          InitialWater: FractionFull=1; PercentMethod=EvenlyDistributed; RelativeTo=ll15
        outputfile Results -> /Simulations/Test01-BareBare/Sim01-SoilN/Paddock1-LightSoil/Results: filename=Sim04-SoilN Paddock1-LightSoil Results.out; title=Sim04-SoilN Paddock1-LightSoil Results
          variables -> /Simulations/Test01-BareBare/Sim01-SoilN/Paddock1-LightSoil/Results/Variables
          events ReportingFrequency -> /Simulations/Test01-BareBare/Sim01-SoilN/Paddock1-LightSoil/Results/ReportingFrequency
      area Paddock2-HeavySoil -> /Simulations/Test01-BareBare/Sim01-SoilN/Paddock2-HeavySoil
        Soil Med-HeavySoil: LocalName=Generic medium-heavy sedimentary soil; Country=New Zealand; Latitude=0; Longitude=0
          DataSource=Hypothetical medium to heavy texture soil of sedimentary origin (moderately poorly drained)
          Analysis: same as Test01-BareBare.Sim01-SoilN.Paddock2-HeavySoil.Med-HeavySoil.Analysis
          Water: same as Test01-BareBare.Sim01-SoilN.Paddock2-HeavySoil.Med-HeavySoil.Water
          SoilWater: same as Test01-BareBare.Sim01-SoilN.Paddock2-HeavySoil.Med-HeavySoil.SoilWater
          SoilOrganicMatter: RootCN=30; RootWt=0; SoilCN=12.5; EnrACoeff=7.4; EnrBCoeff=0.2; OCUnits=Total
            Thickness  OC    FBiom  FInert
            150        3.5   0.035  0.5
            150        1.5   0.025  0.65
            300        0.5   0.015  0.835
            300        0.25  0.01   0.94
            300        0.1   0.01   0.97
            300        0.1   0.01   0.996
          Sample Initial nitrogen -> /Simulations/Test04-Bare+Hum/Sim04-SoilN/Paddock1-LightSoil/Med-LightSoil/Initial nitrogen
          InitialWater: FractionFull=1; PercentMethod=EvenlyDistributed; RelativeTo=ll15
        outputfile Results -> /Simulations/Test01-BareBare/Sim01-SoilN/Paddock2-HeavySoil/Results: filename=Sim04-SoilN Paddock2-HeavySoil Results.out; title=Sim04-SoilN Paddock2-HeavySoil Results
          variables -> /Simulations/Test01-BareBare/Sim01-SoilN/Paddock2-HeavySoil/Results/Variables
          events ReportingFrequency -> /Simulations/Test01-BareBare/Sim01-SoilN/Paddock2-HeavySoil/Results/ReportingFrequency
    simulation Sim04-SoilNitrogen -> /Simulations/Test04-Bare+Hum/Sim04-SoilN
      PlugIns: same as Test01-BareBare.Sim01-SoilN.PlugIns
      area Paddock1-LightSoil -> /Simulations/Test04-Bare+Hum/Sim04-SoilN/Paddock1-LightSoil
        outputfile Results -> /Simulations/Test04-Bare+Hum/Sim04-SoilN/Paddock1-LightSoil/Results: filename=Sim04-SoilNitrogen Paddock1-LightSoil Results.out; title=Sim04-SoilNitrogen Paddock1-LightSoil Results
          variables -> /Simulations/Test04-Bare+Hum/Sim04-SoilN/Paddock1-LightSoil/Results/Variables
          events ReportingFrequency -> /Simulations/Test04-Bare+Hum/Sim04-SoilN/Paddock1-LightSoil/Results/ReportingFrequency
      area Paddock2-HeavySoil -> /Simulations/Test04-Bare+Hum/Sim04-SoilN/Paddock2-HeavySoil
        outputfile Results -> /Simulations/Test04-Bare+Hum/Sim04-SoilN/Paddock2-HeavySoil/Results: filename=Sim04-SoilNitrogen Paddock2-HeavySoil Results.out; title=Sim04-SoilNitrogen Paddock2-HeavySoil Results
          variables -> /Simulations/Test04-Bare+Hum/Sim04-SoilN/Paddock2-HeavySoil/Results/Variables
          events ReportingFrequency -> /Simulations/Test04-Bare+Hum/Sim04-SoilN/Paddock2-HeavySoil/Results/ReportingFrequency
  folder Test05-Bare+FOM -> /Simulations/Test01-BareBare
    memo Info
      ++++++++++++++++++++  TEST 05 +++++++++++++++++++++++++++++++++++++++++++++++++++++++++++

         Description:
            - Artificial climate, smooth mild temperate;
            - Two generic soils, a free draining and a poorly drained;
            - Bare soil;
            - No initial mineral N;
            - Initial soil organic matter composed of only FOM;
            - No initial surface residues;
            - No additions of residues or mineral N;

         Expected output:
            - All outputs with valid values (numeric mostly);
            - Most values equal to zero, as there are no mineral solutes or organic pools;
    simulation Sim05-SoilN -> /Simulations/Test01-BareBare/Sim01-SoilN
      PlugIns: same as Test01-BareBare.Sim01-SoilN.PlugIns
      area Paddock1-LightSoil -> /Simulations/Test01-BareBare/Sim01-SoilN/Paddock1-LightSoil
        surfaceom SurfaceOrganicMatter
          PoolName = Residue1  # Organic Matter pool name
          type = grass  # Organic Matter type
          mass = 0  # Initial surface residue (kg/ha)
          cnr = 20  # C:N ratio of initial residue
          standing_fraction = 0  # Fraction of residue standing
        Soil Med-LightSoil: LocalName=Generic medium-light sedimentary soil; Country=New Zealand; Latitude=0; Longitude=0
          DataSource=Hypothetical medium to light texture soil of sedimentary origin (moderately high drainage)
          Analysis: same as Test01-BareBare.Sim01-SoilN.Paddock1-LightSoil.Med-LightSoil.Analysis
          Water: same as Test01-BareBare.Sim01-SoilN.Paddock1-LightSoil.Med-LightSoil.Water
          SoilWater: same as Test01-BareBare.Sim01-SoilN.Paddock1-LightSoil.Med-LightSoil.SoilWater
          SoilOrganicMatter: RootCN=30; RootWt=1000; SoilCN=12.5; EnrACoeff=7.4; EnrBCoeff=0.2; OCUnits=Total
            Thickness  OC  FBiom  FInert
            150        0   0.035  0.4
            150        0   0.025  0.55
            300        0   0.015  0.765
            300        0   0.01   0.9
            300        0   0.01   0.95
            300        0   0.01   0.994
          Sample Initial nitrogen: NO3Units=kgha; NH4Units=kgha; SWUnits=Volumetric; OCUnits=Total; PHUnits=Water
            Thickness  NO3  NH4
            150        0    0
            150        0    0
            300        0    0
            300        0    0
            300        0    0
            300        0    0
          InitialWater: FractionFull=1; PercentMethod=EvenlyDistributed; RelativeTo=ll15
        outputfile Results -> /Simulations/Test01-BareBare/Sim01-SoilN/Paddock1-LightSoil/Results: filename=Sim05-SoilN Paddock1-LightSoil Results.out; title=Sim05-SoilN Paddock1-LightSoil Results
          variables -> /Simulations/Test01-BareBare/Sim01-SoilN/Paddock1-LightSoil/Results/Variables
          events ReportingFrequency -> /Simulations/Test01-BareBare/Sim01-SoilN/Paddock1-LightSoil/Results/ReportingFrequency
      area Paddock2-HeavySoil -> /Simulations/Test01-BareBare/Sim01-SoilN/Paddock2-HeavySoil
        Soil Med-HeavySoil: LocalName=Generic medium-heavy sedimentary soil; Country=New Zealand; Latitude=0; Longitude=0
          DataSource=Hypothetical medium to heavy texture soil of sedimentary origin (moderately poorly drained)
          Analysis: same as Test01-BareBare.Sim01-SoilN.Paddock2-HeavySoil.Med-HeavySoil.Analysis
          Water: same as Test01-BareBare.Sim01-SoilN.Paddock2-HeavySoil.Med-HeavySoil.Water
          SoilWater: same as Test01-BareBare.Sim01-SoilN.Paddock2-HeavySoil.Med-HeavySoil.SoilWater
          SoilOrganicMatter: RootCN=30; RootWt=1000; SoilCN=12.5; EnrACoeff=7.4; EnrBCoeff=0.2; OCUnits=Total
            Thickness  OC  FBiom  FInert
            150        0   0.035  0.5
            150        0   0.025  0.65
            300        0   0.015  0.835
            300        0   0.01   0.94
            300        0   0.01   0.97
            300        0   0.01   0.996
          Sample Initial nitrogen -> /Simulations/Test05-Bare+FOM/Sim05-SoilN/Paddock1-LightSoil/Med-LightSoil/Initial nitrogen
          InitialWater: FractionFull=1; PercentMethod=EvenlyDistributed; RelativeTo=ll15
        outputfile Results -> /Simulations/Test01-BareBare/Sim01-SoilN/Paddock2-HeavySoil/Results: filename=Sim05-SoilN Paddock2-HeavySoil Results.out; title=Sim05-SoilN Paddock2-HeavySoil Results
          variables -> /Simulations/Test01-BareBare/Sim01-SoilN/Paddock2-HeavySoil/Results/Variables
          events ReportingFrequency -> /Simulations/Test01-BareBare/Sim01-SoilN/Paddock2-HeavySoil/Results/ReportingFrequency
    simulation Sim05-SoilNitrogen -> /Simulations/Test05-Bare+FOM/Sim05-SoilN
      PlugIns: same as Test01-BareBare.Sim01-SoilN.PlugIns
      area Paddock1-LightSoil -> /Simulations/Test05-Bare+FOM/Sim05-SoilN/Paddock1-LightSoil
        outputfile Results -> /Simulations/Test05-Bare+FOM/Sim05-SoilN/Paddock1-LightSoil/Results: filename=Sim05-SoilNitrogen Paddock1-LightSoil Results.out; title=Sim05-SoilNitrogen Paddock1-LightSoil Results
          variables -> /Simulations/Test05-Bare+FOM/Sim05-SoilN/Paddock1-LightSoil/Results/Variables
          events ReportingFrequency -> /Simulations/Test05-Bare+FOM/Sim05-SoilN/Paddock1-LightSoil/Results/ReportingFrequency
      area Paddock2-HeavySoil -> /Simulations/Test05-Bare+FOM/Sim05-SoilN/Paddock2-HeavySoil
        outputfile Results -> /Simulations/Test05-Bare+FOM/Sim05-SoilN/Paddock2-HeavySoil/Results: filename=Sim05-SoilNitrogen Paddock2-HeavySoil Results.out; title=Sim05-SoilNitrogen Paddock2-HeavySoil Results
          variables -> /Simulations/Test05-Bare+FOM/Sim05-SoilN/Paddock2-HeavySoil/Results/Variables
          events ReportingFrequency -> /Simulations/Test05-Bare+FOM/Sim05-SoilN/Paddock2-HeavySoil/Results/ReportingFrequency
  folder Test06-Bare+SurfOM -> /Simulations/Test01-BareBare
    memo Info
      ++++++++++++++++++++  TEST 06 +++++++++++++++++++++++++++++++++++++++++++++++++++++++++++

         Description:
            - Artificial climate, smooth mild temperate;
            - Two generic soils, a free draining and a poorly drained;
            - Bare soil;
            - No initial mineral N;
            - No initial soil organic matter;
            - Initial surface residues set to 1000kgDM/ha;
            - No additions of residues or mineral N;

         Expected output:
            - All outputs with valid values (numeric mostly);
            - Most values close to zero, as only decomposition will add stuff to mineral solutes and organic pools;
    simulation Sim06-SoilN -> /Simulations/Test01-BareBare/Sim01-SoilN
      PlugIns: same as Test01-BareBare.Sim01-SoilN.PlugIns
      area Paddock1-LightSoil -> /Simulations/Test01-BareBare/Sim01-SoilN/Paddock1-LightSoil
        surfaceom SurfaceOrganicMatter
          PoolName = Residue1  # Organic Matter pool name
          type = grass  # Organic Matter type
          mass = 1000  # Initial surface residue (kg/ha)
          cnr = 20  # C:N ratio of initial residue
          standing_fraction = 0  # Fraction of residue standing
        Soil Med-LightSoil: same as Test01-BareBare.Sim01-SoilN.Paddock1-LightSoil.Med-LightSoil
        outputfile Results -> /Simulations/Test01-BareBare/Sim01-SoilN/Paddock1-LightSoil/Results: filename=Sim06-SoilN Paddock1-LightSoil Results.out; title=Sim06-SoilN Paddock1-LightSoil Results
          variables -> /Simulations/Test01-BareBare/Sim01-SoilN/Paddock1-LightSoil/Results/Variables
          events ReportingFrequency -> /Simulations/Test01-BareBare/Sim01-SoilN/Paddock1-LightSoil/Results/ReportingFrequency
      area Paddock2-HeavySoil -> /Simulations/Test01-BareBare/Sim01-SoilN/Paddock2-HeavySoil
        Soil Med-HeavySoil: LocalName=Generic medium-heavy sedimentary soil; Country=New Zealand; Latitude=0; Longitude=0
          DataSource=Hypothetical medium to heavy texture soil of sedimentary origin (moderately poorly drained)
          Analysis: same as Test01-BareBare.Sim01-SoilN.Paddock2-HeavySoil.Med-HeavySoil.Analysis
          Water: same as Test01-BareBare.Sim01-SoilN.Paddock2-HeavySoil.Med-HeavySoil.Water
          SoilWater: same as Test01-BareBare.Sim01-SoilN.Paddock2-HeavySoil.Med-HeavySoil.SoilWater
          SoilOrganicMatter: RootCN=30; RootWt=0; SoilCN=12.5; EnrACoeff=7.4; EnrBCoeff=0.2; OCUnits=Total
            Thickness  OC  FBiom  FInert
            150        0   0.035  0.5
            150        0   0.025  0.65
            300        0   0.015  0.835
            300        0   0.01   0.94
            300        0   0.01   0.97
            300        0   0.01   0.996
          Sample Initial nitrogen -> /Simulations/Test06-Bare+SurfOM/Sim06-SoilN/Paddock1-LightSoil/Med-LightSoil/Initial nitrogen
          InitialWater: FractionFull=1; PercentMethod=EvenlyDistributed; RelativeTo=ll15
        outputfile Results -> /Simulations/Test01-BareBare/Sim01-SoilN/Paddock2-HeavySoil/Results: filename=Sim06-SoilN Paddock2-HeavySoil Results.out; title=Sim06-SoilN Paddock2-HeavySoil Results
          variables -> /Simulations/Test01-BareBare/Sim01-SoilN/Paddock2-HeavySoil/Results/Variables
          events ReportingFrequency -> /Simulations/Test01-BareBare/Sim01-SoilN/Paddock2-HeavySoil/Results/ReportingFrequency
    simulation Sim06-SoilNitrogen -> /Simulations/Test06-Bare+SurfOM/Sim06-SoilN
      PlugIns: same as Test01-BareBare.Sim01-SoilN.PlugIns
      area Paddock1-LightSoil -> /Simulations/Test06-Bare+SurfOM/Sim06-SoilN/Paddock1-LightSoil
        outputfile Results -> /Simulations/Test06-Bare+SurfOM/Sim06-SoilN/Paddock1-LightSoil/Results: filename=Sim06-SoilNitrogen Paddock1-LightSoil Results.out; title=Sim06-SoilNitrogen Paddock1-LightSoil Results
          variables -> /Simulations/Test06-Bare+SurfOM/Sim06-SoilN/Paddock1-LightSoil/Results/Variables
          events ReportingFrequency -> /Simulations/Test06-Bare+SurfOM/Sim06-SoilN/Paddock1-LightSoil/Results/ReportingFrequency
      area Paddock2-HeavySoil -> /Simulations/Test06-Bare+SurfOM/Sim06-SoilN/Paddock2-HeavySoil
        outputfile Results -> /Simulations/Test06-Bare+SurfOM/Sim06-SoilN/Paddock2-HeavySoil/Results: filename=Sim06-SoilNitrogen Paddock2-HeavySoil Results.out; title=Sim06-SoilNitrogen Paddock2-HeavySoil Results
          variables -> /Simulations/Test06-Bare+SurfOM/Sim06-SoilN/Paddock2-HeavySoil/Results/Variables
          events ReportingFrequency -> /Simulations/Test06-Bare+SurfOM/Sim06-SoilN/Paddock2-HeavySoil/Results/ReportingFrequency
  folder Test07-Bare+addUrea -> /Simulations/Test01-BareBare
    memo Info
      ++++++++++++++++++++  TEST 07 +++++++++++++++++++++++++++++++++++++++++++++++++++++++++++

         Description:
            - Artificial climate, smooth mild temperate;
            - Two generic soils, a free draining and a poorly drained;
            - Bare soil;
            - No initial mineral N;
            - No initial soil organic matter;
            - No initial surface residues;
            - No additions of residues;
            - Adding 50kgN/ha as urea in two events;

         Expected output:
            - All outputs with valid values (numeric mostly);
            - Most values equal to zero, as there are no organic pools;
            - Mineral solutes will have values as urea hydrolysis still happens;
    simulation Sim07-SoilN -> /Simulations/Test01-BareBare/Sim01-SoilN
      PlugIns: same as Test01-BareBare.Sim01-SoilN.PlugIns
      area Paddock1-LightSoil -> /Simulations/Test01-BareBare/Sim01-SoilN/Paddock1-LightSoil
        folder ManagerFolder -> /Simulations/Test01-BareBare/Sim01-SoilN/Paddock1-LightSoil/ManagerFolder
          operations OperationsSchedule
            5-Aug  Fertiliser apply amount=50 (kg/ha), depth=100 (mm), type=urea_n
            5-Oct  Fertiliser apply amount=50 (kg/ha), depth=200 (mm), type=urea_n
        surfaceom SurfaceOrganicMatter
          PoolName = Residue1  # Organic Matter pool name
          type = grass  # Organic Matter type
          mass = 0  # Initial surface residue (kg/ha)
          cnr = 20  # C:N ratio of initial residue
          standing_fraction = 0  # Fraction of residue standing
        Soil Med-LightSoil: same as Test01-BareBare.Sim01-SoilN.Paddock1-LightSoil.Med-LightSoil
        outputfile Results -> /Simulations/Test01-BareBare/Sim01-SoilN/Paddock1-LightSoil/Results: filename=Sim07-SoilN Paddock1-LightSoil Results.out; title=Sim07-SoilN Paddock1-LightSoil Results
          variables -> /Simulations/Test01-BareBare/Sim01-SoilN/Paddock1-LightSoil/Results/Variables
          events ReportingFrequency -> /Simulations/Test01-BareBare/Sim01-SoilN/Paddock1-LightSoil/Results/ReportingFrequency
      area Paddock2-HeavySoil -> /Simulations/Test01-BareBare/Sim01-SoilN/Paddock2-HeavySoil
        Soil Med-HeavySoil: LocalName=Generic medium-heavy sedimentary soil; Country=New Zealand; Latitude=0; Longitude=0
          DataSource=Hypothetical medium to heavy texture soil of sedimentary origin (moderately poorly drained)
          Analysis: same as Test01-BareBare.Sim01-SoilN.Paddock2-HeavySoil.Med-HeavySoil.Analysis
          Water: same as Test01-BareBare.Sim01-SoilN.Paddock2-HeavySoil.Med-HeavySoil.Water
          SoilWater: same as Test01-BareBare.Sim01-SoilN.Paddock2-HeavySoil.Med-HeavySoil.SoilWater
          SoilOrganicMatter: RootCN=30; RootWt=0; SoilCN=12.5; EnrACoeff=7.4; EnrBCoeff=0.2; OCUnits=Total
            Thickness  OC  FBiom  FInert
            150        0   0.035  0.5
            150        0   0.025  0.65
            300        0   0.015  0.835
            300        0   0.01   0.94
            300        0   0.01   0.97
            300        0   0.01   0.996
          Sample Initial nitrogen -> /Simulations/Test07-Bare+addUrea/Sim07-SoilN/Paddock1-LightSoil/Med-LightSoil/Initial nitrogen
          InitialWater: FractionFull=1; PercentMethod=EvenlyDistributed; RelativeTo=ll15
        outputfile Results -> /Simulations/Test01-BareBare/Sim01-SoilN/Paddock2-HeavySoil/Results: filename=Sim07-SoilN Paddock2-HeavySoil Results.out; title=Sim07-SoilN Paddock2-HeavySoil Results
          variables -> /Simulations/Test01-BareBare/Sim01-SoilN/Paddock2-HeavySoil/Results/Variables
          events ReportingFrequency -> /Simulations/Test01-BareBare/Sim01-SoilN/Paddock2-HeavySoil/Results/ReportingFrequency
    simulation Sim07-SoilNitrogen -> /Simulations/Test07-Bare+addUrea/Sim07-SoilN
      PlugIns: same as Test01-BareBare.Sim01-SoilN.PlugIns
      area Paddock1-LightSoil -> /Simulations/Test07-Bare+addUrea/Sim07-SoilN/Paddock1-LightSoil
        outputfile Results -> /Simulations/Test07-Bare+addUrea/Sim07-SoilN/Paddock1-LightSoil/Results: filename=Sim07-SoilNitrogen Paddock1-LightSoil Results.out; title=Sim07-SoilNitrogen Paddock1-LightSoil Results
          variables -> /Simulations/Test07-Bare+addUrea/Sim07-SoilN/Paddock1-LightSoil/Results/Variables
          events ReportingFrequency -> /Simulations/Test07-Bare+addUrea/Sim07-SoilN/Paddock1-LightSoil/Results/ReportingFrequency
      area Paddock2-HeavySoil -> /Simulations/Test07-Bare+addUrea/Sim07-SoilN/Paddock2-HeavySoil
        outputfile Results -> /Simulations/Test07-Bare+addUrea/Sim07-SoilN/Paddock2-HeavySoil/Results: filename=Sim07-SoilNitrogen Paddock2-HeavySoil Results.out; title=Sim07-SoilNitrogen Paddock2-HeavySoil Results
          variables -> /Simulations/Test07-Bare+addUrea/Sim07-SoilN/Paddock2-HeavySoil/Results/Variables
          events ReportingFrequency -> /Simulations/Test07-Bare+addUrea/Sim07-SoilN/Paddock2-HeavySoil/Results/ReportingFrequency
  folder Test08-Bare+MinN -> /Simulations/Test01-BareBare
    memo Info
      ++++++++++++++++++++  TEST 08 +++++++++++++++++++++++++++++++++++++++++++++++++++++++++++

         Description:
            - Artificial climate, smooth mild temperate;
            - Two generic soils, a free draining and a poorly drained;
            - Bare soil;
            - Initial mineral N: 30kgN/ha as NO3 + 30kgN/ha as NH4;
            - No initial soil organic matter;
            - No initial surface residues;
            - No additions of residues or mineral N;

         Expected output:
            - All outputs with valid values (numeric mostly);
            - Values of organic pool variables equal to zero;
            - Mineral solutes with values and NH4 coverting into NO3;
    simulation Sim08-SoilN -> /Simulations/Test01-BareBare/Sim01-SoilN
      PlugIns: same as Test01-BareBare.Sim01-SoilN.PlugIns
      area Paddock1-LightSoil -> /Simulations/Test01-BareBare/Sim01-SoilN/Paddock1-LightSoil
        surfaceom SurfaceOrganicMatter
          PoolName = Residue1  # Organic Matter pool name
          type = grass  # Organic Matter type
          mass = 0  # Initial surface residue (kg/ha)
          cnr = 20  # C:N ratio of initial residue
          standing_fraction = 0  # Fraction of residue standing
        Soil Med-LightSoil: LocalName=Generic medium-light sedimentary soil; Country=New Zealand; Latitude=0; Longitude=0
          DataSource=Hypothetical medium to light texture soil of sedimentary origin (moderately high drainage)
          Analysis: same as Test01-BareBare.Sim01-SoilN.Paddock1-LightSoil.Med-LightSoil.Analysis
          Water: same as Test01-BareBare.Sim01-SoilN.Paddock1-LightSoil.Med-LightSoil.Water
          SoilWater: same as Test01-BareBare.Sim01-SoilN.Paddock1-LightSoil.Med-LightSoil.SoilWater
          SoilOrganicMatter: RootCN=30; RootWt=0; SoilCN=12.5; EnrACoeff=7.4; EnrBCoeff=0.2; OCUnits=Total
            Thickness  OC  FBiom  FInert
            150        0   0.035  0.4
            150        0   0.025  0.55
            300        0   0.015  0.765
            300        0   0.01   0.9
            300        0   0.01   0.95
            300        0   0.01   0.994
          Sample Initial nitrogen: NO3Units=kgha; NH4Units=kgha; SWUnits=Volumetric; OCUnits=Total; PHUnits=Water
            Thickness  NO3  NH4
            150        5    5
            150        5    5
            300        5    5
            300        5    5
            300        5    5
            300        5    5
          InitialWater: FractionFull=1; PercentMethod=EvenlyDistributed; RelativeTo=ll15
        outputfile Results -> /Simulations/Test01-BareBare/Sim01-SoilN/Paddock1-LightSoil/Results: filename=Sim08-SoilN Paddock1-LightSoil Results.out; title=Sim08-SoilN Paddock1-LightSoil Results
          variables -> /Simulations/Test01-BareBare/Sim01-SoilN/Paddock1-LightSoil/Results/Variables
          events ReportingFrequency -> /Simulations/Test01-BareBare/Sim01-SoilN/Paddock1-LightSoil/Results/ReportingFrequency
      area Paddock2-HeavySoil -> /Simulations/Test01-BareBare/Sim01-SoilN/Paddock2-HeavySoil
        Soil Med-HeavySoil: LocalName=Generic medium-heavy sedimentary soil; Country=New Zealand; Latitude=0; Longitude=0
          DataSource=Hypothetical medium to heavy texture soil of sedimentary origin (moderately poorly drained)
          Analysis: same as Test01-BareBare.Sim01-SoilN.Paddock2-HeavySoil.Med-HeavySoil.Analysis
          Water: same as Test01-BareBare.Sim01-SoilN.Paddock2-HeavySoil.Med-HeavySoil.Water
          SoilWater: same as Test01-BareBare.Sim01-SoilN.Paddock2-HeavySoil.Med-HeavySoil.SoilWater
          SoilOrganicMatter: RootCN=30; RootWt=0; SoilCN=12.5; EnrACoeff=7.4; EnrBCoeff=0.2; OCUnits=Total
            Thickness  OC  FBiom  FInert
            150        0   0.035  0.5
            150        0   0.025  0.65
            300        0   0.015  0.835
            300        0   0.01   0.94
            300        0   0.01   0.97
            300        0   0.01   0.996
          Sample Initial nitrogen -> /Simulations/Test08-Bare+MinN/Sim08-SoilN/Paddock1-LightSoil/Med-LightSoil/Initial nitrogen
          InitialWater: FractionFull=1; PercentMethod=EvenlyDistributed; RelativeTo=ll15
        outputfile Results -> /Simulations/Test01-BareBare/Sim01-SoilN/Paddock2-HeavySoil/Results: filename=Sim08-SoilN Paddock2-HeavySoil Results.out; title=Sim08-SoilN Paddock2-HeavySoil Results
          variables -> /Simulations/Test01-BareBare/Sim01-SoilN/Paddock2-HeavySoil/Results/Variables
          events ReportingFrequency -> /Simulations/Test01-BareBare/Sim01-SoilN/Paddock2-HeavySoil/Results/ReportingFrequency
    simulation Sim08-SoilNitrogen -> /Simulations/Test08-Bare+MinN/Sim08-SoilN
      PlugIns: same as Test01-BareBare.Sim01-SoilN.PlugIns
      area Paddock1-LightSoil -> /Simulations/Test08-Bare+MinN/Sim08-SoilN/Paddock1-LightSoil
        outputfile Results -> /Simulations/Test08-Bare+MinN/Sim08-SoilN/Paddock1-LightSoil/Results: filename=Sim08-SoilNitrogen Paddock1-LightSoil Results.out; title=Sim08-SoilNitrogen Paddock1-LightSoil Results
          variables -> /Simulations/Test08-Bare+MinN/Sim08-SoilN/Paddock1-LightSoil/Results/Variables
          events ReportingFrequency -> /Simulations/Test08-Bare+MinN/Sim08-SoilN/Paddock1-LightSoil/Results/ReportingFrequency
      area Paddock2-HeavySoil -> /Simulations/Test08-Bare+MinN/Sim08-SoilN/Paddock2-HeavySoil
        outputfile Results -> /Simulations/Test08-Bare+MinN/Sim08-SoilN/Paddock2-HeavySoil/Results: filename=Sim08-SoilNitrogen Paddock2-HeavySoil Results.out; title=Sim08-SoilNitrogen Paddock2-HeavySoil Results
          variables -> /Simulations/Test08-Bare+MinN/Sim08-SoilN/Paddock2-HeavySoil/Results/Variables
          events ReportingFrequency -> /Simulations/Test08-Bare+MinN/Sim08-SoilN/Paddock2-HeavySoil/Results/ReportingFrequency
  folder Test09-Bare+OrgN -> /Simulations/Test01-BareBare
    memo Info
      ++++++++++++++++++++  TEST 09 +++++++++++++++++++++++++++++++++++++++++++++++++++++++++++

         Description:
            - Artificial climate, smooth mild temperate;
            - Two generic soils, a free draining and a poorly drained;
            - Bare soil;
            - No initial mineral N;
            - Initial organic matter composed of humus + FOM;
            - No initial surface residues;
            - No additions of residues or mineral N;

         Expected output:
            - All outputs with valid values (numeric mostly);
            - All soil variables with values different from zero, slow decomposition as there is no mineral N forms initially;
    simulation Sim09-SoilN -> /Simulations/Test01-BareBare/Sim01-SoilN
      PlugIns: same as Test01-BareBare.Sim01-SoilN.PlugIns
      area Paddock1-LightSoil -> /Simulations/Test01-BareBare/Sim01-SoilN/Paddock1-LightSoil
        surfaceom SurfaceOrganicMatter
          PoolName = Residue1  # Organic Matter pool name
          type = grass  # Organic Matter type
          mass = 0  # Initial surface residue (kg/ha)
          cnr = 20  # C:N ratio of initial residue
          standing_fraction = 0  # Fraction of residue standing
        Soil Med-LightSoil: LocalName=Generic medium-light sedimentary soil; Country=New Zealand; Latitude=0; Longitude=0
          DataSource=Hypothetical medium to light texture soil of sedimentary origin (moderately high drainage)
          Analysis: same as Test01-BareBare.Sim01-SoilN.Paddock1-LightSoil.Med-LightSoil.Analysis
          Water: same as Test01-BareBare.Sim01-SoilN.Paddock1-LightSoil.Med-LightSoil.Water
          SoilWater: same as Test01-BareBare.Sim01-SoilN.Paddock1-LightSoil.Med-LightSoil.SoilWater
          SoilOrganicMatter: RootCN=30; RootWt=1000; SoilCN=12.5; EnrACoeff=7.4; EnrBCoeff=0.2; OCUnits=Total
            Thickness  OC    FBiom  FInert
            150        3.5   0.035  0.4
            150        1.5   0.025  0.55
            300        0.5   0.015  0.765
            300        0.25  0.01   0.9
            300        0.1   0.01   0.95
            300        0.1   0.01   0.994
          Sample Initial nitrogen: NO3Units=kgha; NH4Units=kgha; SWUnits=Volumetric; OCUnits=Total; PHUnits=Water
            Thickness  NO3  NH4
            150        0    0
            150        0    0
            300        0    0
            300        0    0
            300        0    0
            300        0    0
          InitialWater: FractionFull=1; PercentMethod=EvenlyDistributed; RelativeTo=ll15
        outputfile Results -> /Simulations/Test01-BareBare/Sim01-SoilN/Paddock1-LightSoil/Results: filename=Sim09-SoilN Paddock1-LightSoil Results.out; title=Sim09-SoilN Paddock1-LightSoil Results
          variables -> /Simulations/Test01-BareBare/Sim01-SoilN/Paddock1-LightSoil/Results/Variables
          events ReportingFrequency -> /Simulations/Test01-BareBare/Sim01-SoilN/Paddock1-LightSoil/Results/ReportingFrequency
      area Paddock2-HeavySoil -> /Simulations/Test01-BareBare/Sim01-SoilN/Paddock2-HeavySoil
        Soil Med-HeavySoil: LocalName=Generic medium-heavy sedimentary soil; Country=New Zealand; Latitude=0; Longitude=0
          DataSource=Hypothetical medium to heavy texture soil of sedimentary origin (moderately poorly drained)
          Analysis: same as Test01-BareBare.Sim01-SoilN.Paddock2-HeavySoil.Med-HeavySoil.Analysis
          Water: same as Test01-BareBare.Sim01-SoilN.Paddock2-HeavySoil.Med-HeavySoil.Water
          SoilWater: same as Test01-BareBare.Sim01-SoilN.Paddock2-HeavySoil.Med-HeavySoil.SoilWater
          SoilOrganicMatter: RootCN=30; RootWt=1000; SoilCN=12.5; EnrACoeff=7.4; EnrBCoeff=0.2; OCUnits=Total
            Thickness  OC    FBiom  FInert
            150        3.5   0.035  0.5
            150        1.5   0.025  0.65
            300        0.5   0.015  0.835
            300        0.25  0.01   0.94
            300        0.1   0.01   0.97
            300        0.1   0.01   0.996
          Sample Initial nitrogen -> /Simulations/Test09-Bare+OrgN/Sim09-SoilN/Paddock1-LightSoil/Med-LightSoil/Initial nitrogen
          InitialWater: FractionFull=1; PercentMethod=EvenlyDistributed; RelativeTo=ll15
        outputfile Results -> /Simulations/Test01-BareBare/Sim01-SoilN/Paddock2-HeavySoil/Results: filename=Sim09-SoilN Paddock2-HeavySoil Results.out; title=Sim09-SoilN Paddock2-HeavySoil Results
          variables -> /Simulations/Test01-BareBare/Sim01-SoilN/Paddock2-HeavySoil/Results/Variables
          events ReportingFrequency -> /Simulations/Test01-BareBare/Sim01-SoilN/Paddock2-HeavySoil/Results/ReportingFrequency
    simulation Sim09-SoilNitrogen -> /Simulations/Test09-Bare+OrgN/Sim09-SoilN
      PlugIns: same as Test01-BareBare.Sim01-SoilN.PlugIns
      area Paddock1-LightSoil -> /Simulations/Test09-Bare+OrgN/Sim09-SoilN/Paddock1-LightSoil
        outputfile Results -> /Simulations/Test09-Bare+OrgN/Sim09-SoilN/Paddock1-LightSoil/Results: filename=Sim09-SoilNitrogen Paddock1-LightSoil Results.out; title=Sim09-SoilNitrogen Paddock1-LightSoil Results
          variables -> /Simulations/Test09-Bare+OrgN/Sim09-SoilN/Paddock1-LightSoil/Results/Variables
          events ReportingFrequency -> /Simulations/Test09-Bare+OrgN/Sim09-SoilN/Paddock1-LightSoil/Results/ReportingFrequency
      area Paddock2-HeavySoil -> /Simulations/Test09-Bare+OrgN/Sim09-SoilN/Paddock2-HeavySoil
        outputfile Results -> /Simulations/Test09-Bare+OrgN/Sim09-SoilN/Paddock2-HeavySoil/Results: filename=Sim09-SoilNitrogen Paddock2-HeavySoil Results.out; title=Sim09-SoilNitrogen Paddock2-HeavySoil Results
          variables -> /Simulations/Test09-Bare+OrgN/Sim09-SoilN/Paddock2-HeavySoil/Results/Variables
          events ReportingFrequency -> /Simulations/Test09-Bare+OrgN/Sim09-SoilN/Paddock2-HeavySoil/Results/ReportingFrequency
  folder Test10-Bare+Hum+NO3 -> /Simulations/Test01-BareBare
    memo Info
      ++++++++++++++++++++  TEST 10 +++++++++++++++++++++++++++++++++++++++++++++++++++++++++++

         Description:
            - Artificial climate, smooth mild temperate;
            - Two generic soils, a free draining and a poorly drained;
            - Bare soil;
            - Initial mineral N: 60kgN/ha as NO3;
            - Initial sol organic matter as humus only;
            - No initial surface residues;
            - No additions of residues or mineral N;

         Expected output:
            - All outputs with valid values (numeric mostly);
            - Values for organic pools should be the same as Test04 as mineral N does not interact with them;
    simulation Sim10-SoilN -> /Simulations/Test01-BareBare/Sim01-SoilN
      PlugIns: same as Test01-BareBare.Sim01-SoilN.PlugIns
      area Paddock1-LightSoil -> /Simulations/Test01-BareBare/Sim01-SoilN/Paddock1-LightSoil
        surfaceom SurfaceOrganicMatter
          PoolName = Residue1  # Organic Matter pool name
          type = grass  # Organic Matter type
          mass = 0  # Initial surface residue (kg/ha)
          cnr = 20  # C:N ratio of initial residue
          standing_fraction = 0  # Fraction of residue standing
        Soil Med-LightSoil: LocalName=Generic medium-light sedimentary soil; Country=New Zealand; Latitude=0; Longitude=0
          DataSource=Hypothetical medium to light texture soil of sedimentary origin (moderately high drainage)
          Analysis: same as Test01-BareBare.Sim01-SoilN.Paddock1-LightSoil.Med-LightSoil.Analysis
          Water: same as Test01-BareBare.Sim01-SoilN.Paddock1-LightSoil.Med-LightSoil.Water
          SoilWater: same as Test01-BareBare.Sim01-SoilN.Paddock1-LightSoil.Med-LightSoil.SoilWater
          SoilOrganicMatter: same as Test04-Bare+Hum.Sim04-SoilN.Paddock1-LightSoil.Med-LightSoil.SoilOrganicMatter
          Sample Initial nitrogen: NO3Units=kgha; NH4Units=kgha; SWUnits=Volumetric; OCUnits=Total; PHUnits=Water
            Thickness  NO3  NH4
            150        5    0
            150        5    0
            300        5    0
            300        5    0
            300        5    0
            300        5    0
          InitialWater: FractionFull=1; PercentMethod=EvenlyDistributed; RelativeTo=ll15
        outputfile Results -> /Simulations/Test01-BareBare/Sim01-SoilN/Paddock1-LightSoil/Results: filename=Sim10-SoilN Paddock1-LightSoil Results.out; title=Sim10-SoilN Paddock1-LightSoil Results
          variables -> /Simulations/Test01-BareBare/Sim01-SoilN/Paddock1-LightSoil/Results/Variables
          events ReportingFrequency -> /Simulations/Test01-BareBare/Sim01-SoilN/Paddock1-LightSoil/Results/ReportingFrequency
      area Paddock2-HeavySoil -> /Simulations/Test01-BareBare/Sim01-SoilN/Paddock2-HeavySoil
        Soil Med-HeavySoil: LocalName=Generic medium-heavy sedimentary soil; Country=New Zealand; Latitude=0; Longitude=0
          DataSource=Hypothetical medium to heavy texture soil of sedimentary origin (moderately poorly drained)
          Analysis: same as Test01-BareBare.Sim01-SoilN.Paddock2-HeavySoil.Med-HeavySoil.Analysis
          Water: same as Test01-BareBare.Sim01-SoilN.Paddock2-HeavySoil.Med-HeavySoil.Water
          SoilWater: same as Test01-BareBare.Sim01-SoilN.Paddock2-HeavySoil.Med-HeavySoil.SoilWater
          SoilOrganicMatter: same as Test04-Bare+Hum.Sim04-SoilN.Paddock2-HeavySoil.Med-HeavySoil.SoilOrganicMatter
          Sample Initial nitrogen -> /Simulations/Test10-Bare+Hum+NO3/Sim10-SoilN/Paddock1-LightSoil/Med-LightSoil/Initial nitrogen
          InitialWater: FractionFull=1; PercentMethod=EvenlyDistributed; RelativeTo=ll15
        outputfile Results -> /Simulations/Test01-BareBare/Sim01-SoilN/Paddock2-HeavySoil/Results: filename=Sim10-SoilN Paddock2-HeavySoil Results.out; title=Sim10-SoilN Paddock2-HeavySoil Results
          variables -> /Simulations/Test01-BareBare/Sim01-SoilN/Paddock2-HeavySoil/Results/Variables
          events ReportingFrequency -> /Simulations/Test01-BareBare/Sim01-SoilN/Paddock2-HeavySoil/Results/ReportingFrequency
    simulation Sim10-SoilNitrogen -> /Simulations/Test10-Bare+Hum+NO3/Sim10-SoilN
      PlugIns: same as Test01-BareBare.Sim01-SoilN.PlugIns
      area Paddock1-LightSoil -> /Simulations/Test10-Bare+Hum+NO3/Sim10-SoilN/Paddock1-LightSoil
        outputfile Results -> /Simulations/Test10-Bare+Hum+NO3/Sim10-SoilN/Paddock1-LightSoil/Results: filename=Sim10-SoilNitrogen Paddock1-LightSoil Results.out; title=Sim10-SoilNitrogen Paddock1-LightSoil Results
          variables -> /Simulations/Test10-Bare+Hum+NO3/Sim10-SoilN/Paddock1-LightSoil/Results/Variables
          events ReportingFrequency -> /Simulations/Test10-Bare+Hum+NO3/Sim10-SoilN/Paddock1-LightSoil/Results/ReportingFrequency
      area Paddock2-HeavySoil -> /Simulations/Test10-Bare+Hum+NO3/Sim10-SoilN/Paddock2-HeavySoil
        outputfile Results -> /Simulations/Test10-Bare+Hum+NO3/Sim10-SoilN/Paddock2-HeavySoil/Results: filename=Sim10-SoilNitrogen Paddock2-HeavySoil Results.out; title=Sim10-SoilNitrogen Paddock2-HeavySoil Results
          variables -> /Simulations/Test10-Bare+Hum+NO3/Sim10-SoilN/Paddock2-HeavySoil/Results/Variables
          events ReportingFrequency -> /Simulations/Test10-Bare+Hum+NO3/Sim10-SoilN/Paddock2-HeavySoil/Results/ReportingFrequency
  folder Test11-Bare+FOM+NO3 -> /Simulations/Test01-BareBare
    memo Info
      ++++++++++++++++++++  TEST 11 +++++++++++++++++++++++++++++++++++++++++++++++++++++++++++

         Description:
            - Artificial climate, smooth mild temperate;
            - Two generic soils, a free draining and a poorly drained;
            - Bare soil;
            - Initial mineral N: 60kgN/ha as NO3;
            - Initial sol organic matter as FOM only;
            - No initial surface residues;
            - No additions of residues or mineral N;

         Expected output:
            - All outputs with valid values (numeric mostly);
            - Quite fast decomposition of FOM;
    simulation Sim11-SoilN -> /Simulations/Test01-BareBare/Sim01-SoilN
      PlugIns: same as Test01-BareBare.Sim01-SoilN.PlugIns
      area Paddock1-LightSoil -> /Simulations/Test01-BareBare/Sim01-SoilN/Paddock1-LightSoil
        surfaceom SurfaceOrganicMatter
          PoolName = Residue1  # Organic Matter pool name
          type = grass  # Organic Matter type
          mass = 0  # Initial surface residue (kg/ha)
          cnr = 20  # C:N ratio of initial residue
          standing_fraction = 0  # Fraction of residue standing
        Soil Med-LightSoil: LocalName=Generic medium-light sedimentary soil; Country=New Zealand; Latitude=0; Longitude=0
          DataSource=Hypothetical medium to light texture soil of sedimentary origin (moderately high drainage)
          Analysis: same as Test01-BareBare.Sim01-SoilN.Paddock1-LightSoil.Med-LightSoil.Analysis
          Water: same as Test01-BareBare.Sim01-SoilN.Paddock1-LightSoil.Med-LightSoil.Water
          SoilWater: same as Test01-BareBare.Sim01-SoilN.Paddock1-LightSoil.Med-LightSoil.SoilWater
          SoilOrganicMatter: RootCN=30; RootWt=1000; SoilCN=12.5; EnrACoeff=7.4; EnrBCoeff=0.2; OCUnits=Total
            Thickness  OC  FBiom  FInert
            150        0   0.035  0.4
            150        0   0.025  0.55
            300        0   0.015  0.765
            300        0   0.01   0.9
            300        0   0.01   0.95
            300        0   0.01   0.994
          Sample Initial nitrogen: NO3Units=kgha; NH4Units=kgha; SWUnits=Volumetric; OCUnits=Total; PHUnits=Water
            Thickness  NO3  NH4
            150        5    0
            150        5    0
            300        5    0
            300        5    0
            300        5    0
            300        5    0
          InitialWater: FractionFull=1; PercentMethod=EvenlyDistributed; RelativeTo=ll15
        outputfile Results -> /Simulations/Test01-BareBare/Sim01-SoilN/Paddock1-LightSoil/Results: filename=Sim11-SoilN Paddock1-LightSoil Results.out; title=Sim11-SoilN Paddock1-LightSoil Results
          variables -> /Simulations/Test01-BareBare/Sim01-SoilN/Paddock1-LightSoil/Results/Variables
          events ReportingFrequency -> /Simulations/Test01-BareBare/Sim01-SoilN/Paddock1-LightSoil/Results/ReportingFrequency
      area Paddock2-HeavySoil -> /Simulations/Test01-BareBare/Sim01-SoilN/Paddock2-HeavySoil
        Soil Med-HeavySoil: LocalName=Generic medium-heavy sedimentary soil; Country=New Zealand; Latitude=0; Longitude=0
          DataSource=Hypothetical medium to heavy texture soil of sedimentary origin (moderately poorly drained)
          Analysis: same as Test01-BareBare.Sim01-SoilN.Paddock2-HeavySoil.Med-HeavySoil.Analysis
          Water: same as Test01-BareBare.Sim01-SoilN.Paddock2-HeavySoil.Med-HeavySoil.Water
          SoilWater: same as Test01-BareBare.Sim01-SoilN.Paddock2-HeavySoil.Med-HeavySoil.SoilWater
          SoilOrganicMatter: RootCN=30; RootWt=1000; SoilCN=12.5; EnrACoeff=7.4; EnrBCoeff=0.2; OCUnits=Total
            Thickness  OC  FBiom  FInert
            150        0   0.035  0.5
            150        0   0.025  0.65
            300        0   0.015  0.835
            300        0   0.01   0.94
            300        0   0.01   0.97
            300        0   0.01   0.996
          Sample Initial nitrogen -> /Simulations/Test11-Bare+FOM+NO3/Sim11-SoilN/Paddock1-LightSoil/Med-LightSoil/Initial nitrogen
          InitialWater: FractionFull=1; PercentMethod=EvenlyDistributed; RelativeTo=ll15
        outputfile Results -> /Simulations/Test01-BareBare/Sim01-SoilN/Paddock2-HeavySoil/Results: filename=Sim11-SoilN Paddock2-HeavySoil Results.out; title=Sim11-SoilN Paddock2-HeavySoil Results
          variables -> /Simulations/Test01-BareBare/Sim01-SoilN/Paddock2-HeavySoil/Results/Variables
          events ReportingFrequency -> /Simulations/Test01-BareBare/Sim01-SoilN/Paddock2-HeavySoil/Results/ReportingFrequency
    simulation Sim11-SoilNitrogen -> /Simulations/Test11-Bare+FOM+NO3/Sim11-SoilN
      PlugIns: same as Test01-BareBare.Sim01-SoilN.PlugIns
      area Paddock1-LightSoil -> /Simulations/Test11-Bare+FOM+NO3/Sim11-SoilN/Paddock1-LightSoil
        outputfile Results -> /Simulations/Test11-Bare+FOM+NO3/Sim11-SoilN/Paddock1-LightSoil/Results: filename=Sim11-SoilNitrogen Paddock1-LightSoil Results.out; title=Sim11-SoilNitrogen Paddock1-LightSoil Results
          variables -> /Simulations/Test11-Bare+FOM+NO3/Sim11-SoilN/Paddock1-LightSoil/Results/Variables
          events ReportingFrequency -> /Simulations/Test11-Bare+FOM+NO3/Sim11-SoilN/Paddock1-LightSoil/Results/ReportingFrequency
      area Paddock2-HeavySoil -> /Simulations/Test11-Bare+FOM+NO3/Sim11-SoilN/Paddock2-HeavySoil
        outputfile Results -> /Simulations/Test11-Bare+FOM+NO3/Sim11-SoilN/Paddock2-HeavySoil/Results: filename=Sim11-SoilNitrogen Paddock2-HeavySoil Results.out; title=Sim11-SoilNitrogen Paddock2-HeavySoil Results
          variables -> /Simulations/Test11-Bare+FOM+NO3/Sim11-SoilN/Paddock2-HeavySoil/Results/Variables
          events ReportingFrequency -> /Simulations/Test11-Bare+FOM+NO3/Sim11-SoilN/Paddock2-HeavySoil/Results/ReportingFrequency
  folder Test12-Bare+SurfOM+NO3 -> /Simulations/Test01-BareBare
    memo Info
      ++++++++++++++++++++  TEST 12 +++++++++++++++++++++++++++++++++++++++++++++++++++++++++++

         Description:
            - Artificial climate, smooth mild temperate;
            - Two generic soils, a free draining and a poorly drained;
            - Bare soil;
            - Initial mineral N: 60kgN/ha as NO3;
            - No initial soil organic matter;
            - Initial surface residues f 1000kgDM/ha
            - No additions of residues or mineral N;

         Expected output:
            - All outputs with valid values (numeric mostly);
            - Basically the same values as Test06 for organic pools, large values for mineral N
    simulation Sim12-SoilN -> /Simulations/Test01-BareBare/Sim01-SoilN
      PlugIns: same as Test01-BareBare.Sim01-SoilN.PlugIns
      area Paddock1-LightSoil -> /Simulations/Test01-BareBare/Sim01-SoilN/Paddock1-LightSoil
        surfaceom SurfaceOrganicMatter
          PoolName = Residue1  # Organic Matter pool name
          type = grass  # Organic Matter type
          mass = 1000  # Initial surface residue (kg/ha)
          cnr = 20  # C:N ratio of initial residue
          standing_fraction = 0  # Fraction of residue standing
        Soil Med-LightSoil: LocalName=Generic medium-light sedimentary soil; Country=New Zealand; Latitude=0; Longitude=0
          DataSource=Hypothetical medium to light texture soil of sedimentary origin (moderately high drainage)
          Analysis: same as Test01-BareBare.Sim01-SoilN.Paddock1-LightSoil.Med-LightSoil.Analysis
          Water: same as Test01-BareBare.Sim01-SoilN.Paddock1-LightSoil.Med-LightSoil.Water
          SoilWater: same as Test01-BareBare.Sim01-SoilN.Paddock1-LightSoil.Med-LightSoil.SoilWater
          SoilOrganicMatter: RootCN=30; RootWt=0; SoilCN=12.5; EnrACoeff=7.4; EnrBCoeff=0.2; OCUnits=Total
            Thickness  OC  FBiom  FInert
            150        0   0.035  0.4
            150        0   0.025  0.55
            300        0   0.015  0.765
            300        0   0.01   0.9
            300        0   0.01   0.95
            300        0   0.01   0.994
          Sample Initial nitrogen: NO3Units=kgha; NH4Units=kgha; SWUnits=Volumetric; OCUnits=Total; PHUnits=Water
            Thickness  NO3  NH4
            150        5    0
            150        5    0
            300        5    0
            300        5    0
            300        5    0
            300        5    0
          InitialWater: FractionFull=1; PercentMethod=EvenlyDistributed; RelativeTo=ll15
        outputfile Results -> /Simulations/Test01-BareBare/Sim01-SoilN/Paddock1-LightSoil/Results: filename=Sim12-SoilN Paddock1-LightSoil Results.out; title=Sim12-SoilN Paddock1-LightSoil Results
          variables -> /Simulations/Test01-BareBare/Sim01-SoilN/Paddock1-LightSoil/Results/Variables
          events ReportingFrequency -> /Simulations/Test01-BareBare/Sim01-SoilN/Paddock1-LightSoil/Results/ReportingFrequency
      area Paddock2-HeavySoil -> /Simulations/Test01-BareBare/Sim01-SoilN/Paddock2-HeavySoil
        Soil Med-HeavySoil: LocalName=Generic medium-heavy sedimentary soil; Country=New Zealand; Latitude=0; Longitude=0
          DataSource=Hypothetical medium to heavy texture soil of sedimentary origin (moderately poorly drained)
          Analysis: same as Test01-BareBare.Sim01-SoilN.Paddock2-HeavySoil.Med-HeavySoil.Analysis
          Water: same as Test01-BareBare.Sim01-SoilN.Paddock2-HeavySoil.Med-HeavySoil.Water
          SoilWater: same as Test01-BareBare.Sim01-SoilN.Paddock2-HeavySoil.Med-HeavySoil.SoilWater
          SoilOrganicMatter: RootCN=30; RootWt=0; SoilCN=12.5; EnrACoeff=7.4; EnrBCoeff=0.2; OCUnits=Total
            Thickness  OC  FBiom  FInert
            150        0   0.035  0.5
            150        0   0.025  0.65
            300        0   0.015  0.835
            300        0   0.01   0.94
            300        0   0.01   0.97
            300        0   0.01   0.996
          Sample Initial nitrogen -> /Simulations/Test12-Bare+SurfOM+NO3/Sim12-SoilN/Paddock1-LightSoil/Med-LightSoil/Initial nitrogen
          InitialWater: FractionFull=1; PercentMethod=EvenlyDistributed; RelativeTo=ll15
        outputfile Results -> /Simulations/Test01-BareBare/Sim01-SoilN/Paddock2-HeavySoil/Results: filename=Sim12-SoilN Paddock2-HeavySoil Results.out; title=Sim12-SoilN Paddock2-HeavySoil Results
          variables -> /Simulations/Test01-BareBare/Sim01-SoilN/Paddock2-HeavySoil/Results/Variables
          events ReportingFrequency -> /Simulations/Test01-BareBare/Sim01-SoilN/Paddock2-HeavySoil/Results/ReportingFrequency
    simulation Sim12-SoilNitrogen -> /Simulations/Test12-Bare+SurfOM+NO3/Sim12-SoilN
      PlugIns: same as Test01-BareBare.Sim01-SoilN.PlugIns
      area Paddock1-LightSoil -> /Simulations/Test12-Bare+SurfOM+NO3/Sim12-SoilN/Paddock1-LightSoil
        outputfile Results -> /Simulations/Test12-Bare+SurfOM+NO3/Sim12-SoilN/Paddock1-LightSoil/Results: filename=Sim12-SoilNitrogen Paddock1-LightSoil Results.out; title=Sim12-SoilNitrogen Paddock1-LightSoil Results
          variables -> /Simulations/Test12-Bare+SurfOM+NO3/Sim12-SoilN/Paddock1-LightSoil/Results/Variables
          events ReportingFrequency -> /Simulations/Test12-Bare+SurfOM+NO3/Sim12-SoilN/Paddock1-LightSoil/Results/ReportingFrequency
      area Paddock2-HeavySoil -> /Simulations/Test12-Bare+SurfOM+NO3/Sim12-SoilN/Paddock2-HeavySoil
        outputfile Results -> /Simulations/Test12-Bare+SurfOM+NO3/Sim12-SoilN/Paddock2-HeavySoil/Results: filename=Sim12-SoilNitrogen Paddock2-HeavySoil Results.out; title=Sim12-SoilNitrogen Paddock2-HeavySoil Results
          variables -> /Simulations/Test12-Bare+SurfOM+NO3/Sim12-SoilN/Paddock2-HeavySoil/Results/Variables
          events ReportingFrequency -> /Simulations/Test12-Bare+SurfOM+NO3/Sim12-SoilN/Paddock2-HeavySoil/Results/ReportingFrequency
  folder Test13-Bare+Hum+NH4 -> /Simulations/Test01-BareBare
    memo Info
      ++++++++++++++++++++  TEST 13 +++++++++++++++++++++++++++++++++++++++++++++++++++++++++++

         Description:
            - Artificial climate, smooth mild temperate;
            - Two generic soils, a free draining and a poorly drained;
            - Bare soil;
            - Initial mineral N: 60kgN/ha as NH4;
            - Initial soil organic matter as humus only;
            - No initial surface residues;
            - No additions of residues or mineral N;

         Expected output:
            - All outputs with valid values (numeric mostly);
            - Values for organic pools should be the same as Test04 as mineral N does not interact with them;
    simulation Sim13-SoilN -> /Simulations/Test01-BareBare/Sim01-SoilN
      PlugIns: same as Test01-BareBare.Sim01-SoilN.PlugIns
      area Paddock1-LightSoil -> /Simulations/Test01-BareBare/Sim01-SoilN/Paddock1-LightSoil
        surfaceom SurfaceOrganicMatter
          PoolName = Residue1  # Organic Matter pool name
          type = grass  # Organic Matter type
          mass = 0  # Initial surface residue (kg/ha)
          cnr = 20  # C:N ratio of initial residue
          standing_fraction = 0  # Fraction of residue standing
        Soil Med-LightSoil: LocalName=Generic medium-light sedimentary soil; Country=New Zealand; Latitude=0; Longitude=0
          DataSource=Hypothetical medium to light texture soil of sedimentary origin (moderately high drainage)
          Analysis: same as Test01-BareBare.Sim01-SoilN.Paddock1-LightSoil.Med-LightSoil.Analysis
          Water: same as Test01-BareBare.Sim01-SoilN.Paddock1-LightSoil.Med-LightSoil.Water
          SoilWater: same as Test01-BareBare.Sim01-SoilN.Paddock1-LightSoil.Med-LightSoil.SoilWater
          SoilOrganicMatter: same as Test04-Bare+Hum.Sim04-SoilN.Paddock1-LightSoil.Med-LightSoil.SoilOrganicMatter
          Sample Initial nitrogen: NO3Units=kgha; NH4Units=kgha; SWUnits=Volumetric; OCUnits=Total; PHUnits=Water
            Thickness  NO3  NH4
            150        0    5
            150        0    5
            300        0    5
            300        0    5
            300        0    5
            300        0    5
          InitialWater: FractionFull=1; PercentMethod=EvenlyDistributed; RelativeTo=ll15
        outputfile Results -> /Simulations/Test01-BareBare/Sim01-SoilN/Paddock1-LightSoil/Results: filename=Sim13-SoilN Paddock1-LightSoil Results.out; title=Sim13-SoilN Paddock1-LightSoil Results
          variables -> /Simulations/Test01-BareBare/Sim01-SoilN/Paddock1-LightSoil/Results/Variables
          events ReportingFrequency -> /Simulations/Test01-BareBare/Sim01-SoilN/Paddock1-LightSoil/Results/ReportingFrequency
      area Paddock2-HeavySoil -> /Simulations/Test01-BareBare/Sim01-SoilN/Paddock2-HeavySoil
        Soil Med-HeavySoil: LocalName=Generic medium-heavy sedimentary soil; Country=New Zealand; Latitude=0; Longitude=0
          DataSource=Hypothetical medium to heavy texture soil of sedimentary origin (moderately poorly drained)
          Analysis: same as Test01-BareBare.Sim01-SoilN.Paddock2-HeavySoil.Med-HeavySoil.Analysis
          Water: same as Test01-BareBare.Sim01-SoilN.Paddock2-HeavySoil.Med-HeavySoil.Water
          SoilWater: same as Test01-BareBare.Sim01-SoilN.Paddock2-HeavySoil.Med-HeavySoil.SoilWater
          SoilOrganicMatter: same as Test04-Bare+Hum.Sim04-SoilN.Paddock2-HeavySoil.Med-HeavySoil.SoilOrganicMatter
          Sample Initial nitrogen -> /Simulations/Test13-Bare+Hum+NH4/Sim13-SoilN/Paddock1-LightSoil/Med-LightSoil/Initial nitrogen
          InitialWater: FractionFull=1; PercentMethod=EvenlyDistributed; RelativeTo=ll15
        outputfile Results -> /Simulations/Test01-BareBare/Sim01-SoilN/Paddock2-HeavySoil/Results: filename=Sim13-SoilN Paddock2-HeavySoil Results.out; title=Sim13-SoilN Paddock2-HeavySoil Results
          variables -> /Simulations/Test01-BareBare/Sim01-SoilN/Paddock2-HeavySoil/Results/Variables
          events ReportingFrequency -> /Simulations/Test01-BareBare/Sim01-SoilN/Paddock2-HeavySoil/Results/ReportingFrequency
    simulation Sim13-SoilNitrogen -> /Simulations/Test13-Bare+Hum+NH4/Sim13-SoilN
      PlugIns: same as Test01-BareBare.Sim01-SoilN.PlugIns
      area Paddock1-LightSoil -> /Simulations/Test13-Bare+Hum+NH4/Sim13-SoilN/Paddock1-LightSoil
        outputfile Results -> /Simulations/Test13-Bare+Hum+NH4/Sim13-SoilN/Paddock1-LightSoil/Results: filename=Sim13-SoilNitrogen Paddock1-LightSoil Results.out; title=Sim13-SoilNitrogen Paddock1-LightSoil Results
          variables -> /Simulations/Test13-Bare+Hum+NH4/Sim13-SoilN/Paddock1-LightSoil/Results/Variables
          events ReportingFrequency -> /Simulations/Test13-Bare+Hum+NH4/Sim13-SoilN/Paddock1-LightSoil/Results/ReportingFrequency
      area Paddock2-HeavySoil -> /Simulations/Test13-Bare+Hum+NH4/Sim13-SoilN/Paddock2-HeavySoil
        outputfile Results -> /Simulations/Test13-Bare+Hum+NH4/Sim13-SoilN/Paddock2-HeavySoil/Results: filename=Sim13-SoilNitrogen Paddock2-HeavySoil Results.out; title=Sim13-SoilNitrogen Paddock2-HeavySoil Results
          variables -> /Simulations/Test13-Bare+Hum+NH4/Sim13-SoilN/Paddock2-HeavySoil/Results/Variables
          events ReportingFrequency -> /Simulations/Test13-Bare+Hum+NH4/Sim13-SoilN/Paddock2-HeavySoil/Results/ReportingFrequency
  folder Test14-Bare+FOM+SurfOM+NH4 -> /Simulations/Test01-BareBare
    memo Info
      ++++++++++++++++++++  TEST 14 +++++++++++++++++++++++++++++++++++++++++++++++++++++++++++

         Description:
            - Artificial climate, smooth mild temperate;
            - Two generic soils, a free draining and a poorly drained;
            - Bare soil;
            - Initial mineral N: 60kgN/ha as NH4;
            - Initial organic matter as FOM only;
            - Initial surface residues of 1000kgDM/ha;
            - No additions of residues or mineral N;

         Expected output:
            - All outputs with valid values (numeric mostly);
            - Similar values for organic pools as Tests 04 and 05, but large mineral N cycling
    simulation Sim14-SoilN -> /Simulations/Test01-BareBare/Sim01-SoilN
      PlugIns: same as Test01-BareBare.Sim01-SoilN.PlugIns
      area Paddock1-LightSoil -> /Simulations/Test01-BareBare/Sim01-SoilN/Paddock1-LightSoil
        surfaceom SurfaceOrganicMatter
          PoolName = Residue1  # Organic Matter pool name
          type = grass  # Organic Matter type
          mass = 1000  # Initial surface residue (kg/ha)
          cnr = 20  # C:N ratio of initial residue
          standing_fraction = 0  # Fraction of residue standing
        Soil Med-LightSoil: LocalName=Generic medium-light sedimentary soil; Country=New Zealand; Latitude=0; Longitude=0
          DataSource=Hypothetical medium to light texture soil of sedimentary origin (moderately high drainage)
          Analysis: same as Test01-BareBare.Sim01-SoilN.Paddock1-LightSoil.Med-LightSoil.Analysis
          Water: same as Test01-BareBare.Sim01-SoilN.Paddock1-LightSoil.Med-LightSoil.Water
          SoilWater: same as Test01-BareBare.Sim01-SoilN.Paddock1-LightSoil.Med-LightSoil.SoilWater
          SoilOrganicMatter: RootCN=30; RootWt=1000; SoilCN=12.5; EnrACoeff=7.4; EnrBCoeff=0.2; OCUnits=Total
            Thickness  OC  FBiom  FInert
            150        0   0.035  0.4
            150        0   0.025  0.55
            300        0   0.015  0.765
            300        0   0.01   0.9
            300        0   0.01   0.95
            300        0   0.01   0.994
          Sample Initial nitrogen: NO3Units=kgha; NH4Units=kgha; SWUnits=Volumetric; OCUnits=Total; PHUnits=Water
            Thickness  NO3  NH4
            150        0    5
            150        0    5
            300        0    5
            300        0    5
            300        0    5
            300        0    5
          InitialWater: FractionFull=1; PercentMethod=EvenlyDistributed; RelativeTo=ll15
        outputfile Results -> /Simulations/Test01-BareBare/Sim01-SoilN/Paddock1-LightSoil/Results: filename=Sim14-SoilN Paddock1-LightSoil Results.out; title=Sim14-SoilN Paddock1-LightSoil Results
          variables -> /Simulations/Test01-BareBare/Sim01-SoilN/Paddock1-LightSoil/Results/Variables
          events ReportingFrequency -> /Simulations/Test01-BareBare/Sim01-SoilN/Paddock1-LightSoil/Results/ReportingFrequency
      area Paddock2-HeavySoil -> /Simulations/Test01-BareBare/Sim01-SoilN/Paddock2-HeavySoil
        Soil Med-HeavySoil: LocalName=Generic medium-heavy sedimentary soil; Country=New Zealand; Latitude=0; Longitude=0
          DataSource=Hypothetical medium to heavy texture soil of sedimentary origin (moderately poorly drained)
          Analysis: same as Test01-BareBare.Sim01-SoilN.Paddock2-HeavySoil.Med-HeavySoil.Analysis
          Water: same as Test01-BareBare.Sim01-SoilN.Paddock2-HeavySoil.Med-HeavySoil.Water
          SoilWater: same as Test01-BareBare.Sim01-SoilN.Paddock2-HeavySoil.Med-HeavySoil.SoilWater
          SoilOrganicMatter: RootCN=30; RootWt=1000; SoilCN=12.5; EnrACoeff=7.4; EnrBCoeff=0.2; OCUnits=Total
            Thickness  OC  FBiom  FInert
            150        0   0.035  0.5
            150        0   0.025  0.65
            300        0   0.015  0.835
            300        0   0.01   0.94
            300        0   0.01   0.97
            300        0   0.01   0.996
          Sample Initial nitrogen -> /Simulations/Test14-Bare+FOM+SurfOM+NH4/Sim14-SoilN/Paddock1-LightSoil/Med-LightSoil/Initial nitrogen
          InitialWater: FractionFull=1; PercentMethod=EvenlyDistributed; RelativeTo=ll15
        outputfile Results -> /Simulations/Test01-BareBare/Sim01-SoilN/Paddock2-HeavySoil/Results: filename=Sim14-SoilN Paddock2-HeavySoil Results.out; title=Sim14-SoilN Paddock2-HeavySoil Results
          variables -> /Simulations/Test01-BareBare/Sim01-SoilN/Paddock2-HeavySoil/Results/Variables
          events ReportingFrequency -> /Simulations/Test01-BareBare/Sim01-SoilN/Paddock2-HeavySoil/Results/ReportingFrequency
    simulation Sim14-SoilNitrogen -> /Simulations/Test14-Bare+FOM+SurfOM+NH4/Sim14-SoilN
      PlugIns: same as Test01-BareBare.Sim01-SoilN.PlugIns
      area Paddock1-LightSoil -> /Simulations/Test14-Bare+FOM+SurfOM+NH4/Sim14-SoilN/Paddock1-LightSoil
        outputfile Results -> /Simulations/Test14-Bare+FOM+SurfOM+NH4/Sim14-SoilN/Paddock1-LightSoil/Results: filename=Sim14-SoilNitrogen Paddock1-LightSoil Results.out; title=Sim14-SoilNitrogen Paddock1-LightSoil Results
          variables -> /Simulations/Test14-Bare+FOM+SurfOM+NH4/Sim14-SoilN/Paddock1-LightSoil/Results/Variables
          events ReportingFrequency -> /Simulations/Test14-Bare+FOM+SurfOM+NH4/Sim14-SoilN/Paddock1-LightSoil/Results/ReportingFrequency
      area Paddock2-HeavySoil -> /Simulations/Test14-Bare+FOM+SurfOM+NH4/Sim14-SoilN/Paddock2-HeavySoil
        outputfile Results -> /Simulations/Test14-Bare+FOM+SurfOM+NH4/Sim14-SoilN/Paddock2-HeavySoil/Results: filename=Sim14-SoilNitrogen Paddock2-HeavySoil Results.out; title=Sim14-SoilNitrogen Paddock2-HeavySoil Results
          variables -> /Simulations/Test14-Bare+FOM+SurfOM+NH4/Sim14-SoilN/Paddock2-HeavySoil/Results/Variables
          events ReportingFrequency -> /Simulations/Test14-Bare+FOM+SurfOM+NH4/Sim14-SoilN/Paddock2-HeavySoil/Results/ReportingFrequency
  folder Test15-Bare+TypicSoil -> /Simulations/Test01-BareBare
    memo Info
      ++++++++++++++++++++  TEST 15 +++++++++++++++++++++++++++++++++++++++++++++++++++++++++++

         Description:
            - Artificial climate, smooth mild temperate;
            - Two generic soils, a free draining and a poorly drained;
            - Bare soil;
            - Initial mineral N: 30kgN/ha as NO3 + 30kgN/ha as NH4;
            - Initial soil organic matter composed of humus and FOM;
            - Iinitial surface residues of 1000kgDM/ha;
            - No additions of residues or mineral N;

         Expected output:
            - All outputs with valid values (numeric mostly);
            - This is the complete basic soil run under bare cover conditions;
    simulation Sim15-SoilN -> /Simulations/Test01-BareBare/Sim01-SoilN
      PlugIns: same as Test01-BareBare.Sim01-SoilN.PlugIns
      area Paddock1-LightSoil -> /Simulations/Test01-BareBare/Sim01-SoilN/Paddock1-LightSoil
        surfaceom SurfaceOrganicMatter
          PoolName = residue1       residue2  # Organic Matter pool name
          type = lucerne       lucerne  # Organic Matter type
          mass = 4000        4000  # Initial surface residue (kg/ha)
          cnr = 10        10  # C:N ratio of initial residue
          standing_fraction = 0         0.5  # Fraction of residue standing
        Soil Med-LightSoil: LocalName=Generic medium-light sedimentary soil; Country=New Zealand; Latitude=0; Longitude=0
          DataSource=Hypothetical medium to light texture soil of sedimentary origin (moderately high drainage)
          Analysis: same as Test01-BareBare.Sim01-SoilN.Paddock1-LightSoil.Med-LightSoil.Analysis
          Water: same as Test01-BareBare.Sim01-SoilN.Paddock1-LightSoil.Med-LightSoil.Water
          SoilWater: same as Test01-BareBare.Sim01-SoilN.Paddock1-LightSoil.Med-LightSoil.SoilWater
          SoilOrganicMatter: same as Test09-Bare+OrgN.Sim09-SoilN.Paddock1-LightSoil.Med-LightSoil.SoilOrganicMatter
          Sample Initial nitrogen: NO3Units=kgha; NH4Units=kgha; SWUnits=Volumetric; OCUnits=Total; PHUnits=Water
            Thickness  NO3  NH4
            150        5    5
            150        5    5
            300        5    5
            300        5    5
            300        5    5
            300        5    5
          InitialWater: FractionFull=1; PercentMethod=EvenlyDistributed; RelativeTo=ll15
        outputfile Results -> /Simulations/Test01-BareBare/Sim01-SoilN/Paddock1-LightSoil/Results: filename=Sim15-SoilN Paddock1-LightSoil Results.out; title=Sim15-SoilN Paddock1-LightSoil Results
          variables -> /Simulations/Test01-BareBare/Sim01-SoilN/Paddock1-LightSoil/Results/Variables
          events ReportingFrequency -> /Simulations/Test01-BareBare/Sim01-SoilN/Paddock1-LightSoil/Results/ReportingFrequency
      area Paddock2-HeavySoil -> /Simulations/Test01-BareBare/Sim01-SoilN/Paddock2-HeavySoil
        Soil Med-HeavySoil: LocalName=Generic medium-heavy sedimentary soil; Country=New Zealand; Latitude=0; Longitude=0
          DataSource=Hypothetical medium to heavy texture soil of sedimentary origin (moderately poorly drained)
          Analysis: same as Test01-BareBare.Sim01-SoilN.Paddock2-HeavySoil.Med-HeavySoil.Analysis
          Water: same as Test01-BareBare.Sim01-SoilN.Paddock2-HeavySoil.Med-HeavySoil.Water
          SoilWater: same as Test01-BareBare.Sim01-SoilN.Paddock2-HeavySoil.Med-HeavySoil.SoilWater
          SoilOrganicMatter: same as Test09-Bare+OrgN.Sim09-SoilN.Paddock2-HeavySoil.Med-HeavySoil.SoilOrganicMatter
          InitialWater: FractionFull=1; PercentMethod=EvenlyDistributed; RelativeTo=ll15
          Sample Initial nitrogen -> /Simulations/Test15-Bare+TypicSoil/Sim15-SoilN/Paddock1-LightSoil/Med-LightSoil/Initial nitrogen
        outputfile Results -> /Simulations/Test01-BareBare/Sim01-SoilN/Paddock2-HeavySoil/Results: filename=Sim15-SoilN Paddock2-HeavySoil Results.out; title=Sim15-SoilN Paddock2-HeavySoil Results
          variables -> /Simulations/Test01-BareBare/Sim01-SoilN/Paddock2-HeavySoil/Results/Variables
          events ReportingFrequency -> /Simulations/Test01-BareBare/Sim01-SoilN/Paddock2-HeavySoil/Results/ReportingFrequency
    simulation Sim15-SoilNitrogen -> /Simulations/Test15-Bare+TypicSoil/Sim15-SoilN
      PlugIns: same as Test01-BareBare.Sim01-SoilN.PlugIns
      area Paddock1-LightSoil -> /Simulations/Test15-Bare+TypicSoil/Sim15-SoilN/Paddock1-LightSoil
        outputfile Results -> /Simulations/Test15-Bare+TypicSoil/Sim15-SoilN/Paddock1-LightSoil/Results: filename=Sim15-SoilNitrogen Paddock1-LightSoil Results.out; title=Sim15-SoilNitrogen Paddock1-LightSoil Results
          variables -> /Simulations/Test15-Bare+TypicSoil/Sim15-SoilN/Paddock1-LightSoil/Results/Variables
          events ReportingFrequency -> /Simulations/Test15-Bare+TypicSoil/Sim15-SoilN/Paddock1-LightSoil/Results/ReportingFrequency
      area Paddock2-HeavySoil -> /Simulations/Test15-Bare+TypicSoil/Sim15-SoilN/Paddock2-HeavySoil
        outputfile Results -> /Simulations/Test15-Bare+TypicSoil/Sim15-SoilN/Paddock2-HeavySoil/Results: filename=Sim15-SoilNitrogen Paddock2-HeavySoil Results.out; title=Sim15-SoilNitrogen Paddock2-HeavySoil Results
          variables -> /Simulations/Test15-Bare+TypicSoil/Sim15-SoilN/Paddock2-HeavySoil/Results/Variables
          events ReportingFrequency -> /Simulations/Test15-Bare+TypicSoil/Sim15-SoilN/Paddock2-HeavySoil/Results/ReportingFrequency
  folder Test16-Bare+TypicSoil+addN -> /Simulations/Test01-BareBare
    memo Info
      ++++++++++++++++++++  TEST 16 +++++++++++++++++++++++++++++++++++++++++++++++++++++++++++

         Description:
            - Artificial climate, smooth mild temperate;
            - Two generic soils, a free draining and a poorly drained;
            - Bare soil;
            - Initial mineral N: 30kgN/ha as NO3 + 30kgN/ha as NH4;
            - Initial soil organic matter composed of humus and FOM;
            - Iinitial surface residues of 1000kgDM/ha;
            - No additions of residues,
            - Addition of mineral N: 50kgN/ha as NH4 and 50kgN/ha as NO3 in different dates;

         Expected output:
            - All outputs with valid values (numeric mostly);
            - This is the complete basic soil run under bare cover conditions;
            - Testing the addition of N (non-urea);
    simulation Sim16-SoilN -> /Simulations/Test01-BareBare/Sim01-SoilN
      PlugIns: same as Test01-BareBare.Sim01-SoilN.PlugIns
      area Paddock1-LightSoil -> /Simulations/Test01-BareBare/Sim01-SoilN/Paddock1-LightSoil
        folder ManagerFolder -> /Simulations/Test01-BareBare/Sim01-SoilN/Paddock1-LightSoil/ManagerFolder
          operations OperationsSchedule
            5-Aug  Fertiliser apply amount=50 (kg/ha), depth=100 (mm), type=nh4_n
            5-Oct  Fertiliser apply amount=50 (kg/ha), depth=200 (mm), type=no3_n
        surfaceom SurfaceOrganicMatter
          PoolName = Residue1  # Organic Matter pool name
          type = grass  # Organic Matter type
          mass = 1000  # Initial surface residue (kg/ha)
          cnr = 20  # C:N ratio of initial residue
          standing_fraction = 0  # Fraction of residue standing
        Soil Med-LightSoil: LocalName=Generic medium-light sedimentary soil; Country=New Zealand; Latitude=0; Longitude=0
          DataSource=Hypothetical medium to light texture soil of sedimentary origin (moderately high drainage)
          Analysis: same as Test01-BareBare.Sim01-SoilN.Paddock1-LightSoil.Med-LightSoil.Analysis
          Water: same as Test01-BareBare.Sim01-SoilN.Paddock1-LightSoil.Med-LightSoil.Water
          SoilWater: same as Test01-BareBare.Sim01-SoilN.Paddock1-LightSoil.Med-LightSoil.SoilWater
          SoilOrganicMatter: same as Test09-Bare+OrgN.Sim09-SoilN.Paddock1-LightSoil.Med-LightSoil.SoilOrganicMatter
          Sample Initial nitrogen: NO3Units=kgha; NH4Units=kgha; SWUnits=Volumetric; OCUnits=Total; PHUnits=Water
            Thickness  NO3  NH4
            150        5.0  5.0
            150        5.0  5.0
            300        5.0  5.0
            300        5.0  5.0
            300        5.0  5.0
            300        5.0  5.0
          InitialWater: FractionFull=1; PercentMethod=EvenlyDistributed; RelativeTo=ll15
        outputfile Results -> /Simulations/Test01-BareBare/Sim01-SoilN/Paddock1-LightSoil/Results: filename=Sim16-SoilN Paddock1-LightSoil Results.out; title=Sim16-SoilN Paddock1-LightSoil Results
          variables -> /Simulations/Test01-BareBare/Sim01-SoilN/Paddock1-LightSoil/Results/Variables
          events ReportingFrequency -> /Simulations/Test01-BareBare/Sim01-SoilN/Paddock1-LightSoil/Results/ReportingFrequency
      area Paddock2-HeavySoil -> /Simulations/Test01-BareBare/Sim01-SoilN/Paddock2-HeavySoil
        Soil Med-HeavySoil: LocalName=Generic medium-heavy sedimentary soil; Country=New Zealand; Latitude=0; Longitude=0
          DataSource=Hypothetical medium to heavy texture soil of sedimentary origin (moderately poorly drained)
          Analysis: same as Test01-BareBare.Sim01-SoilN.Paddock2-HeavySoil.Med-HeavySoil.Analysis
          Water: same as Test01-BareBare.Sim01-SoilN.Paddock2-HeavySoil.Med-HeavySoil.Water
          SoilWater: same as Test01-BareBare.Sim01-SoilN.Paddock2-HeavySoil.Med-HeavySoil.SoilWater
          SoilOrganicMatter: same as Test09-Bare+OrgN.Sim09-SoilN.Paddock2-HeavySoil.Med-HeavySoil.SoilOrganicMatter
          Sample Initial nitrogen -> /Simulations/Test16-Bare+TypicSoil+addN/Sim16-SoilN/Paddock1-LightSoil/Med-LightSoil/Initial nitrogen
          InitialWater: FractionFull=1; PercentMethod=EvenlyDistributed; RelativeTo=ll15
        outputfile Results -> /Simulations/Test01-BareBare/Sim01-SoilN/Paddock2-HeavySoil/Results: filename=Sim16-SoilN Paddock2-HeavySoil Results.out; title=Sim16-SoilN Paddock2-HeavySoil Results
          variables -> /Simulations/Test01-BareBare/Sim01-SoilN/Paddock2-HeavySoil/Results/Variables
          events ReportingFrequency -> /Simulations/Test01-BareBare/Sim01-SoilN/Paddock2-HeavySoil/Results/ReportingFrequency
    simulation Sim16-SoilNitrogen -> /Simulations/Test16-Bare+TypicSoil+addN/Sim16-SoilN
      PlugIns: same as Test01-BareBare.Sim01-SoilN.PlugIns
      area Paddock1-LightSoil -> /Simulations/Test16-Bare+TypicSoil+addN/Sim16-SoilN/Paddock1-LightSoil
        outputfile Results -> /Simulations/Test16-Bare+TypicSoil+addN/Sim16-SoilN/Paddock1-LightSoil/Results: filename=Sim16-SoilNitrogen Paddock1-LightSoil Results.out; title=Sim16-SoilNitrogen Paddock1-LightSoil Results
          variables -> /Simulations/Test16-Bare+TypicSoil+addN/Sim16-SoilN/Paddock1-LightSoil/Results/Variables
          events ReportingFrequency -> /Simulations/Test16-Bare+TypicSoil+addN/Sim16-SoilN/Paddock1-LightSoil/Results/ReportingFrequency
      area Paddock2-HeavySoil -> /Simulations/Test16-Bare+TypicSoil+addN/Sim16-SoilN/Paddock2-HeavySoil
        outputfile Results -> /Simulations/Test16-Bare+TypicSoil+addN/Sim16-SoilN/Paddock2-HeavySoil/Results: filename=Sim16-SoilNitrogen Paddock2-HeavySoil Results.out; title=Sim16-SoilNitrogen Paddock2-HeavySoil Results
          variables -> /Simulations/Test16-Bare+TypicSoil+addN/Sim16-SoilN/Paddock2-HeavySoil/Results/Variables
          events ReportingFrequency -> /Simulations/Test16-Bare+TypicSoil+addN/Sim16-SoilN/Paddock2-HeavySoil/Results/ReportingFrequency
  folder Test17-Bare+TypicSoil+addUrea -> /Simulations/Test01-BareBare
    memo Info
      ++++++++++++++++++++  TEST 17 +++++++++++++++++++++++++++++++++++++++++++++++++++++++++++

         Description:
            - Artificial climate, smooth mild temperate;
            - Two generic soils, a free draining and a poorly drained;
            - Bare soil;
            - Initial mineral N: 30kgN/ha as NO3 + 30kgN/ha as NH4;
            - Initial soil organic matter composed of humus and FOM;
            - Iinitial surface residues of 1000kgDM/ha;
            - No additions of residues,
            - Addition of 50kgN/ha as urea in two different dates;

         Expected output:
            - All outputs with valid values (numeric mostly);
            - This is the complete basic soil run under bare cover conditions;
            - Testing the addition of N as urea (typical fertiliser rate);
    simulation Sim17-SoilN -> /Simulations/Test01-BareBare/Sim01-SoilN
      PlugIns: same as Test01-BareBare.Sim01-SoilN.PlugIns
      area Paddock1-LightSoil -> /Simulations/Test01-BareBare/Sim01-SoilN/Paddock1-LightSoil
        folder ManagerFolder -> /Simulations/Test01-BareBare/Sim01-SoilN/Paddock1-LightSoil/ManagerFolder
          operations OperationsSchedule
            5-Aug  Fertiliser apply amount=50 (kg/ha), depth=100 (mm), type=urea_n
            5-Oct  Fertiliser apply amount=50 (kg/ha), depth=100 (mm), type=urea_n
        surfaceom SurfaceOrganicMatter
          PoolName = Residue1  # Organic Matter pool name
          type = grass  # Organic Matter type
          mass = 1000  # Initial surface residue (kg/ha)
          cnr = 20  # C:N ratio of initial residue
          standing_fraction = 0  # Fraction of residue standing
        Soil Med-LightSoil: same as Test16-Bare+TypicSoil+addN.Sim16-SoilN.Paddock1-LightSoil.Med-LightSoil
        outputfile Results -> /Simulations/Test01-BareBare/Sim01-SoilN/Paddock1-LightSoil/Results: filename=Sim17-SoilN Paddock1-LightSoil Results.out; title=Sim17-SoilN Paddock1-LightSoil Results
          variables -> /Simulations/Test01-BareBare/Sim01-SoilN/Paddock1-LightSoil/Results/Variables
          events ReportingFrequency -> /Simulations/Test01-BareBare/Sim01-SoilN/Paddock1-LightSoil/Results/ReportingFrequency
      area Paddock2-HeavySoil -> /Simulations/Test01-BareBare/Sim01-SoilN/Paddock2-HeavySoil
        Soil Med-HeavySoil: LocalName=Generic medium-heavy sedimentary soil; Country=New Zealand; Latitude=0; Longitude=0
          DataSource=Hypothetical medium to heavy texture soil of sedimentary origin (moderately poorly drained)
          Analysis: same as Test01-BareBare.Sim01-SoilN.Paddock2-HeavySoil.Med-HeavySoil.Analysis
          Water: same as Test01-BareBare.Sim01-SoilN.Paddock2-HeavySoil.Med-HeavySoil.Water
          SoilWater: same as Test01-BareBare.Sim01-SoilN.Paddock2-HeavySoil.Med-HeavySoil.SoilWater
          SoilOrganicMatter: same as Test09-Bare+OrgN.Sim09-SoilN.Paddock2-HeavySoil.Med-HeavySoil.SoilOrganicMatter
          Sample Initial nitrogen -> /Simulations/Test17-Bare+TypicSoil+addUrea/Sim17-SoilN/Paddock1-LightSoil/Med-LightSoil/Initial nitrogen
          InitialWater: FractionFull=1; PercentMethod=EvenlyDistributed; RelativeTo=ll15
        outputfile Results -> /Simulations/Test01-BareBare/Sim01-SoilN/Paddock2-HeavySoil/Results: filename=Sim17-SoilN Paddock2-HeavySoil Results.out; title=Sim17-SoilN Paddock2-HeavySoil Results
          variables -> /Simulations/Test01-BareBare/Sim01-SoilN/Paddock2-HeavySoil/Results/Variables
          events ReportingFrequency -> /Simulations/Test01-BareBare/Sim01-SoilN/Paddock2-HeavySoil/Results/ReportingFrequency
    simulation Sim17-SoilNitrogen -> /Simulations/Test17-Bare+TypicSoil+addUrea/Sim17-SoilN
      PlugIns: same as Test01-BareBare.Sim01-SoilN.PlugIns
      area Paddock1-LightSoil -> /Simulations/Test17-Bare+TypicSoil+addUrea/Sim17-SoilN/Paddock1-LightSoil
        outputfile Results -> /Simulations/Test17-Bare+TypicSoil+addUrea/Sim17-SoilN/Paddock1-LightSoil/Results: filename=Sim17-SoilNitrogen Paddock1-LightSoil Results.out; title=Sim17-SoilNitrogen Paddock1-LightSoil Results
          variables -> /Simulations/Test17-Bare+TypicSoil+addUrea/Sim17-SoilN/Paddock1-LightSoil/Results/Variables
          events ReportingFrequency -> /Simulations/Test17-Bare+TypicSoil+addUrea/Sim17-SoilN/Paddock1-LightSoil/Results/ReportingFrequency
      area Paddock2-HeavySoil -> /Simulations/Test17-Bare+TypicSoil+addUrea/Sim17-SoilN/Paddock2-HeavySoil
        outputfile Results -> /Simulations/Test17-Bare+TypicSoil+addUrea/Sim17-SoilN/Paddock2-HeavySoil/Results: filename=Sim17-SoilNitrogen Paddock2-HeavySoil Results.out; title=Sim17-SoilNitrogen Paddock2-HeavySoil Results
          variables -> /Simulations/Test17-Bare+TypicSoil+addUrea/Sim17-SoilN/Paddock2-HeavySoil/Results/Variables
          events ReportingFrequency -> /Simulations/Test17-Bare+TypicSoil+addUrea/Sim17-SoilN/Paddock2-HeavySoil/Results/ReportingFrequency
  folder Test18-Bare+TypicSoil+addUreaLots -> /Simulations/Test01-BareBare
    memo Info
      ++++++++++++++++++++  TEST 18 +++++++++++++++++++++++++++++++++++++++++++++++++++++++++++

         Description:
            - Artificial climate, smooth mild temperate;
            - Two generic soils, a free draining and a poorly drained;
            - Bare soil;
            - Initial mineral N: 30kgN/ha as NO3 + 30kgN/ha as NH4;
            - Initial soil organic matter composed of humus and FOM;
            - Iinitial surface residues of 1000kgDM/ha;
            - No additions of residues,
            - Addition of 500kgN/ha as urea in two different dates;

         Expected output:
            - All outputs with valid values (numeric mostly);
            - This is the complete basic soil run under bare cover conditions;
            - Testing the addition of N as urea (high N rate);
    simulation Sim18-SoilN -> /Simulations/Test01-BareBare/Sim01-SoilN
      PlugIns: same as Test01-BareBare.Sim01-SoilN.PlugIns
      area Paddock1-LightSoil -> /Simulations/Test01-BareBare/Sim01-SoilN/Paddock1-LightSoil
        folder ManagerFolder -> /Simulations/Test01-BareBare/Sim01-SoilN/Paddock1-LightSoil/ManagerFolder
          operations OperationsSchedule
            5-Aug  Fertiliser apply amount=500 (kg/ha), depth=100 (mm), type=urea_n
            5-Oct  Fertiliser apply amount=500 (kg/ha), depth=100 (mm), type=urea_n
        surfaceom SurfaceOrganicMatter
          PoolName = Residue1  # Organic Matter pool name
          type = grass  # Organic Matter type
          mass = 1000  # Initial surface residue (kg/ha)
          cnr = 20  # C:N ratio of initial residue
          standing_fraction = 0  # Fraction of residue standing
        Soil Med-LightSoil: same as Test16-Bare+TypicSoil+addN.Sim16-SoilN.Paddock1-LightSoil.Med-LightSoil
        outputfile Results -> /Simulations/Test01-BareBare/Sim01-SoilN/Paddock1-LightSoil/Results: filename=Sim18-SoilN Paddock1-LightSoil Results.out; title=Sim18-SoilN Paddock1-LightSoil Results
          variables -> /Simulations/Test01-BareBare/Sim01-SoilN/Paddock1-LightSoil/Results/Variables
          events ReportingFrequency -> /Simulations/Test01-BareBare/Sim01-SoilN/Paddock1-LightSoil/Results/ReportingFrequency
      area Paddock2-HeavySoil -> /Simulations/Test01-BareBare/Sim01-SoilN/Paddock2-HeavySoil
        Soil Med-HeavySoil: LocalName=Generic medium-heavy sedimentary soil; Country=New Zealand; Latitude=0; Longitude=0
          DataSource=Hypothetical medium to heavy texture soil of sedimentary origin (moderately poorly drained)
          Analysis: same as Test01-BareBare.Sim01-SoilN.Paddock2-HeavySoil.Med-HeavySoil.Analysis
          Water: same as Test01-BareBare.Sim01-SoilN.Paddock2-HeavySoil.Med-HeavySoil.Water
          SoilWater: same as Test01-BareBare.Sim01-SoilN.Paddock2-HeavySoil.Med-HeavySoil.SoilWater
          SoilOrganicMatter: same as Test09-Bare+OrgN.Sim09-SoilN.Paddock2-HeavySoil.Med-HeavySoil.SoilOrganicMatter
          Sample Initial nitrogen -> /Simulations/Test18-Bare+TypicSoil+addUreaLots/Sim18-SoilN/Paddock1-LightSoil/Med-LightSoil/Initial nitrogen
          InitialWater: FractionFull=1; PercentMethod=EvenlyDistributed; RelativeTo=ll15
        outputfile Results -> /Simulations/Test01-BareBare/Sim01-SoilN/Paddock2-HeavySoil/Results: filename=Sim18-SoilN Paddock2-HeavySoil Results.out; title=Sim18-SoilN Paddock2-HeavySoil Results
          variables -> /Simulations/Test01-BareBare/Sim01-SoilN/Paddock2-HeavySoil/Results/Variables
          events ReportingFrequency -> /Simulations/Test01-BareBare/Sim01-SoilN/Paddock2-HeavySoil/Results/ReportingFrequency
    simulation Sim18-SoilNitrogen -> /Simulations/Test18-Bare+TypicSoil+addUreaLots/Sim18-SoilN
      PlugIns: same as Test01-BareBare.Sim01-SoilN.PlugIns
      area Paddock1-LightSoil -> /Simulations/Test18-Bare+TypicSoil+addUreaLots/Sim18-SoilN/Paddock1-LightSoil
        outputfile Results -> /Simulations/Test18-Bare+TypicSoil+addUreaLots/Sim18-SoilN/Paddock1-LightSoil/Results: filename=Sim18-SoilNitrogen Paddock1-LightSoil Results.out; title=Sim18-SoilNitrogen Paddock1-LightSoil Results
          variables -> /Simulations/Test18-Bare+TypicSoil+addUreaLots/Sim18-SoilN/Paddock1-LightSoil/Results/Variables
          events ReportingFrequency -> /Simulations/Test18-Bare+TypicSoil+addUreaLots/Sim18-SoilN/Paddock1-LightSoil/Results/ReportingFrequency
      area Paddock2-HeavySoil -> /Simulations/Test18-Bare+TypicSoil+addUreaLots/Sim18-SoilN/Paddock2-HeavySoil
        outputfile Results -> /Simulations/Test18-Bare+TypicSoil+addUreaLots/Sim18-SoilN/Paddock2-HeavySoil/Results: filename=Sim18-SoilNitrogen Paddock2-HeavySoil Results.out; title=Sim18-SoilNitrogen Paddock2-HeavySoil Results
          variables -> /Simulations/Test18-Bare+TypicSoil+addUreaLots/Sim18-SoilN/Paddock2-HeavySoil/Results/Variables
          events ReportingFrequency -> /Simulations/Test18-Bare+TypicSoil+addUreaLots/Sim18-SoilN/Paddock2-HeavySoil/Results/ReportingFrequency
  folder Test19-Bare+MinN+addOM -> /Simulations/Test01-BareBare
    memo Info
      ++++++++++++++++++++  TEST 19 +++++++++++++++++++++++++++++++++++++++++++++++++++++++++++

         Description:
            - Artificial climate, smooth mild temperate;
            - Two generic soils, a free draining and a poorly drained;
            - Bare soil;
            - Initial mineral N: 30kgN/ha as NO3 + 30kgN/ha as NH4;
            - No initial soil organic matter;
            - No initial surface residues;
            - Incorporating FOM of different types in two different dates;
            - No additions of mineral N;

         Expected output:
            - All outputs with valid values (numeric mostly);
            - Checking the addition of FOM to the soil, included mineral N so decomposition also happens;
    simulation Sim19-SoilN -> /Simulations/Test01-BareBare/Sim01-SoilN
      PlugIns: same as Test01-BareBare.Sim01-SoilN.PlugIns
      area Paddock1-LightSoil -> /Simulations/Test01-BareBare/Sim01-SoilN/Paddock1-LightSoil
        folder ManagerFolder -> /Simulations/Test01-BareBare/Sim01-SoilN/Paddock1-LightSoil/ManagerFolder
          operations OperationsSchedule
            5-Aug  'Med-LightSoil nitrogen' incorpfom type = default, amount=500 300 200 100 50 50, cnr=20 20 20 20 20 20
            5-Oct  'Med-LightSoil nitrogen' incorpfom type = stable, amount=100 300 100 00 00 00, cnr=40 40 40 40 40 40
        surfaceom SurfaceOrganicMatter
          PoolName = Residue1  # Organic Matter pool name
          type = grass  # Organic Matter type
          mass = 0  # Initial surface residue (kg/ha)
          cnr = 20  # C:N ratio of initial residue
          standing_fraction = 0  # Fraction of residue standing
        Soil Med-LightSoil: same as Test08-Bare+MinN.Sim08-SoilN.Paddock1-LightSoil.Med-LightSoil
        outputfile Results -> /Simulations/Test01-BareBare/Sim01-SoilN/Paddock1-LightSoil/Results: filename=Sim19-SoilN Paddock1-LightSoil Results.out; title=Sim19-SoilN Paddock1-LightSoil Results
          variables -> /Simulations/Test01-BareBare/Sim01-SoilN/Paddock1-LightSoil/Results/Variables
          events ReportingFrequency -> /Simulations/Test01-BareBare/Sim01-SoilN/Paddock1-LightSoil/Results/ReportingFrequency
      area Paddock2-HeavySoil -> /Simulations/Test01-BareBare/Sim01-SoilN/Paddock2-HeavySoil
        folder ManagerFolder -> /Simulations/Test01-BareBare/Sim01-SoilN/Paddock2-HeavySoil/ManagerFolder
          operations OperationsSchedule
            5-Aug  'Med-HeavySoil nitrogen' incorpfom type = default, amount=500 300 200 100 50 50, cnr=20 20 20 20 20 20
            5-Oct  'Med-HeavySoil nitrogen' incorpfom type = stable, amount=100 300 100 00 00 00, cnr=40 40 40 40 40 40
        Soil Med-HeavySoil: LocalName=Generic medium-heavy sedimentary soil; Country=New Zealand; Latitude=0; Longitude=0
          DataSource=Hypothetical medium to heavy texture soil of sedimentary origin (moderately poorly drained)
          Analysis: same as Test01-BareBare.Sim01-SoilN.Paddock2-HeavySoil.Med-HeavySoil.Analysis
          Water: same as Test01-BareBare.Sim01-SoilN.Paddock2-HeavySoil.Med-HeavySoil.Water
          SoilWater: same as Test01-BareBare.Sim01-SoilN.Paddock2-HeavySoil.Med-HeavySoil.SoilWater
          SoilOrganicMatter: RootCN=30; RootWt=0; SoilCN=12.5; EnrACoeff=7.4; EnrBCoeff=0.2; OCUnits=Total
            Thickness  OC  FBiom  FInert
            150        0   0.035  0.5
            150        0   0.025  0.65
            300        0   0.015  0.835
            300        0   0.01   0.94
            300        0   0.01   0.97
            300        0   0.01   0.996
          Sample Initial nitrogen -> /Simulations/Test19-Bare+MinN+addOM/Sim19-SoilN/Paddock1-LightSoil/Med-LightSoil/Initial nitrogen
          InitialWater: FractionFull=1; PercentMethod=EvenlyDistributed; RelativeTo=ll15
        outputfile Results -> /Simulations/Test01-BareBare/Sim01-SoilN/Paddock2-HeavySoil/Results: filename=Sim19-SoilN Paddock2-HeavySoil Results.out; title=Sim19-SoilN Paddock2-HeavySoil Results
          variables -> /Simulations/Test01-BareBare/Sim01-SoilN/Paddock2-HeavySoil/Results/Variables
          events ReportingFrequency -> /Simulations/Test01-BareBare/Sim01-SoilN/Paddock2-HeavySoil/Results/ReportingFrequency
    simulation Sim19-SoilNitrogen -> /Simulations/Test19-Bare+MinN+addOM/Sim19-SoilN
      PlugIns: same as Test01-BareBare.Sim01-SoilN.PlugIns
      area Paddock1-LightSoil -> /Simulations/Test19-Bare+MinN+addOM/Sim19-SoilN/Paddock1-LightSoil
        outputfile Results -> /Simulations/Test19-Bare+MinN+addOM/Sim19-SoilN/Paddock1-LightSoil/Results: filename=Sim19-SoilNitrogen Paddock1-LightSoil Results.out; title=Sim19-SoilNitrogen Paddock1-LightSoil Results
          variables -> /Simulations/Test19-Bare+MinN+addOM/Sim19-SoilN/Paddock1-LightSoil/Results/Variables
          events ReportingFrequency -> /Simulations/Test19-Bare+MinN+addOM/Sim19-SoilN/Paddock1-LightSoil/Results/ReportingFrequency
      area Paddock2-HeavySoil -> /Simulations/Test19-Bare+MinN+addOM/Sim19-SoilN/Paddock2-HeavySoil
        outputfile Results -> /Simulations/Test19-Bare+MinN+addOM/Sim19-SoilN/Paddock2-HeavySoil/Results: filename=Sim19-SoilNitrogen Paddock2-HeavySoil Results.out; title=Sim19-SoilNitrogen Paddock2-HeavySoil Results
          variables -> /Simulations/Test19-Bare+MinN+addOM/Sim19-SoilN/Paddock2-HeavySoil/Results/Variables
          events ReportingFrequency -> /Simulations/Test19-Bare+MinN+addOM/Sim19-SoilN/Paddock2-HeavySoil/Results/ReportingFrequency
  folder Test20-Bare+MinN+add2OM -> /Simulations/Test01-BareBare
    memo Info
      ++++++++++++++++++++  TEST 20 +++++++++++++++++++++++++++++++++++++++++++++++++++++++++++

         Description:
            - Artificial climate, smooth mild temperate;
            - Two generic soils, a free draining and a poorly drained;
            - Bare soil;
            - Initial mineral N: 30kgN/ha as NO3 + 30kgN/ha as NH4;
            - No initial soil organic matter;
            - No initial surface residues;
            - Incorporating FOM and adding surface OM in different dates;
            - No additions of mineral N;

         Expected output:
            - All outputs with valid values (numeric mostly);
            - Checking the addition of OM to the soil (contrast FOM and surface OM), included mineral N so decomposition also happens;
    simulation Sim20-SoilN -> /Simulations/Test01-BareBare/Sim01-SoilN
      PlugIns: same as Test01-BareBare.Sim01-SoilN.PlugIns
      area Paddock1-LightSoil -> /Simulations/Test01-BareBare/Sim01-SoilN/Paddock1-LightSoil
        folder ManagerFolder -> /Simulations/Test01-BareBare/Sim01-SoilN/Paddock1-LightSoil/ManagerFolder
          operations OperationsSchedule
            5-Aug  'Med-LightSoil nitrogen' incorpfom type = default, amount=500 300 100 50 50 00, cnr=20 20 20 20 20 20
            5-Oct  'SurfaceOrganicMatter' add_surfaceom name = Residue2, type = grass, mass = 1000 (kg/ha), cnr = 20, cpr = 0
        surfaceom SurfaceOrganicMatter
          PoolName = Residue1  # Organic Matter pool name
          type = grass  # Organic Matter type
          mass = 0  # Initial surface residue (kg/ha)
          cnr = 20  # C:N ratio of initial residue
          standing_fraction = 0  # Fraction of residue standing
        Soil Med-LightSoil: same as Test08-Bare+MinN.Sim08-SoilN.Paddock1-LightSoil.Med-LightSoil
        outputfile Results -> /Simulations/Test01-BareBare/Sim01-SoilN/Paddock1-LightSoil/Results: filename=Sim20-SoilN Paddock1-LightSoil Results.out; title=Sim20-SoilN Paddock1-LightSoil Results
          variables -> /Simulations/Test01-BareBare/Sim01-SoilN/Paddock1-LightSoil/Results/Variables
          events ReportingFrequency -> /Simulations/Test01-BareBare/Sim01-SoilN/Paddock1-LightSoil/Results/ReportingFrequency
      area Paddock2-HeavySoil -> /Simulations/Test01-BareBare/Sim01-SoilN/Paddock2-HeavySoil
        folder ManagerFolder -> /Simulations/Test01-BareBare/Sim01-SoilN/Paddock2-HeavySoil/ManagerFolder
          operations OperationsSchedule
            5-Aug  'Med-HeavySoil nitrogen' incorpfom type = default, amount=500 300 100 50 50 00, cnr=20 20 20 20 20 20
            5-Oct  'SurfaceOrganicMatter' add_surfaceom name = Residue2, type = grass, mass = 1000 (kg/ha), cnr = 20, cpr = 0
        Soil Med-HeavySoil: LocalName=Generic medium-heavy sedimentary soil; Country=New Zealand; Latitude=0; Longitude=0
          DataSource=Hypothetical medium to heavy texture soil of sedimentary origin (moderately poorly drained)
          Analysis: same as Test01-BareBare.Sim01-SoilN.Paddock2-HeavySoil.Med-HeavySoil.Analysis
          Water: same as Test01-BareBare.Sim01-SoilN.Paddock2-HeavySoil.Med-HeavySoil.Water
          SoilWater: same as Test01-BareBare.Sim01-SoilN.Paddock2-HeavySoil.Med-HeavySoil.SoilWater
          SoilOrganicMatter: RootCN=30; RootWt=0; SoilCN=12.5; EnrACoeff=7.4; EnrBCoeff=0.2; OCUnits=Total
            Thickness  OC  FBiom  FInert
            150        0   0.035  0.5
            150        0   0.025  0.65
            300        0   0.015  0.835
            300        0   0.01   0.94
            300        0   0.01   0.97
            300        0   0.01   0.996
          Sample Initial nitrogen -> /Simulations/Test20-Bare+MinN+add2OM/Sim20-SoilN/Paddock1-LightSoil/Med-LightSoil/Initial nitrogen
          InitialWater: FractionFull=1; PercentMethod=EvenlyDistributed; RelativeTo=ll15
        outputfile Results -> /Simulations/Test01-BareBare/Sim01-SoilN/Paddock2-HeavySoil/Results: filename=Sim20-SoilN Paddock2-HeavySoil Results.out; title=Sim20-SoilN Paddock2-HeavySoil Results
          variables -> /Simulations/Test01-BareBare/Sim01-SoilN/Paddock2-HeavySoil/Results/Variables
          events ReportingFrequency -> /Simulations/Test01-BareBare/Sim01-SoilN/Paddock2-HeavySoil/Results/ReportingFrequency
    simulation Sim20-SoilNitrogen -> /Simulations/Test20-Bare+MinN+add2OM/Sim20-SoilN
      PlugIns: same as Test01-BareBare.Sim01-SoilN.PlugIns
      area Paddock1-LightSoil -> /Simulations/Test20-Bare+MinN+add2OM/Sim20-SoilN/Paddock1-LightSoil
        outputfile Results -> /Simulations/Test20-Bare+MinN+add2OM/Sim20-SoilN/Paddock1-LightSoil/Results: filename=Sim20-SoilNitrogen Paddock1-LightSoil Results.out; title=Sim20-SoilNitrogen Paddock1-LightSoil Results
          variables -> /Simulations/Test20-Bare+MinN+add2OM/Sim20-SoilN/Paddock1-LightSoil/Results/Variables
          events ReportingFrequency -> /Simulations/Test20-Bare+MinN+add2OM/Sim20-SoilN/Paddock1-LightSoil/Results/ReportingFrequency
      area Paddock2-HeavySoil -> /Simulations/Test20-Bare+MinN+add2OM/Sim20-SoilN/Paddock2-HeavySoil
        outputfile Results -> /Simulations/Test20-Bare+MinN+add2OM/Sim20-SoilN/Paddock2-HeavySoil/Results: filename=Sim20-SoilNitrogen Paddock2-HeavySoil Results.out; title=Sim20-SoilNitrogen Paddock2-HeavySoil Results
          variables -> /Simulations/Test20-Bare+MinN+add2OM/Sim20-SoilN/Paddock2-HeavySoil/Results/Variables
          events ReportingFrequency -> /Simulations/Test20-Bare+MinN+add2OM/Sim20-SoilN/Paddock2-HeavySoil/Results/ReportingFrequency
  folder Test21-Bare+TypicSoil+add3OM -> /Simulations/Test01-BareBare
    memo Info
      ++++++++++++++++++++  TEST 21 +++++++++++++++++++++++++++++++++++++++++++++++++++++++++++

         Description:
            - Artificial climate, smooth mild temperate;
            - Two generic soils, a free draining and a poorly drained;
            - Bare soil;
            - Initial mineral N: 30kgN/ha as NO3 + 30kgN/ha as NH4;
            - Initial soil organic matter composed of humus and FOM;
            - Iinitial surface residues of 1000kgDM/ha;
            - Incorporating FOM in two different dates and adding surface OM in another date;
            - No additions of mineral N;

         Expected output:
            - All outputs with valid values (numeric mostly);
            - This is the complete basic soil run under bare cover conditions;
            - Testing the addition of OM (as Fom or surface OM);
    simulation Sim21-SoilN -> /Simulations/Test01-BareBare/Sim01-SoilN
      PlugIns: same as Test01-BareBare.Sim01-SoilN.PlugIns
      area Paddock1-LightSoil -> /Simulations/Test01-BareBare/Sim01-SoilN/Paddock1-LightSoil
        folder ManagerFolder -> /Simulations/Test01-BareBare/Sim01-SoilN/Paddock1-LightSoil/ManagerFolder
          operations OperationsSchedule
            5-Aug  'Med-LightSoil nitrogen' incorpfom type = default, amount=500 500 00 00 00 00, cnr=30 30 30 30 30 30
            15-Sep  'SurfaceOrganicMatter' add_surfaceom name = Residue2, type = grass, mass = 1000 (kg/ha), cnr = 20, cpr = 0
            15-Oct  'Med-LightSoil nitrogen' incorpfom type = manure, amount=500 400 100 00 00 00, cnr=14 13 12 14 14 14
        surfaceom SurfaceOrganicMatter
          PoolName = Residue1  # Organic Matter pool name
          type = grass  # Organic Matter type
          mass = 1000  # Initial surface residue (kg/ha)
          cnr = 20  # C:N ratio of initial residue
          standing_fraction = 0  # Fraction of residue standing
        Soil Med-LightSoil: same as Test16-Bare+TypicSoil+addN.Sim16-SoilN.Paddock1-LightSoil.Med-LightSoil
        outputfile Results -> /Simulations/Test01-BareBare/Sim01-SoilN/Paddock1-LightSoil/Results: filename=Sim21-SoilN Paddock1-LightSoil Results.out; title=Sim21-SoilN Paddock1-LightSoil Results
          variables -> /Simulations/Test01-BareBare/Sim01-SoilN/Paddock1-LightSoil/Results/Variables
          events ReportingFrequency -> /Simulations/Test01-BareBare/Sim01-SoilN/Paddock1-LightSoil/Results/ReportingFrequency
      area Paddock2-HeavySoil -> /Simulations/Test01-BareBare/Sim01-SoilN/Paddock2-HeavySoil
        folder ManagerFolder -> /Simulations/Test01-BareBare/Sim01-SoilN/Paddock2-HeavySoil/ManagerFolder
          operations OperationsSchedule
            5-Aug  'Med-HeavySoil nitrogen' incorpfom type = default, amount=500 500 00 00 00 00, cnr=30 30 30 30 30 30
            15-Sep  'SurfaceOrganicMatter' add_surfaceom name = Residue2, type = grass, mass = 1000 (kg/ha), cnr = 20, cpr = 0
            15-Oct  'Med-HeavySoil nitrogen' incorpfom type = manure, amount=500 400 100 00 00 00, cnr=14 13 12 14 14 14
        Soil Med-HeavySoil: LocalName=Generic medium-heavy sedimentary soil; Country=New Zealand; Latitude=0; Longitude=0
          DataSource=Hypothetical medium to heavy texture soil of sedimentary origin (moderately poorly drained)
          Analysis: same as Test01-BareBare.Sim01-SoilN.Paddock2-HeavySoil.Med-HeavySoil.Analysis
          Water: same as Test01-BareBare.Sim01-SoilN.Paddock2-HeavySoil.Med-HeavySoil.Water
          SoilWater: same as Test01-BareBare.Sim01-SoilN.Paddock2-HeavySoil.Med-HeavySoil.SoilWater
          SoilOrganicMatter: same as Test09-Bare+OrgN.Sim09-SoilN.Paddock2-HeavySoil.Med-HeavySoil.SoilOrganicMatter
          Sample Initial nitrogen -> /Simulations/Test21-Bare+TypicSoil+add3OM/Sim21-SoilN/Paddock1-LightSoil/Med-LightSoil/Initial nitrogen
          InitialWater: FractionFull=1; PercentMethod=EvenlyDistributed; RelativeTo=ll15
        outputfile Results -> /Simulations/Test01-BareBare/Sim01-SoilN/Paddock2-HeavySoil/Results: filename=Sim21-SoilN Paddock2-HeavySoil Results.out; title=Sim21-SoilN Paddock2-HeavySoil Results
          variables -> /Simulations/Test01-BareBare/Sim01-SoilN/Paddock2-HeavySoil/Results/Variables
          events ReportingFrequency -> /Simulations/Test01-BareBare/Sim01-SoilN/Paddock2-HeavySoil/Results/ReportingFrequency
    simulation Sim21-SoilNitrogen -> /Simulations/Test21-Bare+TypicSoil+add3OM/Sim21-SoilN
      PlugIns: same as Test01-BareBare.Sim01-SoilN.PlugIns
      area Paddock1-LightSoil -> /Simulations/Test21-Bare+TypicSoil+add3OM/Sim21-SoilN/Paddock1-LightSoil
        outputfile Results -> /Simulations/Test21-Bare+TypicSoil+add3OM/Sim21-SoilN/Paddock1-LightSoil/Results: filename=Sim21-SoilNitrogen Paddock1-LightSoil Results.out; title=Sim21-SoilNitrogen Paddock1-LightSoil Results
          variables -> /Simulations/Test21-Bare+TypicSoil+add3OM/Sim21-SoilN/Paddock1-LightSoil/Results/Variables
          events ReportingFrequency -> /Simulations/Test21-Bare+TypicSoil+add3OM/Sim21-SoilN/Paddock1-LightSoil/Results/ReportingFrequency
      area Paddock2-HeavySoil -> /Simulations/Test21-Bare+TypicSoil+add3OM/Sim21-SoilN/Paddock2-HeavySoil
        outputfile Results -> /Simulations/Test21-Bare+TypicSoil+add3OM/Sim21-SoilN/Paddock2-HeavySoil/Results: filename=Sim21-SoilNitrogen Paddock2-HeavySoil Results.out; title=Sim21-SoilNitrogen Paddock2-HeavySoil Results
          variables -> /Simulations/Test21-Bare+TypicSoil+add3OM/Sim21-SoilN/Paddock2-HeavySoil/Results/Variables
          events ReportingFrequency -> /Simulations/Test21-Bare+TypicSoil+add3OM/Sim21-SoilN/Paddock2-HeavySoil/Results/ReportingFrequency
  folder Test22-Bare+TypicSoil+addOM+Tillage -> /Simulations/Test01-BareBare
    memo Info
      ++++++++++++++++++++  TEST 22 +++++++++++++++++++++++++++++++++++++++++++++++++++++++++++

         Description:
            - Artificial climate, smooth mild temperate;
            - Two generic soils, a free draining and a poorly drained;
            - Bare soil;
            - Initial mineral N: 30kgN/ha as NO3 + 30kgN/ha as NH4;
            - Initial soil organic matter composed of humus and FOM;
            - Iinitial surface residues of 1000kgDM/ha;
            - Adding 1000kgDM/ha to surface OM;
            - No additions of mineral N;
            + Tillage events set to before and after the addition of surface OM (tillage triggers an incorporation of FOM)

         Expected output:
            - All outputs with valid values (numeric mostly);
            - This is the complete basic soil run under bare cover conditions;
            - Testing the addition of OM (as Fom or surface OM) under tillage events;
    simulation Sim22-SoilN -> /Simulations/Test01-BareBare/Sim01-SoilN
      PlugIns: same as Test01-BareBare.Sim01-SoilN.PlugIns
      area Paddock1-LightSoil -> /Simulations/Test01-BareBare/Sim01-SoilN/Paddock1-LightSoil
        folder ManagerFolder -> /Simulations/Test01-BareBare/Sim01-SoilN/Paddock1-LightSoil/ManagerFolder
          operations OperationsSchedule
            5-Aug  'SurfaceOrganicMatter' tillage type = 'user_defined', f_incorp = 0.5 (0-1), tillage_depth = 250. (mm)
            1-Sep  'SurfaceOrganicMatter' add_surfaceom name = Residue2, type = grass, mass = 1000 (kg/ha), cnr = 20, cpr = 0
            5-Sep  'SurfaceOrganicMatter' tillage type = 'user_defined', f_incorp = 0.5 (0-1), tillage_depth = 250. (mm)
            10-Sep  'SurfaceOrganicMatter' tillage type = 'user_defined', f_incorp = 0.5 (0-1), tillage_depth = 100. (mm)
        surfaceom SurfaceOrganicMatter
          PoolName = Residue1  # Organic Matter pool name
          type = grass  # Organic Matter type
          mass = 1000  # Initial surface residue (kg/ha)
          cnr = 20  # C:N ratio of initial residue
          standing_fraction = 0  # Fraction of residue standing
        Soil Med-LightSoil: same as Test16-Bare+TypicSoil+addN.Sim16-SoilN.Paddock1-LightSoil.Med-LightSoil
        outputfile Results -> /Simulations/Test01-BareBare/Sim01-SoilN/Paddock1-LightSoil/Results: filename=Sim22-SoilN Paddock1-LightSoil Results.out; title=Sim22-SoilN Paddock1-LightSoil Results
          variables -> /Simulations/Test01-BareBare/Sim01-SoilN/Paddock1-LightSoil/Results/Variables
          events ReportingFrequency -> /Simulations/Test01-BareBare/Sim01-SoilN/Paddock1-LightSoil/Results/ReportingFrequency
      area Paddock2-HeavySoil -> /Simulations/Test01-BareBare/Sim01-SoilN/Paddock2-HeavySoil
        Soil Med-HeavySoil: LocalName=Generic medium-heavy sedimentary soil; Country=New Zealand; Latitude=0; Longitude=0
          DataSource=Hypothetical medium to heavy texture soil of sedimentary origin (moderately poorly drained)
          Analysis: same as Test01-BareBare.Sim01-SoilN.Paddock2-HeavySoil.Med-HeavySoil.Analysis
          Water: same as Test01-BareBare.Sim01-SoilN.Paddock2-HeavySoil.Med-HeavySoil.Water
          SoilWater: same as Test01-BareBare.Sim01-SoilN.Paddock2-HeavySoil.Med-HeavySoil.SoilWater
          SoilOrganicMatter: same as Test09-Bare+OrgN.Sim09-SoilN.Paddock2-HeavySoil.Med-HeavySoil.SoilOrganicMatter
          Sample Initial nitrogen -> /Simulations/Test22-Bare+TypicSoil+addOM+Tillage/Sim22-SoilN/Paddock1-LightSoil/Med-LightSoil/Initial nitrogen
          InitialWater: FractionFull=1; PercentMethod=EvenlyDistributed; RelativeTo=ll15
        outputfile Results -> /Simulations/Test01-BareBare/Sim01-SoilN/Paddock2-HeavySoil/Results: filename=Sim22-SoilN Paddock2-HeavySoil Results.out; title=Sim22-SoilN Paddock2-HeavySoil Results
          variables -> /Simulations/Test01-BareBare/Sim01-SoilN/Paddock2-HeavySoil/Results/Variables
          events ReportingFrequency -> /Simulations/Test01-BareBare/Sim01-SoilN/Paddock2-HeavySoil/Results/ReportingFrequency
    simulation Sim22-SoilNitrogen -> /Simulations/Test22-Bare+TypicSoil+addOM+Tillage/Sim22-SoilN
      PlugIns: same as Test01-BareBare.Sim01-SoilN.PlugIns
      area Paddock1-LightSoil -> /Simulations/Test22-Bare+TypicSoil+addOM+Tillage/Sim22-SoilN/Paddock1-LightSoil
        outputfile Results -> /Simulations/Test22-Bare+TypicSoil+addOM+Tillage/Sim22-SoilN/Paddock1-LightSoil/Results: filename=Sim22-SoilNitrogen Paddock1-LightSoil Results.out; title=Sim22-SoilNitrogen Paddock1-LightSoil Results
          variables -> /Simulations/Test22-Bare+TypicSoil+addOM+Tillage/Sim22-SoilN/Paddock1-LightSoil/Results/Variables
          events ReportingFrequency -> /Simulations/Test22-Bare+TypicSoil+addOM+Tillage/Sim22-SoilN/Paddock1-LightSoil/Results/ReportingFrequency
      area Paddock2-HeavySoil -> /Simulations/Test22-Bare+TypicSoil+addOM+Tillage/Sim22-SoilN/Paddock2-HeavySoil
        outputfile Results -> /Simulations/Test22-Bare+TypicSoil+addOM+Tillage/Sim22-SoilN/Paddock2-HeavySoil/Results: filename=Sim22-SoilNitrogen Paddock2-HeavySoil Results.out; title=Sim22-SoilNitrogen Paddock2-HeavySoil Results
          variables -> /Simulations/Test22-Bare+TypicSoil+addOM+Tillage/Sim22-SoilN/Paddock2-HeavySoil/Results/Variables
          events ReportingFrequency -> /Simulations/Test22-Bare+TypicSoil+addOM+Tillage/Sim22-SoilN/Paddock2-HeavySoil/Results/ReportingFrequency
  folder Test23-Bare+TypicSoil+addOM+Tillage+Urea -> /Simulations/Test01-BareBare
    memo Info
      ++++++++++++++++++++  TEST 23 +++++++++++++++++++++++++++++++++++++++++++++++++++++++++++

         Description:
            - Artificial climate, smooth mild temperate;
            - Two generic soils, a free draining and a poorly drained;
            - Bare soil;
            - Initial mineral N: 30kgN/ha as NO3 + 30kgN/ha as NH4;
            - Initial soil organic matter composed of humus and FOM;
            - Iinitial surface residues of 1000kgDM/ha;
            - Incorporating 1000kgDM/ha as FOM and adding 1000kgDM/ha to surface OM;
            - Addition of 50kgN/ha as urea;
            + Tillage events set to before and after the addition of surface OM (tillage triggers an incorporation of FOM)

         Expected output:
            - All outputs with valid values (numeric mostly);
            - This is the complete basic soil run under bare cover conditions;
            - Testing the addition of OM (as Fom or surface OM) under tillage events plus fertiliser;
    simulation Sim23-SoilN -> /Simulations/Test01-BareBare/Sim01-SoilN
      PlugIns: same as Test01-BareBare.Sim01-SoilN.PlugIns
      area Paddock1-LightSoil -> /Simulations/Test01-BareBare/Sim01-SoilN/Paddock1-LightSoil
        folder ManagerFolder -> /Simulations/Test01-BareBare/Sim01-SoilN/Paddock1-LightSoil/ManagerFolder
          operations OperationsSchedule
            5-Aug  'SurfaceOrganicMatter' tillage type = 'user_defined', f_incorp = 0.5 (0-1), tillage_depth = 250. (mm)
            1-Sep  'Med-LightSoil nitrogen' incorpfom type = manure, amount=500 400 100 00 00 00, cnr=14 13 12 14 14 14
            1-Sep  'SurfaceOrganicMatter' add_surfaceom name = Residue2, type = RuminantDung_PastureFed, mass = 100 (kg/ha), cnr = 20, cpr = 0
            5-Sep  'SurfaceOrganicMatter' tillage type = 'user_defined', f_incorp = 0.5 (0-1), tillage_depth = 250. (mm)
            10-Sep  'SurfaceOrganicMatter' tillage type = 'user_defined', f_incorp = 0.5 (0-1), tillage_depth = 100. (mm)
            5-Oct  Fertiliser apply amount=100 (kg/ha), depth=100 (mm), type=urea_n
        surfaceom SurfaceOrganicMatter
          PoolName = Residue1  # Organic Matter pool name
          type = grass  # Organic Matter type
          mass = 1000  # Initial surface residue (kg/ha)
          cnr = 20  # C:N ratio of initial residue
          standing_fraction = 0  # Fraction of residue standing
        Soil Med-LightSoil: same as Test16-Bare+TypicSoil+addN.Sim16-SoilN.Paddock1-LightSoil.Med-LightSoil
        outputfile Results -> /Simulations/Test01-BareBare/Sim01-SoilN/Paddock1-LightSoil/Results: filename=Sim23-SoilN Paddock1-LightSoil Results.out; title=Sim23-SoilN Paddock1-LightSoil Results
          variables -> /Simulations/Test01-BareBare/Sim01-SoilN/Paddock1-LightSoil/Results/Variables
          events ReportingFrequency -> /Simulations/Test01-BareBare/Sim01-SoilN/Paddock1-LightSoil/Results/ReportingFrequency
      area Paddock2-HeavySoil -> /Simulations/Test01-BareBare/Sim01-SoilN/Paddock2-HeavySoil
        folder ManagerFolder -> /Simulations/Test01-BareBare/Sim01-SoilN/Paddock2-HeavySoil/ManagerFolder
          operations OperationsSchedule
            5-Aug  'SurfaceOrganicMatter' tillage type = 'user_defined', f_incorp = 0.5 (0-1), tillage_depth = 250. (mm)
            1-Sep  'Med-HeavySoil nitrogen' incorpfom type = manure, amount=500 400 100 00 00 00, cnr=14 13 12 14 14 14
            1-Sep  'SurfaceOrganicMatter' add_surfaceom name = Residue2, type = RuminantDung_PastureFed, mass = 100 (kg/ha), cnr = 20, cpr = 0
            5-Sep  'SurfaceOrganicMatter' tillage type = 'user_defined', f_incorp = 0.5 (0-1), tillage_depth = 250. (mm)
            10-Sep  'SurfaceOrganicMatter' tillage type = 'user_defined', f_incorp = 0.5 (0-1), tillage_depth = 100. (mm)
            5-Oct  Fertiliser apply amount=100 (kg/ha), depth=100 (mm), type=urea_n
        Soil Med-HeavySoil: LocalName=Generic medium-heavy sedimentary soil; Country=New Zealand; Latitude=0; Longitude=0
          DataSource=Hypothetical medium to heavy texture soil of sedimentary origin (moderately poorly drained)
          Analysis: same as Test01-BareBare.Sim01-SoilN.Paddock2-HeavySoil.Med-HeavySoil.Analysis
          Water: same as Test01-BareBare.Sim01-SoilN.Paddock2-HeavySoil.Med-HeavySoil.Water
          SoilWater: same as Test01-BareBare.Sim01-SoilN.Paddock2-HeavySoil.Med-HeavySoil.SoilWater
          SoilOrganicMatter: same as Test09-Bare+OrgN.Sim09-SoilN.Paddock2-HeavySoil.Med-HeavySoil.SoilOrganicMatter
          Sample Initial nitrogen -> /Simulations/Test23-Bare+TypicSoil+addOM+Tillage+Urea/Sim23-SoilN/Paddock1-LightSoil/Med-LightSoil/Initial nitrogen
          InitialWater: FractionFull=1; PercentMethod=EvenlyDistributed; RelativeTo=ll15
        outputfile Results -> /Simulations/Test01-BareBare/Sim01-SoilN/Paddock2-HeavySoil/Results: filename=Sim23-SoilN Paddock2-HeavySoil Results.out; title=Sim23-SoilN Paddock2-HeavySoil Results
          variables -> /Simulations/Test01-BareBare/Sim01-SoilN/Paddock2-HeavySoil/Results/Variables
          events ReportingFrequency -> /Simulations/Test01-BareBare/Sim01-SoilN/Paddock2-HeavySoil/Results/ReportingFrequency
    simulation Sim23-SoilNitrogen -> /Simulations/Test23-Bare+TypicSoil+addOM+Tillage+Urea/Sim23-SoilN
      PlugIns: same as Test01-BareBare.Sim01-SoilN.PlugIns
      area Paddock1-LightSoil -> /Simulations/Test23-Bare+TypicSoil+addOM+Tillage+Urea/Sim23-SoilN/Paddock1-LightSoil
        outputfile Results -> /Simulations/Test23-Bare+TypicSoil+addOM+Tillage+Urea/Sim23-SoilN/Paddock1-LightSoil/Results: filename=Sim23-SoilNitrogen Paddock1-LightSoil Results.out; title=Sim23-SoilNitrogen Paddock1-LightSoil Results
          variables -> /Simulations/Test23-Bare+TypicSoil+addOM+Tillage+Urea/Sim23-SoilN/Paddock1-LightSoil/Results/Variables
          events ReportingFrequency -> /Simulations/Test23-Bare+TypicSoil+addOM+Tillage+Urea/Sim23-SoilN/Paddock1-LightSoil/Results/ReportingFrequency
      area Paddock2-HeavySoil -> /Simulations/Test23-Bare+TypicSoil+addOM+Tillage+Urea/Sim23-SoilN/Paddock2-HeavySoil
        outputfile Results -> /Simulations/Test23-Bare+TypicSoil+addOM+Tillage+Urea/Sim23-SoilN/Paddock2-HeavySoil/Results: filename=Sim23-SoilNitrogen Paddock2-HeavySoil Results.out; title=Sim23-SoilNitrogen Paddock2-HeavySoil Results
          variables -> /Simulations/Test23-Bare+TypicSoil+addOM+Tillage+Urea/Sim23-SoilN/Paddock2-HeavySoil/Results/Variables
          events ReportingFrequency -> /Simulations/Test23-Bare+TypicSoil+addOM+Tillage+Urea/Sim23-SoilN/Paddock2-HeavySoil/Results/ReportingFrequency
  folder Test24-Bare+TypicSoil+addUrea+Reset -> /Simulations/Test01-BareBare
    memo Info
      ++++++++++++++++++++  TEST 24 +++++++++++++++++++++++++++++++++++++++++++++++++++++++++++

         Description:
            - Artificial climate, smooth mild temperate;
            - Two generic soils, a free draining and a poorly drained;
            - Bare soil;
            - Initial mineral N: 30kgN/ha as NO3 + 30kgN/ha as NH4;
            - Initial soil organic matter composed of humus and FOM;
            - Iinitial surface residues of 1000kgDM/ha;
            - No additions of residues;
            - Adding 50kgN/ha as urea in two dates;
            + Reset SoilN during simulation;

         Expected output:
            - All outputs with valid values (numeric mostly);
            - This is the complete basic soil run under bare cover conditions;
            - Checking the reset command;
    simulation Sim24-SoilN -> /Simulations/Test01-BareBare/Sim01-SoilN
      PlugIns: same as Test01-BareBare.Sim01-SoilN.PlugIns
      area Paddock1-LightSoil -> /Simulations/Test01-BareBare/Sim01-SoilN/Paddock1-LightSoil
        folder ManagerFolder -> /Simulations/Test01-BareBare/Sim01-SoilN/Paddock1-LightSoil/ManagerFolder
          operations OperationsSchedule
            5-Aug  Fertiliser apply amount=50 (kg/ha), depth=100 (mm), type=urea_n
            1-Oct  'Med-LightSoil nitrogen' reset
            5-Oct  Fertiliser apply amount=50 (kg/ha), depth=200 (mm), type=urea_n
        surfaceom SurfaceOrganicMatter
          PoolName = Residue1  # Organic Matter pool name
          type = grass  # Organic Matter type
          mass = 1000  # Initial surface residue (kg/ha)
          cnr = 20  # C:N ratio of initial residue
          standing_fraction = 0  # Fraction of residue standing
        Soil Med-LightSoil: same as Test15-Bare+TypicSoil.Sim15-SoilN.Paddock1-LightSoil.Med-LightSoil
        outputfile Results -> /Simulations/Test01-BareBare/Sim01-SoilN/Paddock1-LightSoil/Results: filename=Sim24-SoilN Paddock1-LightSoil Results.out; title=Sim24-SoilN Paddock1-LightSoil Results
          variables -> /Simulations/Test01-BareBare/Sim01-SoilN/Paddock1-LightSoil/Results/Variables
          events ReportingFrequency -> /Simulations/Test01-BareBare/Sim01-SoilN/Paddock1-LightSoil/Results/ReportingFrequency
      area Paddock2-HeavySoil -> /Simulations/Test01-BareBare/Sim01-SoilN/Paddock2-HeavySoil
        folder ManagerFolder -> /Simulations/Test01-BareBare/Sim01-SoilN/Paddock2-HeavySoil/ManagerFolder
          operations OperationsSchedule
            5-Aug  Fertiliser apply amount=50 (kg/ha), depth=100 (mm), type=urea_n
            1-Oct  'Med-HeavySoil nitrogen' reset
            5-Oct  Fertiliser apply amount=50 (kg/ha), depth=200 (mm), type=urea_n
        Soil Med-HeavySoil: LocalName=Generic medium-heavy sedimentary soil; Country=New Zealand; Latitude=0; Longitude=0
          DataSource=Hypothetical medium to heavy texture soil of sedimentary origin (moderately poorly drained)
          Analysis: same as Test01-BareBare.Sim01-SoilN.Paddock2-HeavySoil.Med-HeavySoil.Analysis
          Water: same as Test01-BareBare.Sim01-SoilN.Paddock2-HeavySoil.Med-HeavySoil.Water
          SoilWater: same as Test01-BareBare.Sim01-SoilN.Paddock2-HeavySoil.Med-HeavySoil.SoilWater
          SoilOrganicMatter: same as Test09-Bare+OrgN.Sim09-SoilN.Paddock2-HeavySoil.Med-HeavySoil.SoilOrganicMatter
          Sample Initial nitrogen -> /Simulations/Test24-Bare+TypicSoil+addUrea+Reset/Sim24-SoilN/Paddock1-LightSoil/Med-LightSoil/Initial nitrogen
          InitialWater: FractionFull=1; PercentMethod=EvenlyDistributed; RelativeTo=ll15
        outputfile Results -> /Simulations/Test01-BareBare/Sim01-SoilN/Paddock2-HeavySoil/Results: filename=Sim24-SoilN Paddock2-HeavySoil Results.out; title=Sim24-SoilN Paddock2-HeavySoil Results
          variables -> /Simulations/Test01-BareBare/Sim01-SoilN/Paddock2-HeavySoil/Results/Variables
          events ReportingFrequency -> /Simulations/Test01-BareBare/Sim01-SoilN/Paddock2-HeavySoil/Results/ReportingFrequency
    simulation Sim24-SoilNitrogen -> /Simulations/Test24-Bare+TypicSoil+addUrea+Reset/Sim24-SoilN
      PlugIns: same as Test01-BareBare.Sim01-SoilN.PlugIns
      area Paddock1-LightSoil -> /Simulations/Test24-Bare+TypicSoil+addUrea+Reset/Sim24-SoilN/Paddock1-LightSoil
        outputfile Results -> /Simulations/Test24-Bare+TypicSoil+addUrea+Reset/Sim24-SoilN/Paddock1-LightSoil/Results: filename=Sim24-SoilNitrogen Paddock1-LightSoil Results.out; title=Sim24-SoilNitrogen Paddock1-LightSoil Results
          variables -> /Simulations/Test24-Bare+TypicSoil+addUrea+Reset/Sim24-SoilN/Paddock1-LightSoil/Results/Variables
          events ReportingFrequency -> /Simulations/Test24-Bare+TypicSoil+addUrea+Reset/Sim24-SoilN/Paddock1-LightSoil/Results/ReportingFrequency
      area Paddock2-HeavySoil -> /Simulations/Test24-Bare+TypicSoil+addUrea+Reset/Sim24-SoilN/Paddock2-HeavySoil
        outputfile Results -> /Simulations/Test24-Bare+TypicSoil+addUrea+Reset/Sim24-SoilN/Paddock2-HeavySoil/Results: filename=Sim24-SoilNitrogen Paddock2-HeavySoil Results.out; title=Sim24-SoilNitrogen Paddock2-HeavySoil Results
          variables -> /Simulations/Test24-Bare+TypicSoil+addUrea+Reset/Sim24-SoilN/Paddock2-HeavySoil/Results/Variables
          events ReportingFrequency -> /Simulations/Test24-Bare+TypicSoil+addUrea+Reset/Sim24-SoilN/Paddock2-HeavySoil/Results/ReportingFrequency
  folder Test25-Wheat+MinN+addUrea -> /Simulations/Test01-BareBare
    memo Info
      ++++++++++++++++++++  TEST 25 +++++++++++++++++++++++++++++++++++++++++++++++++++++++++++

         Description:
            - Artificial climate, smooth mild temperate;
            - Two generic soils, a free draining and a poorly drained;
            - Wheat crop;
            - No initial mineral N;
            - No initial soil organic matter;
            - No initial surface residues;
            - No additions of residues;
            - Adding 50kgN/ha as urea in two dates;

         Expected output:
            - All outputs with valid values (numeric mostly);
            - Most values close to zero, as there are no organic pools and wheat only starts growing;
    simulation Sim25-SoilN -> /Simulations/Test01-BareBare/Sim01-SoilN
      PlugIns: same as Test01-BareBare.Sim01-SoilN.PlugIns
      area Paddock1-LightSoil -> /Simulations/Test01-BareBare/Sim01-SoilN/Paddock1-LightSoil
        folder ManagerFolder -> /Simulations/Test01-BareBare/Sim01-SoilN/Paddock1-LightSoil/ManagerFolder
          manager HarvestingRule
            # Harvesting criteria
            crop = wheat  # Enter name of crop to harvest when ripe
            on end_of_day:
            script: same as in Sim00-Base.Paddock1.ManagerFolder.HarvestingRule
          operations OperationsSchedule
            5-Sep  wheat sow cultivar = Wakaniu, plants = 400, sowing_depth = 30 (mm), row_spacing = 150, crop_class = plant
            5-Sep  Fertiliser apply amount=50 (kg/ha), depth=100 (mm), type=urea_n
            30-Oct  Fertiliser apply amount=50 (kg/ha), depth=100 (mm), type=urea_n
        surfaceom SurfaceOrganicMatter
          PoolName = Residue1  # Organic Matter pool name
          type = grass  # Organic Matter type
          mass = 0  # Initial surface residue (kg/ha)
          cnr = 20  # C:N ratio of initial residue
          standing_fraction = 0  # Fraction of residue standing
        Soil Med-LightSoil: same as Test08-Bare+MinN.Sim08-SoilN.Paddock1-LightSoil.Med-LightSoil
        wheat
        outputfile Results -> /Simulations/Test01-BareBare/Sim01-SoilN/Paddock1-LightSoil/Results: filename=Sim25-SoilN Paddock1-LightSoil Results.out; title=Sim25-SoilN Paddock1-LightSoil Results
          variables -> /Simulations/Test01-BareBare/Sim01-SoilN/Paddock1-LightSoil/Results/Variables
          events ReportingFrequency -> /Simulations/Test01-BareBare/Sim01-SoilN/Paddock1-LightSoil/Results/ReportingFrequency
      area Paddock2-HeavySoil -> /Simulations/Test01-BareBare/Sim01-SoilN/Paddock2-HeavySoil
        Soil Med-HeavySoil: LocalName=Generic medium-heavy sedimentary soil; Country=New Zealand; Latitude=0; Longitude=0
          DataSource=Hypothetical medium to heavy texture soil of sedimentary origin (moderately poorly drained)
          Analysis: same as Test01-BareBare.Sim01-SoilN.Paddock2-HeavySoil.Med-HeavySoil.Analysis
          Water: same as Test01-BareBare.Sim01-SoilN.Paddock2-HeavySoil.Med-HeavySoil.Water
          SoilWater: same as Test01-BareBare.Sim01-SoilN.Paddock2-HeavySoil.Med-HeavySoil.SoilWater
          SoilOrganicMatter: RootCN=30; RootWt=0; SoilCN=12.5; EnrACoeff=7.4; EnrBCoeff=0.2; OCUnits=Total
            Thickness  OC  FBiom  FInert
            150        0   0.035  0.5
            150        0   0.025  0.65
            300        0   0.015  0.835
            300        0   0.01   0.94
            300        0   0.01   0.97
            300        0   0.01   0.996
          Sample Initial nitrogen -> /Simulations/Test25-Wheat+MinN+addUrea/Sim25-SoilN/Paddock1-LightSoil/Med-LightSoil/Initial nitrogen
          InitialWater: FractionFull=1; PercentMethod=EvenlyDistributed; RelativeTo=ll15
        outputfile Results -> /Simulations/Test01-BareBare/Sim01-SoilN/Paddock2-HeavySoil/Results: filename=Sim25-SoilN Paddock2-HeavySoil Results.out; title=Sim25-SoilN Paddock2-HeavySoil Results
          variables -> /Simulations/Test01-BareBare/Sim01-SoilN/Paddock2-HeavySoil/Results/Variables
          events ReportingFrequency -> /Simulations/Test01-BareBare/Sim01-SoilN/Paddock2-HeavySoil/Results/ReportingFrequency
    simulation Sim25-SoilNitrogen -> /Simulations/Test25-Wheat+MinN+addUrea/Sim25-SoilN
      PlugIns: same as Test01-BareBare.Sim01-SoilN.PlugIns
      area Paddock1-LightSoil -> /Simulations/Test25-Wheat+MinN+addUrea/Sim25-SoilN/Paddock1-LightSoil
        outputfile Results -> /Simulations/Test25-Wheat+MinN+addUrea/Sim25-SoilN/Paddock1-LightSoil/Results: filename=Sim25-SoilNitrogen Paddock1-LightSoil Results.out; title=Sim25-SoilNitrogen Paddock1-LightSoil Results
          variables -> /Simulations/Test25-Wheat+MinN+addUrea/Sim25-SoilN/Paddock1-LightSoil/Results/Variables
          events ReportingFrequency -> /Simulations/Test25-Wheat+MinN+addUrea/Sim25-SoilN/Paddock1-LightSoil/Results/ReportingFrequency
      area Paddock2-HeavySoil -> /Simulations/Test25-Wheat+MinN+addUrea/Sim25-SoilN/Paddock2-HeavySoil
        outputfile Results -> /Simulations/Test25-Wheat+MinN+addUrea/Sim25-SoilN/Paddock2-HeavySoil/Results: filename=Sim25-SoilNitrogen Paddock2-HeavySoil Results.out; title=Sim25-SoilNitrogen Paddock2-HeavySoil Results
          variables -> /Simulations/Test25-Wheat+MinN+addUrea/Sim25-SoilN/Paddock2-HeavySoil/Results/Variables
          events ReportingFrequency -> /Simulations/Test25-Wheat+MinN+addUrea/Sim25-SoilN/Paddock2-HeavySoil/Results/ReportingFrequency
  folder Test26-Wheat+OrgN+addUrea -> /Simulations/Test01-BareBare
    memo Info
      ++++++++++++++++++++  TEST 26 +++++++++++++++++++++++++++++++++++++++++++++++++++++++++++

         Description:
            - Artificial climate, smooth mild temperate;
            - Two generic soils, a free draining and a poorly drained;
            - Wheat crop;
            - No initial mineral N;
            - Initial soil organic matter composed of humus and fom;
            - Initial surface residues of 1000kg/ha;
            - No additions of residues;
            - Adding 50kgN/ha as urea in two dates;

         Expected output:
            - All outputs with valid values (numeric mostly);
            - Most variables with values on typical range, except mineral N solutes before fertiliser - Fresh OM only added by plant senescence;
    simulation Sim26-SoilN -> /Simulations/Test01-BareBare/Sim01-SoilN
      PlugIns: same as Test01-BareBare.Sim01-SoilN.PlugIns
      area Paddock1-LightSoil -> /Simulations/Test01-BareBare/Sim01-SoilN/Paddock1-LightSoil
        folder ManagerFolder -> /Simulations/Test01-BareBare/Sim01-SoilN/Paddock1-LightSoil/ManagerFolder
          manager HarvestingRule
            # Harvesting criteria
            crop = wheat  # Enter name of crop to harvest when ripe
            on end_of_day:
            script: same as in Sim00-Base.Paddock1.ManagerFolder.HarvestingRule
          operations OperationsSchedule: same as Test25-Wheat+MinN+addUrea.Sim25-SoilN.Paddock1-LightSoil.ManagerFolder.OperationsSchedule
        surfaceom SurfaceOrganicMatter
          PoolName = Residue1  # Organic Matter pool name
          type = grass  # Organic Matter type
          mass = 1000  # Initial surface residue (kg/ha)
          cnr = 20  # C:N ratio of initial residue
          standing_fraction = 0  # Fraction of residue standing
        Soil Med-LightSoil: same as Test09-Bare+OrgN.Sim09-SoilN.Paddock1-LightSoil.Med-LightSoil
        wheat
        outputfile Results -> /Simulations/Test01-BareBare/Sim01-SoilN/Paddock1-LightSoil/Results: filename=Sim26-SoilN Paddock1-LightSoil Results.out; title=Sim26-SoilN Paddock1-LightSoil Results
          variables -> /Simulations/Test01-BareBare/Sim01-SoilN/Paddock1-LightSoil/Results/Variables
          events ReportingFrequency -> /Simulations/Test01-BareBare/Sim01-SoilN/Paddock1-LightSoil/Results/ReportingFrequency
      area Paddock2-HeavySoil -> /Simulations/Test01-BareBare/Sim01-SoilN/Paddock2-HeavySoil
        Soil Med-HeavySoil: LocalName=Generic medium-heavy sedimentary soil; Country=New Zealand; Latitude=0; Longitude=0
          DataSource=Hypothetical medium to heavy texture soil of sedimentary origin (moderately poorly drained)
          Analysis: same as Test01-BareBare.Sim01-SoilN.Paddock2-HeavySoil.Med-HeavySoil.Analysis
          Water: same as Test01-BareBare.Sim01-SoilN.Paddock2-HeavySoil.Med-HeavySoil.Water
          SoilWater: same as Test01-BareBare.Sim01-SoilN.Paddock2-HeavySoil.Med-HeavySoil.SoilWater
          SoilOrganicMatter: same as Test09-Bare+OrgN.Sim09-SoilN.Paddock2-HeavySoil.Med-HeavySoil.SoilOrganicMatter
          Sample Initial nitrogen -> /Simulations/Test26-Wheat+OrgN+addUrea/Sim26-SoilN/Paddock1-LightSoil/Med-LightSoil/Initial nitrogen
          InitialWater: FractionFull=1; PercentMethod=EvenlyDistributed; RelativeTo=ll15
        outputfile Results -> /Simulations/Test01-BareBare/Sim01-SoilN/Paddock2-HeavySoil/Results: filename=Sim26-SoilN Paddock2-HeavySoil Results.out; title=Sim26-SoilN Paddock2-HeavySoil Results
          variables -> /Simulations/Test01-BareBare/Sim01-SoilN/Paddock2-HeavySoil/Results/Variables
          events ReportingFrequency -> /Simulations/Test01-BareBare/Sim01-SoilN/Paddock2-HeavySoil/Results/ReportingFrequency
    simulation Sim26-SoilNitrogen -> /Simulations/Test26-Wheat+OrgN+addUrea/Sim26-SoilN
      PlugIns: same as Test01-BareBare.Sim01-SoilN.PlugIns
      area Paddock1-LightSoil -> /Simulations/Test26-Wheat+OrgN+addUrea/Sim26-SoilN/Paddock1-LightSoil
        outputfile Results -> /Simulations/Test26-Wheat+OrgN+addUrea/Sim26-SoilN/Paddock1-LightSoil/Results: filename=Sim26-SoilNitrogen Paddock1-LightSoil Results.out; title=Sim26-SoilNitrogen Paddock1-LightSoil Results
          variables -> /Simulations/Test26-Wheat+OrgN+addUrea/Sim26-SoilN/Paddock1-LightSoil/Results/Variables
          events ReportingFrequency -> /Simulations/Test26-Wheat+OrgN+addUrea/Sim26-SoilN/Paddock1-LightSoil/Results/ReportingFrequency
      area Paddock2-HeavySoil -> /Simulations/Test26-Wheat+OrgN+addUrea/Sim26-SoilN/Paddock2-HeavySoil
        outputfile Results -> /Simulations/Test26-Wheat+OrgN+addUrea/Sim26-SoilN/Paddock2-HeavySoil/Results: filename=Sim26-SoilNitrogen Paddock2-HeavySoil Results.out; title=Sim26-SoilNitrogen Paddock2-HeavySoil Results
          variables -> /Simulations/Test26-Wheat+OrgN+addUrea/Sim26-SoilN/Paddock2-HeavySoil/Results/Variables
          events ReportingFrequency -> /Simulations/Test26-Wheat+OrgN+addUrea/Sim26-SoilN/Paddock2-HeavySoil/Results/ReportingFrequency
  folder Test27-Wheat+TypicSoil+AddUrea -> /Simulations/Test01-BareBare
    memo Info
      ++++++++++++++++++++  TEST 27 +++++++++++++++++++++++++++++++++++++++++++++++++++++++++++

         Description:
            - Artificial climate, smooth mild temperate;
            - Two generic soils, a free draining and a poorly drained;
            - Wheat crop;
            - Initial mineral N: 30kgN/ha as NO3 + 30kgN/ha as NH4;
            - Initial soil organic matter composed of humus and FOM;
            - Initial surface residues of 1000kgDM/ha;
            - No additions of residues;
            - Adding 50kgN/ha as urea in two dates;

         Expected output:
            - All outputs with valid values (numeric mostly);
            - This is the complete basic soil run under cropping conditions (wheat);
    simulation Sim27-SoilN -> /Simulations/Test01-BareBare/Sim01-SoilN
      PlugIns: same as Test01-BareBare.Sim01-SoilN.PlugIns
      area Paddock1-LightSoil -> /Simulations/Test01-BareBare/Sim01-SoilN/Paddock1-LightSoil
        folder ManagerFolder -> /Simulations/Test01-BareBare/Sim01-SoilN/Paddock1-LightSoil/ManagerFolder
          manager HarvestingRule
            # Harvesting criteria
            crop = wheat  # Enter name of crop to harvest when ripe
            on end_of_day:
            script: same as in Sim00-Base.Paddock1.ManagerFolder.HarvestingRule
          operations OperationsSchedule: same as Test25-Wheat+MinN+addUrea.Sim25-SoilN.Paddock1-LightSoil.ManagerFolder.OperationsSchedule
        surfaceom SurfaceOrganicMatter
          PoolName = Residue1  # Organic Matter pool name
          type = grass  # Organic Matter type
          mass = 1000  # Initial surface residue (kg/ha)
          cnr = 20  # C:N ratio of initial residue
          standing_fraction = 0  # Fraction of residue standing
        Soil Med-LightSoil: same as Test15-Bare+TypicSoil.Sim15-SoilN.Paddock1-LightSoil.Med-LightSoil
        wheat
        outputfile Results -> /Simulations/Test01-BareBare/Sim01-SoilN/Paddock1-LightSoil/Results: filename=Sim27-SoilN Paddock1-LightSoil Results.out; title=Sim27-SoilN Paddock1-LightSoil Results
          variables -> /Simulations/Test01-BareBare/Sim01-SoilN/Paddock1-LightSoil/Results/Variables
          events ReportingFrequency -> /Simulations/Test01-BareBare/Sim01-SoilN/Paddock1-LightSoil/Results/ReportingFrequency
      area Paddock2-HeavySoil -> /Simulations/Test01-BareBare/Sim01-SoilN/Paddock2-HeavySoil
        Soil Med-HeavySoil: LocalName=Generic medium-heavy sedimentary soil; Country=New Zealand; Latitude=0; Longitude=0
          DataSource=Hypothetical medium to heavy texture soil of sedimentary origin (moderately poorly drained)
          Analysis: same as Test01-BareBare.Sim01-SoilN.Paddock2-HeavySoil.Med-HeavySoil.Analysis
          Water: same as Test01-BareBare.Sim01-SoilN.Paddock2-HeavySoil.Med-HeavySoil.Water
          SoilWater: same as Test01-BareBare.Sim01-SoilN.Paddock2-HeavySoil.Med-HeavySoil.SoilWater
          SoilOrganicMatter: same as Test09-Bare+OrgN.Sim09-SoilN.Paddock2-HeavySoil.Med-HeavySoil.SoilOrganicMatter
          Sample Initial nitrogen -> /Simulations/Test27-Wheat+TypicSoil+AddUrea/Sim27-SoilN/Paddock1-LightSoil/Med-LightSoil/Initial nitrogen
          InitialWater: FractionFull=1; PercentMethod=EvenlyDistributed; RelativeTo=ll15
        outputfile Results -> /Simulations/Test01-BareBare/Sim01-SoilN/Paddock2-HeavySoil/Results: filename=Sim27-SoilN Paddock2-HeavySoil Results.out; title=Sim27-SoilN Paddock2-HeavySoil Results
          variables -> /Simulations/Test01-BareBare/Sim01-SoilN/Paddock2-HeavySoil/Results/Variables
          events ReportingFrequency -> /Simulations/Test01-BareBare/Sim01-SoilN/Paddock2-HeavySoil/Results/ReportingFrequency
    simulation Sim27-SoilNitrogen -> /Simulations/Test27-Wheat+TypicSoil+AddUrea/Sim27-SoilN
      PlugIns: same as Test01-BareBare.Sim01-SoilN.PlugIns
      area Paddock1-LightSoil -> /Simulations/Test27-Wheat+TypicSoil+AddUrea/Sim27-SoilN/Paddock1-LightSoil
        outputfile Results -> /Simulations/Test27-Wheat+TypicSoil+AddUrea/Sim27-SoilN/Paddock1-LightSoil/Results: filename=Sim27-SoilNitrogen Paddock1-LightSoil Results.out; title=Sim27-SoilNitrogen Paddock1-LightSoil Results
          variables -> /Simulations/Test27-Wheat+TypicSoil+AddUrea/Sim27-SoilN/Paddock1-LightSoil/Results/Variables
          events ReportingFrequency -> /Simulations/Test27-Wheat+TypicSoil+AddUrea/Sim27-SoilN/Paddock1-LightSoil/Results/ReportingFrequency
      area Paddock2-HeavySoil -> /Simulations/Test27-Wheat+TypicSoil+AddUrea/Sim27-SoilN/Paddock2-HeavySoil
        outputfile Results -> /Simulations/Test27-Wheat+TypicSoil+AddUrea/Sim27-SoilN/Paddock2-HeavySoil/Results: filename=Sim27-SoilNitrogen Paddock2-HeavySoil Results.out; title=Sim27-SoilNitrogen Paddock2-HeavySoil Results
          variables -> /Simulations/Test27-Wheat+TypicSoil+AddUrea/Sim27-SoilN/Paddock2-HeavySoil/Results/Variables
          events ReportingFrequency -> /Simulations/Test27-Wheat+TypicSoil+AddUrea/Sim27-SoilN/Paddock2-HeavySoil/Results/ReportingFrequency
  folder Test28-Pasture+MinN+addUrea -> /Simulations/Test01-BareBare
    memo Info
      ++++++++++++++++++++  TEST 28 +++++++++++++++++++++++++++++++++++++++++++++++++++++++++++

         Description:
            - Artificial climate, smooth mild temperate;
            - Two generic soils, a free draining and a poorly drained;
            - Pastoral system;
            - No initial mineral N;
            - No initial soil organic matter;
            - No initial surface residues;
            - No additions of residues;
            - Adding 50kgN/ha as urea in two dates;

         Expected output:
            - All outputs with valid values (numeric mostly);
            - Most variables with small values, although pasture should grow after urea fertiliser;
    simulation Sim28-SoilN -> /Simulations/Test01-BareBare/Sim01-SoilN
      PlugIns: same as Test01-BareBare.Sim01-SoilN.PlugIns
      area Paddock1-LightSoil -> /Simulations/Test01-BareBare/Sim01-SoilN/Paddock1-LightSoil
        folder ManagerFolder -> /Simulations/Test01-BareBare/Sim01-SoilN/Paddock1-LightSoil/ManagerFolder
          manager CutAgPasture
            # Cut or graze rotation
            CutPasture_start_date = 01/01/1900  # Enter date to start rotation (dd/mm/yyyy)
            CutPasture_end_date = 31/12/2100  # Enter date to end rotation (dd/mm/yyyy)
            AgPasture_type = AgPasture  # Enter pasture type
            rotation_type = Fixed intervals  # Enter the rotation type
            cut_interval = 21  # Enter the interval between cuts/grazings (days)
            upper_threshold = 2000  # Enter the sward DM to trigger cut (kg/ha)
            lower_threshold = 1500  # Enter the residual DM after cut (kg/ha)
            # Management of cut/grazed material
            treatment_type = Return as residue  # Enter the treatment type for the cut/grazed material
            remove_dm_frac = 0.98  # Enter fraction of DM that is removed from field (0-1)
            remove_n_frac = 0.98  # Enter fraction of N that is removed from field (0-1)
            dung_fraction = 0.0  # Enter proportion of N returned in dung (0-1)
            on init:
            script: same as in Sim00-Base.Paddock1.ManagerFolder.CutAgPasture
            on start_of_day:
            script: same as in Sim00-Base.Paddock1.ManagerFolder.CutAgPasture
          operations OperationsSchedule
            15-Aug  Fertiliser apply amount=50 (kg/ha), depth=100 (mm), type=urea_n
            25-Sep  Fertiliser apply amount=50 (kg/ha), depth=100 (mm), type=urea_n
            5-Nov  Fertiliser apply amount=50 (kg/ha), depth=100 (mm), type=urea_n
        micromet
          soilalbedo = 0.23
          a_interception = 0
          b_interception = 0
          c_interception = 0
          d_interception = 0
        surfaceom SurfaceOrganicMatter
          PoolName = Residue1  # Organic Matter pool name
          type = grass  # Organic Matter type
          mass = 0  # Initial surface residue (kg/ha)
          cnr = 20  # C:N ratio of initial residue
          standing_fraction = 0  # Fraction of residue standing
        Soil Med-LightSoil: same as Test08-Bare+MinN.Sim08-SoilN.Paddock1-LightSoil.Med-LightSoil
        AgPasture
          Nspecies = 2  # Number of species
          thisCropName = AgPasture  # Crop name shown as on the simulation tree
          cropName = ryegrass whiteclover  # Species names
          dmtotal = 1500      500  # Initial shoot dry matter (kg/ha)
          dmlitter = 300        100  # Initial litter dry matter (kg/ha)
          dmgreenmin = 400        100  # Minimum green dry matter (kg/ha)
          rootDepth = 750        350  # Root depth (mm)
          rlvp = 0.880  0.095  0.020  0.005  0.000  0.000  # Root distribution parameter ([0-1] relative to Root depth)
          WaterUptakeSource = calc  # Water uptake done by AgPasture (calc) or by apsim?
        outputfile Results -> /Simulations/Test01-BareBare/Sim01-SoilN/Paddock1-LightSoil/Results: filename=Sim28-SoilN Paddock1-LightSoil Results.out; title=Sim28-SoilN Paddock1-LightSoil Results
          variables -> /Simulations/Test01-BareBare/Sim01-SoilN/Paddock1-LightSoil/Results/Variables
          events ReportingFrequency -> /Simulations/Test01-BareBare/Sim01-SoilN/Paddock1-LightSoil/Results/ReportingFrequency
      area Paddock2-HeavySoil -> /Simulations/Test01-BareBare/Sim01-SoilN/Paddock2-HeavySoil
        Soil Med-HeavySoil: LocalName=Generic medium-heavy sedimentary soil; Country=New Zealand; Latitude=0; Longitude=0
          DataSource=Hypothetical medium to heavy texture soil of sedimentary origin (moderately poorly drained)
          Analysis: same as Test01-BareBare.Sim01-SoilN.Paddock2-HeavySoil.Med-HeavySoil.Analysis
          Water: same as Test01-BareBare.Sim01-SoilN.Paddock2-HeavySoil.Med-HeavySoil.Water
          SoilWater: same as Test01-BareBare.Sim01-SoilN.Paddock2-HeavySoil.Med-HeavySoil.SoilWater
          SoilOrganicMatter: RootCN=30; RootWt=0; SoilCN=12.5; EnrACoeff=7.4; EnrBCoeff=0.2; OCUnits=Total
            Thickness  OC  FBiom  FInert
            150        0   0.035  0.5
            150        0   0.025  0.65
            300        0   0.015  0.835
            300        0   0.01   0.94
            300        0   0.01   0.97
            300        0   0.01   0.996
          Sample Initial nitrogen -> /Simulations/Test28-Pasture+MinN+addUrea/Sim28-SoilN/Paddock1-LightSoil/Med-LightSoil/Initial nitrogen
          InitialWater: FractionFull=1; PercentMethod=EvenlyDistributed; RelativeTo=ll15
        outputfile Results -> /Simulations/Test01-BareBare/Sim01-SoilN/Paddock2-HeavySoil/Results: filename=Sim28-SoilN Paddock2-HeavySoil Results.out; title=Sim28-SoilN Paddock2-HeavySoil Results
          variables -> /Simulations/Test01-BareBare/Sim01-SoilN/Paddock2-HeavySoil/Results/Variables
          events ReportingFrequency -> /Simulations/Test01-BareBare/Sim01-SoilN/Paddock2-HeavySoil/Results/ReportingFrequency
    simulation Sim28-SoilNitrogen -> /Simulations/Test28-Pasture+MinN+addUrea/Sim28-SoilN
      PlugIns: same as Test01-BareBare.Sim01-SoilN.PlugIns
      area Paddock1-LightSoil -> /Simulations/Test28-Pasture+MinN+addUrea/Sim28-SoilN/Paddock1-LightSoil
        outputfile Results -> /Simulations/Test28-Pasture+MinN+addUrea/Sim28-SoilN/Paddock1-LightSoil/Results: filename=Sim28-SoilNitrogen Paddock1-LightSoil Results.out; title=Sim28-SoilNitrogen Paddock1-LightSoil Results
          variables -> /Simulations/Test28-Pasture+MinN+addUrea/Sim28-SoilN/Paddock1-LightSoil/Results/Variables
          events ReportingFrequency -> /Simulations/Test28-Pasture+MinN+addUrea/Sim28-SoilN/Paddock1-LightSoil/Results/ReportingFrequency
      area Paddock2-HeavySoil -> /Simulations/Test28-Pasture+MinN+addUrea/Sim28-SoilN/Paddock2-HeavySoil
        outputfile Results -> /Simulations/Test28-Pasture+MinN+addUrea/Sim28-SoilN/Paddock2-HeavySoil/Results: filename=Sim28-SoilNitrogen Paddock2-HeavySoil Results.out; title=Sim28-SoilNitrogen Paddock2-HeavySoil Results
          variables -> /Simulations/Test28-Pasture+MinN+addUrea/Sim28-SoilN/Paddock2-HeavySoil/Results/Variables
          events ReportingFrequency -> /Simulations/Test28-Pasture+MinN+addUrea/Sim28-SoilN/Paddock2-HeavySoil/Results/ReportingFrequency
  folder Test29-Pature+OrgN+addUrea -> /Simulations/Test01-BareBare
    memo Info
      ++++++++++++++++++++  TEST 29 +++++++++++++++++++++++++++++++++++++++++++++++++++++++++++

         Description:
            - Artificial climate, smooth mild temperate;
            - Two generic soils, a free draining and a poorly drained;
            - Pastoral system;
            - No initial mineral N;
            - Initial soil organic matter composed of humus and fom;
            - Initial surface residues of 1000kg/ha;
            - No additions of residues;
            - Adding 50kgN/ha as urea in two dates;

         Expected output:
            - All outputs with valid values (numeric mostly);
            - Most variables with values on typical range, except mineral N solutes before fertiliser - Fresh OM only added by plant senescence;
    simulation Sim29-SoilN -> /Simulations/Test01-BareBare/Sim01-SoilN
      PlugIns: same as Test01-BareBare.Sim01-SoilN.PlugIns
      area Paddock1-LightSoil -> /Simulations/Test01-BareBare/Sim01-SoilN/Paddock1-LightSoil
        folder ManagerFolder -> /Simulations/Test01-BareBare/Sim01-SoilN/Paddock1-LightSoil/ManagerFolder
          manager CutAgPasture: same as Test28-Pasture+MinN+addUrea.Sim28-SoilN.Paddock1-LightSoil.ManagerFolder.CutAgPasture
          operations OperationsSchedule: same as Test28-Pasture+MinN+addUrea.Sim28-SoilN.Paddock1-LightSoil.ManagerFolder.OperationsSchedule
        micromet
          soilalbedo = 0.23
          a_interception = 0
          b_interception = 0
          c_interception = 0
          d_interception = 0
        surfaceom SurfaceOrganicMatter
          PoolName = Residue1  # Organic Matter pool name
          type = grass  # Organic Matter type
          mass = 1000  # Initial surface residue (kg/ha)
          cnr = 20  # C:N ratio of initial residue
          standing_fraction = 0  # Fraction of residue standing
        Soil Med-LightSoil: same as Test09-Bare+OrgN.Sim09-SoilN.Paddock1-LightSoil.Med-LightSoil
        AgPasture: same as Test28-Pasture+MinN+addUrea.Sim28-SoilN.Paddock1-LightSoil.AgPasture
        outputfile Results -> /Simulations/Test01-BareBare/Sim01-SoilN/Paddock1-LightSoil/Results: filename=Sim29-SoilN Paddock1-LightSoil Results.out; title=Sim29-SoilN Paddock1-LightSoil Results
          variables -> /Simulations/Test01-BareBare/Sim01-SoilN/Paddock1-LightSoil/Results/Variables
          events ReportingFrequency -> /Simulations/Test01-BareBare/Sim01-SoilN/Paddock1-LightSoil/Results/ReportingFrequency
      area Paddock2-HeavySoil -> /Simulations/Test01-BareBare/Sim01-SoilN/Paddock2-HeavySoil
        Soil Med-HeavySoil: LocalName=Generic medium-heavy sedimentary soil; Country=New Zealand; Latitude=0; Longitude=0
          DataSource=Hypothetical medium to heavy texture soil of sedimentary origin (moderately poorly drained)
          Analysis: same as Test01-BareBare.Sim01-SoilN.Paddock2-HeavySoil.Med-HeavySoil.Analysis
          Water: same as Test01-BareBare.Sim01-SoilN.Paddock2-HeavySoil.Med-HeavySoil.Water
          SoilWater: same as Test01-BareBare.Sim01-SoilN.Paddock2-HeavySoil.Med-HeavySoil.SoilWater
          SoilOrganicMatter: same as Test09-Bare+OrgN.Sim09-SoilN.Paddock2-HeavySoil.Med-HeavySoil.SoilOrganicMatter
          Sample Initial nitrogen -> /Simulations/Test29-Pature+OrgN+addUrea/Sim29-SoilN/Paddock1-LightSoil/Med-LightSoil/Initial nitrogen
          InitialWater: FractionFull=1; PercentMethod=EvenlyDistributed; RelativeTo=ll15
        outputfile Results -> /Simulations/Test01-BareBare/Sim01-SoilN/Paddock2-HeavySoil/Results: filename=Sim29-SoilN Paddock2-HeavySoil Results.out; title=Sim29-SoilN Paddock2-HeavySoil Results
          variables -> /Simulations/Test01-BareBare/Sim01-SoilN/Paddock2-HeavySoil/Results/Variables
          events ReportingFrequency -> /Simulations/Test01-BareBare/Sim01-SoilN/Paddock2-HeavySoil/Results/ReportingFrequency
    simulation Sim29-SoilNitrogen -> /Simulations/Test29-Pature+OrgN+addUrea/Sim29-SoilN
      PlugIns: same as Test01-BareBare.Sim01-SoilN.PlugIns
      area Paddock1-LightSoil -> /Simulations/Test29-Pature+OrgN+addUrea/Sim29-SoilN/Paddock1-LightSoil
        outputfile Results -> /Simulations/Test29-Pature+OrgN+addUrea/Sim29-SoilN/Paddock1-LightSoil/Results: filename=Sim29-SoilNitrogen Paddock1-LightSoil Results.out; title=Sim29-SoilNitrogen Paddock1-LightSoil Results
          variables -> /Simulations/Test29-Pature+OrgN+addUrea/Sim29-SoilN/Paddock1-LightSoil/Results/Variables
          events ReportingFrequency -> /Simulations/Test29-Pature+OrgN+addUrea/Sim29-SoilN/Paddock1-LightSoil/Results/ReportingFrequency
      area Paddock2-HeavySoil -> /Simulations/Test29-Pature+OrgN+addUrea/Sim29-SoilN/Paddock2-HeavySoil
        outputfile Results -> /Simulations/Test29-Pature+OrgN+addUrea/Sim29-SoilN/Paddock2-HeavySoil/Results: filename=Sim29-SoilNitrogen Paddock2-HeavySoil Results.out; title=Sim29-SoilNitrogen Paddock2-HeavySoil Results
          variables -> /Simulations/Test29-Pature+OrgN+addUrea/Sim29-SoilN/Paddock2-HeavySoil/Results/Variables
          events ReportingFrequency -> /Simulations/Test29-Pature+OrgN+addUrea/Sim29-SoilN/Paddock2-HeavySoil/Results/ReportingFrequency
  folder Test30-PatureTypicSoil+addUrea -> /Simulations/Test01-BareBare
    memo Info
      ++++++++++++++++++++  TEST 30 +++++++++++++++++++++++++++++++++++++++++++++++++++++++++++

         Description:
            - Artificial climate, smooth mild temperate;
            - Two generic soils, a free draining and a poorly drained;
            - Pastoral system;
            - Initial mineral N: 30kgN/ha as NO3 + 30kgN/ha as NH4;
            - Initial soil organic matter composed of humus and FOM;
            - Iinitial surface residues of 1000kgDM/ha;
            - No additions of residues;
            - Adding 50kgN/ha as urea in two events;

         Expected output:
            - All outputs with valid values (numeric mostly);
            - This is the complete basic soil run under pastoral conditions (AgPasture);
    simulation Sim30-SoilN -> /Simulations/Test01-BareBare/Sim01-SoilN
      PlugIns: same as Test01-BareBare.Sim01-SoilN.PlugIns
      area Paddock1-LightSoil -> /Simulations/Test01-BareBare/Sim01-SoilN/Paddock1-LightSoil
        folder ManagerFolder -> /Simulations/Test01-BareBare/Sim01-SoilN/Paddock1-LightSoil/ManagerFolder
          manager CutAgPasture: same as Test28-Pasture+MinN+addUrea.Sim28-SoilN.Paddock1-LightSoil.ManagerFolder.CutAgPasture
          operations OperationsSchedule
            15-Aug  Fertiliser apply amount=50 (kg/ha), depth=100 (mm), type=urea_n
            25-Sep  Fertiliser apply amount=150 (kg/ha), depth=50 (mm), type=urea_n
            25-Sep  Fertiliser apply amount=100 (kg/ha), depth=100 (mm), type=urea_n
            5-Nov  Fertiliser apply amount=50 (kg/ha), depth=100 (mm), type=urea_n
        micromet
          soilalbedo = 0.23
          a_interception = 0
          b_interception = 0
          c_interception = 0
          d_interception = 0
        surfaceom SurfaceOrganicMatter
          PoolName = Residue1  # Organic Matter pool name
          type = grass  # Organic Matter type
          mass = 1000  # Initial surface residue (kg/ha)
          cnr = 20  # C:N ratio of initial residue
          standing_fraction = 0  # Fraction of residue standing
        Soil Med-LightSoil: same as Test15-Bare+TypicSoil.Sim15-SoilN.Paddock1-LightSoil.Med-LightSoil
        AgPasture: same as Test28-Pasture+MinN+addUrea.Sim28-SoilN.Paddock1-LightSoil.AgPasture
        outputfile Results -> /Simulations/Test01-BareBare/Sim01-SoilN/Paddock1-LightSoil/Results: filename=Sim30-SoilN Paddock1-LightSoil Results.out; title=Sim30-SoilN Paddock1-LightSoil Results
          variables -> /Simulations/Test01-BareBare/Sim01-SoilN/Paddock1-LightSoil/Results/Variables
          events ReportingFrequency -> /Simulations/Test01-BareBare/Sim01-SoilN/Paddock1-LightSoil/Results/ReportingFrequency
      area Paddock2-HeavySoil -> /Simulations/Test01-BareBare/Sim01-SoilN/Paddock2-HeavySoil
        Soil Med-HeavySoil: LocalName=Generic medium-heavy sedimentary soil; Country=New Zealand; Latitude=0; Longitude=0
          DataSource=Hypothetical medium to heavy texture soil of sedimentary origin (moderately poorly drained)
          Analysis: same as Test01-BareBare.Sim01-SoilN.Paddock2-HeavySoil.Med-HeavySoil.Analysis
          Water: same as Test01-BareBare.Sim01-SoilN.Paddock2-HeavySoil.Med-HeavySoil.Water
          SoilWater: same as Test01-BareBare.Sim01-SoilN.Paddock2-HeavySoil.Med-HeavySoil.SoilWater
          SoilOrganicMatter: same as Test09-Bare+OrgN.Sim09-SoilN.Paddock2-HeavySoil.Med-HeavySoil.SoilOrganicMatter
          InitialWater: FractionFull=1; PercentMethod=EvenlyDistributed; RelativeTo=ll15
          Sample Initial nitrogen -> /Simulations/Test30-PatureTypicSoil+addUrea/Sim30-SoilN/Paddock1-LightSoil/Med-LightSoil/Initial nitrogen
        outputfile Results -> /Simulations/Test01-BareBare/Sim01-SoilN/Paddock2-HeavySoil/Results: filename=Sim30-SoilN Paddock2-HeavySoil Results.out; title=Sim30-SoilN Paddock2-HeavySoil Results
          variables -> /Simulations/Test01-BareBare/Sim01-SoilN/Paddock2-HeavySoil/Results/Variables
          events ReportingFrequency -> /Simulations/Test01-BareBare/Sim01-SoilN/Paddock2-HeavySoil/Results/ReportingFrequency
    simulation Sim30-SoilNitrogen -> /Simulations/Test30-PatureTypicSoil+addUrea/Sim30-SoilN
      PlugIns: same as Test01-BareBare.Sim01-SoilN.PlugIns
      area Paddock1-LightSoil -> /Simulations/Test30-PatureTypicSoil+addUrea/Sim30-SoilN/Paddock1-LightSoil
        outputfile Results -> /Simulations/Test30-PatureTypicSoil+addUrea/Sim30-SoilN/Paddock1-LightSoil/Results: filename=Sim30-SoilNitrogen Paddock1-LightSoil Results.out; title=Sim30-SoilNitrogen Paddock1-LightSoil Results
          variables -> /Simulations/Test30-PatureTypicSoil+addUrea/Sim30-SoilN/Paddock1-LightSoil/Results/Variables
          events ReportingFrequency -> /Simulations/Test30-PatureTypicSoil+addUrea/Sim30-SoilN/Paddock1-LightSoil/Results/ReportingFrequency
      area Paddock2-HeavySoil -> /Simulations/Test30-PatureTypicSoil+addUrea/Sim30-SoilN/Paddock2-HeavySoil
        outputfile Results -> /Simulations/Test30-PatureTypicSoil+addUrea/Sim30-SoilN/Paddock2-HeavySoil/Results: filename=Sim30-SoilNitrogen Paddock2-HeavySoil Results.out; title=Sim30-SoilNitrogen Paddock2-HeavySoil Results
          variables -> /Simulations/Test30-PatureTypicSoil+addUrea/Sim30-SoilN/Paddock2-HeavySoil/Results/Variables
          events ReportingFrequency -> /Simulations/Test30-PatureTypicSoil+addUrea/Sim30-SoilN/Paddock2-HeavySoil/Results/ReportingFrequency
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