folder SoilNitrogen-SoilN_Comparison: version=36; creator=Apsim 7.5-r3157
  memo Info
               Comparing SoilNitrogen to SoilN

       This file contains a series of comparison sets, each composed of two simulations.
     Both simulations are identical except for the soil C and N model. The first set uses SoilN2,
     whereas the second uses SoilNitrogen.
       It would be expected that both simulations produce exactly the same results, but there
     are slight varitiations in some values due to differences between Frotran and .NET in
     handling numerical values.

       General setup:
          - All simulations use basically the same soil (physical characteristics),  and are
             described using SoilWat;
          - There are two constrasting soils in each simulation;
          - All simulations run for ten years;
          - These simulations use Micromet and SoilTemperature2;
          - Each simulation set try to excercise the processes for a different crop system, details are
            give in  the 'info' for each simulation set

       Note that to expose some of these differences the number of decimal places in the output
     file had to be increased.
  folder Sim31-ContinuousFallow
    memo Info
      ++++++++++++++++++  TEST 31 ++++++++++++++++++++

         Description:
            - Lincoln, NZ climate;
            - Two contrasting soils, a free draining and a clayey;
            - No plants, i.e. fallow;
            - Initial mineral N = 0
            - Initial organic matter = about 125 tonnes hum, 10ton N + 0kg fom, 13kg N;
            - Initial surface residues = 0
            - No additions of residues;
            - No fertiliser;

         Expected output:
            - All outputs with valid values (numeric), except those related to plants;
            - Very minor, if any, differences between the two simulations (hence models);

      +++++++++++++++++++++++++++++++++++++++++++++++
    simulation Sim31-SoilN_ContinuousFallow
      clock
        start_date = 01/03/2000
        end_date = 01/03/2010
      metfile met: filename=%apsim%\Examples\MetFiles\lincoln.met
      PlugIns
        PlugIn=[%apsim%\UserInterface\ApsimUIPlugIn.xml, %apsim%\UserInterface\SoilTypes.xml, %apsim%\UserInterface\Graph.xml, %apsim%\UserInterface\Ausfarm.xml, %apsim%\UserInterface\DevelopersPlugIn.xml, %apsim%\Model\SlurryTank.xml, %apsim%\Model\WHEATSTRAW.xml, %apsim%\Model\WASHWATER.xml, %apsim%\Model\animalSection.xml, %apsim%\Model\floor.xml, %apsim%\Model\PigHousing.xml, %apsim%\Model\PHmodel.xml, %apsim%\Model\simpleBuilding.xml, %apsim%\Model\atmosphere.xml, %apsim%\Model\Accum.xml, %apsim%\Model\AgPasture.xml, %apsim%\Model\Bambatsi.xml, %apsim%\Model\Barley.xml, %apsim%\Model\Br.xml, %apsim%\Model\Bore.xml, %apsim%\Model\Broccoli.xml, %apsim%\Model\ButterflyPea.xml, %apsim%\Model\Canola.xml, %apsim%\Model\Canopy.xml, %apsim%\Model\Centro.xml, %apsim%\Model\Channel.xml, %apsim%\Model\Chickpea.xml, %apsim%\Model\Cl.xml, %apsim%\Model\Climatechange.xml, %apsim%\Model\Clock.xml, %apsim%\Model\Cotton2.xml, %apsim%\Model\Cowpea.xml, %apsim%\Model\CropUI.xml, %apsim%\Model\Dam.xml, %apsim%\Model\DCD.xml, %apsim%\Model\EGrandis.xml, %apsim%\Model\EMelliodora.xml, %apsim%\Model\Eo.xml, %apsim%\Model\EPopulnea.xml, %apsim%\Model\Erosion.xml, %apsim%\Model\Events.xml, %apsim%\Model\Fababean.xml, %apsim%\Model\Factorial.xml, %apsim%\Model\Factor.xml, %apsim%\Model\FactorComplex.xml, %apsim%\Model\FrenchBean.xml, %apsim%\Model\Fertiliser.xml, %apsim%\Model\Fieldpea.xml, %apsim%\Model\Gcm_data.xml, %apsim%\Model\Grasp.xml, %apsim%\Model\Graz.xml, %apsim%\Model\Growth.xml, %apsim%\Model\Horsegram.xml, %apsim%\Model\Ini.xml, %apsim%\Model\InitWater.xml, %apsim%\Model\Input.xml, %apsim%\Model\Irrigation.xml, %apsim%\Model\KWTest.xml, %apsim%\Model\Lablab.xml, %apsim%\Model\Lettuce.xml, %apsim%\Model\Log.xml, %apsim%\Model\Lucerne.xml, %apsim%\Model\Lupin.xml, %apsim%\Model\Maize.xml, %apsim%\Model\MaizeZ.xml, %apsim%\Model\Manager.xml, %apsim%\Model\Map.xml, %apsim%\Model\Memo.xml, %apsim%\Model\MetFile.xml, %apsim%\Model\MicroMet.xml, %apsim%\Model\Millet.xml, %apsim%\Model\Millet1.xml, %apsim%\Model\Millet2.xml, %apsim%\Model\Millet3.xml, %apsim%\Model\Millet4.xml, %apsim%\Model\Millet5.xml, %apsim%\Model\Mucuna.xml, %apsim%\Model\Mungbean.xml, %apsim%\Model\Navybean.xml, %apsim%\Model\Oats.xml, %apsim%\Model\Ocean_data.xml, %apsim%\Model\Operations.xml, %apsim%\Model\Orobanche.xml, %apsim%\Model\Oryza.xml, %apsim%\Model\Oryza2.xml, %apsim%\Model\OutputFile.xml, %apsim%\Model\Ozcot.xml, %apsim%\Model\Patchinput.xml, %apsim%\Model\Peanut.xml, %apsim%\Model\Pigeonpea.xml, %apsim%\Model\Pond.xml, %apsim%\Model\Potato.xml, %apsim%\Model\RotPlot.xml, %apsim%\Model\RugPlotUI.xml, %apsim%\Model\Root.xml, %apsim%\Model\Rule.xml, %apsim%\Model\Script.xml, %apsim%\Model\Seedling.xml, %apsim%\Model\SiloInput.xml, %apsim%\Model\Slurp.xml, %apsim%\Model\Soi.xml, %apsim%\Model\Soil.xml, %apsim%\Model\SoilNui.xml, %apsim%\Model\SoilTemp.xml, %apsim%\Model\Sorghum.xml, %apsim%\Model\SorghumConstants.xml, %apsim%\Model\SorghumGenotype.xml, %apsim%\Model\Soybean.xml, %apsim%\Model\Stylo.xml, %apsim%\Model\Sugar.xml, %apsim%\Model\Summaryfile.xml, %apsim%\Model\Sunflower.xml, %apsim%\Model\SurfaceOM.xml, %apsim%\Model\SweetCorn.xml, %apsim%\Model\SweetSorghum.xml, %apsim%\Model\SWIM2.xml, %apsim%\Model\SWIM2ui.xml, %apsim%\Model\SWIM2ui2.xml, %apsim%\Model\Sysbal.xml, %apsim%\Model\SysBal2.xml, %apsim%\Model\Tcllink.xml, %apsim%\Model\Tclmanager.xml, %apsim%\Model\Tclui.xml, %apsim%\Model\TextOutput.xml, %apsim%\Model\Tracker.xml, %apsim%\Model\Tree.xml, %apsim%\Model\Variables.xml, %apsim%\Model\Venlink.xml, %apsim%\Model\vine.xml, %apsim%\Model\WaterSupply.xml, %apsim%\Model\Weed.xml, %apsim%\Model\Wheat.xml, %apsim%\Model\YPCalc.xml, %apsim%\Model\Soil with new nitrogen model.xml]
      summaryfile
      area Paddock1-LD
        micromet
          soilalbedo = 0.23
          a_interception = 0
          b_interception = 0
          c_interception = 0
          d_interception = 0
        fertiliser
        surfaceom SurfaceOrganicMatter
          PoolName = Residue1  # Organic Matter pool name
          type = grass  # Organic Matter type
          mass = 0  # Initial surface residue (kg/ha)
          cnr = 15  # C:N ratio of initial residue
          standing_fraction = 0  # Fraction of residue standing
        Soil LowDrainageSoil: SoilType=Generic low drainage soil; Site=New Zealand; Latitude=0; Longitude=0
          Water
            Thickness  BD    AirDry  LL15  DUL    SAT   KS
            150        1.3   0.175   0.2   0.4    0.5   15
            150        1.3   0.25    0.25  0.425  0.5   10
            300        1.3   0.3     0.3   0.45   0.5   10
            300        1.35  0.3     0.3   0.45   0.49  10
            300        1.35  0.32    0.32  0.44   0.48  10
            300        1.4   0.35    0.35  0.42   0.47  10
            SoilCrop wheat: LL=[0.2, 0.25, 0.3, 0.3, 0.32, 0.35]; KL=[0.2, 0.13, 0.05, 0.01, 0, 0]; XF=[1, 1, 1, 1, 1, 0]
            SoilCrop agpasture: LL=[0.2, 0.25, 0.3, 0.3, 0.32, 0.35]; KL=[0.2, 0.15, 0.06, 0.02, 0, 0]; XF=[1, 1, 1, 1, 1, 0]
          SoilWater: SummerCona=4; SummerU=6; SummerDate=1-Nov; WinterCona=3; WinterU=4; WinterDate=1-Apr; DiffusConst=88; DiffusSlope=35; Salb=0.13; CN2Bare=73; CNRed=20; CNCov=0.8; Thickness=[150, 150, 300, 300, 300, 300]; SWCON=[0.3, 0.25, 0.2, 0.2, 0.175, 0.175]
          SoilOrganicMatter: RootCN=30; RootWt=1000; SoilCN=12.5; EnrACoeff=7.4; EnrBCoeff=0.2; OCUnits=Total
            Thickness  OC    FBiom  FInert
            150        3     0.035  0.45
            150        1.5   0.02   0.525
            300        0.5   0.015  0.675
            300        0.25  0.01   0.85
            300        0.1   0.01   0.95
            300        0.1   0.01   0.998
          Analysis: PHUnits=Water; BoronUnits=HotWater
            Thickness  PH   CEC   ParticleSizeSand  ParticleSizeSilt  ParticleSizeClay
            150        6.5  15    10                60                30
            150        6.5  15    10                60                30
            300        6.5  12.5  10                60                30
            300        6.5  10    10                60                30
            300        6.5  7.5   10                60                30
            300        6.5  7.5   10                60                30
          Sample Initial nitrogen: NO3Units=kgha; NH4Units=kgha
            Thickness  NO3  NH4
            150        0    0
            150        0    0
            300        0    0
            300        0    0
            300        0    0
            300        0    0
          Sample Initial water: Thickness=[150, 150, 300, 300, 300, 300]; SW=[0.36, 0.37, 0.45, 0.45, 0.44, 0.42]; NO3Units=ppm; NH4Units=ppm; SWUnits=Volumetric; OCUnits=Total; PHUnits=Water
        SoilTemperature2: MaxTTimeDefault=14; BoundaryLayerConductanceSource=calc; BoundaryLayerConductance=20; BoundaryLayerConductanceIterations=1; NetRadiationSource=calc; DefaultWindSpeed=3; DefaultAltitude=18; DefaultInstrumentHeight=1.2; BareSoilHeight=57
        outputfile Report: filename=Sim31-SoilN_ContinuousFallow Paddock1-LD Report.out; title=Sim31-SoilN_ContinuousFallow Paddock1-LD Report
          variables
            variable:
              dd/mmm/yyyy as Date
              day as DoY
              urea() as UreaTotal  format 3
              nh4() as NH4Total  format 3
              no3() as NO3Total  format 3
              surfaceom_n as SurfaceOM_N  format 2
              fom_n() as FOM_N  format 2
              biom_n() as Biom_N  format 2
              hum_n() as Hum_N  format 1
              totaln as PlantN format 3
              TotalPlantN as PastureN format 3
              fertiliser as FertiliserN  format 1
              dlt_urea_hydrol() as HydrolisedN  format 3
              nitrification() as NitrifiedN  format 3
              dnit() as DenitrifiedN format 3
              leach_no3 as LeachedNO3 format 3
              dlt_n_min_res() as NetMineralisedResidue  format 3
              dlt_n_min_tot() as NetMineralisedHumus  format 3
              n2o_atm() as N2Oemissions format 3
              surfaceom_c as SurfaceOM_C format 5
              fom_c() as FOM_C format 5
              biom_c() as Biom_C format 5
              hum_c() as Hum_C format 5
              oc() as OCTotal  format 5
              biomass as PlantBiomass format 5
              harvested_dm as PastureYield
              yield as WheatYield
              es as Evaporation format 2
              ep as Transpiration format 2
              WaterUptake as pTranspiration format 5
              drain as Drain  format 2
              dlayer format 1
              no3 format 2
              nh4 format 2
              fom_n format 3
              biom_n format 3
              hum_n format 2
              fom_c format 3
              biom_c format 3
              hum_c format 2
              sw_dep  format 3
          events ReportingFrequency: event=end_day
      area Paddock2-HD -> /SoilNitrogen-SoilN_Comparison/Sim31-ContinuousFallow/Sim31-SoilN_ContinuousFallow/Paddock1-LD
        Soil HighDrainageSoil: SoilType=Generic high drainage soil; Site=New Zealand; Latitude=0; Longitude=0
          Water
            Thickness  BD    AirDry  LL15   DUL    SAT    KS
            150        1.25  0.075   0.1    0.35   0.525  27.5
            150        1.3   0.1     0.11   0.36   0.5    22.5
            300        1.3   0.125   0.125  0.375  0.5    22.5
            300        1.3   0.125   0.125  0.375  0.5    22.5
            300        1.35  0.125   0.125  0.375  0.45   22.5
            300        1.4   0.125   0.125  0.35   0.45   22.5
            SoilCrop wheat: LL=[0.1, 0.11, 0.125, 0.125, 0.125, 0.125]; KL=[0.22, 0.18, 0.08, 0.04, 0, 0]; XF=[1, 1, 1, 1, 1, 0]
            SoilCrop agpasture: LL=[0.1, 0.11, 0.125, 0.125, 0.125, 0.125]; KL=[0.22, 0.19, 0.09, 0.04, 0, 0]; XF=[1, 1, 1, 1, 1, 0]
          SoilWater: SummerCona=4; SummerU=6; SummerDate=1-Nov; WinterCona=3; WinterU=4; WinterDate=1-Apr; DiffusConst=88; DiffusSlope=35; Salb=0.13; CN2Bare=73; CNRed=20; CNCov=0.8; Thickness=[150, 150, 300, 300, 300, 300]; SWCON=[0.5, 0.45, 0.4, 0.4, 0.4, 0.4]
          SoilOrganicMatter: RootCN=30; RootWt=0; SoilCN=12.5; EnrACoeff=7.4; EnrBCoeff=0.2; OCUnits=Total
            Thickness  OC    FBiom  FInert
            150        3     0.035  0.45
            150        1.5   0.02   0.525
            300        0.5   0.015  0.675
            300        0.25  0.01   0.85
            300        0.1   0.01   0.95
            300        0.1   0.01   0.998
          Analysis: PHUnits=Water; BoronUnits=HotWater
            Thickness  PH   CEC   ParticleSizeSand  ParticleSizeSilt  ParticleSizeClay
            150        6.5  15    20                60                20
            150        6.5  12.5  20                60                20
            300        6.5  10    20                60                20
            300        6.5  7.5   20                60                20
            300        6.5  5     20                60                20
            300        6.5  5     20                60                20
          Sample Initial nitrogen: NO3Units=kgha; NH4Units=kgha; SWUnits=Volumetric; OCUnits=Total; PHUnits=Water
            Thickness  NO3  NH4
            150        0    0
            150        0    0
            300        0    0
            300        0    0
            300        0    0
            300        0    0
          Sample Initial water: Thickness=[150, 150, 300, 300, 300, 300]; SW=[0.31, 0.34, 0.375, 0.375, 0.375, 0.35]; NO3Units=ppm; NH4Units=ppm; SWUnits=Volumetric; OCUnits=Total; PHUnits=Water
        outputfile Report -> /SoilNitrogen-SoilN_Comparison/Sim31-ContinuousFallow/Sim31-SoilN_ContinuousFallow/Paddock1-LD/Report: filename=Sim31-SoilN_ContinuousFallow Paddock2-HD Report.out; title=Sim31-SoilN_ContinuousFallow Paddock2-HD Report
          variables -> /SoilNitrogen-SoilN_Comparison/Sim31-ContinuousFallow/Sim31-SoilN_ContinuousFallow/Paddock1-LD/Report/Variables
          events ReportingFrequency -> /SoilNitrogen-SoilN_Comparison/Sim31-ContinuousFallow/Sim31-SoilN_ContinuousFallow/Paddock1-LD/Report/ReportingFrequency
    simulation Sim31-SoilNitrogen_ContinuousFallow -> /SoilNitrogen-SoilN_Comparison/Sim31-ContinuousFallow/Sim31-SoilN_ContinuousFallow
      PlugIns: same as Sim31-ContinuousFallow.Sim31-SoilN_ContinuousFallow.PlugIns
      area Paddock1-LD -> /SoilNitrogen-SoilN_Comparison/Sim31-ContinuousFallow/Sim31-SoilN_ContinuousFallow/Paddock1-LD
        outputfile Report -> /SoilNitrogen-SoilN_Comparison/Sim31-ContinuousFallow/Sim31-SoilN_ContinuousFallow/Paddock1-LD/Report: filename=Sim31-SoilNitrogen_ContinuousFallow Paddock1-LD Report.out; title=Sim31-SoilNitrogen_ContinuousFallow Paddock1-LD Report
          variables -> /SoilNitrogen-SoilN_Comparison/Sim31-ContinuousFallow/Sim31-SoilN_ContinuousFallow/Paddock1-LD/Report/Variables
          events ReportingFrequency -> /SoilNitrogen-SoilN_Comparison/Sim31-ContinuousFallow/Sim31-SoilN_ContinuousFallow/Paddock1-LD/Report/ReportingFrequency
      area Paddock2-HD -> /SoilNitrogen-SoilN_Comparison/Sim31-ContinuousFallow/Sim31-SoilN_ContinuousFallow/Paddock2-HD
        outputfile Report -> /SoilNitrogen-SoilN_Comparison/Sim31-ContinuousFallow/Sim31-SoilN_ContinuousFallow/Paddock2-HD/Report: filename=Sim31-SoilNitrogen_ContinuousFallow Paddock2-HD Report.out; title=Sim31-SoilNitrogen_ContinuousFallow Paddock2-HD Report
          variables -> /SoilNitrogen-SoilN_Comparison/Sim31-ContinuousFallow/Sim31-SoilN_ContinuousFallow/Paddock2-HD/Report/Variables
          events ReportingFrequency -> /SoilNitrogen-SoilN_Comparison/Sim31-ContinuousFallow/Sim31-SoilN_ContinuousFallow/Paddock2-HD/Report/ReportingFrequency
  folder Sim32-ContinuousWheat
    memo Info
      ++++++++++++++++++  TEST 32 ++++++++++++++++++++

         Description:
            - Lincoln, NZ climate;
            - Two contrasting soils, a free draining and a clayey;
            - Wakanui wheat planted each year on 1st April and harvested when reaches maturity;
            - Initial mineral N = 30kg as NO3 + 30kg as NH4;
            - Initial organic matter = about 125 tonnes hum, 10ton N + 1000kg fom, 13kg N;
            - Initial surface residues = 1000kg, 27kg N;
            - No additions of residues (besides crop senescence);
            - Apply 70kg urea_N on 15th Aug, 1st Sept and 1st Oct each year;
            - Automatic irrigation calculated to 600mm, triggered at 50 % of ASW;
            - Simulation runs for 10 years 2000 to 2010

         Expected output:
            - All outputs with valid values (numeric), Some diffs between wheat and pasture;
            - Very minor, if any, differences between the two simulations (hence models);

      +++++++++++++++++++++++++++++++++++++++++++++++
    simulation Sim32-SoilN_ContinuousWheat
      clock
        start_date = 01/03/2000
        end_date = 01/03/2010
      metfile met: filename=%apsim%\Examples\MetFiles\lincoln.met
      summaryfile
      PlugIns: same as Sim31-ContinuousFallow.Sim31-SoilN_ContinuousFallow.PlugIns
      area Paddock1-LD
        manager Sow on a fixed date
          # Sowing criteria
          date = 1-Apr  # Enter sowing date (dd-mmm)
          # Sowing parameters
          crop = wheat  # Enter name of crop to sow
          density = 400  # Enter sowing density (plants/m2)
          depth = 30  # Enter sowing depth (mm)
          cultivar = Wakaniu  # Enter cultivar
          class = plant  # Enter crop growth class
          row_spacing = 150  # Enter row spacing (mm)
          on start_of_day:
```
        if (today = date('[date]') then
              [crop] sow plants =[density], sowing_depth = [depth], cultivar = [cultivar], row_spacing = [row_spacing], crop_class = [class]
         endif
```
        manager Harvesting rule
          # Harvesting criteria
          crop = wheat  # Enter name of crop to harvest when ripe
          on end_of_day:
```
           if ('[crop]' = 'cotton') then
              if ([crop].ozcot_status > 0) then
                  [crop] harvest
              endif
           elseif ([crop].StageName = 'harvest_ripe' or [crop].plant_status = 'dead') then
              [crop]  harvest
              [crop]  end_crop
           endif
```
        operations Operations Schedule
          15-Aug  Fertiliser apply amount=70 (kg/ha), depth=100 (mm), type=urea_n
          01-Sep  Fertiliser apply amount=70 (kg/ha), depth=100 (mm), type=urea_n
          01-Oct  Fertiliser apply amount=70 (kg/ha), depth=100 (mm), type=urea_n
        micromet
          soilalbedo = 0.23
          a_interception = 0
          b_interception = 0
          c_interception = 0
          d_interception = 0
        fertiliser
        irrigation
          automatic_irrigation = off
          asw_depth = 600  # Depth to which ASW is calculated. (mm)
          crit_fr_asw = 0.5  # Fraction of ASW below which irrigation is applied (0-1.0)
          irrigation_efficiency = 1  # Efficiency of the irrigation. (0-1.0)
          irrigation_allocation = off  # Allocation limits
          allocation = 0  # Allocation in mm
          default_no3_conc = 0.0  # Nitrate concentration (ppm N)
          default_nh4_conc = 0.0  # Ammonium concentration (ppm N)
          default_cl_conc = 0.0  # Chloride concentration (ppm Cl)
        surfaceom SurfaceOrganicMatter
          PoolName = Residue1  # Organic Matter pool name
          type = grass  # Organic Matter type
          mass = 1000  # Initial surface residue (kg/ha)
          cnr = 15  # C:N ratio of initial residue
          standing_fraction = 0  # Fraction of residue standing
        Soil LowDrainageSoil -> /SoilNitrogen-SoilN_Comparison/Sim31-ContinuousFallow/Sim31-SoilN_ContinuousFallow/Paddock1-LD/LowDrainageSoil
        SoilTemperature2: MaxTTimeDefault=14; BoundaryLayerConductanceSource=calc; BoundaryLayerConductance=20; BoundaryLayerConductanceIterations=1; NetRadiationSource=calc; DefaultWindSpeed=3; DefaultAltitude=18; DefaultInstrumentHeight=1.2; BareSoilHeight=57
        wheat
        outputfile Report -> /SoilNitrogen-SoilN_Comparison/Sim31-ContinuousFallow/Sim31-SoilN_ContinuousFallow/Paddock1-LD/Report: filename=Sim32-SoilN_ContinuousWheat Paddock1-LD Report.out; title=Sim32-SoilN_ContinuousWheat Paddock1-LD Report
          variables -> /SoilNitrogen-SoilN_Comparison/Sim31-ContinuousFallow/Sim31-SoilN_ContinuousFallow/Paddock1-LD/Report/Variables
          events ReportingFrequency -> /SoilNitrogen-SoilN_Comparison/Sim31-ContinuousFallow/Sim31-SoilN_ContinuousFallow/Paddock1-LD/Report/ReportingFrequency
      area Paddock2-HD -> /SoilNitrogen-SoilN_Comparison/Sim32-ContinuousWheat/Sim32-SoilN_ContinuousWheat/Paddock1-LD
        outputfile Report -> /SoilNitrogen-SoilN_Comparison/Sim32-ContinuousWheat/Sim32-SoilN_ContinuousWheat/Paddock1-LD/Report: filename=Sim32-SoilN_ContinuousWheat Paddock2-HD Report.out; title=Sim32-SoilN_ContinuousWheat Paddock2-HD Report
          variables -> /SoilNitrogen-SoilN_Comparison/Sim32-ContinuousWheat/Sim32-SoilN_ContinuousWheat/Paddock1-LD/Report/Variables
          events ReportingFrequency -> /SoilNitrogen-SoilN_Comparison/Sim32-ContinuousWheat/Sim32-SoilN_ContinuousWheat/Paddock1-LD/Report/ReportingFrequency
    simulation Sim32-SoilNitrogen_ContinuousWheat -> /SoilNitrogen-SoilN_Comparison/Sim32-ContinuousWheat/Sim32-SoilN_ContinuousWheat
      PlugIns: same as Sim31-ContinuousFallow.Sim31-SoilN_ContinuousFallow.PlugIns
      area Paddock1-LD -> /SoilNitrogen-SoilN_Comparison/Sim32-ContinuousWheat/Sim32-SoilN_ContinuousWheat/Paddock1-LD
        outputfile Report -> /SoilNitrogen-SoilN_Comparison/Sim31-ContinuousFallow/Sim31-SoilN_ContinuousFallow/Paddock1-LD/Report: filename=Sim32-SoilNitrogen_ContinuousWheat Paddock1-LD Report.out; title=Sim32-SoilNitrogen_ContinuousWheat Paddock1-LD Report
          variables -> /SoilNitrogen-SoilN_Comparison/Sim31-ContinuousFallow/Sim31-SoilN_ContinuousFallow/Paddock1-LD/Report/Variables
          events ReportingFrequency -> /SoilNitrogen-SoilN_Comparison/Sim31-ContinuousFallow/Sim31-SoilN_ContinuousFallow/Paddock1-LD/Report/ReportingFrequency
      area Paddock2-HD -> /SoilNitrogen-SoilN_Comparison/Sim32-ContinuousWheat/Sim32-SoilN_ContinuousWheat/Paddock2-HD
        outputfile Report -> /SoilNitrogen-SoilN_Comparison/Sim32-ContinuousWheat/Sim32-SoilN_ContinuousWheat/Paddock1-LD/Report: filename=Sim32-SoilNitrogen_ContinuousWheat Paddock2-HD Report.out; title=Sim32-SoilNitrogen_ContinuousWheat Paddock2-HD Report
          variables -> /SoilNitrogen-SoilN_Comparison/Sim32-ContinuousWheat/Sim32-SoilN_ContinuousWheat/Paddock1-LD/Report/Variables
          events ReportingFrequency -> /SoilNitrogen-SoilN_Comparison/Sim32-ContinuousWheat/Sim32-SoilN_ContinuousWheat/Paddock1-LD/Report/ReportingFrequency
  folder Sim33-ContinuousPasture
    memo Info
      ++++++++++++++++++  TEST 33 +++++++++++++++++++

         Description:
            - Lincoln, NZ climate;
            - Two contrasting soils, a free draining and a clayey;
            - Pasture mix (ryegrass/white clover) under cut rotation;
            - Initial mineral N = 30kg as NO3 + 30kg as NH4;
            - Initial organic matter = about 125 tonnes hum, 10ton N + 1000kg fom, 13kg N;
            - Initial surface residues = 1000kg, 27kg N;
            - Some return of residues after cutting (besides crop senescence);
            - Apply 100kg urea_N on 1st Mar and 1st Sept each year;
            - Automatic irrigation calculated to 600mm, triggered at 50 % of ASW;
            - Simulation runs for 10 years 2000 to 2010

         Expected output:
            - All outputs with valid values (numeric), Some diffs between wheat and pasture;
            - Very minor, if any, differences between the two simulations (hence models);

      ++++++++++++++++++++++++++++++++++++++++++++++
    simulation Sim33-SoilN_ContinuousPasture
      clock
        start_date = 01/03/2000
        end_date = 01/03/2010
      metfile met: filename=%apsim%\Examples\MetFiles\lincoln.met
      PlugIns: same as Sim31-ContinuousFallow.Sim31-SoilN_ContinuousFallow.PlugIns
      summaryfile
      area Paddock1-LD
        manager Cut or graze AgPasture
          # Cut or graze rotation
          CutPasture_start_date = 1/01/1900  # Enter date to start rotation (dd/mm/yyyy)
          CutPasture_end_date = 1/12/2100  # Enter date to end rotation (dd/mm/yyyy)
          AgPasture_type = AgPasture  # Enter pasture type
          rotation_type = Target mass  # Enter the rotation type
          cut_interval = 21  # Enter the interval between cuts/grazings (days)
          upper_threshold = 1750  # Enter the upper mass threshold (kg/ha)
          lower_threshold = 1250  # Enter the lower mass threshold (kg/ha)
          # Management of cut/grazed material
          treatment_type = Return as dung & urine  # Enter the treatment type for the cut/grazed material
          remove_dm_frac = 0.7  # Enter fraction of dm that is removed from field (0-1)
          remove_n_frac = 0.2  # Enter fraction of N that is removed from field (0-1)
          dung_fraction = 0.4  # Enter proportion of N in dung of the returned amount (0-1)
          on init:
```
days_after_cut = [cut_interval] - 1
Do_Cut = 'FALSE'
Has_Cut = 'FALSE'
harvested_dm =0
harvested_n = 0
removed_dm = 0.0
removed_n = 0.0
return_dm = 0.0
return_n = 0.0
GrowthRateCalc = 0
n_conc_total = 0
```
          on start_of_day:
```
if today >= date('[CutPasture_start_date]') and today <= date('[CutPasture_end_date]') then

   preharvest_dm = [AgPasture_type].AboveGroundWt
   preharvest_n = [AgPasture_type].AboveGroundN
   harvested_dm =0
   harvested_n = 0
   removed_dm = 0.0
   removed_n = 0.0
   return_dm = 0.0
   return_n = 0.0
   GrowthRateCalc = 0
   n_conc_removed = 0
   days_after_cut = days_after_cut + 1
   Has_Cut = 'FALSE'

   if '[rotation_type]' = 'Fixed intervals' then
      if days_after_cut = [cut_interval] then
         Do_Cut = 'TRUE'
      else
         Do_Cut = 'FALSE'
      endif
   elseif '[rotation_type]' = 'Target mass' then
      if preharvest_dm >= [upper_threshold] then
         Do_Cut = 'TRUE'
      else
         Do_Cut = 'FALSE'
      endif
   endif

endif   ! of today

If Do_Cut = 'TRUE' then
   
!- Cut or graze ---------------------------------------------------------------------------------------

   if preharvest_dm > [lower_threshold] then
      [AgPasture_type] graze type = 'residue', amount = [lower_threshold]
      Has_Cut = 'TRUE'
      harvested_dm = [AgPasture_type].HarvestWt
      harvested_n = [AgPasture_type].HarvestN
      GrowthRateCalc = harvested_dm/days_after_cut
      if harvested_dm > 0 then
         n_conc_removed = harvested_n*100/harvested_dm
      endif

!- Residue management -------------------------------------------------------------------------
      removed_dm =  harvested_dm* [remove_dm_frac]
      removed_n = harvested_n* [remove_n_frac]
      return_dm = harvested_dm - removed_dm 
      return_n = harvested_n - removed_n 

      if '[treatment_type]' = 'Return as residue' and [remove_dm_frac] < 1 then
         'SurfaceOrganicMatter' add_surfaceom name = grass, type = grass, mass =  return_dm (kg/ha), n = return_n (kg/ha), cpr = 0
      elseif '[treatment_type]' = 'Return as dung & urine' then
         ! Is advised that dung and urine return should be done using other manager, 'Urine_patch' or 'Apply or return N and water'
         N_on_dung = return_n * [dung_fraction]
         N_on_urine = return_n - N_on_dung
         'SurfaceOrganicMatter' add_surfaceom name = dung, type = manure, mass =  return_dm (kg/ha), n = N_on_dung (kg/ha), cpr = 0
         if N_on_urine > 0 then
            fertiliser apply amount = N_on_urine (kg/ha), depth = 20 (mm), type = urea_n ()
         endif
      endif
   endif
   days_after_cut = 0

endif  ! of Do_Cut
```
        operations Operations Schedule
          01-Mar  Fertiliser apply amount=100 (kg/ha), depth=100 (mm), type=urea_n
          01-Sep  Fertiliser apply amount=100 (kg/ha), depth=100 (mm), type=urea_n
        micromet
          soilalbedo = 0.23
          a_interception = 0
          b_interception = 0
          c_interception = 0
          d_interception = 0
        fertiliser
        irrigation
          automatic_irrigation = on
          asw_depth = 600  # Depth to which ASW is calculated. (mm)
          crit_fr_asw = 0.5  # Fraction of ASW below which irrigation is applied (0-1.0)
          irrigation_efficiency = 1  # Efficiency of the irrigation. (0-1.0)
          irrigation_allocation = off  # Allocation limits
          allocation = 0  # Allocation in mm
          default_no3_conc = 0.0  # Nitrate concentration (ppm N)
          default_nh4_conc = 0.0  # Ammonium concentration (ppm N)
          default_cl_conc = 0.0  # Chloride concentration (ppm Cl)
        surfaceom SurfaceOrganicMatter
          PoolName = Residue1  # Organic Matter pool name
          type = grass  # Organic Matter type
          mass = 1000  # Initial surface residue (kg/ha)
          cnr = 15  # C:N ratio of initial residue
          standing_fraction = 0  # Fraction of residue standing
        Soil LowDrainageSoil -> /SoilNitrogen-SoilN_Comparison/Sim31-ContinuousFallow/Sim31-SoilN_ContinuousFallow/Paddock1-LD/LowDrainageSoil
        SoilTemperature2: MaxTTimeDefault=14; BoundaryLayerConductanceSource=calc; BoundaryLayerConductance=20; BoundaryLayerConductanceIterations=1; NetRadiationSource=calc; DefaultWindSpeed=3; DefaultAltitude=18; DefaultInstrumentHeight=1.2; BareSoilHeight=57
        AgPasture
          Nspecies = 2  # Number of species
          thisCropName = AgPasture  # Crop name shown as on the simulation tree
          cropName = ryegrass whiteclover  # Species names
          dmtotal = 1500      500  # Initial shoot dry matter (kg/ha)
          dmlitter = 250        50  # Initial litter dry matter (kg/ha)
          dmgreenmin = 400        100  # Minimum green dry matter (kg/ha)
          rootDepth = 750        350  # Root depth (mm)
          rlvp = 0.80  0.15  0.04  0.01  0.00  0.00  # Root distribution parameter ([0-1] relative to Root depth)
          WaterUptakeSource = calc  # Water uptake done by AgPasture (calc) or by apsim?
        outputfile Report -> /SoilNitrogen-SoilN_Comparison/Sim31-ContinuousFallow/Sim31-SoilN_ContinuousFallow/Paddock1-LD/Report: filename=Sim33-SoilN_ContinuousPasture Paddock1-LD Report.out; title=Sim33-SoilN_ContinuousPasture Paddock1-LD Report
          variables -> /SoilNitrogen-SoilN_Comparison/Sim31-ContinuousFallow/Sim31-SoilN_ContinuousFallow/Paddock1-LD/Report/Variables
          events ReportingFrequency -> /SoilNitrogen-SoilN_Comparison/Sim31-ContinuousFallow/Sim31-SoilN_ContinuousFallow/Paddock1-LD/Report/ReportingFrequency
      area Paddock2-HD -> /SoilNitrogen-SoilN_Comparison/Sim33-ContinuousPasture/Sim33-SoilN_ContinuousPasture/Paddock1-LD
        outputfile Report -> /SoilNitrogen-SoilN_Comparison/Sim33-ContinuousPasture/Sim33-SoilN_ContinuousPasture/Paddock1-LD/Report: filename=Sim33-SoilN_ContinuousPasture Paddock2-HD Report.out; title=Sim33-SoilN_ContinuousPasture Paddock2-HD Report
          variables -> /SoilNitrogen-SoilN_Comparison/Sim33-ContinuousPasture/Sim33-SoilN_ContinuousPasture/Paddock1-LD/Report/Variables
          events ReportingFrequency -> /SoilNitrogen-SoilN_Comparison/Sim33-ContinuousPasture/Sim33-SoilN_ContinuousPasture/Paddock1-LD/Report/ReportingFrequency
    simulation Sim33-SoilNitrogen_ContinuousPasture -> /SoilNitrogen-SoilN_Comparison/Sim33-ContinuousPasture/Sim33-SoilN_ContinuousPasture
      PlugIns: same as Sim31-ContinuousFallow.Sim31-SoilN_ContinuousFallow.PlugIns
      area Paddock1-LD -> /SoilNitrogen-SoilN_Comparison/Sim33-ContinuousPasture/Sim33-SoilN_ContinuousPasture/Paddock1-LD
        outputfile Report -> /SoilNitrogen-SoilN_Comparison/Sim33-ContinuousPasture/Sim33-SoilN_ContinuousPasture/Paddock1-LD/Report: filename=Sim33-SoilNitrogen_ContinuousPasture Paddock1-LD Report.out; title=Sim33-SoilNitrogen_ContinuousPasture Paddock1-LD Report
          variables -> /SoilNitrogen-SoilN_Comparison/Sim33-ContinuousPasture/Sim33-SoilN_ContinuousPasture/Paddock1-LD/Report/Variables
          events ReportingFrequency -> /SoilNitrogen-SoilN_Comparison/Sim33-ContinuousPasture/Sim33-SoilN_ContinuousPasture/Paddock1-LD/Report/ReportingFrequency
      area Paddock2-HD -> /SoilNitrogen-SoilN_Comparison/Sim33-ContinuousPasture/Sim33-SoilN_ContinuousPasture/Paddock2-HD
        outputfile Report -> /SoilNitrogen-SoilN_Comparison/Sim33-ContinuousPasture/Sim33-SoilN_ContinuousPasture/Paddock1-LD/Report: filename=Sim33-SoilNitrogen_ContinuousPasture Paddock2-HD Report.out; title=Sim33-SoilNitrogen_ContinuousPasture Paddock2-HD Report
          variables -> /SoilNitrogen-SoilN_Comparison/Sim33-ContinuousPasture/Sim33-SoilN_ContinuousPasture/Paddock1-LD/Report/Variables
          events ReportingFrequency -> /SoilNitrogen-SoilN_Comparison/Sim33-ContinuousPasture/Sim33-SoilN_ContinuousPasture/Paddock1-LD/Report/ReportingFrequency
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