folder SoilNitrogen-SoilN_Comparison: version=36; creator=Apsim 7.5-r3157
  memo Info
               Comparing SoilNitrogen to SoilN

       This file contains a series of comparison sets, each composed of two simulations.
     Both simulations are identical except for the soil C and N model. The first set uses SoilN2,
     whereas the second uses SoilNitrogen.
       It would be expected that both simulations produce exactly the same results, but there
     are slight varitiations in some values due to differences between Frotran and .NET in
     handling numerical values.

       General setup:
          - All simulations use basically the same soil (physical characteristics),  and are
             described using SoilWat;
          - Each simulation set try to excercise one process/pool at time, details are give in  the
            'info' for each simulation set

       Note that to expose some of these differences the number of decimal places in the output
     file had to be increased.
  folder Test-01
    memo Info
      ++++++++++++++++++  TEST 01 ++++++++++++++++++

         Description:
            - Artificial climate, smooth mild temperate;
            - Using a generic soil, medium texture free draining;
            - Bare soil;
            - No initial mineral N;
            - No initial organic matter;
            - No initial surface residues;
            - No additions of residues or mineral N;

         Expected output:
            - All outputs with valid values (numeric), except those related to plants;
            - Most values equal to zero, as there is no mineral solutes or organic pools;
            - Soil temperature is simulated by SoilN/SoilNitrogen, so it should show values
               . This is the main output here, the values should be nearly equal for both models;

      +++++++++++++++++++++++++++++++++++++++++++++
    simulation Sim01-SoilN_BareBare
      clock
        start_date = 01/01/2000
        end_date = 31/07/2000
      metfile met: filename=%apsim%\Examples\MetFiles\MildTemperate.met
      PlugIns
        PlugIn=[%apsim%\UserInterface\ApsimUIPlugIn.xml, %apsim%\UserInterface\SoilTypes.xml, %apsim%\UserInterface\Graph.xml, %apsim%\UserInterface\Ausfarm.xml, %apsim%\UserInterface\DevelopersPlugIn.xml, %apsim%\Model\SlurryTank.xml, %apsim%\Model\PHmodel.xml, %apsim%\Model\simpleBuilding.xml, %apsim%\Model\atmosphere.xml, %apsim%\Model\Accum.xml, %apsim%\Model\AgPasture.xml, %apsim%\Model\Bambatsi.xml, %apsim%\Model\Barley.xml, %apsim%\Model\Br.xml, %apsim%\Model\Bore.xml, %apsim%\Model\Broccoli.xml, %apsim%\Model\ButterflyPea.xml, %apsim%\Model\Canola.xml, %apsim%\Model\Canopy.xml, %apsim%\Model\Centro.xml, %apsim%\Model\Channel.xml, %apsim%\Model\Chickpea.xml, %apsim%\Model\Cl.xml, %apsim%\Model\Climatechange.xml, %apsim%\Model\Clock.xml, %apsim%\Model\Cotton2.xml, %apsim%\Model\Cowpea.xml, %apsim%\Model\CropUI.xml, %apsim%\Model\Dam.xml, %apsim%\Model\DCD.xml, %apsim%\Model\EGrandis.xml, %apsim%\Model\EMelliodora.xml, %apsim%\Model\Eo.xml, %apsim%\Model\EPopulnea.xml, %apsim%\Model\Erosion.xml, %apsim%\Model\Events.xml, %apsim%\Model\Fababean.xml, %apsim%\Model\Factorial.xml, %apsim%\Model\Factor.xml, %apsim%\Model\FactorComplex.xml, %apsim%\Model\FrenchBean.xml, %apsim%\Model\Fertiliser.xml, %apsim%\Model\Fieldpea.xml, %apsim%\Model\Gcm_data.xml, %apsim%\Model\Grasp.xml, %apsim%\Model\Graz.xml, %apsim%\Model\Growth.xml, %apsim%\Model\Horsegram.xml, %apsim%\Model\Ini.xml, %apsim%\Model\InitWater.xml, %apsim%\Model\Input.xml, %apsim%\Model\Irrigation.xml, %apsim%\Model\KWTest.xml, %apsim%\Model\Lablab.xml, %apsim%\Model\Lettuce.xml, %apsim%\Model\Log.xml, %apsim%\Model\Lucerne.xml, %apsim%\Model\Lupin.xml, %apsim%\Model\Maize.xml, %apsim%\Model\MaizeZ.xml, %apsim%\Model\Manager.xml, %apsim%\Model\Map.xml, %apsim%\Model\Memo.xml, %apsim%\Model\MetFile.xml, %apsim%\Model\MicroMet.xml, %apsim%\Model\Millet.xml, %apsim%\Model\Millet1.xml, %apsim%\Model\Millet2.xml, %apsim%\Model\Millet3.xml, %apsim%\Model\Millet4.xml, %apsim%\Model\Millet5.xml, %apsim%\Model\Mucuna.xml, %apsim%\Model\Mungbean.xml, %apsim%\Model\Navybean.xml, %apsim%\Model\Oats.xml, %apsim%\Model\Ocean_data.xml, %apsim%\Model\Operations.xml, %apsim%\Model\Orobanche.xml, %apsim%\Model\Oryza.xml, %apsim%\Model\Oryza2.xml, %apsim%\Model\OutputFile.xml, %apsim%\Model\Ozcot.xml, %apsim%\Model\Patchinput.xml, %apsim%\Model\Peanut.xml, %apsim%\Model\Pigeonpea.xml, %apsim%\Model\Pond.xml, %apsim%\Model\Potato.xml, %apsim%\Model\RotPlot.xml, %apsim%\Model\RugPlotUI.xml, %apsim%\Model\Root.xml, %apsim%\Model\Rule.xml, %apsim%\Model\Script.xml, %apsim%\Model\Seedling.xml, %apsim%\Model\SiloInput.xml, %apsim%\Model\Slurp.xml, %apsim%\Model\Soi.xml, %apsim%\Model\Soil.xml, %apsim%\Model\SoilNui.xml, %apsim%\Model\SoilTemp.xml, %apsim%\Model\Sorghum.xml, %apsim%\Model\SorghumConstants.xml, %apsim%\Model\SorghumGenotype.xml, %apsim%\Model\Soybean.xml, %apsim%\Model\Stylo.xml, %apsim%\Model\Sugar.xml, %apsim%\Model\Summaryfile.xml, %apsim%\Model\Sunflower.xml, %apsim%\Model\SurfaceOM.xml, %apsim%\Model\SweetCorn.xml, %apsim%\Model\SweetSorghum.xml, %apsim%\Model\SWIM2.xml, %apsim%\Model\SWIM2ui.xml, %apsim%\Model\SWIM2ui2.xml, %apsim%\Model\Sysbal.xml, %apsim%\Model\SysBal2.xml, %apsim%\Model\Tcllink.xml, %apsim%\Model\Tclmanager.xml, %apsim%\Model\Tclui.xml, %apsim%\Model\TextOutput.xml, %apsim%\Model\Tracker.xml, %apsim%\Model\Tree.xml, %apsim%\Model\Variables.xml, %apsim%\Model\Venlink.xml, %apsim%\Model\vine.xml, %apsim%\Model\WaterSupply.xml, %apsim%\Model\Weed.xml, %apsim%\Model\Wheat.xml, %apsim%\Model\YPCalc.xml, %apsim%\Model\UrinePatch.xml, %apsim%\Model\Soil with new nitrogen model.xml]
      summaryfile
      area Paddock
        operations OperationsSchedule
        fertiliser
        surfaceom SurfaceOrganicMatter
          PoolName = Residue1  # Organic Matter pool name
          type = grass  # Organic Matter type
          mass = 0  # Initial surface residue (kg/ha)
          cnr = 15  # C:N ratio of initial residue
          standing_fraction = 0  # Fraction of residue standing
        Soil MediumSedimentarySoil: SoilType=Generic medium sedimentary soil; Site=New Zealand; Latitude=0; Longitude=0
          Water
            Thickness  BD    AirDry  LL15  DUL   SAT   KS
            150        1.2   0.2     0.22  0.4   0.5   25
            150        1.2   0.2     0.21  0.39  0.49  20
            300        1.25  0.2     0.2   0.38  0.48  20
            300        1.3   0.19    0.19  0.37  0.47  20
            300        1.35  0.18    0.18  0.36  0.46  20
            300        1.4   0.17    0.17  0.35  0.45  20
            SoilCrop wheat: LL=[0.22, 0.21, 0.2, 0.19, 0.18, 0.17]; KL=[0.25, 0.15, 0.06, 0.01, 0, 0]; XF=[1, 1, 1, 1, 1, 0]
            SoilCrop agpasture: LL=[0.22, 0.21, 0.2, 0.19, 0.18, 0.17]; KL=[0.25, 0.17, 0.08, 0.02, 0, 0]; XF=[1, 1, 1, 1, 1, 0]
          SoilWater: SummerCona=4; SummerU=6; SummerDate=1-Nov; WinterCona=3; WinterU=4; WinterDate=1-Apr; DiffusConst=88; DiffusSlope=35; Salb=0.13; CN2Bare=73; CNRed=20; CNCov=0.8; Thickness=[150, 150, 300, 300, 300, 300]; SWCON=[0.4, 0.3, 0.25, 0.25, 0.3, 0.3]
          SoilOrganicMatter: RootCN=30; RootWt=0; SoilCN=12.5; EnrACoeff=7.4; EnrBCoeff=0.2; OCUnits=Total
            Thickness  OC  FBiom  FInert
            150        0   0.035  0.45
            150        0   0.02   0.525
            300        0   0.015  0.675
            300        0   0.01   0.85
            300        0   0.01   0.95
            300        0   0.01   0.998
          Analysis: PHUnits=Water; BoronUnits=HotWater
            Thickness  PH   CEC   ParticleSizeSand  ParticleSizeSilt  ParticleSizeClay
            150        6.5  15    20                60                20
            150        6.5  15    20                60                20
            300        6.5  12.5  20                60                20
            300        6.5  10    20                60                20
            300        6.5  7.5   20                60                20
            300        6.5  7.5   20                60                20
          Sample Initial nitrogen: NO3Units=kgha; NH4Units=ppm; SWUnits=Volumetric; OCUnits=Total; PHUnits=Water
            Thickness  NO3  NH4
            150        0    0
            150        0    0
            300        0    0
            300        0    0
            300        0    0
            300        0    0
          Sample Initial water: Thickness=[150, 150, 300, 300, 300, 300]; SW=[0.36, 0.37, 0.38, 0.37, 0.36, 0.35]; NO3Units=ppm; NH4Units=ppm; SWUnits=Volumetric; OCUnits=Total; PHUnits=Water
        outputfile Report: filename=Sim01-SoilN_BareBare Report.out; title=Sim01-SoilN_BareBare Report
          variables
            variable:
              dd/mmm/yyyy as Date
              day as DoY
              urea() as UreaTotal format 5
              nh4() as NH4Total format 5
              no3() as NO3Total format 7
              surfaceom_n as SurfaceOM_N format 5
              fom_n() as FOM_N format 5
              biom_n() as Biom_N format 5
              hum_n() as Hum_N format 5
              totaln as PlantN format 5
              TotalPlantN as PastureN format 5
              fertiliser as FertiliserN format 5
              dlt_urea_hydrol() as HydrolisedN format 5
              nitrification() as NitrifiedN format 5
              dnit() as DenitrifiedN format 7
              leach_no3 as LeachedNO3 format 7
              dlt_n_min_res() as NetMineralisedResidue format 5
              dlt_n_min_tot() as NetMineralisedHumus format 5
              n2o_atm() as N2Oemissions format 5
              surfaceom_c as SurfaceOM_C format 5
              fom_c() as FOM_C format 5
              biom_c() as Biom_C format 5
              hum_c() as Hum_C format 5
              oc() as OCTotal  format 5
              biomass as PlantBiomass format 5
              es as Evaporation format 5
              ep as Transpiration format 5
              WaterUptake as pTranspiration format 5
              drain as Drain format 7
              dlayer format 5
              no3 format 10
              nh4 format 5
              fom_n format 5
              biom_n format 5
              hum_n format 5
              fom_c format 5
              biom_c format 5
              hum_c format 5
              st as SoilTemperature format 7
              sw_dep format 3
          events ReportingFrequency: event=end_day
    simulation Sim01-SoilNitrogen_BareBare -> /SoilNitrogen-SoilN_Comparison/Test-01/Sim01-SoilN_BareBare
      PlugIns: same as Test-01.Sim01-SoilN_BareBare.PlugIns
      area Paddock -> /SoilNitrogen-SoilN_Comparison/Test-01/Sim01-SoilN_BareBare/Paddock
        outputfile Report -> /SoilNitrogen-SoilN_Comparison/Test-01/Sim01-SoilN_BareBare/Paddock/Report: filename=Sim01-SoilNitrogen_BareBare Report.out; title=Sim01-SoilNitrogen_BareBare Report
          variables -> /SoilNitrogen-SoilN_Comparison/Test-01/Sim01-SoilN_BareBare/Paddock/Report/Variables
          events ReportingFrequency -> /SoilNitrogen-SoilN_Comparison/Test-01/Sim01-SoilN_BareBare/Paddock/Report/ReportingFrequency
  folder Test-02 -> /SoilNitrogen-SoilN_Comparison/Test-01
    memo Info
      ++++++++++++++++++  TEST 02 ++++++++++++++++++

         Description:
            - Artificial climate, smooth mild temperate;
            - Using a generic soil, medium texture free draining;
            - Bare soil;
            - Initial mineral N = 60 kg/ha as NO3;
            - No initial organic matter;
            - No initial surface residues;
            - No additions of residues or mineral N;

         Expected output:
            - All outputs with valid values (numeric), except those related to plants;
            - Variables involving mineral N should have values,
               . Changes are due to leaching as there is no NH4 nor organic pools;

      +++++++++++++++++++++++++++++++++++++++++++++
    simulation Sim02-SoilN_Bare+NO3 -> /SoilNitrogen-SoilN_Comparison/Test-01/Sim01-SoilN_BareBare
      PlugIns: same as Test-01.Sim01-SoilN_BareBare.PlugIns
      area Paddock -> /SoilNitrogen-SoilN_Comparison/Test-01/Sim01-SoilN_BareBare/Paddock
        operations OperationsSchedule
        surfaceom SurfaceOrganicMatter
          PoolName = Residue1  # Organic Matter pool name
          type = grass  # Organic Matter type
          mass = 0  # Initial surface residue (kg/ha)
          cnr = 15  # C:N ratio of initial residue
          standing_fraction = 0  # Fraction of residue standing
        Soil MediumSedimentarySoil: SoilType=Generic medium sedimentary soil; Site=New Zealand; Latitude=0; Longitude=0
          Water: same as Test-01.Sim01-SoilN_BareBare.Paddock.MediumSedimentarySoil.Water
          SoilWater: SummerCona=4; SummerU=6; SummerDate=1-Nov; WinterCona=3; WinterU=4; WinterDate=1-Apr; DiffusConst=88; DiffusSlope=35; Salb=0.13; CN2Bare=73; CNRed=20; CNCov=0.8; Thickness=[150, 150, 300, 300, 300, 300]; SWCON=[0.4, 0.3, 0.25, 0.25, 0.3, 0.3]
          SoilOrganicMatter: RootCN=30; RootWt=0; SoilCN=12.5; EnrACoeff=7.4; EnrBCoeff=0.2
            Thickness  OC  FBiom  FInert
            150        0   0.035  0.45
            150        0   0.02   0.525
            300        0   0.015  0.675
            300        0   0.01   0.85
            300        0   0.01   0.95
            300        0   0.01   0.998
          Analysis
            Thickness  PH   CEC   ParticleSizeSand  ParticleSizeSilt  ParticleSizeClay
            150        6.5  15    20                60                20
            150        6.5  15    20                60                20
            300        6.5  12.5  20                60                20
            300        6.5  10    20                60                20
            300        6.5  7.5   20                60                20
            300        6.5  7.5   20                60                20
          Sample Initial nitrogen: NO3Units=kgha; NH4Units=ppm; SWUnits=Volumetric; PHUnits=Water
            Thickness  NO3  NH4
            150        10   0
            150        10   0
            300        10   0
            300        10   0
            300        10   0
            300        10   0
          Sample Initial water: Thickness=[150, 150, 300, 300, 300, 300]; SW=[0.36, 0.37, 0.38, 0.37, 0.36, 0.35]; NO3Units=ppm; NH4Units=ppm; SWUnits=Volumetric; OCUnits=Total; PHUnits=Water
        outputfile Report -> /SoilNitrogen-SoilN_Comparison/Test-01/Sim01-SoilN_BareBare/Paddock/Report: filename=Sim02-SoilN_Bare+NO3 Report.out; title=Sim02-SoilN_Bare+NO3 Report
          variables -> /SoilNitrogen-SoilN_Comparison/Test-01/Sim01-SoilN_BareBare/Paddock/Report/Variables
          events ReportingFrequency -> /SoilNitrogen-SoilN_Comparison/Test-01/Sim01-SoilN_BareBare/Paddock/Report/ReportingFrequency
    simulation Sim02-SoilNitrogen_Bare+NO3 -> /SoilNitrogen-SoilN_Comparison/Test-02/Sim02-SoilN_Bare+NO3
      PlugIns: same as Test-01.Sim01-SoilN_BareBare.PlugIns
      area Paddock -> /SoilNitrogen-SoilN_Comparison/Test-02/Sim02-SoilN_Bare+NO3/Paddock
        outputfile Report -> /SoilNitrogen-SoilN_Comparison/Test-02/Sim02-SoilN_Bare+NO3/Paddock/Report: filename=Sim02-SoilNitrogen_Bare+NO3 Report.out; title=Sim02-SoilNitrogen_Bare+NO3 Report
          variables -> /SoilNitrogen-SoilN_Comparison/Test-02/Sim02-SoilN_Bare+NO3/Paddock/Report/Variables
          events ReportingFrequency -> /SoilNitrogen-SoilN_Comparison/Test-02/Sim02-SoilN_Bare+NO3/Paddock/Report/ReportingFrequency
  folder Test-03 -> /SoilNitrogen-SoilN_Comparison/Test-01
    memo Info
      ++++++++++++++++++  TEST 03 ++++++++++++++++++

         Description:
            - Artificial climate, smooth mild temperate;
            - Using a generic soil, medium texture free draining;
            - Bare soil;
            - Initial mineral N = 60 kg/ha as NH4;
            - No initial organic matter;
            - No initial surface residues;
            - No additions of residues or mineral N;

         Expected output:
            - All outputs with valid values (numeric), except those related to plants;
            - Variables involving mineral N should have values,
               . Changes are due to leaching as well as nitrfication;

      +++++++++++++++++++++++++++++++++++++++++++++
    simulation Sim03-SoilN_Bare+NH4 -> /SoilNitrogen-SoilN_Comparison/Test-01/Sim01-SoilN_BareBare
      PlugIns: same as Test-01.Sim01-SoilN_BareBare.PlugIns
      area Paddock -> /SoilNitrogen-SoilN_Comparison/Test-01/Sim01-SoilN_BareBare/Paddock
        operations OperationsSchedule
        surfaceom SurfaceOrganicMatter
          PoolName = Residue1  # Organic Matter pool name
          type = grass  # Organic Matter type
          mass = 0  # Initial surface residue (kg/ha)
          cnr = 15  # C:N ratio of initial residue
          standing_fraction = 0  # Fraction of residue standing
        Soil MediumSedimentarySoil
          SoilType = Generic medium sedimentary soil  # Soil description
          Site = New Zealand
          Water: same as Test-01.Sim01-SoilN_BareBare.Paddock.MediumSedimentarySoil.Water
          SoilWater: same as Test-02.Sim02-SoilN_Bare+NO3.Paddock.MediumSedimentarySoil.SoilWater
          SoilOrganicMatter
            Thickness  OC  FBiom  FInert
            150        0   0.035  0.45
            150        0   0.02   0.525
            300        0   0.015  0.675
            300        0   0.01   0.85
            300        0   0.01   0.95
            300        0   0.01   0.998
            RootCN = 30
            RootWt = 0
            SoilCN = 12.5
            EnrACoeff = 7.4
            EnrBCoeff = 0.2
          Analysis: same as Test-02.Sim02-SoilN_Bare+NO3.Paddock.MediumSedimentarySoil.Analysis
          Sample Initial nitrogen: NO3Units=kgha; NH4Units=kgha; SWUnits=Volumetric; PHUnits=Water
            Thickness  NO3  NH4
            150        0    10
            150        0    10
            300        0    10
            300        0    10
            300        0    10
            300        0    10
          Sample Initial water: Thickness=[150, 150, 300, 300, 300, 300]; SW=[0.36, 0.37, 0.38, 0.37, 0.36, 0.35]
        outputfile Report -> /SoilNitrogen-SoilN_Comparison/Test-01/Sim01-SoilN_BareBare/Paddock/Report: filename=Sim03-SoilN_Bare+NH4 Report.out; title=Sim03-SoilN_Bare+NH4 Report
          variables -> /SoilNitrogen-SoilN_Comparison/Test-01/Sim01-SoilN_BareBare/Paddock/Report/Variables
          events ReportingFrequency -> /SoilNitrogen-SoilN_Comparison/Test-01/Sim01-SoilN_BareBare/Paddock/Report/ReportingFrequency
    simulation Sim03-SoilNitrogen_Bare+NH4 -> /SoilNitrogen-SoilN_Comparison/Test-03/Sim03-SoilN_Bare+NH4
      PlugIns: same as Test-01.Sim01-SoilN_BareBare.PlugIns
      area Paddock -> /SoilNitrogen-SoilN_Comparison/Test-03/Sim03-SoilN_Bare+NH4/Paddock
        outputfile Report -> /SoilNitrogen-SoilN_Comparison/Test-03/Sim03-SoilN_Bare+NH4/Paddock/Report: filename=Sim03-SoilNitrogen_Bare+NH4 Report.out; title=Sim03-SoilNitrogen_Bare+NH4 Report
          variables -> /SoilNitrogen-SoilN_Comparison/Test-03/Sim03-SoilN_Bare+NH4/Paddock/Report/Variables
          events ReportingFrequency -> /SoilNitrogen-SoilN_Comparison/Test-03/Sim03-SoilN_Bare+NH4/Paddock/Report/ReportingFrequency
  folder Test-04 -> /SoilNitrogen-SoilN_Comparison/Test-01
    memo Info
      ++++++++++++++++++  TEST 04 ++++++++++++++++++

         Description:
            - Artificial climate, smooth mild temperate;
            - Using a generic soil, medium texture free draining;
            - Bare soil;
            - No initial mineral N;
            - Initial organic matter = about 125 tonnes hum, 10ton N;
            - No initial surface residues;
            - No additions of residues or mineral N;

         Expected output:
            - All outputs with valid values (numeric), except those related to plants;
            - Most variables should show changes;
               . Changes focusing on biomass and humus

      +++++++++++++++++++++++++++++++++++++++++++++
    simulation Sim04-SoilN_Bare+Hum -> /SoilNitrogen-SoilN_Comparison/Test-01/Sim01-SoilN_BareBare
      PlugIns: same as Test-01.Sim01-SoilN_BareBare.PlugIns
      area Paddock -> /SoilNitrogen-SoilN_Comparison/Test-01/Sim01-SoilN_BareBare/Paddock
        operations OperationsSchedule
        surfaceom SurfaceOrganicMatter
          PoolName = Residue1  # Organic Matter pool name
          type = grass  # Organic Matter type
          mass = 0  # Initial surface residue (kg/ha)
          cnr = 15  # C:N ratio of initial residue
          standing_fraction = 0  # Fraction of residue standing
        Soil MediumSedimentarySoil: SoilType=Generic medium sedimentary soil; Site=New Zealand; Latitude=0; Longitude=0
          Water: same as Test-01.Sim01-SoilN_BareBare.Paddock.MediumSedimentarySoil.Water
          SoilWater: same as Test-02.Sim02-SoilN_Bare+NO3.Paddock.MediumSedimentarySoil.SoilWater
          SoilOrganicMatter: RootCN=30; RootWt=0; SoilCN=12.5; EnrACoeff=7.4; EnrBCoeff=0.2
            Thickness  OC    FBiom  FInert
            150        3     0.035  0.45
            150        1.5   0.02   0.525
            300        0.5   0.015  0.675
            300        0.25  0.01   0.85
            300        0.1   0.01   0.95
            300        0.1   0.01   0.998
          Analysis: same as Test-01.Sim01-SoilN_BareBare.Paddock.MediumSedimentarySoil.Analysis
          Sample Initial nitrogen: NO3Units=kgha
            Thickness  NO3  NH4
            150        0    0
            150        0    0
            300        0    0
            300        0    0
            300        0    0
            300        0    0
          Sample Initial water: Thickness=[150, 150, 300, 300, 300, 300]; SW=[0.36, 0.37, 0.38, 0.37, 0.36, 0.35]
        outputfile Report -> /SoilNitrogen-SoilN_Comparison/Test-01/Sim01-SoilN_BareBare/Paddock/Report: filename=Sim04-SoilN_Bare+Hum Report.out; title=Sim04-SoilN_Bare+Hum Report
          variables -> /SoilNitrogen-SoilN_Comparison/Test-01/Sim01-SoilN_BareBare/Paddock/Report/Variables
          events ReportingFrequency -> /SoilNitrogen-SoilN_Comparison/Test-01/Sim01-SoilN_BareBare/Paddock/Report/ReportingFrequency
    simulation Sim04-SoilNitrogen_Bare+Hum -> /SoilNitrogen-SoilN_Comparison/Test-04/Sim04-SoilN_Bare+Hum
      PlugIns: same as Test-01.Sim01-SoilN_BareBare.PlugIns
      area Paddock -> /SoilNitrogen-SoilN_Comparison/Test-04/Sim04-SoilN_Bare+Hum/Paddock
        outputfile Report -> /SoilNitrogen-SoilN_Comparison/Test-04/Sim04-SoilN_Bare+Hum/Paddock/Report: filename=Sim04-SoilNitrogen_Bare+Hum Report.out; title=Sim04-SoilNitrogen_Bare+Hum Report
          variables -> /SoilNitrogen-SoilN_Comparison/Test-04/Sim04-SoilN_Bare+Hum/Paddock/Report/Variables
          events ReportingFrequency -> /SoilNitrogen-SoilN_Comparison/Test-04/Sim04-SoilN_Bare+Hum/Paddock/Report/ReportingFrequency
  folder Test-05 -> /SoilNitrogen-SoilN_Comparison/Test-01
    memo Info
      ++++++++++++++++++  TEST 05 ++++++++++++++++++

         Description:
            - Artificial climate, smooth mild temperate;
            - Using a generic soil, medium texture free draining;
            - Bare soil;
            - No initial mineral N;
            - Initial organic matter = 1000kg fom, 13kg N;
            - No initial surface residues;
            - No additions of residues or mineral N;

         Expected output:
            - All outputs with valid values (numeric), except those related to plants;
            - Most variables should show changes;
               . Changes focusing on conversion of fom into humus/biom

      +++++++++++++++++++++++++++++++++++++++++++++
    simulation Sim05-SoilN_Bare+FOM -> /SoilNitrogen-SoilN_Comparison/Test-01/Sim01-SoilN_BareBare
      PlugIns: same as Test-01.Sim01-SoilN_BareBare.PlugIns
      area Paddock -> /SoilNitrogen-SoilN_Comparison/Test-01/Sim01-SoilN_BareBare/Paddock
        operations OperationsSchedule
        surfaceom SurfaceOrganicMatter
          PoolName = Residue1  # Organic Matter pool name
          type = grass  # Organic Matter type
          mass = 0  # Initial surface residue (kg/ha)
          cnr = 15  # C:N ratio of initial residue
          standing_fraction = 0  # Fraction of residue standing
        Soil MediumSedimentarySoil
          SoilType = Generic medium sedimentary soil  # Soil description
          Site = New Zealand
          Water: same as Test-01.Sim01-SoilN_BareBare.Paddock.MediumSedimentarySoil.Water
          SoilWater: same as Test-02.Sim02-SoilN_Bare+NO3.Paddock.MediumSedimentarySoil.SoilWater
          SoilOrganicMatter: RootCN=30; RootWt=1000; SoilCN=12.5; EnrACoeff=7.4; EnrBCoeff=0.2
            Thickness  OC  FBiom  FInert
            150        0   0.035  0.45
            150        0   0.02   0.525
            300        0   0.015  0.675
            300        0   0.01   0.85
            300        0   0.01   0.95
            300        0   0.01   0.998
          Analysis: same as Test-01.Sim01-SoilN_BareBare.Paddock.MediumSedimentarySoil.Analysis
          Sample Initial nitrogen: NO3Units=kgha
            Thickness  NO3  NH4
            150        0    0
            150        0    0
            300        0    0
            300        0    0
            300        0    0
            300        0    0
          Sample Initial water: Thickness=[150, 150, 300, 300, 300, 300]; SW=[0.36, 0.37, 0.38, 0.37, 0.36, 0.35]
        outputfile Report -> /SoilNitrogen-SoilN_Comparison/Test-01/Sim01-SoilN_BareBare/Paddock/Report: filename=Sim05-SoilN_Bare+FOM Report.out; title=Sim05-SoilN_Bare+FOM Report
          variables -> /SoilNitrogen-SoilN_Comparison/Test-01/Sim01-SoilN_BareBare/Paddock/Report/Variables
          events ReportingFrequency -> /SoilNitrogen-SoilN_Comparison/Test-01/Sim01-SoilN_BareBare/Paddock/Report/ReportingFrequency
    simulation Sim05-SoilNitrogen_Bare+FOM -> /SoilNitrogen-SoilN_Comparison/Test-05/Sim05-SoilN_Bare+FOM
      PlugIns: same as Test-01.Sim01-SoilN_BareBare.PlugIns
      area Paddock -> /SoilNitrogen-SoilN_Comparison/Test-05/Sim05-SoilN_Bare+FOM/Paddock
        outputfile Report -> /SoilNitrogen-SoilN_Comparison/Test-05/Sim05-SoilN_Bare+FOM/Paddock/Report: filename=Sim05-SoilNitrogen_Bare+FOM Report.out; title=Sim05-SoilNitrogen_Bare+FOM Report
          variables -> /SoilNitrogen-SoilN_Comparison/Test-05/Sim05-SoilN_Bare+FOM/Paddock/Report/Variables
          events ReportingFrequency -> /SoilNitrogen-SoilN_Comparison/Test-05/Sim05-SoilN_Bare+FOM/Paddock/Report/ReportingFrequency
  folder Test-06 -> /SoilNitrogen-SoilN_Comparison/Test-01
    memo Info
      ++++++++++++++++++  TEST 06 ++++++++++++++++++

         Description:
            - Artificial climate, smooth mild temperate;
            - Using a generic soil, medium texture free draining;
            - Bare soil;
            - No initial mineral N;
            - No initial organic matter;
            - Initial surface residues = 1000kg, 27kg N;
            - No additions of residues or mineral N;

         Expected output:
            - All outputs with valid values (numeric), except those related to plants;
            - Most variables should show changes;
               . Changes focusing on convertion of SurfOM to humus

      +++++++++++++++++++++++++++++++++++++++++++++
    simulation Sim06-SoilN_Bare+SurfOM -> /SoilNitrogen-SoilN_Comparison/Test-01/Sim01-SoilN_BareBare
      PlugIns: same as Test-01.Sim01-SoilN_BareBare.PlugIns
      area Paddock -> /SoilNitrogen-SoilN_Comparison/Test-01/Sim01-SoilN_BareBare/Paddock
        operations OperationsSchedule
        surfaceom SurfaceOrganicMatter
          PoolName = Residue1  # Organic Matter pool name
          type = grass  # Organic Matter type
          mass = 1000  # Initial surface residue (kg/ha)
          cnr = 15  # C:N ratio of initial residue
          standing_fraction = 0  # Fraction of residue standing
        Soil MediumSedimentarySoil
          SoilType = Generic medium sedimentary soil  # Soil description
          Site = New Zealand
          Water: same as Test-01.Sim01-SoilN_BareBare.Paddock.MediumSedimentarySoil.Water
          SoilWater: same as Test-02.Sim02-SoilN_Bare+NO3.Paddock.MediumSedimentarySoil.SoilWater
          SoilOrganicMatter: same as Test-03.Sim03-SoilN_Bare+NH4.Paddock.MediumSedimentarySoil.SoilOrganicMatter
          Analysis: same as Test-02.Sim02-SoilN_Bare+NO3.Paddock.MediumSedimentarySoil.Analysis
          Sample Initial nitrogen: NO3Units=kgha
            Thickness  NO3  NH4
            150        0    0
            150        0    0
            300        0    0
            300        0    0
            300        0    0
            300        0    0
          Sample Initial water: Thickness=[150, 150, 300, 300, 300, 300]; SW=[0.36, 0.37, 0.38, 0.37, 0.36, 0.35]
        outputfile Report -> /SoilNitrogen-SoilN_Comparison/Test-01/Sim01-SoilN_BareBare/Paddock/Report: filename=Sim06-SoilN_Bare+SurfOM Report.out; title=Sim06-SoilN_Bare+SurfOM Report
          variables -> /SoilNitrogen-SoilN_Comparison/Test-01/Sim01-SoilN_BareBare/Paddock/Report/Variables
          events ReportingFrequency -> /SoilNitrogen-SoilN_Comparison/Test-01/Sim01-SoilN_BareBare/Paddock/Report/ReportingFrequency
    simulation Sim06-SoilNitrogen_Bare+SurfOM -> /SoilNitrogen-SoilN_Comparison/Test-06/Sim06-SoilN_Bare+SurfOM
      PlugIns: same as Test-01.Sim01-SoilN_BareBare.PlugIns
      area Paddock -> /SoilNitrogen-SoilN_Comparison/Test-06/Sim06-SoilN_Bare+SurfOM/Paddock
        outputfile Report -> /SoilNitrogen-SoilN_Comparison/Test-06/Sim06-SoilN_Bare+SurfOM/Paddock/Report: filename=Sim06-SoilNitrogen_Bare+SurfOM Report.out; title=Sim06-SoilNitrogen_Bare+SurfOM Report
          variables -> /SoilNitrogen-SoilN_Comparison/Test-06/Sim06-SoilN_Bare+SurfOM/Paddock/Report/Variables
          events ReportingFrequency -> /SoilNitrogen-SoilN_Comparison/Test-06/Sim06-SoilN_Bare+SurfOM/Paddock/Report/ReportingFrequency
  folder Test-07 -> /SoilNitrogen-SoilN_Comparison/Test-01
    memo Info
      ++++++++++++++++++  TEST 07 ++++++++++++++++++

         Description:
            - Artificial climate, smooth mild temperate;
            - Using a generic soil, medium texture free draining;
            - Bare soil;
            - No initial mineral N;
            - No initial organic matter;
            - No initial surface residues;
            - No additions of residues;
            - Apply 100kg urea_N;

         Expected output:
            - All outputs with valid values (numeric), except those related to plants;
            - Variables involving mineral N should have values,
               . Changes are focused on convertion of urea in to NH4 and then NO3

      +++++++++++++++++++++++++++++++++++++++++++++
    simulation Sim07-SoilN_Bare+Urea -> /SoilNitrogen-SoilN_Comparison/Test-01/Sim01-SoilN_BareBare
      PlugIns: same as Test-01.Sim01-SoilN_BareBare.PlugIns
      area Paddock -> /SoilNitrogen-SoilN_Comparison/Test-01/Sim01-SoilN_BareBare/Paddock
        operations OperationsSchedule
          5-Jan  Fertiliser apply amount=50 (kg/ha), depth=100 (mm), type=urea_n
          5-Jan  Fertiliser apply amount=50 (kg/ha), depth=200 (mm), type=urea_n
        surfaceom SurfaceOrganicMatter
          PoolName = Residue1  # Organic Matter pool name
          type = grass  # Organic Matter type
          mass = 0  # Initial surface residue (kg/ha)
          cnr = 15  # C:N ratio of initial residue
          standing_fraction = 0  # Fraction of residue standing
        Soil MediumSedimentarySoil: same as Test-06.Sim06-SoilN_Bare+SurfOM.Paddock.MediumSedimentarySoil
        outputfile Report -> /SoilNitrogen-SoilN_Comparison/Test-01/Sim01-SoilN_BareBare/Paddock/Report: filename=Sim07-SoilN_Bare+Urea Report.out; title=Sim07-SoilN_Bare+Urea Report
          variables -> /SoilNitrogen-SoilN_Comparison/Test-01/Sim01-SoilN_BareBare/Paddock/Report/Variables
          events ReportingFrequency -> /SoilNitrogen-SoilN_Comparison/Test-01/Sim01-SoilN_BareBare/Paddock/Report/ReportingFrequency
    simulation Sim07-SoilNitrogen_Bare+Urea -> /SoilNitrogen-SoilN_Comparison/Test-07/Sim07-SoilN_Bare+Urea
      PlugIns: same as Test-01.Sim01-SoilN_BareBare.PlugIns
      area Paddock -> /SoilNitrogen-SoilN_Comparison/Test-07/Sim07-SoilN_Bare+Urea/Paddock
        outputfile Report -> /SoilNitrogen-SoilN_Comparison/Test-07/Sim07-SoilN_Bare+Urea/Paddock/Report: filename=Sim07-SoilNitrogen_Bare+Urea Report.out; title=Sim07-SoilNitrogen_Bare+Urea Report
          variables -> /SoilNitrogen-SoilN_Comparison/Test-07/Sim07-SoilN_Bare+Urea/Paddock/Report/Variables
          events ReportingFrequency -> /SoilNitrogen-SoilN_Comparison/Test-07/Sim07-SoilN_Bare+Urea/Paddock/Report/ReportingFrequency
  folder Test-08 -> /SoilNitrogen-SoilN_Comparison/Test-01
    memo Info
      ++++++++++++++++++  TEST 08 ++++++++++++++++++

         Description:
            - Artificial climate, smooth mild temperate;
            - Using a generic soil, medium texture free draining;
            - Bare soil;
            - Initial mineral N = 60kg as NO3 + 60kg as NH4;
            - No initial organic matter;
            - No initial surface residues;
            - No additions of residues or mineral N;

         Expected output:
            - All outputs with valid values (numeric), except those related to plants;
            - Variables involving mineral N should have values,
               . Changes are due to leaching and nitrification;

      +++++++++++++++++++++++++++++++++++++++++++++
    simulation Sim08-SoilN_Bare+NO3+NH4 -> /SoilNitrogen-SoilN_Comparison/Test-01/Sim01-SoilN_BareBare
      PlugIns: same as Test-01.Sim01-SoilN_BareBare.PlugIns
      area Paddock -> /SoilNitrogen-SoilN_Comparison/Test-01/Sim01-SoilN_BareBare/Paddock
        operations OperationsSchedule
        surfaceom SurfaceOrganicMatter
          PoolName = Residue1  # Organic Matter pool name
          type = grass  # Organic Matter type
          mass = 0  # Initial surface residue (kg/ha)
          cnr = 15  # C:N ratio of initial residue
          standing_fraction = 0  # Fraction of residue standing
        Soil MediumSedimentarySoil: SoilType=Generic medium sedimentary soil; Site=New Zealand; Latitude=0; Longitude=0
          Water: same as Test-01.Sim01-SoilN_BareBare.Paddock.MediumSedimentarySoil.Water
          SoilWater: same as Test-02.Sim02-SoilN_Bare+NO3.Paddock.MediumSedimentarySoil.SoilWater
          SoilOrganicMatter: same as Test-03.Sim03-SoilN_Bare+NH4.Paddock.MediumSedimentarySoil.SoilOrganicMatter
          Analysis: same as Test-02.Sim02-SoilN_Bare+NO3.Paddock.MediumSedimentarySoil.Analysis
          Sample Initial nitrogen: NO3Units=kgha; NH4Units=kgha; SWUnits=Volumetric
            Thickness  NO3  NH4
            150        10   10
            150        10   10
            300        10   10
            300        10   10
            300        10   10
            300        10   10
          Sample Initial water: Thickness=[150, 150, 300, 300, 300, 300]; SW=[0.36, 0.37, 0.38, 0.37, 0.36, 0.35]
        outputfile Report -> /SoilNitrogen-SoilN_Comparison/Test-01/Sim01-SoilN_BareBare/Paddock/Report: filename=Sim08-SoilN_Bare+NO3+NH4 Report.out; title=Sim08-SoilN_Bare+NO3+NH4 Report
          variables -> /SoilNitrogen-SoilN_Comparison/Test-01/Sim01-SoilN_BareBare/Paddock/Report/Variables
          events ReportingFrequency -> /SoilNitrogen-SoilN_Comparison/Test-01/Sim01-SoilN_BareBare/Paddock/Report/ReportingFrequency
    simulation Sim08-SoilNitrogen_Bare+NO3+NH4 -> /SoilNitrogen-SoilN_Comparison/Test-08/Sim08-SoilN_Bare+NO3+NH4
      PlugIns: same as Test-01.Sim01-SoilN_BareBare.PlugIns
      area Paddock -> /SoilNitrogen-SoilN_Comparison/Test-08/Sim08-SoilN_Bare+NO3+NH4/Paddock
        wheat
        outputfile Report -> /SoilNitrogen-SoilN_Comparison/Test-08/Sim08-SoilN_Bare+NO3+NH4/Paddock/Report: filename=Sim08-SoilNitrogen_Bare+NO3+NH4 Report.out; title=Sim08-SoilNitrogen_Bare+NO3+NH4 Report
          variables -> /SoilNitrogen-SoilN_Comparison/Test-08/Sim08-SoilN_Bare+NO3+NH4/Paddock/Report/Variables
          events ReportingFrequency -> /SoilNitrogen-SoilN_Comparison/Test-08/Sim08-SoilN_Bare+NO3+NH4/Paddock/Report/ReportingFrequency
  folder Test-09 -> /SoilNitrogen-SoilN_Comparison/Test-01
    memo Info
      ++++++++++++++++++  TEST 09 ++++++++++++++++++

         Description:
            - Artificial climate, smooth mild temperate;
            - Using a generic soil, medium texture free draining;
            - Bare soil;
            - Initial mineral N = 60kg as NO3;
            - Initial organic matter = about 125 tonnes hum, 10ton N;
            - No initial surface residues;
            - No additions of residues or mineral N;

         Expected output:
            - All outputs with valid values (numeric), except those related to plants;
            - Most variables should show changes;
               . Changes are due to leaching and denitrification;

      +++++++++++++++++++++++++++++++++++++++++++++
    simulation Sim09-SoilN_Bare+Hum+NO3 -> /SoilNitrogen-SoilN_Comparison/Test-01/Sim01-SoilN_BareBare
      PlugIns: same as Test-01.Sim01-SoilN_BareBare.PlugIns
      area Paddock -> /SoilNitrogen-SoilN_Comparison/Test-01/Sim01-SoilN_BareBare/Paddock
        operations OperationsSchedule
        surfaceom SurfaceOrganicMatter
          PoolName = Residue1  # Organic Matter pool name
          type = grass  # Organic Matter type
          mass = 0  # Initial surface residue (kg/ha)
          cnr = 15  # C:N ratio of initial residue
          standing_fraction = 0  # Fraction of residue standing
        Soil MediumSedimentarySoil
          SoilType = Generic medium sedimentary soil  # Soil description
          Site = New Zealand
          Water: same as Test-01.Sim01-SoilN_BareBare.Paddock.MediumSedimentarySoil.Water
          SoilWater: same as Test-02.Sim02-SoilN_Bare+NO3.Paddock.MediumSedimentarySoil.SoilWater
          SoilOrganicMatter: RootCN=30; RootWt=0; SoilCN=12.5; EnrACoeff=7.4; EnrBCoeff=0.2
            Thickness  OC    FBiom  FInert
            150        3     0.035  0.45
            150        1.5   0.02   0.525
            300        0.5   0.015  0.675
            300        0.25  0.01   0.85
            300        0.1   0.01   0.95
            300        0.1   0.01   0.998
          Analysis: same as Test-01.Sim01-SoilN_BareBare.Paddock.MediumSedimentarySoil.Analysis
          Sample Initial nitrogen: NO3Units=kgha; NH4Units=kgha; SWUnits=Volumetric
            Thickness  NO3  NH4
            150        10   0
            150        10   0
            300        10   0
            300        10   0
            300        10   0
            300        10   0
          Sample Initial water: Thickness=[150, 150, 300, 300, 300, 300]; SW=[0.36, 0.37, 0.38, 0.37, 0.36, 0.35]
        outputfile Report -> /SoilNitrogen-SoilN_Comparison/Test-01/Sim01-SoilN_BareBare/Paddock/Report: filename=Sim09-SoilN_Bare+Hum+NO3 Report.out; title=Sim09-SoilN_Bare+Hum+NO3 Report
          variables -> /SoilNitrogen-SoilN_Comparison/Test-01/Sim01-SoilN_BareBare/Paddock/Report/Variables
          events ReportingFrequency -> /SoilNitrogen-SoilN_Comparison/Test-01/Sim01-SoilN_BareBare/Paddock/Report/ReportingFrequency
    simulation Sim09-SoilNitrogen_Bare+Hum+NO3 -> /SoilNitrogen-SoilN_Comparison/Test-09/Sim09-SoilN_Bare+Hum+NO3
      PlugIns: same as Test-01.Sim01-SoilN_BareBare.PlugIns
      area Paddock -> /SoilNitrogen-SoilN_Comparison/Test-09/Sim09-SoilN_Bare+Hum+NO3/Paddock
        outputfile Report -> /SoilNitrogen-SoilN_Comparison/Test-09/Sim09-SoilN_Bare+Hum+NO3/Paddock/Report: filename=Sim09-SoilNitrogen_Bare+Hum+NO3 Report.out; title=Sim09-SoilNitrogen_Bare+Hum+NO3 Report
          variables -> /SoilNitrogen-SoilN_Comparison/Test-09/Sim09-SoilN_Bare+Hum+NO3/Paddock/Report/Variables
          events ReportingFrequency -> /SoilNitrogen-SoilN_Comparison/Test-09/Sim09-SoilN_Bare+Hum+NO3/Paddock/Report/ReportingFrequency
  folder Test-10 -> /SoilNitrogen-SoilN_Comparison/Test-01
    memo Info
      ++++++++++++++++++  TEST 10 ++++++++++++++++++

         Description:
            - Artificial climate, smooth mild temperate;
            - Using a generic soil, medium texture free draining;
            - Bare soil;
            - Initial mineral N = 60kg as NH4;
            - Initial organic matter = about 125 tonnes hum, 10ton N;
            - No initial surface residues;
            - No additions of residues or mineral N;

         Expected output:
            - All outputs with valid values (numeric), except those related to plants;
            - Most variables should show changes;
               . Changes are due to nitrification and mineralisation of humus;

      +++++++++++++++++++++++++++++++++++++++++++++
    simulation Sim10-SoilN_Bare+Hum+NH4 -> /SoilNitrogen-SoilN_Comparison/Test-01/Sim01-SoilN_BareBare
      PlugIns: same as Test-01.Sim01-SoilN_BareBare.PlugIns
      area Paddock -> /SoilNitrogen-SoilN_Comparison/Test-01/Sim01-SoilN_BareBare/Paddock
        operations OperationsSchedule
        surfaceom SurfaceOrganicMatter
          PoolName = Residue1  # Organic Matter pool name
          type = grass  # Organic Matter type
          mass = 0  # Initial surface residue (kg/ha)
          cnr = 15  # C:N ratio of initial residue
          standing_fraction = 0  # Fraction of residue standing
        Soil MediumSedimentarySoil
          SoilType = Generic medium sedimentary soil  # Soil description
          Site = New Zealand
          Water: same as Test-01.Sim01-SoilN_BareBare.Paddock.MediumSedimentarySoil.Water
          SoilWater: same as Test-02.Sim02-SoilN_Bare+NO3.Paddock.MediumSedimentarySoil.SoilWater
          SoilOrganicMatter
            Thickness  OC    FBiom  FInert
            150        3     0.035  0.45
            150        1.5   0.02   0.525
            300        0.5   0.015  0.675
            300        0.25  0.01   0.85
            300        0.1   0.01   0.95
            300        0.1   0.01   0.998
            RootCN = 30
            RootWt = 0
            SoilCN = 12.5
            EnrACoeff = 7.4
            EnrBCoeff = 0.2
          Analysis: same as Test-02.Sim02-SoilN_Bare+NO3.Paddock.MediumSedimentarySoil.Analysis
          Sample Initial nitrogen: NO3Units=kgha; NH4Units=kgha
            Thickness  NO3  NH4
            150        0    10
            150        0    10
            300        0    10
            300        0    10
            300        0    10
            300        0    10
          Sample Initial water: Thickness=[150, 150, 300, 300, 300, 300]; SW=[0.36, 0.37, 0.38, 0.37, 0.36, 0.35]
        outputfile Report -> /SoilNitrogen-SoilN_Comparison/Test-01/Sim01-SoilN_BareBare/Paddock/Report: filename=Sim10-SoilN_Bare+Hum+NH4 Report.out; title=Sim10-SoilN_Bare+Hum+NH4 Report
          variables -> /SoilNitrogen-SoilN_Comparison/Test-01/Sim01-SoilN_BareBare/Paddock/Report/Variables
          events ReportingFrequency -> /SoilNitrogen-SoilN_Comparison/Test-01/Sim01-SoilN_BareBare/Paddock/Report/ReportingFrequency
    simulation Sim10-SoilNitrogen_Bare+Hum+NH4 -> /SoilNitrogen-SoilN_Comparison/Test-10/Sim10-SoilN_Bare+Hum+NH4
      PlugIns: same as Test-01.Sim01-SoilN_BareBare.PlugIns
      area Paddock -> /SoilNitrogen-SoilN_Comparison/Test-10/Sim10-SoilN_Bare+Hum+NH4/Paddock
        outputfile Report -> /SoilNitrogen-SoilN_Comparison/Test-10/Sim10-SoilN_Bare+Hum+NH4/Paddock/Report: filename=Sim10-SoilNitrogen_Bare+Hum+NH4 Report.out; title=Sim10-SoilNitrogen_Bare+Hum+NH4 Report
          variables -> /SoilNitrogen-SoilN_Comparison/Test-10/Sim10-SoilN_Bare+Hum+NH4/Paddock/Report/Variables
          events ReportingFrequency -> /SoilNitrogen-SoilN_Comparison/Test-10/Sim10-SoilN_Bare+Hum+NH4/Paddock/Report/ReportingFrequency
  folder Test-11 -> /SoilNitrogen-SoilN_Comparison/Test-01
    memo Info
      ++++++++++++++++++  TEST 11 ++++++++++++++++++

         Description:
            - Artificial climate, smooth mild temperate;
            - Using a generic soil, medium texture free draining;
            - Bare soil;
            - Initial mineral N = 60kg as NH4;
            - Initial organic matter = 1000kg fom, 13kg N;
            - No initial surface residues;
            - No additions of residues or mineral N;

         Expected output:
            - All outputs with valid values (numeric), except those related to plants;
            - Most variables should show changes;
               . Changes are due to nitrification and degradation of fom

      +++++++++++++++++++++++++++++++++++++++++++++
    simulation Sim11-SoilN_Bare+FOM+NH4 -> /SoilNitrogen-SoilN_Comparison/Test-01/Sim01-SoilN_BareBare
      PlugIns: same as Test-01.Sim01-SoilN_BareBare.PlugIns
      area Paddock -> /SoilNitrogen-SoilN_Comparison/Test-01/Sim01-SoilN_BareBare/Paddock
        operations OperationsSchedule
        surfaceom SurfaceOrganicMatter
          PoolName = Residue1  # Organic Matter pool name
          type = grass  # Organic Matter type
          mass = 0  # Initial surface residue (kg/ha)
          cnr = 15  # C:N ratio of initial residue
          standing_fraction = 0  # Fraction of residue standing
        Soil MediumSedimentarySoil
          SoilType = Generic medium sedimentary soil  # Soil description
          Site = New Zealand
          Water: same as Test-01.Sim01-SoilN_BareBare.Paddock.MediumSedimentarySoil.Water
          SoilWater: same as Test-02.Sim02-SoilN_Bare+NO3.Paddock.MediumSedimentarySoil.SoilWater
          SoilOrganicMatter: RootCN=30; RootWt=1000; SoilCN=12.5; EnrACoeff=7.4; EnrBCoeff=0.2
            Thickness  OC  FBiom  FInert
            150        0   0.035  0.45
            150        0   0.02   0.525
            300        0   0.015  0.675
            300        0   0.01   0.85
            300        0   0.01   0.95
            300        0   0.01   0.998
          Analysis: same as Test-01.Sim01-SoilN_BareBare.Paddock.MediumSedimentarySoil.Analysis
          Sample Initial nitrogen: NO3Units=kgha; NH4Units=kgha; SWUnits=Volumetric
            Thickness  NO3  NH4
            150        0    10
            150        0    10
            300        0    10
            300        0    10
            300        0    10
            300        0    10
          Sample Initial water: Thickness=[150, 150, 300, 300, 300, 300]; SW=[0.36, 0.37, 0.38, 0.37, 0.36, 0.35]
        outputfile Report -> /SoilNitrogen-SoilN_Comparison/Test-01/Sim01-SoilN_BareBare/Paddock/Report: filename=Sim11-SoilN_Bare+FOM+NH4 Report.out; title=Sim11-SoilN_Bare+FOM+NH4 Report
          variables -> /SoilNitrogen-SoilN_Comparison/Test-01/Sim01-SoilN_BareBare/Paddock/Report/Variables
          events ReportingFrequency -> /SoilNitrogen-SoilN_Comparison/Test-01/Sim01-SoilN_BareBare/Paddock/Report/ReportingFrequency
    simulation Sim11-SoilNitrogen_Bare+FOM+NH4 -> /SoilNitrogen-SoilN_Comparison/Test-11/Sim11-SoilN_Bare+FOM+NH4
      PlugIns: same as Test-01.Sim01-SoilN_BareBare.PlugIns
      area Paddock -> /SoilNitrogen-SoilN_Comparison/Test-11/Sim11-SoilN_Bare+FOM+NH4/Paddock
        outputfile Report -> /SoilNitrogen-SoilN_Comparison/Test-11/Sim11-SoilN_Bare+FOM+NH4/Paddock/Report: filename=Sim11-SoilNitrogen_Bare+FOM+NH4 Report.out; title=Sim11-SoilNitrogen_Bare+FOM+NH4 Report
          variables -> /SoilNitrogen-SoilN_Comparison/Test-11/Sim11-SoilN_Bare+FOM+NH4/Paddock/Report/Variables
          events ReportingFrequency -> /SoilNitrogen-SoilN_Comparison/Test-11/Sim11-SoilN_Bare+FOM+NH4/Paddock/Report/ReportingFrequency
  folder Test-12 -> /SoilNitrogen-SoilN_Comparison/Test-01
    memo Info
      ++++++++++++++++++  TEST 12 ++++++++++++++++++

         Description:
            - Artificial climate, smooth mild temperate;
            - Using a generic soil, medium texture free draining;
            - Bare soil;
            - Initial mineral N = 60kg as NH4;
            - No initial organic matter;
            - Initial surface residues = 1000kg, 27kg N;
            - No additions of residues or mineral N;

         Expected output:
            - All outputs with valid values (numeric), except those related to plants;
            - Most variables should show changes;
               . Changes are due to nitrification and degradation of SurfOM;

      +++++++++++++++++++++++++++++++++++++++++++++
    simulation Sim12-SoilN_Bare+SurfOM+NH4 -> /SoilNitrogen-SoilN_Comparison/Test-01/Sim01-SoilN_BareBare
      PlugIns: same as Test-01.Sim01-SoilN_BareBare.PlugIns
      area Paddock -> /SoilNitrogen-SoilN_Comparison/Test-01/Sim01-SoilN_BareBare/Paddock
        operations OperationsSchedule
        surfaceom SurfaceOrganicMatter
          PoolName = Residue1  # Organic Matter pool name
          type = grass  # Organic Matter type
          mass = 1000  # Initial surface residue (kg/ha)
          cnr = 15  # C:N ratio of initial residue
          standing_fraction = 0  # Fraction of residue standing
        Soil MediumSedimentarySoil: SoilType=Generic medium sedimentary soil; Site=New Zealand; Latitude=0; Longitude=0
          Water: same as Test-01.Sim01-SoilN_BareBare.Paddock.MediumSedimentarySoil.Water
          SoilWater: same as Test-02.Sim02-SoilN_Bare+NO3.Paddock.MediumSedimentarySoil.SoilWater
          SoilOrganicMatter: same as Test-03.Sim03-SoilN_Bare+NH4.Paddock.MediumSedimentarySoil.SoilOrganicMatter
          Analysis: same as Test-01.Sim01-SoilN_BareBare.Paddock.MediumSedimentarySoil.Analysis
          Sample Initial nitrogen: NO3Units=kgha; NH4Units=kgha; SWUnits=Volumetric
            Thickness  NO3  NH4
            150        0    10
            150        0    10
            300        0    10
            300        0    10
            300        0    10
            300        0    10
          Sample Initial water: Thickness=[150, 150, 300, 300, 300, 300]; SW=[0.36, 0.37, 0.38, 0.37, 0.36, 0.35]
        outputfile Report -> /SoilNitrogen-SoilN_Comparison/Test-01/Sim01-SoilN_BareBare/Paddock/Report: filename=Sim12-SoilN_Bare+SurfOM+NH4 Report.out; title=Sim12-SoilN_Bare+SurfOM+NH4 Report
          variables -> /SoilNitrogen-SoilN_Comparison/Test-01/Sim01-SoilN_BareBare/Paddock/Report/Variables
          events ReportingFrequency -> /SoilNitrogen-SoilN_Comparison/Test-01/Sim01-SoilN_BareBare/Paddock/Report/ReportingFrequency
    simulation Sim12-SoilNitrogen_Bare+SurfOM+NH4 -> /SoilNitrogen-SoilN_Comparison/Test-12/Sim12-SoilN_Bare+SurfOM+NH4
      PlugIns: same as Test-01.Sim01-SoilN_BareBare.PlugIns
      area Paddock -> /SoilNitrogen-SoilN_Comparison/Test-12/Sim12-SoilN_Bare+SurfOM+NH4/Paddock
        outputfile Report -> /SoilNitrogen-SoilN_Comparison/Test-12/Sim12-SoilN_Bare+SurfOM+NH4/Paddock/Report: filename=Sim12-SoilNitrogen_Bare+SurfOM+NH4 Report.out; title=Sim12-SoilNitrogen_Bare+SurfOM+NH4 Report
          variables -> /SoilNitrogen-SoilN_Comparison/Test-12/Sim12-SoilN_Bare+SurfOM+NH4/Paddock/Report/Variables
          events ReportingFrequency -> /SoilNitrogen-SoilN_Comparison/Test-12/Sim12-SoilN_Bare+SurfOM+NH4/Paddock/Report/ReportingFrequency
  folder Test-13 -> /SoilNitrogen-SoilN_Comparison/Test-01
    memo Info
      ++++++++++++++++++  TEST 13 ++++++++++++++++++

         Description:
            - Artificial climate, smooth mild temperate;
            - Using a generic soil, medium texture free draining;
            - Bare soil;
            - No initial mineral N;
            - Initial organic matter = about 125 tonnes hum, 10ton N + 1000kg fom, 13kg N;
            - No initial surface residues;
            - No additions of residues or mineral N;

         Expected output:
            - All outputs with valid values (numeric), except those related to plants;
            - Most variables should show changes;
               . Changes are due to convertion of OM-fom;

      +++++++++++++++++++++++++++++++++++++++++++++
    simulation Sim13-SoilN_Bare+Hum+FOM -> /SoilNitrogen-SoilN_Comparison/Test-01/Sim01-SoilN_BareBare
      PlugIns: same as Test-01.Sim01-SoilN_BareBare.PlugIns
      area Paddock -> /SoilNitrogen-SoilN_Comparison/Test-01/Sim01-SoilN_BareBare/Paddock
        operations OperationsSchedule
        surfaceom SurfaceOrganicMatter
          PoolName = Residue1  # Organic Matter pool name
          type = grass  # Organic Matter type
          mass = 0  # Initial surface residue (kg/ha)
          cnr = 15  # C:N ratio of initial residue
          standing_fraction = 0  # Fraction of residue standing
        Soil MediumSedimentarySoil: SoilType=Generic medium sedimentary soil; Site=New Zealand; Latitude=0; Longitude=0
          Water: same as Test-01.Sim01-SoilN_BareBare.Paddock.MediumSedimentarySoil.Water
          SoilWater: same as Test-02.Sim02-SoilN_Bare+NO3.Paddock.MediumSedimentarySoil.SoilWater
          SoilOrganicMatter: RootCN=30; RootWt=1000; SoilCN=12.5; EnrACoeff=7.4; EnrBCoeff=0.2
            Thickness  OC    FBiom  FInert
            150        3     0.035  0.45
            150        1.5   0.02   0.525
            300        0.5   0.015  0.675
            300        0.25  0.01   0.85
            300        0.1   0.01   0.95
            300        0.1   0.01   0.998
          Analysis: same as Test-02.Sim02-SoilN_Bare+NO3.Paddock.MediumSedimentarySoil.Analysis
          Sample Initial nitrogen: NO3Units=kgha
            Thickness  NO3  NH4
            150        0    0
            150        0    0
            300        0    0
            300        0    0
            300        0    0
            300        0    0
          Sample Initial water: Thickness=[150, 150, 300, 300, 300, 300]; SW=[0.36, 0.37, 0.38, 0.37, 0.36, 0.35]
        outputfile Report -> /SoilNitrogen-SoilN_Comparison/Test-01/Sim01-SoilN_BareBare/Paddock/Report: filename=Sim13-SoilN_Bare+Hum+FOM Report.out; title=Sim13-SoilN_Bare+Hum+FOM Report
          variables -> /SoilNitrogen-SoilN_Comparison/Test-01/Sim01-SoilN_BareBare/Paddock/Report/Variables
          events ReportingFrequency -> /SoilNitrogen-SoilN_Comparison/Test-01/Sim01-SoilN_BareBare/Paddock/Report/ReportingFrequency
    simulation Sim13-SoilNitrogen_Bare+Hum+FOM -> /SoilNitrogen-SoilN_Comparison/Test-13/Sim13-SoilN_Bare+Hum+FOM
      PlugIns: same as Test-01.Sim01-SoilN_BareBare.PlugIns
      area Paddock -> /SoilNitrogen-SoilN_Comparison/Test-13/Sim13-SoilN_Bare+Hum+FOM/Paddock
        outputfile Report -> /SoilNitrogen-SoilN_Comparison/Test-13/Sim13-SoilN_Bare+Hum+FOM/Paddock/Report: filename=Sim13-SoilNitrogen_Bare+Hum+FOM Report.out; title=Sim13-SoilNitrogen_Bare+Hum+FOM Report
          variables -> /SoilNitrogen-SoilN_Comparison/Test-13/Sim13-SoilN_Bare+Hum+FOM/Paddock/Report/Variables
          events ReportingFrequency -> /SoilNitrogen-SoilN_Comparison/Test-13/Sim13-SoilN_Bare+Hum+FOM/Paddock/Report/ReportingFrequency
  folder Test-14 -> /SoilNitrogen-SoilN_Comparison/Test-01
    memo Info
      ++++++++++++++++++  TEST 14 ++++++++++++++++++

         Description:
            - Artificial climate, smooth mild temperate;
            - Using a generic soil, medium texture free draining;
            - Bare soil;
            - Initial mineral N = 60kg as NH4;
            - Initial organic matter = about 125 tonnes hum, 10ton N + 1000kg fom, 13kg N;
            - No initial surface residues;
            - No additions of residues or mineral N;

         Expected output:
            - All outputs with valid values (numeric), except those related to plants;
            - Most variables should show changes;
               . Changes on soil OM with some NH4;

      +++++++++++++++++++++++++++++++++++++++++++++
    simulation Sim14-SoilN_Bare+Hum+FOM+NH4 -> /SoilNitrogen-SoilN_Comparison/Test-01/Sim01-SoilN_BareBare
      PlugIns: same as Test-01.Sim01-SoilN_BareBare.PlugIns
      area Paddock -> /SoilNitrogen-SoilN_Comparison/Test-01/Sim01-SoilN_BareBare/Paddock
        operations OperationsSchedule
        surfaceom SurfaceOrganicMatter
          PoolName = Residue1  # Organic Matter pool name
          type = grass  # Organic Matter type
          mass = 0  # Initial surface residue (kg/ha)
          cnr = 15  # C:N ratio of initial residue
          standing_fraction = 0  # Fraction of residue standing
        Soil MediumSedimentarySoil: SoilType=Generic medium sedimentary soil; Site=New Zealand; Latitude=0; Longitude=0
          Water: same as Test-01.Sim01-SoilN_BareBare.Paddock.MediumSedimentarySoil.Water
          SoilWater: same as Test-02.Sim02-SoilN_Bare+NO3.Paddock.MediumSedimentarySoil.SoilWater
          SoilOrganicMatter: RootCN=30; RootWt=1000; SoilCN=12.5; EnrACoeff=7.4; EnrBCoeff=0.2
            Thickness  OC    FBiom  FInert
            150        3     0.035  0.45
            150        1.5   0.02   0.525
            300        0.5   0.015  0.675
            300        0.25  0.01   0.85
            300        0.1   0.01   0.95
            300        0.1   0.01   0.998
          Analysis: same as Test-02.Sim02-SoilN_Bare+NO3.Paddock.MediumSedimentarySoil.Analysis
          Sample Initial nitrogen: NO3Units=kgha; NH4Units=kgha; SWUnits=Volumetric
            Thickness  NO3  NH4
            150        0    10
            150        0    10
            300        0    10
            300        0    10
            300        0    10
            300        0    10
          Sample Initial water: Thickness=[150, 150, 300, 300, 300, 300]; SW=[0.36, 0.37, 0.38, 0.37, 0.36, 0.35]
        outputfile Report -> /SoilNitrogen-SoilN_Comparison/Test-01/Sim01-SoilN_BareBare/Paddock/Report: filename=Sim14-SoilN_Bare+Hum+FOM+NH4 Report.out; title=Sim14-SoilN_Bare+Hum+FOM+NH4 Report
          variables -> /SoilNitrogen-SoilN_Comparison/Test-01/Sim01-SoilN_BareBare/Paddock/Report/Variables
          events ReportingFrequency -> /SoilNitrogen-SoilN_Comparison/Test-01/Sim01-SoilN_BareBare/Paddock/Report/ReportingFrequency
    simulation Sim14-SoilNitrogen_Bare+Hum+FOM+NH4 -> /SoilNitrogen-SoilN_Comparison/Test-14/Sim14-SoilN_Bare+Hum+FOM+NH4
      PlugIns: same as Test-01.Sim01-SoilN_BareBare.PlugIns
      area Paddock -> /SoilNitrogen-SoilN_Comparison/Test-14/Sim14-SoilN_Bare+Hum+FOM+NH4/Paddock
        outputfile Report -> /SoilNitrogen-SoilN_Comparison/Test-14/Sim14-SoilN_Bare+Hum+FOM+NH4/Paddock/Report: filename=Sim14-SoilNitrogen_Bare+Hum+FOM+NH4 Report.out; title=Sim14-SoilNitrogen_Bare+Hum+FOM+NH4 Report
          variables -> /SoilNitrogen-SoilN_Comparison/Test-14/Sim14-SoilN_Bare+Hum+FOM+NH4/Paddock/Report/Variables
          events ReportingFrequency -> /SoilNitrogen-SoilN_Comparison/Test-14/Sim14-SoilN_Bare+Hum+FOM+NH4/Paddock/Report/ReportingFrequency
  folder Test-15 -> /SoilNitrogen-SoilN_Comparison/Test-01
    memo Info
      ++++++++++++++++++  TEST 15 ++++++++++++++++++

         Description:
            - Artificial climate, smooth mild temperate;
            - Using a generic soil, medium texture free draining;
            - Bare soil;
            - Initial mineral N = 60kg as NH4;
            - Initial organic matter = about 125 tonnes hum, 10ton N + 1000kg fom, 13kg N;
            - Initial surface residues = 1000kg, 27kg N;
            - No additions of residues or mineral N;

         Expected output:
            - All outputs with valid values (numeric), except those related to plants;
            - Most variables should show changes;
               . Changes focused on covertion of fresh OM with NH4;

      +++++++++++++++++++++++++++++++++++++++++++++
    simulation Sim15-SoilN_Bare+Hum+FOM+SurfOM+NH4 -> /SoilNitrogen-SoilN_Comparison/Test-01/Sim01-SoilN_BareBare
      PlugIns: same as Test-01.Sim01-SoilN_BareBare.PlugIns
      area Paddock -> /SoilNitrogen-SoilN_Comparison/Test-01/Sim01-SoilN_BareBare/Paddock
        operations OperationsSchedule
        surfaceom SurfaceOrganicMatter
          PoolName = Residue1  # Organic Matter pool name
          type = grass  # Organic Matter type
          mass = 1000  # Initial surface residue (kg/ha)
          cnr = 15  # C:N ratio of initial residue
          standing_fraction = 0  # Fraction of residue standing
        Soil MediumSedimentarySoil
          SoilType = Generic medium sedimentary soil  # Soil description
          Site = New Zealand
          Water: same as Test-01.Sim01-SoilN_BareBare.Paddock.MediumSedimentarySoil.Water
          SoilWater: same as Test-02.Sim02-SoilN_Bare+NO3.Paddock.MediumSedimentarySoil.SoilWater
          SoilOrganicMatter: RootCN=30; RootWt=1000; SoilCN=12.5; EnrACoeff=7.4; EnrBCoeff=0.2
            Thickness  OC    FBiom  FInert
            150        3     0.035  0.45
            150        1.5   0.02   0.525
            300        0.5   0.015  0.675
            300        0.25  0.01   0.85
            300        0.1   0.01   0.95
            300        0.1   0.01   0.998
          Analysis: same as Test-01.Sim01-SoilN_BareBare.Paddock.MediumSedimentarySoil.Analysis
          Sample Initial nitrogen: NO3Units=kgha; NH4Units=kgha; SWUnits=Volumetric
            Thickness  NO3  NH4
            150        0    10
            150        0    10
            300        0    10
            300        0    10
            300        0    10
            300        0    10
          Sample Initial water: Thickness=[150, 150, 300, 300, 300, 300]; SW=[0.36, 0.37, 0.38, 0.37, 0.36, 0.35]
        outputfile Report -> /SoilNitrogen-SoilN_Comparison/Test-01/Sim01-SoilN_BareBare/Paddock/Report: filename=Sim15-SoilN_Bare+Hum+FOM+SurfOM+NH4 Report.out; title=Sim15-SoilN_Bare+Hum+FOM+SurfOM+NH4 Report
          variables -> /SoilNitrogen-SoilN_Comparison/Test-01/Sim01-SoilN_BareBare/Paddock/Report/Variables
          events ReportingFrequency -> /SoilNitrogen-SoilN_Comparison/Test-01/Sim01-SoilN_BareBare/Paddock/Report/ReportingFrequency
    simulation Sim15-SoilNitrogen_Bare+Hum+FOM+SurfOM+NH4 -> /SoilNitrogen-SoilN_Comparison/Test-15/Sim15-SoilN_Bare+Hum+FOM+SurfOM+NH4
      PlugIns: same as Test-01.Sim01-SoilN_BareBare.PlugIns
      area Paddock -> /SoilNitrogen-SoilN_Comparison/Test-15/Sim15-SoilN_Bare+Hum+FOM+SurfOM+NH4/Paddock
        outputfile Report -> /SoilNitrogen-SoilN_Comparison/Test-15/Sim15-SoilN_Bare+Hum+FOM+SurfOM+NH4/Paddock/Report: filename=Sim15-SoilNitrogen_Bare+Hum+FOM+SurfOM+NH4 Report.out; title=Sim15-SoilNitrogen_Bare+Hum+FOM+SurfOM+NH4 Report
          variables -> /SoilNitrogen-SoilN_Comparison/Test-15/Sim15-SoilN_Bare+Hum+FOM+SurfOM+NH4/Paddock/Report/Variables
          events ReportingFrequency -> /SoilNitrogen-SoilN_Comparison/Test-15/Sim15-SoilN_Bare+Hum+FOM+SurfOM+NH4/Paddock/Report/ReportingFrequency
  folder Test-16 -> /SoilNitrogen-SoilN_Comparison/Test-01
    memo Info
      ++++++++++++++++++  TEST 16 ++++++++++++++++++

         Description:
            - Artificial climate, smooth mild temperate;
            - Using a generic soil, medium texture free draining;
            - Bare soil;
            - Initial mineral N = 30kg as NO3 + 30kg as NH4;
            - Initial organic matter = about 125 tonnes hum, 10ton N + 1000kg fom, 13kg N;
            - Initial surface residues = 1000kg, 27kg N;
            - No additions of residues or mineral N;

         Expected output:
            - All outputs with valid values (numeric), except those related to plants;
            - Most variables should show changes;
               . Soil is initialised as a 'real' soil, all parameters have a value;

      +++++++++++++++++++++++++++++++++++++++++++++
    simulation Sim16-SoilN_Bare+Hum+FOM+SurfOM+N -> /SoilNitrogen-SoilN_Comparison/Test-01/Sim01-SoilN_BareBare
      PlugIns: same as Test-01.Sim01-SoilN_BareBare.PlugIns
      area Paddock -> /SoilNitrogen-SoilN_Comparison/Test-01/Sim01-SoilN_BareBare/Paddock
        operations OperationsSchedule
        surfaceom SurfaceOrganicMatter
          PoolName = Residue1  # Organic Matter pool name
          type = grass  # Organic Matter type
          mass = 1000  # Initial surface residue (kg/ha)
          cnr = 15  # C:N ratio of initial residue
          standing_fraction = 0  # Fraction of residue standing
        Soil MediumSedimentarySoil
          SoilType = Generic medium sedimentary soil  # Soil description
          Site = New Zealand
          Water: same as Test-01.Sim01-SoilN_BareBare.Paddock.MediumSedimentarySoil.Water
          SoilWater: same as Test-02.Sim02-SoilN_Bare+NO3.Paddock.MediumSedimentarySoil.SoilWater
          SoilOrganicMatter: RootCN=30; RootWt=1000; SoilCN=12.5; EnrACoeff=7.4; EnrBCoeff=0.2; OCUnits=Total
            Thickness  OC    FBiom  FInert
            150        3     0.035  0.45
            150        1.5   0.02   0.525
            300        0.5   0.015  0.675
            300        0.25  0.01   0.85
            300        0.1   0.01   0.95
            300        0.1   0.01   0.998
          Analysis: same as Test-01.Sim01-SoilN_BareBare.Paddock.MediumSedimentarySoil.Analysis
          Sample Initial nitrogen: NO3Units=kgha; NH4Units=kgha; SWUnits=Volumetric
            Thickness  NO3  NH4
            150        5    5
            150        5    5
            300        5    5
            300        5    5
            300        5    5
            300        5    5
          Sample Initial water: Thickness=[150, 150, 300, 300, 300, 300]; SW=[0.36, 0.37, 0.38, 0.37, 0.36, 0.35]
        outputfile Report -> /SoilNitrogen-SoilN_Comparison/Test-01/Sim01-SoilN_BareBare/Paddock/Report: filename=Sim16-SoilN_Bare+Hum+FOM+SurfOM+N Report.out; title=Sim16-SoilN_Bare+Hum+FOM+SurfOM+N Report
          variables -> /SoilNitrogen-SoilN_Comparison/Test-01/Sim01-SoilN_BareBare/Paddock/Report/Variables
          events ReportingFrequency -> /SoilNitrogen-SoilN_Comparison/Test-01/Sim01-SoilN_BareBare/Paddock/Report/ReportingFrequency
    simulation Sim16-SoilNitrogen_Bare+Hum+FOM+SurfOM+N -> /SoilNitrogen-SoilN_Comparison/Test-16/Sim16-SoilN_Bare+Hum+FOM+SurfOM+N
      PlugIns: same as Test-01.Sim01-SoilN_BareBare.PlugIns
      area Paddock -> /SoilNitrogen-SoilN_Comparison/Test-16/Sim16-SoilN_Bare+Hum+FOM+SurfOM+N/Paddock
        outputfile Report -> /SoilNitrogen-SoilN_Comparison/Test-16/Sim16-SoilN_Bare+Hum+FOM+SurfOM+N/Paddock/Report: filename=Sim16-SoilNitrogen_Bare+Hum+FOM+SurfOM+N Report.out; title=Sim16-SoilNitrogen_Bare+Hum+FOM+SurfOM+N Report
          variables -> /SoilNitrogen-SoilN_Comparison/Test-16/Sim16-SoilN_Bare+Hum+FOM+SurfOM+N/Paddock/Report/Variables
          events ReportingFrequency -> /SoilNitrogen-SoilN_Comparison/Test-16/Sim16-SoilN_Bare+Hum+FOM+SurfOM+N/Paddock/Report/ReportingFrequency
  folder Test-17a -> /SoilNitrogen-SoilN_Comparison/Test-01
    memo Info
      ++++++++++++++++++  TEST 17 ++++++++++++++++++

         Description:
            - Artificial climate, smooth mild temperate;
            - Using a generic soil, medium texture free draining;
            - Bare soil;
            - Initial mineral N = 30kg as NO3 + 30kg as NH4;
            - Initial organic matter = about 125 tonnes hum, 10ton N + 1000kg fom, 13kg N;
            - Initial surface residues = 1000kg, 27kg N;
            - No additions of residues;
            - Apply 100kg urea_N;

         Expected output:
            - All outputs with valid values (numeric), except those related to plants;
            - Most variables should show changes;
               . Soil is initialised as a 'real' soil, all parameters have a value;
               . Also has the addition of mineral N;

      +++++++++++++++++++++++++++++++++++++++++++++
    simulation Sim17a-SoilN_Bare+Hum+FOM+SurfOM+N+Urea -> /SoilNitrogen-SoilN_Comparison/Test-01/Sim01-SoilN_BareBare
      PlugIns: same as Test-01.Sim01-SoilN_BareBare.PlugIns
      area Paddock -> /SoilNitrogen-SoilN_Comparison/Test-01/Sim01-SoilN_BareBare/Paddock
        operations OperationsSchedule
          5-Jan  Fertiliser apply amount=50 (kg/ha), depth=100 (mm), type=urea_n
          5-Jan  Fertiliser apply amount=50 (kg/ha), depth=200 (mm), type=urea_n
        surfaceom SurfaceOrganicMatter
          PoolName = Residue1  # Organic Matter pool name
          type = grass  # Organic Matter type
          mass = 1000  # Initial surface residue (kg/ha)
          cnr = 15  # C:N ratio of initial residue
          standing_fraction = 0  # Fraction of residue standing
        Soil MediumSedimentarySoil
          SoilType = Generic medium sedimentary soil  # Soil description
          Site = New Zealand
          Water: same as Test-01.Sim01-SoilN_BareBare.Paddock.MediumSedimentarySoil.Water
          SoilWater: same as Test-02.Sim02-SoilN_Bare+NO3.Paddock.MediumSedimentarySoil.SoilWater
          SoilOrganicMatter: RootCN=30; RootWt=1000; SoilCN=12.5; EnrACoeff=7.4; EnrBCoeff=0.2
            Thickness  OC    FBiom  FInert
            150        3     0.035  0.45
            150        1.5   0.02   0.525
            300        0.5   0.015  0.675
            300        0.25  0.01   0.85
            300        0.1   0.01   0.95
            300        0.1   0.01   0.998
          Analysis: same as Test-01.Sim01-SoilN_BareBare.Paddock.MediumSedimentarySoil.Analysis
          Sample Initial nitrogen: NO3Units=kgha; NH4Units=kgha; SWUnits=Volumetric; PHUnits=Water
            Thickness  NO3  NH4
            150        5    5
            150        5    5
            300        5    5
            300        5    5
            300        5    5
            300        5    5
          Sample Initial water: Thickness=[150, 150, 300, 300, 300, 300]; SW=[0.36, 0.37, 0.38, 0.37, 0.36, 0.35]
        outputfile Report -> /SoilNitrogen-SoilN_Comparison/Test-01/Sim01-SoilN_BareBare/Paddock/Report: filename=Sim17a-SoilN_Bare+Hum+FOM+SurfOM+N+Urea Report.out; title=Sim17a-SoilN_Bare+Hum+FOM+SurfOM+N+Urea Report
          variables -> /SoilNitrogen-SoilN_Comparison/Test-01/Sim01-SoilN_BareBare/Paddock/Report/Variables
          events ReportingFrequency -> /SoilNitrogen-SoilN_Comparison/Test-01/Sim01-SoilN_BareBare/Paddock/Report/ReportingFrequency
    simulation Sim17a-SoilNitrogen_Bare+Hum+FOM+SurfOM+N+Urea -> /SoilNitrogen-SoilN_Comparison/Test-17a/Sim17a-SoilN_Bare+Hum+FOM+SurfOM+N+Urea
      PlugIns: same as Test-01.Sim01-SoilN_BareBare.PlugIns
      area Paddock -> /SoilNitrogen-SoilN_Comparison/Test-17a/Sim17a-SoilN_Bare+Hum+FOM+SurfOM+N+Urea/Paddock
        outputfile Report -> /SoilNitrogen-SoilN_Comparison/Test-17a/Sim17a-SoilN_Bare+Hum+FOM+SurfOM+N+Urea/Paddock/Report: filename=Sim17a-SoilNitrogen_Bare+Hum+FOM+SurfOM+N+Urea Report.out; title=Sim17a-SoilNitrogen_Bare+Hum+FOM+SurfOM+N+Urea Report
          variables -> /SoilNitrogen-SoilN_Comparison/Test-17a/Sim17a-SoilN_Bare+Hum+FOM+SurfOM+N+Urea/Paddock/Report/Variables
          events ReportingFrequency -> /SoilNitrogen-SoilN_Comparison/Test-17a/Sim17a-SoilN_Bare+Hum+FOM+SurfOM+N+Urea/Paddock/Report/ReportingFrequency
  folder Test-17b -> /SoilNitrogen-SoilN_Comparison/Test-01
    memo Info
      ++++++++++++++++++  TEST 17 ++++++++++++++++++

         Description:
            - Artificial climate, smooth mild temperate;
            - Using a generic soil, medium texture free draining;
            - Bare soil;
            - Initial mineral N = 30kg as NO3 + 30kg as NH4;
            - Initial organic matter = about 125 tonnes hum, 10ton N;
            - Initial surface residues = 1000kg, 27kg N;
            - No additions of residues;
            - Apply 1000kg urea_N;

         Expected output:
            - All outputs with valid values (numeric), except those related to plants;
            - Most variables should show changes;
               . Soil is initialised as a 'real' soil, all parameters have a value;
               . Also has the addition of a large amount of mineral N;

      +++++++++++++++++++++++++++++++++++++++++++++
    simulation Sim17b-SoilN_Bare+Hum+FOM+SurfOM+N+Urea -> /SoilNitrogen-SoilN_Comparison/Test-01/Sim01-SoilN_BareBare
      PlugIns: same as Test-01.Sim01-SoilN_BareBare.PlugIns
      area Paddock -> /SoilNitrogen-SoilN_Comparison/Test-01/Sim01-SoilN_BareBare/Paddock
        operations OperationsSchedule
          15-Jan  Fertiliser apply amount=500 (kg/ha), depth=100 (mm), type=urea_n
          15-Jan  Fertiliser apply amount=500 (kg/ha), depth=200 (mm), type=urea_n
        surfaceom SurfaceOrganicMatter
          PoolName = Residue1  # Organic Matter pool name
          type = grass  # Organic Matter type
          mass = 1000  # Initial surface residue (kg/ha)
          cnr = 15  # C:N ratio of initial residue
          standing_fraction = 0  # Fraction of residue standing
        Soil MediumSedimentarySoil
          SoilType = Generic medium sedimentary soil  # Soil description
          Site = New Zealand
          Water: same as Test-01.Sim01-SoilN_BareBare.Paddock.MediumSedimentarySoil.Water
          SoilWater: same as Test-02.Sim02-SoilN_Bare+NO3.Paddock.MediumSedimentarySoil.SoilWater
          SoilOrganicMatter: RootCN=30; RootWt=1000; SoilCN=12.5; EnrACoeff=7.4; EnrBCoeff=0.2
            Thickness  OC    FBiom  FInert
            150        3     0.035  0.45
            150        1.5   0.02   0.525
            300        0.5   0.015  0.675
            300        0.25  0.01   0.85
            300        0.1   0.01   0.95
            300        0.1   0.01   0.998
          Analysis: same as Test-02.Sim02-SoilN_Bare+NO3.Paddock.MediumSedimentarySoil.Analysis
          Sample Initial nitrogen: NO3Units=kgha; NH4Units=ppm; SWUnits=Volumetric; PHUnits=Water
            Thickness  NO3  NH4
            150        5    5
            150        5    5
            300        5    5
            300        5    5
            300        5    5
            300        5    5
          Sample Initial water: Thickness=[150, 150, 300, 300, 300, 300]; SW=[0.36, 0.37, 0.38, 0.37, 0.36, 0.35]
        outputfile Report -> /SoilNitrogen-SoilN_Comparison/Test-01/Sim01-SoilN_BareBare/Paddock/Report: filename=Sim17b-SoilN_Bare+Hum+FOM+SurfOM+N+Urea Report.out; title=Sim17b-SoilN_Bare+Hum+FOM+SurfOM+N+Urea Report
          variables -> /SoilNitrogen-SoilN_Comparison/Test-01/Sim01-SoilN_BareBare/Paddock/Report/Variables
          events ReportingFrequency -> /SoilNitrogen-SoilN_Comparison/Test-01/Sim01-SoilN_BareBare/Paddock/Report/ReportingFrequency
    simulation Sim17b-SoilNitrogen_Bare+Hum+FOM+SurfOM+N+Urea -> /SoilNitrogen-SoilN_Comparison/Test-17b/Sim17b-SoilN_Bare+Hum+FOM+SurfOM+N+Urea
      PlugIns: same as Test-01.Sim01-SoilN_BareBare.PlugIns
      area Paddock -> /SoilNitrogen-SoilN_Comparison/Test-17b/Sim17b-SoilN_Bare+Hum+FOM+SurfOM+N+Urea/Paddock
        outputfile Report -> /SoilNitrogen-SoilN_Comparison/Test-17b/Sim17b-SoilN_Bare+Hum+FOM+SurfOM+N+Urea/Paddock/Report: filename=Sim17b-SoilNitrogen_Bare+Hum+FOM+SurfOM+N+Urea Report.out; title=Sim17b-SoilNitrogen_Bare+Hum+FOM+SurfOM+N+Urea Report
          variables -> /SoilNitrogen-SoilN_Comparison/Test-17b/Sim17b-SoilN_Bare+Hum+FOM+SurfOM+N+Urea/Paddock/Report/Variables
          events ReportingFrequency -> /SoilNitrogen-SoilN_Comparison/Test-17b/Sim17b-SoilN_Bare+Hum+FOM+SurfOM+N+Urea/Paddock/Report/ReportingFrequency
  folder Test-18 -> /SoilNitrogen-SoilN_Comparison/Test-01
    memo Info
      ++++++++++++++++++  TEST 18 ++++++++++++++++++

         Description:
            - Artificial climate, smooth mild temperate;
            - Using a generic soil, medium texture free draining;
            - Bare soil;
            - Initial mineral N = 30kg as NO3 + 30kg as NH4;
            - No initial organic matter;
            - No initial surface residues;
            - Added 1200kg fom, 24kg N + 2x1000kg residues, 20kg N;
            - No additions of mineral N;

         Expected output:
            - All outputs with valid values (numeric), except those related to plants;
            - Most variables should show changes;
              . Focus on the addition of surface OM, no mineral N;

      +++++++++++++++++++++++++++++++++++++++++++++
    simulation Sim18-SoilN_Bare+N+addOM -> /SoilNitrogen-SoilN_Comparison/Test-01/Sim01-SoilN_BareBare
      PlugIns: same as Test-01.Sim01-SoilN_BareBare.PlugIns
      area Paddock -> /SoilNitrogen-SoilN_Comparison/Test-01/Sim01-SoilN_BareBare/Paddock
        operations OperationsSchedule
          10-Jan  'MediumSedimentarySoil nitrogen' incorpfom type = grass, amount=500 300 200 100 50 50, cnr=20 20 20 20 20 20
          20-Jan  'SurfaceOrganicMatter' add_surfaceom name = Residue2, type = grass, mass = 1000 (kg/ha), cnr = 20, cpr = 0
          10-Feb  'SurfaceOrganicMatter' add_surfaceom name = Residue3, type = grass, mass = 1000 (kg/ha), cnr = 20, cpr = 0
          10-Feb  'SurfaceOrganicMatter' tillage type = 'user_defined', f_incorp = 0.5 (0-1), tillage_depth = 250. (mm)
        surfaceom SurfaceOrganicMatter
          PoolName = Residue1  # Organic Matter pool name
          type = grass  # Organic Matter type
          mass = 0  # Initial surface residue (kg/ha)
          cnr = 15  # C:N ratio of initial residue
          standing_fraction = 0  # Fraction of residue standing
        Soil MediumSedimentarySoil
          SoilType = Generic medium sedimentary soil  # Soil description
          Site = New Zealand
          Water: same as Test-01.Sim01-SoilN_BareBare.Paddock.MediumSedimentarySoil.Water
          SoilWater: same as Test-02.Sim02-SoilN_Bare+NO3.Paddock.MediumSedimentarySoil.SoilWater
          SoilOrganicMatter: RootCN=30; RootWt=0; SoilCN=12.5; EnrACoeff=7.4; EnrBCoeff=0.2
            Thickness  OC  FBiom  FInert
            150        0   0.035  0.45
            150        0   0.02   0.525
            300        0   0.015  0.675
            300        0   0.01   0.85
            300        0   0.01   0.95
            300        0   0.01   0.998
          Analysis: same as Test-02.Sim02-SoilN_Bare+NO3.Paddock.MediumSedimentarySoil.Analysis
          Sample Initial nitrogen: NO3Units=kgha; NH4Units=kgha; SWUnits=Volumetric
            Thickness  NO3  NH4
            150        5    5
            150        5    5
            300        5    5
            300        5    5
            300        5    5
            300        5    5
          Sample Initial water: Thickness=[150, 150, 300, 300, 300, 300]; SW=[0.36, 0.37, 0.38, 0.37, 0.36, 0.35]
        outputfile Report -> /SoilNitrogen-SoilN_Comparison/Test-01/Sim01-SoilN_BareBare/Paddock/Report: filename=Sim18-SoilN_Bare+N+addOM Report.out; title=Sim18-SoilN_Bare+N+addOM Report
          variables -> /SoilNitrogen-SoilN_Comparison/Test-01/Sim01-SoilN_BareBare/Paddock/Report/Variables
          events ReportingFrequency -> /SoilNitrogen-SoilN_Comparison/Test-01/Sim01-SoilN_BareBare/Paddock/Report/ReportingFrequency
    simulation Sim18-SoilNitrogen_Bare+N+addOM -> /SoilNitrogen-SoilN_Comparison/Test-18/Sim18-SoilN_Bare+N+addOM
      PlugIns: same as Test-01.Sim01-SoilN_BareBare.PlugIns
      area Paddock -> /SoilNitrogen-SoilN_Comparison/Test-18/Sim18-SoilN_Bare+N+addOM/Paddock
        outputfile Report -> /SoilNitrogen-SoilN_Comparison/Test-18/Sim18-SoilN_Bare+N+addOM/Paddock/Report: filename=Sim18-SoilNitrogen_Bare+N+addOM Report.out; title=Sim18-SoilNitrogen_Bare+N+addOM Report
          variables -> /SoilNitrogen-SoilN_Comparison/Test-18/Sim18-SoilN_Bare+N+addOM/Paddock/Report/Variables
          events ReportingFrequency -> /SoilNitrogen-SoilN_Comparison/Test-18/Sim18-SoilN_Bare+N+addOM/Paddock/Report/ReportingFrequency
  folder Test-19 -> /SoilNitrogen-SoilN_Comparison/Test-01
    memo Info
      ++++++++++++++++++  TEST 19 ++++++++++++++++++

         Description:
            - Artificial climate, smooth mild temperate;
            - Using a generic soil, medium texture free draining;
            - Bare soil;
            - Initial mineral N = 30kg as NO3 + 30kg as NH4;
            - Initial organic matter = about 125 tonnes hum, 10ton N;
            - No initial surface residues;
            - Added 1200kg fom, 24kg N + 1000kg residues, 20kg N;
            - No additions of mineral N;

         Expected output:
            - All outputs with valid values (numeric), except those related to plants;
            - Most variables should show changes;
              . Focus on the addition of surface OM, soil with mineral N;

      +++++++++++++++++++++++++++++++++++++++++++++
    simulation Sim19-SoilN_Bare+Hum+N+addOM -> /SoilNitrogen-SoilN_Comparison/Test-01/Sim01-SoilN_BareBare
      PlugIns: same as Test-01.Sim01-SoilN_BareBare.PlugIns
      area Paddock -> /SoilNitrogen-SoilN_Comparison/Test-01/Sim01-SoilN_BareBare/Paddock
        operations OperationsSchedule
          10-Jan  'MediumSedimentarySoil nitrogen' incorpfom type = grass, amount=500 300 200 100 50 50, cnr=20 20 20 20 20 20
          20-Jan  'SurfaceOrganicMatter' add_surfaceom name = Residue2, type = grass, mass = 1000 (kg/ha), cnr = 20, cpr = 0
          10-Feb  'SurfaceOrganicMatter' add_surfaceom name = Residue3, type = grass, mass = 1000 (kg/ha), cnr = 20, cpr = 0
            'SurfaceOrganicMatter' tillage type = 'user_defined', f_incorp = 0.5 (0-1), tillage_depth = 250. (mm)
        surfaceom SurfaceOrganicMatter
          PoolName = Residue1  # Organic Matter pool name
          type = grass  # Organic Matter type
          mass = 0  # Initial surface residue (kg/ha)
          cnr = 15  # C:N ratio of initial residue
          standing_fraction = 0  # Fraction of residue standing
        Soil MediumSedimentarySoil
          SoilType = Generic medium sedimentary soil  # Soil description
          Site = New Zealand
          Water: same as Test-01.Sim01-SoilN_BareBare.Paddock.MediumSedimentarySoil.Water
          SoilWater: same as Test-02.Sim02-SoilN_Bare+NO3.Paddock.MediumSedimentarySoil.SoilWater
          SoilOrganicMatter: RootCN=30; RootWt=0; SoilCN=12.5; EnrACoeff=7.4; EnrBCoeff=0.2
            Thickness  OC    FBiom  FInert
            150        3     0.035  0.45
            150        1.5   0.02   0.525
            300        0.5   0.015  0.675
            300        0.25  0.01   0.85
            300        0.1   0.01   0.95
            300        0.1   0.01   0.998
          Analysis: same as Test-02.Sim02-SoilN_Bare+NO3.Paddock.MediumSedimentarySoil.Analysis
          Sample Initial nitrogen: NO3Units=kgha; NH4Units=kgha; SWUnits=Volumetric
            Thickness  NO3  NH4
            150        5    5
            150        5    5
            300        5    5
            300        5    5
            300        5    5
            300        5    5
          Sample Initial water: Thickness=[150, 150, 300, 300, 300, 300]; SW=[0.36, 0.37, 0.38, 0.37, 0.36, 0.35]
        outputfile Report -> /SoilNitrogen-SoilN_Comparison/Test-01/Sim01-SoilN_BareBare/Paddock/Report: filename=Sim19-SoilN_Bare+Hum+N+addOM Report.out; title=Sim19-SoilN_Bare+Hum+N+addOM Report
          variables -> /SoilNitrogen-SoilN_Comparison/Test-01/Sim01-SoilN_BareBare/Paddock/Report/Variables
          events ReportingFrequency -> /SoilNitrogen-SoilN_Comparison/Test-01/Sim01-SoilN_BareBare/Paddock/Report/ReportingFrequency
    simulation Sim19-SoilNitrogen_Bare+Hum+N+addOM -> /SoilNitrogen-SoilN_Comparison/Test-19/Sim19-SoilN_Bare+Hum+N+addOM
      PlugIns: same as Test-01.Sim01-SoilN_BareBare.PlugIns
      area Paddock -> /SoilNitrogen-SoilN_Comparison/Test-19/Sim19-SoilN_Bare+Hum+N+addOM/Paddock
        outputfile Report -> /SoilNitrogen-SoilN_Comparison/Test-19/Sim19-SoilN_Bare+Hum+N+addOM/Paddock/Report: filename=Sim19-SoilNitrogen_Bare+Hum+N+addOM Report.out; title=Sim19-SoilNitrogen_Bare+Hum+N+addOM Report
          variables -> /SoilNitrogen-SoilN_Comparison/Test-19/Sim19-SoilN_Bare+Hum+N+addOM/Paddock/Report/Variables
          events ReportingFrequency -> /SoilNitrogen-SoilN_Comparison/Test-19/Sim19-SoilN_Bare+Hum+N+addOM/Paddock/Report/ReportingFrequency
  folder Test-20 -> /SoilNitrogen-SoilN_Comparison/Test-01
    memo Info
      ++++++++++++++++++  TEST 20 ++++++++++++++++++

         Description:
            - Artificial climate, smooth mild temperate;
            - Using a generic soil, medium texture free draining;
            - Bare soil;
            - Initial mineral N = 30kg as NO3 + 30kg as NH4;
            - Initial organic matter = about 125 tonnes hum, 10ton N;
            - No initial surface residues;
            - Added 2 times 1200kg fom (cn=40 and cn=15)
            - No additions of mineral N;

         Expected output:
            - All outputs with valid values (numeric), except those related to plants;
            - Most variables should show changes;
              . Focus on the addition of FOM

      +++++++++++++++++++++++++++++++++++++++++++++
    simulation Sim20-SoilN_Bare+Hum+N+add2FOM -> /SoilNitrogen-SoilN_Comparison/Test-01/Sim01-SoilN_BareBare
      PlugIns: same as Test-01.Sim01-SoilN_BareBare.PlugIns
      area Paddock -> /SoilNitrogen-SoilN_Comparison/Test-01/Sim01-SoilN_BareBare/Paddock
        operations OperationsSchedule
          5-Jan  'MediumSedimentarySoil nitrogen' incorpfom type = grass, amount=500 300 200 100 50 50, cnr=40 40 40 40 40 40
          10-Feb  'MediumSedimentarySoil nitrogen' incorpfom type = grass, amount=500 300 200 100 50 50, cnr=15 15 15 15 15 15
        surfaceom SurfaceOrganicMatter
          PoolName = Residue1  # Organic Matter pool name
          type = grass  # Organic Matter type
          mass = 0  # Initial surface residue (kg/ha)
          cnr = 15  # C:N ratio of initial residue
          standing_fraction = 0  # Fraction of residue standing
        Soil MediumSedimentarySoil: same as Test-19.Sim19-SoilN_Bare+Hum+N+addOM.Paddock.MediumSedimentarySoil
        outputfile Report -> /SoilNitrogen-SoilN_Comparison/Test-01/Sim01-SoilN_BareBare/Paddock/Report: filename=Sim20-SoilN_Bare+Hum+N+add2FOM Report.out; title=Sim20-SoilN_Bare+Hum+N+add2FOM Report
          variables -> /SoilNitrogen-SoilN_Comparison/Test-01/Sim01-SoilN_BareBare/Paddock/Report/Variables
          events ReportingFrequency -> /SoilNitrogen-SoilN_Comparison/Test-01/Sim01-SoilN_BareBare/Paddock/Report/ReportingFrequency
    simulation Sim20-SoilNitrogen_Bare+Hum+N+add2FOM -> /SoilNitrogen-SoilN_Comparison/Test-20/Sim20-SoilN_Bare+Hum+N+add2FOM
      PlugIns: same as Test-01.Sim01-SoilN_BareBare.PlugIns
      area Paddock -> /SoilNitrogen-SoilN_Comparison/Test-20/Sim20-SoilN_Bare+Hum+N+add2FOM/Paddock
        outputfile Report -> /SoilNitrogen-SoilN_Comparison/Test-20/Sim20-SoilN_Bare+Hum+N+add2FOM/Paddock/Report: filename=Sim20-SoilNitrogen_Bare+Hum+N+add2FOM Report.out; title=Sim20-SoilNitrogen_Bare+Hum+N+add2FOM Report
          variables -> /SoilNitrogen-SoilN_Comparison/Test-20/Sim20-SoilN_Bare+Hum+N+add2FOM/Paddock/Report/Variables
          events ReportingFrequency -> /SoilNitrogen-SoilN_Comparison/Test-20/Sim20-SoilN_Bare+Hum+N+add2FOM/Paddock/Report/ReportingFrequency
  folder Test-21 -> /SoilNitrogen-SoilN_Comparison/Test-01
    memo Info
      ++++++++++++++++++  TEST 21 ++++++++++++++++++

         Description:
            - Artificial climate, smooth mild temperate;
            - Using a generic soil, medium texture free draining;
            - Bare soil;
            - Initial mineral N = 30kg as NO3 + 30kg as NH4;
            - Initial organic matter = about 125 tonnes hum, 10ton N;
            - No initial surface residues;
            - Added 1200kg fom, 24kg N + 1000kg residues, 20kg N;
            - Apply 100kg urea_N;

         Expected output:
            - All outputs with valid values (numeric), except those related to plants;
            - Most variables should show changes;
              . Focus on the addition of mineral N and OM

      +++++++++++++++++++++++++++++++++++++++++++++
    simulation Sim21-SoilN_Bare+Hum+N+addOM+Urea -> /SoilNitrogen-SoilN_Comparison/Test-01/Sim01-SoilN_BareBare
      PlugIns: same as Test-01.Sim01-SoilN_BareBare.PlugIns
      area Paddock -> /SoilNitrogen-SoilN_Comparison/Test-01/Sim01-SoilN_BareBare/Paddock
        operations OperationsSchedule
          10-Jan  'MediumSedimentarySoil nitrogen' incorpfom type = grass, amount=500 300 200 100 50 50, cnr=20 20 20 20 20 20
          15-Jan  Fertiliser apply amount=50 (kg/ha), depth=100 (mm), type=urea_n
          10-Feb  'SurfaceOrganicMatter' add_surfaceom name = Residue2, type = grass, mass = 1000 (kg/ha), cnr = 20, cpr = 0
        surfaceom SurfaceOrganicMatter
          PoolName = Residue1  # Organic Matter pool name
          type = grass  # Organic Matter type
          mass = 0  # Initial surface residue (kg/ha)
          cnr = 15  # C:N ratio of initial residue
          standing_fraction = 0  # Fraction of residue standing
        Soil MediumSedimentarySoil: same as Test-19.Sim19-SoilN_Bare+Hum+N+addOM.Paddock.MediumSedimentarySoil
        outputfile Report -> /SoilNitrogen-SoilN_Comparison/Test-01/Sim01-SoilN_BareBare/Paddock/Report: filename=Sim21-SoilN_Bare+Hum+N+addOM+Urea Report.out; title=Sim21-SoilN_Bare+Hum+N+addOM+Urea Report
          variables -> /SoilNitrogen-SoilN_Comparison/Test-01/Sim01-SoilN_BareBare/Paddock/Report/Variables
          events ReportingFrequency -> /SoilNitrogen-SoilN_Comparison/Test-01/Sim01-SoilN_BareBare/Paddock/Report/ReportingFrequency
    simulation Sim21-SoilNitrogen_Bare+Hum+N+addOM+Urea -> /SoilNitrogen-SoilN_Comparison/Test-21/Sim21-SoilN_Bare+Hum+N+addOM+Urea
      PlugIns: same as Test-01.Sim01-SoilN_BareBare.PlugIns
      area Paddock -> /SoilNitrogen-SoilN_Comparison/Test-21/Sim21-SoilN_Bare+Hum+N+addOM+Urea/Paddock
        outputfile Report -> /SoilNitrogen-SoilN_Comparison/Test-21/Sim21-SoilN_Bare+Hum+N+addOM+Urea/Paddock/Report: filename=Sim21-SoilNitrogen_Bare+Hum+N+addOM+Urea Report.out; title=Sim21-SoilNitrogen_Bare+Hum+N+addOM+Urea Report
          variables -> /SoilNitrogen-SoilN_Comparison/Test-21/Sim21-SoilN_Bare+Hum+N+addOM+Urea/Paddock/Report/Variables
          events ReportingFrequency -> /SoilNitrogen-SoilN_Comparison/Test-21/Sim21-SoilN_Bare+Hum+N+addOM+Urea/Paddock/Report/ReportingFrequency
  folder Test-22 -> /SoilNitrogen-SoilN_Comparison/Test-01
    memo Info
      ++++++++++++++++++  TEST 22 ++++++++++++++++++

         Description:
            - Artificial climate, smooth mild temperate;
            - Using a generic soil, medium texture free draining;
            - Bare soil;
            - Initial mineral N = 30kg as NO3 + 30kg as NH4;
            - Initial organic matter = about 125 tonnes hum, 10ton N + 1000kg fom, 13kg N;
            - Initial surface residues = 1000kg, 27kg N;
            - Added 2 times 1000kg residues (cn=15 and cn=30);
            - No additions of mineral N;

         Expected output:
            - All outputs with valid values (numeric), except those related to plants;
            - Most variables should show changes;
              . Focus on the addition of mineral N and OM

      +++++++++++++++++++++++++++++++++++++++++++++
    simulation Sim22-SoilN_Bare+Hum+FOM+SurfOM+N+addOM -> /SoilNitrogen-SoilN_Comparison/Test-01/Sim01-SoilN_BareBare
      PlugIns: same as Test-01.Sim01-SoilN_BareBare.PlugIns
      area Paddock -> /SoilNitrogen-SoilN_Comparison/Test-01/Sim01-SoilN_BareBare/Paddock
        operations OperationsSchedule
          5-Jan  'SurfaceOrganicMatter' add_surfaceom name = Residue2, type = grass, mass = 500 (kg/ha), cnr = 15, cpr = 0
          10-Feb  'SurfaceOrganicMatter' add_surfaceom name = Residue2, type = grass, mass = 500 (kg/ha), cnr = 30, cpr = 0
        surfaceom SurfaceOrganicMatter
          PoolName = Residue1  # Organic Matter pool name
          type = grass  # Organic Matter type
          mass = 1000  # Initial surface residue (kg/ha)
          cnr = 15  # C:N ratio of initial residue
          standing_fraction = 0  # Fraction of residue standing
        Soil MediumSedimentarySoil
          SoilType = Generic medium sedimentary soil  # Soil description
          Site = New Zealand
          Water: same as Test-01.Sim01-SoilN_BareBare.Paddock.MediumSedimentarySoil.Water
          SoilWater: same as Test-02.Sim02-SoilN_Bare+NO3.Paddock.MediumSedimentarySoil.SoilWater
          SoilOrganicMatter: RootCN=30; RootWt=1000; SoilCN=12.5; EnrACoeff=7.4; EnrBCoeff=0.2
            Thickness  OC    FBiom  FInert
            150        3     0.035  0.45
            150        1.5   0.02   0.525
            300        0.5   0.015  0.675
            300        0.25  0.01   0.85
            300        0.1   0.01   0.95
            300        0.1   0.01   0.998
          Analysis: same as Test-02.Sim02-SoilN_Bare+NO3.Paddock.MediumSedimentarySoil.Analysis
          Sample Initial nitrogen: NO3Units=kgha; NH4Units=kgha; SWUnits=Volumetric
            Thickness  NO3  NH4
            150        5    5
            150        5    5
            300        5    5
            300        5    5
            300        5    5
            300        5    5
          Sample Initial water: Thickness=[150, 150, 300, 300, 300, 300]; SW=[0.36, 0.37, 0.38, 0.37, 0.36, 0.35]
        outputfile Report -> /SoilNitrogen-SoilN_Comparison/Test-01/Sim01-SoilN_BareBare/Paddock/Report: filename=Sim22-SoilN_Bare+Hum+FOM+SurfOM+N+addOM Report.out; title=Sim22-SoilN_Bare+Hum+FOM+SurfOM+N+addOM Report
          variables -> /SoilNitrogen-SoilN_Comparison/Test-01/Sim01-SoilN_BareBare/Paddock/Report/Variables
          events ReportingFrequency -> /SoilNitrogen-SoilN_Comparison/Test-01/Sim01-SoilN_BareBare/Paddock/Report/ReportingFrequency
    simulation Sim22-SoilNitrogen_Bare+Hum+FOM+SurfOM+N+addOM -> /SoilNitrogen-SoilN_Comparison/Test-22/Sim22-SoilN_Bare+Hum+FOM+SurfOM+N+addOM
      area Paddock -> /SoilNitrogen-SoilN_Comparison/Test-22/Sim22-SoilN_Bare+Hum+FOM+SurfOM+N+addOM/Paddock
        outputfile Report -> /SoilNitrogen-SoilN_Comparison/Test-22/Sim22-SoilN_Bare+Hum+FOM+SurfOM+N+addOM/Paddock/Report: filename=Sim22-SoilNitrogen_Bare+Hum+FOM+SurfOM+N+addOM Report.out; title=Sim22-SoilNitrogen_Bare+Hum+FOM+SurfOM+N+addOM Report
          variables -> /SoilNitrogen-SoilN_Comparison/Test-22/Sim22-SoilN_Bare+Hum+FOM+SurfOM+N+addOM/Paddock/Report/Variables
          events ReportingFrequency -> /SoilNitrogen-SoilN_Comparison/Test-22/Sim22-SoilN_Bare+Hum+FOM+SurfOM+N+addOM/Paddock/Report/ReportingFrequency
  folder Test-23 -> /SoilNitrogen-SoilN_Comparison/Test-01
    memo Info
      ++++++++++++++++++  TEST 23 ++++++++++++++++++

         Description:
            - Artificial climate, smooth mild temperate;
            - Using a generic soil, medium texture free draining;
            - Wheat planted;
            - Initial mineral N = 30kg as NO3 + 30kg as NH4;
            - No initial organic matter;
            - No initial surface residues;
            - No additions of residues;
            - Apply 50kg urea_N;

         Expected output:
            - All outputs with valid values (numeric), including plant related;
            - Most variables should show changes (some exception due to diffs between wheat and pasture);
              . Very bad soil, focus on the addition of mineral N

      +++++++++++++++++++++++++++++++++++++++++++++
    simulation Sim23-SoilN_Wheat+N+Urea -> /SoilNitrogen-SoilN_Comparison/Test-01/Sim01-SoilN_BareBare
      PlugIns: same as Test-01.Sim01-SoilN_BareBare.PlugIns
      area Paddock -> /SoilNitrogen-SoilN_Comparison/Test-01/Sim01-SoilN_BareBare/Paddock
        operations OperationsSchedule
          5-Jan  wheat sow cultivar = Wakaniu, plants = 400, sowing_depth = 30 (mm), row_spacing = 150, crop_class = plant
          20-Jan  Fertiliser apply amount=50 (kg/ha), depth=100 (mm), type=urea_n
          30-Mar  Fertiliser apply amount=50 (kg/ha), depth=100 (mm), type=urea_n
        manager Harvesting rule
          # Harvesting criteria
          crop = wheat  # Enter name of crop to harvest when ripe
          on end_of_day:
```
           if ('[crop]' = 'cotton') then
              if ([crop].ozcot_status > 0) then
                  [crop] harvest
              endif
           elseif ([crop].StageName = 'harvest_ripe' or [crop].plant_status = 'dead') then
              [crop]  harvest
              [crop]  end_crop
           endif
```
        surfaceom SurfaceOrganicMatter
          PoolName = Residue1  # Organic Matter pool name
          type = grass  # Organic Matter type
          mass = 0  # Initial surface residue (kg/ha)
          cnr = 15  # C:N ratio of initial residue
          standing_fraction = 0  # Fraction of residue standing
        Soil MediumSedimentarySoil
          SoilType = Generic medium sedimentary soil  # Soil description
          Site = New Zealand
          Water: same as Test-01.Sim01-SoilN_BareBare.Paddock.MediumSedimentarySoil.Water
          SoilWater: same as Test-01.Sim01-SoilN_BareBare.Paddock.MediumSedimentarySoil.SoilWater
          SoilOrganicMatter: RootCN=30; RootWt=0; SoilCN=12.5; EnrACoeff=7.4; EnrBCoeff=0.2; OCUnits=Total
            Thickness  OC  FBiom  FInert
            150        0   0.035  0.45
            150        0   0.02   0.525
            300        0   0.015  0.675
            300        0   0.01   0.85
            300        0   0.01   0.95
            300        0   0.01   0.998
          Analysis: same as Test-01.Sim01-SoilN_BareBare.Paddock.MediumSedimentarySoil.Analysis
          Sample Initial nitrogen: NO3Units=kgha; NH4Units=kgha; SWUnits=Volumetric; OCUnits=Total; PHUnits=Water
            Thickness  NO3  NH4
            150        5    5
            150        5    5
            300        5    5
            300        5    5
            300        5    5
            300        5    5
          Sample Initial water: Thickness=[150, 150, 300, 300, 300, 300]; SW=[0.36, 0.37, 0.38, 0.37, 0.36, 0.35]; NO3Units=ppm; NH4Units=ppm; SWUnits=Volumetric; OCUnits=Total; PHUnits=Water
        wheat
        outputfile Report -> /SoilNitrogen-SoilN_Comparison/Test-01/Sim01-SoilN_BareBare/Paddock/Report: filename=Sim23-SoilN_Wheat+N+Urea Report.out; title=Sim23-SoilN_Wheat+N+Urea Report
          variables -> /SoilNitrogen-SoilN_Comparison/Test-01/Sim01-SoilN_BareBare/Paddock/Report/Variables
          events ReportingFrequency -> /SoilNitrogen-SoilN_Comparison/Test-01/Sim01-SoilN_BareBare/Paddock/Report/ReportingFrequency
    simulation Sim23-SoilNitrogen_Wheat+N+Urea -> /SoilNitrogen-SoilN_Comparison/Test-23/Sim23-SoilN_Wheat+N+Urea
      PlugIns: same as Test-01.Sim01-SoilN_BareBare.PlugIns
      area Paddock -> /SoilNitrogen-SoilN_Comparison/Test-23/Sim23-SoilN_Wheat+N+Urea/Paddock
        outputfile Report -> /SoilNitrogen-SoilN_Comparison/Test-23/Sim23-SoilN_Wheat+N+Urea/Paddock/Report: filename=Sim23-SoilNitrogen_Wheat+N+Urea Report.out; title=Sim23-SoilNitrogen_Wheat+N+Urea Report
          variables -> /SoilNitrogen-SoilN_Comparison/Test-23/Sim23-SoilN_Wheat+N+Urea/Paddock/Report/Variables
          events ReportingFrequency -> /SoilNitrogen-SoilN_Comparison/Test-23/Sim23-SoilN_Wheat+N+Urea/Paddock/Report/ReportingFrequency
  folder Test-24 -> /SoilNitrogen-SoilN_Comparison/Test-01
    memo Info
      ++++++++++++++++++  TEST 24 ++++++++++++++++++

         Description:
            - Artificial climate, smooth mild temperate;
            - Using a generic soil, medium texture free draining;
            - Wheat planted;
            - Initial mineral N = 30kg as NO3 + 30kg as NH4;
            - Initial organic matter = about 125 tonnes hum, 10ton N;
            - No initial surface residues;
            - No additions of residues (besides crop senescence);
            - Apply 50kg urea_N;

         Expected output:
            - All outputs with valid values (numeric), including plant related;
            - Most variables should show changes (some exception due to diffs between wheat and pasture);
              . Soil with some humus, focus on the addition of mineral N

      +++++++++++++++++++++++++++++++++++++++++++++
    simulation Sim24-SoilN_Wheat+Hum+N+Urea -> /SoilNitrogen-SoilN_Comparison/Test-01/Sim01-SoilN_BareBare
      PlugIns: same as Test-01.Sim01-SoilN_BareBare.PlugIns
      area Paddock -> /SoilNitrogen-SoilN_Comparison/Test-01/Sim01-SoilN_BareBare/Paddock
        operations OperationsSchedule: same as Test-23.Sim23-SoilN_Wheat+N+Urea.Paddock.OperationsSchedule
        surfaceom SurfaceOrganicMatter
          PoolName = Residue1  # Organic Matter pool name
          type = grass  # Organic Matter type
          mass = 0  # Initial surface residue (kg/ha)
          cnr = 15  # C:N ratio of initial residue
          standing_fraction = 0  # Fraction of residue standing
        Soil MediumSedimentarySoil
          SoilType = Generic medium sedimentary soil  # Soil description
          Site = New Zealand
          Water: same as Test-01.Sim01-SoilN_BareBare.Paddock.MediumSedimentarySoil.Water
          SoilWater: same as Test-02.Sim02-SoilN_Bare+NO3.Paddock.MediumSedimentarySoil.SoilWater
          SoilOrganicMatter: same as Test-10.Sim10-SoilN_Bare+Hum+NH4.Paddock.MediumSedimentarySoil.SoilOrganicMatter
          Analysis: same as Test-02.Sim02-SoilN_Bare+NO3.Paddock.MediumSedimentarySoil.Analysis
          Sample Initial nitrogen: NO3Units=kgha; NH4Units=kgha
            Thickness  NO3  NH4
            150        5    5
            150        5    5
            300        5    5
            300        5    5
            300        5    5
            300        5    5
          Sample Initial water: Thickness=[150, 150, 300, 300, 300, 300]; SW=[0.36, 0.37, 0.38, 0.37, 0.36, 0.35]
        wheat
        outputfile Report -> /SoilNitrogen-SoilN_Comparison/Test-01/Sim01-SoilN_BareBare/Paddock/Report: filename=Sim24-SoilN_Wheat+Hum+N+Urea Report.out; title=Sim24-SoilN_Wheat+Hum+N+Urea Report
          variables -> /SoilNitrogen-SoilN_Comparison/Test-01/Sim01-SoilN_BareBare/Paddock/Report/Variables
          events ReportingFrequency -> /SoilNitrogen-SoilN_Comparison/Test-01/Sim01-SoilN_BareBare/Paddock/Report/ReportingFrequency
    simulation Sim24-SoilNitrogen_Wheat+Hum+N+Urea -> /SoilNitrogen-SoilN_Comparison/Test-24/Sim24-SoilN_Wheat+Hum+N+Urea
      PlugIns: same as Test-01.Sim01-SoilN_BareBare.PlugIns
      area Paddock -> /SoilNitrogen-SoilN_Comparison/Test-24/Sim24-SoilN_Wheat+Hum+N+Urea/Paddock
        outputfile Report -> /SoilNitrogen-SoilN_Comparison/Test-24/Sim24-SoilN_Wheat+Hum+N+Urea/Paddock/Report: filename=Sim24-SoilNitrogen_Wheat+Hum+N+Urea Report.out; title=Sim24-SoilNitrogen_Wheat+Hum+N+Urea Report
          variables -> /SoilNitrogen-SoilN_Comparison/Test-24/Sim24-SoilN_Wheat+Hum+N+Urea/Paddock/Report/Variables
          events ReportingFrequency -> /SoilNitrogen-SoilN_Comparison/Test-24/Sim24-SoilN_Wheat+Hum+N+Urea/Paddock/Report/ReportingFrequency
  folder Test-25 -> /SoilNitrogen-SoilN_Comparison/Test-01
    memo Info
      ++++++++++++++++++  TEST 25 ++++++++++++++++++

         Description:
            - Artificial climate, smooth mild temperate;
            - Using a generic soil, medium texture free draining;
            - Wheat planted;
            - Initial mineral N = 30kg as NO3 + 30kg as NH4;
            - Initial organic matter = about 125 tonnes hum, 10ton N + 1000kg fom, 13kg N;
            - Initial surface residues = 1000kg, 27kg N;
            - No additions of residues (besides crop senescence);
            - Apply 50kg urea_N;

         Expected output:
            - All outputs with valid values (numeric), including plant related;
            - Most variables should show changes (some exception due to diffs between wheat and pasture);
              . Soil complete, focus on the addition of mineral N

      +++++++++++++++++++++++++++++++++++++++++++++
    simulation Sim25-SoilN_Wheat+Hum+FOM+SurfOM+N+Urea -> /SoilNitrogen-SoilN_Comparison/Test-01/Sim01-SoilN_BareBare
      PlugIns: same as Test-01.Sim01-SoilN_BareBare.PlugIns
      area Paddock -> /SoilNitrogen-SoilN_Comparison/Test-01/Sim01-SoilN_BareBare/Paddock
        operations OperationsSchedule: same as Test-23.Sim23-SoilN_Wheat+N+Urea.Paddock.OperationsSchedule
        surfaceom SurfaceOrganicMatter
          PoolName = Residue1  # Organic Matter pool name
          type = grass  # Organic Matter type
          mass = 1000  # Initial surface residue (kg/ha)
          cnr = 15  # C:N ratio of initial residue
          standing_fraction = 0  # Fraction of residue standing
        Soil MediumSedimentarySoil
          SoilType = Generic medium sedimentary soil  # Soil description
          Site = New Zealand
          Water: same as Test-01.Sim01-SoilN_BareBare.Paddock.MediumSedimentarySoil.Water
          SoilWater: same as Test-02.Sim02-SoilN_Bare+NO3.Paddock.MediumSedimentarySoil.SoilWater
          SoilOrganicMatter
            Thickness  OC    FBiom  FInert
            150        3     0.035  0.45
            150        1.5   0.02   0.525
            300        0.5   0.015  0.675
            300        0.25  0.01   0.85
            300        0.1   0.01   0.95
            300        0.1   0.01   0.998
            RootCN = 30
            RootWt = 1000
            SoilCN = 12.5
            EnrACoeff = 7.4
            EnrBCoeff = 0.2
          Analysis: same as Test-02.Sim02-SoilN_Bare+NO3.Paddock.MediumSedimentarySoil.Analysis
          Sample Initial nitrogen: NO3Units=kgha; NH4Units=kgha
            Thickness  NO3  NH4
            150        5    5
            150        5    5
            300        5    5
            300        5    5
            300        5    5
            300        5    5
          Sample Initial water: Thickness=[150, 150, 300, 300, 300, 300]; SW=[0.36, 0.37, 0.38, 0.37, 0.36, 0.35]
        wheat
        outputfile Report -> /SoilNitrogen-SoilN_Comparison/Test-01/Sim01-SoilN_BareBare/Paddock/Report: filename=Sim25-SoilN_Wheat+Hum+FOM+SurfOM+N+Urea Report.out; title=Sim25-SoilN_Wheat+Hum+FOM+SurfOM+N+Urea Report
          variables -> /SoilNitrogen-SoilN_Comparison/Test-01/Sim01-SoilN_BareBare/Paddock/Report/Variables
          events ReportingFrequency -> /SoilNitrogen-SoilN_Comparison/Test-01/Sim01-SoilN_BareBare/Paddock/Report/ReportingFrequency
    simulation Sim25-SoilNitrogen_Wheat+Hum+FOM+SurfOM+N+Urea -> /SoilNitrogen-SoilN_Comparison/Test-25/Sim25-SoilN_Wheat+Hum+FOM+SurfOM+N+Urea
      PlugIns: same as Test-01.Sim01-SoilN_BareBare.PlugIns
      area Paddock -> /SoilNitrogen-SoilN_Comparison/Test-25/Sim25-SoilN_Wheat+Hum+FOM+SurfOM+N+Urea/Paddock
        outputfile Report -> /SoilNitrogen-SoilN_Comparison/Test-25/Sim25-SoilN_Wheat+Hum+FOM+SurfOM+N+Urea/Paddock/Report: filename=Sim25-SoilNitrogen_Wheat+Hum+FOM+SurfOM+N+Urea Report.out; title=Sim25-SoilNitrogen_Wheat+Hum+FOM+SurfOM+N+Urea Report
          variables -> /SoilNitrogen-SoilN_Comparison/Test-25/Sim25-SoilN_Wheat+Hum+FOM+SurfOM+N+Urea/Paddock/Report/Variables
          events ReportingFrequency -> /SoilNitrogen-SoilN_Comparison/Test-25/Sim25-SoilN_Wheat+Hum+FOM+SurfOM+N+Urea/Paddock/Report/ReportingFrequency
  folder Test-26 -> /SoilNitrogen-SoilN_Comparison/Test-01
    memo Info
      ++++++++++++++++++  TEST 26 ++++++++++++++++++

         Description:
            - Artificial climate, smooth mild temperate;
            - Using a generic soil, medium texture free draining;
            - Wheat planted;
            - Initial mineral N = 30kg as NO3 + 30kg as NH4;
            - Initial organic matter = about 125 tonnes hum, 10ton N + 1000kg fom, 13kg N;
            - Initial surface residues = 1000kg, 27kg N;
            - Added 2 times 1000kg residues (cn=10), besides crop senescence;
            - No additions of mineral N;

         Expected output:
            - All outputs with valid values (numeric), including plant related;
            - Most variables should show changes (some exception due to diffs between wheat and pasture);
              . Soil complete, focus on the addition of organic N

      +++++++++++++++++++++++++++++++++++++++++++++
    simulation Sim26-SoilN_Wheat+Hum+FOM+SurfOM+N+addOM -> /SoilNitrogen-SoilN_Comparison/Test-01/Sim01-SoilN_BareBare
      PlugIns: same as Test-01.Sim01-SoilN_BareBare.PlugIns
      area Paddock -> /SoilNitrogen-SoilN_Comparison/Test-01/Sim01-SoilN_BareBare/Paddock
        operations OperationsSchedule
          5-Jan  wheat sow cultivar = Wakaniu, plants = 400, sowing_depth = 30 (mm), row_spacing = 150, crop_class = plant
          20-Jan  'SurfaceOrganicMatter' add_surfaceom name = Residue2, type = grass, mass = 1000 (kg/ha), cnr = 10, cpr = 0
          30-Mar  'SurfaceOrganicMatter' add_surfaceom name = Residue2, type = grass, mass = 1000 (kg/ha), cnr = 10, cpr = 0
        surfaceom SurfaceOrganicMatter
          PoolName = Residue1  # Organic Matter pool name
          type = grass  # Organic Matter type
          mass = 1000  # Initial surface residue (kg/ha)
          cnr = 15  # C:N ratio of initial residue
          standing_fraction = 0  # Fraction of residue standing
        Soil MediumSedimentarySoil: same as Test-25.Sim25-SoilN_Wheat+Hum+FOM+SurfOM+N+Urea.Paddock.MediumSedimentarySoil
        wheat
        outputfile Report -> /SoilNitrogen-SoilN_Comparison/Test-01/Sim01-SoilN_BareBare/Paddock/Report: filename=Sim26-SoilN_Wheat+Hum+FOM+SurfOM+N+addOM Report.out; title=Sim26-SoilN_Wheat+Hum+FOM+SurfOM+N+addOM Report
          variables -> /SoilNitrogen-SoilN_Comparison/Test-01/Sim01-SoilN_BareBare/Paddock/Report/Variables
          events ReportingFrequency -> /SoilNitrogen-SoilN_Comparison/Test-01/Sim01-SoilN_BareBare/Paddock/Report/ReportingFrequency
    simulation Sim26-SoilNitrogen_Wheat+Hum+FOM+SurfOM+N+addOM -> /SoilNitrogen-SoilN_Comparison/Test-26/Sim26-SoilN_Wheat+Hum+FOM+SurfOM+N+addOM
      PlugIns: same as Test-01.Sim01-SoilN_BareBare.PlugIns
      area Paddock -> /SoilNitrogen-SoilN_Comparison/Test-26/Sim26-SoilN_Wheat+Hum+FOM+SurfOM+N+addOM/Paddock
        outputfile Report -> /SoilNitrogen-SoilN_Comparison/Test-26/Sim26-SoilN_Wheat+Hum+FOM+SurfOM+N+addOM/Paddock/Report: filename=Sim26-SoilNitrogen_Wheat+Hum+FOM+SurfOM+N+addOM Report.out; title=Sim26-SoilNitrogen_Wheat+Hum+FOM+SurfOM+N+addOM Report
          variables -> /SoilNitrogen-SoilN_Comparison/Test-26/Sim26-SoilN_Wheat+Hum+FOM+SurfOM+N+addOM/Paddock/Report/Variables
          events ReportingFrequency -> /SoilNitrogen-SoilN_Comparison/Test-26/Sim26-SoilN_Wheat+Hum+FOM+SurfOM+N+addOM/Paddock/Report/ReportingFrequency
  folder Test-27 -> /SoilNitrogen-SoilN_Comparison/Test-01
    memo Info
      ++++++++++++++++++  TEST 23 ++++++++++++++++++

         Description:
            - Artificial climate, smooth mild temperate;
            - Using a generic soil, medium texture free draining;
            - Pasture (ryegrass/white clover) under cut rotation;
            - Initial mineral N = 30kg as NO3 + 30kg as NH4;
            - No initial organic matter;
            - No initial surface residues;
            - No additions of residues;
            - Apply 50kg urea_N;

         Expected output:
            - All outputs with valid values (numeric), including plant related;
            - Most variables should show changes (some exception due to diffs between wheat and pasture);
              . Very bad soil, focus on the addition of mineral N

      +++++++++++++++++++++++++++++++++++++++++++++
    simulation Sim27-SoilN_Pasture+N+Urea -> /SoilNitrogen-SoilN_Comparison/Test-01/Sim01-SoilN_BareBare
      PlugIns: same as Test-01.Sim01-SoilN_BareBare.PlugIns
      area Paddock -> /SoilNitrogen-SoilN_Comparison/Test-01/Sim01-SoilN_BareBare/Paddock
        manager Cut or graze AgPasture
          # Cut or graze rotation
          CutPasture_start_date = 01/01/1900  # Enter date to start rotation (dd/mm/yyyy)
          CutPasture_end_date = 31/12/2100  # Enter date to end rotation (dd/mm/yyyy)
          AgPasture_type = AgPasture  # Enter pasture type
          rotation_type = Fixed intervals  # Enter the rotation type
          cut_interval = 21  # Enter the interval between cuts/grazings (days)
          upper_threshold = 2000  # Enter the sward DM to trigger cut (kg/ha)
          lower_threshold = 1500  # Enter the residual DM after cut (kg/ha)
          # Management of cut/grazed material
          treatment_type = Return as residue  # Enter the treatment type for the cut/grazed material
          remove_dm_frac = 0.98  # Enter fraction of DM that is removed from field (0-1)
          remove_n_frac = 0.98  # Enter fraction of N that is removed from field (0-1)
          dung_fraction = 0.0  # Enter proportion of N returned in dung (0-1)
          on init:
```
! -->   Last updated in: 11/July/2011  ..........
! . Author: Rogerio Cichota

days_after_cut = [cut_interval] - 1
Do_Cut = 'FALSE'
Has_Cut = 'FALSE'
harvested_dm =0
harvested_n = 0
removed_dm = 0.0
removed_n = 0.0
return_dm = 0.0
return_n = 0.0
GrowthRateCalc = 0
n_conc_total = 0
```
          on start_of_day:
```
if today >= date('[CutPasture_start_date]') and today <= date('[CutPasture_end_date]') then

   preharvest_dm = [AgPasture_type].StemWt + [AgPasture_type].LeafWt
   preharvest_n = [AgPasture_type].StemN + [AgPasture_type].LeafN
   harvested_dm = 0.0
   harvested_n = 0.0
   removed_dm = 0.0
   removed_n = 0.0
   return_dm = 0.0
   return_n = 0.0
   GrowthRateCalc = 0.0
   n_conc_removed = 0.0
   days_after_cut = days_after_cut + 1
   Has_Cut = 'FALSE'

   if '[rotation_type]' = 'Fixed intervals' then
      if days_after_cut = [cut_interval] then
         Do_Cut = 'TRUE'
      else
         Do_Cut = 'FALSE'
      endif
   elseif '[rotation_type]' = 'Target mass' then
      if preharvest_dm >= [upper_threshold] then
         Do_Cut = 'TRUE'
      else
         Do_Cut = 'FALSE'
      endif
   endif

endif   ! of today

If Do_Cut = 'TRUE' then
   
!- Cut or graze ---------------------------------------------------------------------------------------

   if preharvest_dm > [lower_threshold] then
      [AgPasture_type] graze type = 'residue', amount = [lower_threshold]
      Has_Cut = 'TRUE'
      harvested_dm = [AgPasture_type].HarvestWt
      harvested_n = [AgPasture_type].HarvestN
      GrowthRateCalc = harvested_dm/days_after_cut
      if harvested_dm > 0 then
         n_conc_removed = harvested_n*100/harvested_dm
      endif
      days_after_cut = 0

!- Residue management -------------------------------------------------------------------------
      removed_dm =  harvested_dm* [remove_dm_frac]
      removed_n = harvested_n* [remove_n_frac]
      return_dm = harvested_dm - removed_dm 
      return_n = harvested_n - removed_n 

      if '[treatment_type]' = 'Return as residue' and [remove_dm_frac] < 1 then
         'SurfaceOrganicMatter' add_surfaceom name = grass, type = grass, mass =  return_dm (kg/ha), n = return_n (kg/ha), cpr = 0
      elseif '[treatment_type]' = 'Return as dung & urine' then
         ! It is advised that dung and urine return should be done using other manager, 'Urine_patch' or 'Apply or return N and water'
         N_on_dung = return_n * [dung_fraction]
         N_on_urine = return_n - N_on_dung
         'SurfaceOrganicMatter' add_surfaceom name = dung, type = RuminantDung_PastureFed, mass =  return_dm (kg/ha), n = N_on_dung (kg/ha), cpr = 0
         if N_on_urine > 0 then
            fertiliser apply amount = N_on_urine (kg/ha), depth = 10 (mm), type = urea_n ()
         endif
      endif
   endif

endif  ! of Do_Cut
```
        operations OperationsSchedule
          20-Jan  Fertiliser apply amount=50 (kg/ha), depth=100 (mm), type=urea_n
          30-Mar  Fertiliser apply amount=50 (kg/ha), depth=100 (mm), type=urea_n
        micromet
          soilalbedo = 0.23
          a_interception = 0
          b_interception = 0
          c_interception = 0
          d_interception = 0
        surfaceom SurfaceOrganicMatter
          PoolName = Residue1  # Organic Matter pool name
          type = grass  # Organic Matter type
          mass = 0  # Initial surface residue (kg/ha)
          cnr = 15  # C:N ratio of initial residue
          standing_fraction = 0  # Fraction of residue standing
        Soil MediumSedimentarySoil: SoilType=Generic medium sedimentary soil; Site=New Zealand; Latitude=0; Longitude=0
          Water: same as Test-01.Sim01-SoilN_BareBare.Paddock.MediumSedimentarySoil.Water
          SoilWater: same as Test-01.Sim01-SoilN_BareBare.Paddock.MediumSedimentarySoil.SoilWater
          SoilOrganicMatter: RootCN=30; RootWt=0; SoilCN=12.5; EnrACoeff=7.4; EnrBCoeff=0.2; OCUnits=Total
            Thickness  OC  FBiom  FInert
            150        0   0.035  0.45
            150        0   0.02   0.525
            300        0   0.015  0.675
            300        0   0.01   0.85
            300        0   0.01   0.95
            300        0   0.01   0.998
          Analysis: same as Test-01.Sim01-SoilN_BareBare.Paddock.MediumSedimentarySoil.Analysis
          Sample Initial nitrogen: NO3Units=kgha; NH4Units=kgha; SWUnits=Volumetric; OCUnits=Total; PHUnits=Water
            Thickness  NO3  NH4
            150        5    5
            150        5    5
            300        5    5
            300        5    5
            300        5    5
            300        5    5
          Sample Initial water: Thickness=[150, 150, 300, 300, 300, 300]; SW=[0.36, 0.37, 0.38, 0.37, 0.36, 0.35]; NO3Units=ppm; NH4Units=ppm; SWUnits=Volumetric; OCUnits=Total; PHUnits=Water
        AgPasture
          Nspecies = 2  # Number of species
          thisCropName = AgPasture  # Crop name shown as on the simulation tree
          cropName = ryegrass whiteclover  # Species names
          dmtotal = 1500      500  # Initial shoot dry matter (kg/ha)
          dmlitter = 300        100  # Initial litter dry matter (kg/ha)
          dmgreenmin = 400        100  # Minimum green dry matter (kg/ha)
          rootDepth = 750        350  # Root depth (mm)
          rlvp = 1.0         1.0  # Root distribution parameter ([0-1] relative to Root depth)
          WaterUptakeSource = calc  # Water uptake done by AgPasture (calc) or by apsim?
        outputfile Report -> /SoilNitrogen-SoilN_Comparison/Test-01/Sim01-SoilN_BareBare/Paddock/Report: filename=Sim27-SoilN_Pasture+N+Urea Report.out; title=Sim27-SoilN_Pasture+N+Urea Report
          variables -> /SoilNitrogen-SoilN_Comparison/Test-01/Sim01-SoilN_BareBare/Paddock/Report/Variables
          events ReportingFrequency -> /SoilNitrogen-SoilN_Comparison/Test-01/Sim01-SoilN_BareBare/Paddock/Report/ReportingFrequency
    simulation Sim27-SoilNitrogen_Pasture+N+Urea -> /SoilNitrogen-SoilN_Comparison/Test-27/Sim27-SoilN_Pasture+N+Urea
      PlugIns: same as Test-01.Sim01-SoilN_BareBare.PlugIns
      area Paddock -> /SoilNitrogen-SoilN_Comparison/Test-27/Sim27-SoilN_Pasture+N+Urea/Paddock
        outputfile Report -> /SoilNitrogen-SoilN_Comparison/Test-27/Sim27-SoilN_Pasture+N+Urea/Paddock/Report: filename=Sim27-SoilNitrogen_Pasture+N+Urea Report.out; title=Sim27-SoilNitrogen_Pasture+N+Urea Report
          variables -> /SoilNitrogen-SoilN_Comparison/Test-27/Sim27-SoilN_Pasture+N+Urea/Paddock/Report/Variables
          events ReportingFrequency -> /SoilNitrogen-SoilN_Comparison/Test-27/Sim27-SoilN_Pasture+N+Urea/Paddock/Report/ReportingFrequency
  folder Test-28 -> /SoilNitrogen-SoilN_Comparison/Test-01
    memo Info
      ++++++++++++++++++  TEST 24 ++++++++++++++++++

         Description:
            - Artificial climate, smooth mild temperate;
            - Using a generic soil, medium texture free draining;
            - Pasture (ryegrass/white clover) under cut rotation;
            - Initial mineral N = 30kg as NO3 + 30kg as NH4;
            - Initial organic matter = about 125 tonnes hum, 10ton N;
            - No initial surface residues;
            - No additions of residues (besides crop senescence);
            - Apply 50kg urea_N;

         Expected output:
            - All outputs with valid values (numeric), including plant related;
            - Most variables should show changes (some exception due to diffs between wheat and pasture);
              . Soil with some humus, focus on the addition of mineral N

      +++++++++++++++++++++++++++++++++++++++++++++
    simulation Sim28-SoilN_Pasture+Hum+N+Urea -> /SoilNitrogen-SoilN_Comparison/Test-01/Sim01-SoilN_BareBare
      PlugIns: same as Test-01.Sim01-SoilN_BareBare.PlugIns
      area Paddock -> /SoilNitrogen-SoilN_Comparison/Test-01/Sim01-SoilN_BareBare/Paddock
        operations OperationsSchedule
          20-Jan  Fertiliser apply amount=50 (kg/ha), depth=100 (mm), type=urea_n
          30-Mar  Fertiliser apply amount=50 (kg/ha), depth=100 (mm), type=urea_n
        surfaceom SurfaceOrganicMatter
          PoolName = Residue1  # Organic Matter pool name
          type = grass  # Organic Matter type
          mass = 0  # Initial surface residue (kg/ha)
          cnr = 15  # C:N ratio of initial residue
          standing_fraction = 0  # Fraction of residue standing
        Soil MediumSedimentarySoil: SoilType=Generic medium sedimentary soil; Site=New Zealand; Latitude=0; Longitude=0
          Water: same as Test-01.Sim01-SoilN_BareBare.Paddock.MediumSedimentarySoil.Water
          SoilWater: same as Test-01.Sim01-SoilN_BareBare.Paddock.MediumSedimentarySoil.SoilWater
          SoilOrganicMatter: RootCN=30; RootWt=0; SoilCN=12.5; EnrACoeff=7.4; EnrBCoeff=0.2; OCUnits=Total
            Thickness  OC    FBiom  FInert
            150        3     0.035  0.45
            150        1.5   0.02   0.525
            300        0.5   0.015  0.675
            300        0.25  0.01   0.85
            300        0.1   0.01   0.95
            300        0.1   0.01   0.998
          Analysis: same as Test-02.Sim02-SoilN_Bare+NO3.Paddock.MediumSedimentarySoil.Analysis
          Sample Initial nitrogen: NO3Units=kgha; NH4Units=kgha; SWUnits=Volumetric; OCUnits=Total; PHUnits=Water
            Thickness  NO3  NH4
            150        5    5
            150        5    5
            300        5    5
            300        5    5
            300        5    5
            300        5    5
          Sample Initial water: Thickness=[150, 150, 300, 300, 300, 300]; SW=[0.36, 0.37, 0.38, 0.37, 0.36, 0.35]
        AgPasture: same as Test-27.Sim27-SoilN_Pasture+N+Urea.Paddock.AgPasture
        outputfile Report -> /SoilNitrogen-SoilN_Comparison/Test-01/Sim01-SoilN_BareBare/Paddock/Report: filename=Sim28-SoilN_Pasture+Hum+N+Urea Report.out; title=Sim28-SoilN_Pasture+Hum+N+Urea Report
          variables -> /SoilNitrogen-SoilN_Comparison/Test-01/Sim01-SoilN_BareBare/Paddock/Report/Variables
          events ReportingFrequency -> /SoilNitrogen-SoilN_Comparison/Test-01/Sim01-SoilN_BareBare/Paddock/Report/ReportingFrequency
    simulation Sim28-SoilNitrogen_Pasture+Hum+N+Urea -> /SoilNitrogen-SoilN_Comparison/Test-28/Sim28-SoilN_Pasture+Hum+N+Urea
      PlugIns: same as Test-01.Sim01-SoilN_BareBare.PlugIns
      area Paddock -> /SoilNitrogen-SoilN_Comparison/Test-28/Sim28-SoilN_Pasture+Hum+N+Urea/Paddock
        outputfile Report -> /SoilNitrogen-SoilN_Comparison/Test-28/Sim28-SoilN_Pasture+Hum+N+Urea/Paddock/Report: filename=Sim28-SoilNitrogen_Pasture+Hum+N+Urea Report.out; title=Sim28-SoilNitrogen_Pasture+Hum+N+Urea Report
          variables -> /SoilNitrogen-SoilN_Comparison/Test-28/Sim28-SoilN_Pasture+Hum+N+Urea/Paddock/Report/Variables
          events ReportingFrequency -> /SoilNitrogen-SoilN_Comparison/Test-28/Sim28-SoilN_Pasture+Hum+N+Urea/Paddock/Report/ReportingFrequency
  folder Test-29 -> /SoilNitrogen-SoilN_Comparison/Test-01
    memo Info
      ++++++++++++++++++  TEST 25 ++++++++++++++++++

         Description:
            - Artificial climate, smooth mild temperate;
            - Using a generic soil, medium texture free draining;
            - Pasture (ryegrass/white clover) under cut rotation;
            - Initial mineral N = 30kg as NO3 + 30kg as NH4;
            - Initial organic matter = about 125 tonnes hum, 10ton N + 1000kg fom, 13kg N;
            - Initial surface residues = 1000kg, 27kg N;
            - No additions of residues (besides crop senescence);
            - Apply 50kg urea_N;

         Expected output:
            - All outputs with valid values (numeric), including plant related;
            - Most variables should show changes (some exception due to diffs between wheat and pasture);
              . Soil complete, focus on the addition of mineral N

      +++++++++++++++++++++++++++++++++++++++++++++
    simulation Sim29-SoilN_Pasture+Hum+FOM+SurfOM+N+Urea -> /SoilNitrogen-SoilN_Comparison/Test-01/Sim01-SoilN_BareBare
      PlugIns: same as Test-01.Sim01-SoilN_BareBare.PlugIns
      area Paddock -> /SoilNitrogen-SoilN_Comparison/Test-01/Sim01-SoilN_BareBare/Paddock
        operations OperationsSchedule
          20-Jan  Fertiliser apply amount=50 (kg/ha), depth=100 (mm), type=urea_n
          30-Mar  Fertiliser apply amount=50 (kg/ha), depth=100 (mm), type=urea_n
        surfaceom SurfaceOrganicMatter
          PoolName = Residue1  # Organic Matter pool name
          type = grass  # Organic Matter type
          mass = 1000  # Initial surface residue (kg/ha)
          cnr = 15  # C:N ratio of initial residue
          standing_fraction = 0  # Fraction of residue standing
        Soil MediumSedimentarySoil: SoilType=Generic medium sedimentary soil; Site=New Zealand; Latitude=0; Longitude=0
          Water: same as Test-01.Sim01-SoilN_BareBare.Paddock.MediumSedimentarySoil.Water
          SoilWater: same as Test-02.Sim02-SoilN_Bare+NO3.Paddock.MediumSedimentarySoil.SoilWater
          SoilOrganicMatter: same as Test-16.Sim16-SoilN_Bare+Hum+FOM+SurfOM+N.Paddock.MediumSedimentarySoil.SoilOrganicMatter
          Analysis: same as Test-02.Sim02-SoilN_Bare+NO3.Paddock.MediumSedimentarySoil.Analysis
          Sample Initial nitrogen: NO3Units=kgha; NH4Units=kgha; SWUnits=Volumetric; OCUnits=Total; PHUnits=Water
            Thickness  NO3  NH4
            150        5    5
            150        5    5
            300        5    5
            300        5    5
            300        5    5
            300        5    5
          Sample Initial water: Thickness=[150, 150, 300, 300, 300, 300]; SW=[0.36, 0.37, 0.38, 0.37, 0.36, 0.35]
        AgPasture: same as Test-27.Sim27-SoilN_Pasture+N+Urea.Paddock.AgPasture
        outputfile Report -> /SoilNitrogen-SoilN_Comparison/Test-01/Sim01-SoilN_BareBare/Paddock/Report: filename=Sim29-SoilN_Pasture+Hum+FOM+SurfOM+N+Urea Report.out; title=Sim29-SoilN_Pasture+Hum+FOM+SurfOM+N+Urea Report
          variables -> /SoilNitrogen-SoilN_Comparison/Test-01/Sim01-SoilN_BareBare/Paddock/Report/Variables
          events ReportingFrequency -> /SoilNitrogen-SoilN_Comparison/Test-01/Sim01-SoilN_BareBare/Paddock/Report/ReportingFrequency
    simulation Sim29-SoilNitrogen_Pasture+Hum+FOM+SurfOM+N+Urea -> /SoilNitrogen-SoilN_Comparison/Test-29/Sim29-SoilN_Pasture+Hum+FOM+SurfOM+N+Urea
      PlugIns: same as Test-01.Sim01-SoilN_BareBare.PlugIns
      area Paddock -> /SoilNitrogen-SoilN_Comparison/Test-29/Sim29-SoilN_Pasture+Hum+FOM+SurfOM+N+Urea/Paddock
        outputfile Report -> /SoilNitrogen-SoilN_Comparison/Test-29/Sim29-SoilN_Pasture+Hum+FOM+SurfOM+N+Urea/Paddock/Report: filename=Sim29-SoilNitrogen_Pasture+Hum+FOM+SurfOM+N+Urea Report.out; title=Sim29-SoilNitrogen_Pasture+Hum+FOM+SurfOM+N+Urea Report
          variables -> /SoilNitrogen-SoilN_Comparison/Test-29/Sim29-SoilN_Pasture+Hum+FOM+SurfOM+N+Urea/Paddock/Report/Variables
          events ReportingFrequency -> /SoilNitrogen-SoilN_Comparison/Test-29/Sim29-SoilN_Pasture+Hum+FOM+SurfOM+N+Urea/Paddock/Report/ReportingFrequency
  folder Test-30 -> /SoilNitrogen-SoilN_Comparison/Test-01
    memo Info
      ++++++++++++++++++  TEST 26 ++++++++++++++++++

         Description:
            - Artificial climate, smooth mild temperate;
            - Using a generic soil, medium texture free draining;
            - Pasture (ryegrass/white clover) under cut rotation;
            - Initial mineral N = 30kg as NO3 + 30kg as NH4;
            - Initial organic matter = about 125 tonnes hum, 10ton N + 1000kg fom, 13kg N;
            - Initial surface residues = 1000kg, 27kg N;
            - Added 2 times 1000kg residues (cn=10), besides crop senescence;
            - No additions of mineral N;

         Expected output:
            - All outputs with valid values (numeric), including plant related;
            - Most variables should show changes (some exception due to diffs between wheat and pasture);
              . Soil complete, focus on the addition of organic N

      +++++++++++++++++++++++++++++++++++++++++++++
    simulation Sim30-SoilN_Pasture+Hum+FOM+SurfOM+N+addOM -> /SoilNitrogen-SoilN_Comparison/Test-01/Sim01-SoilN_BareBare
      PlugIns: same as Test-01.Sim01-SoilN_BareBare.PlugIns
      area Paddock -> /SoilNitrogen-SoilN_Comparison/Test-01/Sim01-SoilN_BareBare/Paddock
        operations OperationsSchedule
          20-Jan  'SurfaceOrganicMatter' add_surfaceom name = Residue2, type = grass, mass = 1000 (kg/ha), cnr = 10, cpr = 0
          30-Mar  'SurfaceOrganicMatter' add_surfaceom name = Residue2, type = grass, mass = 1000 (kg/ha), cnr = 10, cpr = 0
        surfaceom SurfaceOrganicMatter
          PoolName = Residue1  # Organic Matter pool name
          type = grass  # Organic Matter type
          mass = 1000  # Initial surface residue (kg/ha)
          cnr = 15  # C:N ratio of initial residue
          standing_fraction = 0  # Fraction of residue standing
        Soil MediumSedimentarySoil: SoilType=Generic medium sedimentary soil; Site=New Zealand; Latitude=0; Longitude=0
          Water: same as Test-01.Sim01-SoilN_BareBare.Paddock.MediumSedimentarySoil.Water
          SoilWater: same as Test-02.Sim02-SoilN_Bare+NO3.Paddock.MediumSedimentarySoil.SoilWater
          SoilOrganicMatter: same as Test-25.Sim25-SoilN_Wheat+Hum+FOM+SurfOM+N+Urea.Paddock.MediumSedimentarySoil.SoilOrganicMatter
          Analysis: same as Test-02.Sim02-SoilN_Bare+NO3.Paddock.MediumSedimentarySoil.Analysis
          Sample Initial nitrogen: NO3Units=kgha; NH4Units=kgha
            Thickness  NO3  NH4
            150        5    5
            150        5    5
            300        5    5
            300        5    5
            300        5    5
            300        5    5
          Sample Initial water: Thickness=[150, 150, 300, 300, 300, 300]; SW=[0.36, 0.37, 0.38, 0.37, 0.36, 0.35]
        AgPasture: same as Test-27.Sim27-SoilN_Pasture+N+Urea.Paddock.AgPasture
        outputfile Report -> /SoilNitrogen-SoilN_Comparison/Test-01/Sim01-SoilN_BareBare/Paddock/Report: filename=Sim30-SoilN_Pasture+Hum+FOM+SurfOM+N+addOM Report.out; title=Sim30-SoilN_Pasture+Hum+FOM+SurfOM+N+addOM Report
          variables -> /SoilNitrogen-SoilN_Comparison/Test-01/Sim01-SoilN_BareBare/Paddock/Report/Variables
          events ReportingFrequency -> /SoilNitrogen-SoilN_Comparison/Test-01/Sim01-SoilN_BareBare/Paddock/Report/ReportingFrequency
    simulation Sim30-SoilNitrogen_Pasture+Hum+FOM+SurfOM+N+addOM -> /SoilNitrogen-SoilN_Comparison/Test-30/Sim30-SoilN_Pasture+Hum+FOM+SurfOM+N+addOM
      PlugIns: same as Test-01.Sim01-SoilN_BareBare.PlugIns
      area Paddock -> /SoilNitrogen-SoilN_Comparison/Test-30/Sim30-SoilN_Pasture+Hum+FOM+SurfOM+N+addOM/Paddock
        outputfile Report -> /SoilNitrogen-SoilN_Comparison/Test-30/Sim30-SoilN_Pasture+Hum+FOM+SurfOM+N+addOM/Paddock/Report: title=Sim30-SoilNitrogen_Pasture+Hum+FOM+SurfOM+N+addOM Report
          filename=Sim30-SoilNitrogen_Pasture+Hum+FOM+SurfOM+N+addOM Report.out
          variables -> /SoilNitrogen-SoilN_Comparison/Test-30/Sim30-SoilN_Pasture+Hum+FOM+SurfOM+N+addOM/Paddock/Report/Variables
          events ReportingFrequency -> /SoilNitrogen-SoilN_Comparison/Test-30/Sim30-SoilN_Pasture+Hum+FOM+SurfOM+N+addOM/Paddock/Report/ReportingFrequency
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