folder simulations: version=36; creator=Apsim 7.8-r3874
  simulation GriddedGrazedPaddock
    memo
      This is an example simulation for a ‘gridded paddock’.  A conference and journal paper describing the gridding are in preparation and will be referenced here when published.  The gridding refers to that there are multiple patches within the soil carbon/nitrogen module that can be used to reflect the variation in mineral and organic nitrogen caused by patchy urinary N returns from the grazing animal.

      The user sets the number of patches in the paddock in the component “ManageGriddedPaddock” in the field “How many patches should there be in the grid?”  The 1-ha paddock is evenly divided into that number of patches so a grid of 10,000 will produce patches of 1 m2 while a 100-patch paddock would have 100 m2 patches.  Note that the higher the number of patches the slower that the simulation will run.

      The example here is for a rotationally-grazed single paddock.  When animals arrive in the simulation to graze the paddock a user-set proportion of the ingested N is removed from the simulation and the remainder is divided up into dung and urine.  In this simulation dung is uniformly returned to the paddock but urine is returned in patches.  The area of new urine patches at each grazing is determined by the amount of grazable dry matter and the user settings for the intake per animal, urinations per animal per day and the wetted area of soil per urination.  These settings and the simulated pasture growth decide the total area (m2) of new urine patch for each grazing event.  That area is compared to the area per patch to give the number of patches that are used for urine return for that grazing.  A few examples are provided below:

      User settings
      # patches (-)	                                                10000      5000        50            50
      DM ingested per animal (kgDM/head/day)              15           15            15            15
      Urinations per animal (-)                                            12           12            12            12
      Wetted area per urination (m2)                                 0.25         0.25         0.25         0.25

      Calculated during simulation in “ManageGriddedPaddock”
      Biomass grazed (kgDM/ha)                                      1000        1000        1000        1500
      Number of animals (-)                                                 66.67       66.67       66.67      100
      Total area of urine patches for this grazing (m2)        200          200          200          300
      Area of each simulation grid patch (m2)                    1              2              200          200
      Number of grid patches used for urine return (-)         200         100          1              2

      The actual patches used are selected by one of three options:
      -	RotatingInOrder – each patch is used in turn in strict order, there are no double-applications at a single grazing event;
      -	Random – the patches used are selected at random, if there are multiple patches used for a single grazing event then there is some probability that a patch will receive a double (or greater) application of urine and the same patch(es) could be selected for another grazing in the near future.  The likelihood of the patches overlapping increases as the number of patches needed for the urination area increases.
      -	PseudoRandom – as for “Random” but a constant seed is used for the random selection of patches so that the simulation is repeatable.
      The actual patches selected is provided in the string output “ListOfPatches” where, for example “234|562|556|” would indicate that the urine was returned to three patches, numbers 234, 562 and 556.

      The “ReportingWithPatches” manager assists with reporting data from the simulation.  The user options are the name of the output component, the interval between reporting (amounts are sensibly accumulated between reporting events) and the ‘sampling’ of patches.  The latter is included as the user may wish to see some data from individual patches but perhaps not all patches (e.g. from 10,000-patch simulations).  The sampling setting sets the number of patches to sample.  Additional outputs from this manager component include:
      -	patchesNO3 - quantity of the no3 in the patch
      -	patchesNH4 - quantity of the nh4 in the patch
      -	SamplePatchesNO3 - as for patchesNO3 but only the sampled patches (for simulations with many patches)
      -	SamplePatchesNH4 - as for patchesNH4 but only the sampled patches (for simulations with many patches)
      -	patchesNO3conc600 - concentration of no3-n in the water at 600 mm deep
      -	SampleConc600 - as for patchesNO3conc600 but only the sampled patches (for simulations with many patches)
      -	PercNH4 - percentiles of NH4 in the patches 1=P0, 2=P5, 3=P10, 4=P25, 5=P50, 6=P75, 7=P90, 8=P95, 9=P100
      -	PercNO3 - percentiles of NO3 in the patches 1=P0, 2=P5, 3=P10, 4=P25, 5=P50, 6=P75, 7=P90, 8=P95, 9=P100
      -	PercNO3Conc - percentiles of NO3-N concentration in the patches 1=P0, 2=P5, 3=P10, 4=P25, 5=P50, 6=P75, 7=P90, 8=P95, 9=P100
      The amounts of NH4 or NO3 are those summed for the entire soil depth.  The percentiles are given as an array with the probabilities expressed in each element as shown above (e.g. PercNH4(7) would give the 70th percentile of NH4 amount).
    PlugIns PlugInSoilNitrogen
      PlugIn=[%apsim%\UserInterface\ApsimUIPlugIn.xml, %apsim%\UserInterface\SoilTypes.xml, %apsim%\UserInterface\GenericFunctionsIDE.xml, %apsim%\UserInterface\Graph.xml, %apsim%\UserInterface\Ausfarm.xml, %apsim%\UserInterface\DevelopersPlugIn.xml, %apsim%\Model\SlurryTank.xml, %apsim%\Model\WHEATSTRAW.xml, %apsim%\Model\WASHWATER.xml, %apsim%\Model\animalSection.xml, %apsim%\Model\floor.xml, %apsim%\Model\PigHousing.xml, %apsim%\Model\PHmodel.xml, %apsim%\Model\simpleBuilding.xml, %apsim%\Model\atmosphere.xml, %apsim%\Model\Accum.xml, %apsim%\Model\AgPasture.xml, %apsim%\Model\Bambatsi.xml, %apsim%\Model\Barley.xml, %apsim%\Model\Br.xml, %apsim%\Model\Bore.xml, %apsim%\Model\Broccoli.xml, %apsim%\Model\ButterflyPea.xml, %apsim%\Model\Canola.xml, %apsim%\Model\Canopy.xml, %apsim%\Model\Centro.xml, %apsim%\Model\Channel.xml, %apsim%\Model\Chickpea.xml, %apsim%\Model\Chicory.xml, %apsim%\Model\Cl2.xml, %apsim%\Model\Climatechange.xml, %apsim%\Model\Clock.xml, %apsim%\Model\Cotton2.xml, %apsim%\Model\Cowpea.xml, %apsim%\Model\CPIManager.xml, %apsim%\Model\CropUI.xml, %apsim%\Model\Dam.xml, %apsim%\Model\DCD.xml, %apsim%\Model\dcd1.xml, %apsim%\Model\dcd2.xml, %apsim%\Model\dcd3.xml, %apsim%\Model\Dymex_StripeRust.xml, %apsim%\Model\EGrandis.xml, %apsim%\Model\EMelliodora.xml, %apsim%\Model\Eo.xml, %apsim%\Model\EPopulnea.xml, %apsim%\Model\Erosion.xml, %apsim%\Model\Events.xml, %apsim%\Model\Fababean.xml, %apsim%\Model\Factorial.xml, %apsim%\Model\Factor.xml, %apsim%\Model\FactorComplex.xml, %apsim%\Model\FrenchBean.xml, %apsim%\Model\Fertiliser.xml, %apsim%\Model\Fieldpea.xml, %apsim%\Model\Gcm_data.xml, %apsim%\Model\Grasp.xml, %apsim%\Model\Graz.xml, %apsim%\Model\Growth.xml, %apsim%\Model\Horsegram.xml, %apsim%\Model\Ini.xml, %apsim%\Model\InitWater.xml, %apsim%\Model\Input.xml, %apsim%\Model\Irrigation.xml, %apsim%\Model\KWTest.xml, %apsim%\Model\Lablab.xml, %apsim%\Model\Lettuce.xml, %apsim%\Model\Log.xml, %apsim%\Model\Lentil.xml, %apsim%\Model\Lucerne.xml, %apsim%\Model\Lupin.xml, %apsim%\Model\Maize.xml, %apsim%\Model\MaizeZ.xml, %apsim%\Model\Manager.xml, %apsim%\Model\Map.xml, %apsim%\Model\Memo.xml, %apsim%\Model\MetFile.xml, %apsim%\Model\MicroMet.xml, %apsim%\Model\Millet.xml, %apsim%\Model\Millet1.xml, %apsim%\Model\Millet2.xml, %apsim%\Model\Millet3.xml, %apsim%\Model\Millet4.xml, %apsim%\Model\Millet5.xml, %apsim%\Model\Mucuna.xml, %apsim%\Model\Mungbean.xml, %apsim%\Model\Navybean.xml, %apsim%\Model\NitrificationInhibitor2.xml, %apsim%\Model\Oats.xml, %apsim%\Model\Ocean_data.xml, %apsim%\Model\OilPalm.xml, %apsim%\Model\Operations.xml, %apsim%\Model\Orobanche.xml, %apsim%\Model\Oryza.xml, %apsim%\Model\OutputFile.xml, %apsim%\Model\Ozcot.xml, %apsim%\Model\Patchinput.xml, %apsim%\Model\PatchData.xml, %apsim%\Model\Peanut.xml, %apsim%\Model\Pigeonpea.xml, %apsim%\Model\Pond.xml, %apsim%\Model\Potato.xml, %apsim%\Model\RLink.xml, %apsim%\Model\RotPlot.xml, %apsim%\Model\RugPlotUI.xml, %apsim%\Model\Root.xml, %apsim%\Model\Rule.xml, %apsim%\Model\Script.xml, %apsim%\Model\Seedling.xml, %apsim%\Model\SiloInput.xml, %apsim%\Model\Slurp.xml, %apsim%\Model\Soi.xml, %apsim%\Model\Soil.xml, %apsim%\Model\SoilNui.xml, %apsim%\Model\SoilTemp.xml, %apsim%\Model\Solute.xml, %apsim%\Model\SWIM3SubsurfaceDrain.xml, %apsim%\Model\SWIM3SoluteParameters.xml, %apsim%\Model\SWIM3.xml, %apsim%\Model\SWIM3WaterTable.xml, %apsim%\Model\Tracer.xml, %apsim%\Model\Sorghum.xml, %apsim%\Model\SorghumConstants.xml, %apsim%\Model\SorghumGenotype.xml, %apsim%\Model\Soybean.xml, %apsim%\Model\Stylo.xml, %apsim%\Model\Sugar.xml, %apsim%\Model\SugarCane.xml, %apsim%\Model\SurfaceTemp.xml, %apsim%\Model\Summaryfile.xml, %apsim%\Model\Sunflower.xml, %apsim%\Model\SurfaceOM.xml, %apsim%\Model\SweetCorn.xml, %apsim%\Model\SweetSorghum.xml, %apsim%\Model\SWIM2.xml, %apsim%\Model\Sysbal.xml, %apsim%\Model\SysBal2.xml, %apsim%\Model\Tcllink.xml, %apsim%\Model\Tclmanager.xml, %apsim%\Model\Tclui.xml, %apsim%\Model\TextOutput.xml, %apsim%\Model\Tracker.xml, %apsim%\Model\Tree.xml, %apsim%\Model\UreaseInhibitor2.xml, %apsim%\Model\Variables.xml, %apsim%\Model\Venlink.xml, %apsim%\Model\vine.xml, %apsim%\Model\WaterSupply.xml, %apsim%\Model\Weed.xml, %apsim%\Model\Wheat.xml, %apsim%\Model\YPCalc.xml, %apsim%\Model\Soil with new nitrogen model.xml]
    manager2 ManageGriddedPaddock
      Verbose = no  # Verbose mode - write many informational statements to the Summary file
      # Grazing parameters
      GrazingFrequency = 0  # Frequency of grazing (days) (0 will be interpreted as the end of each month)
      GrazingResidual = 1000  # Residual pasture mass after grazing (kg DM /ha)
      MinGrazable = 500  # Minimum grazeable dry matter to trigger grazing (kg DM/ha)
      # Excreta return parameters
      GrazedDMPerHead = 15  # Amount of DM ingested per animal per grazing day (used to calculate stocking density) (kgDM/head/day)
      UrinationsPerHead = 12  # Number of urinations per animal per day
      SingleUrinePatchArea = 0.25  # Area (use the wetted area) of each urine patch created (m2)
      PropIngestedNExported = 0.15  # Proportion of the ingested N that is retained in the body or exported from the paddock
      PropExcretedNAsUrine = 0.7  # Proportion of the excreted N that is voided as urine
      UrineDepth = 200  # Depth band (0 mm to X mm) for urine N deposition (mm)
      # Patch characteristics
      UrineReturnPattern = PseudoRandom  # Pattern for urine N return (PseudoRandom uses a constant seed to all for repeatable simulations)
      NumPatches = 15  # How many patches should there be in the grid?
      # Fertiliser management
      GeneralFertAmt = 150  # Annual amount of urea-N fertiliser to apply (kg N /ha) - application on the 1st of the month
      GeneralFertType = NoWinter  # Apply fertiliser all year or not in winter (May, June, July)?
```csharp
using System;
using ModelFramework;

public class Script 
{      
   [Link] Simulation Simulation;
   [Link] Clock Clock;   

   [Param] public string Verbose; // yes/no
   
   // grazing parameters
   [Param] [Output] [Units("days")] public int GrazingFrequency; // in days - 0 is to be interpreted as the end of each month (days)
   [Param] [Output] [Units("kgDM/ha")] public double GrazingResidual; // residual pasture after grazing (kg DM /ha)
   [Param] [Output] [Units("kgDM/ha")] public double MinGrazable; // minimum amount of pasture to trigger grazing (kg DM /ha)

   // excreta return parameters
   [Param] [Units("kgDM/head/day")] public double GrazedDMPerHead; // amount of DM ingested per animal
   [Param] [Units("-")] public double UrinationsPerHead; // number of urine patches per animal per day
   [Param] [Units("m2")] public double SingleUrinePatchArea; // area of each urine patch
   [Param] [Units("-")] public double PropIngestedNExported; // proportion of ingested N that is either retained in the body or exported from the paddock (only relevant for FromGrazing option)
   [Param] [Units("-")] public double PropExcretedNAsUrine; // proportion of excreted N that is voided as urine (only relevant for FromGrazing option)
   [Param] [Output] [Units("mm")] public double UrineDepth; // depth of urine deposition 

   // urine patch characteristics
   [Param] [Output] [Units("-")] public string UrineReturnPattern; // how the urine is returned to the soil
   [Param] [Output] [Units("-")] public int NumPatches; // if a gridded paddock then how many patches?
   
   // fertiliser parameters
   [Param] [Output] [Units("-")] public string GeneralFertType;
   [Param] [Output] [Units("kgN/ha/yr")] public double GeneralFertAmt;

   [Event] public event AddSoilCNPatchDelegate AddSoilCNPatch;

   [Input] DateTime Today;   // Equates to the value of the current simulation date - value comes from CLOCK
   
   [Output] [Units("-")] public int DaysSinceGraze;
   [Output] [Units("-")] public string ListOfPatches;  // a list (string) of patch numbers that the urine is returned to today using "|" as a seperator
   [Output] [Units("-")] public int NumPatchesForUrine;  //number of patches used for urine return (depends on the amount of herbage grazed)
   [Output] [Units("kgDM /ha")] public double Grazed;  // DM grazed
   [Output] [Units("kgN/ha")] public double GrazedN;   // N in the DM grazed
   [Output] [Units("kgN/ha")] public double AmountUrineNReturned;
   [Output] [Units("kgN/ha")] public double AmountDungNReturned;
   
   [Output] [Units("kgN/ha")] public double UrineNReturned;  // is this needed?
   
   AgPasture AgPasture;
   Fertiliser Fertiliser;
   SoilWat SoilWat;
   SoilN SoilNitrogen;
   SurfaceOM SurfaceOM;

   int PatchNumForUrine = -1;
   double AmountDungCReturned = 0.0;
   double iniOrgC;
   double iniOrgN;
   double[] UrineDepthPlacement;

   bool GrazeNow = false;
   bool ReportToday = false;
   
   Random rndConstSeed = new Random((int) 666);
   Random rndRandom = new Random();

      
   [EventHandler] public void OnInitialised()
   {
      if (Verbose == "yes")
         Console.WriteLine("Initialising the Manager for grazing, urine return and reporting");
      
      // nothing required at initialisation
      
      if (Verbose == "yes")
         Console.WriteLine("Finished initialising the Manager for grazing, urine return and reporting");

   } // end of Initialisation


   [EventHandler] public void OnPrepare()
   {
      // if this is the start of the simulation then sort out the depth for the urine placement, can't do this in initialisation because of the module order
      if (Clock.is_start_simulation)
      {
         CalcUrinePlacementDepth();
         foreach (Paddock Paddock in Simulation.ChildPaddocks)
         {
            SoilNitrogen = (SoilN) Paddock.LinkByType("SoilN");
            SoilNitrogen.Set("MaximumNitrogenAvailableToPlants", 3.0);
            SoilNitrogen.Set("AllowPatchAutoAmalgamation", "No");
            SoilNitrogen.Set("basePatchApproach", "IDBased");
            SoilNitrogen.Set("AutoAmalgamationApproach", "CompareAge");
            SoilNitrogen.Set("PatchAgeForForcedMerge", 3.0);
            SoilNitrogen.Set("NPartitionApproach", "BasedOnConcentrationAndDelta");
            //mySoilNitrogen.Set("allowNewPools", "yes");  // this changes the calculation of soluble carbon for denitrification to use only the active pools (sometimes needed to prevent excessive denitrifciation when N from urine patches gets deep in the soil where all the carbon is inactive)
      
            int[] PatchToAddTo = new int[1];  //need an array variable for this
            int nPatchesAdded = 0;
            double NewArea = 1.0 / NumPatches;

            while(nPatchesAdded < NumPatches - 1)
            {
               AddSoilCNPatchType NewPatch = new AddSoilCNPatchType();
               NewPatch.DepositionType = "ToNewPatch";
               NewPatch.AreaFraction = NewArea;
               PatchToAddTo[0] = 0;
               NewPatch.AffectedPatches_id = PatchToAddTo;
      
               AddSoilCNPatch.Invoke(NewPatch);
               nPatchesAdded += 1;
            }
         }
      }
         
      DaysSinceGraze += 1;
      Grazed = 0.0;
      GrazedN = 0.0;
      UrineNReturned = 0.0;
      ListOfPatches = "";
      GrazeNow = false;
      
      if (((GrazingFrequency == 0) && (Clock.is_end_month)) || ((DaysSinceGraze >= GrazingFrequency) && (GrazingFrequency > 0)))
      {
         // see if there is enough biomass to do the grazing, can set this to 0 in the UI if needed
         double StandingBiomass = 0.0;
         foreach (Paddock Paddock in Simulation.ChildPaddocks)
         {
            AgPasture = (AgPasture) Paddock.LinkByType("AgPasture");
            StandingBiomass += AgPasture.AboveGroundWt;
         }
         if (StandingBiomass > (GrazingResidual + MinGrazable))  
            GrazeNow = true;
      }

      if (GrazeNow)
      {
         if (Verbose == "yes")
            Console.WriteLine("Doing grazing");
         DaysSinceGraze = 0;

         foreach (Paddock Paddock in Simulation.ChildPaddocks)
         {
            AgPasture = (AgPasture) Paddock.LinkByType("AgPasture");

            GrazeType GZ = new GrazeType();
            GZ.amount = (float) GrazingResidual;
            GZ.type = "SetResidueAmount";
            GZ.sender = "DoGrazing";
            AgPasture.Graze(GZ);

            Grazed += AgPasture.HarvestedWt;
            GrazedN += AgPasture.HarvestedN;
         }
            
         AmountUrineNReturned = GrazedN * (1.0 - PropIngestedNExported) * PropExcretedNAsUrine;  
         AmountDungNReturned = GrazedN * (1.0 - PropIngestedNExported) * (1.0 - PropExcretedNAsUrine);  // 
         AmountDungCReturned = AmountDungNReturned * 20;  // or could take this from digestibility

         // calculate the number of patches based on the patch size and the /cow pasture amount of 15 kg DM /cow /day and 12 urine patchs per cow per day * 0.25 m2 /patch
         double AreaUrinePatchesToday = Grazed / GrazedDMPerHead * UrinationsPerHead * SingleUrinePatchArea;  // units are m2
         double AreaSingleGPPatch = 10000.0 / NumPatches; // units are m2
         NumPatchesForUrine = Math.Max(1, Convert.ToInt32(AreaUrinePatchesToday / AreaSingleGPPatch));
         double UrineNPerPatch = AmountUrineNReturned / NumPatchesForUrine; // units are kg N /patch

         if (Verbose == "yes")
         {
            Console.WriteLine("Grazing urine return summary:");
            Console.WriteLine("    Pasture Grazed          :   " + Grazed);
            Console.WriteLine("    Number of cows          :   " + (Grazed / 15.0));
            Console.WriteLine("    Number of urine patches :   " + (Grazed / 15.0 * 12.0));
            Console.WriteLine("    Area of urine patches   :   " + (Grazed / 15.0 * 12.0 * 0.25));
            Console.WriteLine("    Number of GP patches    :   " + NumPatchesForUrine);
            Console.WriteLine("    Urine N per patch       :   " + UrineNPerPatch + " in kg N / patch");
            Console.WriteLine("    Urine N per patch       :   " + (UrineNPerPatch / AreaSingleGPPatch * 10000) + " in kg N / ha within patch");
            Console.WriteLine("");
            Console.WriteLine("The amount of urea fertiliser to be returned to the whole paddock is " + AmountUrineNReturned);
         }            
        
         DoUrineReturn();

         DoTramplingAndDungReturn();
         
         if (Verbose == "yes")
            Console.WriteLine("Finished grazing");

      } // this is the end of the GrazeNow section

      if ((GeneralFertAmt > 0.0) && (Clock.day_of_month == 1))
      {
         DoFertiliser();
      }

   } // this is the end of Prepare


   [EventHandler] public void OnPost()
   {
      // nothing to do here
   } // end of Post

   public void CalcUrinePlacementDepth()
   {
    // calculates what proportion of the urinary N to put in each layer of the soil
      
      foreach (Paddock Paddock in Simulation.ChildPaddocks)
      {
         SoilWat = (SoilWat) Paddock.LinkByType("SoilWat");
         double tempDepth = 0.0;
         UrineDepthPlacement = new double[SoilWat.dlayer.Length];
         for (int i = 0; i <= (SoilWat.dlayer.Length - 1); i++)
         {
            tempDepth += SoilWat.dlayer[i];
            if (tempDepth <= UrineDepth)
            {
               UrineDepthPlacement[i] = SoilWat.dlayer[i] / UrineDepth;
            }
            else
            {
               UrineDepthPlacement[i] = (UrineDepth - (tempDepth - SoilWat.dlayer[i])) / (tempDepth - (tempDepth - SoilWat.dlayer[i])) * SoilWat.dlayer[i] / UrineDepth;
               UrineDepthPlacement[i] = Math.Max(0.0, Math.Min(1.0, UrineDepthPlacement[i]));
            }
            if (Verbose == "yes")
               Console.WriteLine("The proportion of urinary-N deposited into the " + i + "th layer will be " + UrineDepthPlacement[i]);
         }
      }

   } // this is the end of CalcUrinePlacementDepth

   public void GetPatchForUrineReturn()
   {
      if (UrineReturnPattern == "UniformAcrossAllPatches")
         PatchNumForUrine = 0;  
      else if (UrineReturnPattern == "RotatingInOrder")
      {
         PatchNumForUrine += 1;  //increment the patch number
         if (PatchNumForUrine >= NumPatches)
            PatchNumForUrine = 0;  // but reset back to the first patch if needed
         if (Verbose == "yes")
            Console.WriteLine("The patch for urine return is " + PatchNumForUrine);
      }
      if (UrineReturnPattern == "Random")
      {
         PatchNumForUrine = rndRandom.Next(0, NumPatches);
         if (Verbose == "yes")
            Console.WriteLine("The next random number patch for urine return is " + PatchNumForUrine);
      }
      else if (UrineReturnPattern == "PseudoRandom")
      {
         PatchNumForUrine = rndConstSeed.Next(0, NumPatches);
         if (Verbose == "yes")
            Console.WriteLine("The next pseudo-random number patch for urine return is " + PatchNumForUrine);
      }
   } // this is the end of GetPatchForUrineReturn

   public void DoUrineReturn()
   {
      ListOfPatches = "";
      double UrineNPerPatch = AmountUrineNReturned / NumPatchesForUrine; // units are kg N /patch
         
      for (int j = 0; j < NumPatchesForUrine; j++)
      {
         GetPatchForUrineReturn();  //gets the value for PatchNumForUrine
         ListOfPatches += (PatchNumForUrine + 1) + "|";  // add 1 here because the output component uses 1-based rather than 0-based arrays
            
         int[] PatchToAddTo = new int[1];  //need an array variable for this
         double[] UreaToAdd = new double[SoilWat.dlayer.Length];  

         for (int ii = 0; ii <= (SoilWat.dlayer.Length - 1); ii++)
            UreaToAdd[ii] = UrineDepthPlacement[ii] * (UrineNPerPatch / (10000.0 / NumPatches) * 10000);

         UrineNReturned += AmountUrineNReturned / NumPatchesForUrine;
         
         AddSoilCNPatchType CurrentPatch = new AddSoilCNPatchType();
         CurrentPatch.Sender = "manager";
         CurrentPatch.DepositionType = "ToSpecificPatch";
         PatchToAddTo[0] = PatchNumForUrine;
         CurrentPatch.AffectedPatches_id = PatchToAddTo;
         CurrentPatch.Urea = UreaToAdd;
      
         AddSoilCNPatch.Invoke(CurrentPatch);
      }
      // decided to leave the trailing "|" on the string because a single patch would be treated as a double by the output component
      // ListOfPatches = ListOfPatches.Substring(0, (ListOfPatches.Length - 1)); 
      if (Verbose == "yes") 
         Console.WriteLine("Returned urine to " + NumPatchesForUrine + " patches, these being: " + ListOfPatches);
      
   } // end of DoUrineReturn
   
   public void DoTramplingAndDungReturn()
   {
      foreach (Paddock Paddock in Simulation.ChildPaddocks)
      {
         SoilNitrogen = (SoilN) Paddock.LinkByType("SoilN");
         SurfaceOM = (SurfaceOM) Paddock.LinkByType("SurfaceOM");

         // accelerate the movement of surface litter into the soil - do this before the dung is added
         double temp = SurfaceOM.surfaceom_wt * 0.1;

         TillageType trampling = new TillageType();
         trampling.tillage_depth = (float) 100.0;
         trampling.f_incorp = (float) 0.1;
         SurfaceOM.Tillage(trampling);
         if (Verbose == "yes")
            Console.WriteLine("The amount of litter trampled was " + temp + " and the remaining litter is " + (SurfaceOM.surfaceom_wt));

         // move the dung to litter - assume dung is 40% of that grazed and a C:N ratio of 
         BiomassRemovedType dung = new BiomassRemovedType();
         dung.crop_type = "RuminantDung_PastureFed";
         dung.dm_type = new string[] { "RuminantDung_PastureFed" };
         dung.dlt_crop_dm = new float[] { Convert.ToSingle(AmountDungCReturned / 0.4) };  // 
         dung.dlt_dm_n = new float[] { Convert.ToSingle(AmountDungNReturned) };    // 
         dung.dlt_dm_p = new float[] { 0.0F };
         dung.fraction_to_residue = new float[] { 1.0F };
         SurfaceOM.BiomassRemoved(dung);
         if (Verbose == "yes")
            Console.WriteLine("The amount of dung DM added to the litter was " + (AmountDungCReturned / 0.4) + " and the amount of N added in the dung was " + (AmountDungNReturned));

      } 
   } // this is the end of the trampling and dung patch/paddock section
   
   public void DoFertiliser()
   {
      bool ApplyFert = false; // the test for first day of the month has already been done, this will only test to make sure no fertiliser in winter etc
      double NumMonths;
      
      if (GeneralFertType == "Monthly")
      {
         NumMonths = 12;
         ApplyFert = true;
      }
      else if (GeneralFertType == "NoWinter")
      {
         NumMonths = 9;
         if ((Clock.month < 5) || (Clock.month > 7))
            ApplyFert = true;
         else
            ApplyFert = false;
      }
      else
         throw new Exception("Wrong fertiliser setting");

      if (ApplyFert)
      {
         foreach (Paddock MyPatch in Simulation.ChildPaddocks)  
         {
            Fertiliser = (Fertiliser) MyPatch.LinkByType("Fertiliser");
            Fertiliser.Apply((float)(GeneralFertAmt / NumMonths), (float) (0.0), "urea_n");
            if (Verbose == "yes")
               Console.WriteLine("Applying " + (GeneralFertAmt / NumMonths) + " kg of fertiliser to the whole paddock");
         }
      }
   }
}
```
    manager2 ReportingWithPatches
      Verbose =  # Verbose mode - write many informational statements to the Summary file
      # Parameters to control the reporting
      OutputModule = WholePaddock  # Name of the output component for reporting
      ReportingFreq = Monthly  # Frequency of reporting
      NumberPatchesToSample = 10  # How many patches should be sampled for output? (enter a large number for all patches)
```csharp
using System;
using ModelFramework;

public class Script 
{      
   [Link] Simulation Simulation;
   [Link] Clock Clock;   
   
   [Param] public string Verbose; 
   [Param] public string OutputModule; 
   [Param] public string ReportingFreq;
   [Param] int NumberPatchesToSample;  // number of patches to sample for output

   [Input] DateTime Today;   // Equates to the value of the current simulation date - value comes from CLOCK
   [Input] double UrineNReturned; //Amount of urineary N returned (from the paddock manager)
   [Input] public int NumPatches;  // the number of gridded patches in the paddock
   [Input] public double Grazed;
   [Input] public double GrazedN;
   
   [Output] public int DaysSinceReport;
   [Output] public double NHA;
   [Output] public double PGR;
   [Output] public double HerbageGrazed;
   [Output] public double HerbageGrazedN;
   [Output] public double UreaReturned;  
   [Output] public double Fixation;
   [Output] public double LeachN;
   [Output] public double Denit;
   [Output] public double DenitN2O;
   [Output] public double OrgC;
   [Output] public double OrgN;
   [Output] public double dltOrgC;
   [Output] public double dltOrgN;
   [Output] public double MinN;
   [Output] public double UreaN;
   [Output] public double NH4N;
   [Output] public double NO3N;
   [Output] public double UreaAddedInGrazing;
   public int PatchCount;
   
   //patch type outputs etc.
   private int myPatchCount;
   [Output][Units("kgN/ha")] double[] patchesNO3;   // quantity of the no3 in the patch
   [Output][Units("kgN/ha")] double[] patchesNH4;   // quantity of the nh4 in the patch
   [Output][Units("kgN/ha")] double[] SamplePatchesNO3;  // as for patchesNO3 but only the sampled patches (for simulations with many patches)
   [Output][Units("kgN/ha")] double[] SamplePatchesNH4;  // as for patchesNH4 but only the sampled patches (for simulations with many patches)
   [Output][Units("ugN/g_water")] double[] patchesNO3conc600;  // concentration of no3-n in the water at 600 mm deep
   [Output][Units("ugN/g_water")] double[] SampleConc600;  // as for patchesNO3conc600 but only the sampled patches (for simulations with many patches)
   [Output][Units("kgN/ha")] double[] PercNH4;  // percentiles of NH4 in the patches 1=P0, 2=P5, 3=P10, 4=P25, 5=P50, 6=P75, 7=P90, 8=P95, 9=P100
   [Output][Units("kgN/ha")] double[] PercNO3;  // percentiles of NO3 in the patches 1=P0, 2=P5, 3=P10, 4=P25, 5=P50, 6=P75, 7=P90, 8=P95, 9=P100
   [Output][Units("kgN/ha")] double[] PercNO3Conc;  // percentiles of NO3-N concentration in the patches 1=P0, 2=P5, 3=P10, 4=P25, 5=P50, 6=P75, 7=P90, 8=P95, 9=P100
   int z600;  // index to 60 cm layer
   double[] PercentilesToCalc;
   
   private CNPatchVariableType myPatchNO3 = new CNPatchVariableType();
   private CNPatchVariableType myPatchNH4 = new CNPatchVariableType();
   
   int FirstSample;
   int LastSample;

   AgPasture AgPasture;
   SoilWat SoilWat;
   SoilN SoilNitrogen;
   Outputfile OutputComponent;
   
   double iniOrgC;
   double iniOrgN;
   
   bool ReportToday = false;
      
   [EventHandler] public void OnInitialised()
   {
      if (Verbose == "yes")
         Console.WriteLine("Initialising the Manager for grazing, urine return and reporting");
      
      DaysSinceReport = 0;
      PercentilesToCalc = new double[] { 0.0, 0.05, 0.01, 0.25, 0.50, 0.75, 0.9, 0.95, 1.0 };
      
      if (Verbose == "yes")
         Console.WriteLine("Finished initialising the Manager for grazing, urine return and reporting");

   } // end of Initialisation


   [EventHandler] public void OnPrepare()
   {
      if (Verbose == "yes")
         Console.WriteLine("In Prepare for the Reporting Manager on " + Clock.Today);

      // if this is the start of the simulation then sort out the depth for the urine placement, can't do this in initialisation because of the module order
      if (Clock.is_start_simulation)
      {
         iniOrgC = 0.0; 
         iniOrgN = 0.0;
         foreach (Paddock Paddock in Simulation.ChildPaddocks)
         {
            SoilNitrogen = (SoilN) Paddock.LinkByType("SoilN");
            SoilWat = (SoilWat) Paddock.LinkByType("SoilWat");

            SoilNitrogen.Get("PatchCount", out PatchCount); 

            for (int ii = 0; ii < SoilWat.dlayer.Length; ii++)
            {
               iniOrgC += SoilNitrogen.carbon_tot[ii]; 
               iniOrgN += SoilNitrogen.org_n[ii];
            }
         }
      }

      // should reporting be done today?  
      if (ReportingFreq == "Daily")
         ReportToday = true;
      else if ((ReportingFreq == "TenDaily") && ((Clock.day_of_month == 10) || (Clock.day_of_month == 20) || (Clock.is_end_month)))
         ReportToday = true;
      else if ((ReportingFreq == "Monthly") && (Clock.is_end_month))
         ReportToday = true;
      else if ((ReportingFreq == "Annual") && (Clock.is_end_year))
         ReportToday = true;
      else
         ReportToday = false;
      
      if (Verbose == "yes")
         Console.WriteLine("Finished Prepare for the Reporting Manager on " + Clock.Today);

   } // this is the end of Prepare


   [EventHandler] public void OnPost()
   {
      DaysSinceReport += 1;

      // each day gather data for the accumulations
      foreach (Paddock Paddock in Simulation.ChildPaddocks)
      {
         AgPasture = (AgPasture) Paddock.LinkByType("AgPasture");
         SoilWat = (SoilWat) Paddock.LinkByType("SoilWat");
         SoilNitrogen = (SoilN) Paddock.LinkByType("SoilN");

         SoilNitrogen.Get("PatchCount", out myPatchCount);
         
         if (Clock.is_start_simulation)
         {
            patchesNO3 = new double[myPatchCount];
            patchesNH4 = new double[myPatchCount];
            patchesNO3conc600 = new double[myPatchCount];
            NumberPatchesToSample = Math.Min(NumberPatchesToSample, myPatchCount); 
            SampleConc600 = new double[NumberPatchesToSample];
            SamplePatchesNO3 = new double[NumberPatchesToSample];
            SamplePatchesNH4 = new double[NumberPatchesToSample];
            PercNH4 = new double[9];
            PercNO3 = new double[9];
            PercNO3Conc = new double[9];
            
            // find the layer for 60 cm depth
            z600 = 0;
            double CumDepth = 0.0;
            for (int z = 0; z < SoilWat.dlayer.Length; z++)
            {
               if ((CumDepth <= 600.0) && ((CumDepth + SoilWat.dlayer[z]) >= 600.0))
                  z600 = z;
               CumDepth += SoilWat.dlayer[z];
            }

            // find out which patches to sample
            FirstSample = (myPatchCount / 2) - (NumberPatchesToSample / 2);  // this is integer division so is an implicit floor
            LastSample = FirstSample + NumberPatchesToSample - 1;
            if (Verbose == "yes")
               Console.WriteLine(NumberPatchesToSample + " patches will be sampled, these will be patches " + FirstSample + " to " + LastSample);
         }

         NHA += AgPasture.HerbageGrowthWt;
         PGR = NHA;  // divide this by the number of days just before reporting
         Fixation += AgPasture.FixedN;
         
         double[] tempArray = new double[SoilWat.dlayer.Length];
         SoilWat.Get("flow_no3", out tempArray);
         LeachN += tempArray[SoilWat.dlayer.Length - 1];

         for (int ii = 0; ii <= (SoilWat.dlayer.Length - 1); ii++)
         {
            Denit += SoilNitrogen.dnit[ii];
            DenitN2O += SoilNitrogen.n2o_atm[ii];
         }
         
         // get the patch level data sorted
         SoilNitrogen.GetObject("PatchNO3", ref myPatchNO3);
         SoilNitrogen.GetObject("PatchNH4", ref myPatchNH4);
         for(int j = 0; j < NumberPatchesToSample;j++)
            SampleConc600[j] = 0.0;

         int jj = 0;  // this is the sample number
         for(int k = 0; k < myPatchCount;k++)
         {
            patchesNO3[k] = 0.0;
            patchesNH4[k] = 0.0;
            patchesNO3conc600[k] = 0.0;

            for (int z = 0; z < SoilWat.dlayer.Length; z++)
            {
               patchesNO3[k] += myPatchNO3.Patch[k].Value[z];
               patchesNH4[k] += myPatchNH4.Patch[k].Value[z];
            }
            patchesNO3conc600[k] = myPatchNO3.Patch[k].Value[z600] * 100.0 / (SoilWat.sw_dep[z600]);
            
            if ((k >= FirstSample) && (k <= LastSample))
            {
               SampleConc600[jj] = patchesNO3conc600[k];
               SamplePatchesNO3[jj] = patchesNO3[k];
               SamplePatchesNH4[jj] = patchesNH4[k];
               jj += 1;  // this is the sampling counter
            }

         }
         
         // calculate percentiles
         for(int j = 0; j < 9; j++)
         {
            PercNH4[j] = Percentile(patchesNH4, PercentilesToCalc[j]);
            PercNO3[j] = Percentile(patchesNO3, PercentilesToCalc[j]);
            PercNO3Conc[j] = Percentile(patchesNO3conc600, PercentilesToCalc[j]);
         }
      }
      
      // Things that come from other Managers or modules at the current level
      HerbageGrazed += Grazed;
      HerbageGrazedN += GrazedN;
      UreaReturned += UrineNReturned;

      if (ReportToday)
      {
         OrgC = 0.0;
         OrgN = 0.0;
         UreaN = 0.0;
         NH4N = 0.0;
         NO3N = 0.0;
         MinN = 0.0;

         foreach (Paddock Paddock in Simulation.ChildPaddocks)
         {
            AgPasture = (AgPasture) Paddock.LinkByType("AgPasture");
            SoilWat = (SoilWat) Paddock.LinkByType("SoilWat");
            SoilNitrogen = (SoilN) Paddock.LinkByType("SoilN");

            for (int ii = 0; ii <= (SoilWat.dlayer.Length - 1); ii++)
            {
               OrgC += SoilNitrogen.carbon_tot[ii]; 
               OrgN += SoilNitrogen.org_n[ii];
               UreaN += SoilNitrogen.urea[ii];
               NH4N += SoilNitrogen.nh4[ii];
               NO3N += SoilNitrogen.no3[ii];
               MinN = UreaN + NH4N + NO3N;
            }
            dltOrgC = OrgC - iniOrgC; 
            dltOrgN = OrgN - iniOrgN;
            iniOrgC = OrgC; // ready for the next calculation of change in pools
            iniOrgN = OrgN;
         }

         PGR = NHA / DaysSinceReport;  

         // do the patch outputs here
         
         OutputComponent = (Outputfile) Simulation.LinkByName(OutputModule);  // should make the output component name a parameter
         OutputComponent.DoOutput();

         // now zero the reported variables
         DaysSinceReport = 0;
         HerbageGrazed = 0.0;
         HerbageGrazedN = 0.0;
         DaysSinceReport = 0;
         NHA = 0;
         PGR = 0;
         UreaReturned = 0;
         Fixation = 0;
         LeachN = 0;
         Denit = 0;
         DenitN2O = 0;
         OrgC = 0;
         OrgN = 0;
         MinN = 0;
         UreaN = 0;
         NH4N = 0;
         NO3N = 0;
      }
   } // end of Post

   public double Percentile(double[] sequence, double excelPercentile)
   {
      Array.Sort(sequence);
      int N = sequence.Length;
      double n = (N - 1) * excelPercentile + 1;

      if (n == 1d) return sequence[0];
      else if (n == N) return sequence[N - 1];
      else
      {
         int k = (int) n;
         double d = n - k;
         return sequence[k - 1] + d * (sequence[k] - sequence[k - 1]);
      }
   }

}
```
    metfile met: filename=%apsim%\Examples\MetFiles\WinchmoreMet.met
    clock
      start_date = 01/01/1972  # Enter the start date of the simulation
      end_date = 31/03/1972  # Enter the end date of the simulation
    summaryfile
    outputfile WholePaddock: filename=GriddedGrazedPaddock WholePaddock.out; title=GriddedGrazedPaddock WholePaddock; events=Freq
      variables Headers
        variables: NumPatches, dd/mmm/yyyy as Date, Year, Month
      variables Data
        variable:
          UreaReturned as UrineNReturned
          NumPatchesForUrine as PatchesUsed
          HerbageGrazed
          HerbageGrazedN
          LeachN
          Denit
          Fixation
          MinN
          UreaN
          NH4N
          NO3N
          dltOrgC
          dltOrgN
      variables Percentiles
        variables: PercNH4, PercNO3, PercNO3Conc
      variables Concentrations: variable=SampleConc600
      variables Amounts
        variables: SamplePatchesNO3, SamplePatchesNH4
      variables ListOfPatches: variable=ListOfPatches
    area Paddock
      folder Manager folder
        manager2 CentrePivot
          SetIrrigation = yes  # Turn irrigation component on or off
          # All Soils
          IrrigStart = 1-sep  # Start of irrigation season start (dd-mmm)
          IrrigEnd = 30-apr  # End of irrigation season (dd-mmm)
          SoilDepth = 500  # Enter the depth to which water deficit is computed (mm)
          CritPAWForShallow = 60  # PAW below which soil is considered "shallow" (mm)
          CritRainToPause = 30  # Amount of rainfall over the last 3 days to cause pause to irrigator (mm)
          DaysToPauseOnCritRain = 3  # Number of days to pause irrigator after critical rainfall (days)
          # Shallow Soils
          IrrigReturnShallow = 2  # Irrigation return period for shallow soils (days)
          IrrigAmtShallow = 10  # Effective irrigation amount for shallow soils (mm)
          PercPAWIrrigDeficitShallow = 30  # Percentage of PAW at which to irrigate shallow soils (%)
          IrrigEffShallow = 100  # Irrigation efficiency for shallow soils (%)
          # Deep Soils
          IrrigReturnDeep = 4  # Irrigation return period (days)
          IrrigAmtDeep = 20  # Effective irrigation amount (mm)
          IrrigDeficitDeep = 25  # Deficit at which to irrigate (mm)
          IrrigEffDeep = 100  # Irrigation efficiency for deep soils (%)
```vb
Imports System
Imports ModelFramework

Public Class Script 
   <Link()> Dim MyPaddock As Paddock
   <Link()> Dim MyIrrig As Irrigation
   <Link()> Dim MySWIM as SoilWat

   
   'Parameter variables:
   '<param> Private IrrigOn As String
   <param> Private SetIrrigation As String
   
   <param> Private IrrigStart As String
   <param> Private IrrigEnd As String
   <param> Private SoilDepth As Double
   <param> Private IrrigDeficitDeep As Double
   <param> Private IrrigReturnDeep As Double
   <param> Private IrrigAmtDeep As Double
   <param> Private PercPAWIrrigDeficitShallow As Double
   <param> Private IrrigReturnShallow As Double
   <param> Private IrrigAmtShallow As Double
   <param> Private CritPAWForShallow As Double
   <param> Private IrrigEffShallow As Double
   <param> Private IrrigEffDeep As Double

   <param> Private CritRainToPause As Double
   <param> Private DaysToPauseOnCritRain As Double
   
   
   'Variables read from other modules
   <Input> Private dd_mmm_yyyy As String
   <Input> Private dlayer As Double()      'mm
   <Input> Private rain As Double      'mm

   'Output variables
   <Output><Units("mm")> Public TodayDeficit As Double      '
   <Output><Units("mm")> Public TodayDeficit_nve As Double      '
   <Output><Units("")> Public IrrigDay As Double      '
   <Output><Units("")> Public SoilPAW As Double      '
   <Output><Units("")> Public IrrigDeficit As Double
   <Output><Units("")> Public IrrigReturn As Double
   <Output><Units("")> Public IrrigAmt As Double
   <Output><Units("")> Public IrrigEff As Double
   <Output><Units("mm")> Public Rain3 As Double
   <Output><Units("mm")> Public Rain_3(2) As Double
   <Output><Units("")> Public Days2Pause As Double


   Private StartDate As Date               'The date when irrigation start (in date format)
   Private EndDate As Date                 'The date when irrigation finish (in date format)
   Private IrrigDeficitShallow As Double
   
 
   
   <EventHandler()> Public Sub OnInit2()
      Console.writeline("============================================")
      Console.writeline("           CentrePivot initialising         ")
      Console.writeline()

      IrrigDay = 5000  'so will reset to 1 on first day
      StartDate = Date.Parse(IrrigStart)
      EndDate = Date.Parse(IrrigEnd)
      
      Rain3 = 0.0
      Rain_3(0) = 0.0: Rain_3(1) = 0.0: Rain_3(2) = 0.0
      
      SoilPAW = 0.0
      Dim sw_dul As Single() = MySwim.dul_dep
      Dim sw_15 As Single() = MySwim.ll15_dep         'sw at LL15 
      Dim MySoilDepth As Integer = 0
      For z As Integer = 0 To dlayer.length - 1
         MySoilDepth = MySoilDepth + dlayer(z)
         If MySoilDepth <= SoilDepth Then
            SoilPAW = SoilPAW + sw_dul(z) - sw_15(z)
         End If
      Next
      If SoilPAW <= CritPAWForShallow Then
         
         IrrigDeficit = PercPAWIrrigDeficitShallow / 100 * SoilPAW
         IrrigReturn = IrrigReturnShallow
         IrrigAmt = IrrigAmtShallow
         IrrigEff = IrrigEffShallow            
         Console.writeline("  Soil is considered to be shallow " & CritPAWForShallow & " " & SoilPAW)
      Else
         IrrigDeficit = IrrigDeficitDeep
         IrrigReturn = IrrigReturnDeep
         IrrigAmt = IrrigAmtDeep
         IrrigEff = IrrigEffDeep
         Console.writeline("  Soil is considered to be deep")
      End If

      Console.writeline("  Irrigation critical deficit (mm): " & IrrigDeficit.ToString)
      Console.writeline("          Irrigation return (days): " & IrrigReturn.ToString)
      Console.writeline("     Irrigation pumped amount (mm): " & IrrigAmt.ToString)
      Console.writeline("         Irrigation efficiency (%): " & IrrigEff.ToString)
      Console.writeline()
      Console.writeline("           CentrePivot initialised          ")
      Console.writeline("============================================")

   End Sub

   <EventHandler()> Public Sub OnPrepare()

      Rain_3(2) = Rain_3(1)
      Rain_3(1) = Rain_3(0)
      Rain_3(0) = rain
      Rain3 = Rain_3(0) + Rain_3(1) + Rain_3(2)
      If Rain3 >= CritRainToPause Then
         Days2Pause = DaysToPauseOnCritRain
      Else
         Days2Pause = Days2Pause - 1
      End If
      
      'Dim MyPaddock As New PaddockType(Me)
      Dim sw_dul As Single() = MySwim.dul_dep
      Dim sw_sw As Single() = MySwim.sw_dep         'sw at LL 
      Dim sw_15 As Single() = MySwim.ll15_dep         'sw at LL15 
      
      TodayDeficit = 0.0
      SoilPAW = 0.0
      Dim MySoilDepth As Integer = 0
         
      For z As Integer = 0 To dlayer.length - 1
         MySoilDepth = MySoilDepth + dlayer(z)
         If MySoilDepth <= SoilDepth Then
            SoilPAW = SoilPAW + sw_dul(z) - sw_15(z)
            TodayDeficit = TodayDeficit + sw_dul(z) - math.Min(sw_dul(z), sw_sw(z))
         End If
      Next
      TodayDeficit_nve = -1 * TodayDeficit 

      
      Dim today As Date = Date.Parse(dd_mmm_yyyy.Replace("_", "/"))
      If (isBetween(today, StartDate, EndDate)) Then
                  
         If SoilPAW <= CritPAWForShallow Then
            IrrigDeficit = PercPAWIrrigDeficitShallow / 100 * SoilPAW
            IrrigReturn = IrrigReturnShallow
            IrrigAmt = IrrigAmtShallow
            IrrigEff = IrrigEffShallow            
         Else
            IrrigDeficit = IrrigDeficitDeep
            IrrigReturn = IrrigReturnDeep
            IrrigAmt = IrrigAmtDeep
            IrrigEff = IrrigEffDeep
         End If
         
         If Days2Pause < 0.5 Then
            IrrigDay = IrrigDay + 1
            If IrrigDay > IrrigReturn Then
               IrrigDay = 1  ' and day = 1 is when the irrigation happens
            End If
      
            If (TodayDeficit >= IrrigDeficit) And (SetIrrigation.ToLower = "yes") Then
               If IrrigDay = 1 Then
                  Dim IrrigData As IrrigationApplicationType = New IrrigationApplicationType()
                  IrrigData.Amount = (IrrigAmt / (IrrigEff / 100.0))
                  MyIrrig.Apply(IrrigData)
                  'Console.WriteLine("Applying " & (IrrigAmt / (IrrigEff / 100.0)) & " mm of irrigation")
               End If
            End If
         End If
      End If
         

   End Sub

   Private Function isBetween(ByVal today As Date, ByVal start As Date, ByVal finish As Date) As Boolean
      Dim a As Date = New Date(today.Year, start.Month, start.Day)
      Dim b As Date = New Date(today.Year, finish.Month, finish.Day)

      If (a > b) Then
         Return (today >= a Or today <= b)
      Else
         Return (today >= a And today <= b)
      End If
   End Function
   
End Class
```
      SoilTemperature2
        MaxTTimeDefault = 14
        BoundaryLayerConductanceSource = calc
        BoundaryLayerConductance = 20
        BoundaryLayerConductanceIterations = 1
        NetRadiationSource = calc
        DefaultWindSpeed = 3
        DefaultAltitude = 18
        DefaultInstrumentHeight = 1.2
        BareSoilHeight = 57
      surfaceom surface organic matter
        PoolName = grass  # Organic Matter pool name
        type = grass  # Organic Matter type
        mass = 500  # Initial surface residue (kg/ha)
        cnr = 10  # C:N ratio of initial residue
        standing_fraction = 0  # Fraction of residue standing
      micromet
        soilalbedo = 0.23
        a_interception = 0
        b_interception = 0
        c_interception = 0
        d_interception = 0
      irrigation
        automatic_irrigation = off
        asw_depth = 300  # Depth to which ASW is calculated. (mm)
        crit_fr_asw = 0.85  # Fraction of ASW below which irrigation is applied (0-1.0)
        irrigation_efficiency = 1.0  # Efficiency of the irrigation. (0-1.0)
        irrigation_allocation = off  # Allocation limits
        allocation = 0  # Allocation in ML
        default_no3_conc = 0  # Nitrate concentration (ppm N)
        default_nh4_conc = 0  # Ammonium concentration (ppm N)
        default_cl_conc = 0  # Chloride concentration (ppm Cl)
        default_no3_conc = 0  # Nitrate concentration (ppm N)
        default_nh4_conc = 0  # Ammonium concentration (ppm N)
        default_cl_conc = 0  # Chloride concentration (ppm Cl)
      fertiliser
      AgPasture
        # Initial values for each species to be simulated
        SpeciesToSimulate = Ryegrass    WhiteClover  # Name of the species to be simulated
        InitialShootDM = 750   250  # Initial above ground dry matter weight (kgDM/ha)
        InitialRootDM = 450     150  # Initial root dry matter weight (kgDM/ha)
        InitialRootDepth = 900     300  # Initial rooting depth (mm)
        WaterUptakeSource = calc  # Water uptake done by AgPasture (calc) or by apsim?
        # Detailed parameters for each species (overwrites the xml file)
        UseHeatStressFactor = yes    yes  # Consider effects of high temperatures on photosynthesis? (yes/no)
        HeatOnsetTemperature = 26.0    30.0  # Onset temperature for heat effects on growth (oC)
        HeatFullTemperature = 32.5    35.0  # Temperature for full heat effects on growth (oC)
        HeatRecoverySumDD = 20.0    20.0  # Temperature sum for recovery from heat effects (oC)
        HeatRecoveryTReference = 25.0    25.0  # Base temperature for recovery from heat stress (oC)
        UseColdStressFactor = yes    yes  # Consider effects of low temperatures on photosynthesis? (yes/no)
        ColdOnsetTemperature = 0.0      0.0  # Onset temperature for cold effects on growth (oC)
        ColdFullTemperature = -10.0     -5.0  # Temperature for full cold effects on growth (oC)
        ColdRecoverySumDD = 10.0    10.0  # Temperature sum for recovery from cold effects (oC)
        ColdRecoveryTReference = 0.0      0.0  # Base temperature for recovery from cold effects (oC)
      Soil HE_140mm: SoilType=MergeAge40; Region=Plains; State=Canterbury; Country=New Zealand; Latitude=0; Longitude=0; YearOfSampling=0
        DataSource=Generic profile descriptions provided by Trevor Webb and data for functional horizions based on SWAMP project results
        Comments=Bulk density values were measured on the fine earth fraction so values entered into apsim soil are adjusted down to account for stone content (assuming stones are inert from all soil process so their mass and volume is removed from model paramaters).  SAT, DUL, LL15 and Air dry have been adjusted down to account for stone content.  OC has not been adjusted so the model will get the correct carbon and N amounts using the adjusted BD.
        Water
          Thickness  BD      AirDry   LL15    DUL     SAT       KS
          200        1.3105  0.07675  0.1535  0.3735  0.456165  4832.04
          150        1.524   0.201    0.201   0.332   0.39432   389.229
          200        1.42    0.2985   0.2985  0.426   0.441525  21.6
          350        1.424   0.308    0.308   0.446   0.4557    19.0512
          150        1.424   0.308    0.308   0.446   0.456     19.051
          150        1.601   0.162    0.162   0.325   0.376     97.995
          300        1.601   0.162    0.162   0.325   0.376     97.995
          SoilCrop AgPasture: LL=[0.154, 0.201, 0.299, 0.308, 0.308, 0.162, 0.162]; KL=[0.1, 0.1, 0.1, 0.05, 0.05, 0.05, 0.05]; XF=[1, 0.8, 0.8, 0.3, 0, 0, 0]
        SoilOrganicMatter: RootCN=40; RootWt=1000; SoilCN=11; EnrACoeff=7.4; EnrBCoeff=0.2; OCUnits=Total
          Thickness  OC     FBiom   FInert
          200        4.502  0.048   0.382
          150        1.91   0.027   0.634
          200        0.772  0.0195  0.784
          350        0.422  0.015   0.924
          150        0.422  0.015   0.924
          150        0.402  0.015   0.971
          300        0.4    0.015   0.985
        Analysis: PHUnits=Water; BoronUnits=HotWater
          Thickness  Rocks  PH  CEC  ParticleSizeSand  ParticleSizeSilt  ParticleSizeClay
          200        0      6   13   14.5              65.5              20
          150        0      6   9    18                58                24
          200        0      6   19   13                48                39
          350        0      6   19   1                 55                44
          150        0      6   19   1                 55                44
          150        0      6   9    15                66                19
          300        0      6   9    15                66                19
        SoilWater: SummerCona=4.4; SummerU=9; SummerDate=1-Oct; WinterCona=3; WinterU=6; WinterDate=1-Apr; DiffusConst=88; DiffusSlope=35; Salb=0.13; CN2Bare=73; CNRed=20; CNCov=0.8; Thickness=[200, 150, 200, 350, 150, 150, 300]
          SWCON=[0.496442, 0.365575, 0.373877, 0.0758548, 0.076, 0.306, 0.306]
        InitialWater: FractionFull=1; PercentMethod=FilledFromTop
        Sample Initial nitrogen: NO3Units=kgha; NH4Units=kgha
          Thickness  NO3  NH4
          80         25   1
          50         20   1
          200        15   1
          670        10   1
