folder SoilNitrogen_CNPatch_VariabilityTests: version=36; creator=Apsim 7.7-r3765
  memo Info
                                                           Testing SoilNitrogen - SoilCNPatches

        These simulations are for testing the handling of patches within SoilNitrogen. These tests check that the
      creation and merging of patches is happening,  that 'stuff' (C or n amounts) is being added to the patches,
      and exposes the potential deviations created by simulating soil variability using SoilNitrogen internal patches
      instead of having several paddocks with explicitly declared variability.

       General setup:
          - All simulations use basically the same soil (physical characteristics, which comprise a light and a heavy soil
             in each simulation), and management;
          - The soil is basically  described using SoilWat, but there are also tests using SWIM and SoilWater;
          - Simulations focus primarily on bare soil, but all tests include simulations with wheat and AgPasture;
          - There are two sets of simulations, in the first (AddOnly) patches are created and some solute is added during
             the simulation, while in the second (AddMerge), the patches are added and merged during the simulation;

       General result expected:
          - The results from the two paddocks should show some differences, especially when plants are present (flow on
             effect of the variability in uptake)
  folder SoilCNPatch-AddOnly
    memo Info
      ++++++++++++++++++++  TEST AddOnly  ++++++++++++++++++++++++++++++++++++++++++++++++++++++

           These simulations are for testing the initialisation/creation of patches within SoilNitrogen. Plus adding 'stuff'.
           The patches do vary, i.e., newly created patches are different from old ones due to addition of 'stuff' (C or N).
        So, the presence of patches should make a considerable difference on the outputs of each simulation, when
        compared to the simulation with explicitly defined patches.
            The comparison is made between simulations with soil variability simulated explicilty (using multiple paddocks)
        against the simulations with patches added internally to SoilNitrogen only.  The results from these simulations
        should have noticiable but small differences with those from the simulations with explicity patches The time spent
        to complete the simulations will increase for those simulations with large number of patches.
    folder Test01-Bare+addUrea
      memo Info
        ++++++++++++++++++++  TEST 01 +++++++++++++++++++++++++++++++++++++++++++++++++++++++++++

           Description:
              - Artificial climate, smooth mild temperate;
              - Two generic soils, a free draining and a poorly drained;
              - Bare soil;
              - No initial mineral N;
              - No initial soil organic matter;
              - No initial surface residues;
              - No additions of residues;
              - Urea added as a patch, 100kgN/ha into 25% of the area

              > First simulation has two explicit patches (two paddocks)
              > Second simulation has internal patches (soilCNpatches)

           Expected output:
              - All outputs with valid values (numeric mostly);
              - Most values equal to zero, as there are no mineral solutes or organic pools;
              - Very little differences between simulations as the patches are bare (don't have any C);
      PlugIns
        PlugIn=[%apsim%\UserInterface\ApsimUIPlugIn.xml, %apsim%\UserInterface\SoilTypes.xml, %apsim%\UserInterface\Graph.xml, %apsim%\UserInterface\Ausfarm.xml, %apsim%\UserInterface\DevelopersPlugIn.xml, %apsim%\Model\SlurryTank.xml, %apsim%\Model\PHmodel.xml, %apsim%\Model\simpleBuilding.xml, %apsim%\Model\atmosphere.xml, %apsim%\Model\Accum.xml, %apsim%\Model\AgPasture.xml, %apsim%\Model\Bambatsi.xml, %apsim%\Model\Barley.xml, %apsim%\Model\Br.xml, %apsim%\Model\Bore.xml, %apsim%\Model\Broccoli.xml, %apsim%\Model\ButterflyPea.xml, %apsim%\Model\Canola.xml, %apsim%\Model\Canopy.xml, %apsim%\Model\Centro.xml, %apsim%\Model\Channel.xml, %apsim%\Model\Chickpea.xml, %apsim%\Model\Cl.xml, %apsim%\Model\Climatechange.xml, %apsim%\Model\Clock.xml, %apsim%\Model\Cotton2.xml, %apsim%\Model\Cowpea.xml, %apsim%\Model\CropUI.xml, %apsim%\Model\Dam.xml, %apsim%\Model\DCD.xml, %apsim%\Model\EGrandis.xml, %apsim%\Model\EMelliodora.xml, %apsim%\Model\Eo.xml, %apsim%\Model\EPopulnea.xml, %apsim%\Model\Erosion.xml, %apsim%\Model\Events.xml, %apsim%\Model\Fababean.xml, %apsim%\Model\Factorial.xml, %apsim%\Model\Factor.xml, %apsim%\Model\FactorComplex.xml, %apsim%\Model\FrenchBean.xml, %apsim%\Model\Fertiliser.xml, %apsim%\Model\Fieldpea.xml, %apsim%\Model\Gcm_data.xml, %apsim%\Model\Grasp.xml, %apsim%\Model\Graz.xml, %apsim%\Model\Growth.xml, %apsim%\Model\Horsegram.xml, %apsim%\Model\Ini.xml, %apsim%\Model\InitWater.xml, %apsim%\Model\Input.xml, %apsim%\Model\Irrigation.xml, %apsim%\Model\KWTest.xml, %apsim%\Model\Lablab.xml, %apsim%\Model\Lettuce.xml, %apsim%\Model\Log.xml, %apsim%\Model\Lucerne.xml, %apsim%\Model\Lupin.xml, %apsim%\Model\Maize.xml, %apsim%\Model\MaizeZ.xml, %apsim%\Model\Manager.xml, %apsim%\Model\Map.xml, %apsim%\Model\Memo.xml, %apsim%\Model\MetFile.xml, %apsim%\Model\MicroMet.xml, %apsim%\Model\Millet.xml, %apsim%\Model\Millet1.xml, %apsim%\Model\Millet2.xml, %apsim%\Model\Millet3.xml, %apsim%\Model\Millet4.xml, %apsim%\Model\Millet5.xml, %apsim%\Model\Mucuna.xml, %apsim%\Model\Mungbean.xml, %apsim%\Model\Navybean.xml, %apsim%\Model\Oats.xml, %apsim%\Model\Ocean_data.xml, %apsim%\Model\Operations.xml, %apsim%\Model\Orobanche.xml, %apsim%\Model\Oryza.xml, %apsim%\Model\Oryza2.xml, %apsim%\Model\OutputFile.xml, %apsim%\Model\Ozcot.xml, %apsim%\Model\Patchinput.xml, %apsim%\Model\Peanut.xml, %apsim%\Model\Pigeonpea.xml, %apsim%\Model\Pond.xml, %apsim%\Model\Potato.xml, %apsim%\Model\RotPlot.xml, %apsim%\Model\RugPlotUI.xml, %apsim%\Model\Root.xml, %apsim%\Model\Rule.xml, %apsim%\Model\Script.xml, %apsim%\Model\Seedling.xml, %apsim%\Model\SiloInput.xml, %apsim%\Model\Slurp.xml, %apsim%\Model\Soi.xml, %apsim%\Model\Soil.xml, %apsim%\Model\SoilNui.xml, %apsim%\Model\SoilTemp.xml, %apsim%\Model\Sorghum.xml, %apsim%\Model\SorghumConstants.xml, %apsim%\Model\SorghumGenotype.xml, %apsim%\Model\Soybean.xml, %apsim%\Model\Stylo.xml, %apsim%\Model\Sugar.xml, %apsim%\Model\Summaryfile.xml, %apsim%\Model\Sunflower.xml, %apsim%\Model\SurfaceOM.xml, %apsim%\Model\SweetCorn.xml, %apsim%\Model\SweetSorghum.xml, %apsim%\Model\SWIM2.xml, %apsim%\Model\SWIM2ui.xml, %apsim%\Model\SWIM2ui2.xml, %apsim%\Model\Sysbal.xml, %apsim%\Model\SysBal2.xml, %apsim%\Model\Tcllink.xml, %apsim%\Model\Tclmanager.xml, %apsim%\Model\Tclui.xml, %apsim%\Model\TextOutput.xml, %apsim%\Model\Tracker.xml, %apsim%\Model\Tree.xml, %apsim%\Model\Variables.xml, %apsim%\Model\Venlink.xml, %apsim%\Model\vine.xml, %apsim%\Model\WaterSupply.xml, %apsim%\Model\Weed.xml, %apsim%\Model\Wheat.xml, %apsim%\Model\YPCalc.xml, %apsim%\Model\UrinePatch.xml, %apsim%\Model\Soil with new nitrogen model.xml, %apsim%\Model\SoilNitrogen.xml, %apsim%\Model\Soil with new water and nitrogen models.xml]
      simulation Sim01-ExplicitPatches
        clock
          start_date = 01/07/2000
          end_date = 31/12/2000
        metfile met: filename=%apsim%\Examples\MetFiles\MildTemperate.met
        summaryfile
        area Paddock1-base-LightSoil
          folder ManagerFolder
            manager2 Aux-Outputs
              # This script help to organise some outputs
```csharp
using System;
using ModelFramework;

public class Script 
{      

   [Link] Paddock myPaddock;
   
   [Input(IsOptional=true)] double[] n_demanded;
   [Input(IsOptional=true)] double n_uptake;
   [Input(IsOptional=true)] double totaln;
   [Input(IsOptional=true)] double totalwt;
   [Input(IsOptional=true)] double ep;

   [Input] double[] dlayer;
   
   [Input(IsOptional=true)] double[] NitrogenSupplyLayers;
   [Input(IsOptional=true)] double NitrogenUptake;
   [Input(IsOptional=true)] double TotalPlantN;
   [Input(IsOptional=true)] double TotalPlantWt;
   [Input(IsOptional=true)] double WaterUptake;
      
   [Output][Units("")] string SoilName;
   [Output][Units("kg/ha")] double PlantNUptake;
   [Output][Units("kg/ha")] double PlantTotalN;
   [Output][Units("kg/ha")] double PlantTotalC;
   [Output][Units("mm")] double PlantTranspiration;
   
   [EventHandler] public void OnInitialised()
   {
      Console.WriteLine("     Initialising");

      foreach(Component myModule in myPaddock.Children)
      {
         if(myModule.Name.Contains(" Nitrogen"))
         {
            SoilName = myModule.Name.Split(' ')[0];
         }
      }
   }

   [EventHandler] public void OnPost()
   {
      if (n_demanded != null)
      {
         PlantNUptake = n_uptake;
         PlantTotalN = totaln;
         PlantTotalC = 0.4 * totalwt;
         PlantTranspiration = ep;
      }
      else if (NitrogenSupplyLayers != null)
      {
         PlantNUptake = NitrogenUptake;
         PlantTotalN = TotalPlantN;
         PlantTotalC = 0.4 * TotalPlantWt;
         PlantTranspiration = WaterUptake;
      }
      else
      {
         PlantTotalN = 0.0;
         PlantTranspiration = 0.0;
      }
   }
}
```
          fertiliser
          surfaceom SurfaceOrganicMatter
            PoolName = Residue1  # Organic Matter pool name
            type = grass  # Organic Matter type
            mass = 0  # Initial surface residue (kg/ha)
            cnr = 20  # C:N ratio of initial residue
            standing_fraction = 0  # Fraction of residue standing
          Soil Med-LightSoil: LocalName=Generic medium-light sedimentary soil; Country=New Zealand; Latitude=0; Longitude=0
            DataSource=Hypothetical medium to light texture soil of sedimentary origin (moderately high drainage)
            Analysis: PHUnits=Water; BoronUnits=HotWater
              Thickness  PH   CEC  ParticleSizeSand  ParticleSizeSilt  ParticleSizeClay
              150        6.5  15   30                60                10
              150        6.5  14   30                60                10
              300        6.5  10   30                60                10
              300        6.5  6    30                60                10
              300        6.5  5    30                60                10
              300        6.5  5    30                60                10
            Water
              Thickness  BD    AirDry  LL15  DUL    SAT   KS
              150        1.1   0.075   0.12  0.34   0.52  10000
              150        1.05  0.15    0.15  0.35   0.5   8500
              300        1.1   0.16    0.16  0.345  0.49  7500
              300        1.15  0.15    0.15  0.33   0.48  7500
              300        1.22  0.14    0.14  0.315  0.46  8000
              300        1.3   0.13    0.13  0.3    0.45  10000
              SoilCrop agpasture: LL=[0.12, 0.15, 0.16, 0.15, 0.14, 0.13]; KL=[0.2, 0.2, 0.1, 0.05, 0, 0]; XF=[1, 1, 1, 1, 0, 0]
              SoilCrop wheat: LL=[0.12, 0.15, 0.16, 0.15, 0.14, 0.13]; KL=[0.2, 0.2, 0.1, 0.05, 0, 0]; XF=[1, 1, 1, 1, 0, 0]
            SoilWater: SummerCona=3; SummerU=5; SummerDate=1-Nov; WinterCona=3; WinterU=5; WinterDate=1-Apr; DiffusConst=88; DiffusSlope=35; Salb=0.13; CN2Bare=50; CNRed=20; CNCov=0.8; Thickness=[150, 150, 300, 300, 300, 300]; SWCON=[0.5, 0.45, 0.4, 0.4, 0.4, 0.4]
            SoilOrganicMatter: RootCN=30; RootWt=0; SoilCN=12.5; EnrACoeff=7.4; EnrBCoeff=0.2; OCUnits=Total
              Thickness  OC  FBiom  FInert
              150        0   0.035  0.4
              150        0   0.025  0.55
              300        0   0.015  0.765
              300        0   0.01   0.9
              300        0   0.01   0.95
              300        0   0.01   0.994
            Sample Initial nitrogen: NO3Units=kgha; NH4Units=kgha; SWUnits=Volumetric; OCUnits=Total; PHUnits=Water
              Thickness  NO3  NH4
              150        0    0
              150        0    0
              300        0    0
              300        0    0
              300        0    0
              300        0    0
            InitialWater: FractionFull=1; PercentMethod=EvenlyDistributed; RelativeTo=ll15
          outputfile Results: filename=Sim01-ExplicitPatches Paddock1-base-LightSoil Results.out; title=Sim01-ExplicitPatches Paddock1-base-LightSoil Results
            variables
              variable:
                dd/mmm/yyyy as Date
                day as DoY
                urea() as UreaTotal format 5
                nh4() as NH4Total format 5
                no3() as NO3Total format 5
                surfaceom_n as SurfaceOM_N format 5
                fom_n() as FOM_N format 5
                biom_n() as Biom_N format 5
                hum_n() as Hum_N format 5
                PlantTotalN as PlantTotalN format 5
                fertiliser as FertiliserN format 5
                dlt_urea_hydrol() as HydrolisedN format 5
                nitrification() as NitrifiedN format 5
                dnit() as DenitrifiedN format 5
                leach_no3 as LeachedNO3 format 5
                dlt_n_min_res() as NetMineralisedResidue format 5
                dlt_n_min_tot() as NetMineralisedHumus format 5
                n2o_atm() as N2Oemissions format 5
                dlt_n_loss_in_sed as dltN_sediments format 5
                PlantNUptake format 5
                surfaceom_c as SurfaceOM_C format 5
                fom_c() as FOM_C format 5
                biom_c() as Biom_C format 5
                hum_c() as Hum_C format 5
                oc() as OCTotal format 5
                PlantTotalC format 5
                dlt_res_c_atm as CO2fromResidues format 5
                dlt_fom_c_atm() as CO2fromFOM format 5
                dlt_biom_c_atm() as CO2fromMBiomass format 5
                dlt_hum_c_atm() as CO2fromHumus format 5
                dlt_c_loss_in_sed as dltC_sediments format 5
                es as Evaporation format 5
                PlantTranspiration as PlantTranspiration format 5
                drain as Drain format 5
                Runoff format 5
                SoilName
                PatchCount as NumPatches
            events ReportingFrequency: event=end_day
        area Paddock1-patch-LightSoil -> /SoilNitrogen_CNPatch_VariabilityTests/SoilCNPatch-AddOnly/Test01-Bare+addUrea/Sim01-ExplicitPatches/Paddock1-base-LightSoil
          folder ManagerFolder -> /SoilNitrogen_CNPatch_VariabilityTests/SoilCNPatch-AddOnly/Test01-Bare+addUrea/Sim01-ExplicitPatches/Paddock1-base-LightSoil/ManagerFolder
            operations AddUrine
              15-Aug  Fertiliser apply amount=100 (kg/ha), depth=1 (mm), type=urea_n
          outputfile Results -> /SoilNitrogen_CNPatch_VariabilityTests/SoilCNPatch-AddOnly/Test01-Bare+addUrea/Sim01-ExplicitPatches/Paddock1-base-LightSoil/Results: filename=Sim01-ExplicitPatches Paddock1-patch-LightSoil Results.out; title=Sim01-ExplicitPatches Paddock1-patch-LightSoil Results
            variables -> /SoilNitrogen_CNPatch_VariabilityTests/SoilCNPatch-AddOnly/Test01-Bare+addUrea/Sim01-ExplicitPatches/Paddock1-base-LightSoil/Results/Variables
            events ReportingFrequency -> /SoilNitrogen_CNPatch_VariabilityTests/SoilCNPatch-AddOnly/Test01-Bare+addUrea/Sim01-ExplicitPatches/Paddock1-base-LightSoil/Results/ReportingFrequency
        area Paddock2-base-HeavySoil
          folder ManagerFolder
            manager2 Aux-Outputs -> /SoilNitrogen_CNPatch_VariabilityTests/SoilCNPatch-AddOnly/Test01-Bare+addUrea/Sim01-ExplicitPatches/Paddock1-base-LightSoil/ManagerFolder/Aux-Outputs
          fertiliser
          surfaceom SurfaceOrganicMatter -> /SoilNitrogen_CNPatch_VariabilityTests/SoilCNPatch-AddOnly/Test01-Bare+addUrea/Sim01-ExplicitPatches/Paddock1-base-LightSoil/SurfaceOrganicMatter
          Soil Med-HeavySoil: LocalName=Generic medium-heavy sedimentary soil; Country=New Zealand; Latitude=0; Longitude=0
            DataSource=Hypothetical medium to heavy texture soil of sedimentary origin (moderately poorly drained)
            Analysis: PHUnits=Water; BoronUnits=HotWater
              Thickness  PH   CEC  ParticleSizeSand  ParticleSizeSilt  ParticleSizeClay
              150        6.5  15   10                60                30
              150        6.5  15   10                60                30
              300        6.5  13   10                60                30
              300        6.5  10   10                60                30
              300        6.5  8    10                60                30
              300        6.5  7.5  10                60                30
            Water
              Thickness  BD    AirDry  LL15   DUL   SAT    KS
              150        1.1   0.18    0.23   0.41  0.52   75
              150        1.05  0.25    0.25   0.44  0.51   75
              300        1.1   0.28    0.28   0.46  0.503  50
              300        1.15  0.29    0.29   0.46  0.495  25
              300        1.22  0.295   0.295  0.45  0.483  25
              300        1.3   0.3     0.3    0.44  0.47   50
              SoilCrop agpasture: LL=[0.23, 0.25, 0.28, 0.29, 0.295, 0.3]; KL=[0.2, 0.15, 0.06, 0.02, 0, 0]; XF=[1, 1, 1, 1, 0, 0]
              SoilCrop wheat: LL=[0.23, 0.25, 0.28, 0.29, 0.295, 0.3]; KL=[0.2, 0.15, 0.06, 0.02, 0, 0]; XF=[1, 1, 1, 1, 0, 0]
            SoilWater: SummerCona=3; SummerU=5; SummerDate=1-Nov; WinterCona=3; WinterU=5; WinterDate=1-Apr; DiffusConst=88; DiffusSlope=35; Salb=0.13; CN2Bare=75; CNRed=20; CNCov=0.8; Thickness=[150, 150, 300, 300, 300, 300]; SWCON=[0.3, 0.25, 0.2, 0.19, 0.18, 0.2]
            SoilOrganicMatter: RootCN=30; RootWt=0; SoilCN=12.5; EnrACoeff=7.4; EnrBCoeff=0.2; OCUnits=Total
              Thickness  OC  FBiom  FInert
              150        0   0.035  0.5
              150        0   0.025  0.65
              300        0   0.015  0.835
              300        0   0.01   0.94
              300        0   0.01   0.97
              300        0   0.01   0.996
            Sample Initial nitrogen -> /SoilNitrogen_CNPatch_VariabilityTests/SoilCNPatch-AddOnly/Test01-Bare+addUrea/Sim01-ExplicitPatches/Paddock1-base-LightSoil/Med-LightSoil/Initial nitrogen
            InitialWater: FractionFull=1; PercentMethod=EvenlyDistributed; RelativeTo=ll15
          outputfile Results -> /SoilNitrogen_CNPatch_VariabilityTests/SoilCNPatch-AddOnly/Test01-Bare+addUrea/Sim01-ExplicitPatches/Paddock1-base-LightSoil/Results: filename=Sim01-ExplicitPatches Paddock2-base-HeavySoil Results.out; title=Sim01-ExplicitPatches Paddock2-base-HeavySoil Results
            variables -> /SoilNitrogen_CNPatch_VariabilityTests/SoilCNPatch-AddOnly/Test01-Bare+addUrea/Sim01-ExplicitPatches/Paddock1-base-LightSoil/Results/Variables
            events ReportingFrequency -> /SoilNitrogen_CNPatch_VariabilityTests/SoilCNPatch-AddOnly/Test01-Bare+addUrea/Sim01-ExplicitPatches/Paddock1-base-LightSoil/Results/ReportingFrequency
        area Paddock2-patch-HeavySoil -> /SoilNitrogen_CNPatch_VariabilityTests/SoilCNPatch-AddOnly/Test01-Bare+addUrea/Sim01-ExplicitPatches/Paddock2-base-HeavySoil
          outputfile Results -> /SoilNitrogen_CNPatch_VariabilityTests/SoilCNPatch-AddOnly/Test01-Bare+addUrea/Sim01-ExplicitPatches/Paddock2-base-HeavySoil/Results: filename=Sim01-ExplicitPatches Paddock2-patch-HeavySoil Results.out; title=Sim01-ExplicitPatches Paddock2-patch-HeavySoil Results
            variables -> /SoilNitrogen_CNPatch_VariabilityTests/SoilCNPatch-AddOnly/Test01-Bare+addUrea/Sim01-ExplicitPatches/Paddock2-base-HeavySoil/Results/Variables
            events ReportingFrequency -> /SoilNitrogen_CNPatch_VariabilityTests/SoilCNPatch-AddOnly/Test01-Bare+addUrea/Sim01-ExplicitPatches/Paddock2-base-HeavySoil/Results/ReportingFrequency
        manager2 Aux-SumOutputs1
          # This script sums up variables from two paddocks
          Pdk01Name = Paddock1-base-LightSoil  # Name of first paddock
          Pdk01Area = 0.75  # Relative area of first paddock [0-1]
          Pdk02Name = Paddock1-patch-LightSoil  # Name of second paddock
          Pdk02Area = 0.25  # Relative area of second paddock [0-1]
```csharp
using System;
using ModelFramework;

public class Script 
{     

   [Param] private string Pdk01Name;
   [Param] private double Pdk01Area;
   [Param] private string Pdk02Name;
   [Param] private double Pdk02Area;
   
   [Link] Simulation myBlock;
   
   [Output][Units("mm")] public double[] dlayer_p1;
   [Output][Units("mm")] public double es_p1;
   [Output][Units("mm")] public double[] sw_uptake_p1;
   [Output][Units("mm")] public double drain_p1;
   [Output][Units("mm")] public double runoff_p1;
   [Output][Units("mm")] public double pond_p1;

   [Output][Units("kg/ha")] public double[] urea_p1;
   [Output][Units("kg/ha")] public double[] nh4_p1;
   [Output][Units("kg/ha")] public double[] no3_p1;
   [Output][Units("kg/ha")] public double[] fom_n_p1;
   [Output][Units("kg/ha")] public double[] biom_n_p1;
   [Output][Units("kg/ha")] public double[] hum_n_p1;
   [Output][Units("kg/ha")] public double surfaceom_n_p1;
   [Output][Units("kg/ha")] public double PlantN_p1;
   [Output][Units("kg/ha")] public double PlantNuptake_p1;
   [Output][Units("kg/ha")] public double Fertiliser_p1;

   [Output][Units("kg/ha")] public double[] fom_c_p1;
   [Output][Units("kg/ha")] public double[] biom_c_p1;
   [Output][Units("kg/ha")] public double[] hum_c_p1;
   [Output][Units("%")] public double[] oc_p1;
   [Output][Units("kg/ha")] public double surfaceom_c_p1;
   [Output][Units("kg/ha")] public double PlantC_p1;

   [Output][Units("kg/ha")] public double leach_no3_p1;
   [Output][Units("kg")] public double dlt_n_loss_in_sed_p1;
   [Output][Units("kg/ha")] public double[] dlt_urea_hydrol_p1;
   [Output][Units("kg/ha")] public double[] nitrification_p1;
   [Output][Units("kg/ha")] public double[] dnit_p1;
   [Output][Units("kg/ha")] public double[] dlt_n_min_res_p1;
   [Output][Units("kg/ha")] public double[] dlt_n_min_tot_p1;
   [Output][Units("kg/ha")] public double[] n2o_atm_p1;

   [Output][Units("kg/ha")] public double dlt_res_c_atm_p1;
   [Output][Units("kg/ha")] public double[] dlt_fom_c_atm_p1;
   [Output][Units("kg/ha")] public double[] dlt_biom_c_atm_p1;
   [Output][Units("kg/ha")] public double[] dlt_hum_c_atm_p1;
   [Output][Units("kg")] public double dlt_c_loss_in_sed_p1;
     
   [Output][Units("")] public string SoilName_p1;
   
   [Output] string SoilName2;

   private int nLayers;
   private SoilN[] mySoilN;
   private SoilWat[] mySoilW;
   private SurfaceOM[] mySurfOM;
   private Wheat[] myPlant;
   private AgPasture[] myPasture;
   private Fertiliser[] myFert;
   private double[] RelativeArea;
      
   [EventHandler] public void OnInitialised()
   {
      // basic input parameters
      nLayers = 6;
      string[] PaddockNames = new string[2];
      PaddockNames[0] = Pdk01Name;
      PaddockNames[1] = Pdk02Name;
      RelativeArea = new double[2];
      RelativeArea[0] = Pdk01Area;
      RelativeArea[1] = Pdk02Area;

      // link to various modules
      mySoilN = new SoilN[2];
      mySoilW = new SoilWat[2];
      mySurfOM = new SurfaceOM[2];
      myPlant = new Wheat[2];
      myPasture = new AgPasture[2];
      myFert = new Fertiliser[2];

      Console.WriteLine("     Initialising");
      int pdk = -1;
      int PdkFound = 0;
      foreach(Paddock ThisPaddock in myBlock.ChildPaddocks)
      {
         if(ThisPaddock.Name == PaddockNames[0])
         {
            pdk = 0;
            PdkFound += 1;
            foreach(Component myModule in ThisPaddock.Children)
            {
               if(myModule.Name.Contains(" Nitrogen"))
               {
                  SoilName_p1 = myModule.Name.Split(' ')[0];
               }
            }
         }
         else if(ThisPaddock.Name == PaddockNames[1])
         {
            pdk = 1;
            PdkFound += 1;
         }

         if(pdk >= 0 && PdkFound <= 2)
         {
            mySoilN[pdk] = (SoilN) ThisPaddock.LinkByType("SoilN");
            mySoilW[pdk] = (SoilWat) ThisPaddock.LinkByType("SoilWat");
            mySurfOM[pdk] = (SurfaceOM) ThisPaddock.LinkByType("SurfaceOM");
            myPlant[pdk] = (Wheat) ThisPaddock.LinkByName("wheat");
            myPasture[pdk] = (AgPasture) ThisPaddock.LinkByType("agpasture");
            myFert[pdk] = (Fertiliser) ThisPaddock.LinkByType("Fertiliser");
            if(PdkFound == 2)
               PdkFound += 1;
         }
      }
      if (PdkFound < 2)
      {
         throw new Exception("Could not find the two paddocks to sum up");
      }
      else
      {  
         Console.WriteLine("        Summing up paddocks:");
         for(int i = 0;i<2;i++)
            Console.WriteLine("         ." + mySoilN[i].FullName.Split('.')[0] + ", with area: " + RelativeArea[i]);
         
         // initialise the outputs
         dlayer_p1 = new double[nLayers];
         es_p1 = 0.0;
         sw_uptake_p1 = new double[nLayers];
         drain_p1 = 0.0;
         runoff_p1 = 0.0;
         pond_p1 = 0.0;

         urea_p1 = new double[nLayers];
         nh4_p1 = new double[nLayers];
         no3_p1 = new double[nLayers];
         fom_n_p1 = new double[nLayers];
         biom_n_p1 = new double[nLayers];
         hum_n_p1 = new double[nLayers];
         surfaceom_n_p1 = 0.0;
         PlantN_p1 = 0.0;
         PlantNuptake_p1 = 0;
         Fertiliser_p1 = 0.0;

         fom_c_p1 = new double[nLayers];
         biom_c_p1 = new double[nLayers];
         hum_c_p1 = new double[nLayers];
         oc_p1 = new double[nLayers];
         surfaceom_c_p1 = 0.0;
         PlantC_p1 = 0.0;

         leach_no3_p1 = 0.0;
         dlt_n_loss_in_sed_p1 = 0.0;
         dlt_urea_hydrol_p1 = new double[nLayers];
         nitrification_p1 = new double[nLayers];
         dnit_p1 = new double[nLayers];
         dlt_n_min_res_p1 = new double[nLayers];
         dlt_n_min_tot_p1 = new double[nLayers];
         n2o_atm_p1 = new double[nLayers];

         dlt_res_c_atm_p1 = 0.0;
         dlt_fom_c_atm_p1 = new double[nLayers];
         dlt_biom_c_atm_p1 = new double[nLayers];
         dlt_hum_c_atm_p1 = new double[nLayers];
         dlt_c_loss_in_sed_p1 = 0.0;
      }
   }
   
   [EventHandler] public void OnPost()
   {
      // clear outputs
      es_p1 = 0.0;
      drain_p1 = 0.0;
      runoff_p1 = 0.0;
      pond_p1 = 0.0;

      surfaceom_n_p1 = 0.0;
      PlantN_p1 = 0.0;
      PlantNuptake_p1 = 0;
      Fertiliser_p1 = 0.0;
      leach_no3_p1 = 0.0;
      dlt_n_loss_in_sed_p1 = 0.0;

      surfaceom_c_p1 = 0.0;
      dlt_res_c_atm_p1 = 0.0;
      PlantC_p1 = 0.0;
      dlt_c_loss_in_sed_p1 = 0.0;

      Array.Clear(dlayer_p1, 0, nLayers);
      Array.Clear(sw_uptake_p1, 0, nLayers);

      Array.Clear(urea_p1, 0, nLayers);
      Array.Clear(nh4_p1, 0, nLayers);
      Array.Clear(no3_p1, 0, nLayers);
      Array.Clear(fom_n_p1, 0, nLayers);
      Array.Clear(biom_n_p1, 0, nLayers);
      Array.Clear(hum_n_p1, 0, nLayers);

      Array.Clear(fom_c_p1, 0, nLayers);
      Array.Clear(biom_c_p1, 0, nLayers);
      Array.Clear(hum_c_p1, 0, nLayers);
      Array.Clear(oc_p1, 0, nLayers);

      Array.Clear(dlt_urea_hydrol_p1, 0, nLayers);
      Array.Clear(nitrification_p1, 0, nLayers);
      Array.Clear(dnit_p1, 0, nLayers);
      Array.Clear(dlt_n_min_res_p1, 0, nLayers);
      Array.Clear(dlt_n_min_tot_p1, 0, nLayers);
      Array.Clear(n2o_atm_p1, 0, nLayers);

      Array.Clear(dlt_fom_c_atm_p1, 0, nLayers);
      Array.Clear(dlt_biom_c_atm_p1, 0, nLayers);
      Array.Clear(dlt_hum_c_atm_p1, 0, nLayers);
      
      // Sum up the outputs
      for (int pdk = 0;pdk < mySoilN.Length;pdk++)
      {
         es_p1 += mySoilW[pdk].es * RelativeArea[pdk];
         drain_p1 += mySoilW[pdk].drain * RelativeArea[pdk];
         runoff_p1 = mySoilW[pdk].runoff * RelativeArea[pdk];
         pond_p1 = mySoilW[pdk].pond * RelativeArea[pdk];
         leach_no3_p1 += mySoilW[pdk].Variable("leach_no3").ToDouble() * RelativeArea[pdk];
         surfaceom_n_p1 += mySurfOM[pdk].surfaceom_n * RelativeArea[pdk];
         Fertiliser_p1 += myFert[pdk].fertiliser * RelativeArea[pdk];
         dlt_n_loss_in_sed_p1 += mySoilN[pdk].dlt_n_loss_in_sed * RelativeArea[pdk];
         surfaceom_c_p1 += mySurfOM[pdk].surfaceom_c * RelativeArea[pdk];
         dlt_res_c_atm_p1 += mySoilN[pdk].dlt_res_c_atm * RelativeArea[pdk];
         dlt_c_loss_in_sed_p1 += mySoilN[pdk].dlt_c_loss_in_sed * RelativeArea[pdk];
         
         try
         {
            PlantNuptake_p1 += myPlant[pdk].n_uptake * RelativeArea[pdk];
            PlantN_p1 += myPlant[pdk].TotalN * RelativeArea[pdk];
            PlantC_p1 += 0.4 * myPlant[pdk].TotalWt * RelativeArea[pdk];
         }
         catch(System.Exception err)
         {
            try
            {
               PlantNuptake_p1 += myPasture[pdk].NitrogenUptake * RelativeArea[pdk];
               PlantN_p1 += myPasture[pdk].TotalPlantN * RelativeArea[pdk];
               PlantC_p1 += 0.4 * myPasture[pdk].TotalPlantWt * RelativeArea[pdk];
            }
            catch(System.Exception err2)
            {}
         }
                     
         for (int layer = 0; layer < nLayers;layer++)
         {
            dlayer_p1[layer] += mySoilW[pdk].dlayer[layer] * RelativeArea[pdk];
            try
               {sw_uptake_p1[layer] += myPlant[pdk].sw_uptake[layer] * RelativeArea[pdk];}
            catch(System.Exception err)
            {
               try
                  {sw_uptake_p1[layer] += myPasture[pdk].WaterUptakeLayers[layer] * RelativeArea[pdk];}
               catch(System.Exception err1)
               {}
            }

            urea_p1[layer] += mySoilN[pdk].urea[layer] * RelativeArea[pdk];
            nh4_p1[layer] += mySoilN[pdk].nh4[layer] * RelativeArea[pdk];
            no3_p1[layer] += mySoilN[pdk].no3[layer] * RelativeArea[pdk];
            fom_n_p1[layer] += mySoilN[pdk].fom_n[layer] * RelativeArea[pdk];
            biom_n_p1[layer] += mySoilN[pdk].biom_n[layer] * RelativeArea[pdk];
            hum_n_p1[layer] += mySoilN[pdk].hum_n[layer] * RelativeArea[pdk];

            fom_c_p1[layer] += mySoilN[pdk].fom_c[layer] * RelativeArea[pdk];
            biom_c_p1[layer] += mySoilN[pdk].biom_c[layer] * RelativeArea[pdk];
            hum_c_p1[layer] += mySoilN[pdk].hum_c[layer] * RelativeArea[pdk];
            oc_p1[layer] += mySoilN[pdk].oc[layer] * RelativeArea[pdk];

            dlt_urea_hydrol_p1[layer] += mySoilN[pdk].dlt_urea_hydrol[layer] * RelativeArea[pdk];
            nitrification_p1[layer] += mySoilN[pdk].nitrification[layer] * RelativeArea[pdk];
            dnit_p1[layer] += mySoilN[pdk].dnit[layer] * RelativeArea[pdk];
            dlt_n_min_res_p1[layer] += mySoilN[pdk].dlt_n_min_res[layer] * RelativeArea[pdk];
            dlt_n_min_tot_p1[layer] += mySoilN[pdk].dlt_n_min_tot[layer] * RelativeArea[pdk];
            n2o_atm_p1[layer] += mySoilN[pdk].n2o_atm[layer] * RelativeArea[pdk];
            
            dlt_fom_c_atm_p1[layer] += mySoilN[pdk].dlt_fom_c_atm[layer] * RelativeArea[pdk];
            dlt_biom_c_atm_p1[layer] += mySoilN[pdk].dlt_biom_c_atm[layer] * RelativeArea[pdk];
            dlt_hum_c_atm_p1[layer] += mySoilN[pdk].dlt_hum_c_atm[layer] * RelativeArea[pdk];
         }
      }
   }
}
```
        manager2 Aux-SumOutputs2
          # This script sums up variables from two paddocks
          Pdk01Name = Paddock2-base-HeavySoil  # Name of first paddock
          Pdk01Area = 0.75  # Relative area of first paddock [0-1]
          Pdk02Name = Paddock2-patch-HeavySoil  # Name of second paddock
          Pdk02Area = 0.25  # Relative area of second paddock [0-1]
```csharp
using System;
using ModelFramework;

public class Script 
{      
   [Param] private string Pdk01Name;
   [Param] private double Pdk01Area;
   [Param] private string Pdk02Name;
   [Param] private double Pdk02Area;

   [Link] Simulation myBlock;
   
   [Output][Units("mm")] public double[] dlayer_p2;
   [Output][Units("mm")] public double es_p2;
   [Output][Units("mm")] public double[] sw_uptake_p2;
   [Output][Units("mm")] public double drain_p2;
   [Output][Units("mm")] public double runoff_p2;
   [Output][Units("mm")] public double pond_p2;

   [Output][Units("kg/ha")] public double[] urea_p2;
   [Output][Units("kg/ha")] public double[] nh4_p2;
   [Output][Units("kg/ha")] public double[] no3_p2;
   [Output][Units("kg/ha")] public double[] fom_n_p2;
   [Output][Units("kg/ha")] public double[] biom_n_p2;
   [Output][Units("kg/ha")] public double[] hum_n_p2;
   [Output][Units("kg/ha")] public double surfaceom_n_p2;
   [Output][Units("kg/ha")] public double PlantN_p2;
   [Output][Units("kg/ha")] public double PlantNuptake_p2;
   [Output][Units("kg/ha")] public double Fertiliser_p2;

   [Output][Units("kg/ha")] public double[] fom_c_p2;
   [Output][Units("kg/ha")] public double[] biom_c_p2;
   [Output][Units("kg/ha")] public double[] hum_c_p2;
   [Output][Units("%")] public double[] oc_p2;
   [Output][Units("kg/ha")] public double surfaceom_c_p2;
   [Output][Units("kg/ha")] public double PlantC_p2;

   [Output][Units("kg/ha")] public double leach_no3_p2;
   [Output][Units("kg")] public double dlt_n_loss_in_sed_p2;
   [Output][Units("kg/ha")] public double[] dlt_urea_hydrol_p2;
   [Output][Units("kg/ha")] public double[] nitrification_p2;
   [Output][Units("kg/ha")] public double[] dnit_p2;
   [Output][Units("kg/ha")] public double[] dlt_n_min_res_p2;
   [Output][Units("kg/ha")] public double[] dlt_n_min_tot_p2;
   [Output][Units("kg/ha")] public double[] n2o_atm_p2;

   [Output][Units("kg/ha")] public double dlt_res_c_atm_p2;
   [Output][Units("kg/ha")] public double[] dlt_fom_c_atm_p2;
   [Output][Units("kg/ha")] public double[] dlt_biom_c_atm_p2;
   [Output][Units("kg/ha")] public double[] dlt_hum_c_atm_p2;
   [Output][Units("kg")] public double dlt_c_loss_in_sed_p2;
     
   [Output][Units("")] public string SoilName_p2;
   
   [Output] string SoilName2;

   private int nLayers;
   private SoilN[] mySoilN;
   private SoilWat[] mySoilW;
   private SurfaceOM[] mySurfOM;
   private Wheat[] myPlant;
   private AgPasture[] myPasture;
   private Fertiliser[] myFert;
   private double[] RelativeArea;

   [EventHandler] public void OnInitialised()
   {
      // basic input parameters
      nLayers = 6;
      string[] PaddockNames = new string[2];
      PaddockNames[0] = Pdk01Name;
      PaddockNames[1] = Pdk02Name;
      RelativeArea = new double[2];
      RelativeArea[0] = Pdk01Area;
      RelativeArea[1] = Pdk02Area;

      // link to various modules
      mySoilN = new SoilN[2];
      mySoilW = new SoilWat[2];
      mySurfOM = new SurfaceOM[2];
      myPlant = new Wheat[2];
      myPasture = new AgPasture[2];
      myFert = new Fertiliser[2];

      Console.WriteLine("     Initialising");
      int pdk = -1;
      int PdkFound = 0;
      foreach(Paddock ThisPaddock in myBlock.ChildPaddocks)
      {
         if(ThisPaddock.Name == PaddockNames[0])
         {
            pdk = 0;
            PdkFound += 1;
            foreach(Component myModule in ThisPaddock.Children)
            {
               if(myModule.Name.Contains(" Nitrogen"))
               {
                  SoilName_p2 = myModule.Name.Split(' ')[0];
               }
            }
         }
         else if(ThisPaddock.Name == PaddockNames[1])
         {
            pdk = 1;
            PdkFound += 1;
         }

         if(pdk >= 0 && PdkFound <= 2)
         {
            mySoilN[pdk] = (SoilN) ThisPaddock.LinkByType("SoilN");
            mySoilW[pdk] = (SoilWat) ThisPaddock.LinkByType("SoilWat");
            mySurfOM[pdk] = (SurfaceOM) ThisPaddock.LinkByType("SurfaceOM");
            myPlant[pdk] = (Wheat) ThisPaddock.LinkByName("wheat");
            myPasture[pdk] = (AgPasture) ThisPaddock.LinkByType("agpasture");
            myFert[pdk] = (Fertiliser) ThisPaddock.LinkByType("Fertiliser");
            if(PdkFound == 2)
               PdkFound += 1;
         }
      }
      if (PdkFound < 2)
      {
         throw new Exception("Could not find the two paddocks to sum up");
      }
      else
      {      
         Console.WriteLine("        Summing up paddocks:");
         for(int i = 0;i < 2;i++)
            Console.WriteLine("         ." + mySoilN[i].FullName.Split('.')[0] + ", with area: " + RelativeArea[i]);

         // initialise the outputs
         dlayer_p2 = new double[nLayers];
         es_p2 = 0.0;
         sw_uptake_p2 = new double[nLayers];
         drain_p2 = 0.0;
         runoff_p2 = 0.0;
         pond_p2 = 0.0;

         urea_p2 = new double[nLayers];
         nh4_p2 = new double[nLayers];
         no3_p2 = new double[nLayers];
         fom_n_p2 = new double[nLayers];
         biom_n_p2 = new double[nLayers];
         hum_n_p2 = new double[nLayers];
         surfaceom_n_p2 = 0.0;
         PlantN_p2 = 0.0;
         PlantNuptake_p2 = 0;
         Fertiliser_p2 = 0.0;

         fom_c_p2 = new double[nLayers];
         biom_c_p2 = new double[nLayers];
         hum_c_p2 = new double[nLayers];
         oc_p2 = new double[nLayers];
         surfaceom_c_p2 = 0.0;
         PlantC_p2 = 0.0;

         leach_no3_p2 = 0.0;
         dlt_n_loss_in_sed_p2 = 0.0;
         dlt_urea_hydrol_p2 = new double[nLayers];
         nitrification_p2 = new double[nLayers];
         dnit_p2 = new double[nLayers];
         dlt_n_min_res_p2 = new double[nLayers];
         dlt_n_min_tot_p2 = new double[nLayers];
         n2o_atm_p2 = new double[nLayers];

         dlt_res_c_atm_p2 = 0.0;
         dlt_fom_c_atm_p2 = new double[nLayers];
         dlt_biom_c_atm_p2 = new double[nLayers];
         dlt_hum_c_atm_p2 = new double[nLayers];
         dlt_c_loss_in_sed_p2 = 0.0;
      }
   }
   
   [EventHandler] public void OnPost()
   {
      // clear outputs
      es_p2 = 0.0;
      drain_p2 = 0.0;
      runoff_p2 = 0.0;
      pond_p2 = 0.0;

      surfaceom_n_p2 = 0.0;
      PlantN_p2 = 0.0;
      PlantNuptake_p2 = 0;
      Fertiliser_p2 = 0.0;
      leach_no3_p2 = 0.0;
      dlt_n_loss_in_sed_p2 = 0.0;

      surfaceom_c_p2 = 0.0;
      dlt_res_c_atm_p2 = 0.0;
      PlantC_p2 = 0.0;
      dlt_c_loss_in_sed_p2 = 0.0;

      Array.Clear(dlayer_p2, 0, nLayers);
      Array.Clear(sw_uptake_p2, 0, nLayers);

      Array.Clear(urea_p2, 0, nLayers);
      Array.Clear(nh4_p2, 0, nLayers);
      Array.Clear(no3_p2, 0, nLayers);
      Array.Clear(fom_n_p2, 0, nLayers);
      Array.Clear(biom_n_p2, 0, nLayers);
      Array.Clear(hum_n_p2, 0, nLayers);

      Array.Clear(fom_c_p2, 0, nLayers);
      Array.Clear(biom_c_p2, 0, nLayers);
      Array.Clear(hum_c_p2, 0, nLayers);
      Array.Clear(oc_p2, 0, nLayers);

      Array.Clear(dlt_urea_hydrol_p2, 0, nLayers);
      Array.Clear(nitrification_p2, 0, nLayers);
      Array.Clear(dnit_p2, 0, nLayers);
      Array.Clear(dlt_n_min_res_p2, 0, nLayers);
      Array.Clear(dlt_n_min_tot_p2, 0, nLayers);
      Array.Clear(n2o_atm_p2, 0, nLayers);

      Array.Clear(dlt_fom_c_atm_p2, 0, nLayers);
      Array.Clear(dlt_biom_c_atm_p2, 0, nLayers);
      Array.Clear(dlt_hum_c_atm_p2, 0, nLayers);
      
      // Sum up the outputs
      for (int pdk = 0;pdk < mySoilN.Length;pdk++)
      {
         es_p2 += mySoilW[pdk].es * RelativeArea[pdk];
         drain_p2 += mySoilW[pdk].drain * RelativeArea[pdk];
         runoff_p2 = mySoilW[pdk].runoff * RelativeArea[pdk];
         pond_p2 = mySoilW[pdk].pond * RelativeArea[pdk];
         surfaceom_n_p2 += mySurfOM[pdk].surfaceom_n * RelativeArea[pdk];
         leach_no3_p2 += mySoilW[pdk].Variable("leach_no3").ToDouble() * RelativeArea[pdk];
         Fertiliser_p2 += myFert[pdk].fertiliser * RelativeArea[pdk];
         dlt_n_loss_in_sed_p2 += mySoilN[pdk].dlt_n_loss_in_sed * RelativeArea[pdk];
         surfaceom_c_p2 += mySurfOM[pdk].surfaceom_c * RelativeArea[pdk];
         dlt_res_c_atm_p2 += mySoilN[pdk].dlt_res_c_atm * RelativeArea[pdk];
         dlt_c_loss_in_sed_p2 += mySoilN[pdk].dlt_c_loss_in_sed * RelativeArea[pdk];
         
         try
         {
            PlantNuptake_p2 += myPlant[pdk].n_uptake * RelativeArea[pdk];
            PlantN_p2 += myPlant[pdk].TotalN * RelativeArea[pdk];
            PlantC_p2 += myPlant[pdk].TotalWt * RelativeArea[pdk];
         }
         catch(System.Exception err)
         {
            try
            {
               PlantNuptake_p2 += myPasture[pdk].NitrogenUptake * RelativeArea[pdk];
               PlantN_p2 += myPasture[pdk].TotalPlantN * RelativeArea[pdk];
               PlantC_p2 += myPasture[pdk].TotalPlantWt * RelativeArea[pdk];
            }
            catch(System.Exception err2)
            {}
         }
                     
         for (int layer = 0; layer < nLayers;layer++)
         {
            dlayer_p2[layer] += mySoilW[pdk].dlayer[layer] * RelativeArea[pdk];
            try
               {sw_uptake_p2[layer] += myPlant[pdk].sw_uptake[layer] * RelativeArea[pdk];}
            catch(System.Exception err)
            {
               try
                  {sw_uptake_p2[layer] += myPasture[pdk].WaterUptakeLayers[layer] * RelativeArea[pdk];}
               catch(System.Exception err1)
               {}
            }

            urea_p2[layer] += mySoilN[pdk].urea[layer] * RelativeArea[pdk];
            nh4_p2[layer] += mySoilN[pdk].nh4[layer] * RelativeArea[pdk];
            no3_p2[layer] += mySoilN[pdk].no3[layer] * RelativeArea[pdk];
            fom_n_p2[layer] += mySoilN[pdk].fom_n[layer] * RelativeArea[pdk];
            biom_n_p2[layer] += mySoilN[pdk].biom_n[layer] * RelativeArea[pdk];
            hum_n_p2[layer] += mySoilN[pdk].hum_n[layer] * RelativeArea[pdk];

            fom_c_p2[layer] += mySoilN[pdk].fom_c[layer] * RelativeArea[pdk];
            biom_c_p2[layer] += mySoilN[pdk].biom_c[layer] * RelativeArea[pdk];
            hum_c_p2[layer] += mySoilN[pdk].hum_c[layer] * RelativeArea[pdk];
            oc_p2[layer] += mySoilN[pdk].oc[layer] * RelativeArea[pdk];

            dlt_urea_hydrol_p2[layer] += mySoilN[pdk].dlt_urea_hydrol[layer] * RelativeArea[pdk];
            nitrification_p2[layer] += mySoilN[pdk].nitrification[layer] * RelativeArea[pdk];
            dnit_p2[layer] += mySoilN[pdk].dnit[layer] * RelativeArea[pdk];
            dlt_n_min_res_p2[layer] += mySoilN[pdk].dlt_n_min_res[layer] * RelativeArea[pdk];
            dlt_n_min_tot_p2[layer] += mySoilN[pdk].dlt_n_min_tot[layer] * RelativeArea[pdk];
            n2o_atm_p2[layer] += mySoilN[pdk].n2o_atm[layer] * RelativeArea[pdk];
            
            dlt_fom_c_atm_p2[layer] += mySoilN[pdk].dlt_fom_c_atm[layer] * RelativeArea[pdk];
            dlt_biom_c_atm_p2[layer] += mySoilN[pdk].dlt_biom_c_atm[layer] * RelativeArea[pdk];
            dlt_hum_c_atm_p2[layer] += mySoilN[pdk].dlt_hum_c_atm[layer] * RelativeArea[pdk];
         }
      }
   }
}
```
        outputfile LightSoil Results: filename=Sim01-ExplicitPatches LightSoil Results.out; title=Sim01-ExplicitPatches LightSoil Results
          variables
            variable:
              dd/mmm/yyyy as Date
              day as DoY
              urea_p1() as UreaTotal format 5
              nh4_p1() as NH4Total format 5
              no3_p1() as NO3Total format 5
              surfaceom_n_p1 as SurfaceOM_N format 5
              fom_n_p1() as FOM_N format 5
              biom_n_p1() as Biom_N format 5
              hum_n_p1() as Hum_N format 5
              PlantN_p1 as PlantTotalN format 5
              Fertiliser_p1 as FertiliserN format 5
              dlt_urea_hydrol_p1() as HydrolisedN format 5
              nitrification_p1() as NitrifiedN format 5
              dnit_p1() as DenitrifiedN format 5
              leach_no3_p1 as LeachedNO3 format 5
              dlt_n_min_res_p1() as NetMineralisedResidue format 5
              dlt_n_min_tot_p1() as NetMineralisedHumus format 5
              n2o_atm_p1() as N2Oemissions format 5
              dlt_n_loss_in_sed_p1 as dltN_sediments format 5
              PlantNuptake_p1 as PlantNUptake format 5
              surfaceom_c_p1 as SurfaceOM_C format 5
              fom_c_p1() as FOM_C format 5
              biom_c_p1() as Biom_C format 5
              hum_c_p1() as Hum_C format 5
              oc_p1() as OCTotal format 5
              PlantC_p1 as PlantTotalC format 5
              dlt_res_c_atm_p1 as CO2fromResidues format 5
              dlt_fom_c_atm_p1() as CO2fromFOM format 5
              dlt_biom_c_atm_p1() as CO2fromMBiomass format 5
              dlt_hum_c_atm_p1() as CO2fromHumus format 5
              dlt_c_loss_in_sed_p1 as dltC_sediments format 5
              es_p1 as Evaporation format 5
              sw_uptake_p1() as PlantTranspiration format 5
              drain_p1 as Drain format 5
              runoff_p1 as Runoff format 5
              SoilName_p1 as SoilName
              NumPatches
          events ReportingFrequency: event=end_day
        outputfile HeavySoil Results: filename=Sim01-ExplicitPatches HeavySoil Results.out; title=Sim01-ExplicitPatches HeavySoil Results
          variables
            variable:
              dd/mmm/yyyy as Date
              day as DoY
              urea_p2() as UreaTotal format 5
              nh4_p2() as NH4Total format 5
              no3_p2() as NO3Total format 5
              surfaceom_n_p2 as SurfaceOM_N format 5
              fom_n_p2() as FOM_N format 5
              biom_n_p2() as Biom_N format 5
              hum_n_p2() as Hum_N format 5
              PlantN_p2 as PlantTotalN format 5
              Fertiliser_p2 as FertiliserN format 5
              dlt_urea_hydrol_p2() as HydrolisedN format 5
              nitrification_p2() as NitrifiedN format 5
              dnit_p2() as DenitrifiedN format 5
              leach_no3_p2 as LeachedNO3 format 5
              dlt_n_min_res_p2() as NetMineralisedResidue format 5
              dlt_n_min_tot_p2() as NetMineralisedHumus format 5
              n2o_atm_p2() as N2Oemissions format 5
              dlt_n_loss_in_sed_p2 as dltN_sediments format 5
              PlantNuptake_p2 as PlantNUptake format 5
              surfaceom_c_p2 as SurfaceOM_C format 5
              fom_c_p2() as FOM_C format 5
              biom_c_p2() as Biom_C format 5
              hum_c_p2() as Hum_C format 5
              oc_p2() as OCTotal format 5
              PlantC_p2 as PlantTotalC format 5
              dlt_res_c_atm_p2 as CO2fromResidues format 5
              dlt_fom_c_atm_p2() as CO2fromFOM format 5
              dlt_biom_c_atm_p2() as CO2fromMBiomass format 5
              dlt_hum_c_atm_p2() as CO2fromHumus format 5
              dlt_c_loss_in_sed_p2 as dltC_sediments format 5
              es_p2 as Evaporation format 5
              sw_uptake_p2() as PlantTranspiration format 5
              drain_p2 as Drain format 5
              runoff_p2 as Runoff format 5
              SoilName_p2 as SoilName
              NumPatches
          events ReportingFrequency: event=end_day
      simulation Sim01-SoilCNPatches -> /SoilNitrogen_CNPatch_VariabilityTests/SoilCNPatch-AddOnly/Test01-Bare+addUrea/Sim01-ExplicitPatches
        area Paddock1-CNpatch-LightSoil -> /SoilNitrogen_CNPatch_VariabilityTests/SoilCNPatch-AddOnly/Test01-Bare+addUrea/Sim01-ExplicitPatches/Paddock1-base-LightSoil
          folder ManagerFolder -> /SoilNitrogen_CNPatch_VariabilityTests/SoilCNPatch-AddOnly/Test01-Bare+addUrea/Sim01-ExplicitPatches/Paddock1-base-LightSoil/ManagerFolder
            manager2 AddSoilCNPatch
              # Basic info to add a urine patch to SoilNtrogen
              AddPatch_DateToAdd = 15-Aug-2000  # Day of month to add urine patch
              AddPatch_NumAdditions = 1  # Number of times to add new patches
              AddPatch_Interval = 5  # Interval between addition of new patches (days)
              # Info about the type of deposition
              AddPatch_DepositionType = ToNewPatch  # Choose the DepositionType
              AddPatch_PatchToAdd = base  # If DepositionType is 'ToSpecificPatch' or 'ToNewPatch', choose which patch will be used
              AddPatch_NewArea = 0.25  # Relative area of new patch (0-1)
              # Info about solute to add
              AddPatch_SoluteType = Urea  # Choose the solute to be added
              AddPatch_SoluteAmount = 100  # Amount of N to be added (kgN/ha_patch)
```csharp
using System;
using ModelFramework;

public class Script 
{      

   [Param] DateTime AddPatch_DateToAdd;
   [Param] int AddPatch_NumAdditions;
   [Param] int AddPatch_Interval;
   [Param] string AddPatch_DepositionType;
   [Param] string AddPatch_PatchToAdd;
   [Param] double AddPatch_NewArea;
   [Param] string AddPatch_SoluteType;
   [Param] double AddPatch_SoluteAmount;   
   
   [Link] private Paddock myPaddock;
   [Link] private Clock myClock;
   
   [Event] public event AddSoilCNPatchDelegate AddSoilCNPatch;
   
   [Input(IsOptional = true)] int numPatches;
      
   [Output] string SoilName1;

   private double[] SoluteToAdd;
   private int[] PatchToAddTo;
   private int nPatchesAdded;
   
   private int nPatches;
   private int DaysAfterAdding;
   
   [EventHandler] public void OnInitialised()
   {
      SoluteToAdd = new double[1];
      SoluteToAdd[0] = AddPatch_SoluteAmount;
      PatchToAddTo = new int[1];
      nPatchesAdded = 0;
      DaysAfterAdding = AddPatch_Interval;
      
      Console.WriteLine();
      Console.WriteLine("     Initialised");
      Console.WriteLine();
      
   }

   [EventHandler] public void OnPrepare()
   {
      if(myClock.Today >= AddPatch_DateToAdd.Date)
      {
         if ((DaysAfterAdding == AddPatch_Interval) && (nPatchesAdded < AddPatch_NumAdditions))
         {
            AddSoilCNPatchType NewPatch = new AddSoilCNPatchType();
            NewPatch.Sender = "manager";
            NewPatch.DepositionType = AddPatch_DepositionType;
            NewPatch.AreaFraction = AddPatch_NewArea;
            if (AddPatch_PatchToAdd == "base")
               PatchToAddTo[0] = 0;
            else
               PatchToAddTo[0] = 0; //numPatches - 1;
            NewPatch.AffectedPatches_id = PatchToAddTo;
            if (AddPatch_SoluteType == "Urea")
               NewPatch.Urea = SoluteToAdd;
            if (AddPatch_SoluteType == "NH4")
               NewPatch.NH4 = SoluteToAdd;
            if (AddPatch_SoluteType == "NO3")
               NewPatch.NO3 = SoluteToAdd;
      
            AddSoilCNPatch.Invoke(NewPatch);
            nPatchesAdded += 1;
            DaysAfterAdding = 1;
         }
         else
            DaysAfterAdding += 1;
      }
   }
      
   [EventHandler] public void OnPost()
   {

   }
}
```
          outputfile Results -> /SoilNitrogen_CNPatch_VariabilityTests/SoilCNPatch-AddOnly/Test01-Bare+addUrea/Sim01-ExplicitPatches/Paddock1-base-LightSoil/Results: filename=Sim01-SoilCNPatches Paddock1-CNpatch-LightSoil Results.out; title=Sim01-SoilCNPatches Paddock1-CNpatch-LightSoil Results
            variables -> /SoilNitrogen_CNPatch_VariabilityTests/SoilCNPatch-AddOnly/Test01-Bare+addUrea/Sim01-ExplicitPatches/Paddock1-base-LightSoil/Results/Variables
            events ReportingFrequency -> /SoilNitrogen_CNPatch_VariabilityTests/SoilCNPatch-AddOnly/Test01-Bare+addUrea/Sim01-ExplicitPatches/Paddock1-base-LightSoil/Results/ReportingFrequency
        area Paddock2-CNpatch-HeavySoil -> /SoilNitrogen_CNPatch_VariabilityTests/SoilCNPatch-AddOnly/Test01-Bare+addUrea/Sim01-ExplicitPatches/Paddock2-base-HeavySoil
          outputfile Results -> /SoilNitrogen_CNPatch_VariabilityTests/SoilCNPatch-AddOnly/Test01-Bare+addUrea/Sim01-ExplicitPatches/Paddock2-base-HeavySoil/Results: filename=Sim01-SoilCNPatches Paddock2-CNpatch-HeavySoil Results.out; title=Sim01-SoilCNPatches Paddock2-CNpatch-HeavySoil Results
            variables -> /SoilNitrogen_CNPatch_VariabilityTests/SoilCNPatch-AddOnly/Test01-Bare+addUrea/Sim01-ExplicitPatches/Paddock2-base-HeavySoil/Results/Variables
            events ReportingFrequency -> /SoilNitrogen_CNPatch_VariabilityTests/SoilCNPatch-AddOnly/Test01-Bare+addUrea/Sim01-ExplicitPatches/Paddock2-base-HeavySoil/Results/ReportingFrequency
    folder Test02-Bare+TypicSoil+addUrea -> /SoilNitrogen_CNPatch_VariabilityTests/SoilCNPatch-AddOnly/Test01-Bare+addUrea
      memo Info
        ++++++++++++++++++++  TEST 02 +++++++++++++++++++++++++++++++++++++++++++++++++++++++++++

           Description:
              - Artificial climate, smooth mild temperate;
              - Two generic soils, a free draining and a poorly drained;
              - Bare soil;
              - Initial mineral N: 30kgN/ha as NO3 + 30kgN/ha as NH4;
              - Initial soil organic matter composed of humus and FOM;
              - Initial surface residues of 1000kgDM/ha;
              - No additions of residues;
              - Urea added as a patch, 100kgN/ha into 25% of the area

              > First simulation has two explicit patches (two paddocks)
              > Second simulation has internal patches (soilCNpatches)

           Expected output:
              - All outputs with valid values (numeric mostly);
              - Very small differences between simulations as the patches are bare;
      simulation Sim02-ExplicitPatches -> /SoilNitrogen_CNPatch_VariabilityTests/SoilCNPatch-AddOnly/Test01-Bare+addUrea/Sim01-ExplicitPatches
        area Paddock1-base-LightSoil -> /SoilNitrogen_CNPatch_VariabilityTests/SoilCNPatch-AddOnly/Test01-Bare+addUrea/Sim01-ExplicitPatches/Paddock1-base-LightSoil
          surfaceom SurfaceOrganicMatter
            PoolName = Residue1  # Organic Matter pool name
            type = grass  # Organic Matter type
            mass = 1000  # Initial surface residue (kg/ha)
            cnr = 20  # C:N ratio of initial residue
            standing_fraction = 0  # Fraction of residue standing
          Soil Med-LightSoil: LocalName=Generic medium-light sedimentary soil; Country=New Zealand; Latitude=0; Longitude=0
            DataSource=Hypothetical medium to light texture soil of sedimentary origin (moderately high drainage)
            Analysis: same as SoilCNPatch-AddOnly.Test01-Bare+addUrea.Sim01-ExplicitPatches.Paddock1-base-LightSoil.Med-LightSoil.Analysis
            Water: same as SoilCNPatch-AddOnly.Test01-Bare+addUrea.Sim01-ExplicitPatches.Paddock1-base-LightSoil.Med-LightSoil.Water
            SoilWater: same as SoilCNPatch-AddOnly.Test01-Bare+addUrea.Sim01-ExplicitPatches.Paddock1-base-LightSoil.Med-LightSoil.SoilWater
            SoilOrganicMatter: RootCN=30; RootWt=1000; SoilCN=12.5; EnrACoeff=7.4; EnrBCoeff=0.2; OCUnits=Total
              Thickness  OC    FBiom  FInert
              150        3.5   0.035  0.4
              150        1.5   0.025  0.55
              300        0.5   0.015  0.765
              300        0.25  0.01   0.9
              300        0.1   0.01   0.95
              300        0.1   0.01   0.994
            Sample Initial nitrogen: NO3Units=kgha; NH4Units=kgha; SWUnits=Volumetric; OCUnits=Total; PHUnits=Water
              Thickness  NO3  NH4
              150        5    5
              150        5    5
              300        5    5
              300        5    5
              300        5    5
              300        5    5
            InitialWater: FractionFull=1; PercentMethod=EvenlyDistributed; RelativeTo=ll15
          outputfile Results -> /SoilNitrogen_CNPatch_VariabilityTests/SoilCNPatch-AddOnly/Test01-Bare+addUrea/Sim01-ExplicitPatches/Paddock1-base-LightSoil/Results: filename=Sim02-ExplicitPatches Paddock1-base-LightSoil Results.out; title=Sim02-ExplicitPatches Paddock1-base-LightSoil Results
            variables -> /SoilNitrogen_CNPatch_VariabilityTests/SoilCNPatch-AddOnly/Test01-Bare+addUrea/Sim01-ExplicitPatches/Paddock1-base-LightSoil/Results/Variables
            events ReportingFrequency -> /SoilNitrogen_CNPatch_VariabilityTests/SoilCNPatch-AddOnly/Test01-Bare+addUrea/Sim01-ExplicitPatches/Paddock1-base-LightSoil/Results/ReportingFrequency
        area Paddock1-patch-LightSoil -> /SoilNitrogen_CNPatch_VariabilityTests/SoilCNPatch-AddOnly/Test02-Bare+TypicSoil+addUrea/Sim02-ExplicitPatches/Paddock1-base-LightSoil
          folder ManagerFolder -> /SoilNitrogen_CNPatch_VariabilityTests/SoilCNPatch-AddOnly/Test02-Bare+TypicSoil+addUrea/Sim02-ExplicitPatches/Paddock1-base-LightSoil/ManagerFolder
            operations AddUrine
              15-Aug  Fertiliser apply amount=100 (kg/ha), depth=1 (mm), type=urea_n
          outputfile Results -> /SoilNitrogen_CNPatch_VariabilityTests/SoilCNPatch-AddOnly/Test02-Bare+TypicSoil+addUrea/Sim02-ExplicitPatches/Paddock1-base-LightSoil/Results: filename=Sim02-ExplicitPatches Paddock1-patch-LightSoil Results.out; title=Sim02-ExplicitPatches Paddock1-patch-LightSoil Results
            variables -> /SoilNitrogen_CNPatch_VariabilityTests/SoilCNPatch-AddOnly/Test02-Bare+TypicSoil+addUrea/Sim02-ExplicitPatches/Paddock1-base-LightSoil/Results/Variables
            events ReportingFrequency -> /SoilNitrogen_CNPatch_VariabilityTests/SoilCNPatch-AddOnly/Test02-Bare+TypicSoil+addUrea/Sim02-ExplicitPatches/Paddock1-base-LightSoil/Results/ReportingFrequency
        area Paddock2-base-HeavySoil -> /SoilNitrogen_CNPatch_VariabilityTests/SoilCNPatch-AddOnly/Test01-Bare+addUrea/Sim01-ExplicitPatches/Paddock2-base-HeavySoil
          Soil Med-HeavySoil: LocalName=Generic medium-heavy sedimentary soil; Country=New Zealand; Latitude=0; Longitude=0
            DataSource=Hypothetical medium to heavy texture soil of sedimentary origin (moderately poorly drained)
            Analysis: same as SoilCNPatch-AddOnly.Test01-Bare+addUrea.Sim01-ExplicitPatches.Paddock2-base-HeavySoil.Med-HeavySoil.Analysis
            Water: same as SoilCNPatch-AddOnly.Test01-Bare+addUrea.Sim01-ExplicitPatches.Paddock2-base-HeavySoil.Med-HeavySoil.Water
            SoilWater: same as SoilCNPatch-AddOnly.Test01-Bare+addUrea.Sim01-ExplicitPatches.Paddock2-base-HeavySoil.Med-HeavySoil.SoilWater
            SoilOrganicMatter: RootCN=30; RootWt=1000; SoilCN=12.5; EnrACoeff=7.4; EnrBCoeff=0.2; OCUnits=Total
              Thickness  OC    FBiom  FInert
              150        3.5   0.035  0.5
              150        1.5   0.025  0.65
              300        0.5   0.015  0.835
              300        0.25  0.01   0.94
              300        0.1   0.01   0.97
              300        0.1   0.01   0.996
            Sample Initial nitrogen -> /SoilNitrogen_CNPatch_VariabilityTests/SoilCNPatch-AddOnly/Test02-Bare+TypicSoil+addUrea/Sim02-ExplicitPatches/Paddock1-base-LightSoil/Med-LightSoil/Initial nitrogen
            InitialWater: FractionFull=1; PercentMethod=EvenlyDistributed; RelativeTo=ll15
          outputfile Results -> /SoilNitrogen_CNPatch_VariabilityTests/SoilCNPatch-AddOnly/Test01-Bare+addUrea/Sim01-ExplicitPatches/Paddock2-base-HeavySoil/Results: filename=Sim02-ExplicitPatches Paddock2-base-HeavySoil Results.out; title=Sim02-ExplicitPatches Paddock2-base-HeavySoil Results
            variables -> /SoilNitrogen_CNPatch_VariabilityTests/SoilCNPatch-AddOnly/Test01-Bare+addUrea/Sim01-ExplicitPatches/Paddock2-base-HeavySoil/Results/Variables
            events ReportingFrequency -> /SoilNitrogen_CNPatch_VariabilityTests/SoilCNPatch-AddOnly/Test01-Bare+addUrea/Sim01-ExplicitPatches/Paddock2-base-HeavySoil/Results/ReportingFrequency
        area Paddock2-patch-HeavySoil -> /SoilNitrogen_CNPatch_VariabilityTests/SoilCNPatch-AddOnly/Test02-Bare+TypicSoil+addUrea/Sim02-ExplicitPatches/Paddock2-base-HeavySoil
          outputfile Results -> /SoilNitrogen_CNPatch_VariabilityTests/SoilCNPatch-AddOnly/Test02-Bare+TypicSoil+addUrea/Sim02-ExplicitPatches/Paddock2-base-HeavySoil/Results: filename=Sim02-ExplicitPatches Paddock2-patch-HeavySoil Results.out; title=Sim02-ExplicitPatches Paddock2-patch-HeavySoil Results
            variables -> /SoilNitrogen_CNPatch_VariabilityTests/SoilCNPatch-AddOnly/Test02-Bare+TypicSoil+addUrea/Sim02-ExplicitPatches/Paddock2-base-HeavySoil/Results/Variables
            events ReportingFrequency -> /SoilNitrogen_CNPatch_VariabilityTests/SoilCNPatch-AddOnly/Test02-Bare+TypicSoil+addUrea/Sim02-ExplicitPatches/Paddock2-base-HeavySoil/Results/ReportingFrequency
        outputfile LightSoil Results -> /SoilNitrogen_CNPatch_VariabilityTests/SoilCNPatch-AddOnly/Test01-Bare+addUrea/Sim01-ExplicitPatches/LightSoil Results: filename=Sim02-ExplicitPatches LightSoil Results.out; title=Sim02-ExplicitPatches LightSoil Results
          variables -> /SoilNitrogen_CNPatch_VariabilityTests/SoilCNPatch-AddOnly/Test01-Bare+addUrea/Sim01-ExplicitPatches/LightSoil Results/Variables
          events ReportingFrequency -> /SoilNitrogen_CNPatch_VariabilityTests/SoilCNPatch-AddOnly/Test01-Bare+addUrea/Sim01-ExplicitPatches/LightSoil Results/ReportingFrequency
        outputfile HeavySoil Results -> /SoilNitrogen_CNPatch_VariabilityTests/SoilCNPatch-AddOnly/Test01-Bare+addUrea/Sim01-ExplicitPatches/HeavySoil Results: filename=Sim02-ExplicitPatches HeavySoil Results.out; title=Sim02-ExplicitPatches HeavySoil Results
          variables -> /SoilNitrogen_CNPatch_VariabilityTests/SoilCNPatch-AddOnly/Test01-Bare+addUrea/Sim01-ExplicitPatches/HeavySoil Results/Variables
          events ReportingFrequency -> /SoilNitrogen_CNPatch_VariabilityTests/SoilCNPatch-AddOnly/Test01-Bare+addUrea/Sim01-ExplicitPatches/HeavySoil Results/ReportingFrequency
      simulation Sim02-SoilCNPatches -> /SoilNitrogen_CNPatch_VariabilityTests/SoilCNPatch-AddOnly/Test02-Bare+TypicSoil+addUrea/Sim02-ExplicitPatches
        area Paddock1-CNpatch-LightSoil -> /SoilNitrogen_CNPatch_VariabilityTests/SoilCNPatch-AddOnly/Test02-Bare+TypicSoil+addUrea/Sim02-ExplicitPatches/Paddock1-base-LightSoil
          folder ManagerFolder -> /SoilNitrogen_CNPatch_VariabilityTests/SoilCNPatch-AddOnly/Test02-Bare+TypicSoil+addUrea/Sim02-ExplicitPatches/Paddock1-base-LightSoil/ManagerFolder
            manager2 AddSoilCNPatch: same as SoilCNPatch-AddOnly.Test01-Bare+addUrea.Sim01-SoilCNPatches.Paddock1-CNpatch-LightSoil.ManagerFolder.AddSoilCNPatch
          outputfile Results -> /SoilNitrogen_CNPatch_VariabilityTests/SoilCNPatch-AddOnly/Test02-Bare+TypicSoil+addUrea/Sim02-ExplicitPatches/Paddock1-base-LightSoil/Results: filename=Sim02-SoilCNPatches Paddock1-CNpatch-LightSoil Results.out; title=Sim02-SoilCNPatches Paddock1-CNpatch-LightSoil Results
            variables -> /SoilNitrogen_CNPatch_VariabilityTests/SoilCNPatch-AddOnly/Test02-Bare+TypicSoil+addUrea/Sim02-ExplicitPatches/Paddock1-base-LightSoil/Results/Variables
            events ReportingFrequency -> /SoilNitrogen_CNPatch_VariabilityTests/SoilCNPatch-AddOnly/Test02-Bare+TypicSoil+addUrea/Sim02-ExplicitPatches/Paddock1-base-LightSoil/Results/ReportingFrequency
        area Paddock2-CNpatch-HeavySoil -> /SoilNitrogen_CNPatch_VariabilityTests/SoilCNPatch-AddOnly/Test02-Bare+TypicSoil+addUrea/Sim02-ExplicitPatches/Paddock2-base-HeavySoil
          outputfile Results -> /SoilNitrogen_CNPatch_VariabilityTests/SoilCNPatch-AddOnly/Test02-Bare+TypicSoil+addUrea/Sim02-ExplicitPatches/Paddock2-base-HeavySoil/Results: filename=Sim02-SoilCNPatches Paddock2-CNpatch-HeavySoil Results.out; title=Sim02-SoilCNPatches Paddock2-CNpatch-HeavySoil Results
            variables -> /SoilNitrogen_CNPatch_VariabilityTests/SoilCNPatch-AddOnly/Test02-Bare+TypicSoil+addUrea/Sim02-ExplicitPatches/Paddock2-base-HeavySoil/Results/Variables
            events ReportingFrequency -> /SoilNitrogen_CNPatch_VariabilityTests/SoilCNPatch-AddOnly/Test02-Bare+TypicSoil+addUrea/Sim02-ExplicitPatches/Paddock2-base-HeavySoil/Results/ReportingFrequency
    folder Test03-Bare+TypicSoil+addUreaLots -> /SoilNitrogen_CNPatch_VariabilityTests/SoilCNPatch-AddOnly/Test01-Bare+addUrea
      memo Info
        ++++++++++++++++++++  TEST 03 +++++++++++++++++++++++++++++++++++++++++++++++++++++++++++

           Description:
              - Artificial climate, smooth mild temperate;
              - Two generic soils, a free draining and a poorly drained;
              - Bare soil;
              - Initial mineral N: 30kgN/ha as NO3 + 30kgN/ha as NH4;
              - Initial soil organic matter composed of humus and FOM;
              - Initial surface residues of 1000kgDM/ha;
              - No additions of residues;
              - Urea added as a patch, 1000kgN/ha into 25% of the area

              > First simulation has two explicit patches (two paddocks)
              > Second simulation has internal patches (soilCNpatches)

           Expected output:
              - All outputs with valid values (numeric mostly);
              - Very small differences between simulations as the patches are bare;
      simulation Sim03-ExplicitPatches -> /SoilNitrogen_CNPatch_VariabilityTests/SoilCNPatch-AddOnly/Test01-Bare+addUrea/Sim01-ExplicitPatches
        area Paddock1-base-LightSoil -> /SoilNitrogen_CNPatch_VariabilityTests/SoilCNPatch-AddOnly/Test01-Bare+addUrea/Sim01-ExplicitPatches/Paddock1-base-LightSoil
          surfaceom SurfaceOrganicMatter
            PoolName = Residue1  # Organic Matter pool name
            type = grass  # Organic Matter type
            mass = 1000  # Initial surface residue (kg/ha)
            cnr = 20  # C:N ratio of initial residue
            standing_fraction = 0  # Fraction of residue standing
          Soil Med-LightSoil: same as SoilCNPatch-AddOnly.Test02-Bare+TypicSoil+addUrea.Sim02-ExplicitPatches.Paddock1-base-LightSoil.Med-LightSoil
          outputfile Results -> /SoilNitrogen_CNPatch_VariabilityTests/SoilCNPatch-AddOnly/Test01-Bare+addUrea/Sim01-ExplicitPatches/Paddock1-base-LightSoil/Results: filename=Sim03-ExplicitPatches Paddock1-base-LightSoil Results.out; title=Sim03-ExplicitPatches Paddock1-base-LightSoil Results
            variables -> /SoilNitrogen_CNPatch_VariabilityTests/SoilCNPatch-AddOnly/Test01-Bare+addUrea/Sim01-ExplicitPatches/Paddock1-base-LightSoil/Results/Variables
            events ReportingFrequency -> /SoilNitrogen_CNPatch_VariabilityTests/SoilCNPatch-AddOnly/Test01-Bare+addUrea/Sim01-ExplicitPatches/Paddock1-base-LightSoil/Results/ReportingFrequency
        area Paddock1-patch-LightSoil -> /SoilNitrogen_CNPatch_VariabilityTests/SoilCNPatch-AddOnly/Test03-Bare+TypicSoil+addUreaLots/Sim03-ExplicitPatches/Paddock1-base-LightSoil
          folder ManagerFolder -> /SoilNitrogen_CNPatch_VariabilityTests/SoilCNPatch-AddOnly/Test03-Bare+TypicSoil+addUreaLots/Sim03-ExplicitPatches/Paddock1-base-LightSoil/ManagerFolder
            operations AddUrine
              15-Aug  Fertiliser apply amount=1000 (kg/ha), depth=1 (mm), type=urea_n
          outputfile Results -> /SoilNitrogen_CNPatch_VariabilityTests/SoilCNPatch-AddOnly/Test03-Bare+TypicSoil+addUreaLots/Sim03-ExplicitPatches/Paddock1-base-LightSoil/Results: filename=Sim03-ExplicitPatches Paddock1-patch-LightSoil Results.out; title=Sim03-ExplicitPatches Paddock1-patch-LightSoil Results
            variables -> /SoilNitrogen_CNPatch_VariabilityTests/SoilCNPatch-AddOnly/Test03-Bare+TypicSoil+addUreaLots/Sim03-ExplicitPatches/Paddock1-base-LightSoil/Results/Variables
            events ReportingFrequency -> /SoilNitrogen_CNPatch_VariabilityTests/SoilCNPatch-AddOnly/Test03-Bare+TypicSoil+addUreaLots/Sim03-ExplicitPatches/Paddock1-base-LightSoil/Results/ReportingFrequency
        area Paddock2-base-HeavySoil -> /SoilNitrogen_CNPatch_VariabilityTests/SoilCNPatch-AddOnly/Test01-Bare+addUrea/Sim01-ExplicitPatches/Paddock2-base-HeavySoil
          Soil Med-HeavySoil: LocalName=Generic medium-heavy sedimentary soil; Country=New Zealand; Latitude=0; Longitude=0
            DataSource=Hypothetical medium to heavy texture soil of sedimentary origin (moderately poorly drained)
            Analysis: same as SoilCNPatch-AddOnly.Test01-Bare+addUrea.Sim01-ExplicitPatches.Paddock2-base-HeavySoil.Med-HeavySoil.Analysis
            Water: same as SoilCNPatch-AddOnly.Test01-Bare+addUrea.Sim01-ExplicitPatches.Paddock2-base-HeavySoil.Med-HeavySoil.Water
            SoilWater: same as SoilCNPatch-AddOnly.Test01-Bare+addUrea.Sim01-ExplicitPatches.Paddock2-base-HeavySoil.Med-HeavySoil.SoilWater
            SoilOrganicMatter: same as SoilCNPatch-AddOnly.Test02-Bare+TypicSoil+addUrea.Sim02-ExplicitPatches.Paddock2-base-HeavySoil.Med-HeavySoil.SoilOrganicMatter
            Sample Initial nitrogen -> /SoilNitrogen_CNPatch_VariabilityTests/SoilCNPatch-AddOnly/Test03-Bare+TypicSoil+addUreaLots/Sim03-ExplicitPatches/Paddock1-base-LightSoil/Med-LightSoil/Initial nitrogen
            InitialWater: FractionFull=1; PercentMethod=EvenlyDistributed; RelativeTo=ll15
          outputfile Results -> /SoilNitrogen_CNPatch_VariabilityTests/SoilCNPatch-AddOnly/Test01-Bare+addUrea/Sim01-ExplicitPatches/Paddock2-base-HeavySoil/Results: filename=Sim03-ExplicitPatches Paddock2-base-HeavySoil Results.out; title=Sim03-ExplicitPatches Paddock2-base-HeavySoil Results
            variables -> /SoilNitrogen_CNPatch_VariabilityTests/SoilCNPatch-AddOnly/Test01-Bare+addUrea/Sim01-ExplicitPatches/Paddock2-base-HeavySoil/Results/Variables
            events ReportingFrequency -> /SoilNitrogen_CNPatch_VariabilityTests/SoilCNPatch-AddOnly/Test01-Bare+addUrea/Sim01-ExplicitPatches/Paddock2-base-HeavySoil/Results/ReportingFrequency
        area Paddock2-patch-HeavySoil -> /SoilNitrogen_CNPatch_VariabilityTests/SoilCNPatch-AddOnly/Test03-Bare+TypicSoil+addUreaLots/Sim03-ExplicitPatches/Paddock2-base-HeavySoil
          outputfile Results -> /SoilNitrogen_CNPatch_VariabilityTests/SoilCNPatch-AddOnly/Test03-Bare+TypicSoil+addUreaLots/Sim03-ExplicitPatches/Paddock2-base-HeavySoil/Results: filename=Sim03-ExplicitPatches Paddock2-patch-HeavySoil Results.out; title=Sim03-ExplicitPatches Paddock2-patch-HeavySoil Results
            variables -> /SoilNitrogen_CNPatch_VariabilityTests/SoilCNPatch-AddOnly/Test03-Bare+TypicSoil+addUreaLots/Sim03-ExplicitPatches/Paddock2-base-HeavySoil/Results/Variables
            events ReportingFrequency -> /SoilNitrogen_CNPatch_VariabilityTests/SoilCNPatch-AddOnly/Test03-Bare+TypicSoil+addUreaLots/Sim03-ExplicitPatches/Paddock2-base-HeavySoil/Results/ReportingFrequency
        outputfile LightSoil Results -> /SoilNitrogen_CNPatch_VariabilityTests/SoilCNPatch-AddOnly/Test01-Bare+addUrea/Sim01-ExplicitPatches/LightSoil Results: filename=Sim03-ExplicitPatches LightSoil Results.out; title=Sim03-ExplicitPatches LightSoil Results
          variables -> /SoilNitrogen_CNPatch_VariabilityTests/SoilCNPatch-AddOnly/Test01-Bare+addUrea/Sim01-ExplicitPatches/LightSoil Results/Variables
          events ReportingFrequency -> /SoilNitrogen_CNPatch_VariabilityTests/SoilCNPatch-AddOnly/Test01-Bare+addUrea/Sim01-ExplicitPatches/LightSoil Results/ReportingFrequency
        outputfile HeavySoil Results -> /SoilNitrogen_CNPatch_VariabilityTests/SoilCNPatch-AddOnly/Test01-Bare+addUrea/Sim01-ExplicitPatches/HeavySoil Results: filename=Sim03-ExplicitPatches HeavySoil Results.out; title=Sim03-ExplicitPatches HeavySoil Results
          variables -> /SoilNitrogen_CNPatch_VariabilityTests/SoilCNPatch-AddOnly/Test01-Bare+addUrea/Sim01-ExplicitPatches/HeavySoil Results/Variables
          events ReportingFrequency -> /SoilNitrogen_CNPatch_VariabilityTests/SoilCNPatch-AddOnly/Test01-Bare+addUrea/Sim01-ExplicitPatches/HeavySoil Results/ReportingFrequency
      simulation Sim03-SoilCNPatches -> /SoilNitrogen_CNPatch_VariabilityTests/SoilCNPatch-AddOnly/Test03-Bare+TypicSoil+addUreaLots/Sim03-ExplicitPatches
        area Paddock1-CNpatch-LightSoil -> /SoilNitrogen_CNPatch_VariabilityTests/SoilCNPatch-AddOnly/Test03-Bare+TypicSoil+addUreaLots/Sim03-ExplicitPatches/Paddock1-base-LightSoil
          folder ManagerFolder -> /SoilNitrogen_CNPatch_VariabilityTests/SoilCNPatch-AddOnly/Test03-Bare+TypicSoil+addUreaLots/Sim03-ExplicitPatches/Paddock1-base-LightSoil/ManagerFolder
            manager2 AddSoilCNPatch
              # Basic info to add a urine patch to SoilNtrogen
              AddPatch_DateToAdd = 15-Aug-2000  # Day of month to add urine patch
              AddPatch_NumAdditions = 1  # Number of times to add new patches
              AddPatch_Interval = 5  # Interval between addition of new patches (days)
              # Info about the type of deposition
              AddPatch_DepositionType = ToNewPatch  # Choose the DepositionType
              AddPatch_PatchToAdd = base  # If DepositionType is 'ToSpecificPatch' or 'ToNewPatch', choose which patch will be used
              AddPatch_NewArea = 0.25  # Relative area of new patch (0-1)
              # Info about solute to add
              AddPatch_SoluteType = Urea  # Choose the solute to be added
              AddPatch_SoluteAmount = 1000  # Amount of N to be added (kgN/ha_patch)
              script: same as in SoilCNPatch-AddOnly.Test01-Bare+addUrea.Sim01-SoilCNPatches.Paddock1-CNpatch-LightSoil.ManagerFolder.AddSoilCNPatch
          outputfile Results -> /SoilNitrogen_CNPatch_VariabilityTests/SoilCNPatch-AddOnly/Test03-Bare+TypicSoil+addUreaLots/Sim03-ExplicitPatches/Paddock1-base-LightSoil/Results: filename=Sim03-SoilCNPatches Paddock1-CNpatch-LightSoil Results.out; title=Sim03-SoilCNPatches Paddock1-CNpatch-LightSoil Results
            variables -> /SoilNitrogen_CNPatch_VariabilityTests/SoilCNPatch-AddOnly/Test03-Bare+TypicSoil+addUreaLots/Sim03-ExplicitPatches/Paddock1-base-LightSoil/Results/Variables
            events ReportingFrequency -> /SoilNitrogen_CNPatch_VariabilityTests/SoilCNPatch-AddOnly/Test03-Bare+TypicSoil+addUreaLots/Sim03-ExplicitPatches/Paddock1-base-LightSoil/Results/ReportingFrequency
        area Paddock2-CNpatch-HeavySoil -> /SoilNitrogen_CNPatch_VariabilityTests/SoilCNPatch-AddOnly/Test03-Bare+TypicSoil+addUreaLots/Sim03-ExplicitPatches/Paddock2-base-HeavySoil
          outputfile Results -> /SoilNitrogen_CNPatch_VariabilityTests/SoilCNPatch-AddOnly/Test03-Bare+TypicSoil+addUreaLots/Sim03-ExplicitPatches/Paddock2-base-HeavySoil/Results: filename=Sim03-SoilCNPatches Paddock2-CNpatch-HeavySoil Results.out; title=Sim03-SoilCNPatches Paddock2-CNpatch-HeavySoil Results
            variables -> /SoilNitrogen_CNPatch_VariabilityTests/SoilCNPatch-AddOnly/Test03-Bare+TypicSoil+addUreaLots/Sim03-ExplicitPatches/Paddock2-base-HeavySoil/Results/Variables
            events ReportingFrequency -> /SoilNitrogen_CNPatch_VariabilityTests/SoilCNPatch-AddOnly/Test03-Bare+TypicSoil+addUreaLots/Sim03-ExplicitPatches/Paddock2-base-HeavySoil/Results/ReportingFrequency
    folder Test04-Wheat+TypicSoil+addUrea -> /SoilNitrogen_CNPatch_VariabilityTests/SoilCNPatch-AddOnly/Test01-Bare+addUrea
      memo Info
        ++++++++++++++++++++  TEST 04 +++++++++++++++++++++++++++++++++++++++++++++++++++++++++++

           Description:
              - Artificial climate, smooth mild temperate;
              - Two generic soils, a free draining and a poorly drained;
              - Wheat crop;
              - Initial mineral N: 30kgN/ha as NO3 + 30kgN/ha as NH4;
              - Initial soil organic matter composed of humus and FOM;
              - Initial surface residues of 1000kgDM/ha;
              - No additions of residues;
              - Urea added as a patch, 100kgN/ha into 25% of the area

              > First simulation has two explicit patches (two paddocks)
              > Second simulation has internal patches (soilCNpatches)

           Expected output:
              - All outputs with valid values (numeric mostly);
              - Small differences between simulations, especially related to plant uptake (flow on effect on mineralN);
      simulation Sim04-ExplicitPatches -> /SoilNitrogen_CNPatch_VariabilityTests/SoilCNPatch-AddOnly/Test01-Bare+addUrea/Sim01-ExplicitPatches
        area Paddock1-base-LightSoil -> /SoilNitrogen_CNPatch_VariabilityTests/SoilCNPatch-AddOnly/Test01-Bare+addUrea/Sim01-ExplicitPatches/Paddock1-base-LightSoil
          folder ManagerFolder -> /SoilNitrogen_CNPatch_VariabilityTests/SoilCNPatch-AddOnly/Test01-Bare+addUrea/Sim01-ExplicitPatches/Paddock1-base-LightSoil/ManagerFolder
            manager HarvestingRule
              # Harvesting criteria
              crop = wheat  # Enter name of crop to harvest when ripe
              on end_of_day:
```
if ('[crop]' = 'cotton') then
   if ([crop].ozcot_status > 0) then
     [crop] harvest
   endif
elseif ([crop].StageName = 'harvest_ripe' or [crop].plant_status = 'dead') then
   [crop] harvest
   [crop] end_crop
endif
```
            operations OperationsSchedule
              5-Sep  wheat sow cultivar = Wakaniu, plants = 400, sowing_depth = 30 (mm), row_spacing = 150, crop_class = plant
              5-Sep  Fertiliser apply amount=50 (kg/ha), depth=100 (mm), type=urea_n
              30-Oct  Fertiliser apply amount=50 (kg/ha), depth=100 (mm), type=urea_n
          surfaceom SurfaceOrganicMatter
            PoolName = Residue1  # Organic Matter pool name
            type = grass  # Organic Matter type
            mass = 1000  # Initial surface residue (kg/ha)
            cnr = 20  # C:N ratio of initial residue
            standing_fraction = 0  # Fraction of residue standing
          Soil Med-LightSoil: same as SoilCNPatch-AddOnly.Test02-Bare+TypicSoil+addUrea.Sim02-ExplicitPatches.Paddock1-base-LightSoil.Med-LightSoil
          wheat
          outputfile Results -> /SoilNitrogen_CNPatch_VariabilityTests/SoilCNPatch-AddOnly/Test01-Bare+addUrea/Sim01-ExplicitPatches/Paddock1-base-LightSoil/Results: filename=Sim04-ExplicitPatches Paddock1-base-LightSoil Results.out; title=Sim04-ExplicitPatches Paddock1-base-LightSoil Results
            variables -> /SoilNitrogen_CNPatch_VariabilityTests/SoilCNPatch-AddOnly/Test01-Bare+addUrea/Sim01-ExplicitPatches/Paddock1-base-LightSoil/Results/Variables
            events ReportingFrequency -> /SoilNitrogen_CNPatch_VariabilityTests/SoilCNPatch-AddOnly/Test01-Bare+addUrea/Sim01-ExplicitPatches/Paddock1-base-LightSoil/Results/ReportingFrequency
        area Paddock1-patch-LightSoil -> /SoilNitrogen_CNPatch_VariabilityTests/SoilCNPatch-AddOnly/Test04-Wheat+TypicSoil+addUrea/Sim04-ExplicitPatches/Paddock1-base-LightSoil
          folder ManagerFolder -> /SoilNitrogen_CNPatch_VariabilityTests/SoilCNPatch-AddOnly/Test04-Wheat+TypicSoil+addUrea/Sim04-ExplicitPatches/Paddock1-base-LightSoil/ManagerFolder
            operations AddUrine
              15-Aug  Fertiliser apply amount=100 (kg/ha), depth=1 (mm), type=urea_n
          outputfile Results -> /SoilNitrogen_CNPatch_VariabilityTests/SoilCNPatch-AddOnly/Test04-Wheat+TypicSoil+addUrea/Sim04-ExplicitPatches/Paddock1-base-LightSoil/Results: filename=Sim04-ExplicitPatches Paddock1-patch-LightSoil Results.out; title=Sim04-ExplicitPatches Paddock1-patch-LightSoil Results
            variables -> /SoilNitrogen_CNPatch_VariabilityTests/SoilCNPatch-AddOnly/Test04-Wheat+TypicSoil+addUrea/Sim04-ExplicitPatches/Paddock1-base-LightSoil/Results/Variables
            events ReportingFrequency -> /SoilNitrogen_CNPatch_VariabilityTests/SoilCNPatch-AddOnly/Test04-Wheat+TypicSoil+addUrea/Sim04-ExplicitPatches/Paddock1-base-LightSoil/Results/ReportingFrequency
        area Paddock2-base-HeavySoil -> /SoilNitrogen_CNPatch_VariabilityTests/SoilCNPatch-AddOnly/Test01-Bare+addUrea/Sim01-ExplicitPatches/Paddock2-base-HeavySoil
          Soil Med-HeavySoil: LocalName=Generic medium-heavy sedimentary soil; Country=New Zealand; Latitude=0; Longitude=0
            DataSource=Hypothetical medium to heavy texture soil of sedimentary origin (moderately poorly drained)
            Analysis: same as SoilCNPatch-AddOnly.Test01-Bare+addUrea.Sim01-ExplicitPatches.Paddock2-base-HeavySoil.Med-HeavySoil.Analysis
            Water: same as SoilCNPatch-AddOnly.Test01-Bare+addUrea.Sim01-ExplicitPatches.Paddock2-base-HeavySoil.Med-HeavySoil.Water
            SoilWater: same as SoilCNPatch-AddOnly.Test01-Bare+addUrea.Sim01-ExplicitPatches.Paddock2-base-HeavySoil.Med-HeavySoil.SoilWater
            SoilOrganicMatter: same as SoilCNPatch-AddOnly.Test02-Bare+TypicSoil+addUrea.Sim02-ExplicitPatches.Paddock2-base-HeavySoil.Med-HeavySoil.SoilOrganicMatter
            Sample Initial nitrogen -> /SoilNitrogen_CNPatch_VariabilityTests/SoilCNPatch-AddOnly/Test04-Wheat+TypicSoil+addUrea/Sim04-ExplicitPatches/Paddock1-base-LightSoil/Med-LightSoil/Initial nitrogen
            InitialWater: FractionFull=1; PercentMethod=EvenlyDistributed; RelativeTo=ll15
          outputfile Results -> /SoilNitrogen_CNPatch_VariabilityTests/SoilCNPatch-AddOnly/Test01-Bare+addUrea/Sim01-ExplicitPatches/Paddock2-base-HeavySoil/Results: filename=Sim04-ExplicitPatches Paddock2-base-HeavySoil Results.out; title=Sim04-ExplicitPatches Paddock2-base-HeavySoil Results
            variables -> /SoilNitrogen_CNPatch_VariabilityTests/SoilCNPatch-AddOnly/Test01-Bare+addUrea/Sim01-ExplicitPatches/Paddock2-base-HeavySoil/Results/Variables
            events ReportingFrequency -> /SoilNitrogen_CNPatch_VariabilityTests/SoilCNPatch-AddOnly/Test01-Bare+addUrea/Sim01-ExplicitPatches/Paddock2-base-HeavySoil/Results/ReportingFrequency
        area Paddock2-patch-HeavySoil -> /SoilNitrogen_CNPatch_VariabilityTests/SoilCNPatch-AddOnly/Test04-Wheat+TypicSoil+addUrea/Sim04-ExplicitPatches/Paddock2-base-HeavySoil
          outputfile Results -> /SoilNitrogen_CNPatch_VariabilityTests/SoilCNPatch-AddOnly/Test04-Wheat+TypicSoil+addUrea/Sim04-ExplicitPatches/Paddock2-base-HeavySoil/Results: filename=Sim04-ExplicitPatches Paddock2-patch-HeavySoil Results.out; title=Sim04-ExplicitPatches Paddock2-patch-HeavySoil Results
            variables -> /SoilNitrogen_CNPatch_VariabilityTests/SoilCNPatch-AddOnly/Test04-Wheat+TypicSoil+addUrea/Sim04-ExplicitPatches/Paddock2-base-HeavySoil/Results/Variables
            events ReportingFrequency -> /SoilNitrogen_CNPatch_VariabilityTests/SoilCNPatch-AddOnly/Test04-Wheat+TypicSoil+addUrea/Sim04-ExplicitPatches/Paddock2-base-HeavySoil/Results/ReportingFrequency
        outputfile LightSoil Results -> /SoilNitrogen_CNPatch_VariabilityTests/SoilCNPatch-AddOnly/Test01-Bare+addUrea/Sim01-ExplicitPatches/LightSoil Results: filename=Sim04-ExplicitPatches LightSoil Results.out; title=Sim04-ExplicitPatches LightSoil Results
          variables -> /SoilNitrogen_CNPatch_VariabilityTests/SoilCNPatch-AddOnly/Test01-Bare+addUrea/Sim01-ExplicitPatches/LightSoil Results/Variables
          events ReportingFrequency -> /SoilNitrogen_CNPatch_VariabilityTests/SoilCNPatch-AddOnly/Test01-Bare+addUrea/Sim01-ExplicitPatches/LightSoil Results/ReportingFrequency
        outputfile HeavySoil Results -> /SoilNitrogen_CNPatch_VariabilityTests/SoilCNPatch-AddOnly/Test01-Bare+addUrea/Sim01-ExplicitPatches/HeavySoil Results: filename=Sim04-ExplicitPatches HeavySoil Results.out; title=Sim04-ExplicitPatches HeavySoil Results
          variables -> /SoilNitrogen_CNPatch_VariabilityTests/SoilCNPatch-AddOnly/Test01-Bare+addUrea/Sim01-ExplicitPatches/HeavySoil Results/Variables
          events ReportingFrequency -> /SoilNitrogen_CNPatch_VariabilityTests/SoilCNPatch-AddOnly/Test01-Bare+addUrea/Sim01-ExplicitPatches/HeavySoil Results/ReportingFrequency
      simulation Sim04-SoilCNPatches -> /SoilNitrogen_CNPatch_VariabilityTests/SoilCNPatch-AddOnly/Test04-Wheat+TypicSoil+addUrea/Sim04-ExplicitPatches
        area Paddock1-CNpatch-LightSoil -> /SoilNitrogen_CNPatch_VariabilityTests/SoilCNPatch-AddOnly/Test04-Wheat+TypicSoil+addUrea/Sim04-ExplicitPatches/Paddock1-base-LightSoil
          folder ManagerFolder -> /SoilNitrogen_CNPatch_VariabilityTests/SoilCNPatch-AddOnly/Test04-Wheat+TypicSoil+addUrea/Sim04-ExplicitPatches/Paddock1-base-LightSoil/ManagerFolder
            manager2 AddSoilCNPatch: same as SoilCNPatch-AddOnly.Test01-Bare+addUrea.Sim01-SoilCNPatches.Paddock1-CNpatch-LightSoil.ManagerFolder.AddSoilCNPatch
          outputfile Results -> /SoilNitrogen_CNPatch_VariabilityTests/SoilCNPatch-AddOnly/Test04-Wheat+TypicSoil+addUrea/Sim04-ExplicitPatches/Paddock1-base-LightSoil/Results: filename=Sim04-SoilCNPatches Paddock1-CNpatch-LightSoil Results.out; title=Sim04-SoilCNPatches Paddock1-CNpatch-LightSoil Results
            variables -> /SoilNitrogen_CNPatch_VariabilityTests/SoilCNPatch-AddOnly/Test04-Wheat+TypicSoil+addUrea/Sim04-ExplicitPatches/Paddock1-base-LightSoil/Results/Variables
            events ReportingFrequency -> /SoilNitrogen_CNPatch_VariabilityTests/SoilCNPatch-AddOnly/Test04-Wheat+TypicSoil+addUrea/Sim04-ExplicitPatches/Paddock1-base-LightSoil/Results/ReportingFrequency
        area Paddock2-CNpatch-HeavySoil -> /SoilNitrogen_CNPatch_VariabilityTests/SoilCNPatch-AddOnly/Test04-Wheat+TypicSoil+addUrea/Sim04-ExplicitPatches/Paddock2-base-HeavySoil
          outputfile Results -> /SoilNitrogen_CNPatch_VariabilityTests/SoilCNPatch-AddOnly/Test04-Wheat+TypicSoil+addUrea/Sim04-ExplicitPatches/Paddock2-base-HeavySoil/Results: filename=Sim04-SoilCNPatches Paddock2-CNpatch-HeavySoil Results.out; title=Sim04-SoilCNPatches Paddock2-CNpatch-HeavySoil Results
            variables -> /SoilNitrogen_CNPatch_VariabilityTests/SoilCNPatch-AddOnly/Test04-Wheat+TypicSoil+addUrea/Sim04-ExplicitPatches/Paddock2-base-HeavySoil/Results/Variables
            events ReportingFrequency -> /SoilNitrogen_CNPatch_VariabilityTests/SoilCNPatch-AddOnly/Test04-Wheat+TypicSoil+addUrea/Sim04-ExplicitPatches/Paddock2-base-HeavySoil/Results/ReportingFrequency
    folder Test05-Pasture+TypicSoil+addUrea -> /SoilNitrogen_CNPatch_VariabilityTests/SoilCNPatch-AddOnly/Test01-Bare+addUrea
      memo Info
        ++++++++++++++++++++  TEST 05 +++++++++++++++++++++++++++++++++++++++++++++++++++++++++++

           Description:
              - Artificial climate, smooth mild temperate;
              - Two generic soils, a free draining and a poorly drained;
              - Pastoral system;
              - Initial mineral N: 30kgN/ha as NO3 + 30kgN/ha as NH4;
              - Initial soil organic matter composed of humus and FOM;
              - Initial surface residues of 1000kgDM/ha;
              - No additions of residues;
              - Urea added as a patch, 100kgN/ha into 25% of the area

              > First simulation has two explicit patches (two paddocks)
              > Second simulation has internal patches (soilCNpatches)

           Expected output:
              - All outputs with valid values (numeric mostly);
              - Relatively small differences between simulations, especially related to plant uptake (flow on effect on mineralN);
      simulation Sim05-ExplicitPatches -> /SoilNitrogen_CNPatch_VariabilityTests/SoilCNPatch-AddOnly/Test01-Bare+addUrea/Sim01-ExplicitPatches
        area Paddock1-base-LightSoil -> /SoilNitrogen_CNPatch_VariabilityTests/SoilCNPatch-AddOnly/Test01-Bare+addUrea/Sim01-ExplicitPatches/Paddock1-base-LightSoil
          folder ManagerFolder -> /SoilNitrogen_CNPatch_VariabilityTests/SoilCNPatch-AddOnly/Test01-Bare+addUrea/Sim01-ExplicitPatches/Paddock1-base-LightSoil/ManagerFolder
            manager CutAgPasture
              # Cut or graze rotation
              CutPasture_start_date = 01/01/1900  # Enter date to start rotation (dd/mm/yyyy)
              CutPasture_end_date = 31/12/2100  # Enter date to end rotation (dd/mm/yyyy)
              AgPasture_type = AgPasture  # Enter pasture type
              rotation_type = Fixed intervals  # Enter the rotation type
              cut_interval = 21  # Enter the interval between cuts/grazings (days)
              upper_threshold = 2000  # Enter the sward DM to trigger cut (kg/ha)
              lower_threshold = 1500  # Enter the residual DM after cut (kg/ha)
              # Management of cut/grazed material
              treatment_type = Return as residue  # Enter the treatment type for the cut/grazed material
              remove_dm_frac = 0.98  # Enter fraction of DM that is removed from field (0-1)
              remove_n_frac = 0.98  # Enter fraction of N that is removed from field (0-1)
              dung_fraction = 0.0  # Enter proportion of N returned in dung (0-1)
              on init:
```
! -->   Last updated in: 11/July/2011  ..........
! . Author: Rogerio Cichota

days_after_cut = [cut_interval] - 1
Do_Cut = 'FALSE'
Has_Cut = 'FALSE'
harvested_dm =0
harvested_n = 0
removed_dm = 0.0
removed_n = 0.0
return_dm = 0.0
return_n = 0.0
GrowthRateCalc = 0
n_conc_total = 0
```
              on start_of_day:
```
if today >= date('[CutPasture_start_date]') and today <= date('[CutPasture_end_date]') then

   preharvest_dm = [AgPasture_type].StemWt + [AgPasture_type].LeafWt
   preharvest_n = [AgPasture_type].StemN + [AgPasture_type].LeafN
   harvested_dm = 0.0
   harvested_n = 0.0
   removed_dm = 0.0
   removed_n = 0.0
   return_dm = 0.0
   return_n = 0.0
   GrowthRateCalc = 0.0
   n_conc_removed = 0.0
   days_after_cut = days_after_cut + 1
   Has_Cut = 'FALSE'

   if '[rotation_type]' = 'Fixed intervals' then
      if days_after_cut = [cut_interval] then
         Do_Cut = 'TRUE'
      else
         Do_Cut = 'FALSE'
      endif
   elseif '[rotation_type]' = 'Target mass' then
      if preharvest_dm >= [upper_threshold] then
         Do_Cut = 'TRUE'
      else
         Do_Cut = 'FALSE'
      endif
   endif

endif   ! of today

If Do_Cut = 'TRUE' then
   
!- Cut or graze ---------------------------------------------------------------------------------------

   if preharvest_dm > [lower_threshold] then
      [AgPasture_type] graze type = 'SetResidueAmount', amount = [lower_threshold]
      Has_Cut = 'TRUE'
      harvested_dm = [AgPasture_type].HarvestWt
      harvested_n = [AgPasture_type].HarvestN
      GrowthRateCalc = harvested_dm/days_after_cut
      if harvested_dm > 0 then
         n_conc_removed = harvested_n*100/harvested_dm
      endif
      days_after_cut = 0

!- Residue management -------------------------------------------------------------------------
      removed_dm =  harvested_dm* [remove_dm_frac]
      removed_n = harvested_n* [remove_n_frac]
      return_dm = harvested_dm - removed_dm 
      return_n = harvested_n - removed_n 

      if '[treatment_type]' = 'Return as residue' and [remove_dm_frac] < 1 then
         'SurfaceOrganicMatter' add_surfaceom name = grass, type = grass, mass =  return_dm (kg/ha), n = return_n (kg/ha), cpr = 0
      elseif '[treatment_type]' = 'Return as dung & urine' then
         ! It is advised that dung and urine return should be done using other manager, 'Urine_patch' or 'Apply or return N and water'
         N_on_dung = return_n * [dung_fraction]
         N_on_urine = return_n - N_on_dung
         'SurfaceOrganicMatter' add_surfaceom name = dung, type = RuminantDung_PastureFed, mass =  return_dm (kg/ha), n = N_on_dung (kg/ha), cpr = 0
         if N_on_urine > 0 then
            fertiliser apply amount = N_on_urine (kg/ha), depth = 10 (mm), type = urea_n ()
         endif
      endif
   endif

endif  ! of Do_Cut
```
            operations OperationsSchedule
              15-Aug  Fertiliser apply amount=50 (kg/ha), depth=100 (mm), type=urea_n
              25-Sep  Fertiliser apply amount=50 (kg/ha), depth=100 (mm), type=urea_n
              5-Nov  Fertiliser apply amount=50 (kg/ha), depth=100 (mm), type=urea_n
          micromet
            soilalbedo = 0.23
            a_interception = 0
            b_interception = 0
            c_interception = 0
            d_interception = 0
          surfaceom SurfaceOrganicMatter
            PoolName = Residue1  # Organic Matter pool name
            type = grass  # Organic Matter type
            mass = 1000  # Initial surface residue (kg/ha)
            cnr = 20  # C:N ratio of initial residue
            standing_fraction = 0  # Fraction of residue standing
          Soil Med-LightSoil: same as SoilCNPatch-AddOnly.Test02-Bare+TypicSoil+addUrea.Sim02-ExplicitPatches.Paddock1-base-LightSoil.Med-LightSoil
          AgPasture
            # Initial values for each species to be simulated
            speciesToSimulate = Ryegrass    WhiteClover  # Name of the species to be simulated
            iniShootDM = 1500   500  # Initial above ground dry matter weight (kgDM/ha)
            iniRootDM = 450     150  # Initial root dry matter weight (kgDM/ha)
            iniRootDepth = 750     350  # Initial rooting depth (mm)
            WaterUptakeSource = calc  # Water uptake done by AgPasture (calc) or by apsim?
          outputfile Results -> /SoilNitrogen_CNPatch_VariabilityTests/SoilCNPatch-AddOnly/Test01-Bare+addUrea/Sim01-ExplicitPatches/Paddock1-base-LightSoil/Results: filename=Sim05-ExplicitPatches Paddock1-base-LightSoil Results.out; title=Sim05-ExplicitPatches Paddock1-base-LightSoil Results
            variables -> /SoilNitrogen_CNPatch_VariabilityTests/SoilCNPatch-AddOnly/Test01-Bare+addUrea/Sim01-ExplicitPatches/Paddock1-base-LightSoil/Results/Variables
            events ReportingFrequency -> /SoilNitrogen_CNPatch_VariabilityTests/SoilCNPatch-AddOnly/Test01-Bare+addUrea/Sim01-ExplicitPatches/Paddock1-base-LightSoil/Results/ReportingFrequency
        area Paddock1-patch-LightSoil -> /SoilNitrogen_CNPatch_VariabilityTests/SoilCNPatch-AddOnly/Test05-Pasture+TypicSoil+addUrea/Sim05-ExplicitPatches/Paddock1-base-LightSoil
          folder ManagerFolder -> /SoilNitrogen_CNPatch_VariabilityTests/SoilCNPatch-AddOnly/Test05-Pasture+TypicSoil+addUrea/Sim05-ExplicitPatches/Paddock1-base-LightSoil/ManagerFolder
            operations AddUrine
              15-Aug  Fertiliser apply amount=100 (kg/ha), depth=1 (mm), type=urea_n
          outputfile Results -> /SoilNitrogen_CNPatch_VariabilityTests/SoilCNPatch-AddOnly/Test05-Pasture+TypicSoil+addUrea/Sim05-ExplicitPatches/Paddock1-base-LightSoil/Results: filename=Sim05-ExplicitPatches Paddock1-patch-LightSoil Results.out; title=Sim05-ExplicitPatches Paddock1-patch-LightSoil Results
            variables -> /SoilNitrogen_CNPatch_VariabilityTests/SoilCNPatch-AddOnly/Test05-Pasture+TypicSoil+addUrea/Sim05-ExplicitPatches/Paddock1-base-LightSoil/Results/Variables
            events ReportingFrequency -> /SoilNitrogen_CNPatch_VariabilityTests/SoilCNPatch-AddOnly/Test05-Pasture+TypicSoil+addUrea/Sim05-ExplicitPatches/Paddock1-base-LightSoil/Results/ReportingFrequency
        area Paddock2-base-HeavySoil -> /SoilNitrogen_CNPatch_VariabilityTests/SoilCNPatch-AddOnly/Test01-Bare+addUrea/Sim01-ExplicitPatches/Paddock2-base-HeavySoil
          Soil Med-HeavySoil: LocalName=Generic medium-heavy sedimentary soil; Country=New Zealand; Latitude=0; Longitude=0
            DataSource=Hypothetical medium to heavy texture soil of sedimentary origin (moderately poorly drained)
            Analysis: same as SoilCNPatch-AddOnly.Test01-Bare+addUrea.Sim01-ExplicitPatches.Paddock2-base-HeavySoil.Med-HeavySoil.Analysis
            Water: same as SoilCNPatch-AddOnly.Test01-Bare+addUrea.Sim01-ExplicitPatches.Paddock2-base-HeavySoil.Med-HeavySoil.Water
            SoilWater: same as SoilCNPatch-AddOnly.Test01-Bare+addUrea.Sim01-ExplicitPatches.Paddock2-base-HeavySoil.Med-HeavySoil.SoilWater
            SoilOrganicMatter: same as SoilCNPatch-AddOnly.Test02-Bare+TypicSoil+addUrea.Sim02-ExplicitPatches.Paddock2-base-HeavySoil.Med-HeavySoil.SoilOrganicMatter
            Sample Initial nitrogen -> /SoilNitrogen_CNPatch_VariabilityTests/SoilCNPatch-AddOnly/Test05-Pasture+TypicSoil+addUrea/Sim05-ExplicitPatches/Paddock1-base-LightSoil/Med-LightSoil/Initial nitrogen
            InitialWater: FractionFull=1; PercentMethod=EvenlyDistributed; RelativeTo=ll15
          outputfile Results -> /SoilNitrogen_CNPatch_VariabilityTests/SoilCNPatch-AddOnly/Test01-Bare+addUrea/Sim01-ExplicitPatches/Paddock2-base-HeavySoil/Results: filename=Sim05-ExplicitPatches Paddock2-base-HeavySoil Results.out; title=Sim05-ExplicitPatches Paddock2-base-HeavySoil Results
            variables -> /SoilNitrogen_CNPatch_VariabilityTests/SoilCNPatch-AddOnly/Test01-Bare+addUrea/Sim01-ExplicitPatches/Paddock2-base-HeavySoil/Results/Variables
            events ReportingFrequency -> /SoilNitrogen_CNPatch_VariabilityTests/SoilCNPatch-AddOnly/Test01-Bare+addUrea/Sim01-ExplicitPatches/Paddock2-base-HeavySoil/Results/ReportingFrequency
        area Paddock2-patch-HeavySoil -> /SoilNitrogen_CNPatch_VariabilityTests/SoilCNPatch-AddOnly/Test05-Pasture+TypicSoil+addUrea/Sim05-ExplicitPatches/Paddock2-base-HeavySoil
          outputfile Results -> /SoilNitrogen_CNPatch_VariabilityTests/SoilCNPatch-AddOnly/Test05-Pasture+TypicSoil+addUrea/Sim05-ExplicitPatches/Paddock2-base-HeavySoil/Results: filename=Sim05-ExplicitPatches Paddock2-patch-HeavySoil Results.out; title=Sim05-ExplicitPatches Paddock2-patch-HeavySoil Results
            variables -> /SoilNitrogen_CNPatch_VariabilityTests/SoilCNPatch-AddOnly/Test05-Pasture+TypicSoil+addUrea/Sim05-ExplicitPatches/Paddock2-base-HeavySoil/Results/Variables
            events ReportingFrequency -> /SoilNitrogen_CNPatch_VariabilityTests/SoilCNPatch-AddOnly/Test05-Pasture+TypicSoil+addUrea/Sim05-ExplicitPatches/Paddock2-base-HeavySoil/Results/ReportingFrequency
        outputfile LightSoil Results -> /SoilNitrogen_CNPatch_VariabilityTests/SoilCNPatch-AddOnly/Test01-Bare+addUrea/Sim01-ExplicitPatches/LightSoil Results: filename=Sim05-ExplicitPatches LightSoil Results.out; title=Sim05-ExplicitPatches LightSoil Results
          variables -> /SoilNitrogen_CNPatch_VariabilityTests/SoilCNPatch-AddOnly/Test01-Bare+addUrea/Sim01-ExplicitPatches/LightSoil Results/Variables
          events ReportingFrequency -> /SoilNitrogen_CNPatch_VariabilityTests/SoilCNPatch-AddOnly/Test01-Bare+addUrea/Sim01-ExplicitPatches/LightSoil Results/ReportingFrequency
        outputfile HeavySoil Results -> /SoilNitrogen_CNPatch_VariabilityTests/SoilCNPatch-AddOnly/Test01-Bare+addUrea/Sim01-ExplicitPatches/HeavySoil Results: filename=Sim05-ExplicitPatches HeavySoil Results.out; title=Sim05-ExplicitPatches HeavySoil Results
          variables -> /SoilNitrogen_CNPatch_VariabilityTests/SoilCNPatch-AddOnly/Test01-Bare+addUrea/Sim01-ExplicitPatches/HeavySoil Results/Variables
          events ReportingFrequency -> /SoilNitrogen_CNPatch_VariabilityTests/SoilCNPatch-AddOnly/Test01-Bare+addUrea/Sim01-ExplicitPatches/HeavySoil Results/ReportingFrequency
      simulation Sim05-SoilCNPatches -> /SoilNitrogen_CNPatch_VariabilityTests/SoilCNPatch-AddOnly/Test05-Pasture+TypicSoil+addUrea/Sim05-ExplicitPatches
        area Paddock1-CNpatch-LightSoil -> /SoilNitrogen_CNPatch_VariabilityTests/SoilCNPatch-AddOnly/Test05-Pasture+TypicSoil+addUrea/Sim05-ExplicitPatches/Paddock1-base-LightSoil
          folder ManagerFolder -> /SoilNitrogen_CNPatch_VariabilityTests/SoilCNPatch-AddOnly/Test05-Pasture+TypicSoil+addUrea/Sim05-ExplicitPatches/Paddock1-base-LightSoil/ManagerFolder
            manager2 AddSoilCNPatch: same as SoilCNPatch-AddOnly.Test01-Bare+addUrea.Sim01-SoilCNPatches.Paddock1-CNpatch-LightSoil.ManagerFolder.AddSoilCNPatch
          outputfile Results -> /SoilNitrogen_CNPatch_VariabilityTests/SoilCNPatch-AddOnly/Test05-Pasture+TypicSoil+addUrea/Sim05-ExplicitPatches/Paddock1-base-LightSoil/Results: filename=Sim05-SoilCNPatches Paddock1-CNpatch-LightSoil Results.out; title=Sim05-SoilCNPatches Paddock1-CNpatch-LightSoil Results
            variables -> /SoilNitrogen_CNPatch_VariabilityTests/SoilCNPatch-AddOnly/Test05-Pasture+TypicSoil+addUrea/Sim05-ExplicitPatches/Paddock1-base-LightSoil/Results/Variables
            events ReportingFrequency -> /SoilNitrogen_CNPatch_VariabilityTests/SoilCNPatch-AddOnly/Test05-Pasture+TypicSoil+addUrea/Sim05-ExplicitPatches/Paddock1-base-LightSoil/Results/ReportingFrequency
        area Paddock2-CNpatch-HeavySoil -> /SoilNitrogen_CNPatch_VariabilityTests/SoilCNPatch-AddOnly/Test05-Pasture+TypicSoil+addUrea/Sim05-ExplicitPatches/Paddock2-base-HeavySoil
          outputfile Results -> /SoilNitrogen_CNPatch_VariabilityTests/SoilCNPatch-AddOnly/Test05-Pasture+TypicSoil+addUrea/Sim05-ExplicitPatches/Paddock2-base-HeavySoil/Results: filename=Sim05-SoilCNPatches Paddock2-CNpatch-HeavySoil Results.out; title=Sim05-SoilCNPatches Paddock2-CNpatch-HeavySoil Results
            variables -> /SoilNitrogen_CNPatch_VariabilityTests/SoilCNPatch-AddOnly/Test05-Pasture+TypicSoil+addUrea/Sim05-ExplicitPatches/Paddock2-base-HeavySoil/Results/Variables
            events ReportingFrequency -> /SoilNitrogen_CNPatch_VariabilityTests/SoilCNPatch-AddOnly/Test05-Pasture+TypicSoil+addUrea/Sim05-ExplicitPatches/Paddock2-base-HeavySoil/Results/ReportingFrequency
    folder Test06-SWIM3-Bare+TypicSoil+addUrea -> /SoilNitrogen_CNPatch_VariabilityTests/SoilCNPatch-AddOnly/Test01-Bare+addUrea
      memo Info
        ++++++++++++++++++++  TEST 06 +++++++++++++++++++++++++++++++++++++++++++++++++++++++++++

           Description:
              - Artificial climate, smooth mild temperate;
              - Two generic soils, a free draining and a poorly drained;
              - Bare soil;
              - Initial mineral N: 30kgN/ha as NO3 + 30kgN/ha as NH4;
              - Initial soil organic matter composed of humus and FOM;
              - Initial surface residues of 1000kgDM/ha;
              - No additions of residues;
              - Urea added as a patch, 100kgN/ha into 25% of the area

              >> Using SWIM3 as water module  <<

              > First simulation has two explicit patches (two paddocks)
              > Second simulation has internal patches (soilCNpatches)

           Expected output:
              - All outputs with valid values (numeric mostly);
              - Small differences between simulations as the patches are bare;
      simulation Sim06-ExplicitPatches -> /SoilNitrogen_CNPatch_VariabilityTests/SoilCNPatch-AddOnly/Test01-Bare+addUrea/Sim01-ExplicitPatches
        area Paddock1-base-LightSoil -> /SoilNitrogen_CNPatch_VariabilityTests/SoilCNPatch-AddOnly/Test01-Bare+addUrea/Sim01-ExplicitPatches/Paddock1-base-LightSoil
          surfaceom SurfaceOrganicMatter
            PoolName = Residue1  # Organic Matter pool name
            type = grass  # Organic Matter type
            mass = 1000  # Initial surface residue (kg/ha)
            cnr = 20  # C:N ratio of initial residue
            standing_fraction = 0  # Fraction of residue standing
          Soil Med-LightSoil: LocalName=Generic medium-light sedimentary soil; Country=New Zealand; Latitude=0; Longitude=0
            DataSource=Hypothetical medium to light texture soil of sedimentary origin (moderately high drainage)
            Analysis: same as SoilCNPatch-AddOnly.Test01-Bare+addUrea.Sim01-ExplicitPatches.Paddock1-base-LightSoil.Med-LightSoil.Analysis
            Water: same as SoilCNPatch-AddOnly.Test01-Bare+addUrea.Sim01-ExplicitPatches.Paddock1-base-LightSoil.Med-LightSoil.Water
            Swim: Salb=0.13; CN2Bare=50; CNRed=20; CNCov=0.8; KDul=0.25; PSIDul=-100; VC=true; DTmin=0; DTmax=1440; MaxWaterIncrement=10; SpaceWeightingFactor=0; SoluteSpaceWeightingFactor=0; Diagnostics=false
              SwimSoluteParameters: Dis=6; Disp=1; DTHP=1
                zero: A, DTHC, WaterTableCl, WaterTableNO3, WaterTableNH4, WaterTableUrea, WaterTableTracer, WaterTableMineralisationInhibitor, WaterTableUreaseInhibitor, WaterTableNitrificationInhibitor, WaterTableDenitrificationInhibitor
                Thickness  NO3Exco  NO3FIP  NH4Exco  NH4FIP  UreaExco  UreaFIP
                100        0        1       100      0.5     0         1
                50         0        1       100      0.5     0         1
                150        0        1       100      0.5     0         1
                50         0        1       100      0.5     0         1
                100        0        1       100      0.5     0         1
                200        0        1       100      0.5     0         1
                50         0        1       100      0.5     0         1
                300        0        1       100      0.5     0         1
            SoilOrganicMatter: same as SoilCNPatch-AddOnly.Test02-Bare+TypicSoil+addUrea.Sim02-ExplicitPatches.Paddock1-base-LightSoil.Med-LightSoil.SoilOrganicMatter
            Sample Initial nitrogen: NO3Units=kgha; NH4Units=kgha; SWUnits=Volumetric; OCUnits=Total; PHUnits=Water
              Thickness  NO3  NH4
              150        5    5
              150        5    5
              300        5    5
              300        5    5
              300        5    5
              300        5    5
            InitialWater: FractionFull=1; PercentMethod=EvenlyDistributed; RelativeTo=ll15
            LayerStructure
              Thickness=[5, 10, 15, 20, 20, 30, 50, 50, 50, 50, 50, 50, 50, 75, 75, 75, 75, 75, 75, 100, 100, 100, 80, 70, 60, 45, 45]
          outputfile Results -> /SoilNitrogen_CNPatch_VariabilityTests/SoilCNPatch-AddOnly/Test01-Bare+addUrea/Sim01-ExplicitPatches/Paddock1-base-LightSoil/Results: filename=Sim06-ExplicitPatches Paddock1-base-LightSoil Results.out; title=Sim06-ExplicitPatches Paddock1-base-LightSoil Results
            variables -> /SoilNitrogen_CNPatch_VariabilityTests/SoilCNPatch-AddOnly/Test01-Bare+addUrea/Sim01-ExplicitPatches/Paddock1-base-LightSoil/Results/Variables
            events ReportingFrequency -> /SoilNitrogen_CNPatch_VariabilityTests/SoilCNPatch-AddOnly/Test01-Bare+addUrea/Sim01-ExplicitPatches/Paddock1-base-LightSoil/Results/ReportingFrequency
        area Paddock1-patch-LightSoil -> /SoilNitrogen_CNPatch_VariabilityTests/SoilCNPatch-AddOnly/Test06-SWIM3-Bare+TypicSoil+addUrea/Sim06-ExplicitPatches/Paddock1-base-LightSoil
          folder ManagerFolder -> /SoilNitrogen_CNPatch_VariabilityTests/SoilCNPatch-AddOnly/Test06-SWIM3-Bare+TypicSoil+addUrea/Sim06-ExplicitPatches/Paddock1-base-LightSoil/ManagerFolder
            operations AddUrine
              15-Aug  Fertiliser apply amount=100 (kg/ha), depth=1 (mm), type=urea_n
          outputfile Results -> /SoilNitrogen_CNPatch_VariabilityTests/SoilCNPatch-AddOnly/Test06-SWIM3-Bare+TypicSoil+addUrea/Sim06-ExplicitPatches/Paddock1-base-LightSoil/Results: filename=Sim06-ExplicitPatches Paddock1-patch-LightSoil Results.out; title=Sim06-ExplicitPatches Paddock1-patch-LightSoil Results
            variables -> /SoilNitrogen_CNPatch_VariabilityTests/SoilCNPatch-AddOnly/Test06-SWIM3-Bare+TypicSoil+addUrea/Sim06-ExplicitPatches/Paddock1-base-LightSoil/Results/Variables
            events ReportingFrequency -> /SoilNitrogen_CNPatch_VariabilityTests/SoilCNPatch-AddOnly/Test06-SWIM3-Bare+TypicSoil+addUrea/Sim06-ExplicitPatches/Paddock1-base-LightSoil/Results/ReportingFrequency
        area Paddock2-base-HeavySoil -> /SoilNitrogen_CNPatch_VariabilityTests/SoilCNPatch-AddOnly/Test01-Bare+addUrea/Sim01-ExplicitPatches/Paddock2-base-HeavySoil
          Soil Med-HeavySoil: LocalName=Generic medium-heavy sedimentary soil; Country=New Zealand; Latitude=0; Longitude=0
            DataSource=Hypothetical medium to heavy texture soil of sedimentary origin (moderately poorly drained)
            Analysis: same as SoilCNPatch-AddOnly.Test01-Bare+addUrea.Sim01-ExplicitPatches.Paddock2-base-HeavySoil.Med-HeavySoil.Analysis
            Water: same as SoilCNPatch-AddOnly.Test01-Bare+addUrea.Sim01-ExplicitPatches.Paddock2-base-HeavySoil.Med-HeavySoil.Water
            Swim: same as SoilCNPatch-AddOnly.Test06-SWIM3-Bare+TypicSoil+addUrea.Sim06-ExplicitPatches.Paddock1-base-LightSoil.Med-LightSoil.Swim
            SoilOrganicMatter: same as SoilCNPatch-AddOnly.Test02-Bare+TypicSoil+addUrea.Sim02-ExplicitPatches.Paddock2-base-HeavySoil.Med-HeavySoil.SoilOrganicMatter
            Sample Initial nitrogen -> /SoilNitrogen_CNPatch_VariabilityTests/SoilCNPatch-AddOnly/Test06-SWIM3-Bare+TypicSoil+addUrea/Sim06-ExplicitPatches/Paddock1-base-LightSoil/Med-LightSoil/Initial nitrogen
            InitialWater: FractionFull=1; PercentMethod=EvenlyDistributed; RelativeTo=ll15
            LayerStructure
              Thickness=[5, 10, 15, 20, 20, 30, 50, 50, 50, 50, 50, 50, 50, 75, 75, 75, 75, 75, 75, 100, 100, 100, 80, 70, 60, 45, 45]
          outputfile Results -> /SoilNitrogen_CNPatch_VariabilityTests/SoilCNPatch-AddOnly/Test01-Bare+addUrea/Sim01-ExplicitPatches/Paddock2-base-HeavySoil/Results: filename=Sim06-ExplicitPatches Paddock2-base-HeavySoil Results.out; title=Sim06-ExplicitPatches Paddock2-base-HeavySoil Results
            variables -> /SoilNitrogen_CNPatch_VariabilityTests/SoilCNPatch-AddOnly/Test01-Bare+addUrea/Sim01-ExplicitPatches/Paddock2-base-HeavySoil/Results/Variables
            events ReportingFrequency -> /SoilNitrogen_CNPatch_VariabilityTests/SoilCNPatch-AddOnly/Test01-Bare+addUrea/Sim01-ExplicitPatches/Paddock2-base-HeavySoil/Results/ReportingFrequency
        area Paddock2-patch-HeavySoil -> /SoilNitrogen_CNPatch_VariabilityTests/SoilCNPatch-AddOnly/Test06-SWIM3-Bare+TypicSoil+addUrea/Sim06-ExplicitPatches/Paddock2-base-HeavySoil
          outputfile Results -> /SoilNitrogen_CNPatch_VariabilityTests/SoilCNPatch-AddOnly/Test06-SWIM3-Bare+TypicSoil+addUrea/Sim06-ExplicitPatches/Paddock2-base-HeavySoil/Results: filename=Sim06-ExplicitPatches Paddock2-patch-HeavySoil Results.out; title=Sim06-ExplicitPatches Paddock2-patch-HeavySoil Results
            variables -> /SoilNitrogen_CNPatch_VariabilityTests/SoilCNPatch-AddOnly/Test06-SWIM3-Bare+TypicSoil+addUrea/Sim06-ExplicitPatches/Paddock2-base-HeavySoil/Results/Variables
            events ReportingFrequency -> /SoilNitrogen_CNPatch_VariabilityTests/SoilCNPatch-AddOnly/Test06-SWIM3-Bare+TypicSoil+addUrea/Sim06-ExplicitPatches/Paddock2-base-HeavySoil/Results/ReportingFrequency
        manager2 Aux-SumOutputs1
          # This script sums up variables from two paddocks
          Pdk01Name = Paddock1-base-LightSoil  # Name of first paddock
          Pdk01Area = 0.75  # Relative area of first paddock [0-1]
          Pdk02Name = Paddock1-patch-LightSoil  # Name of second paddock
          Pdk02Area = 0.25  # Relative area of second paddock [0-1]
```csharp
using System;
using ModelFramework;

public class Script 
{     

   [Param] private string Pdk01Name;
   [Param] private double Pdk01Area;
   [Param] private string Pdk02Name;
   [Param] private double Pdk02Area;
   
   [Link] Simulation myBlock;
   
   [Output][Units("mm")] public double[] dlayer_p1;
   [Output][Units("mm")] public double es_p1;
   [Output][Units("mm")] public double[] sw_uptake_p1;
   [Output][Units("mm")] public double drain_p1;
   [Output][Units("mm")] public double runoff_p1;
   [Output][Units("mm")] public double pond_p1;

   [Output][Units("kg/ha")] public double[] urea_p1;
   [Output][Units("kg/ha")] public double[] nh4_p1;
   [Output][Units("kg/ha")] public double[] no3_p1;
   [Output][Units("kg/ha")] public double[] fom_n_p1;
   [Output][Units("kg/ha")] public double[] biom_n_p1;
   [Output][Units("kg/ha")] public double[] hum_n_p1;
   [Output][Units("kg/ha")] public double surfaceom_n_p1;
   [Output][Units("kg/ha")] public double PlantN_p1;
   [Output][Units("kg/ha")] public double PlantNuptake_p1;
   [Output][Units("kg/ha")] public double Fertiliser_p1;

   [Output][Units("kg/ha")] public double[] fom_c_p1;
   [Output][Units("kg/ha")] public double[] biom_c_p1;
   [Output][Units("kg/ha")] public double[] hum_c_p1;
   [Output][Units("%")] public double[] oc_p1;
   [Output][Units("kg/ha")] public double surfaceom_c_p1;
   [Output][Units("kg/ha")] public double PlantC_p1;

   [Output][Units("kg/ha")] public double leach_no3_p1;
   [Output][Units("kg")] public double dlt_n_loss_in_sed_p1;
   [Output][Units("kg/ha")] public double[] dlt_urea_hydrol_p1;
   [Output][Units("kg/ha")] public double[] nitrification_p1;
   [Output][Units("kg/ha")] public double[] dnit_p1;
   [Output][Units("kg/ha")] public double[] dlt_n_min_res_p1;
   [Output][Units("kg/ha")] public double[] dlt_n_min_tot_p1;
   [Output][Units("kg/ha")] public double[] n2o_atm_p1;

   [Output][Units("kg/ha")] public double dlt_res_c_atm_p1;
   [Output][Units("kg/ha")] public double[] dlt_fom_c_atm_p1;
   [Output][Units("kg/ha")] public double[] dlt_biom_c_atm_p1;
   [Output][Units("kg/ha")] public double[] dlt_hum_c_atm_p1;
   [Output][Units("kg")] public double dlt_c_loss_in_sed_p1;
     
   [Output][Units("")] public string SoilName_p1;
   
   [Output] string SoilName2;

   private int nLayers;
   private SoilN[] mySoilN;
   private Swim[] mySoilW;
   private SurfaceOM[] mySurfOM;
   private Wheat[] myPlant;
   private AgPasture[] myPasture;
   private Fertiliser[] myFert;
   private double[] RelativeArea;
      
   [EventHandler] public void OnInitialised()
   {
      // basic input parameters
      nLayers = 27;
      string[] PaddockNames = new string[2];
      PaddockNames[0] = Pdk01Name;
      PaddockNames[1] = Pdk02Name;
      RelativeArea = new double[2];
      RelativeArea[0] = Pdk01Area;
      RelativeArea[1] = Pdk02Area;

      // link to various modules
      mySoilN = new SoilN[2];
      mySoilW = new Swim[2];
      mySurfOM = new SurfaceOM[2];
      myPlant = new Wheat[2];
      myPasture = new AgPasture[2];
      myFert = new Fertiliser[2];

      Console.WriteLine("     Initialising");
      int pdk = -1;
      int PdkFound = 0;
      foreach(Paddock ThisPaddock in myBlock.ChildPaddocks)
      {
         if(ThisPaddock.Name == PaddockNames[0])
         {
            pdk = 0;
            PdkFound += 1;
            foreach(Component myModule in ThisPaddock.Children)
            {
               if(myModule.Name.Contains(" Nitrogen"))
               {
                  SoilName_p1 = myModule.Name.Split(' ')[0];
               }
            }
         }
         else if(ThisPaddock.Name == PaddockNames[1])
         {
            pdk = 1;
            PdkFound += 1;
         }

         if(pdk >= 0 && PdkFound <= 2)
         {
            mySoilN[pdk] = (SoilN) ThisPaddock.LinkByType("SoilN");
            mySoilW[pdk] = (Swim) ThisPaddock.LinkByType("Swim");
            mySurfOM[pdk] = (SurfaceOM) ThisPaddock.LinkByType("SurfaceOM");
            myPlant[pdk] = (Wheat) ThisPaddock.LinkByName("wheat");
            myPasture[pdk] = (AgPasture) ThisPaddock.LinkByType("agpasture");
            myFert[pdk] = (Fertiliser) ThisPaddock.LinkByType("Fertiliser");
            if(PdkFound == 2)
               PdkFound += 1;
         }
      }
      if (PdkFound < 2)
      {
         throw new Exception("Could not find the two paddocks to sum up");
      }
      else
      {  
         Console.WriteLine("        Summing up paddocks:");
         for(int i = 0;i<2;i++)
            Console.WriteLine("         ." + mySoilN[i].FullName.Split('.')[0] + ", with area: " + RelativeArea[i]);
         
         // initialise the outputs
         dlayer_p1 = new double[nLayers];
         es_p1 = 0.0;
         sw_uptake_p1 = new double[nLayers];
         drain_p1 = 0.0;
         runoff_p1 = 0.0;
         pond_p1 = 0.0;

         urea_p1 = new double[nLayers];
         nh4_p1 = new double[nLayers];
         no3_p1 = new double[nLayers];
         fom_n_p1 = new double[nLayers];
         biom_n_p1 = new double[nLayers];
         hum_n_p1 = new double[nLayers];
         surfaceom_n_p1 = 0.0;
         PlantN_p1 = 0.0;
         PlantNuptake_p1 = 0;
         Fertiliser_p1 = 0.0;

         fom_c_p1 = new double[nLayers];
         biom_c_p1 = new double[nLayers];
         hum_c_p1 = new double[nLayers];
         oc_p1 = new double[nLayers];
         surfaceom_c_p1 = 0.0;
         PlantC_p1 = 0.0;

         leach_no3_p1 = 0.0;
         dlt_n_loss_in_sed_p1 = 0.0;
         dlt_urea_hydrol_p1 = new double[nLayers];
         nitrification_p1 = new double[nLayers];
         dnit_p1 = new double[nLayers];
         dlt_n_min_res_p1 = new double[nLayers];
         dlt_n_min_tot_p1 = new double[nLayers];
         n2o_atm_p1 = new double[nLayers];

         dlt_res_c_atm_p1 = 0.0;
         dlt_fom_c_atm_p1 = new double[nLayers];
         dlt_biom_c_atm_p1 = new double[nLayers];
         dlt_hum_c_atm_p1 = new double[nLayers];
         dlt_c_loss_in_sed_p1 = 0.0;
      }
   }
   
   [EventHandler] public void OnPost()
   {
      // clear outputs
      es_p1 = 0.0;
      drain_p1 = 0.0;
      runoff_p1 = 0.0;
      pond_p1 = 0.0;

      surfaceom_n_p1 = 0.0;
      PlantN_p1 = 0.0;
      PlantNuptake_p1 = 0;
      Fertiliser_p1 = 0.0;
      leach_no3_p1 = 0.0;
      dlt_n_loss_in_sed_p1 = 0.0;

      surfaceom_c_p1 = 0.0;
      dlt_res_c_atm_p1 = 0.0;
      PlantC_p1 = 0.0;
      dlt_c_loss_in_sed_p1 = 0.0;

      Array.Clear(dlayer_p1, 0, nLayers);
      Array.Clear(sw_uptake_p1, 0, nLayers);

      Array.Clear(urea_p1, 0, nLayers);
      Array.Clear(nh4_p1, 0, nLayers);
      Array.Clear(no3_p1, 0, nLayers);
      Array.Clear(fom_n_p1, 0, nLayers);
      Array.Clear(biom_n_p1, 0, nLayers);
      Array.Clear(hum_n_p1, 0, nLayers);

      Array.Clear(fom_c_p1, 0, nLayers);
      Array.Clear(biom_c_p1, 0, nLayers);
      Array.Clear(hum_c_p1, 0, nLayers);
      Array.Clear(oc_p1, 0, nLayers);

      Array.Clear(dlt_urea_hydrol_p1, 0, nLayers);
      Array.Clear(nitrification_p1, 0, nLayers);
      Array.Clear(dnit_p1, 0, nLayers);
      Array.Clear(dlt_n_min_res_p1, 0, nLayers);
      Array.Clear(dlt_n_min_tot_p1, 0, nLayers);
      Array.Clear(n2o_atm_p1, 0, nLayers);

      Array.Clear(dlt_fom_c_atm_p1, 0, nLayers);
      Array.Clear(dlt_biom_c_atm_p1, 0, nLayers);
      Array.Clear(dlt_hum_c_atm_p1, 0, nLayers);
      
      // Sum up the outputs
      for (int pdk = 0;pdk < mySoilN.Length;pdk++)
      {
         es_p1 += mySoilW[pdk].es * RelativeArea[pdk];
         drain_p1 += mySoilW[pdk].drain * RelativeArea[pdk];
         runoff_p1 = mySoilW[pdk].runoff * RelativeArea[pdk];
         pond_p1 = mySoilW[pdk].pond * RelativeArea[pdk];
         leach_no3_p1 += mySoilW[pdk].Variable("leach_no3").ToDouble() * RelativeArea[pdk];
         surfaceom_n_p1 += mySurfOM[pdk].surfaceom_n * RelativeArea[pdk];
         Fertiliser_p1 += myFert[pdk].fertiliser * RelativeArea[pdk];
         dlt_n_loss_in_sed_p1 += mySoilN[pdk].dlt_n_loss_in_sed * RelativeArea[pdk];
         surfaceom_c_p1 += mySurfOM[pdk].surfaceom_c * RelativeArea[pdk];
         dlt_res_c_atm_p1 += mySoilN[pdk].dlt_res_c_atm * RelativeArea[pdk];
         dlt_c_loss_in_sed_p1 += mySoilN[pdk].dlt_c_loss_in_sed * RelativeArea[pdk];

         try
         {
            PlantNuptake_p1 += myPlant[pdk].n_uptake * RelativeArea[pdk];
            PlantN_p1 += myPlant[pdk].TotalN * RelativeArea[pdk];
            PlantC_p1 += 0.4 * myPlant[pdk].TotalWt * RelativeArea[pdk];
         }
         catch(System.Exception err)
         {
            try
            {
               PlantNuptake_p1 += myPasture[pdk].NitrogenUptake * RelativeArea[pdk];
               PlantN_p1 += myPasture[pdk].TotalPlantN * RelativeArea[pdk];
               PlantC_p1 += 0.4 * myPasture[pdk].TotalPlantWt * RelativeArea[pdk];
            }
            catch(System.Exception err2)
            {}
         }
                     
         for (int layer = 0; layer < nLayers;layer++)
         {
            dlayer_p1[layer] += mySoilW[pdk].dlayer[layer] * RelativeArea[pdk];
            try
               {sw_uptake_p1[layer] += myPlant[pdk].sw_uptake[layer] * RelativeArea[pdk];}
            catch(System.Exception err)
            {
               try
                  {sw_uptake_p1[layer] += myPasture[pdk].WaterUptakeLayers[layer] * RelativeArea[pdk];}
               catch(System.Exception err1)
               {}
            }

            urea_p1[layer] += mySoilN[pdk].urea[layer] * RelativeArea[pdk];
            nh4_p1[layer] += mySoilN[pdk].nh4[layer] * RelativeArea[pdk];
            Console.WriteLine("nh4[" + pdk + "][" + layer + "]: " + mySoilN[pdk].nh4[layer].ToString());
            Console.WriteLine("nh4_p1[" + layer + "]: " + nh4_p1[layer].ToString());
            no3_p1[layer] += mySoilN[pdk].no3[layer] * RelativeArea[pdk];
            fom_n_p1[layer] += mySoilN[pdk].fom_n[layer] * RelativeArea[pdk];
            biom_n_p1[layer] += mySoilN[pdk].biom_n[layer] * RelativeArea[pdk];
            hum_n_p1[layer] += mySoilN[pdk].hum_n[layer] * RelativeArea[pdk];

            fom_c_p1[layer] += mySoilN[pdk].fom_c[layer] * RelativeArea[pdk];
            biom_c_p1[layer] += mySoilN[pdk].biom_c[layer] * RelativeArea[pdk];
            hum_c_p1[layer] += mySoilN[pdk].hum_c[layer] * RelativeArea[pdk];
            oc_p1[layer] += mySoilN[pdk].oc[layer] * RelativeArea[pdk];

            dlt_urea_hydrol_p1[layer] += mySoilN[pdk].dlt_urea_hydrol[layer] * RelativeArea[pdk];
            nitrification_p1[layer] += mySoilN[pdk].nitrification[layer] * RelativeArea[pdk];
            dnit_p1[layer] += mySoilN[pdk].dnit[layer] * RelativeArea[pdk];
            dlt_n_min_res_p1[layer] += mySoilN[pdk].dlt_n_min_res[layer] * RelativeArea[pdk];
            dlt_n_min_tot_p1[layer] += mySoilN[pdk].dlt_n_min_tot[layer] * RelativeArea[pdk];
            n2o_atm_p1[layer] += mySoilN[pdk].n2o_atm[layer] * RelativeArea[pdk];
            
            dlt_fom_c_atm_p1[layer] += mySoilN[pdk].dlt_fom_c_atm[layer] * RelativeArea[pdk];
            dlt_biom_c_atm_p1[layer] += mySoilN[pdk].dlt_biom_c_atm[layer] * RelativeArea[pdk];
            dlt_hum_c_atm_p1[layer] += mySoilN[pdk].dlt_hum_c_atm[layer] * RelativeArea[pdk];
         }
      }
   }
}
```
        manager2 Aux-SumOutputs2
          # This script sums up variables from two paddocks
          Pdk01Name = Paddock2-base-HeavySoil  # Name of first paddock
          Pdk01Area = 0.75  # Relative area of first paddock [0-1]
          Pdk02Name = Paddock2-patch-HeavySoil  # Name of second paddock
          Pdk02Area = 0.25  # Relative area of second paddock [0-1]
```csharp
using System;
using ModelFramework;

public class Script 
{      
   [Param] private string Pdk01Name;
   [Param] private double Pdk01Area;
   [Param] private string Pdk02Name;
   [Param] private double Pdk02Area;

   [Link] Simulation myBlock;
   
   [Output][Units("mm")] public double[] dlayer_p2;
   [Output][Units("mm")] public double es_p2;
   [Output][Units("mm")] public double[] sw_uptake_p2;
   [Output][Units("mm")] public double drain_p2;
   [Output][Units("mm")] public double runoff_p2;
   [Output][Units("mm")] public double pond_p2;

   [Output][Units("kg/ha")] public double[] urea_p2;
   [Output][Units("kg/ha")] public double[] nh4_p2;
   [Output][Units("kg/ha")] public double[] no3_p2;
   [Output][Units("kg/ha")] public double[] fom_n_p2;
   [Output][Units("kg/ha")] public double[] biom_n_p2;
   [Output][Units("kg/ha")] public double[] hum_n_p2;
   [Output][Units("kg/ha")] public double surfaceom_n_p2;
   [Output][Units("kg/ha")] public double PlantN_p2;
   [Output][Units("kg/ha")] public double PlantNuptake_p2;
   [Output][Units("kg/ha")] public double Fertiliser_p2;

   [Output][Units("kg/ha")] public double[] fom_c_p2;
   [Output][Units("kg/ha")] public double[] biom_c_p2;
   [Output][Units("kg/ha")] public double[] hum_c_p2;
   [Output][Units("%")] public double[] oc_p2;
   [Output][Units("kg/ha")] public double surfaceom_c_p2;
   [Output][Units("kg/ha")] public double PlantC_p2;

   [Output][Units("kg/ha")] public double leach_no3_p2;
   [Output][Units("kg")] public double dlt_n_loss_in_sed_p2;
   [Output][Units("kg/ha")] public double[] dlt_urea_hydrol_p2;
   [Output][Units("kg/ha")] public double[] nitrification_p2;
   [Output][Units("kg/ha")] public double[] dnit_p2;
   [Output][Units("kg/ha")] public double[] dlt_n_min_res_p2;
   [Output][Units("kg/ha")] public double[] dlt_n_min_tot_p2;
   [Output][Units("kg/ha")] public double[] n2o_atm_p2;

   [Output][Units("kg/ha")] public double dlt_res_c_atm_p2;
   [Output][Units("kg/ha")] public double[] dlt_fom_c_atm_p2;
   [Output][Units("kg/ha")] public double[] dlt_biom_c_atm_p2;
   [Output][Units("kg/ha")] public double[] dlt_hum_c_atm_p2;
   [Output][Units("kg")] public double dlt_c_loss_in_sed_p2;
     
   [Output][Units("")] public string SoilName_p2;
   
   [Output] string SoilName2;

   private int nLayers;
   private SoilN[] mySoilN;
   private Swim[] mySoilW;
   private SurfaceOM[] mySurfOM;
   private Wheat[] myPlant;
   private AgPasture[] myPasture;
   private Fertiliser[] myFert;
   private double[] RelativeArea;

   [EventHandler] public void OnInitialised()
   {
      // basic input parameters
      nLayers = 27;
      string[] PaddockNames = new string[2];
      PaddockNames[0] = Pdk01Name;
      PaddockNames[1] = Pdk02Name;
      RelativeArea = new double[2];
      RelativeArea[0] = Pdk01Area;
      RelativeArea[1] = Pdk02Area;

      // link to various modules
      mySoilN = new SoilN[2];
      mySoilW = new Swim[2];
      mySurfOM = new SurfaceOM[2];
      myPlant = new Wheat[2];
      myPasture = new AgPasture[2];
      myFert = new Fertiliser[2];

      Console.WriteLine("     Initialising");
      int pdk = -1;
      int PdkFound = 0;
      foreach(Paddock ThisPaddock in myBlock.ChildPaddocks)
      {
         if(ThisPaddock.Name == PaddockNames[0])
         {
            pdk = 0;
            PdkFound += 1;
            foreach(Component myModule in ThisPaddock.Children)
            {
               if(myModule.Name.Contains(" Nitrogen"))
               {
                  SoilName_p2 = myModule.Name.Split(' ')[0];
               }
            }
         }
         else if(ThisPaddock.Name == PaddockNames[1])
         {
            pdk = 1;
            PdkFound += 1;
         }

         if(pdk >= 0 && PdkFound <= 2)
         {
            mySoilN[pdk] = (SoilN) ThisPaddock.LinkByType("SoilN");
            mySoilW[pdk] = (Swim) ThisPaddock.LinkByType("Swim");
            mySurfOM[pdk] = (SurfaceOM) ThisPaddock.LinkByType("SurfaceOM");
            myPlant[pdk] = (Wheat) ThisPaddock.LinkByName("wheat");
            myPasture[pdk] = (AgPasture) ThisPaddock.LinkByType("agpasture");
            myFert[pdk] = (Fertiliser) ThisPaddock.LinkByType("Fertiliser");
            if(PdkFound == 2)
               PdkFound += 1;
         }
      }
      if (PdkFound < 2)
      {
         throw new Exception("Could not find the two paddocks to sum up");
      }
      else
      {      
         Console.WriteLine("        Summing up paddocks:");
         for(int i = 0;i < 2;i++)
            Console.WriteLine("         ." + mySoilN[i].FullName.Split('.')[0] + ", with area: " + RelativeArea[i]);

         // initialise the outputs
         dlayer_p2 = new double[nLayers];
         es_p2 = 0.0;
         sw_uptake_p2 = new double[nLayers];
         drain_p2 = 0.0;
         runoff_p2 = 0.0;
         pond_p2 = 0.0;

         urea_p2 = new double[nLayers];
         nh4_p2 = new double[nLayers];
         no3_p2 = new double[nLayers];
         fom_n_p2 = new double[nLayers];
         biom_n_p2 = new double[nLayers];
         hum_n_p2 = new double[nLayers];
         surfaceom_n_p2 = 0.0;
         PlantN_p2 = 0.0;
         PlantNuptake_p2 = 0;
         Fertiliser_p2 = 0.0;

         fom_c_p2 = new double[nLayers];
         biom_c_p2 = new double[nLayers];
         hum_c_p2 = new double[nLayers];
         oc_p2 = new double[nLayers];
         surfaceom_c_p2 = 0.0;
         PlantC_p2 = 0.0;

         leach_no3_p2 = 0.0;
         dlt_n_loss_in_sed_p2 = 0.0;
         dlt_urea_hydrol_p2 = new double[nLayers];
         nitrification_p2 = new double[nLayers];
         dnit_p2 = new double[nLayers];
         dlt_n_min_res_p2 = new double[nLayers];
         dlt_n_min_tot_p2 = new double[nLayers];
         n2o_atm_p2 = new double[nLayers];

         dlt_res_c_atm_p2 = 0.0;
         dlt_fom_c_atm_p2 = new double[nLayers];
         dlt_biom_c_atm_p2 = new double[nLayers];
         dlt_hum_c_atm_p2 = new double[nLayers];
         dlt_c_loss_in_sed_p2 = 0.0;
      }
   }
   
   [EventHandler] public void OnPost()
   {
      // clear outputs
      es_p2 = 0.0;
      drain_p2 = 0.0;
      runoff_p2 = 0.0;
      pond_p2 = 0.0;

      surfaceom_n_p2 = 0.0;
      PlantN_p2 = 0.0;
      PlantNuptake_p2 = 0;
      Fertiliser_p2 = 0.0;
      leach_no3_p2 = 0.0;
      dlt_n_loss_in_sed_p2 = 0.0;

      surfaceom_c_p2 = 0.0;
      dlt_res_c_atm_p2 = 0.0;
      PlantC_p2 = 0.0;
      dlt_c_loss_in_sed_p2 = 0.0;

      Array.Clear(dlayer_p2, 0, nLayers);
      Array.Clear(sw_uptake_p2, 0, nLayers);

      Array.Clear(urea_p2, 0, nLayers);
      Array.Clear(nh4_p2, 0, nLayers);
      Array.Clear(no3_p2, 0, nLayers);
      Array.Clear(fom_n_p2, 0, nLayers);
      Array.Clear(biom_n_p2, 0, nLayers);
      Array.Clear(hum_n_p2, 0, nLayers);

      Array.Clear(fom_c_p2, 0, nLayers);
      Array.Clear(biom_c_p2, 0, nLayers);
      Array.Clear(hum_c_p2, 0, nLayers);
      Array.Clear(oc_p2, 0, nLayers);

      Array.Clear(dlt_urea_hydrol_p2, 0, nLayers);
      Array.Clear(nitrification_p2, 0, nLayers);
      Array.Clear(dnit_p2, 0, nLayers);
      Array.Clear(dlt_n_min_res_p2, 0, nLayers);
      Array.Clear(dlt_n_min_tot_p2, 0, nLayers);
      Array.Clear(n2o_atm_p2, 0, nLayers);

      Array.Clear(dlt_fom_c_atm_p2, 0, nLayers);
      Array.Clear(dlt_biom_c_atm_p2, 0, nLayers);
      Array.Clear(dlt_hum_c_atm_p2, 0, nLayers);
      
      // Sum up the outputs
      for (int pdk = 0;pdk < mySoilN.Length;pdk++)
      {
         es_p2 += mySoilW[pdk].es * RelativeArea[pdk];
         drain_p2 += mySoilW[pdk].drain * RelativeArea[pdk];
         runoff_p2 = mySoilW[pdk].runoff * RelativeArea[pdk];
         pond_p2 = mySoilW[pdk].pond * RelativeArea[pdk];
         surfaceom_n_p2 += mySurfOM[pdk].surfaceom_n * RelativeArea[pdk];
         leach_no3_p2 += mySoilW[pdk].Variable("leach_no3").ToDouble() * RelativeArea[pdk];
         Fertiliser_p2 += myFert[pdk].fertiliser * RelativeArea[pdk];
         dlt_n_loss_in_sed_p2 += mySoilN[pdk].dlt_n_loss_in_sed * RelativeArea[pdk];
         surfaceom_c_p2 += mySurfOM[pdk].surfaceom_c * RelativeArea[pdk];
         dlt_res_c_atm_p2 += mySoilN[pdk].dlt_res_c_atm * RelativeArea[pdk];
         dlt_c_loss_in_sed_p2 += mySoilN[pdk].dlt_c_loss_in_sed * RelativeArea[pdk];
         
         try
         {
            PlantNuptake_p2 += myPlant[pdk].n_uptake * RelativeArea[pdk];
            PlantN_p2 += myPlant[pdk].TotalN * RelativeArea[pdk];
            PlantC_p2 += myPlant[pdk].TotalWt * RelativeArea[pdk];
         }
         catch(System.Exception err)
         {
            try
            {
               PlantNuptake_p2 += myPasture[pdk].NitrogenUptake * RelativeArea[pdk];
               PlantN_p2 += myPasture[pdk].TotalPlantN * RelativeArea[pdk];
               PlantC_p2 += myPasture[pdk].TotalPlantWt * RelativeArea[pdk];
            }
            catch(System.Exception err2)
            {}
         }
                     
         for (int layer = 0; layer < nLayers;layer++)
         {
            dlayer_p2[layer] += mySoilW[pdk].dlayer[layer] * RelativeArea[pdk];
            try
               {sw_uptake_p2[layer] += myPlant[pdk].sw_uptake[layer] * RelativeArea[pdk];}
            catch(System.Exception err)
            {
               try
                  {sw_uptake_p2[layer] += myPasture[pdk].WaterUptakeLayers[layer] * RelativeArea[pdk];}
               catch(System.Exception err1)
               {}
            }

            urea_p2[layer] += mySoilN[pdk].urea[layer] * RelativeArea[pdk];
            nh4_p2[layer] += mySoilN[pdk].nh4[layer] * RelativeArea[pdk];
            no3_p2[layer] += mySoilN[pdk].no3[layer] * RelativeArea[pdk];
            fom_n_p2[layer] += mySoilN[pdk].fom_n[layer] * RelativeArea[pdk];
            biom_n_p2[layer] += mySoilN[pdk].biom_n[layer] * RelativeArea[pdk];
            hum_n_p2[layer] += mySoilN[pdk].hum_n[layer] * RelativeArea[pdk];

            fom_c_p2[layer] += mySoilN[pdk].fom_c[layer] * RelativeArea[pdk];
            biom_c_p2[layer] += mySoilN[pdk].biom_c[layer] * RelativeArea[pdk];
            hum_c_p2[layer] += mySoilN[pdk].hum_c[layer] * RelativeArea[pdk];
            oc_p2[layer] += mySoilN[pdk].oc[layer] * RelativeArea[pdk];

            dlt_urea_hydrol_p2[layer] += mySoilN[pdk].dlt_urea_hydrol[layer] * RelativeArea[pdk];
            nitrification_p2[layer] += mySoilN[pdk].nitrification[layer] * RelativeArea[pdk];
            dnit_p2[layer] += mySoilN[pdk].dnit[layer] * RelativeArea[pdk];
            dlt_n_min_res_p2[layer] += mySoilN[pdk].dlt_n_min_res[layer] * RelativeArea[pdk];
            dlt_n_min_tot_p2[layer] += mySoilN[pdk].dlt_n_min_tot[layer] * RelativeArea[pdk];
            n2o_atm_p2[layer] += mySoilN[pdk].n2o_atm[layer] * RelativeArea[pdk];
            
            dlt_fom_c_atm_p2[layer] += mySoilN[pdk].dlt_fom_c_atm[layer] * RelativeArea[pdk];
            dlt_biom_c_atm_p2[layer] += mySoilN[pdk].dlt_biom_c_atm[layer] * RelativeArea[pdk];
            dlt_hum_c_atm_p2[layer] += mySoilN[pdk].dlt_hum_c_atm[layer] * RelativeArea[pdk];
         }
      }
   }
}
```
        outputfile LightSoil Results -> /SoilNitrogen_CNPatch_VariabilityTests/SoilCNPatch-AddOnly/Test01-Bare+addUrea/Sim01-ExplicitPatches/LightSoil Results: filename=Sim06-ExplicitPatches LightSoil Results.out; title=Sim06-ExplicitPatches LightSoil Results
          variables -> /SoilNitrogen_CNPatch_VariabilityTests/SoilCNPatch-AddOnly/Test01-Bare+addUrea/Sim01-ExplicitPatches/LightSoil Results/Variables
          events ReportingFrequency -> /SoilNitrogen_CNPatch_VariabilityTests/SoilCNPatch-AddOnly/Test01-Bare+addUrea/Sim01-ExplicitPatches/LightSoil Results/ReportingFrequency
        outputfile HeavySoil Results -> /SoilNitrogen_CNPatch_VariabilityTests/SoilCNPatch-AddOnly/Test01-Bare+addUrea/Sim01-ExplicitPatches/HeavySoil Results: filename=Sim06-ExplicitPatches HeavySoil Results.out; title=Sim06-ExplicitPatches HeavySoil Results
          variables -> /SoilNitrogen_CNPatch_VariabilityTests/SoilCNPatch-AddOnly/Test01-Bare+addUrea/Sim01-ExplicitPatches/HeavySoil Results/Variables
          events ReportingFrequency -> /SoilNitrogen_CNPatch_VariabilityTests/SoilCNPatch-AddOnly/Test01-Bare+addUrea/Sim01-ExplicitPatches/HeavySoil Results/ReportingFrequency
      simulation Sim06-SoilCNPatches -> /SoilNitrogen_CNPatch_VariabilityTests/SoilCNPatch-AddOnly/Test06-SWIM3-Bare+TypicSoil+addUrea/Sim06-ExplicitPatches
        area Paddock1-CNpatch-LightSoil -> /SoilNitrogen_CNPatch_VariabilityTests/SoilCNPatch-AddOnly/Test06-SWIM3-Bare+TypicSoil+addUrea/Sim06-ExplicitPatches/Paddock1-base-LightSoil
          folder ManagerFolder -> /SoilNitrogen_CNPatch_VariabilityTests/SoilCNPatch-AddOnly/Test06-SWIM3-Bare+TypicSoil+addUrea/Sim06-ExplicitPatches/Paddock1-base-LightSoil/ManagerFolder
            manager2 AddSoilCNPatch: same as SoilCNPatch-AddOnly.Test01-Bare+addUrea.Sim01-SoilCNPatches.Paddock1-CNpatch-LightSoil.ManagerFolder.AddSoilCNPatch
          outputfile Results -> /SoilNitrogen_CNPatch_VariabilityTests/SoilCNPatch-AddOnly/Test06-SWIM3-Bare+TypicSoil+addUrea/Sim06-ExplicitPatches/Paddock1-base-LightSoil/Results: filename=Sim06-SoilCNPatches Paddock1-CNpatch-LightSoil Results.out; title=Sim06-SoilCNPatches Paddock1-CNpatch-LightSoil Results
            variables -> /SoilNitrogen_CNPatch_VariabilityTests/SoilCNPatch-AddOnly/Test06-SWIM3-Bare+TypicSoil+addUrea/Sim06-ExplicitPatches/Paddock1-base-LightSoil/Results/Variables
            events ReportingFrequency -> /SoilNitrogen_CNPatch_VariabilityTests/SoilCNPatch-AddOnly/Test06-SWIM3-Bare+TypicSoil+addUrea/Sim06-ExplicitPatches/Paddock1-base-LightSoil/Results/ReportingFrequency
        area Paddock2-CNpatch-HeavySoil -> /SoilNitrogen_CNPatch_VariabilityTests/SoilCNPatch-AddOnly/Test06-SWIM3-Bare+TypicSoil+addUrea/Sim06-ExplicitPatches/Paddock2-base-HeavySoil
          outputfile Results -> /SoilNitrogen_CNPatch_VariabilityTests/SoilCNPatch-AddOnly/Test06-SWIM3-Bare+TypicSoil+addUrea/Sim06-ExplicitPatches/Paddock2-base-HeavySoil/Results: filename=Sim06-SoilCNPatches Paddock2-CNpatch-HeavySoil Results.out; title=Sim06-SoilCNPatches Paddock2-CNpatch-HeavySoil Results
            variables -> /SoilNitrogen_CNPatch_VariabilityTests/SoilCNPatch-AddOnly/Test06-SWIM3-Bare+TypicSoil+addUrea/Sim06-ExplicitPatches/Paddock2-base-HeavySoil/Results/Variables
            events ReportingFrequency -> /SoilNitrogen_CNPatch_VariabilityTests/SoilCNPatch-AddOnly/Test06-SWIM3-Bare+TypicSoil+addUrea/Sim06-ExplicitPatches/Paddock2-base-HeavySoil/Results/ReportingFrequency
    folder Test07-Bare+TypicSoil+addN+addUrea -> /SoilNitrogen_CNPatch_VariabilityTests/SoilCNPatch-AddOnly/Test01-Bare+addUrea
      memo Info
        ++++++++++++++++++++  TEST 07 +++++++++++++++++++++++++++++++++++++++++++++++++++++++++++

           Description:
              - Artificial climate, smooth mild temperate;
              - Two generic soils, a free draining and a poorly drained;
              - Bare soil;
              - Initial mineral N: 30kgN/ha as NO3 + 30kgN/ha as NH4;
              - Initial soil organic matter composed of humus and FOM;
              - Initial surface residues of 1000kgDM/ha;
              - No additions of residues;
              - Urea added as a patch, 100kgN/ha into 25% of the area
              - NH4 add to base only, 50kgN/ha;

              > First simulation has two explicit patches (two paddocks)
              > Second simulation has internal patches (soilCNpatches)

           Expected output:
              - All outputs with valid values (numeric mostly);
              - Small differences between simulations as the patches are bare;
      simulation Sim07-ExplicitPatches -> /SoilNitrogen_CNPatch_VariabilityTests/SoilCNPatch-AddOnly/Test01-Bare+addUrea/Sim01-ExplicitPatches
        area Paddock1-base-LightSoil -> /SoilNitrogen_CNPatch_VariabilityTests/SoilCNPatch-AddOnly/Test01-Bare+addUrea/Sim01-ExplicitPatches/Paddock1-base-LightSoil
          folder ManagerFolder -> /SoilNitrogen_CNPatch_VariabilityTests/SoilCNPatch-AddOnly/Test01-Bare+addUrea/Sim01-ExplicitPatches/Paddock1-base-LightSoil/ManagerFolder
            operations AddNH4
              15-Sep  Fertiliser apply amount=50 (kg/ha), depth=1 (mm), type=nh4_n
          surfaceom SurfaceOrganicMatter
            PoolName = Residue1  # Organic Matter pool name
            type = grass  # Organic Matter type
            mass = 1000  # Initial surface residue (kg/ha)
            cnr = 20  # C:N ratio of initial residue
            standing_fraction = 0  # Fraction of residue standing
          Soil Med-LightSoil: same as SoilCNPatch-AddOnly.Test02-Bare+TypicSoil+addUrea.Sim02-ExplicitPatches.Paddock1-base-LightSoil.Med-LightSoil
          outputfile Results -> /SoilNitrogen_CNPatch_VariabilityTests/SoilCNPatch-AddOnly/Test01-Bare+addUrea/Sim01-ExplicitPatches/Paddock1-base-LightSoil/Results: filename=Sim07-ExplicitPatches Paddock1-base-LightSoil Results.out; title=Sim07-ExplicitPatches Paddock1-base-LightSoil Results
            variables -> /SoilNitrogen_CNPatch_VariabilityTests/SoilCNPatch-AddOnly/Test01-Bare+addUrea/Sim01-ExplicitPatches/Paddock1-base-LightSoil/Results/Variables
            events ReportingFrequency -> /SoilNitrogen_CNPatch_VariabilityTests/SoilCNPatch-AddOnly/Test01-Bare+addUrea/Sim01-ExplicitPatches/Paddock1-base-LightSoil/Results/ReportingFrequency
        area Paddock1-patch-LightSoil -> /SoilNitrogen_CNPatch_VariabilityTests/SoilCNPatch-AddOnly/Test07-Bare+TypicSoil+addN+addUrea/Sim07-ExplicitPatches/Paddock1-base-LightSoil
          folder ManagerFolder -> /SoilNitrogen_CNPatch_VariabilityTests/SoilCNPatch-AddOnly/Test07-Bare+TypicSoil+addN+addUrea/Sim07-ExplicitPatches/Paddock1-base-LightSoil/ManagerFolder
            operations AddUrine
              15-Aug  Fertiliser apply amount=100 (kg/ha), depth=1 (mm), type=urea_n
          outputfile Results -> /SoilNitrogen_CNPatch_VariabilityTests/SoilCNPatch-AddOnly/Test07-Bare+TypicSoil+addN+addUrea/Sim07-ExplicitPatches/Paddock1-base-LightSoil/Results: filename=Sim07-ExplicitPatches Paddock1-patch-LightSoil Results.out; title=Sim07-ExplicitPatches Paddock1-patch-LightSoil Results
            variables -> /SoilNitrogen_CNPatch_VariabilityTests/SoilCNPatch-AddOnly/Test07-Bare+TypicSoil+addN+addUrea/Sim07-ExplicitPatches/Paddock1-base-LightSoil/Results/Variables
            events ReportingFrequency -> /SoilNitrogen_CNPatch_VariabilityTests/SoilCNPatch-AddOnly/Test07-Bare+TypicSoil+addN+addUrea/Sim07-ExplicitPatches/Paddock1-base-LightSoil/Results/ReportingFrequency
        area Paddock2-base-HeavySoil -> /SoilNitrogen_CNPatch_VariabilityTests/SoilCNPatch-AddOnly/Test01-Bare+addUrea/Sim01-ExplicitPatches/Paddock2-base-HeavySoil
          Soil Med-HeavySoil: LocalName=Generic medium-heavy sedimentary soil; Country=New Zealand; Latitude=0; Longitude=0
            DataSource=Hypothetical medium to heavy texture soil of sedimentary origin (moderately poorly drained)
            Analysis: same as SoilCNPatch-AddOnly.Test01-Bare+addUrea.Sim01-ExplicitPatches.Paddock2-base-HeavySoil.Med-HeavySoil.Analysis
            Water: same as SoilCNPatch-AddOnly.Test01-Bare+addUrea.Sim01-ExplicitPatches.Paddock2-base-HeavySoil.Med-HeavySoil.Water
            SoilWater: same as SoilCNPatch-AddOnly.Test01-Bare+addUrea.Sim01-ExplicitPatches.Paddock2-base-HeavySoil.Med-HeavySoil.SoilWater
            SoilOrganicMatter: same as SoilCNPatch-AddOnly.Test02-Bare+TypicSoil+addUrea.Sim02-ExplicitPatches.Paddock2-base-HeavySoil.Med-HeavySoil.SoilOrganicMatter
            Sample Initial nitrogen -> /SoilNitrogen_CNPatch_VariabilityTests/SoilCNPatch-AddOnly/Test07-Bare+TypicSoil+addN+addUrea/Sim07-ExplicitPatches/Paddock1-base-LightSoil/Med-LightSoil/Initial nitrogen
            InitialWater: FractionFull=1; PercentMethod=EvenlyDistributed; RelativeTo=ll15
          outputfile Results -> /SoilNitrogen_CNPatch_VariabilityTests/SoilCNPatch-AddOnly/Test01-Bare+addUrea/Sim01-ExplicitPatches/Paddock2-base-HeavySoil/Results: filename=Sim07-ExplicitPatches Paddock2-base-HeavySoil Results.out; title=Sim07-ExplicitPatches Paddock2-base-HeavySoil Results
            variables -> /SoilNitrogen_CNPatch_VariabilityTests/SoilCNPatch-AddOnly/Test01-Bare+addUrea/Sim01-ExplicitPatches/Paddock2-base-HeavySoil/Results/Variables
            events ReportingFrequency -> /SoilNitrogen_CNPatch_VariabilityTests/SoilCNPatch-AddOnly/Test01-Bare+addUrea/Sim01-ExplicitPatches/Paddock2-base-HeavySoil/Results/ReportingFrequency
        area Paddock2-patch-HeavySoil -> /SoilNitrogen_CNPatch_VariabilityTests/SoilCNPatch-AddOnly/Test07-Bare+TypicSoil+addN+addUrea/Sim07-ExplicitPatches/Paddock2-base-HeavySoil
          outputfile Results -> /SoilNitrogen_CNPatch_VariabilityTests/SoilCNPatch-AddOnly/Test07-Bare+TypicSoil+addN+addUrea/Sim07-ExplicitPatches/Paddock2-base-HeavySoil/Results: filename=Sim07-ExplicitPatches Paddock2-patch-HeavySoil Results.out; title=Sim07-ExplicitPatches Paddock2-patch-HeavySoil Results
            variables -> /SoilNitrogen_CNPatch_VariabilityTests/SoilCNPatch-AddOnly/Test07-Bare+TypicSoil+addN+addUrea/Sim07-ExplicitPatches/Paddock2-base-HeavySoil/Results/Variables
            events ReportingFrequency -> /SoilNitrogen_CNPatch_VariabilityTests/SoilCNPatch-AddOnly/Test07-Bare+TypicSoil+addN+addUrea/Sim07-ExplicitPatches/Paddock2-base-HeavySoil/Results/ReportingFrequency
        outputfile LightSoil Results -> /SoilNitrogen_CNPatch_VariabilityTests/SoilCNPatch-AddOnly/Test01-Bare+addUrea/Sim01-ExplicitPatches/LightSoil Results: filename=Sim07-ExplicitPatches LightSoil Results.out; title=Sim07-ExplicitPatches LightSoil Results
          variables -> /SoilNitrogen_CNPatch_VariabilityTests/SoilCNPatch-AddOnly/Test01-Bare+addUrea/Sim01-ExplicitPatches/LightSoil Results/Variables
          events ReportingFrequency -> /SoilNitrogen_CNPatch_VariabilityTests/SoilCNPatch-AddOnly/Test01-Bare+addUrea/Sim01-ExplicitPatches/LightSoil Results/ReportingFrequency
        outputfile HeavySoil Results -> /SoilNitrogen_CNPatch_VariabilityTests/SoilCNPatch-AddOnly/Test01-Bare+addUrea/Sim01-ExplicitPatches/HeavySoil Results: filename=Sim07-ExplicitPatches HeavySoil Results.out; title=Sim07-ExplicitPatches HeavySoil Results
          variables -> /SoilNitrogen_CNPatch_VariabilityTests/SoilCNPatch-AddOnly/Test01-Bare+addUrea/Sim01-ExplicitPatches/HeavySoil Results/Variables
          events ReportingFrequency -> /SoilNitrogen_CNPatch_VariabilityTests/SoilCNPatch-AddOnly/Test01-Bare+addUrea/Sim01-ExplicitPatches/HeavySoil Results/ReportingFrequency
      simulation Sim07-SoilCNPatches -> /SoilNitrogen_CNPatch_VariabilityTests/SoilCNPatch-AddOnly/Test07-Bare+TypicSoil+addN+addUrea/Sim07-ExplicitPatches
        area Paddock1-CNpatch-LightSoil -> /SoilNitrogen_CNPatch_VariabilityTests/SoilCNPatch-AddOnly/Test07-Bare+TypicSoil+addN+addUrea/Sim07-ExplicitPatches/Paddock1-base-LightSoil
          folder ManagerFolder -> /SoilNitrogen_CNPatch_VariabilityTests/SoilCNPatch-AddOnly/Test07-Bare+TypicSoil+addN+addUrea/Sim07-ExplicitPatches/Paddock1-base-LightSoil/ManagerFolder
            manager2 AddSoilCNPatch1: same as SoilCNPatch-AddOnly.Test01-Bare+addUrea.Sim01-SoilCNPatches.Paddock1-CNpatch-LightSoil.ManagerFolder.AddSoilCNPatch
            manager2 AddSoilCNPatch2
              # Basic info to add a urine patch to SoilNtrogen
              AddPatch_DateToAdd = 15-Sep-2000  # Day of month to add urine patch
              AddPatch_NumAdditions = 1  # Number of times to add new patches
              AddPatch_Interval = 5  # Interval between addition of new patches (days)
              # Info about the type of deposition
              AddPatch_DepositionType = ToSpecificPatch  # Choose the DepositionType
              AddPatch_PatchToAdd = base  # If DepositionType is 'ToSpecificPatch' or 'ToNewPatch', choose which patch will be used
              AddPatch_NewArea = 0.25  # Relative area of new patch (0-1)
              # Info about solute to add
              AddPatch_SoluteType = NH4  # Choose the solute to be added
              AddPatch_SoluteAmount = 50  # Amount of N to be added (kgN/ha_patch)
              script: same as in SoilCNPatch-AddOnly.Test01-Bare+addUrea.Sim01-SoilCNPatches.Paddock1-CNpatch-LightSoil.ManagerFolder.AddSoilCNPatch
          outputfile Results -> /SoilNitrogen_CNPatch_VariabilityTests/SoilCNPatch-AddOnly/Test07-Bare+TypicSoil+addN+addUrea/Sim07-ExplicitPatches/Paddock1-base-LightSoil/Results: filename=Sim07-SoilCNPatches Paddock1-CNpatch-LightSoil Results.out; title=Sim07-SoilCNPatches Paddock1-CNpatch-LightSoil Results
            variables -> /SoilNitrogen_CNPatch_VariabilityTests/SoilCNPatch-AddOnly/Test07-Bare+TypicSoil+addN+addUrea/Sim07-ExplicitPatches/Paddock1-base-LightSoil/Results/Variables
            events ReportingFrequency -> /SoilNitrogen_CNPatch_VariabilityTests/SoilCNPatch-AddOnly/Test07-Bare+TypicSoil+addN+addUrea/Sim07-ExplicitPatches/Paddock1-base-LightSoil/Results/ReportingFrequency
        area Paddock2-CNpatch-HeavySoil -> /SoilNitrogen_CNPatch_VariabilityTests/SoilCNPatch-AddOnly/Test07-Bare+TypicSoil+addN+addUrea/Sim07-ExplicitPatches/Paddock2-base-HeavySoil
          outputfile Results -> /SoilNitrogen_CNPatch_VariabilityTests/SoilCNPatch-AddOnly/Test07-Bare+TypicSoil+addN+addUrea/Sim07-ExplicitPatches/Paddock2-base-HeavySoil/Results: filename=Sim07-SoilCNPatches Paddock2-CNpatch-HeavySoil Results.out; title=Sim07-SoilCNPatches Paddock2-CNpatch-HeavySoil Results
            variables -> /SoilNitrogen_CNPatch_VariabilityTests/SoilCNPatch-AddOnly/Test07-Bare+TypicSoil+addN+addUrea/Sim07-ExplicitPatches/Paddock2-base-HeavySoil/Results/Variables
            events ReportingFrequency -> /SoilNitrogen_CNPatch_VariabilityTests/SoilCNPatch-AddOnly/Test07-Bare+TypicSoil+addN+addUrea/Sim07-ExplicitPatches/Paddock2-base-HeavySoil/Results/ReportingFrequency
    folder Test08-Bare+TypicSoil+addStuff -> /SoilNitrogen_CNPatch_VariabilityTests/SoilCNPatch-AddOnly/Test01-Bare+addUrea
      memo Info
        ++++++++++++++++++++  TEST 08 +++++++++++++++++++++++++++++++++++++++++++++++++++++++++++

           Description:
              - Artificial climate, smooth mild temperate;
              - Two generic soils, a free draining and a poorly drained;
              - Bare soil;
              - Initial mineral N: 30kgN/ha as NO3 + 30kgN/ha as NH4;
              - Initial soil organic matter composed of humus and FOM;
              - Initial surface residues of 1000kgDM/ha;
              - No additions of residues;
              - Residues added as a patch, 10000kgDM/ha into 25% of the area
              - NH4 add to all paddock using AddPatch, 50kgN/ha;

              > First simulation has two explicit patches (two paddocks)
              > Second simulation has internal patches (soilCNpatches)

           Expected output:
              - All outputs with valid values (numeric mostly);
              - Small differences between simulations as the patches are bare;
      simulation Sim08-ExplicitPatches -> /SoilNitrogen_CNPatch_VariabilityTests/SoilCNPatch-AddOnly/Test01-Bare+addUrea/Sim01-ExplicitPatches
        area Paddock1-base-LightSoil -> /SoilNitrogen_CNPatch_VariabilityTests/SoilCNPatch-AddOnly/Test01-Bare+addUrea/Sim01-ExplicitPatches/Paddock1-base-LightSoil
          folder ManagerFolder -> /SoilNitrogen_CNPatch_VariabilityTests/SoilCNPatch-AddOnly/Test01-Bare+addUrea/Sim01-ExplicitPatches/Paddock1-base-LightSoil/ManagerFolder
            operations AddNH4
              15-Aug  Fertiliser apply amount=50 (kg/ha), depth=1 (mm), type=nh4_n
          surfaceom SurfaceOrganicMatter
            PoolName = Residue1  # Organic Matter pool name
            type = grass  # Organic Matter type
            mass = 1000  # Initial surface residue (kg/ha)
            cnr = 20  # C:N ratio of initial residue
            standing_fraction = 0  # Fraction of residue standing
          Soil Med-LightSoil: same as SoilCNPatch-AddOnly.Test02-Bare+TypicSoil+addUrea.Sim02-ExplicitPatches.Paddock1-base-LightSoil.Med-LightSoil
          outputfile Results -> /SoilNitrogen_CNPatch_VariabilityTests/SoilCNPatch-AddOnly/Test01-Bare+addUrea/Sim01-ExplicitPatches/Paddock1-base-LightSoil/Results: filename=Sim08-ExplicitPatches Paddock1-base-LightSoil Results.out; title=Sim08-ExplicitPatches Paddock1-base-LightSoil Results
            variables -> /SoilNitrogen_CNPatch_VariabilityTests/SoilCNPatch-AddOnly/Test01-Bare+addUrea/Sim01-ExplicitPatches/Paddock1-base-LightSoil/Results/Variables
            events ReportingFrequency -> /SoilNitrogen_CNPatch_VariabilityTests/SoilCNPatch-AddOnly/Test01-Bare+addUrea/Sim01-ExplicitPatches/Paddock1-base-LightSoil/Results/ReportingFrequency
        area Paddock1-patch-LightSoil -> /SoilNitrogen_CNPatch_VariabilityTests/SoilCNPatch-AddOnly/Test08-Bare+TypicSoil+addStuff/Sim08-ExplicitPatches/Paddock1-base-LightSoil
          folder ManagerFolder -> /SoilNitrogen_CNPatch_VariabilityTests/SoilCNPatch-AddOnly/Test08-Bare+TypicSoil+addStuff/Sim08-ExplicitPatches/Paddock1-base-LightSoil/ManagerFolder
            operations AddDung
              15-Aug  'Med-LightSoil nitrogen' incorpfom type = default, amount=10000 00 00 00 00 00, cnr=20 20 20 20 20 20
              15-Aug  Fertiliser apply amount=50 (kg/ha), depth=1 (mm), type=nh4_n
          outputfile Results -> /SoilNitrogen_CNPatch_VariabilityTests/SoilCNPatch-AddOnly/Test08-Bare+TypicSoil+addStuff/Sim08-ExplicitPatches/Paddock1-base-LightSoil/Results: filename=Sim08-ExplicitPatches Paddock1-patch-LightSoil Results.out; title=Sim08-ExplicitPatches Paddock1-patch-LightSoil Results
            variables -> /SoilNitrogen_CNPatch_VariabilityTests/SoilCNPatch-AddOnly/Test08-Bare+TypicSoil+addStuff/Sim08-ExplicitPatches/Paddock1-base-LightSoil/Results/Variables
            events ReportingFrequency -> /SoilNitrogen_CNPatch_VariabilityTests/SoilCNPatch-AddOnly/Test08-Bare+TypicSoil+addStuff/Sim08-ExplicitPatches/Paddock1-base-LightSoil/Results/ReportingFrequency
        area Paddock2-base-HeavySoil -> /SoilNitrogen_CNPatch_VariabilityTests/SoilCNPatch-AddOnly/Test08-Bare+TypicSoil+addStuff/Sim08-ExplicitPatches/Paddock1-base-LightSoil
          Soil Med-HeavySoil: LocalName=Generic medium-heavy sedimentary soil; Country=New Zealand; Latitude=0; Longitude=0
            DataSource=Hypothetical medium to heavy texture soil of sedimentary origin (moderately poorly drained)
            Analysis: same as SoilCNPatch-AddOnly.Test01-Bare+addUrea.Sim01-ExplicitPatches.Paddock2-base-HeavySoil.Med-HeavySoil.Analysis
            Water: same as SoilCNPatch-AddOnly.Test01-Bare+addUrea.Sim01-ExplicitPatches.Paddock2-base-HeavySoil.Med-HeavySoil.Water
            SoilWater: same as SoilCNPatch-AddOnly.Test01-Bare+addUrea.Sim01-ExplicitPatches.Paddock2-base-HeavySoil.Med-HeavySoil.SoilWater
            SoilOrganicMatter: same as SoilCNPatch-AddOnly.Test02-Bare+TypicSoil+addUrea.Sim02-ExplicitPatches.Paddock2-base-HeavySoil.Med-HeavySoil.SoilOrganicMatter
            Sample Initial nitrogen -> /SoilNitrogen_CNPatch_VariabilityTests/SoilCNPatch-AddOnly/Test08-Bare+TypicSoil+addStuff/Sim08-ExplicitPatches/Paddock1-base-LightSoil/Med-LightSoil/Initial nitrogen
            InitialWater: FractionFull=1; PercentMethod=EvenlyDistributed; RelativeTo=ll15
          outputfile Results -> /SoilNitrogen_CNPatch_VariabilityTests/SoilCNPatch-AddOnly/Test08-Bare+TypicSoil+addStuff/Sim08-ExplicitPatches/Paddock1-base-LightSoil/Results: filename=Sim08-ExplicitPatches Paddock2-base-HeavySoil Results.out; title=Sim08-ExplicitPatches Paddock2-base-HeavySoil Results
            variables -> /SoilNitrogen_CNPatch_VariabilityTests/SoilCNPatch-AddOnly/Test08-Bare+TypicSoil+addStuff/Sim08-ExplicitPatches/Paddock1-base-LightSoil/Results/Variables
            events ReportingFrequency -> /SoilNitrogen_CNPatch_VariabilityTests/SoilCNPatch-AddOnly/Test08-Bare+TypicSoil+addStuff/Sim08-ExplicitPatches/Paddock1-base-LightSoil/Results/ReportingFrequency
        area Paddock2-patch-HeavySoil -> /SoilNitrogen_CNPatch_VariabilityTests/SoilCNPatch-AddOnly/Test08-Bare+TypicSoil+addStuff/Sim08-ExplicitPatches/Paddock2-base-HeavySoil
          folder ManagerFolder -> /SoilNitrogen_CNPatch_VariabilityTests/SoilCNPatch-AddOnly/Test08-Bare+TypicSoil+addStuff/Sim08-ExplicitPatches/Paddock2-base-HeavySoil/ManagerFolder
            operations AddDung
              15-Aug  'Med-HeavySoil nitrogen' incorpfom type = default, amount=10000 00 00 00 00 00, cnr=20 20 20 20 20 20
              15-Aug  Fertiliser apply amount=50 (kg/ha), depth=1 (mm), type=nh4_n
          outputfile Results -> /SoilNitrogen_CNPatch_VariabilityTests/SoilCNPatch-AddOnly/Test08-Bare+TypicSoil+addStuff/Sim08-ExplicitPatches/Paddock2-base-HeavySoil/Results: filename=Sim08-ExplicitPatches Paddock2-patch-HeavySoil Results.out; title=Sim08-ExplicitPatches Paddock2-patch-HeavySoil Results
            variables -> /SoilNitrogen_CNPatch_VariabilityTests/SoilCNPatch-AddOnly/Test08-Bare+TypicSoil+addStuff/Sim08-ExplicitPatches/Paddock2-base-HeavySoil/Results/Variables
            events ReportingFrequency -> /SoilNitrogen_CNPatch_VariabilityTests/SoilCNPatch-AddOnly/Test08-Bare+TypicSoil+addStuff/Sim08-ExplicitPatches/Paddock2-base-HeavySoil/Results/ReportingFrequency
        outputfile LightSoil Results -> /SoilNitrogen_CNPatch_VariabilityTests/SoilCNPatch-AddOnly/Test01-Bare+addUrea/Sim01-ExplicitPatches/LightSoil Results: filename=Sim08-ExplicitPatches LightSoil Results.out; title=Sim08-ExplicitPatches LightSoil Results
          variables -> /SoilNitrogen_CNPatch_VariabilityTests/SoilCNPatch-AddOnly/Test01-Bare+addUrea/Sim01-ExplicitPatches/LightSoil Results/Variables
          events ReportingFrequency -> /SoilNitrogen_CNPatch_VariabilityTests/SoilCNPatch-AddOnly/Test01-Bare+addUrea/Sim01-ExplicitPatches/LightSoil Results/ReportingFrequency
        outputfile HeavySoil Results -> /SoilNitrogen_CNPatch_VariabilityTests/SoilCNPatch-AddOnly/Test01-Bare+addUrea/Sim01-ExplicitPatches/HeavySoil Results: filename=Sim08-ExplicitPatches HeavySoil Results.out; title=Sim08-ExplicitPatches HeavySoil Results
          variables -> /SoilNitrogen_CNPatch_VariabilityTests/SoilCNPatch-AddOnly/Test01-Bare+addUrea/Sim01-ExplicitPatches/HeavySoil Results/Variables
          events ReportingFrequency -> /SoilNitrogen_CNPatch_VariabilityTests/SoilCNPatch-AddOnly/Test01-Bare+addUrea/Sim01-ExplicitPatches/HeavySoil Results/ReportingFrequency
      simulation Sim08-SoilCNPatches -> /SoilNitrogen_CNPatch_VariabilityTests/SoilCNPatch-AddOnly/Test08-Bare+TypicSoil+addStuff/Sim08-ExplicitPatches
        area Paddock1-CNpatch-LightSoil -> /SoilNitrogen_CNPatch_VariabilityTests/SoilCNPatch-AddOnly/Test08-Bare+TypicSoil+addStuff/Sim08-ExplicitPatches/Paddock1-base-LightSoil
          folder ManagerFolder -> /SoilNitrogen_CNPatch_VariabilityTests/SoilCNPatch-AddOnly/Test08-Bare+TypicSoil+addStuff/Sim08-ExplicitPatches/Paddock1-base-LightSoil/ManagerFolder
            manager2 AddSoilCNPatchFOM1
              # Basic info to add a urine patch to SoilNtrogen
              AddPatch_DateToAdd = 15-Aug-2000  # Day of month to add urine patch
              AddPatch_NumAdditions = 1  # Number of times to add new patches
              AddPatch_Interval = 5  # Interval between addition of new patches (days)
              # Info about the type of deposition
              AddPatch_DepositionType = ToNewPatch  # Choose the DepositionType
              AddPatch_PatchToAdd = base  # If DepositionType is 'ToSpecificPatch' or 'ToNewPatch', choose which patch will be used
              AddPatch_NewArea = 0.25  # Relative area of new patch (0-1)
              # Info about solute to add
              AddPatch_SoluteType = None  # Choose the solute to be added
              AddPatch_SoluteAmount = 100  # Amount of N to be added (kgN/ha)
              # Info about organic matter to add
              AddPatch_FOMtype = Dung  # Choose the type of fresh organic matter to add
              AddPatch_FOMamount = 10000  # Amount of fresh organic matter to add (kgDM/ha)
              AddPatch_FOMcnr = 20  # C:N ratio of fresh organic matter being added
```csharp
using System;
using ModelFramework;

public class Script 
{      

   [Param] DateTime AddPatch_DateToAdd;
   [Param] int AddPatch_NumAdditions;
   [Param] int AddPatch_Interval;
   [Param] string AddPatch_DepositionType;
   [Param] string AddPatch_PatchToAdd;
   [Param] double AddPatch_NewArea;
   [Param] string AddPatch_SoluteType;
   [Param] double AddPatch_SoluteAmount;
   [Param] string AddPatch_FOMtype;
   [Param] double AddPatch_FOMamount;
   [Param] double AddPatch_FOMcnr;
      
   [Link] private Paddock myPaddock;
   [Link] private Clock myClock;
   
   [Event] public event AddSoilCNPatchDelegate AddSoilCNPatch;
   [Event] public event AddSoilCNPatchwithFOMDelegate AddSoilCNPatchwithFOM;
   
   [Input(IsOptional = true)] int numPatches;
      
   [Output] string SoilName1;

   private double[] SoluteToAdd;
   private double[][] FOMCToAdd = new double[3][];
   private double[][] FOMNToAdd = new double[3][];

   private int[] PatchToAddTo;
   private int nPatches;
   private int nPatchesAdded;
   private int DaysAfterAdding;
   
   private string myFOMtype;
   private double[] FOMfraction = new double[3];
   
   [EventHandler] public void OnInitialised()
   {
      SoluteToAdd = new double[1];
      SoluteToAdd[0] = AddPatch_SoluteAmount;
      PatchToAddTo = new int[1];
      nPatchesAdded = 0;
      DaysAfterAdding = AddPatch_Interval;
      
      
      if (AddPatch_FOMtype == "Grass")
      {
         myFOMtype = "grass";
         FOMfraction[0] = 0.2;
         FOMfraction[1] = 0.7;
         FOMfraction[2] = 0.1;
      }
      else if (AddPatch_FOMtype == "Dung")
      {
         myFOMtype = "RuminantDung_PastureFed";
         FOMfraction[0] = 0.3;
         FOMfraction[1] = 0.5;
         FOMfraction[2] = 0.2;
      }
      else if (AddPatch_FOMtype == "Manure")
      {
         myFOMtype = "manure";
         FOMfraction[0] = 0.3;
         FOMfraction[1] = 0.3;
         FOMfraction[2] = 0.4;
      }
      else
      {
         myFOMtype = "none";
      }
      
      for (int pool = 0; pool < 3; pool++)
      {
         FOMCToAdd[pool] = new double[1];
         FOMNToAdd[pool] = new double[1];
         FOMCToAdd[pool][0] = AddPatch_FOMamount * 0.40 * FOMfraction[pool];
         FOMNToAdd[pool][0] = FOMCToAdd[pool][0] / AddPatch_FOMcnr;
      }
      
      
      Console.WriteLine();
      Console.WriteLine("     Addition of CNPatches initialised");
      
   }

   [EventHandler] public void OnPrepare()
   {
      if(myClock.Today >= AddPatch_DateToAdd.Date)
      {
         if ((DaysAfterAdding == AddPatch_Interval) && (nPatchesAdded < AddPatch_NumAdditions))
         {
            if (myFOMtype == "none")
            {
               AddSoilCNPatchType NewPatch = new AddSoilCNPatchType();
               NewPatch.Sender = "manager";
               NewPatch.DepositionType = AddPatch_DepositionType;
               NewPatch.AreaFraction = AddPatch_NewArea;
               if (AddPatch_PatchToAdd == "base")
                  PatchToAddTo[0] = 0;
               else
                  PatchToAddTo[0] = 0; //numPatches - 1;
               NewPatch.AffectedPatches_id = PatchToAddTo;
               if (AddPatch_SoluteType == "Urea")
                  NewPatch.Urea = SoluteToAdd;
               if (AddPatch_SoluteType == "NH4")
                  NewPatch.NH4 = SoluteToAdd;
               if (AddPatch_SoluteType == "NO3")
                  NewPatch.NO3 = SoluteToAdd;
      
               AddSoilCNPatch.Invoke(NewPatch);
            }
            else
            {
               AddSoilCNPatchwithFOMType NewPatch = new AddSoilCNPatchwithFOMType();
               NewPatch.Sender = "manager";
               NewPatch.DepositionType = AddPatch_DepositionType;
               NewPatch.AreaNewPatch = AddPatch_NewArea;
               if (AddPatch_PatchToAdd == "base")
                  PatchToAddTo[0] = 0;
               else
                  PatchToAddTo[0] = 0; //numPatches - 1;
               NewPatch.AffectedPatches_id = PatchToAddTo;
               if (AddPatch_SoluteType == "Urea")
                  NewPatch.Urea = SoluteToAdd;
               if (AddPatch_SoluteType == "NH4")
                  NewPatch.NH4 = SoluteToAdd;
               if (AddPatch_SoluteType == "NO3")
                  NewPatch.NO3 = SoluteToAdd;
      
               NewPatch.FOM = new AddSoilCNPatchwithFOMFOMType();
               NewPatch.FOM.Pool = new SoilOrganicMaterialType[3];
               for (int pool = 0; pool < 3; pool++)
               {
                  NewPatch.FOM.Pool[pool] = new SoilOrganicMaterialType();
                  NewPatch.FOM.Pool[pool].C = FOMCToAdd[pool];
                  NewPatch.FOM.Pool[pool].N = FOMNToAdd[pool];
               }
               
                  
               AddSoilCNPatchwithFOM.Invoke(NewPatch);
            }
            nPatchesAdded += 1;
            DaysAfterAdding = 1;
         }
         else
            DaysAfterAdding += 1;
      }
   }
      
   [EventHandler] public void OnPost()
   {

   }
}
```
            manager2 AddSoilCNPatchFOM2
              # Basic info to add a urine patch to SoilNtrogen
              AddPatch_DateToAdd = 15-Aug-2000  # Day of month to add urine patch
              AddPatch_NumAdditions = 1  # Number of times to add new patches
              AddPatch_Interval = 5  # Interval between addition of new patches (days)
              # Info about the type of deposition
              AddPatch_DepositionType = ToAllPaddock  # Choose the DepositionType
              AddPatch_PatchToAdd = base  # If DepositionType is 'ToSpecificPatch' or 'ToNewPatch', choose which patch will be used
              AddPatch_NewArea = 0.25  # Relative area of new patch (0-1)
              # Info about solute to add
              AddPatch_SoluteType = NH4  # Choose the solute to be added
              AddPatch_SoluteAmount = 50  # Amount of N to be added (kgN/ha)
              # Info about organic matter to add
              AddPatch_FOMtype = None  # Choose the type of fresh organic matter to add
              AddPatch_FOMamount = 00  # Amount of fresh organic matter to add (kgDM/ha)
              AddPatch_FOMcnr = 20  # C:N ratio of fresh organic matter being added
```csharp
using System;
using ModelFramework;

public class Script 
{      

   [Param] DateTime AddPatch_DateToAdd;
   [Param] int AddPatch_NumAdditions;
   [Param] int AddPatch_Interval;
   [Param] string AddPatch_DepositionType;
   [Param] string AddPatch_PatchToAdd;
   [Param] double AddPatch_NewArea;
   [Param] string AddPatch_SoluteType;
   [Param] double AddPatch_SoluteAmount;
   [Param] string AddPatch_FOMtype;
   [Param] double AddPatch_FOMamount;
   [Param] double AddPatch_FOMcnr;
      
   [Link] private Paddock myPaddock;
   [Link] private Clock myClock;
   
   [Event] public event AddSoilCNPatchDelegate AddSoilCNPatch;
   [Event] public event AddSoilCNPatchwithFOMDelegate AddSoilCNPatchwithFOM;
   
   [Input(IsOptional = true)] int numPatches;
      
   [Output] string SoilName1;

   private double[] SoluteToAdd;
   private double[][] FOMCToAdd = new double[3][];
   private double[][] FOMNToAdd = new double[3][];

   private int[] PatchToAddTo;
   private int nPatches;
   private int nPatchesAdded;
   private int DaysAfterAdding;
   
   private string myFOMtype;
   private double[] FOMfraction = new double[3];
   
   [EventHandler] public void OnInitialised()
   {
      SoluteToAdd = new double[1];
      SoluteToAdd[0] = AddPatch_SoluteAmount;
      PatchToAddTo = new int[1];
      nPatchesAdded = 0;
      DaysAfterAdding = AddPatch_Interval;
      
      
      if (AddPatch_FOMtype == "Grass")
      {
         myFOMtype = "grass";
         FOMfraction[0] = 0.2;
         FOMfraction[1] = 0.7;
         FOMfraction[2] = 0.1;
      }
      else if (AddPatch_FOMtype == "Dung")
      {
         myFOMtype = "RuminantDung_PastureFed";
         FOMfraction[0] = 0.3;
         FOMfraction[1] = 0.5;
         FOMfraction[2] = 0.2;
      }
      else if (AddPatch_FOMtype == "Manure")
      {
         myFOMtype = "manure";
         FOMfraction[0] = 0.3;
         FOMfraction[1] = 0.3;
         FOMfraction[2] = 0.4;
      }
      else
      {
         myFOMtype = "none";
      }
      
      for (int pool = 0; pool < 3; pool++)
      {
         FOMCToAdd[pool] = new double[1];
         FOMNToAdd[pool] = new double[1];
         FOMCToAdd[pool][0] = AddPatch_FOMamount * 0.58 * FOMfraction[pool];
         FOMNToAdd[pool][0] = FOMCToAdd[pool][0] / AddPatch_FOMcnr;
      }
      
      
      Console.WriteLine();
      Console.WriteLine("     Addition of CNPatches initialised");
      
   }

   [EventHandler] public void OnPrepare()
   {
      if(myClock.Today >= AddPatch_DateToAdd.Date)
      {
         if ((DaysAfterAdding == AddPatch_Interval) && (nPatchesAdded < AddPatch_NumAdditions))
         {
            if (myFOMtype == "none")
            {
               AddSoilCNPatchType NewPatch = new AddSoilCNPatchType();
               NewPatch.Sender = "manager";
               NewPatch.DepositionType = AddPatch_DepositionType;
               NewPatch.AreaFraction = AddPatch_NewArea;
               if (AddPatch_PatchToAdd == "base")
                  PatchToAddTo[0] = 0;
               else
                  PatchToAddTo[0] = 0; //numPatches - 1;
               NewPatch.AffectedPatches_id = PatchToAddTo;
               if (AddPatch_SoluteType == "Urea")
                  NewPatch.Urea = SoluteToAdd;
               if (AddPatch_SoluteType == "NH4")
                  NewPatch.NH4 = SoluteToAdd;
               if (AddPatch_SoluteType == "NO3")
                  NewPatch.NO3 = SoluteToAdd;
      
               AddSoilCNPatch.Invoke(NewPatch);
            }
            else
            {
               AddSoilCNPatchwithFOMType NewPatch = new AddSoilCNPatchwithFOMType();
               NewPatch.Sender = "manager";
               NewPatch.DepositionType = AddPatch_DepositionType;
               NewPatch.AreaNewPatch = AddPatch_NewArea;
               if (AddPatch_PatchToAdd == "base")
                  PatchToAddTo[0] = 0;
               else
                  PatchToAddTo[0] = 0; //numPatches - 1;
               NewPatch.AffectedPatches_id = PatchToAddTo;
               if (AddPatch_SoluteType == "Urea")
                  NewPatch.Urea = SoluteToAdd;
               if (AddPatch_SoluteType == "NH4")
                  NewPatch.NH4 = SoluteToAdd;
               if (AddPatch_SoluteType == "NO3")
                  NewPatch.NO3 = SoluteToAdd;
      
               NewPatch.FOM = new AddSoilCNPatchwithFOMFOMType();
               NewPatch.FOM.Pool = new SoilOrganicMaterialType[3];
               for (int pool = 0; pool < 3; pool++)
               {
                  NewPatch.FOM.Pool[pool] = new SoilOrganicMaterialType();
                  NewPatch.FOM.Pool[pool].C = FOMCToAdd[pool];
                  NewPatch.FOM.Pool[pool].N = FOMNToAdd[pool];
               }
               
                  
               AddSoilCNPatchwithFOM.Invoke(NewPatch);
            }
            nPatchesAdded += 1;
            DaysAfterAdding = 1;
         }
         else
            DaysAfterAdding += 1;
      }
   }
      
   [EventHandler] public void OnPost()
   {

   }
}
```
          outputfile Results -> /SoilNitrogen_CNPatch_VariabilityTests/SoilCNPatch-AddOnly/Test08-Bare+TypicSoil+addStuff/Sim08-ExplicitPatches/Paddock1-base-LightSoil/Results: filename=Sim08-SoilCNPatches Paddock1-CNpatch-LightSoil Results.out; title=Sim08-SoilCNPatches Paddock1-CNpatch-LightSoil Results
            variables -> /SoilNitrogen_CNPatch_VariabilityTests/SoilCNPatch-AddOnly/Test08-Bare+TypicSoil+addStuff/Sim08-ExplicitPatches/Paddock1-base-LightSoil/Results/Variables
            events ReportingFrequency -> /SoilNitrogen_CNPatch_VariabilityTests/SoilCNPatch-AddOnly/Test08-Bare+TypicSoil+addStuff/Sim08-ExplicitPatches/Paddock1-base-LightSoil/Results/ReportingFrequency
        area Paddock2-CNpatch-HeavySoil -> /SoilNitrogen_CNPatch_VariabilityTests/SoilCNPatch-AddOnly/Test08-Bare+TypicSoil+addStuff/Sim08-ExplicitPatches/Paddock2-base-HeavySoil
          outputfile Results -> /SoilNitrogen_CNPatch_VariabilityTests/SoilCNPatch-AddOnly/Test08-Bare+TypicSoil+addStuff/Sim08-ExplicitPatches/Paddock2-base-HeavySoil/Results: filename=Sim08-SoilCNPatches Paddock2-CNpatch-HeavySoil Results.out; title=Sim08-SoilCNPatches Paddock2-CNpatch-HeavySoil Results
            variables -> /SoilNitrogen_CNPatch_VariabilityTests/SoilCNPatch-AddOnly/Test08-Bare+TypicSoil+addStuff/Sim08-ExplicitPatches/Paddock2-base-HeavySoil/Results/Variables
            events ReportingFrequency -> /SoilNitrogen_CNPatch_VariabilityTests/SoilCNPatch-AddOnly/Test08-Bare+TypicSoil+addStuff/Sim08-ExplicitPatches/Paddock2-base-HeavySoil/Results/ReportingFrequency
  folder SoilCNPatch-AddMerge
    memo Info
      ++++++++++++++++++++  TEST AddMerge  +++++++++++++++++++++++++++++++++++++++++++++++++++++

           These simulations are for testing the initialisation/creation of patches within SoilNitrogen. Plus adding 'stuff'.
           The patches do vary, i.e., newly created patches are different from old ones due to addition of 'stuff' (C or N).
        So, the presence of patches should make a considerable difference on the outputs of each simulation, when
        compared to the simulation with 'explicitly defined patches' (or with no patches).
            The comparison is made between simulations with soil variability simulated explicilty (using multiple paddocks)
        against the simulations with patches added internally to SoilNitrogen only.  The results from these simulations
        should have noticiable but relatively small differences to those from the simulations with explicity patches The
        time spent to complete the simulations will increase for those simulations with large number of patches.
    folder Test01-BareBare+addMerge
      memo Info
        ++++++++++++++++++++  TEST 01 +++++++++++++++++++++++++++++++++++++++++++++++++++++++++++

           Description:
              - Artificial climate, smooth mild temperate;
              - Two generic soils, a free draining and a poorly drained;
              - Bare soil;
              - No initial mineral N;
              - No initial soil organic matter;
              - No initial surface residues;
              - No additions of residues;
              - Urea added homegenouly and as patch, 2×10kgN/ha in two patches
                (the first application is homogenous (no patches created), the second goes to 50% of the area within two days,
                with an homogenous application in the non-patch simulations)

              > Simulation 01 has no patches
              > Simulation 02 has 2×2 patches, added in sequence and then 'forced' to merge

           Expected output:
              - All outputs with valid values (numeric mostly);
              - Most values equal to zero, as there are little mineral solutes and no organic pools;
              - Very small differences between simulations as the patches are very similar and creation is within days only
      PlugIns: same as SoilCNPatch-AddOnly.Test01-Bare+addUrea.PlugIns
      simulation Sim01-Simple
        clock
          start_date = 01/01/2000
          end_date = 31/12/2000
        metfile met: filename=%apsim%\Examples\MetFiles\MildTemperate.met
        summaryfile
        area Paddock1-LightSoil
          folder ManagerFolder
            manager2 Aux-Outputs
              # This script help to organise some outputs
```csharp
using System;
using ModelFramework;

public class Script 
{      

   [Link] Paddock myPaddock;
   
   [Input(IsOptional=true)] double[] n_demanded;
   [Input(IsOptional=true)] double totaln;
   [Input(IsOptional=true)] double totalwt;
   [Input(IsOptional=true)] double ep;

   [Input(IsOptional=true)] double[] NitrogenSupplyLayers;
   [Input(IsOptional=true)] double TotalPlantN;
   [Input(IsOptional=true)] double TotalPlantWt;
   [Input(IsOptional=true)] double WaterUptake;
      
   [Output][Units("")] string SoilName;
   [Output][Units("kg/ha")] double PlantTotalN;
   [Output][Units("kg/ha")] double PlantTotalC;
   [Output][Units("mm")] double PlantTranspiration;
   
   [EventHandler] public void OnInitialised()
   {
      
      foreach(Component myModule in myPaddock.Children)
      {
         if(myModule.Name.Contains(" Nitrogen"))
         {
            SoilName = myModule.Name.Split(' ')[0];
         }
      }
   }

   [EventHandler] public void OnPost()
   {
      if (n_demanded != null)
      {
         PlantTotalN = totaln;
         PlantTotalC = 0.4 * totalwt;
         PlantTranspiration = ep;
      }
      else if (NitrogenSupplyLayers != null)
      {
         PlantTotalN = TotalPlantN;
         PlantTotalC = 0.4 * TotalPlantWt;
         PlantTranspiration = WaterUptake;
      }
      else
      {
         PlantTotalN = 0.0;
         PlantTranspiration = 0.0;
      }
   }
}
```
            operations AddUrea
              15-Mar  Fertiliser apply amount=10 (kg/ha), depth=1 (mm), type=urea_n
              15-Apr  Fertiliser apply amount=10 (kg/ha), depth=1 (mm), type=urea_n
          fertiliser
          surfaceom SurfaceOrganicMatter
            PoolName = Residue1  # Organic Matter pool name
            type = grass  # Organic Matter type
            mass = 0  # Initial surface residue (kg/ha)
            cnr = 20  # C:N ratio of initial residue
            standing_fraction = 0  # Fraction of residue standing
          Soil Med-LightSoil: same as SoilCNPatch-AddOnly.Test01-Bare+addUrea.Sim01-ExplicitPatches.Paddock1-base-LightSoil.Med-LightSoil
          outputfile Results: filename=Sim01-Simple Paddock1-LightSoil Results.out; title=Sim01-Simple Paddock1-LightSoil Results
            variables
              variable:
                dd/mmm/yyyy as Date
                day as DoY
                urea() as UreaTotal format 5
                nh4() as NH4Total format 5
                no3() as NO3Total format 5
                surfaceom_n as SurfaceOM_N format 5
                fom_n() as FOM_N format 5
                biom_n() as Biom_N format 5
                hum_n() as Hum_N format 5
                PlantTotalN as PlantTotalN format 5
                fertiliser as FertiliserN format 5
                dlt_urea_hydrol() as HydrolisedN format 5
                nitrification() as NitrifiedN format 5
                dnit() as DenitrifiedN format 5
                leach_no3 as LeachedNO3 format 5
                dlt_n_min_res() as NetMineralisedResidue format 5
                dlt_n_min_tot() as NetMineralisedHumus format 5
                n2o_atm() as N2Oemissions format 5
                dlt_n_loss_in_sed as dltN_sediments format 5
                surfaceom_c as SurfaceOM_C format 5
                fom_c() as FOM_C format 5
                biom_c() as Biom_C format 5
                hum_c() as Hum_C format 5
                oc() as OCTotal format 5
                PlantTotalC format 5
                dlt_res_c_atm as CO2fromResidues format 5
                dlt_fom_c_atm() as CO2fromFOM format 5
                dlt_biom_c_atm() as CO2fromMBiomass format 5
                dlt_hum_c_atm() as CO2fromHumus format 5
                dlt_c_loss_in_sed as dltC_sediments format 5
                es as Evaporation format 5
                PlantTranspiration as PlantTranspiration format 5
                drain as Drain format 5
                Runoff format 5
                dlayer format 5
                urea format 5
                nh4 format 5
                no3 format 5
                fom_n format 5
                biom_n format 5
                hum_n format 5
                fom_c format 5
                biom_c format 5
                hum_c format 5
                st format 7
                sw_dep format 5
                SoilName
                PatchCount as NumPatches
            events ReportingFrequency: event=end_day
        area Paddock2-HeavySoil
          folder ManagerFolder
            manager2 Aux-Outputs -> /SoilNitrogen_CNPatch_VariabilityTests/SoilCNPatch-AddMerge/Test01-BareBare+addMerge/Sim01-Simple/Paddock1-LightSoil/ManagerFolder/Aux-Outputs
            operations AddUrea -> /SoilNitrogen_CNPatch_VariabilityTests/SoilCNPatch-AddMerge/Test01-BareBare+addMerge/Sim01-Simple/Paddock1-LightSoil/ManagerFolder/AddUrea
          fertiliser
          surfaceom SurfaceOrganicMatter -> /SoilNitrogen_CNPatch_VariabilityTests/SoilCNPatch-AddMerge/Test01-BareBare+addMerge/Sim01-Simple/Paddock1-LightSoil/SurfaceOrganicMatter
          Soil Med-HeavySoil: LocalName=Generic medium-heavy sedimentary soil; Country=New Zealand; Latitude=0; Longitude=0
            DataSource=Hypothetical medium to heavy texture soil of sedimentary origin (moderately poorly drained)
            Analysis: same as SoilCNPatch-AddOnly.Test01-Bare+addUrea.Sim01-ExplicitPatches.Paddock2-base-HeavySoil.Med-HeavySoil.Analysis
            Water: same as SoilCNPatch-AddOnly.Test01-Bare+addUrea.Sim01-ExplicitPatches.Paddock2-base-HeavySoil.Med-HeavySoil.Water
            SoilWater: same as SoilCNPatch-AddOnly.Test01-Bare+addUrea.Sim01-ExplicitPatches.Paddock2-base-HeavySoil.Med-HeavySoil.SoilWater
            SoilOrganicMatter: RootCN=30; RootWt=0; SoilCN=12.5; EnrACoeff=7.4; EnrBCoeff=0.2; OCUnits=Total
              Thickness  OC  FBiom  FInert
              150        0   0.035  0.5
              150        0   0.025  0.65
              300        0   0.015  0.835
              300        0   0.01   0.94
              300        0   0.01   0.97
              300        0   0.01   0.996
            Sample Initial nitrogen -> /SoilNitrogen_CNPatch_VariabilityTests/SoilCNPatch-AddMerge/Test01-BareBare+addMerge/Sim01-Simple/Paddock1-LightSoil/Med-LightSoil/Initial nitrogen
            InitialWater: FractionFull=1; PercentMethod=EvenlyDistributed; RelativeTo=ll15
          outputfile Results -> /SoilNitrogen_CNPatch_VariabilityTests/SoilCNPatch-AddMerge/Test01-BareBare+addMerge/Sim01-Simple/Paddock1-LightSoil/Results: filename=Sim01-Simple Paddock2-HeavySoil Results.out; title=Sim01-Simple Paddock2-HeavySoil Results
            variables -> /SoilNitrogen_CNPatch_VariabilityTests/SoilCNPatch-AddMerge/Test01-BareBare+addMerge/Sim01-Simple/Paddock1-LightSoil/Results/Variables
            events ReportingFrequency -> /SoilNitrogen_CNPatch_VariabilityTests/SoilCNPatch-AddMerge/Test01-BareBare+addMerge/Sim01-Simple/Paddock1-LightSoil/Results/ReportingFrequency
      simulation Sim01-Patches -> /SoilNitrogen_CNPatch_VariabilityTests/SoilCNPatch-AddMerge/Test01-BareBare+addMerge/Sim01-Simple
        area Paddock1-LightSoil -> /SoilNitrogen_CNPatch_VariabilityTests/SoilCNPatch-AddMerge/Test01-BareBare+addMerge/Sim01-Simple/Paddock1-LightSoil
          folder ManagerFolder -> /SoilNitrogen_CNPatch_VariabilityTests/SoilCNPatch-AddMerge/Test01-BareBare+addMerge/Sim01-Simple/Paddock1-LightSoil/ManagerFolder
            manager2 Aux-Outputs: same as SoilCNPatch-AddMerge.Test01-BareBare+addMerge.Sim01-Simple.Paddock1-LightSoil.ManagerFolder.Aux-Outputs
            operations AddUrea
              15-Mar  Fertiliser apply amount=10 (kg/ha), depth=1 (mm), type=urea_n
            manager2 AddSoilCNPatch1
              # Basic info to add a urine patch to SolNitrogen
              AddPatch_DateToAdd = 14-Apr-2000  # Day of month to add urine patch
              AddPatch_NumAdditions = 1  # Number of times to add new patches
              AddPatch_Interval = 5000  # Interval between addition of new patches (days)
              # Info about the type of deposition
              AddPatch_DepositionType = ToNewPatch  # Choose the DepositionType
              AddPatch_PatchToAdd = base  # If DepositionType is 'ToSpecificPatch' or 'ToNewPatch', choose which patch will be used
              AddPatch_NewArea = 0.5  # Relative area of new patch (0-1)
              # Info about solute to add
              AddPatch_SoluteType = Urea  # Choose the solute to be added
              AddPatch_SoluteAmount = 10  # Amount of N to be added (kgN/ha_patch)
```csharp
using System;
using ModelFramework;

public class Script 
{      

   [Param] DateTime AddPatch_DateToAdd;
   [Param] int AddPatch_NumAdditions;
   [Param] int AddPatch_Interval;
   [Param] string AddPatch_DepositionType;
   [Param] string AddPatch_PatchToAdd;
   [Param] double AddPatch_NewArea;
   [Param] string AddPatch_SoluteType;
   [Param] double AddPatch_SoluteAmount;   
   
   [Link] private Paddock myPaddock;
   [Link] private Clock myClock;
   
   [Event] public event AddSoilCNPatchDelegate AddSoilCNPatch;
   
   [Input(IsOptional = true)] int numPatches;
      
   [Output] string SoilName1;

   private double[] SoluteToAdd;
   private int[] PatchToAddTo;
   private int nPatchesAdded;
   
   private int nPatches;
   private int DaysAfterAdding;
   
   [EventHandler] public void OnInitialised()
   {
      SoluteToAdd = new double[1];
      SoluteToAdd[0] = AddPatch_SoluteAmount;
      PatchToAddTo = new int[1];
      nPatchesAdded = 0;
      DaysAfterAdding = AddPatch_Interval;
      
      Console.WriteLine();
      Console.WriteLine("     Addition of CNPatches initialised");
      
   }

   [EventHandler] public void OnPrepare()
   {
      if(myClock.Today >= AddPatch_DateToAdd.Date)
      {
         if ((DaysAfterAdding == AddPatch_Interval) && (nPatchesAdded < AddPatch_NumAdditions))
         {
            AddSoilCNPatchType NewPatch = new AddSoilCNPatchType();
            NewPatch.Sender = "manager";
            NewPatch.DepositionType = AddPatch_DepositionType;
            NewPatch.AreaFraction = AddPatch_NewArea;
            if (AddPatch_PatchToAdd == "base")
               PatchToAddTo[0] = 0;
            else
               PatchToAddTo[0] = 0; //numPatches - 1;
            NewPatch.AffectedPatches_id = PatchToAddTo;
            if (AddPatch_SoluteType == "Urea")
               NewPatch.Urea = SoluteToAdd;
            if (AddPatch_SoluteType == "NH4")
               NewPatch.NH4 = SoluteToAdd;
            if (AddPatch_SoluteType == "NO3")
               NewPatch.NO3 = SoluteToAdd;
      
            AddSoilCNPatch.Invoke(NewPatch);
            nPatchesAdded += 1;
            DaysAfterAdding = 1;
         }
         else
            DaysAfterAdding += 1;
      }
   }
      
   [EventHandler] public void OnPost()
   {

   }
}
```
            manager2 AddSoilCNPatch2
              # Basic info to add a urine patch to SolNitrogen
              AddPatch_DateToAdd = 16-Apr-2000  # Day of month to add urine patch
              AddPatch_NumAdditions = 1  # Number of times to add new patches
              AddPatch_Interval = 500  # Interval between addition of new patches (days)
              # Info about the type of deposition
              AddPatch_DepositionType = ToSpecificPatch  # Choose the DepositionType
              AddPatch_PatchToAdd = base  # If DepositionType is 'ToSpecificPatch' or 'ToNewPatch', choose which patch will be used
              AddPatch_NewArea = 0.05  # Relative area of new patch (0-1)
              # Info about solute to add
              AddPatch_SoluteType = Urea  # Choose the solute to be added
              AddPatch_SoluteAmount = 10  # Amount of N to be added (kgN/ha_patch)
              script: same as in SoilCNPatch-AddMerge.Test01-BareBare+addMerge.Sim01-Patches.Paddock1-LightSoil.ManagerFolder.AddSoilCNPatch1
            manager2 MergeSoilCNPatch1
              # Basic info for merging two SoilCNPatches of SoilNitrogen
              MergePatch_DateToAdd = 10-Aug-2000  # Date to merge patches
              MergePatch_Select = DefinePair  # Choose whether user define the pair to merge or all patches will be merged
              MergePatch_Receiver = base  # Receiving patch name
              MergePatch_Merged = last  # Patch being merged ( if 'last' is given, then last patch is merged to receiving)
              MergePatch_Interval = 5  # If 'last' was given, mergings can be recurrent, type the interval between attempts
              MergePatch_Times = 10  # If 'last' was given, type the maximum number of mergings
```csharp
using System;
using ModelFramework;

public class Script 
{      

   [Param] DateTime MergePatch_DateToAdd;
   [Param] string MergePatch_Select;
   [Param] string MergePatch_Receiver;
   [Param] string MergePatch_Merged;
   [Param] int MergePatch_Interval;
   [Param] int MergePatch_Times;
      
   [Link] private Clock myClock;
   [Link] SoilN mySoilN;

   [Event] public event MergeSoilCNPatchDelegate MergeSoilCNPatch;
   
   [Input] int PatchCount;
   [Input] string[] PatchName;
   
   private string[] PatchList;
   private int DaysAfterMerge;
   private int NumberOfMergers;

   [EventHandler] public void OnInitialised()
   {
      PatchList = new string[2];
      PatchList[0] = MergePatch_Receiver;
      PatchList[1] = MergePatch_Merged;
      
      DaysAfterMerge = 0;
      NumberOfMergers = 0;
      if (MergePatch_Select == "MergeAll")
         MergePatch_Times = 1;
      else if (MergePatch_Merged != "last")
         MergePatch_Interval = 1;
      
      Console.WriteLine();
      Console.WriteLine("     Merging of CNPatches initialised");
   }

   [EventHandler] public void OnPrepare()
   {
      if((myClock.Today >= MergePatch_DateToAdd.Date) && (PatchCount > 1))
      {
         if ((MergePatch_Select == "MergeAll")&&(NumberOfMergers <MergePatch_Times))
         {
            MergeSoilCNPatchType MergeInfo = new MergeSoilCNPatchType();
            MergeInfo.Sender = "manager";
            MergeInfo.MergeAll = true;
            MergeSoilCNPatch.Invoke(MergeInfo);
         }           
         if ((DaysAfterMerge >= MergePatch_Interval) &&(NumberOfMergers <MergePatch_Times))
         {
            MergeSoilCNPatchType MergeInfo = new MergeSoilCNPatchType();
            MergeInfo.Sender = "manager";
            if (MergePatch_Merged == "last")
               PatchList[1] = PatchName[PatchCount - 1];
            MergeInfo.AffectedPatches_nm = PatchList;
      
            MergeSoilCNPatch.Invoke(MergeInfo);
            NumberOfMergers += 1;
            DaysAfterMerge = 0;
         }
         else
         {
            DaysAfterMerge += 1;
         }
      }
   }
}
```
          outputfile Results -> /SoilNitrogen_CNPatch_VariabilityTests/SoilCNPatch-AddMerge/Test01-BareBare+addMerge/Sim01-Simple/Paddock1-LightSoil/Results: filename=Sim01-Patches Paddock1-LightSoil Results.out; title=Sim01-Patches Paddock1-LightSoil Results
            variables -> /SoilNitrogen_CNPatch_VariabilityTests/SoilCNPatch-AddMerge/Test01-BareBare+addMerge/Sim01-Simple/Paddock1-LightSoil/Results/Variables
            events ReportingFrequency -> /SoilNitrogen_CNPatch_VariabilityTests/SoilCNPatch-AddMerge/Test01-BareBare+addMerge/Sim01-Simple/Paddock1-LightSoil/Results/ReportingFrequency
        area Paddock2-HeavySoil -> /SoilNitrogen_CNPatch_VariabilityTests/SoilCNPatch-AddMerge/Test01-BareBare+addMerge/Sim01-Simple/Paddock2-HeavySoil
          folder ManagerFolder -> /SoilNitrogen_CNPatch_VariabilityTests/SoilCNPatch-AddMerge/Test01-BareBare+addMerge/Sim01-Simple/Paddock2-HeavySoil/ManagerFolder
            manager2 Aux-Outputs: same as SoilCNPatch-AddMerge.Test01-BareBare+addMerge.Sim01-Simple.Paddock1-LightSoil.ManagerFolder.Aux-Outputs
          outputfile Results -> /SoilNitrogen_CNPatch_VariabilityTests/SoilCNPatch-AddMerge/Test01-BareBare+addMerge/Sim01-Simple/Paddock2-HeavySoil/Results: filename=Sim01-Patches Paddock2-HeavySoil Results.out; title=Sim01-Patches Paddock2-HeavySoil Results
            variables -> /SoilNitrogen_CNPatch_VariabilityTests/SoilCNPatch-AddMerge/Test01-BareBare+addMerge/Sim01-Simple/Paddock2-HeavySoil/Results/Variables
            events ReportingFrequency -> /SoilNitrogen_CNPatch_VariabilityTests/SoilCNPatch-AddMerge/Test01-BareBare+addMerge/Sim01-Simple/Paddock2-HeavySoil/Results/ReportingFrequency
    folder Test02-Bare+TypicSoil+addMerge -> /SoilNitrogen_CNPatch_VariabilityTests/SoilCNPatch-AddMerge/Test01-BareBare+addMerge
      memo Info
        ++++++++++++++++++++  TEST 02 +++++++++++++++++++++++++++++++++++++++++++++++++++++++++++

           Description:
              - Artificial climate, smooth mild temperate;
              - Two generic soils, a free draining and a poorly drained;
              - Bare soil;
              - Initial mineral N: 30kgN/ha as NO3 + 30kgN/ha as NH4;
              - Initial soil organic matter composed of humus and FOM;
              - Initial surface residues of 1000kgDM/ha;
              - No additions of residues;
              - Urea added homegenouly and as patch, 2×10kgN/ha in two patches
                (the first application is homogenous (no patches created), the second goes to 50% of the area within two days,
                with an homogenous application in the non-patch simulations)

              > Simulation 01 has no patches
              > Simulation 02 has 2×2 patches, added in sequence and then 'forced' to merge

           Expected output:
              - All outputs with valid values (numeric mostly);
              - Very small differences between simulations as the patches are very similar and creation is within days only
      simulation Sim02-Simple -> /SoilNitrogen_CNPatch_VariabilityTests/SoilCNPatch-AddMerge/Test01-BareBare+addMerge/Sim01-Simple
        area Paddock1-LightSoil -> /SoilNitrogen_CNPatch_VariabilityTests/SoilCNPatch-AddMerge/Test01-BareBare+addMerge/Sim01-Simple/Paddock1-LightSoil
          surfaceom SurfaceOrganicMatter
            PoolName = Residue1  # Organic Matter pool name
            type = grass  # Organic Matter type
            mass = 1000  # Initial surface residue (kg/ha)
            cnr = 20  # C:N ratio of initial residue
            standing_fraction = 0  # Fraction of residue standing
          Soil Med-LightSoil: LocalName=Generic medium-light sedimentary soil; Country=New Zealand; Latitude=0; Longitude=0
            DataSource=Hypothetical medium to light texture soil of sedimentary origin (moderately high drainage)
            Analysis: same as SoilCNPatch-AddOnly.Test01-Bare+addUrea.Sim01-ExplicitPatches.Paddock1-base-LightSoil.Med-LightSoil.Analysis
            Water: same as SoilCNPatch-AddOnly.Test01-Bare+addUrea.Sim01-ExplicitPatches.Paddock1-base-LightSoil.Med-LightSoil.Water
            SoilWater: same as SoilCNPatch-AddOnly.Test01-Bare+addUrea.Sim01-ExplicitPatches.Paddock1-base-LightSoil.Med-LightSoil.SoilWater
            SoilOrganicMatter: same as SoilCNPatch-AddOnly.Test02-Bare+TypicSoil+addUrea.Sim02-ExplicitPatches.Paddock1-base-LightSoil.Med-LightSoil.SoilOrganicMatter
            Sample Initial nitrogen: NO3Units=kgha; NH4Units=kgha; SWUnits=Volumetric; OCUnits=Total; PHUnits=Water
              Thickness  NO3  NH4
              150        5    5
              150        5    5
              300        5    5
              300        5    5
              300        5    5
              300        5    5
            InitialWater: FractionFull=1; PercentMethod=EvenlyDistributed; RelativeTo=ll15
          outputfile Results -> /SoilNitrogen_CNPatch_VariabilityTests/SoilCNPatch-AddMerge/Test01-BareBare+addMerge/Sim01-Simple/Paddock1-LightSoil/Results: filename=Sim02-Simple Paddock1-LightSoil Results.out; title=Sim02-Simple Paddock1-LightSoil Results
            variables -> /SoilNitrogen_CNPatch_VariabilityTests/SoilCNPatch-AddMerge/Test01-BareBare+addMerge/Sim01-Simple/Paddock1-LightSoil/Results/Variables
            events ReportingFrequency -> /SoilNitrogen_CNPatch_VariabilityTests/SoilCNPatch-AddMerge/Test01-BareBare+addMerge/Sim01-Simple/Paddock1-LightSoil/Results/ReportingFrequency
        area Paddock2-HeavySoil -> /SoilNitrogen_CNPatch_VariabilityTests/SoilCNPatch-AddMerge/Test01-BareBare+addMerge/Sim01-Simple/Paddock2-HeavySoil
          Soil Med-HeavySoil: LocalName=Generic medium-heavy sedimentary soil; Country=New Zealand; Latitude=0; Longitude=0; YearOfSampling=0
            DataSource=Hypothetical medium to heavy texture soil of sedimentary origin (moderately poorly drained)
            Analysis: same as SoilCNPatch-AddOnly.Test01-Bare+addUrea.Sim01-ExplicitPatches.Paddock2-base-HeavySoil.Med-HeavySoil.Analysis
            Water: same as SoilCNPatch-AddOnly.Test01-Bare+addUrea.Sim01-ExplicitPatches.Paddock2-base-HeavySoil.Med-HeavySoil.Water
            SoilWater: same as SoilCNPatch-AddOnly.Test01-Bare+addUrea.Sim01-ExplicitPatches.Paddock2-base-HeavySoil.Med-HeavySoil.SoilWater
            SoilOrganicMatter: same as SoilCNPatch-AddOnly.Test02-Bare+TypicSoil+addUrea.Sim02-ExplicitPatches.Paddock2-base-HeavySoil.Med-HeavySoil.SoilOrganicMatter
            Sample Initial nitrogen -> /SoilNitrogen_CNPatch_VariabilityTests/SoilCNPatch-AddMerge/Test02-Bare+TypicSoil+addMerge/Sim02-Simple/Paddock1-LightSoil/Med-LightSoil/Initial nitrogen
            InitialWater: FractionFull=1; PercentMethod=EvenlyDistributed; RelativeTo=ll15
          outputfile Results -> /SoilNitrogen_CNPatch_VariabilityTests/SoilCNPatch-AddMerge/Test01-BareBare+addMerge/Sim01-Simple/Paddock2-HeavySoil/Results: filename=Sim02-Simple Paddock2-HeavySoil Results.out; title=Sim02-Simple Paddock2-HeavySoil Results
            variables -> /SoilNitrogen_CNPatch_VariabilityTests/SoilCNPatch-AddMerge/Test01-BareBare+addMerge/Sim01-Simple/Paddock2-HeavySoil/Results/Variables
            events ReportingFrequency -> /SoilNitrogen_CNPatch_VariabilityTests/SoilCNPatch-AddMerge/Test01-BareBare+addMerge/Sim01-Simple/Paddock2-HeavySoil/Results/ReportingFrequency
      simulation Sim02-Patches -> /SoilNitrogen_CNPatch_VariabilityTests/SoilCNPatch-AddMerge/Test02-Bare+TypicSoil+addMerge/Sim02-Simple
        area Paddock1-LightSoil -> /SoilNitrogen_CNPatch_VariabilityTests/SoilCNPatch-AddMerge/Test02-Bare+TypicSoil+addMerge/Sim02-Simple/Paddock1-LightSoil
          outputfile Results -> /SoilNitrogen_CNPatch_VariabilityTests/SoilCNPatch-AddMerge/Test02-Bare+TypicSoil+addMerge/Sim02-Simple/Paddock1-LightSoil/Results: filename=Sim02-Patches Paddock1-LightSoil Results.out; title=Sim02-Patches Paddock1-LightSoil Results
            variables -> /SoilNitrogen_CNPatch_VariabilityTests/SoilCNPatch-AddMerge/Test02-Bare+TypicSoil+addMerge/Sim02-Simple/Paddock1-LightSoil/Results/Variables
            events ReportingFrequency -> /SoilNitrogen_CNPatch_VariabilityTests/SoilCNPatch-AddMerge/Test02-Bare+TypicSoil+addMerge/Sim02-Simple/Paddock1-LightSoil/Results/ReportingFrequency
        area Paddock2-HeavySoil -> /SoilNitrogen_CNPatch_VariabilityTests/SoilCNPatch-AddMerge/Test02-Bare+TypicSoil+addMerge/Sim02-Simple/Paddock2-HeavySoil
          outputfile Results -> /SoilNitrogen_CNPatch_VariabilityTests/SoilCNPatch-AddMerge/Test02-Bare+TypicSoil+addMerge/Sim02-Simple/Paddock2-HeavySoil/Results: filename=Sim02-Patches Paddock2-HeavySoil Results.out; title=Sim02-Patches Paddock2-HeavySoil Results
            variables -> /SoilNitrogen_CNPatch_VariabilityTests/SoilCNPatch-AddMerge/Test02-Bare+TypicSoil+addMerge/Sim02-Simple/Paddock2-HeavySoil/Results/Variables
            events ReportingFrequency -> /SoilNitrogen_CNPatch_VariabilityTests/SoilCNPatch-AddMerge/Test02-Bare+TypicSoil+addMerge/Sim02-Simple/Paddock2-HeavySoil/Results/ReportingFrequency
    folder Test03-Wheat+TypicSoil+addMerge -> /SoilNitrogen_CNPatch_VariabilityTests/SoilCNPatch-AddMerge/Test01-BareBare+addMerge
      memo Info
        ++++++++++++++++++++  TEST 03 +++++++++++++++++++++++++++++++++++++++++++++++++++++++++++

           Description:
              - Artificial climate, smooth mild temperate;
              - Two generic soils, a free draining and a poorly drained;
              - Wheat crop;
              - Initial mineral N: 30kgN/ha as NO3 + 30kgN/ha as NH4;
              - Initial soil organic matter composed of humus and FOM;
              - Initial surface residues of 1000kgDM/ha;
              - Urea added homegenouly and as patch, 2×10kgN/ha in two patches
                (the first application is homogenous (no patches created), the second goes to 50% of the area within two days,
                with an homogenous application in the non-patch simulations)

              > Simulation 01 has no patches
              > Simulation 02 has 2×2 patches, added in sequence and then 'forced' to merge

           Expected output:
              - All outputs with valid values (numeric mostly);
              - Small differences between simulations as the patches are very similar and creation is within days only
      simulation Sim03-Simple -> /SoilNitrogen_CNPatch_VariabilityTests/SoilCNPatch-AddMerge/Test01-BareBare+addMerge/Sim01-Simple
        area Paddock1-LightSoil -> /SoilNitrogen_CNPatch_VariabilityTests/SoilCNPatch-AddMerge/Test01-BareBare+addMerge/Sim01-Simple/Paddock1-LightSoil
          folder ManagerFolder -> /SoilNitrogen_CNPatch_VariabilityTests/SoilCNPatch-AddMerge/Test01-BareBare+addMerge/Sim01-Simple/Paddock1-LightSoil/ManagerFolder
            manager HarvestingRule
              # Harvesting criteria
              crop = wheat  # Enter name of crop to harvest when ripe
              on end_of_day:
              script: same as in SoilCNPatch-AddOnly.Test04-Wheat+TypicSoil+addUrea.Sim04-ExplicitPatches.Paddock1-base-LightSoil.ManagerFolder.HarvestingRule
            operations OperationsSchedule
              5-Jan  wheat sow cultivar = Wakaniu, plants = 400, sowing_depth = 30 (mm), row_spacing = 150, crop_class = plant
              5-Feb  Fertiliser apply amount=50 (kg/ha), depth=100 (mm), type=urea_n
              30-Mar  Fertiliser apply amount=50 (kg/ha), depth=100 (mm), type=urea_n
          surfaceom SurfaceOrganicMatter
            PoolName = Residue1  # Organic Matter pool name
            type = grass  # Organic Matter type
            mass = 1000  # Initial surface residue (kg/ha)
            cnr = 20  # C:N ratio of initial residue
            standing_fraction = 0  # Fraction of residue standing
          Soil Med-LightSoil: same as SoilCNPatch-AddOnly.Test02-Bare+TypicSoil+addUrea.Sim02-ExplicitPatches.Paddock1-base-LightSoil.Med-LightSoil
          wheat
          outputfile Results -> /SoilNitrogen_CNPatch_VariabilityTests/SoilCNPatch-AddMerge/Test01-BareBare+addMerge/Sim01-Simple/Paddock1-LightSoil/Results: filename=Sim03-Simple Paddock1-LightSoil Results.out; title=Sim03-Simple Paddock1-LightSoil Results
            variables -> /SoilNitrogen_CNPatch_VariabilityTests/SoilCNPatch-AddMerge/Test01-BareBare+addMerge/Sim01-Simple/Paddock1-LightSoil/Results/Variables
            events ReportingFrequency -> /SoilNitrogen_CNPatch_VariabilityTests/SoilCNPatch-AddMerge/Test01-BareBare+addMerge/Sim01-Simple/Paddock1-LightSoil/Results/ReportingFrequency
        area Paddock2-HeavySoil -> /SoilNitrogen_CNPatch_VariabilityTests/SoilCNPatch-AddMerge/Test01-BareBare+addMerge/Sim01-Simple/Paddock2-HeavySoil
          Soil Med-HeavySoil: LocalName=Generic medium-heavy sedimentary soil; Country=New Zealand; Latitude=0; Longitude=0
            DataSource=Hypothetical medium to heavy texture soil of sedimentary origin (moderately poorly drained)
            Analysis: same as SoilCNPatch-AddOnly.Test01-Bare+addUrea.Sim01-ExplicitPatches.Paddock2-base-HeavySoil.Med-HeavySoil.Analysis
            Water: same as SoilCNPatch-AddOnly.Test01-Bare+addUrea.Sim01-ExplicitPatches.Paddock2-base-HeavySoil.Med-HeavySoil.Water
            SoilWater: same as SoilCNPatch-AddOnly.Test01-Bare+addUrea.Sim01-ExplicitPatches.Paddock2-base-HeavySoil.Med-HeavySoil.SoilWater
            SoilOrganicMatter: same as SoilCNPatch-AddOnly.Test02-Bare+TypicSoil+addUrea.Sim02-ExplicitPatches.Paddock2-base-HeavySoil.Med-HeavySoil.SoilOrganicMatter
            Sample Initial nitrogen -> /SoilNitrogen_CNPatch_VariabilityTests/SoilCNPatch-AddMerge/Test03-Wheat+TypicSoil+addMerge/Sim03-Simple/Paddock1-LightSoil/Med-LightSoil/Initial nitrogen
            InitialWater: FractionFull=1; PercentMethod=EvenlyDistributed; RelativeTo=ll15
          outputfile Results -> /SoilNitrogen_CNPatch_VariabilityTests/SoilCNPatch-AddMerge/Test01-BareBare+addMerge/Sim01-Simple/Paddock2-HeavySoil/Results: filename=Sim03-Simple Paddock2-HeavySoil Results.out; title=Sim03-Simple Paddock2-HeavySoil Results
            variables -> /SoilNitrogen_CNPatch_VariabilityTests/SoilCNPatch-AddMerge/Test01-BareBare+addMerge/Sim01-Simple/Paddock2-HeavySoil/Results/Variables
            events ReportingFrequency -> /SoilNitrogen_CNPatch_VariabilityTests/SoilCNPatch-AddMerge/Test01-BareBare+addMerge/Sim01-Simple/Paddock2-HeavySoil/Results/ReportingFrequency
      simulation Sim03-Patches -> /SoilNitrogen_CNPatch_VariabilityTests/SoilCNPatch-AddMerge/Test03-Wheat+TypicSoil+addMerge/Sim03-Simple
        area Paddock1-LightSoil -> /SoilNitrogen_CNPatch_VariabilityTests/SoilCNPatch-AddMerge/Test03-Wheat+TypicSoil+addMerge/Sim03-Simple/Paddock1-LightSoil
          folder ManagerFolder -> /SoilNitrogen_CNPatch_VariabilityTests/SoilCNPatch-AddMerge/Test01-BareBare+addMerge/Sim01-Patches/Paddock1-LightSoil/ManagerFolder
            manager HarvestingRule
              # Harvesting criteria
              crop = wheat  # Enter name of crop to harvest when ripe
              on end_of_day:
              script: same as in SoilCNPatch-AddOnly.Test04-Wheat+TypicSoil+addUrea.Sim04-ExplicitPatches.Paddock1-base-LightSoil.ManagerFolder.HarvestingRule
            operations OperationsSchedule: same as SoilCNPatch-AddMerge.Test03-Wheat+TypicSoil+addMerge.Sim03-Simple.Paddock1-LightSoil.ManagerFolder.OperationsSchedule
          outputfile Results -> /SoilNitrogen_CNPatch_VariabilityTests/SoilCNPatch-AddMerge/Test03-Wheat+TypicSoil+addMerge/Sim03-Simple/Paddock1-LightSoil/Results: filename=Sim03-Patches Paddock1-LightSoil Results.out; title=Sim03-Patches Paddock1-LightSoil Results
            variables -> /SoilNitrogen_CNPatch_VariabilityTests/SoilCNPatch-AddMerge/Test03-Wheat+TypicSoil+addMerge/Sim03-Simple/Paddock1-LightSoil/Results/Variables
            events ReportingFrequency -> /SoilNitrogen_CNPatch_VariabilityTests/SoilCNPatch-AddMerge/Test03-Wheat+TypicSoil+addMerge/Sim03-Simple/Paddock1-LightSoil/Results/ReportingFrequency
        area Paddock2-HeavySoil -> /SoilNitrogen_CNPatch_VariabilityTests/SoilCNPatch-AddMerge/Test03-Wheat+TypicSoil+addMerge/Sim03-Simple/Paddock2-HeavySoil
          outputfile Results -> /SoilNitrogen_CNPatch_VariabilityTests/SoilCNPatch-AddMerge/Test03-Wheat+TypicSoil+addMerge/Sim03-Simple/Paddock2-HeavySoil/Results: filename=Sim03-Patches Paddock2-HeavySoil Results.out; title=Sim03-Patches Paddock2-HeavySoil Results
            variables -> /SoilNitrogen_CNPatch_VariabilityTests/SoilCNPatch-AddMerge/Test03-Wheat+TypicSoil+addMerge/Sim03-Simple/Paddock2-HeavySoil/Results/Variables
            events ReportingFrequency -> /SoilNitrogen_CNPatch_VariabilityTests/SoilCNPatch-AddMerge/Test03-Wheat+TypicSoil+addMerge/Sim03-Simple/Paddock2-HeavySoil/Results/ReportingFrequency
    folder Test04-Pasture+TypicSoil+addMerge -> /SoilNitrogen_CNPatch_VariabilityTests/SoilCNPatch-AddMerge/Test01-BareBare+addMerge
      memo Info
        ++++++++++++++++++++  TEST 04 +++++++++++++++++++++++++++++++++++++++++++++++++++++++++++

           Description:
              - Artificial climate, smooth mild temperate;
              - Two generic soils, a free draining and a poorly drained;
              - Pastoral system;
              - Initial mineral N: 30kgN/ha as NO3 + 30kgN/ha as NH4;
              - Initial soil organic matter composed of humus and FOM;
              - Initial surface residues of 1000kgDM/ha;
              - No explicit additions of residues (has littering);
              - Urea added homegenouly and as patch, 2×10kgN/ha in two patches
                (the first application is homogenous (no patches created), the second goes to 50% of the area within two days,
                with an homogenous application in the non-patch simulations)

              > Simulation 01 has no patches
              > Simulation 02 has 2×2 patches, added in sequence and then 'forced' to merge

           Expected output:
              - All outputs with valid values (numeric mostly);
              - Small differences between simulations as the patches are very similar and creation is within days only
      simulation Sim04-Simple -> /SoilNitrogen_CNPatch_VariabilityTests/SoilCNPatch-AddMerge/Test01-BareBare+addMerge/Sim01-Simple
        area Paddock1-LightSoil -> /SoilNitrogen_CNPatch_VariabilityTests/SoilCNPatch-AddMerge/Test01-BareBare+addMerge/Sim01-Simple/Paddock1-LightSoil
          folder ManagerFolder -> /SoilNitrogen_CNPatch_VariabilityTests/SoilCNPatch-AddMerge/Test01-BareBare+addMerge/Sim01-Simple/Paddock1-LightSoil/ManagerFolder
            manager CutAgPasture: same as SoilCNPatch-AddOnly.Test05-Pasture+TypicSoil+addUrea.Sim05-ExplicitPatches.Paddock1-base-LightSoil.ManagerFolder.CutAgPasture
            operations OperationsSchedule
              15-Feb  Fertiliser apply amount=50 (kg/ha), depth=100 (mm), type=urea_n
              15-Apr  Fertiliser apply amount=50 (kg/ha), depth=100 (mm), type=urea_n
              15-Sep  Fertiliser apply amount=50 (kg/ha), depth=100 (mm), type=urea_n
          micromet
            soilalbedo = 0.23
            a_interception = 0
            b_interception = 0
            c_interception = 0
            d_interception = 0
          surfaceom SurfaceOrganicMatter
            PoolName = Residue1  # Organic Matter pool name
            type = grass  # Organic Matter type
            mass = 1000  # Initial surface residue (kg/ha)
            cnr = 20  # C:N ratio of initial residue
            standing_fraction = 0  # Fraction of residue standing
          AgPasture: same as SoilCNPatch-AddOnly.Test05-Pasture+TypicSoil+addUrea.Sim05-ExplicitPatches.Paddock1-base-LightSoil.AgPasture
          Soil Med-LightSoil: same as SoilCNPatch-AddOnly.Test02-Bare+TypicSoil+addUrea.Sim02-ExplicitPatches.Paddock1-base-LightSoil.Med-LightSoil
          outputfile Results -> /SoilNitrogen_CNPatch_VariabilityTests/SoilCNPatch-AddMerge/Test01-BareBare+addMerge/Sim01-Simple/Paddock1-LightSoil/Results: filename=Sim04-Simple Paddock1-LightSoil Results.out; title=Sim04-Simple Paddock1-LightSoil Results
            variables -> /SoilNitrogen_CNPatch_VariabilityTests/SoilCNPatch-AddMerge/Test01-BareBare+addMerge/Sim01-Simple/Paddock1-LightSoil/Results/Variables
            events ReportingFrequency -> /SoilNitrogen_CNPatch_VariabilityTests/SoilCNPatch-AddMerge/Test01-BareBare+addMerge/Sim01-Simple/Paddock1-LightSoil/Results/ReportingFrequency
        area Paddock2-HeavySoil -> /SoilNitrogen_CNPatch_VariabilityTests/SoilCNPatch-AddMerge/Test01-BareBare+addMerge/Sim01-Simple/Paddock2-HeavySoil
          Soil Med-HeavySoil: LocalName=Generic medium-heavy sedimentary soil; Country=New Zealand; Latitude=0; Longitude=0
            DataSource=Hypothetical medium to heavy texture soil of sedimentary origin (moderately poorly drained)
            Analysis: same as SoilCNPatch-AddOnly.Test01-Bare+addUrea.Sim01-ExplicitPatches.Paddock2-base-HeavySoil.Med-HeavySoil.Analysis
            Water: same as SoilCNPatch-AddOnly.Test01-Bare+addUrea.Sim01-ExplicitPatches.Paddock2-base-HeavySoil.Med-HeavySoil.Water
            SoilWater: same as SoilCNPatch-AddOnly.Test01-Bare+addUrea.Sim01-ExplicitPatches.Paddock2-base-HeavySoil.Med-HeavySoil.SoilWater
            SoilOrganicMatter: same as SoilCNPatch-AddOnly.Test02-Bare+TypicSoil+addUrea.Sim02-ExplicitPatches.Paddock2-base-HeavySoil.Med-HeavySoil.SoilOrganicMatter
            Sample Initial nitrogen -> /SoilNitrogen_CNPatch_VariabilityTests/SoilCNPatch-AddMerge/Test04-Pasture+TypicSoil+addMerge/Sim04-Simple/Paddock1-LightSoil/Med-LightSoil/Initial nitrogen
            InitialWater: FractionFull=1; PercentMethod=EvenlyDistributed; RelativeTo=ll15
          outputfile Results -> /SoilNitrogen_CNPatch_VariabilityTests/SoilCNPatch-AddMerge/Test01-BareBare+addMerge/Sim01-Simple/Paddock2-HeavySoil/Results: filename=Sim04-Simple Paddock2-HeavySoil Results.out; title=Sim04-Simple Paddock2-HeavySoil Results
            variables -> /SoilNitrogen_CNPatch_VariabilityTests/SoilCNPatch-AddMerge/Test01-BareBare+addMerge/Sim01-Simple/Paddock2-HeavySoil/Results/Variables
            events ReportingFrequency -> /SoilNitrogen_CNPatch_VariabilityTests/SoilCNPatch-AddMerge/Test01-BareBare+addMerge/Sim01-Simple/Paddock2-HeavySoil/Results/ReportingFrequency
      simulation Sim04-Patches -> /SoilNitrogen_CNPatch_VariabilityTests/SoilCNPatch-AddMerge/Test04-Pasture+TypicSoil+addMerge/Sim04-Simple
        area Paddock1-LightSoil -> /SoilNitrogen_CNPatch_VariabilityTests/SoilCNPatch-AddMerge/Test04-Pasture+TypicSoil+addMerge/Sim04-Simple/Paddock1-LightSoil
          folder ManagerFolder -> /SoilNitrogen_CNPatch_VariabilityTests/SoilCNPatch-AddMerge/Test01-BareBare+addMerge/Sim01-Patches/Paddock1-LightSoil/ManagerFolder
            manager CutAgPasture: same as SoilCNPatch-AddOnly.Test05-Pasture+TypicSoil+addUrea.Sim05-ExplicitPatches.Paddock1-base-LightSoil.ManagerFolder.CutAgPasture
            operations OperationsSchedule: same as SoilCNPatch-AddMerge.Test04-Pasture+TypicSoil+addMerge.Sim04-Simple.Paddock1-LightSoil.ManagerFolder.OperationsSchedule
          outputfile Results -> /SoilNitrogen_CNPatch_VariabilityTests/SoilCNPatch-AddMerge/Test04-Pasture+TypicSoil+addMerge/Sim04-Simple/Paddock1-LightSoil/Results: filename=Sim04-Patches Paddock1-LightSoil Results.out; title=Sim04-Patches Paddock1-LightSoil Results
            variables -> /SoilNitrogen_CNPatch_VariabilityTests/SoilCNPatch-AddMerge/Test04-Pasture+TypicSoil+addMerge/Sim04-Simple/Paddock1-LightSoil/Results/Variables
            events ReportingFrequency -> /SoilNitrogen_CNPatch_VariabilityTests/SoilCNPatch-AddMerge/Test04-Pasture+TypicSoil+addMerge/Sim04-Simple/Paddock1-LightSoil/Results/ReportingFrequency
        area Paddock2-HeavySoil -> /SoilNitrogen_CNPatch_VariabilityTests/SoilCNPatch-AddMerge/Test04-Pasture+TypicSoil+addMerge/Sim04-Simple/Paddock2-HeavySoil
          outputfile Results -> /SoilNitrogen_CNPatch_VariabilityTests/SoilCNPatch-AddMerge/Test04-Pasture+TypicSoil+addMerge/Sim04-Simple/Paddock2-HeavySoil/Results: filename=Sim04-Patches Paddock2-HeavySoil Results.out; title=Sim04-Patches Paddock2-HeavySoil Results
            variables -> /SoilNitrogen_CNPatch_VariabilityTests/SoilCNPatch-AddMerge/Test04-Pasture+TypicSoil+addMerge/Sim04-Simple/Paddock2-HeavySoil/Results/Variables
            events ReportingFrequency -> /SoilNitrogen_CNPatch_VariabilityTests/SoilCNPatch-AddMerge/Test04-Pasture+TypicSoil+addMerge/Sim04-Simple/Paddock2-HeavySoil/Results/ReportingFrequency
    folder Test05-Bare+TypicSoil-autoMerge -> /SoilNitrogen_CNPatch_VariabilityTests/SoilCNPatch-AddMerge/Test01-BareBare+addMerge
      memo Info
        ++++++++++++++++++++  TEST 05 +++++++++++++++++++++++++++++++++++++++++++++++++++++++++++

           Description:
              - Artificial climate, smooth mild temperate;
              - Two generic soils, a free draining and a poorly drained;
              - Bare soil;
              - Initial mineral N: 30kgN/ha as NO3 + 30kgN/ha as NH4;
              - Initial soil organic matter composed of humus and FOM;
              - Initial surface residues of 1000kgDM/ha;
              - No additions of residues;
              - Urea added homegenouly in one simulation and and as patch in another. Patches are added in
                sequence (15×10kgN/ha, or 150kgN/ha);

              > Simulation 01 has no patches
              > Simulation 02 has 10 patches added in sequence and then merged via auto amalgamation (forced merge in 15/December)

           Expected output:
              - All outputs with valid values (numeric mostly);
              - Small but noticiable differences between simulations but N balance kept;
      simulation Sim05-Simple -> /SoilNitrogen_CNPatch_VariabilityTests/SoilCNPatch-AddMerge/Test01-BareBare+addMerge/Sim01-Simple
        area Paddock1-LightSoil -> /SoilNitrogen_CNPatch_VariabilityTests/SoilCNPatch-AddMerge/Test01-BareBare+addMerge/Sim01-Simple/Paddock1-LightSoil
          folder ManagerFolder -> /SoilNitrogen_CNPatch_VariabilityTests/SoilCNPatch-AddMerge/Test01-BareBare+addMerge/Sim01-Simple/Paddock1-LightSoil/ManagerFolder
            operations AddUrea
              15-Feb  Fertiliser apply amount=150 (kg/ha), depth=1 (mm), type=urea_n
          surfaceom SurfaceOrganicMatter
            PoolName = Residue1  # Organic Matter pool name
            type = grass  # Organic Matter type
            mass = 1000  # Initial surface residue (kg/ha)
            cnr = 20  # C:N ratio of initial residue
            standing_fraction = 0  # Fraction of residue standing
          Soil Med-LightSoil: LocalName=Generic medium-light sedimentary soil; Country=New Zealand; Latitude=0; Longitude=0; YearOfSampling=0
            DataSource=Hypothetical medium to light texture soil of sedimentary origin (moderately high drainage)
            Analysis: same as SoilCNPatch-AddOnly.Test01-Bare+addUrea.Sim01-ExplicitPatches.Paddock1-base-LightSoil.Med-LightSoil.Analysis
            Water: same as SoilCNPatch-AddOnly.Test01-Bare+addUrea.Sim01-ExplicitPatches.Paddock1-base-LightSoil.Med-LightSoil.Water
            SoilWater: same as SoilCNPatch-AddOnly.Test01-Bare+addUrea.Sim01-ExplicitPatches.Paddock1-base-LightSoil.Med-LightSoil.SoilWater
            SoilOrganicMatter: same as SoilCNPatch-AddOnly.Test02-Bare+TypicSoil+addUrea.Sim02-ExplicitPatches.Paddock1-base-LightSoil.Med-LightSoil.SoilOrganicMatter
            Sample Initial nitrogen: NO3Units=kgha; NH4Units=kgha; SWUnits=Volumetric; OCUnits=Total; PHUnits=Water
              Thickness  NO3  NH4
              150        5    5
              150        5    5
              300        5    5
              300        5    5
              300        5    5
              300        5    5
            InitialWater: FractionFull=1; PercentMethod=EvenlyDistributed; RelativeTo=ll15
          outputfile Results -> /SoilNitrogen_CNPatch_VariabilityTests/SoilCNPatch-AddMerge/Test01-BareBare+addMerge/Sim01-Simple/Paddock1-LightSoil/Results: filename=Sim05-Simple Paddock1-LightSoil Results.out; title=Sim05-Simple Paddock1-LightSoil Results
            variables -> /SoilNitrogen_CNPatch_VariabilityTests/SoilCNPatch-AddMerge/Test01-BareBare+addMerge/Sim01-Simple/Paddock1-LightSoil/Results/Variables
            events ReportingFrequency -> /SoilNitrogen_CNPatch_VariabilityTests/SoilCNPatch-AddMerge/Test01-BareBare+addMerge/Sim01-Simple/Paddock1-LightSoil/Results/ReportingFrequency
        area Paddock2-HeavySoil -> /SoilNitrogen_CNPatch_VariabilityTests/SoilCNPatch-AddMerge/Test01-BareBare+addMerge/Sim01-Simple/Paddock2-HeavySoil
          Soil Med-HeavySoil: LocalName=Generic medium-heavy sedimentary soil; Country=New Zealand; Latitude=0; Longitude=0; YearOfSampling=0
            DataSource=Hypothetical medium to heavy texture soil of sedimentary origin (moderately poorly drained)
            Analysis: same as SoilCNPatch-AddOnly.Test01-Bare+addUrea.Sim01-ExplicitPatches.Paddock2-base-HeavySoil.Med-HeavySoil.Analysis
            Water: same as SoilCNPatch-AddOnly.Test01-Bare+addUrea.Sim01-ExplicitPatches.Paddock2-base-HeavySoil.Med-HeavySoil.Water
            SoilWater: same as SoilCNPatch-AddOnly.Test01-Bare+addUrea.Sim01-ExplicitPatches.Paddock2-base-HeavySoil.Med-HeavySoil.SoilWater
            SoilOrganicMatter: same as SoilCNPatch-AddOnly.Test02-Bare+TypicSoil+addUrea.Sim02-ExplicitPatches.Paddock2-base-HeavySoil.Med-HeavySoil.SoilOrganicMatter
            Sample Initial nitrogen -> /SoilNitrogen_CNPatch_VariabilityTests/SoilCNPatch-AddMerge/Test05-Bare+TypicSoil-autoMerge/Sim05-Simple/Paddock1-LightSoil/Med-LightSoil/Initial nitrogen
            InitialWater: FractionFull=1; PercentMethod=EvenlyDistributed; RelativeTo=ll15
          outputfile Results -> /SoilNitrogen_CNPatch_VariabilityTests/SoilCNPatch-AddMerge/Test01-BareBare+addMerge/Sim01-Simple/Paddock2-HeavySoil/Results: filename=Sim05-Simple Paddock2-HeavySoil Results.out; title=Sim05-Simple Paddock2-HeavySoil Results
            variables -> /SoilNitrogen_CNPatch_VariabilityTests/SoilCNPatch-AddMerge/Test01-BareBare+addMerge/Sim01-Simple/Paddock2-HeavySoil/Results/Variables
            events ReportingFrequency -> /SoilNitrogen_CNPatch_VariabilityTests/SoilCNPatch-AddMerge/Test01-BareBare+addMerge/Sim01-Simple/Paddock2-HeavySoil/Results/ReportingFrequency
      simulation Sim05-Patches -> /SoilNitrogen_CNPatch_VariabilityTests/SoilCNPatch-AddMerge/Test05-Bare+TypicSoil-autoMerge/Sim05-Simple
        area Paddock1-LightSoil -> /SoilNitrogen_CNPatch_VariabilityTests/SoilCNPatch-AddMerge/Test05-Bare+TypicSoil-autoMerge/Sim05-Simple/Paddock1-LightSoil
          folder ManagerFolder -> /SoilNitrogen_CNPatch_VariabilityTests/SoilCNPatch-AddMerge/Test01-BareBare+addMerge/Sim01-Patches/Paddock1-LightSoil/ManagerFolder
            manager2 SetPatchParameter
              # Set SoilCNPatch parameters
              Set_partitionApproach = BasedOnConcentrationAndDelta  # Choose the approach for partitioning delta N between patches
              Set_AllowAmalg = Yes  # Allow auto amalgamation of patches?
              Set_AutoAmalg = CompareAll  # Choose the approach to use on auto amalgamation of patches
```csharp
using System;
using ModelFramework;

public class Script 
{

   [Param] string Set_partitionApproach;
   [Param] string Set_AllowAmalg;
   [Param] string Set_AutoAmalg;
   
   [Link] SoilN mySoilN;


   [EventHandler] public void OnInitialised()
   {
      mySoilN.Set("NPartitionApproach", Set_partitionApproach);

      mySoilN.Set("allowPatchAmalgamation", Set_AllowAmalg);            
      mySoilN.Set("AutoAmalgamationApproach", Set_AutoAmalg);            

      Console.WriteLine();
      Console.WriteLine("     Setting NPartitionApproach to: " + Set_partitionApproach);
   }

}
```
            manager2 AddSoilCNPatch
              # Basic info to add a urine patch to SolNitrogen
              AddPatch_DateToAdd = 01-Feb-2000  # Day of month to add urine patch
              AddPatch_NumAdditions = 15  # Number of times to add new patches
              AddPatch_Interval = 1  # Interval between addition of new patches (days)
              # Info about the type of deposition
              AddPatch_DepositionType = ToNewPatch  # Choose the DepositionType
              AddPatch_PatchToAdd = base  # If DepositionType is 'ToSpecificPatch' or 'ToNewPatch', choose which patch will be used
              AddPatch_NewArea = 0.025  # Relative area of new patch (0-1)
              # Info about solute to add
              AddPatch_SoluteType = Urea  # Choose the solute to be added
              AddPatch_SoluteAmount = 400  # Amount of N to be added (kgN/ha_patch)
              script: same as in SoilCNPatch-AddMerge.Test01-BareBare+addMerge.Sim01-Patches.Paddock1-LightSoil.ManagerFolder.AddSoilCNPatch1
            manager2 MergeSoilCNPatch
              # Basic info for merging two SoilCNPatches of SoilNitrogen
              MergePatch_DateToAdd = 15-Dec-2000  # Date to merge patches
              MergePatch_Select = MergeAll  # Choose whether user define the pair to merge or all patches will be merged
              MergePatch_Receiver = base  # Receiving patch name
              MergePatch_Merged = last  # Patch being merged ( if 'last' is given, then last patch is merged to receiving)
              MergePatch_Interval = 5  # If 'last' was given, mergings can be recurrent, type the interval between attempts
              MergePatch_Times = 10  # If 'last' was given, type the maximum number of mergings
              script: same as in SoilCNPatch-AddMerge.Test01-BareBare+addMerge.Sim01-Patches.Paddock1-LightSoil.ManagerFolder.MergeSoilCNPatch1
          outputfile Results -> /SoilNitrogen_CNPatch_VariabilityTests/SoilCNPatch-AddMerge/Test05-Bare+TypicSoil-autoMerge/Sim05-Simple/Paddock1-LightSoil/Results: filename=Sim05-Patches Paddock1-LightSoil Results.out; title=Sim05-Patches Paddock1-LightSoil Results
            variables -> /SoilNitrogen_CNPatch_VariabilityTests/SoilCNPatch-AddMerge/Test05-Bare+TypicSoil-autoMerge/Sim05-Simple/Paddock1-LightSoil/Results/Variables
            events ReportingFrequency -> /SoilNitrogen_CNPatch_VariabilityTests/SoilCNPatch-AddMerge/Test05-Bare+TypicSoil-autoMerge/Sim05-Simple/Paddock1-LightSoil/Results/ReportingFrequency
        area Paddock2-HeavySoil -> /SoilNitrogen_CNPatch_VariabilityTests/SoilCNPatch-AddMerge/Test05-Bare+TypicSoil-autoMerge/Sim05-Simple/Paddock2-HeavySoil
          outputfile Results -> /SoilNitrogen_CNPatch_VariabilityTests/SoilCNPatch-AddMerge/Test05-Bare+TypicSoil-autoMerge/Sim05-Simple/Paddock2-HeavySoil/Results: filename=Sim05-Patches Paddock2-HeavySoil Results.out; title=Sim05-Patches Paddock2-HeavySoil Results
            variables -> /SoilNitrogen_CNPatch_VariabilityTests/SoilCNPatch-AddMerge/Test05-Bare+TypicSoil-autoMerge/Sim05-Simple/Paddock2-HeavySoil/Results/Variables
            events ReportingFrequency -> /SoilNitrogen_CNPatch_VariabilityTests/SoilCNPatch-AddMerge/Test05-Bare+TypicSoil-autoMerge/Sim05-Simple/Paddock2-HeavySoil/Results/ReportingFrequency
    folder Test06-Pasture+TypicSoil-autoMerge -> /SoilNitrogen_CNPatch_VariabilityTests/SoilCNPatch-AddMerge/Test01-BareBare+addMerge
      memo Info: same as SoilCNPatch-AddMerge.Test05-Bare+TypicSoil-autoMerge.Info
      simulation Sim06-Simple -> /SoilNitrogen_CNPatch_VariabilityTests/SoilCNPatch-AddMerge/Test01-BareBare+addMerge/Sim01-Simple
        area Paddock1-LightSoil -> /SoilNitrogen_CNPatch_VariabilityTests/SoilCNPatch-AddMerge/Test01-BareBare+addMerge/Sim01-Simple/Paddock1-LightSoil
          folder ManagerFolder -> /SoilNitrogen_CNPatch_VariabilityTests/SoilCNPatch-AddMerge/Test01-BareBare+addMerge/Sim01-Simple/Paddock1-LightSoil/ManagerFolder
            operations AddUrea
              15-Feb  Fertiliser apply amount=150 (kg/ha), depth=1 (mm), type=urea_n
            manager CutAgPasture: same as SoilCNPatch-AddOnly.Test05-Pasture+TypicSoil+addUrea.Sim05-ExplicitPatches.Paddock1-base-LightSoil.ManagerFolder.CutAgPasture
            operations AddFert
              15-Jan  Fertiliser apply amount=50 (kg/ha), depth=100 (mm), type=urea_n
              15-Apr  Fertiliser apply amount=50 (kg/ha), depth=100 (mm), type=urea_n
              15-Sep  Fertiliser apply amount=50 (kg/ha), depth=100 (mm), type=urea_n
          micromet
            soilalbedo = 0.23
            a_interception = 0
            b_interception = 0
            c_interception = 0
            d_interception = 0
          surfaceom SurfaceOrganicMatter
            PoolName = Residue1  # Organic Matter pool name
            type = grass  # Organic Matter type
            mass = 1000  # Initial surface residue (kg/ha)
            cnr = 20  # C:N ratio of initial residue
            standing_fraction = 0  # Fraction of residue standing
          Soil Med-LightSoil: same as SoilCNPatch-AddMerge.Test05-Bare+TypicSoil-autoMerge.Sim05-Simple.Paddock1-LightSoil.Med-LightSoil
          AgPasture: same as SoilCNPatch-AddOnly.Test05-Pasture+TypicSoil+addUrea.Sim05-ExplicitPatches.Paddock1-base-LightSoil.AgPasture
          outputfile Results -> /SoilNitrogen_CNPatch_VariabilityTests/SoilCNPatch-AddMerge/Test01-BareBare+addMerge/Sim01-Simple/Paddock1-LightSoil/Results: filename=Sim06-Simple Paddock1-LightSoil Results.out; title=Sim06-Simple Paddock1-LightSoil Results
            variables -> /SoilNitrogen_CNPatch_VariabilityTests/SoilCNPatch-AddMerge/Test01-BareBare+addMerge/Sim01-Simple/Paddock1-LightSoil/Results/Variables
            events ReportingFrequency -> /SoilNitrogen_CNPatch_VariabilityTests/SoilCNPatch-AddMerge/Test01-BareBare+addMerge/Sim01-Simple/Paddock1-LightSoil/Results/ReportingFrequency
        area Paddock2-HeavySoil -> /SoilNitrogen_CNPatch_VariabilityTests/SoilCNPatch-AddMerge/Test01-BareBare+addMerge/Sim01-Simple/Paddock2-HeavySoil
          Soil Med-HeavySoil: same as SoilCNPatch-AddMerge.Test05-Bare+TypicSoil-autoMerge.Sim05-Simple.Paddock2-HeavySoil.Med-HeavySoil
          outputfile Results -> /SoilNitrogen_CNPatch_VariabilityTests/SoilCNPatch-AddMerge/Test01-BareBare+addMerge/Sim01-Simple/Paddock2-HeavySoil/Results: filename=Sim06-Simple Paddock2-HeavySoil Results.out; title=Sim06-Simple Paddock2-HeavySoil Results
            variables -> /SoilNitrogen_CNPatch_VariabilityTests/SoilCNPatch-AddMerge/Test01-BareBare+addMerge/Sim01-Simple/Paddock2-HeavySoil/Results/Variables
            events ReportingFrequency -> /SoilNitrogen_CNPatch_VariabilityTests/SoilCNPatch-AddMerge/Test01-BareBare+addMerge/Sim01-Simple/Paddock2-HeavySoil/Results/ReportingFrequency
      simulation Sim06-Patches -> /SoilNitrogen_CNPatch_VariabilityTests/SoilCNPatch-AddMerge/Test06-Pasture+TypicSoil-autoMerge/Sim06-Simple
        area Paddock1-LightSoil -> /SoilNitrogen_CNPatch_VariabilityTests/SoilCNPatch-AddMerge/Test06-Pasture+TypicSoil-autoMerge/Sim06-Simple/Paddock1-LightSoil
          folder ManagerFolder -> /SoilNitrogen_CNPatch_VariabilityTests/SoilCNPatch-AddMerge/Test06-Pasture+TypicSoil-autoMerge/Sim06-Simple/Paddock1-LightSoil/ManagerFolder
            manager2 SetPatchParameter: same as SoilCNPatch-AddMerge.Test05-Bare+TypicSoil-autoMerge.Sim05-Patches.Paddock1-LightSoil.ManagerFolder.SetPatchParameter
            manager2 AddSoilCNPatch: same as SoilCNPatch-AddMerge.Test05-Bare+TypicSoil-autoMerge.Sim05-Patches.Paddock1-LightSoil.ManagerFolder.AddSoilCNPatch
            manager2 MergeSoilCNPatch: same as SoilCNPatch-AddMerge.Test05-Bare+TypicSoil-autoMerge.Sim05-Patches.Paddock1-LightSoil.ManagerFolder.MergeSoilCNPatch
          outputfile Results -> /SoilNitrogen_CNPatch_VariabilityTests/SoilCNPatch-AddMerge/Test06-Pasture+TypicSoil-autoMerge/Sim06-Simple/Paddock1-LightSoil/Results: filename=Sim06-Patches Paddock1-LightSoil Results.out; title=Sim06-Patches Paddock1-LightSoil Results
            variables -> /SoilNitrogen_CNPatch_VariabilityTests/SoilCNPatch-AddMerge/Test06-Pasture+TypicSoil-autoMerge/Sim06-Simple/Paddock1-LightSoil/Results/Variables
            events ReportingFrequency -> /SoilNitrogen_CNPatch_VariabilityTests/SoilCNPatch-AddMerge/Test06-Pasture+TypicSoil-autoMerge/Sim06-Simple/Paddock1-LightSoil/Results/ReportingFrequency
        area Paddock2-HeavySoil -> /SoilNitrogen_CNPatch_VariabilityTests/SoilCNPatch-AddMerge/Test06-Pasture+TypicSoil-autoMerge/Sim06-Simple/Paddock2-HeavySoil
          outputfile Results -> /SoilNitrogen_CNPatch_VariabilityTests/SoilCNPatch-AddMerge/Test06-Pasture+TypicSoil-autoMerge/Sim06-Simple/Paddock2-HeavySoil/Results: filename=Sim06-Patches Paddock2-HeavySoil Results.out; title=Sim06-Patches Paddock2-HeavySoil Results
            variables -> /SoilNitrogen_CNPatch_VariabilityTests/SoilCNPatch-AddMerge/Test06-Pasture+TypicSoil-autoMerge/Sim06-Simple/Paddock2-HeavySoil/Results/Variables
            events ReportingFrequency -> /SoilNitrogen_CNPatch_VariabilityTests/SoilCNPatch-AddMerge/Test06-Pasture+TypicSoil-autoMerge/Sim06-Simple/Paddock2-HeavySoil/Results/ReportingFrequency
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