folder SoilNitrogen_CNPatch_OutputsTests: version=36; creator=Apsim 7.8-r3879
  memo Info
    ++++++++++++++++++++  TEST patch outputs  +++++++++++++++++++++++++++++++++++++++++++++++++

         These simulations are for testing the options to get some of the outputs from patches within SoilNitrogen.
         Some of the outputs from patches can only be gotten via manager script, and this is demonstrated here.
         The patches do vary, i.e., newly created patches are are different, due to addition of 'stuff' (C or N). So, the
      presence of patches should make considerable difference on the outputs of each simulation.
         The comparison is made between simulations with soil variability simulated explicilty (using multiple paddocks)
      against the simulations with patches added internally to SoilNitrogen only.  The results from these simulations
      should have noticiable but small differences with those from the simulations with explicity patches The time spent
      to complete the simulations will increase for those simulations with large number of patches.
  folder Test01-BareBare+addStuff
    memo Info
      ++++++++++++++++++++  TEST 01 +++++++++++++++++++++++++++++++++++++++++++++++++++++++++++

         Description:
            - Artificial climate, smooth mild temperate;
            - A free draining generic soil;
            - Bare soil;
            - No initial mineral N;
            - No initial soil organic matter;
            - No initial surface residues;
            - No additions of residues;
            - Urea added as a patch, 100kgN/ha into 25% of the area;
            - FOM added to CNpatch, 5000DMkgN/ha with C:N 20;

            > Simulations have two patches and N is added to one of them;

         Expected output:
            - All outputs with valid values (numeric mostly);
            - This test aims to demonstrate and check that variables for each CNpatch can be captured by manager,
                (note that only a selection of variables is tested in here)
    PlugIns
      PlugIn=[%apsim%\UserInterface\ApsimUIPlugIn.xml, %apsim%\UserInterface\SoilTypes.xml, %apsim%\UserInterface\Graph.xml, %apsim%\UserInterface\Ausfarm.xml, %apsim%\UserInterface\DevelopersPlugIn.xml, %apsim%\Model\SlurryTank.xml, %apsim%\Model\PHmodel.xml, %apsim%\Model\simpleBuilding.xml, %apsim%\Model\atmosphere.xml, %apsim%\Model\Accum.xml, %apsim%\Model\AgPasture.xml, %apsim%\Model\Bambatsi.xml, %apsim%\Model\Barley.xml, %apsim%\Model\Br.xml, %apsim%\Model\Bore.xml, %apsim%\Model\Broccoli.xml, %apsim%\Model\ButterflyPea.xml, %apsim%\Model\Canola.xml, %apsim%\Model\Canopy.xml, %apsim%\Model\Centro.xml, %apsim%\Model\Channel.xml, %apsim%\Model\Chickpea.xml, %apsim%\Model\Cl.xml, %apsim%\Model\Climatechange.xml, %apsim%\Model\Clock.xml, %apsim%\Model\Cotton2.xml, %apsim%\Model\Cowpea.xml, %apsim%\Model\CropUI.xml, %apsim%\Model\Dam.xml, %apsim%\Model\DCD.xml, %apsim%\Model\EGrandis.xml, %apsim%\Model\EMelliodora.xml, %apsim%\Model\Eo.xml, %apsim%\Model\EPopulnea.xml, %apsim%\Model\Erosion.xml, %apsim%\Model\Events.xml, %apsim%\Model\Fababean.xml, %apsim%\Model\Factorial.xml, %apsim%\Model\Factor.xml, %apsim%\Model\FactorComplex.xml, %apsim%\Model\FrenchBean.xml, %apsim%\Model\Fertiliser.xml, %apsim%\Model\Fieldpea.xml, %apsim%\Model\Gcm_data.xml, %apsim%\Model\Grasp.xml, %apsim%\Model\Graz.xml, %apsim%\Model\Growth.xml, %apsim%\Model\Horsegram.xml, %apsim%\Model\Ini.xml, %apsim%\Model\InitWater.xml, %apsim%\Model\Input.xml, %apsim%\Model\Irrigation.xml, %apsim%\Model\KWTest.xml, %apsim%\Model\Lablab.xml, %apsim%\Model\Lettuce.xml, %apsim%\Model\Log.xml, %apsim%\Model\Lucerne.xml, %apsim%\Model\Lupin.xml, %apsim%\Model\Maize.xml, %apsim%\Model\MaizeZ.xml, %apsim%\Model\Manager.xml, %apsim%\Model\Map.xml, %apsim%\Model\Memo.xml, %apsim%\Model\MetFile.xml, %apsim%\Model\MicroMet.xml, %apsim%\Model\Millet.xml, %apsim%\Model\Millet1.xml, %apsim%\Model\Millet2.xml, %apsim%\Model\Millet3.xml, %apsim%\Model\Millet4.xml, %apsim%\Model\Millet5.xml, %apsim%\Model\Mucuna.xml, %apsim%\Model\Mungbean.xml, %apsim%\Model\Navybean.xml, %apsim%\Model\Oats.xml, %apsim%\Model\Ocean_data.xml, %apsim%\Model\Operations.xml, %apsim%\Model\Orobanche.xml, %apsim%\Model\Oryza.xml, %apsim%\Model\Oryza2.xml, %apsim%\Model\OutputFile.xml, %apsim%\Model\Ozcot.xml, %apsim%\Model\Patchinput.xml, %apsim%\Model\Peanut.xml, %apsim%\Model\Pigeonpea.xml, %apsim%\Model\Pond.xml, %apsim%\Model\Potato.xml, %apsim%\Model\RotPlot.xml, %apsim%\Model\RugPlotUI.xml, %apsim%\Model\Root.xml, %apsim%\Model\Rule.xml, %apsim%\Model\Script.xml, %apsim%\Model\Seedling.xml, %apsim%\Model\SiloInput.xml, %apsim%\Model\Slurp.xml, %apsim%\Model\Soi.xml, %apsim%\Model\Soil.xml, %apsim%\Model\SoilNui.xml, %apsim%\Model\SoilTemp.xml, %apsim%\Model\Sorghum.xml, %apsim%\Model\SorghumConstants.xml, %apsim%\Model\SorghumGenotype.xml, %apsim%\Model\Soybean.xml, %apsim%\Model\Stylo.xml, %apsim%\Model\Sugar.xml, %apsim%\Model\Summaryfile.xml, %apsim%\Model\Sunflower.xml, %apsim%\Model\SurfaceOM.xml, %apsim%\Model\SweetCorn.xml, %apsim%\Model\SweetSorghum.xml, %apsim%\Model\SWIM2.xml, %apsim%\Model\SWIM2ui.xml, %apsim%\Model\SWIM2ui2.xml, %apsim%\Model\Sysbal.xml, %apsim%\Model\SysBal2.xml, %apsim%\Model\Tcllink.xml, %apsim%\Model\Tclmanager.xml, %apsim%\Model\Tclui.xml, %apsim%\Model\TextOutput.xml, %apsim%\Model\Tracker.xml, %apsim%\Model\Tree.xml, %apsim%\Model\Variables.xml, %apsim%\Model\Venlink.xml, %apsim%\Model\vine.xml, %apsim%\Model\WaterSupply.xml, %apsim%\Model\Weed.xml, %apsim%\Model\Wheat.xml, %apsim%\Model\YPCalc.xml, %apsim%\Model\UrinePatch.xml, %apsim%\Model\Soil with new nitrogen model.xml, %apsim%\Model\Soil with SoilNitrogenCleanedUp.xml]
    simulation Sim01-ExplicitPatches
      clock
        start_date = 01/01/2000
        end_date = 31/12/2000
      metfile met: filename=%apsim%\Examples\MetFiles\MildTemperate.met
      manager ClimateControl
        # Climate Control Window
        date1 = 1-jan  # Enter window START date (dd-mmm)
        date2 = 31-dec  # Enter window END date (dd-mmm)
        # Climate Change Parameters
        MaxtChange = 0  # Change in maximum temperature (oC)
        MintChange = 0  # Change in minimum temperature (oC)
        RainChange = 200  # Relative change in daily rainfall (%)
        RadnChange = 0  # Relative change in daily radiation (%)
        CO2 = 350  # Atmospheric CO2 Concentration (ppm)
        on prenewmet:
```
!  Adjust daily temperatures, rainfall and radiation up or down according to user-defined amounts
! To apply different levels of climate control to different times of year add multiple copies of this logic into your simulation and change the window.

if (date_within('[date1], [date2]') = 1) then
   maxt = maxt + [MaxtChange]
   mint = mint + [MintChange]
   rain = rain + rain * [RainChange] / 100
   radn = radn + radn * [RadnChange] / 100
   co2 = [CO2]
 endif
```
        on Init:
```
co2 = [CO2]
tav = tav + ([MaxtChange] + [MintChange]) / 2
```
      summaryfile
      area Paddock1-base-LightSoil
        folder ManagerFolder
          manager2 Aux-Outputs
            # This script help to organise some outputs
```csharp
using System;
using ModelFramework;

public class Script 
{      

   [Link] Paddock myPaddock;
   
   [Input(IsOptional=true)] double[] n_demanded;
   [Input(IsOptional=true)] double n_uptake;
   [Input(IsOptional=true)] double totaln;
   [Input(IsOptional=true)] double totalwt;
   [Input(IsOptional=true)] double ep;

   [Input] double[] dlayer;
   
   [Input(IsOptional=true)] double[] NitrogenSupplyLayers;
   [Input(IsOptional=true)] double NitrogenUptake;
   [Input(IsOptional=true)] double TotalPlantN;
   [Input(IsOptional=true)] double TotalPlantWt;
   [Input(IsOptional=true)] double WaterUptake;
      
   [Output][Units("")] string SoilName;
   [Output][Units("")] string ResultName;
   [Output][Units("kg/ha")] double PlantNUptake;
   [Output][Units("kg/ha")] double PlantTotalN;
   [Output][Units("kg/ha")] double PlantTotalC;
   [Output][Units("mm")] double PlantTranspiration;
   
   [EventHandler] public void OnInitialised()
   {
      Console.WriteLine();
      Console.WriteLine("     Organising/standardising some N outputs");

      ResultName = myPaddock.Name.Split('-')[1];
      foreach(Component myModule in myPaddock.Children)
      {
         if(myModule.Name.Contains(" Nitrogen"))
         {
            SoilName = myModule.Name.Split(' ')[0];
         }
      }
   }

   [EventHandler] public void OnPost()
   {
      if (n_demanded != null)
      {
         PlantNUptake = n_uptake;
         PlantTotalN = totaln;
         PlantTotalC = 0.4 * totalwt;
         PlantTranspiration = ep;
      }
      else if (NitrogenSupplyLayers != null)
      {
         PlantNUptake = NitrogenUptake;
         PlantTotalN = TotalPlantN;
         PlantTotalC = 0.4 * TotalPlantWt;
         PlantTranspiration = WaterUptake;
      }
      else
      {
         PlantTotalN = 0.0;
         PlantTranspiration = 0.0;
      }
   }
}
```
        fertiliser
        surfaceom SurfaceOrganicMatter
          PoolName = Residue1  # Organic Matter pool name
          type = grass  # Organic Matter type
          mass = 0  # Initial surface residue (kg/ha)
          cnr = 20  # C:N ratio of initial residue
          standing_fraction = 0  # Fraction of residue standing
        Soil Med-LightSoil: LocalName=Generic medium-light sedimentary soil; Country=New Zealand; Latitude=0; Longitude=0
          DataSource=Hypothetical medium to light texture soil of sedimentary origin (moderately high drainage)
          Analysis: PHUnits=Water; BoronUnits=HotWater
            Thickness  PH   CEC  ParticleSizeSand  ParticleSizeSilt  ParticleSizeClay
            150        6.5  15   30                60                10
            150        6.5  14   30                60                10
            300        6.5  10   30                60                10
            300        6.5  6    30                60                10
            300        6.5  5    30                60                10
            300        6.5  5    30                60                10
          Water
            Thickness  BD    AirDry  LL15  DUL    SAT   KS
            150        1.1   0.075   0.12  0.34   0.52  10000
            150        1.05  0.15    0.15  0.35   0.5   8500
            300        1.1   0.16    0.16  0.345  0.49  7500
            300        1.15  0.15    0.15  0.33   0.48  7500
            300        1.22  0.14    0.14  0.315  0.46  8000
            300        1.3   0.13    0.13  0.3    0.45  10000
            SoilCrop agpasture: LL=[0.12, 0.15, 0.16, 0.15, 0.14, 0.13]; KL=[0.2, 0.2, 0.1, 0.05, 0, 0]; XF=[1, 1, 1, 1, 0, 0]
            SoilCrop wheat: LL=[0.12, 0.15, 0.16, 0.15, 0.14, 0.13]; KL=[0.2, 0.2, 0.1, 0.05, 0, 0]; XF=[1, 1, 1, 1, 0, 0]
          SoilWater: SummerCona=3; SummerU=5; SummerDate=1-Nov; WinterCona=3; WinterU=5; WinterDate=1-Apr; DiffusConst=88; DiffusSlope=35; Salb=0.13; CN2Bare=50; CNRed=20; CNCov=0.8; Thickness=[150, 150, 300, 300, 300, 300]; SWCON=[0.5, 0.45, 0.4, 0.4, 0.4, 0.4]
          SoilOrganicMatter: RootCN=30; RootWt=0; SoilCN=12.5; EnrACoeff=7.4; EnrBCoeff=0.2; OCUnits=Total
            Thickness  OC  FBiom  FInert
            150        0   0.035  0.4
            150        0   0.025  0.55
            300        0   0.015  0.765
            300        0   0.01   0.9
            300        0   0.01   0.95
            300        0   0.01   0.994
          Sample Initial nitrogen: NO3Units=kgha; NH4Units=kgha; SWUnits=Volumetric; OCUnits=Total; PHUnits=Water
            Thickness  NO3  NH4
            150        0    0
            150        0    0
            300        0    0
            300        0    0
            300        0    0
            300        0    0
          InitialWater: FractionFull=1; PercentMethod=EvenlyDistributed; RelativeTo=ll15
        outputfile Results: filename=Sim01-ExplicitPatches Paddock1-base-LightSoil Results.out; title=Sim01-ExplicitPatches Paddock1-base-LightSoil Results
          variables
            variable:
              dd/mmm/yyyy as Date
              day as DoY
              urea() as UreaTotal format 5
              nh4() as NH4Total format 5
              no3() as NO3Total format 5
              surfaceom_n as SurfaceOM_N format 5
              fom_n() as FOM_N format 5
              biom_n() as Biom_N format 5
              hum_n() as Hum_N format 5
              PlantTotalN as PlantTotalN format 5
              fertiliser as FertiliserN format 5
              dlt_urea_hydrol() as HydrolisedN format 5
              nitrification() as NitrifiedN format 5
              dnit() as DenitrifiedN format 5
              leach_no3 as LeachedNO3 format 5
              dlt_n_min_res() as NetMineralisedResidue format 5
              dlt_n_min_tot() as NetMineralisedHumus format 5
              n2o_atm() as N2Oemissions format 5
              dlt_n_loss_in_sed as dltN_sediments format 5
              PlantNUptake format 5
              surfaceom_c as SurfaceOM_C format 5
              fom_c() as FOM_C format 5
              biom_c() as Biom_C format 5
              hum_c() as Hum_C format 5
              PlantTotalC format 5
              dlt_res_c_atm as CO2fromResidues format 5
              dlt_fom_c_atm() as CO2fromFOM format 5
              dlt_biom_c_atm() as CO2fromMBiomass format 5
              dlt_hum_c_atm() as CO2fromHumus format 5
              dlt_c_loss_in_sed as dltC_sediments format 5
              es as Evaporation format 5
              PlantTranspiration as PlantTranspiration format 5
              drain as Drain format 5
              Runoff format 5
              SoilName
              ResultName
              PatchCount as NumPatches
          events ReportingFrequency: event=end_day
      area Paddock1-patch-LightSoil -> /SoilNitrogen_CNPatch_OutputsTests/Test01-BareBare+addStuff/Sim01-ExplicitPatches/Paddock1-base-LightSoil
        folder ManagerFolder -> /SoilNitrogen_CNPatch_OutputsTests/Test01-BareBare+addStuff/Sim01-ExplicitPatches/Paddock1-base-LightSoil/ManagerFolder
          operations AddUrine
            10-Jan  Fertiliser apply amount=50 (kg/ha), depth=1 (mm), type=urea_n
            15-Mar  'Med-LightSoil nitrogen' incorpfom type = default, amount=5000 00 00 00 00 00, cnr=20 20 20 20 20 20
        outputfile Results -> /SoilNitrogen_CNPatch_OutputsTests/Test01-BareBare+addStuff/Sim01-ExplicitPatches/Paddock1-base-LightSoil/Results: filename=Sim01-ExplicitPatches Paddock1-patch-LightSoil Results.out; title=Sim01-ExplicitPatches Paddock1-patch-LightSoil Results
          variables -> /SoilNitrogen_CNPatch_OutputsTests/Test01-BareBare+addStuff/Sim01-ExplicitPatches/Paddock1-base-LightSoil/Results/Variables
          events ReportingFrequency -> /SoilNitrogen_CNPatch_OutputsTests/Test01-BareBare+addStuff/Sim01-ExplicitPatches/Paddock1-base-LightSoil/Results/ReportingFrequency
      manager2 Aux-SumOutputs
        # This script sums up variables from two paddocks
        Pdk01Name = Paddock1-base-LightSoil  # Name of first paddock
        Pdk01Area = 0.75  # Relative area of first paddock [0-1]
        Pdk02Name = Paddock1-patch-LightSoil  # Name of second paddock
        Pdk02Area = 0.25  # Relative area of second paddock [0-1]
```csharp
using System;
using ModelFramework;

public class Script 
{     

   [Param] private string Pdk01Name;
   [Param] private double Pdk01Area;
   [Param] private string Pdk02Name;
   [Param] private double Pdk02Area;
   
   [Link] Simulation myBlock;
   
   [Output][Units("mm")] public double[] dlayer_p1;
   [Output][Units("mm")] public double es_p1;
   [Output][Units("mm")] public double[] sw_uptake_p1;
   [Output][Units("mm")] public double drain_p1;
   [Output][Units("mm")] public double runoff_p1;
   [Output][Units("mm")] public double pond_p1;

   [Output][Units("kg/ha")] public double[] urea_p1;
   [Output][Units("kg/ha")] public double[] nh4_p1;
   [Output][Units("kg/ha")] public double[] no3_p1;
   [Output][Units("kg/ha")] public double[] fom_n_p1;
   [Output][Units("kg/ha")] public double[] biom_n_p1;
   [Output][Units("kg/ha")] public double[] hum_n_p1;
   [Output][Units("kg/ha")] public double surfaceom_n_p1;
   [Output][Units("kg/ha")] public double PlantN_p1;
   [Output][Units("kg/ha")] public double PlantNuptake_p1;
   [Output][Units("kg/ha")] public double Fertiliser_p1;

   [Output][Units("kg/ha")] public double[] fom_c_p1;
   [Output][Units("kg/ha")] public double[] biom_c_p1;
   [Output][Units("kg/ha")] public double[] hum_c_p1;
   [Output][Units("%")] public double[] oc_p1;
   [Output][Units("kg/ha")] public double surfaceom_c_p1;
   [Output][Units("kg/ha")] public double PlantC_p1;

   [Output][Units("kg/ha")] public double leach_no3_p1;
   [Output][Units("kg")] public double dlt_n_loss_in_sed_p1;
   [Output][Units("kg/ha")] public double[] dlt_urea_hydrol_p1;
   [Output][Units("kg/ha")] public double[] nitrification_p1;
   [Output][Units("kg/ha")] public double[] dnit_p1;
   [Output][Units("kg/ha")] public double[] dlt_n_min_res_p1;
   [Output][Units("kg/ha")] public double[] dlt_n_min_tot_p1;
   [Output][Units("kg/ha")] public double[] n2o_atm_p1;

   [Output][Units("kg/ha")] public double dlt_res_c_atm_p1;
   [Output][Units("kg/ha")] public double[] dlt_fom_c_atm_p1;
   [Output][Units("kg/ha")] public double[] dlt_biom_c_atm_p1;
   [Output][Units("kg/ha")] public double[] dlt_hum_c_atm_p1;
   [Output][Units("kg")] public double dlt_c_loss_in_sed_p1;
     
   [Output][Units("")] public string SoilName_p1;
   [Output][Units("")] string ResultName_p1;
   
   [Output] string SoilName2;

   private int nLayers;
   private SoilN[] mySoilN;
   private SoilWat[] mySoilW;
   private SurfaceOM[] mySurfOM;
   private Wheat[] myPlant;
   private AgPasture[] myPasture;
   private Fertiliser[] myFert;
   private double[] RelativeArea;
      
   [EventHandler] public void OnInitialised()
   {
      // basic input parameters
      nLayers = 6;
      ResultName_p1 = "Paddock";
      string[] PaddockNames = new string[2];
      PaddockNames[0] = Pdk01Name;
      PaddockNames[1] = Pdk02Name;
      RelativeArea = new double[2];
      RelativeArea[0] = Pdk01Area;
      RelativeArea[1] = Pdk02Area;

      // link to various modules
      mySoilN = new SoilN[2];
      mySoilW = new SoilWat[2];
      mySurfOM = new SurfaceOM[2];
      myPlant = new Wheat[2];
      myPasture = new AgPasture[2];
      myFert = new Fertiliser[2];

      Console.WriteLine("     Initialising");
      int pdk = -1;
      int PdkFound = 0;
      foreach(Paddock ThisPaddock in myBlock.ChildPaddocks)
      {
         if(ThisPaddock.Name == PaddockNames[0])
         {
            pdk = 0;
            PdkFound += 1;
            foreach(Component myModule in ThisPaddock.Children)
            {
               if(myModule.Name.Contains(" Nitrogen"))
               {
                  SoilName_p1 = myModule.Name.Split(' ')[0];
               }
            }
         }
         else if(ThisPaddock.Name == PaddockNames[1])
         {
            pdk = 1;
            PdkFound += 1;
         }

         if(pdk >= 0 && PdkFound <= 2)
         {
            mySoilN[pdk] = (SoilN) ThisPaddock.LinkByType("SoilN");
            mySoilW[pdk] = (SoilWat) ThisPaddock.LinkByType("SoilWat");
            mySurfOM[pdk] = (SurfaceOM) ThisPaddock.LinkByType("SurfaceOM");
            myPlant[pdk] = (Wheat) ThisPaddock.LinkByName("wheat");
            myPasture[pdk] = (AgPasture) ThisPaddock.LinkByType("agpasture");
            myFert[pdk] = (Fertiliser) ThisPaddock.LinkByType("Fertiliser");
            if(PdkFound == 2)
               PdkFound += 1;
         }
      }
      if (PdkFound < 2)
      {
         throw new Exception("Could not find the two paddocks to sum up");
      }
      else
      {  
         Console.WriteLine("        Summing up paddocks:");
         for(int i = 0;i<2;i++)
            Console.WriteLine("         ." + mySoilN[i].FullName.Split('.')[0] + ", with area: " + RelativeArea[i]);
         
         // initialise the outputs
         dlayer_p1 = new double[nLayers];
         es_p1 = 0.0;
         sw_uptake_p1 = new double[nLayers];
         drain_p1 = 0.0;
         runoff_p1 = 0.0;
         pond_p1 = 0.0;

         urea_p1 = new double[nLayers];
         nh4_p1 = new double[nLayers];
         no3_p1 = new double[nLayers];
         fom_n_p1 = new double[nLayers];
         biom_n_p1 = new double[nLayers];
         hum_n_p1 = new double[nLayers];
         surfaceom_n_p1 = 0.0;
         PlantN_p1 = 0.0;
         PlantNuptake_p1 = 0;
         Fertiliser_p1 = 0.0;

         fom_c_p1 = new double[nLayers];
         biom_c_p1 = new double[nLayers];
         hum_c_p1 = new double[nLayers];
         oc_p1 = new double[nLayers];
         surfaceom_c_p1 = 0.0;
         PlantC_p1 = 0.0;

         leach_no3_p1 = 0.0;
         dlt_n_loss_in_sed_p1 = 0.0;
         dlt_urea_hydrol_p1 = new double[nLayers];
         nitrification_p1 = new double[nLayers];
         dnit_p1 = new double[nLayers];
         dlt_n_min_res_p1 = new double[nLayers];
         dlt_n_min_tot_p1 = new double[nLayers];
         n2o_atm_p1 = new double[nLayers];

         dlt_res_c_atm_p1 = 0.0;
         dlt_fom_c_atm_p1 = new double[nLayers];
         dlt_biom_c_atm_p1 = new double[nLayers];
         dlt_hum_c_atm_p1 = new double[nLayers];
         dlt_c_loss_in_sed_p1 = 0.0;
      }
   }
   
   [EventHandler] public void OnPost()
   {
      // clear outputs
      es_p1 = 0.0;
      drain_p1 = 0.0;
      runoff_p1 = 0.0;
      pond_p1 = 0.0;

      surfaceom_n_p1 = 0.0;
      PlantN_p1 = 0.0;
      PlantNuptake_p1 = 0;
      Fertiliser_p1 = 0.0;
      leach_no3_p1 = 0.0;
      dlt_n_loss_in_sed_p1 = 0.0;

      surfaceom_c_p1 = 0.0;
      dlt_res_c_atm_p1 = 0.0;
      PlantC_p1 = 0.0;
      dlt_c_loss_in_sed_p1 = 0.0;

      Array.Clear(dlayer_p1, 0, nLayers);
      Array.Clear(sw_uptake_p1, 0, nLayers);

      Array.Clear(urea_p1, 0, nLayers);
      Array.Clear(nh4_p1, 0, nLayers);
      Array.Clear(no3_p1, 0, nLayers);
      Array.Clear(fom_n_p1, 0, nLayers);
      Array.Clear(biom_n_p1, 0, nLayers);
      Array.Clear(hum_n_p1, 0, nLayers);

      Array.Clear(fom_c_p1, 0, nLayers);
      Array.Clear(biom_c_p1, 0, nLayers);
      Array.Clear(hum_c_p1, 0, nLayers);
      Array.Clear(oc_p1, 0, nLayers);

      Array.Clear(dlt_urea_hydrol_p1, 0, nLayers);
      Array.Clear(nitrification_p1, 0, nLayers);
      Array.Clear(dnit_p1, 0, nLayers);
      Array.Clear(dlt_n_min_res_p1, 0, nLayers);
      Array.Clear(dlt_n_min_tot_p1, 0, nLayers);
      Array.Clear(n2o_atm_p1, 0, nLayers);

      Array.Clear(dlt_fom_c_atm_p1, 0, nLayers);
      Array.Clear(dlt_biom_c_atm_p1, 0, nLayers);
      Array.Clear(dlt_hum_c_atm_p1, 0, nLayers);
      
      // Sum up the outputs
      for (int pdk = 0;pdk < mySoilN.Length;pdk++)
      {
         es_p1 += mySoilW[pdk].es * RelativeArea[pdk];
         drain_p1 += mySoilW[pdk].drain * RelativeArea[pdk];
         runoff_p1 = mySoilW[pdk].runoff * RelativeArea[pdk];
         pond_p1 = mySoilW[pdk].pond * RelativeArea[pdk];
         leach_no3_p1 += mySoilW[pdk].Variable("leach_no3").ToDouble() * RelativeArea[pdk];
         surfaceom_n_p1 += mySurfOM[pdk].surfaceom_n * RelativeArea[pdk];
         Fertiliser_p1 += myFert[pdk].fertiliser * RelativeArea[pdk];
         dlt_n_loss_in_sed_p1 += mySoilN[pdk].dlt_n_loss_in_sed * RelativeArea[pdk];
         surfaceom_c_p1 += mySurfOM[pdk].surfaceom_c * RelativeArea[pdk];
         dlt_res_c_atm_p1 += mySoilN[pdk].dlt_res_c_atm * RelativeArea[pdk];
         dlt_c_loss_in_sed_p1 += mySoilN[pdk].dlt_c_loss_in_sed * RelativeArea[pdk];
         
         try
         {
            PlantNuptake_p1 += myPlant[pdk].n_uptake * RelativeArea[pdk];
            PlantN_p1 += myPlant[pdk].TotalN * RelativeArea[pdk];
            PlantC_p1 += 0.4 * myPlant[pdk].TotalWt * RelativeArea[pdk];
         }
         catch(System.Exception err)
         {
            try
            {
               PlantNuptake_p1 += myPasture[pdk].NitrogenUptake * RelativeArea[pdk];
               PlantN_p1 += myPasture[pdk].TotalPlantN * RelativeArea[pdk];
               PlantC_p1 += 0.4 * myPasture[pdk].TotalPlantWt * RelativeArea[pdk];
            }
            catch(System.Exception err2)
            {}
         }
                     
         for (int layer = 0; layer < nLayers;layer++)
         {
            dlayer_p1[layer] += mySoilW[pdk].dlayer[layer] * RelativeArea[pdk];
            try
               {sw_uptake_p1[layer] += myPlant[pdk].sw_uptake[layer] * RelativeArea[pdk];}
            catch(System.Exception err)
            {
               try
                  {sw_uptake_p1[layer] += myPasture[pdk].WaterUptakeLayers[layer] * RelativeArea[pdk];}
               catch(System.Exception err1)
               {}
            }

            urea_p1[layer] += mySoilN[pdk].urea[layer] * RelativeArea[pdk];
            nh4_p1[layer] += mySoilN[pdk].nh4[layer] * RelativeArea[pdk];
            no3_p1[layer] += mySoilN[pdk].no3[layer] * RelativeArea[pdk];
            fom_n_p1[layer] += mySoilN[pdk].fom_n[layer] * RelativeArea[pdk];
            biom_n_p1[layer] += mySoilN[pdk].biom_n[layer] * RelativeArea[pdk];
            hum_n_p1[layer] += mySoilN[pdk].hum_n[layer] * RelativeArea[pdk];

            fom_c_p1[layer] += mySoilN[pdk].fom_c[layer] * RelativeArea[pdk];
            biom_c_p1[layer] += mySoilN[pdk].biom_c[layer] * RelativeArea[pdk];
            hum_c_p1[layer] += mySoilN[pdk].hum_c[layer] * RelativeArea[pdk];
            oc_p1[layer] += mySoilN[pdk].oc[layer] * RelativeArea[pdk];

            dlt_urea_hydrol_p1[layer] += mySoilN[pdk].dlt_urea_hydrol[layer] * RelativeArea[pdk];
            nitrification_p1[layer] += mySoilN[pdk].nitrification[layer] * RelativeArea[pdk];
            dnit_p1[layer] += mySoilN[pdk].dnit[layer] * RelativeArea[pdk];
            dlt_n_min_res_p1[layer] += mySoilN[pdk].dlt_n_min_res[layer] * RelativeArea[pdk];
            dlt_n_min_tot_p1[layer] += mySoilN[pdk].dlt_n_min_tot[layer] * RelativeArea[pdk];
            n2o_atm_p1[layer] += mySoilN[pdk].n2o_atm[layer] * RelativeArea[pdk];
            
            dlt_fom_c_atm_p1[layer] += mySoilN[pdk].dlt_fom_c_atm[layer] * RelativeArea[pdk];
            dlt_biom_c_atm_p1[layer] += mySoilN[pdk].dlt_biom_c_atm[layer] * RelativeArea[pdk];
            dlt_hum_c_atm_p1[layer] += mySoilN[pdk].dlt_hum_c_atm[layer] * RelativeArea[pdk];
         }
      }
   }
}
```
      outputfile Paddock1-All-LightSoil Results -> /SoilNitrogen_CNPatch_OutputsTests/Test01-BareBare+addStuff/Sim01-ExplicitPatches/Paddock1-base-LightSoil/Results: filename=Sim01-ExplicitPatches Paddock1-All-LightSoil Results.out; title=Sim01-ExplicitPatches Paddock1-All-LightSoil Results
        variables
          variable:
            dd/mmm/yyyy as Date
            day as DoY
            urea_p1() as UreaTotal format 5
            nh4_p1() as NH4Total format 5
            no3_p1() as NO3Total format 5
            surfaceom_n_p1 as SurfaceOM_N format 5
            fom_n_p1() as FOM_N format 5
            biom_n_p1() as Biom_N format 5
            hum_n_p1() as Hum_N format 5
            PlantN_p1 as PlantTotalN format 5
            Fertiliser_p1 as FertiliserN format 5
            dlt_urea_hydrol_p1() as HydrolisedN format 5
            nitrification_p1() as NitrifiedN format 5
            dnit_p1() as DenitrifiedN format 5
            leach_no3_p1 as LeachedNO3 format 5
            dlt_n_min_res_p1() as NetMineralisedResidue format 5
            dlt_n_min_tot_p1() as NetMineralisedHumus format 5
            n2o_atm_p1() as N2Oemissions format 5
            dlt_n_loss_in_sed_p1 as dltN_sediments format 5
            PlantNuptake_p1 as PlantNUptake format 5
            surfaceom_c_p1 as SurfaceOM_C format 5
            fom_c_p1() as FOM_C format 5
            biom_c_p1() as Biom_C format 5
            hum_c_p1() as Hum_C format 5
            PlantC_p1 as PlantTotalC format 5
            dlt_res_c_atm_p1 as CO2fromResidues format 5
            dlt_fom_c_atm_p1() as CO2fromFOM format 5
            dlt_biom_c_atm_p1() as CO2fromMBiomass format 5
            dlt_hum_c_atm_p1() as CO2fromHumus format 5
            dlt_c_loss_in_sed_p1 as dltC_sediments format 5
            es_p1 as Evaporation format 5
            sw_uptake_p1() as PlantTranspiration format 5
            drain_p1 as Drain format 5
            runoff_p1 as Runoff format 5
            SoilName_p1 as SoilName
            ResultName_p1 as ResultName
            NumPatches
        events ReportingFrequency -> /SoilNitrogen_CNPatch_OutputsTests/Test01-BareBare+addStuff/Sim01-ExplicitPatches/Paddock1-base-LightSoil/Results/ReportingFrequency
    simulation Sim01-SoilCNPatches -> /SoilNitrogen_CNPatch_OutputsTests/Test01-BareBare+addStuff/Sim01-ExplicitPatches
      area Paddock1-CNpatch-LightSoil -> /SoilNitrogen_CNPatch_OutputsTests/Test01-BareBare+addStuff/Sim01-ExplicitPatches/Paddock1-base-LightSoil
        folder ManagerFolder -> /SoilNitrogen_CNPatch_OutputsTests/Test01-BareBare+addStuff/Sim01-ExplicitPatches/Paddock1-base-LightSoil/ManagerFolder
          manager2 AddSoilCNPatch
            # Basic info to add a urine patch to SolNitrogen
            AddPatch_DateToAdd = 10-Jan-2000  # Day of month to add urine patch
            AddPatch_NumAdditions = 1  # Number of times to add new patches
            AddPatch_Interval = 5  # Interval between addition of new patches (days)
            # Info about the type of deposition
            AddPatch_DepositionType = ToNewPatch  # Choose the DepositionType
            AddPatch_PatchToAdd = base  # If DepositionType is 'ToSpecificPatch' or 'ToNewPatch', choose which patch will be used
            AddPatch_NewArea = 0.25  # Relative area of new patch (0-1)
            # Info about solute to add
            AddPatch_SoluteType = Urea  # Choose the solute to be added
            AddPatch_SoluteAmount = 50  # Amount of N to be added (kgN/ha)
```csharp
using System;
using ModelFramework;

public class Script 
{      

   [Param] DateTime AddPatch_DateToAdd;
   [Param] int AddPatch_NumAdditions;
   [Param] int AddPatch_Interval;
   [Param] string AddPatch_DepositionType;
   [Param] string AddPatch_PatchToAdd;
   [Param] double AddPatch_NewArea;
   [Param] string AddPatch_SoluteType;
   [Param] double AddPatch_SoluteAmount;   
   
   [Link] private Paddock myPaddock;
   [Link] private Clock myClock;
   
   [Event] public event AddSoilCNPatchDelegate AddSoilCNPatch;
   
   [Input(IsOptional = true)] int numPatches;
      
   [Output] string SoilName1;

   private double[] SoluteToAdd;
   private int[] PatchToAddTo;
   private int nPatchesAdded;
   
   private int nPatches;
   private int DaysAfterAdding;
   
   [EventHandler] public void OnInitialised()
   {
      SoluteToAdd = new double[1];
      SoluteToAdd[0] = AddPatch_SoluteAmount;
      PatchToAddTo = new int[1];
      nPatchesAdded = 0;
      DaysAfterAdding = AddPatch_Interval;
      
      Console.WriteLine();
      Console.WriteLine("     Addition of CNPatches initialised");
      
   }

   [EventHandler] public void OnPrepare()
   {
      if(myClock.Today >= AddPatch_DateToAdd.Date)
      {
         if ((DaysAfterAdding == AddPatch_Interval) && (nPatchesAdded < AddPatch_NumAdditions))
         {
            AddSoilCNPatchType NewPatch = new AddSoilCNPatchType();
            NewPatch.Sender = "manager";
            NewPatch.DepositionType = AddPatch_DepositionType;
            NewPatch.AreaFraction = AddPatch_NewArea;
            if (AddPatch_PatchToAdd == "base")
               PatchToAddTo[0] = 0;
            else
               PatchToAddTo[0] = 0; //numPatches - 1;
            NewPatch.AffectedPatches_id = PatchToAddTo;
            if (AddPatch_SoluteType == "Urea")
               NewPatch.Urea = SoluteToAdd;
            if (AddPatch_SoluteType == "NH4")
               NewPatch.NH4 = SoluteToAdd;
            if (AddPatch_SoluteType == "NO3")
               NewPatch.NO3 = SoluteToAdd;
      
            AddSoilCNPatch.Invoke(NewPatch);
            nPatchesAdded += 1;
            DaysAfterAdding = 1;
         }
         else
            DaysAfterAdding += 1;
      }
   }
      
   [EventHandler] public void OnPost()
   {

   }
}
```
          manager2 AddSoilCNPatchFOM
            # Basic info to add a urine patch to SoilNtrogen
            AddPatch_DateToAdd = 15-Mar-2000  # Day of month to add urine patch
            AddPatch_NumAdditions = 1  # Number of times to add new patches
            AddPatch_Interval = 5  # Interval between addition of new patches (days)
            # Info about the type of deposition
            AddPatch_DepositionType = ToSpecificPatch  # Choose the DepositionType
            AddPatch_PatchToAdd = last  # If DepositionType is 'ToSpecificPatch' or 'ToNewPatch', choose which patch will be used
            AddPatch_NewArea = 0.25  # Relative area of new patch (0-1)
            # Info about solute to add
            AddPatch_SoluteType = None  # Choose the solute to be added
            AddPatch_SoluteAmount = 100  # Amount of N to be added (kgN/ha)
            # Info about organic matter to add
            AddPatch_FOMtype = Dung  # Choose the type of fresh organic matter to add
            AddPatch_FOMamount = 5000  # Amount of fresh organic matter to add (kgDM/ha)
            AddPatch_FOMcnr = 20  # C:N ratio of fresh organic matter being added
```csharp
using System;
using ModelFramework;

public class Script 
{      

   [Param] DateTime AddPatch_DateToAdd;
   [Param] int AddPatch_NumAdditions;
   [Param] int AddPatch_Interval;
   [Param] string AddPatch_DepositionType;
   [Param] string AddPatch_PatchToAdd;
   [Param] double AddPatch_NewArea;
   [Param] string AddPatch_SoluteType;
   [Param] double AddPatch_SoluteAmount;
   [Param] string AddPatch_FOMtype;
   [Param] double AddPatch_FOMamount;
   [Param] double AddPatch_FOMcnr;
      
   [Link] private Paddock myPaddock;
   [Link] private Clock myClock;
   
   [Event] public event AddSoilCNPatchDelegate AddSoilCNPatch;
   [Event] public event AddSoilCNPatchwithFOMDelegate AddSoilCNPatchwithFOM;
   
   [Input] int PatchCount;
      
   [Output] string SoilName1;

   private double[] SoluteToAdd;
   private double[][] FOMCToAdd = new double[3][];
   private double[][] FOMNToAdd = new double[3][];

   private int[] PatchToAddTo;
   private int nPatches;
   private int nPatchesAdded;
   private int DaysAfterAdding;
   
   private string myFOMtype;
   private double[] FOMfraction = new double[3];
   
   [EventHandler] public void OnInitialised()
   {
      SoluteToAdd = new double[1];
      SoluteToAdd[0] = AddPatch_SoluteAmount;
      PatchToAddTo = new int[1];
      nPatchesAdded = 0;
      DaysAfterAdding = AddPatch_Interval;
      
      
      if (AddPatch_FOMtype == "Grass")
      {
         myFOMtype = "grass";
         FOMfraction[0] = 0.2;
         FOMfraction[1] = 0.7;
         FOMfraction[2] = 0.1;
      }
      else if (AddPatch_FOMtype == "Dung")
      {
         myFOMtype = "RuminantDung_PastureFed";
         FOMfraction[0] = 0.3;
         FOMfraction[1] = 0.5;
         FOMfraction[2] = 0.2;
      }
      else if (AddPatch_FOMtype == "Manure")
      {
         myFOMtype = "manure";
         FOMfraction[0] = 0.3;
         FOMfraction[1] = 0.3;
         FOMfraction[2] = 0.4;
      }
      else
      {
         myFOMtype = "none";
      }
      
      for (int pool = 0; pool < 3; pool++)
      {
         FOMCToAdd[pool] = new double[1];
         FOMNToAdd[pool] = new double[1];
         FOMCToAdd[pool][0] = AddPatch_FOMamount * 0.40 * FOMfraction[pool];
         FOMNToAdd[pool][0] = FOMCToAdd[pool][0] / AddPatch_FOMcnr;
      }
      
      
      Console.WriteLine();
      Console.WriteLine("     Addition of CNPatches initialised");
      
   }

   [EventHandler] public void OnPrepare()
   {
      if(myClock.Today >= AddPatch_DateToAdd.Date)
      {
         if ((DaysAfterAdding == AddPatch_Interval) && (nPatchesAdded < AddPatch_NumAdditions))
         {
            if (myFOMtype == "none")
            {
               AddSoilCNPatchType NewPatch = new AddSoilCNPatchType();
               NewPatch.Sender = "manager";
               NewPatch.DepositionType = AddPatch_DepositionType;
               NewPatch.AreaFraction = AddPatch_NewArea;
               if (AddPatch_PatchToAdd == "base")
                  PatchToAddTo[0] = 0;
               else if (AddPatch_PatchToAdd == "last")
                  PatchToAddTo[0] = PatchCount - 1;
               NewPatch.AffectedPatches_id = PatchToAddTo;
               if (AddPatch_SoluteType == "Urea")
                  NewPatch.Urea = SoluteToAdd;
               if (AddPatch_SoluteType == "NH4")
                  NewPatch.NH4 = SoluteToAdd;
               if (AddPatch_SoluteType == "NO3")
                  NewPatch.NO3 = SoluteToAdd;
      
               AddSoilCNPatch.Invoke(NewPatch);
            }
            else
            {
               AddSoilCNPatchwithFOMType NewPatch = new AddSoilCNPatchwithFOMType();
               NewPatch.Sender = "manager";
               NewPatch.DepositionType = AddPatch_DepositionType;
               NewPatch.AreaNewPatch = AddPatch_NewArea;
               if (AddPatch_PatchToAdd == "base")
                  PatchToAddTo[0] = 0;
               else if (AddPatch_PatchToAdd == "last")
                  PatchToAddTo[0] = PatchCount - 1;
               NewPatch.AffectedPatches_id = PatchToAddTo;
               if (AddPatch_SoluteType == "Urea")
                  NewPatch.Urea = SoluteToAdd;
               if (AddPatch_SoluteType == "NH4")
                  NewPatch.NH4 = SoluteToAdd;
               if (AddPatch_SoluteType == "NO3")
                  NewPatch.NO3 = SoluteToAdd;
      
               NewPatch.FOM = new AddSoilCNPatchwithFOMFOMType();
               NewPatch.FOM.Pool = new SoilOrganicMaterialType[3];
               for (int pool = 0; pool < 3; pool++)
               {
                  NewPatch.FOM.Pool[pool] = new SoilOrganicMaterialType();
                  NewPatch.FOM.Pool[pool].C = FOMCToAdd[pool];
                  NewPatch.FOM.Pool[pool].N = FOMNToAdd[pool];
               }
               
                  
               AddSoilCNPatchwithFOM.Invoke(NewPatch);
            }
            nPatchesAdded += 1;
            DaysAfterAdding = 1;
         }
         else
            DaysAfterAdding += 1;
      }
   }
      
   [EventHandler] public void OnPost()
   {

   }
}
```
          manager2 SetPatchParameter
            # Set SoilCNPatch parameters
            Set_partitionApproach = BasedOnConcentrationAndDelta  # Choose the approach for partitioning delta N between patches
```csharp
using System;
using ModelFramework;

public class Script 
{

   [Param] string Set_partitionApproach;
   
   [Link] SoilN mySoilN;


   [EventHandler] public void OnInitialised()
   {
      //Options for partitioning: -- >
      mySoilN.Set("NPartitionApproach", Set_partitionApproach);
      
      Console.WriteLine();
      Console.WriteLine("     Setting NPartitionApproach to: " + Set_partitionApproach);
   }

}
```
        outputfile Results -> /SoilNitrogen_CNPatch_OutputsTests/Test01-BareBare+addStuff/Sim01-ExplicitPatches/Paddock1-base-LightSoil/Results: filename=Sim01-SoilCNPatches Paddock1-CNpatch-LightSoil Results.out; title=Sim01-SoilCNPatches Paddock1-CNpatch-LightSoil Results
          variables -> /SoilNitrogen_CNPatch_OutputsTests/Test01-BareBare+addStuff/Sim01-ExplicitPatches/Paddock1-base-LightSoil/Results/Variables
          events ReportingFrequency -> /SoilNitrogen_CNPatch_OutputsTests/Test01-BareBare+addStuff/Sim01-ExplicitPatches/Paddock1-base-LightSoil/Results/ReportingFrequency
      manager2 GetPatchVariables
        # Handling varibles from CN patches
```csharp
using System;
using ModelFramework;

public class Script 
{
   [Link] Simulation myBlock;

   [Input] DateTime Today;
   
   // outputs for simple variables
   [Output][Units("")] public string mySoilName;
   [Output][Units("")] string patch01ResultName;
   [Output][Units("")] string patch02ResultName;
   [Output][Units("")] private int myPatchCount;
   [Output][Units("")] string[] patchesName;
   [Output][Units("0-1")] double[] patchesArea;
   [Output][Units("kg")] double[] patchesNinSediment;
   [Output][Units("kg")] double[] patchesCinSediment;
   
   // outputs for first patch - base
   [Output][Units("kg/ha")] double[] patch01Urea;
   [Output][Units("kg/ha")] double[] patch01NH4;
   [Output][Units("kg/ha")] double[] patch01NO3;
   [Output][Units("kg/ha")] double[] patch01FOMN;
   [Output][Units("kg/ha")] double[] patch01BiomN;
   [Output][Units("kg/ha")] double[] patch01HumN;

   [Output][Units("kg/ha")] double[] patch01Hydrolysis;
   [Output][Units("kg/ha")] double[] patch01Nitrification;
   [Output][Units("kg/ha")] double[] patch01Denitrification;
   [Output][Units("kg/ha")] double[] patch01NMinerResidues;
   [Output][Units("kg/ha")] double[] patch01NMinerSoilOM;
   [Output][Units("kg/ha")] double[] patch01N2Oatm;

   [Output][Units("kg/ha")] double[] patch01FOMC;
   [Output][Units("kg/ha")] double[] patch01BiomC;
   [Output][Units("kg/ha")] double[] patch01HumC;

   [Output][Units("kg/ha")] double[] patch01CO2Residues;
   [Output][Units("kg/ha")] double[] patch01CO2FOM;
   [Output][Units("kg/ha")] double[] patch01CO2Biomass;
   [Output][Units("kg/ha")] double[] patch01CO2Humus;

   
   // outputs for second patch - Patch1
   [Output][Units("kg/ha")] double[] patch02Urea;
   [Output][Units("kg/ha")] double[] patch02NH4;
   [Output][Units("kg/ha")] double[] patch02NO3;
   [Output][Units("kg/ha")] double[] patch02FOMN;
   [Output][Units("kg/ha")] double[] patch02BiomN;
   [Output][Units("kg/ha")] double[] patch02HumN;

   [Output][Units("kg/ha")] double[] patch02Hydrolysis;
   [Output][Units("kg/ha")] double[] patch02Nitrification;
   [Output][Units("kg/ha")] double[] patch02Denitrification;
   [Output][Units("kg/ha")] double[] patch02NMinerResidues;
   [Output][Units("kg/ha")] double[] patch02NMinerSoilOM;
   [Output][Units("kg/ha")] double[] patch02N2Oatm;

   [Output][Units("kg/ha")] double[] patch02FOMC;
   [Output][Units("kg/ha")] double[] patch02BiomC;
   [Output][Units("kg/ha")] double[] patch02HumC;

   [Output][Units("kg/ha")] double[] patch02CO2Residues;
   [Output][Units("kg/ha")] double[] patch02CO2FOM;
   [Output][Units("kg/ha")] double[] patch02CO2Biomass;
   [Output][Units("kg/ha")] double[] patch02CO2Humus;
   
   // internal variables
   private string[] myPatchName;
   private double[] myPatchArea;
   
   private double[] CNPatchNinSediment;
   private double[] CNPatchCinSediment;
   private CNPatchVariableType myPatchUrea = new CNPatchVariableType();
   private CNPatchVariableType myPatchNH4 = new CNPatchVariableType();
   private CNPatchVariableType myPatchNO3 = new CNPatchVariableType();
   private CNPatchPoolVariableType myPatchFOMN = new CNPatchPoolVariableType();
   private CNPatchVariableType myPatchBiomN = new CNPatchVariableType();
   private CNPatchVariableType myPatchHumN = new CNPatchVariableType();

   private CNPatchVariableType myPatchHydrolysis = new CNPatchVariableType();
   private CNPatchVariableType myPatchNitrification = new CNPatchVariableType();
   private CNPatchVariableType myPatchDenitrification = new CNPatchVariableType();
   private CNPatchVariableType myPatchNMinerResidues = new CNPatchVariableType();
   private CNPatchVariableType myPatchNMinerFOM = new CNPatchVariableType();
   private CNPatchVariableType myPatchNMinerHumus = new CNPatchVariableType();
   private CNPatchVariableType myPatchNMinerBiomass = new CNPatchVariableType();
   private CNPatchVariableType myPatchN2Oatm = new CNPatchVariableType();

   private CNPatchPoolVariableType myPatchFOMC = new CNPatchPoolVariableType();
   private CNPatchVariableType myPatchBiomC = new CNPatchVariableType();
   private CNPatchVariableType myPatchHumC = new CNPatchVariableType();

   private CNPatchVariableType myPatchCO2Residues = new CNPatchVariableType();
   private CNPatchVariableType myPatchCO2FOM = new CNPatchVariableType();
   private CNPatchVariableType myPatchCO2Biomass = new CNPatchVariableType();
   private CNPatchVariableType myPatchCO2Humus = new CNPatchVariableType();
  
   private int nPatchesAll;
   private int nLayers;

   private SoilN mySoilN;
   private SoilNitrogen mySoilNit;
   
   [EventHandler] public void OnInitialised()
   {
      nPatchesAll = 2;
      nLayers = 6;
      patch01ResultName = "base";
      patch02ResultName = "patch";

      // get the link to SoilN
      foreach(Paddock myPaddock in myBlock.ChildPaddocks)
         foreach(Component Module in myPaddock.Children)
            if(Module.Name.Contains(" Nitrogen"))
            {
               mySoilName = Module.Name.Split(' ')[0];
               mySoilN = (SoilN) myPaddock.LinkByType("SoilN");
            }
           
      Console.WriteLine();
      Console.WriteLine("     Handling variables from SoilCNPatches, with " + nPatchesAll + " patches");
      
      // clear and initialise the outputs
      patchesName = new string[nPatchesAll];
      patchesArea = new double[nPatchesAll];
      patchesNinSediment = new double[nPatchesAll];
      patchesCinSediment = new double[nPatchesAll];

      // patch base
      patch01Urea = new double[nLayers];
      patch01NH4 = new double[nLayers];
      patch01NO3 = new double[nLayers];
      patch01FOMN = new double[nLayers];
      patch01BiomN = new double[nLayers];
      patch01HumN = new double[nLayers];

      patch01Hydrolysis = new double[nLayers];
      patch01Nitrification = new double[nLayers];
      patch01Denitrification = new double[nLayers];
      patch01NMinerResidues = new double[nLayers];
      patch01NMinerSoilOM = new double[nLayers];
      patch01N2Oatm = new double[nLayers];

      patch01FOMC = new double[nLayers];
      patch01BiomC = new double[nLayers];
      patch01HumC = new double[nLayers];

      patch01CO2Residues = new double[nLayers];
      patch01CO2FOM = new double[nLayers];
      patch01CO2Biomass = new double[nLayers];
      patch01CO2Humus = new double[nLayers];
      
      // Patch01
      patch02Urea = new double[nLayers];
      patch02NH4 = new double[nLayers];
      patch02NO3 = new double[nLayers];
      patch02FOMN = new double[nLayers];
      patch02BiomN = new double[nLayers];
      patch02HumN = new double[nLayers];

      patch02Hydrolysis = new double[nLayers];
      patch02Nitrification = new double[nLayers];
      patch02Denitrification = new double[nLayers];
      patch02NMinerResidues = new double[nLayers];
      patch02NMinerSoilOM = new double[nLayers];
      patch02N2Oatm = new double[nLayers];

      patch02FOMC = new double[nLayers];
      patch02BiomC = new double[nLayers];
      patch02HumC = new double[nLayers];

      patch02CO2Residues = new double[nLayers];
      patch02CO2FOM = new double[nLayers];
      patch02CO2Biomass = new double[nLayers];
      patch02CO2Humus = new double[nLayers];

      for(int k = 0; k < nPatchesAll;k++)
      {
         patchesName[k] = "noPatch";
         patchesArea[k] = 0.0;
         patchesNinSediment[k] = 0.0;
         patchesCinSediment[k] = 0.0;
      }
   }

   [EventHandler] public void OnPost()
   {
     
      mySoilN.Get("PatchCount", out myPatchCount);
      mySoilN.Get("PatchName", out myPatchName);
      mySoilN.Get("PatchArea", out myPatchArea);
      
      // get the values from SoilNitrogen
      mySoilN.Get("PatchNLostInSediment", out CNPatchNinSediment);
      mySoilN.Get("PatchCLostInSediment", out CNPatchCinSediment);
      mySoilN.GetObject("PatchUrea", ref myPatchUrea);
      mySoilN.GetObject("PatchUrea", ref myPatchUrea);
      mySoilN.GetObject("PatchNH4", ref myPatchNH4);
      mySoilN.GetObject("PatchNO3", ref myPatchNO3);
      mySoilN.GetObject("PatchFOM_N", ref myPatchFOMN);
      mySoilN.GetObject("PatchBiom_N", ref myPatchBiomN);
      mySoilN.GetObject("PatchHum_N", ref myPatchHumN);

      mySoilN.GetObject("PatchDltUreaHydrolysis", ref myPatchHydrolysis);
      mySoilN.GetObject("PatchDltNitrification", ref myPatchNitrification);
      mySoilN.GetObject("Patch_dnit", ref myPatchDenitrification);
      mySoilN.GetObject("PatchNMineralisedFromResidues", ref myPatchNMinerResidues);
      mySoilN.GetObject("PatchNMineralisedFromFOM", ref myPatchNMinerFOM);
      mySoilN.GetObject("PatchNMineralisedFromMBiomass", ref myPatchNMinerBiomass);
      mySoilN.GetObject("PatchNMineralisedFromHumus", ref myPatchNMinerHumus);
      mySoilN.GetObject("PatchN2OLostToAtmosphere", ref myPatchN2Oatm);

      mySoilN.GetObject("PatchFOM_C", ref myPatchFOMC);
      mySoilN.GetObject("PatchBiom_C", ref myPatchBiomC);
      mySoilN.GetObject("PatchHum_C", ref myPatchHumC);

      mySoilN.GetObject("PatchDltCFromResiduesToAtmosphere", ref myPatchCO2Residues);
      mySoilN.GetObject("PatchDltCFromFOMToAtmosphere", ref myPatchCO2FOM);
      mySoilN.GetObject("PatchDltCFromMBiomassToAtmosphere", ref myPatchCO2Biomass);
      mySoilN.GetObject("PatchDltCFromHumusToAtmosphere", ref myPatchCO2Humus);

      // copy the relevant values
      for(int k = 0; k < nPatchesAll;k++)
      {
         if (k == 0)
         {
            patchesName[k] = myPatchName[k];
            patchesArea[k] = myPatchArea[k];
            patchesNinSediment[k] = CNPatchNinSediment[k];
            patchesCinSediment[k] = CNPatchCinSediment[k];
            for (int z = 0; z < nLayers; z++)
            {
               patch01Urea[z] = myPatchUrea.Patch[k].Value[z];
               patch01NH4[z] = myPatchNH4.Patch[k].Value[z];
               patch01NO3[z] = myPatchNO3.Patch[k].Value[z];
               patch01FOMN[z] = myPatchFOMN.Patch[k].Pool[0].Value[z] + myPatchFOMN.Patch[k].Pool[1].Value[z] + myPatchFOMN.Patch[k].Pool[2].Value[z];
               patch01BiomN[z] = myPatchBiomN.Patch[k].Value[z];
               patch01HumN[z] = myPatchHumN.Patch[k].Value[z];

               patch01Hydrolysis[z] = myPatchHydrolysis.Patch[k].Value[z];
               patch01Nitrification[z] = myPatchNitrification.Patch[k].Value[z];
               patch01Denitrification[z] = myPatchDenitrification.Patch[k].Value[z];
               patch01NMinerResidues[z] = myPatchNMinerResidues.Patch[k].Value[z];
               patch01NMinerSoilOM[z] = myPatchNMinerFOM.Patch[k].Value[z] + myPatchNMinerBiomass.Patch[k].Value[z] + myPatchNMinerHumus.Patch[k].Value[z];
               patch01N2Oatm[z] = myPatchN2Oatm.Patch[k].Value[z];

               patch01FOMC[z] = myPatchFOMC.Patch[k].Pool[0].Value[z] + myPatchFOMC.Patch[k].Pool[1].Value[z] + myPatchFOMC.Patch[k].Pool[2].Value[z];
               patch01BiomC[z] = myPatchBiomC.Patch[k].Value[z];
               patch01HumC[z] = myPatchHumC.Patch[k].Value[z];

               patch01CO2Residues[z] = myPatchCO2Residues.Patch[k].Value[z];
               patch01CO2FOM[z] = myPatchCO2FOM.Patch[k].Value[z];
               patch01CO2Biomass[z] = myPatchCO2Biomass.Patch[k].Value[z];
               patch01CO2Humus[z] = myPatchCO2Humus.Patch[k].Value[z];
            }
         }
         else if (k == 1)
         {
            if (k < myPatchCount)
            {
               patchesName[k] = myPatchName[k];
               patchesArea[k] = myPatchArea[k];
               patchesNinSediment[k] = CNPatchNinSediment[k];
               patchesCinSediment[k] = CNPatchCinSediment[k];
               for (int z = 0; z < nLayers; z++)
               {
                  patch02Urea[z] = myPatchUrea.Patch[k].Value[z];
                  patch02NH4[z] = myPatchNH4.Patch[k].Value[z];
                  patch02NO3[z] = myPatchNO3.Patch[k].Value[z];
                  patch02FOMN[z] = myPatchFOMN.Patch[k].Pool[0].Value[z] + myPatchFOMN.Patch[k].Pool[1].Value[z] + myPatchFOMN.Patch[k].Pool[2].Value[z];
                  patch02BiomN[z] = myPatchBiomN.Patch[k].Value[z];
                  patch02HumN[z] = myPatchHumN.Patch[k].Value[z];

                  patch02Hydrolysis[z] = myPatchHydrolysis.Patch[k].Value[z];
                  patch02Nitrification[z] = myPatchNitrification.Patch[k].Value[z];
                  patch02Denitrification[z] = myPatchDenitrification.Patch[k].Value[z];
                  patch02NMinerResidues[z] = myPatchNMinerResidues.Patch[k].Value[z];
                  patch02NMinerSoilOM[z] = myPatchNMinerFOM.Patch[k].Value[z]+myPatchNMinerBiomass.Patch[k].Value[z]+myPatchNMinerHumus.Patch[k].Value[z];
                  patch02N2Oatm[z] = myPatchN2Oatm.Patch[k].Value[z];

                  patch02FOMC[z] = myPatchFOMC.Patch[k].Pool[0].Value[z] + myPatchFOMC.Patch[k].Pool[1].Value[z] + myPatchFOMC.Patch[k].Pool[2].Value[z];
                  patch02BiomC[z] = myPatchBiomC.Patch[k].Value[z];
                  patch02HumC[z] = myPatchHumC.Patch[k].Value[z];

                  patch02CO2Residues[z] = myPatchCO2Residues.Patch[k].Value[z];
                  patch02CO2FOM[z] = myPatchCO2FOM.Patch[k].Value[z];
                  patch02CO2Biomass[z] = myPatchCO2Biomass.Patch[k].Value[z];
                  patch02CO2Humus[z] = myPatchCO2Humus.Patch[k].Value[z];
               }
            }
            else
            {
               // clear the outputs
               patchesName[k] = "noPatch";
               patchesArea[k] = 0.0;
               patchesNinSediment[k] = 0.0;
               patchesCinSediment[k] = 0.0;

               patch02Urea = new double[nLayers];
               patch02NH4 = new double[nLayers];
               patch02NO3 = new double[nLayers];
               patch02FOMN = new double[nLayers];
               patch02BiomN = new double[nLayers];
               patch02HumN = new double[nLayers];

               patch02Hydrolysis = new double[nLayers];
               patch02Nitrification = new double[nLayers];
               patch02Denitrification = new double[nLayers];
               patch02NMinerResidues = new double[nLayers];
               patch02NMinerSoilOM = new double[nLayers];
               patch02N2Oatm = new double[nLayers];

               patch02FOMC = new double[nLayers];
               patch02BiomC = new double[nLayers];
               patch02HumC = new double[nLayers];

               patch02CO2Residues = new double[nLayers];
               patch02CO2FOM = new double[nLayers];
               patch02CO2Biomass = new double[nLayers];
               patch02CO2Humus = new double[nLayers];
            }
            
            //Console.WriteLine(" patch01Urea[0]:" + patch01Urea[0]);
         }
      }
   }
}
```
      outputfile Paddock1-base-LightSoil Results -> /SoilNitrogen_CNPatch_OutputsTests/Test01-BareBare+addStuff/Sim01-ExplicitPatches/Paddock1-base-LightSoil/Results: filename=Sim01-SoilCNPatches Paddock1-base-LightSoil Results.out; title=Sim01-SoilCNPatches Paddock1-base-LightSoil Results
        variables
          variable:
            dd/mmm/yyyy as Date
            day as DoY
            patch01Urea() as UreaTotal format 5
            patch01NH4() as NH4Total format 5
            patch01NO3() as NO3Total format 5
            SurfaceOM_N format 5
            patch01FOMN() as FOM_N format 5
            patch01BiomN() as Biom_N format 5
            patch01HumN() as Hum_N format 5
            PlantTotalN as PlantTotalN format 5
            fertiliser as FertiliserN format 5
            patch01Hydrolysis() as HydrolisedN format 5
            patch01Nitrification() as NitrifiedN format 5
            patch01Denitrification() as DenitrifiedN format 5
            leach_no3 as LeachedNO3 format 5
            patch01NMinerResidues() as NetMineralisedResidue format 5
            patch01NMinerSoilOM() as NetMineralisedHumus format 5
            patch01N2Oatm() as N2Oemissions format 5
            patchesNinSediment(1) as dltN_sediments format 5
            PlantNUptake format 5
            surfaceom_c as SurfaceOM_C format 5
            patch01FOMC() as FOM_C format 5
            patch01BiomC() as Biom_C format 5
            patch01HumC() as Hum_C format 5
            PlantTotalC format 5
            patch01CO2Residues() as CO2fromResidues format 5
            patch01CO2FOM() as CO2fromFOM format 5
            patch01CO2Biomass() as CO2fromMBiomass format 5
            patch01CO2Humus() as CO2fromHumus format 5
            patchesCinSediment(2) as dltC_sediments format 5
            es as Evaporation format 5
            PlantTranspiration as PlantTranspiration format 5
            drain as Drain format 5
            Runoff format 5
            mySoilName as SoilName
            patch01ResultName as ResultName
            myPatchCount as NumPatches
        events ReportingFrequency -> /SoilNitrogen_CNPatch_OutputsTests/Test01-BareBare+addStuff/Sim01-ExplicitPatches/Paddock1-base-LightSoil/Results/ReportingFrequency
      outputfile Paddock1-patch-LightSoil Results -> /SoilNitrogen_CNPatch_OutputsTests/Test01-BareBare+addStuff/Sim01-ExplicitPatches/Paddock1-base-LightSoil/Results: filename=Sim01-SoilCNPatches Paddock1-patch-LightSoil Results.out; title=Sim01-SoilCNPatches Paddock1-patch-LightSoil Results
        variables
          variable:
            dd/mmm/yyyy as Date
            day as DoY
            patch02Urea() as UreaTotal format 5
            patch02NH4() as NH4Total format 5
            patch02NO3() as NO3Total format 5
            SurfaceOM_N format 5
            patch02FOMN() as FOM_N format 5
            patch02BiomN() as Biom_N format 5
            patch02HumN() as Hum_N format 5
            PlantTotalN as PlantTotalN format 5
            fertiliser as FertiliserN format 5
            patch02Hydrolysis() as HydrolisedN format 5
            patch02Nitrification() as NitrifiedN format 5
            patch02Denitrification() as DenitrifiedN format 5
            leach_no3 as LeachedNO3 format 5
            patch02NMinerResidues() as NetMineralisedResidue format 5
            patch02NMinerSoilOM() as NetMineralisedHumus format 5
            patch02N2Oatm() as N2Oemissions format 5
            patchesNinSediment(2) as dltN_sediments format 5
            PlantNUptake format 5
            surfaceom_c as SurfaceOM_C format 5
            patch02FOMC() as FOM_C format 5
            patch02BiomC() as Biom_C format 5
            patch02HumC() as Hum_C format 5
            PlantTotalC format 5
            patch02CO2Residues() as CO2fromResidues format 5
            patch02CO2FOM() as CO2fromFOM format 5
            patch02CO2Biomass() as CO2fromMBiomass format 5
            patch02CO2Humus() as CO2fromHumus format 5
            patchesCinSediment(2) as dltC_sediments format 5
            es as Evaporation format 5
            PlantTranspiration as PlantTranspiration format 5
            drain as Drain format 5
            Runoff format 5
            mySoilName as SoilName
            patch02ResultName as ResultName
            myPatchCount as NumPatches
        events ReportingFrequency -> /SoilNitrogen_CNPatch_OutputsTests/Test01-BareBare+addStuff/Sim01-ExplicitPatches/Paddock1-base-LightSoil/Results/ReportingFrequency
  folder Test02-Bare+TypicSoil+addStuff -> /SoilNitrogen_CNPatch_OutputsTests/Test01-BareBare+addStuff
    memo Info
      ++++++++++++++++++++  TEST 02 +++++++++++++++++++++++++++++++++++++++++++++++++++++++++++

         Description:
            - Artificial climate, smooth mild temperate;
            - A free draining generic soil;
            - Bare soil;
            - Initial mineral N: 30kgN/ha as NO3 + 30kgN/ha as NH4;
            - Initial soil organic matter composed of humus and FOM;
            - Initial surface residues of 1000kgDM/ha;
            - No additions of residues;
            - Urea added as a patch, 100kgN/ha into 25% of the area;
            - FOM added to CNpatch, 5000DMkgN/ha with C:N 20;

            > Simulations have two patches and n is added to one of them;

         Expected output:
            - All outputs with valid values (numeric mostly);
            - This test aims to demonstrate and check that variables for each CNpatch can be captured by manager,
                (note that only a selection of variables is tested in here)
    simulation Sim02-ExplicitPatches -> /SoilNitrogen_CNPatch_OutputsTests/Test01-BareBare+addStuff/Sim01-ExplicitPatches
      area Paddock1-base-LightSoil -> /SoilNitrogen_CNPatch_OutputsTests/Test01-BareBare+addStuff/Sim01-ExplicitPatches/Paddock1-base-LightSoil
        surfaceom SurfaceOrganicMatter
          PoolName = Residue1  # Organic Matter pool name
          type = grass  # Organic Matter type
          mass = 1000  # Initial surface residue (kg/ha)
          cnr = 20  # C:N ratio of initial residue
          standing_fraction = 0  # Fraction of residue standing
        Soil Med-LightSoil: LocalName=Generic medium-light sedimentary soil; Country=New Zealand; Latitude=0; Longitude=0
          DataSource=Hypothetical medium to light texture soil of sedimentary origin (moderately high drainage)
          Analysis: same as Test01-BareBare+addStuff.Sim01-ExplicitPatches.Paddock1-base-LightSoil.Med-LightSoil.Analysis
          Water: same as Test01-BareBare+addStuff.Sim01-ExplicitPatches.Paddock1-base-LightSoil.Med-LightSoil.Water
          SoilWater: same as Test01-BareBare+addStuff.Sim01-ExplicitPatches.Paddock1-base-LightSoil.Med-LightSoil.SoilWater
          SoilOrganicMatter: RootCN=30; RootWt=1000; SoilCN=12.5; EnrACoeff=7.4; EnrBCoeff=0.2; OCUnits=Total
            Thickness  OC    FBiom  FInert
            150        3.5   0.035  0.4
            150        1.5   0.025  0.55
            300        0.5   0.015  0.765
            300        0.25  0.01   0.9
            300        0.1   0.01   0.95
            300        0.1   0.01   0.994
          Sample Initial nitrogen: NO3Units=kgha; NH4Units=kgha; SWUnits=Volumetric; OCUnits=Total; PHUnits=Water
            Thickness  NO3  NH4
            150        5    5
            150        5    5
            300        5    5
            300        5    5
            300        5    5
            300        5    5
          InitialWater: FractionFull=1; PercentMethod=EvenlyDistributed; RelativeTo=ll15
        outputfile Results -> /SoilNitrogen_CNPatch_OutputsTests/Test01-BareBare+addStuff/Sim01-ExplicitPatches/Paddock1-base-LightSoil/Results: filename=Sim02-ExplicitPatches Paddock1-base-LightSoil Results.out; title=Sim02-ExplicitPatches Paddock1-base-LightSoil Results
          variables -> /SoilNitrogen_CNPatch_OutputsTests/Test01-BareBare+addStuff/Sim01-ExplicitPatches/Paddock1-base-LightSoil/Results/Variables
          events ReportingFrequency -> /SoilNitrogen_CNPatch_OutputsTests/Test01-BareBare+addStuff/Sim01-ExplicitPatches/Paddock1-base-LightSoil/Results/ReportingFrequency
      area Paddock1-patch-LightSoil -> /SoilNitrogen_CNPatch_OutputsTests/Test02-Bare+TypicSoil+addStuff/Sim02-ExplicitPatches/Paddock1-base-LightSoil
        outputfile Results -> /SoilNitrogen_CNPatch_OutputsTests/Test02-Bare+TypicSoil+addStuff/Sim02-ExplicitPatches/Paddock1-base-LightSoil/Results: filename=Sim02-ExplicitPatches Paddock1-patch-LightSoil Results.out; title=Sim02-ExplicitPatches Paddock1-patch-LightSoil Results
          variables -> /SoilNitrogen_CNPatch_OutputsTests/Test02-Bare+TypicSoil+addStuff/Sim02-ExplicitPatches/Paddock1-base-LightSoil/Results/Variables
          events ReportingFrequency -> /SoilNitrogen_CNPatch_OutputsTests/Test02-Bare+TypicSoil+addStuff/Sim02-ExplicitPatches/Paddock1-base-LightSoil/Results/ReportingFrequency
      outputfile Paddock1-All-LightSoil Results -> /SoilNitrogen_CNPatch_OutputsTests/Test01-BareBare+addStuff/Sim01-ExplicitPatches/Paddock1-All-LightSoil Results: filename=Sim02-ExplicitPatches Paddock1-All-LightSoil Results.out; title=Sim02-ExplicitPatches Paddock1-All-LightSoil Results
        variables -> /SoilNitrogen_CNPatch_OutputsTests/Test01-BareBare+addStuff/Sim01-ExplicitPatches/Paddock1-All-LightSoil Results/Variables
        events ReportingFrequency -> /SoilNitrogen_CNPatch_OutputsTests/Test01-BareBare+addStuff/Sim01-ExplicitPatches/Paddock1-All-LightSoil Results/ReportingFrequency
    simulation Sim02-SoilCNPatches -> /SoilNitrogen_CNPatch_OutputsTests/Test02-Bare+TypicSoil+addStuff/Sim02-ExplicitPatches
      area Paddock1-CNpatch-LightSoil -> /SoilNitrogen_CNPatch_OutputsTests/Test02-Bare+TypicSoil+addStuff/Sim02-ExplicitPatches/Paddock1-base-LightSoil
        outputfile Results -> /SoilNitrogen_CNPatch_OutputsTests/Test02-Bare+TypicSoil+addStuff/Sim02-ExplicitPatches/Paddock1-base-LightSoil/Results: filename=Sim02-SoilCNPatches Paddock1-CNpatch-LightSoil Results.out; title=Sim02-SoilCNPatches Paddock1-CNpatch-LightSoil Results
          variables -> /SoilNitrogen_CNPatch_OutputsTests/Test02-Bare+TypicSoil+addStuff/Sim02-ExplicitPatches/Paddock1-base-LightSoil/Results/Variables
          events ReportingFrequency -> /SoilNitrogen_CNPatch_OutputsTests/Test02-Bare+TypicSoil+addStuff/Sim02-ExplicitPatches/Paddock1-base-LightSoil/Results/ReportingFrequency
      outputfile Paddock1-base-LightSoil Results -> /SoilNitrogen_CNPatch_OutputsTests/Test01-BareBare+addStuff/Sim01-SoilCNPatches/Paddock1-base-LightSoil Results: filename=Sim02-SoilCNPatches Paddock1-base-LightSoil Results.out; title=Sim02-SoilCNPatches Paddock1-base-LightSoil Results
        variables -> /SoilNitrogen_CNPatch_OutputsTests/Test01-BareBare+addStuff/Sim01-SoilCNPatches/Paddock1-base-LightSoil Results/Variables
        events ReportingFrequency -> /SoilNitrogen_CNPatch_OutputsTests/Test01-BareBare+addStuff/Sim01-SoilCNPatches/Paddock1-base-LightSoil Results/ReportingFrequency
      outputfile Paddock1-patch-LightSoil Results -> /SoilNitrogen_CNPatch_OutputsTests/Test01-BareBare+addStuff/Sim01-SoilCNPatches/Paddock1-patch-LightSoil Results: filename=Sim02-SoilCNPatches Paddock1-patch-LightSoil Results.out; title=Sim02-SoilCNPatches Paddock1-patch-LightSoil Results
        variables -> /SoilNitrogen_CNPatch_OutputsTests/Test01-BareBare+addStuff/Sim01-SoilCNPatches/Paddock1-patch-LightSoil Results/Variables
        events ReportingFrequency -> /SoilNitrogen_CNPatch_OutputsTests/Test01-BareBare+addStuff/Sim01-SoilCNPatches/Paddock1-patch-LightSoil Results/ReportingFrequency
  folder Test03-wheat+TypicSoil+addStuff -> /SoilNitrogen_CNPatch_OutputsTests/Test01-BareBare+addStuff
    memo Info
      ++++++++++++++++++++  TEST 03 +++++++++++++++++++++++++++++++++++++++++++++++++++++++++++

         Description:
            - Artificial climate, smooth mild temperate;
            - A free draining generic soil;
            - Wheat crop;
            - Initial mineral N: 30kgN/ha as NO3 + 30kgN/ha as NH4;
            - Initial soil organic matter composed of humus and FOM;
            - Initial surface residues of 1000kgDM/ha;
            - No additions of residues, besides plant senescence;
            - Urea added as a patch, 100kgN/ha into 25% of the area;
            - FOM added to CNpatch, 5000DMkgN/ha with C:N 20;

            > Simulations have two patches and n is added to one of them;

         Expected output:
            - All outputs with valid values (numeric mostly);
            - This test aims to demonstrate and check that variables for each CNpatch can be captured by manager,
                (note that only a selection of variables is tested in here)
    simulation Sim03-ExplicitPatches -> /SoilNitrogen_CNPatch_OutputsTests/Test01-BareBare+addStuff/Sim01-ExplicitPatches
      area Paddock1-base-LightSoil -> /SoilNitrogen_CNPatch_OutputsTests/Test01-BareBare+addStuff/Sim01-ExplicitPatches/Paddock1-base-LightSoil
        folder ManagerFolder -> /SoilNitrogen_CNPatch_OutputsTests/Test01-BareBare+addStuff/Sim01-ExplicitPatches/Paddock1-base-LightSoil/ManagerFolder
          manager HarvestingRule
            # Harvesting criteria
            crop = wheat  # Enter name of crop to harvest when ripe
            on end_of_day:
```
if ('[crop]' = 'cotton') then
   if ([crop].ozcot_status > 0) then
     [crop] harvest
   endif
elseif ([crop].StageName = 'harvest_ripe' or [crop].plant_status = 'dead') then
   [crop] harvest
   [crop] end_crop
endif
```
          manager SowingRule
            # Sowing criteria
            date = 3-Jan  # Enter sowing date (dd-mmm)
            # Sowing parameters
            crop = wheat  # Enter name of crop to sow
            density = 400  # Enter sowing density (plants/m2)
            depth = 30  # Enter sowing depth (mm)
            cultivar = Wakaniu  # Enter cultivar
            class = plant  # Enter crop growth class
            row_spacing = 150  # Enter row spacing (mm)
            on start_of_day:
```
 if (today = date('[date]') then
     [crop] sow plants =[density], sowing_depth = [depth], cultivar = [cultivar], row_spacing = [row_spacing], crop_class = [class]
 endif
```
        surfaceom SurfaceOrganicMatter
          PoolName = Residue1  # Organic Matter pool name
          type = grass  # Organic Matter type
          mass = 1000  # Initial surface residue (kg/ha)
          cnr = 20  # C:N ratio of initial residue
          standing_fraction = 0  # Fraction of residue standing
        Soil Med-LightSoil: same as Test02-Bare+TypicSoil+addStuff.Sim02-ExplicitPatches.Paddock1-base-LightSoil.Med-LightSoil
        wheat
        outputfile Results -> /SoilNitrogen_CNPatch_OutputsTests/Test01-BareBare+addStuff/Sim01-ExplicitPatches/Paddock1-base-LightSoil/Results: filename=Sim03-ExplicitPatches Paddock1-base-LightSoil Results.out; title=Sim03-ExplicitPatches Paddock1-base-LightSoil Results
          variables -> /SoilNitrogen_CNPatch_OutputsTests/Test01-BareBare+addStuff/Sim01-ExplicitPatches/Paddock1-base-LightSoil/Results/Variables
          events ReportingFrequency -> /SoilNitrogen_CNPatch_OutputsTests/Test01-BareBare+addStuff/Sim01-ExplicitPatches/Paddock1-base-LightSoil/Results/ReportingFrequency
      area Paddock1-patch-LightSoil -> /SoilNitrogen_CNPatch_OutputsTests/Test03-wheat+TypicSoil+addStuff/Sim03-ExplicitPatches/Paddock1-base-LightSoil
        outputfile Results -> /SoilNitrogen_CNPatch_OutputsTests/Test03-wheat+TypicSoil+addStuff/Sim03-ExplicitPatches/Paddock1-base-LightSoil/Results: filename=Sim03-ExplicitPatches Paddock1-patch-LightSoil Results.out; title=Sim03-ExplicitPatches Paddock1-patch-LightSoil Results
          variables -> /SoilNitrogen_CNPatch_OutputsTests/Test03-wheat+TypicSoil+addStuff/Sim03-ExplicitPatches/Paddock1-base-LightSoil/Results/Variables
          events ReportingFrequency -> /SoilNitrogen_CNPatch_OutputsTests/Test03-wheat+TypicSoil+addStuff/Sim03-ExplicitPatches/Paddock1-base-LightSoil/Results/ReportingFrequency
      outputfile Paddock1-All-LightSoil Results -> /SoilNitrogen_CNPatch_OutputsTests/Test01-BareBare+addStuff/Sim01-ExplicitPatches/Paddock1-All-LightSoil Results: filename=Sim03-ExplicitPatches Paddock1-All-LightSoil Results.out; title=Sim03-ExplicitPatches Paddock1-All-LightSoil Results
        variables -> /SoilNitrogen_CNPatch_OutputsTests/Test01-BareBare+addStuff/Sim01-ExplicitPatches/Paddock1-All-LightSoil Results/Variables
        events ReportingFrequency -> /SoilNitrogen_CNPatch_OutputsTests/Test01-BareBare+addStuff/Sim01-ExplicitPatches/Paddock1-All-LightSoil Results/ReportingFrequency
    simulation Sim03-SoilCNPatches -> /SoilNitrogen_CNPatch_OutputsTests/Test03-wheat+TypicSoil+addStuff/Sim03-ExplicitPatches
      area Paddock1-CNpatch-LightSoil -> /SoilNitrogen_CNPatch_OutputsTests/Test03-wheat+TypicSoil+addStuff/Sim03-ExplicitPatches/Paddock1-base-LightSoil
        outputfile Results -> /SoilNitrogen_CNPatch_OutputsTests/Test03-wheat+TypicSoil+addStuff/Sim03-ExplicitPatches/Paddock1-base-LightSoil/Results: filename=Sim03-SoilCNPatches Paddock1-CNpatch-LightSoil Results.out; title=Sim03-SoilCNPatches Paddock1-CNpatch-LightSoil Results
          variables -> /SoilNitrogen_CNPatch_OutputsTests/Test03-wheat+TypicSoil+addStuff/Sim03-ExplicitPatches/Paddock1-base-LightSoil/Results/Variables
          events ReportingFrequency -> /SoilNitrogen_CNPatch_OutputsTests/Test03-wheat+TypicSoil+addStuff/Sim03-ExplicitPatches/Paddock1-base-LightSoil/Results/ReportingFrequency
      outputfile Paddock1-base-LightSoil Results -> /SoilNitrogen_CNPatch_OutputsTests/Test01-BareBare+addStuff/Sim01-SoilCNPatches/Paddock1-base-LightSoil Results: filename=Sim03-SoilCNPatches Paddock1-base-LightSoil Results.out; title=Sim03-SoilCNPatches Paddock1-base-LightSoil Results
        variables -> /SoilNitrogen_CNPatch_OutputsTests/Test01-BareBare+addStuff/Sim01-SoilCNPatches/Paddock1-base-LightSoil Results/Variables
        events ReportingFrequency -> /SoilNitrogen_CNPatch_OutputsTests/Test01-BareBare+addStuff/Sim01-SoilCNPatches/Paddock1-base-LightSoil Results/ReportingFrequency
      outputfile Paddock1-patch-LightSoil Results -> /SoilNitrogen_CNPatch_OutputsTests/Test01-BareBare+addStuff/Sim01-SoilCNPatches/Paddock1-patch-LightSoil Results: filename=Sim03-SoilCNPatches Paddock1-patch-LightSoil Results.out; title=Sim03-SoilCNPatches Paddock1-patch-LightSoil Results
        variables -> /SoilNitrogen_CNPatch_OutputsTests/Test01-BareBare+addStuff/Sim01-SoilCNPatches/Paddock1-patch-LightSoil Results/Variables
        events ReportingFrequency -> /SoilNitrogen_CNPatch_OutputsTests/Test01-BareBare+addStuff/Sim01-SoilCNPatches/Paddock1-patch-LightSoil Results/ReportingFrequency
  folder Test04-Pasture+TypicSoil+addStuff -> /SoilNitrogen_CNPatch_OutputsTests/Test01-BareBare+addStuff
    memo Info
      ++++++++++++++++++++  TEST 04 +++++++++++++++++++++++++++++++++++++++++++++++++++++++++++

         Description:
            - Artificial climate, smooth mild temperate;
            - A free draining generic soil;
            - Pastoral system;
            - Initial mineral N: 30kgN/ha as NO3 + 30kgN/ha as NH4;
            - Initial soil organic matter composed of humus and FOM;
            - Initial surface residues of 1000kgDM/ha;
            - No additions of residues, besides plant senescence;
            - Urea added as a patch, 100kgN/ha into 25% of the area;
            - FOM added to CNpatch, 5000DMkgN/ha with C:N 20;

            > Simulations have two patches and n is added to one of them;

         Expected output:
            - All outputs with valid values (numeric mostly);
            - This test aims to demonstrate and check that variables for each CNpatch can be captured by manager,
                (note that only a selection of variables is tested in here)
    simulation Sim04-ExplicitPatches -> /SoilNitrogen_CNPatch_OutputsTests/Test01-BareBare+addStuff/Sim01-ExplicitPatches
      area Paddock1-base-LightSoil -> /SoilNitrogen_CNPatch_OutputsTests/Test01-BareBare+addStuff/Sim01-ExplicitPatches/Paddock1-base-LightSoil
        folder ManagerFolder -> /SoilNitrogen_CNPatch_OutputsTests/Test01-BareBare+addStuff/Sim01-ExplicitPatches/Paddock1-base-LightSoil/ManagerFolder
          manager CutAgPasture
            # Cut or graze rotation
            CutPasture_start_date = 01/01/1900  # Enter date to start rotation (dd/mm/yyyy)
            CutPasture_end_date = 31/12/2100  # Enter date to end rotation (dd/mm/yyyy)
            AgPasture_type = AgPasture  # Enter pasture type
            rotation_type = Fixed intervals  # Enter the rotation type
            cut_interval = 21  # Enter the interval between cuts/grazings (days)
            upper_threshold = 2000  # Enter the sward DM to trigger cut (kg/ha)
            lower_threshold = 1500  # Enter the residual DM after cut (kg/ha)
            # Management of cut/grazed material
            treatment_type = Return as residue  # Enter the treatment type for the cut/grazed material
            remove_dm_frac = 0.98  # Enter fraction of DM that is removed from field (0-1)
            remove_n_frac = 0.98  # Enter fraction of N that is removed from field (0-1)
            dung_fraction = 0.0  # Enter proportion of N returned in dung (0-1)
            on init:
```
! -->   Last updated in: 11/July/2011  ..........
! . Author: Rogerio Cichota

days_after_cut = [cut_interval] - 1
Do_Cut = 'FALSE'
Has_Cut = 'FALSE'
harvested_dm =0
harvested_n = 0
removed_dm = 0.0
removed_n = 0.0
return_dm = 0.0
return_n = 0.0
GrowthRateCalc = 0
n_conc_total = 0
```
            on start_of_day:
```
if today >= date('[CutPasture_start_date]') and today <= date('[CutPasture_end_date]') then

   preharvest_dm = [AgPasture_type].StemWt + [AgPasture_type].LeafWt
   preharvest_n = [AgPasture_type].StemN + [AgPasture_type].LeafN
   harvested_dm = 0.0
   harvested_n = 0.0
   removed_dm = 0.0
   removed_n = 0.0
   return_dm = 0.0
   return_n = 0.0
   GrowthRateCalc = 0.0
   n_conc_removed = 0.0
   days_after_cut = days_after_cut + 1
   Has_Cut = 'FALSE'

   if '[rotation_type]' = 'Fixed intervals' then
      if days_after_cut = [cut_interval] then
         Do_Cut = 'TRUE'
      else
         Do_Cut = 'FALSE'
      endif
   elseif '[rotation_type]' = 'Target mass' then
      if preharvest_dm >= [upper_threshold] then
         Do_Cut = 'TRUE'
      else
         Do_Cut = 'FALSE'
      endif
   endif

endif   ! of today

If Do_Cut = 'TRUE' then
   
!- Cut or graze ---------------------------------------------------------------------------------------

   if preharvest_dm > [lower_threshold] then
      [AgPasture_type] graze type = 'SetResidueAmount', amount = [lower_threshold]
      Has_Cut = 'TRUE'
      harvested_dm = [AgPasture_type].HarvestWt
      harvested_n = [AgPasture_type].HarvestN
      GrowthRateCalc = harvested_dm/days_after_cut
      if harvested_dm > 0 then
         n_conc_removed = harvested_n*100/harvested_dm
      endif
      days_after_cut = 0

!- Residue management -------------------------------------------------------------------------
      removed_dm =  harvested_dm* [remove_dm_frac]
      removed_n = harvested_n* [remove_n_frac]
      return_dm = harvested_dm - removed_dm 
      return_n = harvested_n - removed_n 

      if '[treatment_type]' = 'Return as residue' and [remove_dm_frac] < 1 then
         'SurfaceOrganicMatter' add_surfaceom name = grass, type = grass, mass =  return_dm (kg/ha), n = return_n (kg/ha), cpr = 0
      elseif '[treatment_type]' = 'Return as dung & urine' then
         ! It is advised that dung and urine return should be done using other manager, 'Urine_patch' or 'Apply or return N and water'
         N_on_dung = return_n * [dung_fraction]
         N_on_urine = return_n - N_on_dung
         'SurfaceOrganicMatter' add_surfaceom name = dung, type = RuminantDung_PastureFed, mass =  return_dm (kg/ha), n = N_on_dung (kg/ha), cpr = 0
         if N_on_urine > 0 then
            fertiliser apply amount = N_on_urine (kg/ha), depth = 10 (mm), type = urea_n ()
         endif
      endif
   endif

endif  ! of Do_Cut
```
        micromet
          soilalbedo = 0.23
          a_interception = 0
          b_interception = 0
          c_interception = 0
          d_interception = 0
        surfaceom SurfaceOrganicMatter
          PoolName = Residue1  # Organic Matter pool name
          type = grass  # Organic Matter type
          mass = 1000  # Initial surface residue (kg/ha)
          cnr = 20  # C:N ratio of initial residue
          standing_fraction = 0  # Fraction of residue standing
        Soil Med-LightSoil: same as Test02-Bare+TypicSoil+addStuff.Sim02-ExplicitPatches.Paddock1-base-LightSoil.Med-LightSoil
        AgPasture
          # Initial values for each species to be simulated
          speciesToSimulate = Ryegrass    WhiteClover  # Name of the species to be simulated
          iniShootDM = 1500   500  # Initial above ground dry matter weight (kgDM/ha)
          iniRootDM = 450     150  # Initial root dry matter weight (kgDM/ha)
          iniRootDepth = 750     350  # Initial rooting depth (mm)
          WaterUptakeSource = calc  # Water uptake done by AgPasture (calc) or by apsim?
        outputfile Results -> /SoilNitrogen_CNPatch_OutputsTests/Test01-BareBare+addStuff/Sim01-ExplicitPatches/Paddock1-base-LightSoil/Results: filename=Sim04-ExplicitPatches Paddock1-base-LightSoil Results.out; title=Sim04-ExplicitPatches Paddock1-base-LightSoil Results
          variables -> /SoilNitrogen_CNPatch_OutputsTests/Test01-BareBare+addStuff/Sim01-ExplicitPatches/Paddock1-base-LightSoil/Results/Variables
          events ReportingFrequency -> /SoilNitrogen_CNPatch_OutputsTests/Test01-BareBare+addStuff/Sim01-ExplicitPatches/Paddock1-base-LightSoil/Results/ReportingFrequency
      area Paddock1-patch-LightSoil -> /SoilNitrogen_CNPatch_OutputsTests/Test04-Pasture+TypicSoil+addStuff/Sim04-ExplicitPatches/Paddock1-base-LightSoil
        outputfile Results -> /SoilNitrogen_CNPatch_OutputsTests/Test04-Pasture+TypicSoil+addStuff/Sim04-ExplicitPatches/Paddock1-base-LightSoil/Results: filename=Sim04-ExplicitPatches Paddock1-patch-LightSoil Results.out; title=Sim04-ExplicitPatches Paddock1-patch-LightSoil Results
          variables -> /SoilNitrogen_CNPatch_OutputsTests/Test04-Pasture+TypicSoil+addStuff/Sim04-ExplicitPatches/Paddock1-base-LightSoil/Results/Variables
          events ReportingFrequency -> /SoilNitrogen_CNPatch_OutputsTests/Test04-Pasture+TypicSoil+addStuff/Sim04-ExplicitPatches/Paddock1-base-LightSoil/Results/ReportingFrequency
      outputfile Paddock1-All-LightSoil Results -> /SoilNitrogen_CNPatch_OutputsTests/Test01-BareBare+addStuff/Sim01-ExplicitPatches/Paddock1-All-LightSoil Results: filename=Sim04-ExplicitPatches Paddock1-All-LightSoil Results.out; title=Sim04-ExplicitPatches Paddock1-All-LightSoil Results
        variables -> /SoilNitrogen_CNPatch_OutputsTests/Test01-BareBare+addStuff/Sim01-ExplicitPatches/Paddock1-All-LightSoil Results/Variables
        events ReportingFrequency -> /SoilNitrogen_CNPatch_OutputsTests/Test01-BareBare+addStuff/Sim01-ExplicitPatches/Paddock1-All-LightSoil Results/ReportingFrequency
    simulation Sim04-SoilCNPatches -> /SoilNitrogen_CNPatch_OutputsTests/Test04-Pasture+TypicSoil+addStuff/Sim04-ExplicitPatches
      area Paddock1-CNpatch-LightSoil -> /SoilNitrogen_CNPatch_OutputsTests/Test04-Pasture+TypicSoil+addStuff/Sim04-ExplicitPatches/Paddock1-base-LightSoil
        outputfile Results -> /SoilNitrogen_CNPatch_OutputsTests/Test04-Pasture+TypicSoil+addStuff/Sim04-ExplicitPatches/Paddock1-base-LightSoil/Results: filename=Sim04-SoilCNPatches Paddock1-CNpatch-LightSoil Results.out; title=Sim04-SoilCNPatches Paddock1-CNpatch-LightSoil Results
          variables -> /SoilNitrogen_CNPatch_OutputsTests/Test04-Pasture+TypicSoil+addStuff/Sim04-ExplicitPatches/Paddock1-base-LightSoil/Results/Variables
          events ReportingFrequency -> /SoilNitrogen_CNPatch_OutputsTests/Test04-Pasture+TypicSoil+addStuff/Sim04-ExplicitPatches/Paddock1-base-LightSoil/Results/ReportingFrequency
      outputfile Paddock1-base-LightSoil Results -> /SoilNitrogen_CNPatch_OutputsTests/Test01-BareBare+addStuff/Sim01-SoilCNPatches/Paddock1-base-LightSoil Results: filename=Sim04-SoilCNPatches Paddock1-base-LightSoil Results.out; title=Sim04-SoilCNPatches Paddock1-base-LightSoil Results
        variables -> /SoilNitrogen_CNPatch_OutputsTests/Test01-BareBare+addStuff/Sim01-SoilCNPatches/Paddock1-base-LightSoil Results/Variables
        events ReportingFrequency -> /SoilNitrogen_CNPatch_OutputsTests/Test01-BareBare+addStuff/Sim01-SoilCNPatches/Paddock1-base-LightSoil Results/ReportingFrequency
      outputfile Paddock1-patch-LightSoil Results -> /SoilNitrogen_CNPatch_OutputsTests/Test01-BareBare+addStuff/Sim01-SoilCNPatches/Paddock1-patch-LightSoil Results: filename=Sim04-SoilCNPatches Paddock1-patch-LightSoil Results.out; title=Sim04-SoilCNPatches Paddock1-patch-LightSoil Results
        variables -> /SoilNitrogen_CNPatch_OutputsTests/Test01-BareBare+addStuff/Sim01-SoilCNPatches/Paddock1-patch-LightSoil Results/Variables
        events ReportingFrequency -> /SoilNitrogen_CNPatch_OutputsTests/Test01-BareBare+addStuff/Sim01-SoilCNPatches/Paddock1-patch-LightSoil Results/ReportingFrequency
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