folder Simulations: version=32
  folder Model Comparison
    simulation Model_0
      metfile met: filename=Kingaroy.met
      clock
        start_date = 01/04/2001  # Enter the start date of the simulation
        end_date = 31/12/2001  # Enter the end date of the simulation
      summaryfile
      area paddock
        soil
          Analysis
            Layer:
              Thickness (mm)  PH (1:5 water)
              100             8.2
              100             8.5
              100             8.6
              200             8.6
              300             8.6
              300             7.4
              300             5.3
          Water
            Layer:
              Thickness (mm)  BD (g/cc)  AirDry (mm/mm)  LL15 (mm/mm)  DUL (mm/mm)  SAT (mm/mm)
              100             1.2        0.1             0.2           0.3          0.51
              100             1.23       0.184           0.23          0.34         0.5
              100             1.27       0.26            0.26          0.36         0.49
              200             1.27       0.26            0.26          0.36         0.47
              300             1.32       0.26            0.26          0.37         0.45
              300             1.39       0.26            0.26          0.38         0.43
              300             1.45       0.26            0.26          0.4          0.43
            SoilCrop maize
              Layer:
                Thickness (mm)  LL (mm/mm)  KL (/day)  XF (0-1)
                100             0.2         0.06       1
                100             0.23        0.06       1
                100             0.26        0.06       1
                200             0.26        0.06       1
                300             0.26        0.06       1
                300             0.26        0.06       1
                300             0.26        0.06       1
            SoilCrop peanut: same as Model Comparison.Model_0.paddock.Soil.Water.maize
            SoilCrop wheat: same as Model Comparison.Model_0.paddock.Soil.Water.maize
            SoilCrop soybean: same as Model Comparison.Model_0.paddock.Soil.Water.maize
          InitWater Initial water
            PercentMethod: Percent=0.50; Distributed=Evenly distributed
          SoilWat: SummerCona=2.5; SummerU=9; SummerDate=1-Nov; WinterCona=2.5; WinterU=9; WinterDate=1-Apr; DiffusConst=88; DiffusSlope=35.4; Salb=0.13; CN2Bare=75; CNRed=20; CNCov=0.8
            Layer:
              Thickness (mm)  SWCON (0-1)
              100             0.3
              100             0.3
              100             0.3
              200             0.3
              300             0.3
              300             0.3
              300             0.3
          Sample Initial nitrogen
            Layer:
              Thickness (mm)  NO3 (ppm)  NH4 (ppm)
              100             0.236992   0.194005
              100             0.711977   0.484012
              100             0.711977   0.290007
              200             0.553982   0.290007
              200             0.394987   0.290007
              200             0.394987   0.290007
              200             0.236992   0.290007
              200             0.236992   0.290007
              200             0.157995   0.290007
              200             0.0789975  0.290007
          SoilOrganicMatter: RootCN=45; RootWT=1000; SoilCN=14.5; EnrACoeff=7.4; EnrBCoeff=0.2
            Layer:
              Thickness (mm)  OC (Total %)  FBiom (0-1)  FInert (0-1)
              100             1.19          0.04         0.4
              100             1.01          0.02         0.6
              100             0.45          0.02         0.8
              200             0.45          0.02         0.8
              300             0.3           0.02         1
              300             0.2           0.02         1
              300             0.16          0.01         1
          Phosphorus: RootCP=200; RateDissolRock=0.2; RateLossAvail=0.3; SorptionCoeff=0.7
            Layer:
              Thickness (mm)  LabileP (mg/kg)  BandedP (kg/ha)  RockP (kg/ha)  Sorption (-)
              100             10               0                0              50
              100             6                0                0              50
              100             3.5              0                0              50
              200             1                0                0              300
              300             0.5              0                0              300
              300             0.5              0                0              300
              300             0.5              0                0              300
        irrigation
          automatic_irrigation = on
          asw_depth = 1400  # Depth to which ASW is calculated. (mm)
          crit_fr_asw = 0.8  # Fraction of ASW below which irrigation is applied (0-1.0)
          irrigation_efficiency = 1  # Efficiency of the irrigation. (0-1.0)
          irrigation_allocation = off  # Allocation limits
          allocation = 0  # Allocation in ML
          default_no3_conc = 0  # Nitrate concentration (ppm N)
          default_nh4_conc = 0  # Ammonium concentration (ppm N)
          default_cl_conc = 0  # Chloride concentration (ppm Cl)
          default_no3_conc = 0  # Nitrate concentration (ppm N)
          default_nh4_conc = 0  # Ammonium concentration (ppm N)
          default_cl_conc = 0  # Chloride concentration (ppm Cl)
        surfaceom
          PoolName = wheat_stubble  # Organic Matter pool name
          type = wheat  # Organic Matter type
          mass = 0  # Initial surface residue (kg/ha)
          cnr = 80  # C:N ratio of initial residue
          standing_fraction = 0  # Fraction of residue standing
        fertiliser
        wheat
          ini: filename=Wheat_P.xml
        folder Manager folder
          manager Model Setting
            on init:
```
P_Uptake_Model = 0
CitrateEfflux  = 0
```
          manager Crop Manager
            on init:
```
zCropType = 'Unknown'
zStageName = 'Unknown'

MaizeSowDate = 0
PeanutSowDate = 0
WheatSowDate = 0
SoybeanSowDate = 0

MaizeHarvestDate = 0
PeanutHarvestDate = 0
WheatHarvestDate = 0
SoybeanHarvestDate = 0

zStage = 0
zLAI = 0
zLAImax = 0
zBiomass = 0
zBiomass_n = 0
zBiomass_p = 0
zGrainYield = 0
zGrain_n = 0
zGrain_p = 0
zPET = 0
zTransp = 0
zEvap = 0

zLAI_F = 0
zBiomass_F = 0
zBiomass_n_F = 0
zBiomass_p_F = 0


NLevel1 = 100 !kg N/ha
NLevel2 = 75  !kg N/ha
PLevel  = 0  !kg P/ha
```
            on start_of_day:
```
!---------------------------------------------------------------------------------------------------------------
! ROTATION MANAGEMENT
!---------------------------------------------------------------------------------------------------------------
 !if wheat.plant_status = 'out' and ( date_within('20-Apr,10-Jul') and rain[10] >= 20 or today = date('30-Jun') )   then  !Actual sowing window 1 May - 30 Jun
  if today = date('18/06/2001') then
     wheat sow population = 200 (plants/m2), sowing_depth = 30 (mm), cultivar =hartog, row_spacing = 250 (mm) , crop_class = plant
     WheatSowDate = today
  endif
   
!---------------------------------------------------------------------------------------------------------------
! FERTILISER APPLICAITONS
!---------------------------------------------------------------------------------------------------------------
  !if today = date('26/4/2001') then    
   if today = WheatSowDate then     
       fertiliser apply amount = PLevel  (kg/ha), depth = 50 (mm), type = broadcast_P
       fertiliser apply amount = NLevel1 (kg/ha), depth = 50 (mm), type = urea_N
   endif
 
   if today = WheatSowDate + 50 then     
       fertiliser apply amount = NLevel2 (kg/ha), depth = 50 (mm), type = urea_N
   endif
!---------------------------------------------------------------------------------------------------------------
! SET PLANT TYPE
!---------------------------------------------------------------------------------------------------------------
     if wheat.plant_status = 'alive' then
         zCropType ='Wheat'
     endif
!---------------------------------------------------------------------------------------------------------------
! CALCULATIONS
!---------------------------------------------------------------------------------------------------------------
  if (today = WheatSowDate) then
     zSowDate = dd_mmm_yyyy
     zTransp  = 0
     zEvap    = 0
     zPET     = 0
     zLAImax  = 0
  endif

   zDas        = wheat.daysaftersowing 
   zStage      = wheat.stage
   zLAI        = wheat.lai 
   zBiomass    = wheat.biomass 
   zBiomass_n  = wheat.biomass_n *10
   zBiomass_p  = wheat.biomass_p *10
   zGrainYield = wheat.yield 
   zGrain_n    = wheat.grain_n *10
   zGrain_p    = wheat.grain_p *10
   zTransp     =  zTransp + wheat.ep
   zEvap       =  zEvap + es
   zPET        = zPET + eo
   
   if (zLAI > zLAImax) then
      zLAImax = zLAI
   endif

   zLP10  = labile_p(1)/(bd(1)*dlayer(1))*10^2
   zLP20  = labile_p(2)/(bd(2)*dlayer(2))*10^2
   zLP30  = labile_p(3)/(bd(2)*dlayer(2))*10^2
   zLPSum = zLP10 + zLP20 + zLP30

  if (wheat.stage  = 6) then
    zAnthDate    =  dd_mmm_yyyy
    zAnthDas     = zDas             
    zLAI_F       = zLAI
    zBiomass_F   = zBiomass
    zBiomass_n_F = zBiomass_n
    zBiomass_p_F = zBiomass_p
    zTransp_F    = zTransp
    zEvap_F      = zEvap
    zPET_F       = zPET
  endif

  zStageName = wheat.stagename

!---------------------------------------------------------------------------------------------------------------
!  HARVEST
!---------------------------------------------------------------------------------------------------------------
   if wheat.StageName = 'harvest_ripe' or wheat.plant_status = 'dead' then
         wheat  harvest
         wheat end_crop
         WheatHarvestDate = today
         zHarvestDate = dd_mmm_yyyy
         zStageName = ' Harvest'
         surfaceom tillage type = user_defined, f_incorp = 0.95 (), tillage_depth = 0
         surfaceom tillage type = user_defined, f_incorp = 1(), tillage_depth = 200
         !outputfile do_output 
   endif

  if ( today = WheatHarvestDate+1 ) then
     zLAImax = 0.0
     zCropType = 'Unknown'
  endif
```
        outputfile: filename=Model_0.out; title=Model_0
          variables
            variables: year, day, dd/mm/yyyy as date, zStage, zLAI, zBiomass, zGrainYield, zBiomass_n, zBiomass_p, zGrain_n, zGrain_p, labile_p, chelated_p, unavail_p, sp_rlv, pc_solution, banded_p, irrig_tot, irrigation, zLP10, zLP20, zLP30, zLPSum, carbon_tot
          events Reporting Frequency: event=daily
    simulation Model_1 -> /Simulations/Model Comparison/Model_0
      area paddock -> /Simulations/Model Comparison/Model_0/paddock
        folder Manager folder -> /Simulations/Model Comparison/Model_0/paddock/Manager folder
          manager Model Setting
            on init:
```
P_Uptake_Model = 1
CitrateEfflux  = 0
```
            on start_of_day:
```
P_Uptake_Model = 1
CitrateEfflux  = 0
```
        outputfile: filename=Model_1.out; title=Model_1
          variables -> /Simulations/Model Comparison/Model_0/paddock/outputfile/Variables
          events Reporting Frequency -> /Simulations/Model Comparison/Model_0/paddock/outputfile/Reporting Frequency
    simulation Model_2_Efflux_200 -> /Simulations/Model Comparison/Model_0
      area paddock -> /Simulations/Model Comparison/Model_0/paddock
        folder Manager folder -> /Simulations/Model Comparison/Model_0/paddock/Manager folder
          manager Model Setting
            on init:
```
P_Uptake_Model = 2
CitrateEfflux  = 200
```
        outputfile: filename=Model_2_Efflux_200.out; title=Model_2_Efflux_200
          variables -> /Simulations/Model Comparison/Model_0/paddock/outputfile/Variables
          events Reporting Frequency -> /Simulations/Model Comparison/Model_0/paddock/outputfile/Reporting Frequency
    simulation Model_3_Efflux_200 -> /Simulations/Model Comparison/Model_0
      area paddock -> /Simulations/Model Comparison/Model_0/paddock
        folder Manager folder -> /Simulations/Model Comparison/Model_0/paddock/Manager folder
          manager Model Setting
            on init:
```
P_Uptake_Model = 3
CitrateEfflux  = 200
```
        outputfile: filename=Model_3_Efflux_200.out; title=Model_3_Efflux_200
          variables -> /Simulations/Model Comparison/Model_0/paddock/outputfile/Variables
          events Reporting Frequency -> /Simulations/Model Comparison/Model_0/paddock/outputfile/Reporting Frequency
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