folder simulations: version=36
  simulation Easy
    metfile met: filename=%apsim%\Examples\MetFiles\Goond.met
    clock
      start_date = 01/01/1970  # Enter the start date of the simulation
      end_date = 14/07/1970  # Enter the end date of the simulation
    summaryfile
    area paddock
      SWIM2uiForDean
        ini Ini_SWIM2: filename=ini_SWIM(LUCI_Base).xml
      SoilTemperature2 SoilTemp2 (withSWIM)
        MaxTTimeDefault = 14  # hours
        BoundaryLayerConductanceSource = calc  # boundary layer conductance source (calc/constant)
        BoundaryLayerConductance = 20
        BoundaryLayerConductanceIterations = 1  # Number of iterations to calc boundary layer conductance (0-10)
        NetRadiationSource = calc  # net radiation source (calc/eos)
        DefaultWindSpeed = 3  # m/s
        DefaultAltitude = 18  # default altitude (m) 275m (700 ft) is approx 980 hPa
        DefaultInstrumentHeight = 1.2  # default instrument height for wind and temperature (m)
        BareSoilHeight = 57  # height of bare soil (mm)
        clay = 21  21  21  21  21  21  21  21  21  21  21  21  21  22  23  24  24  24  24  24  24  22  21  19  19  19  19  19  19  19   19  # The clay content for each soil layer (%)
      micromet
        soilalbedo = 0.23
        a_interception = 0
        b_interception = 0
        c_interception = 0
        d_interception = 0
      fertiliser
      surfaceom surface organic matter
        PoolName = grass  # Organic Matter pool name
        type = grass  # Organic Matter type
        mass = 0  # Initial surface residue (kg/ha)
        cnr = 20  # C:N ratio of initial residue
        standing_fraction = 0  # Fraction of residue standing
      SoilNui
        root_wt = 1000  # Type the amount of dead roots in the soil (kg/ha)
        root_cn = 30  # Type the C:N ratio of dead roots
        soil_cn = 13  # Type the C:N ratio of soil humus
        ph = 6.0  6.0  6.0  6.0  6.0  6.0  6.0  6.0  6.0  6.0  6.0  6.0  6.0  6.0  6.0  6.0  6.0  6.0  6.0  6.0  6.0  6.0  6.0  6.0  6.0  6.0  6.0  6.0  6.0  6.0  6.0  # Type the inital soil pH
        oc = 1.680  1.676  1.673  1.669  1.665  1.661  1.658  1.654  1.650  1.646  1.622  1.529  1.399  1.265  1.114  0.974  0.857  0.760  0.678  0.610  0.554  0.496  0.442  0.395  0.357  0.330  0.312  0.299  0.291  0.285  0.283  # Type the initial soil organic carbon content (%)
        fbiom = 0.080  0.080  0.080  0.080  0.080  0.079  0.077  0.073  0.065  0.056  0.045  0.034  0.025  0.017  0.010  0.008  0.008  0.008  0.008  0.008  0.008  0.008  0.008  0.008  0.008  0.008  0.008  0.008  0.008  0.008  0.008  # Type the microbial biomass fraction of OC (0-1)
        finert = 0.00  0.00  0.00  0.00  0.00  0.00  0.00  0.00  0.00  0.00  0.00  0.00  0.00  0.00  0.00  0.00  0.00  0.00  0.00  0.00  0.00  0.00  0.00  0.00  0.00  0.00  0.00  0.00  0.00  0.00  0.00  # Type the inert fraction of soil humus (0-1)
        no3ppm = 4.50  6.00  7.20  7.50  7.50  7.50  7.50  7.50  7.50  7.35  6.90  6.45  6.00  5.55  4.80  4.05  3.45  2.70  2.40  2.13  1.95  1.77  1.53  1.32  1.17  1.02  0.90  0.78  0.63  0.60  0.60  # Type the initial concentration of NO3 is the soil (ppm)
        nh4ppm = 1.50  2.00  2.40  2.50  2.50  2.50  2.50  2.50  2.50  2.45  2.30  2.15  2.00  1.85  1.60  1.35  1.15  0.90  0.80  0.71  0.65  0.59  0.51  0.44  0.39  0.34  0.30  0.26  0.21  0.20  0.20  # Type the initial concentration of NH4 is the soil (ppm)
        ureappm = 0.00  0.00  0.00  0.00  0.00  0.00  0.00  0.00  0.00  0.00  0.00  0.00  0.00  0.00  0.00  0.00  0.00  0.00  0.00  0.00  0.00  0.00  0.00  0.00  0.00  0.00  0.00  0.00  0.00  0.00  0.00  # Type the initial concentration of urea is the soil (ppm)
        nitrification_pot = 40  # Maximum potential nitrification rate (ug NH4/g soil/day)
        nh4_at_half_pot = 90  # NH4 concentration at half of nitrification rate (ppm)
        opt_temp = 32  # Optimal temperatures for mineralis. and nitrif. (oC)
      SWIM2ui
        ini Ini_SWIM2: filename=Easy_SWIM_Soil.xml
      AgPasture
        thisCropName = AgPasture  # Crop name shown as on the simulation tree
        speciesToSimulate = ryegrass whiteclover paspalum  # Name of species to simulate
        speciesName = ryegrass whiteclover paspalum  # Species names
        micrometType = grass     grass    grass  # Crop type for MicroMet
        isLegume = 0           1          0  # Legume species? no=0, yes=1
        photoPath = 3           3          4  # C3 or C4 species? C3=3, C4=4
        rootDepth = 850       325      1000
        tempMinGrowth = 2           3          10  # Minimum temperature for growth
        growthTmax = 32        32         40  # Maximum temperature for growth
        tempOptGrowth = 20        20         22  # Optimum temperature for growth
        exponentTempGrowth = 1.5       1.5        1.2  # Curvature of growth response to temperature
        tempMinTissueTurnover = 2           2          5  # Minimum temperature for mass flux
        tempMaxTissueTurnover = 20        20         22  # Optimum temperature for mass flux
        scaleFactorGLFWTissueTurnover = 2          2           2  # Scale factor for response of mass flux to soil moisture
        referenceGLFWTissueTurnover = 0.5       0.5        0.5  # Optimum soil moisture for mass flux
        useHeatStress = yes  yes  yes  # Consider effects of high temperatures on photosynthesis? (yes/no)
        tempOnsetHeatStress = 28        28         35  # Heat effects- Onset temperature
        tempFullHeatStress = 35        35         40  # Heat effects- Full temperature
        sumTempHeatStress = 30        30         50  # Heat effects- Temperature sum for recovery
        useColdStress = yes  yes  yes  # Consider effects of low temperatures on photosynthesis? (yes/no)
        tempOnsetColdStress = 0          0           8  # Cold effects- Onset temperature
        tempFullColdStress = -3          -3         3  # Cold effects- Full temperature
        sumTempColdStress = 20         20        50  # Cold effects- Temperature sum for recovery
        Pm = 1           1          1.2  # Reference CO2 assimilation rate (mg CO2/m2.s)
        maintRespiration = 3           3          3  # Maintenance respiration coefficient (%)
        growthEfficiency = 0.75      0.75     0.75
        SpecificLeafArea = 20        20         20
        lightExtCoeff = 0.5       0.8        0.6  # Light extinction coefficient
        stockParameter = 0.05     0.05      0.05  # Stock influence parameter
        maxRootFraction = 0.2       0.2        0.2  # Maximum biomass fraction allocated to root
        leafRate = 3          3           3.5  # Reference leaf appearance rate without stress
        fLeaf = 0.7       0.7        0.7  # Reference growth partition to leaves
        fStolon = 0.0       0.0        2.0  # Reference growth partition to stolon
        digestLive = 0.6       0.6        0.6  # Digestibility of live plant material
        digestDead = 0.2       0.2        0.2  # Digestibility of dead plant material
        dmshoot = 1500    500       150  # Initial shoot dry matter (kg/ha)
        dmgreenmin = 300      100       25  # Minimum green dry matter (kg/ha)
        NconcOptimum_leaves = 4.0       4.5        3.0  # N concentration - leaf optimum
        NconcMaximum_leaves = 5.0       5.5        3.5  # N concentration - leaf luxury
        NconcMinimum_leaves = 1.2       2.0        0.5  # N concentration - leaf scenescent
        RelativeNconc_Stems = 0.5      0.5         0.5  # Stem N concentration as fraction of leaf N concentration
        RelativeNconc_Stolons = 0.0      0.5         0.0  # Stolon N concentration as fraction of leaf N concentration
        RelativeNconc_Roots = 0.5      0.5         0.5  # Root N concentration as fraction of leaf N concentration
        NMinFix = 0.0      0.2         0.0  # Minimum N fixation (when soil N is sufficient)
        NMaxFix = 0.0      0.6         0.0  # Maximum N fixation (when soil N is unavailable)
        CO2PmaxScale = 700     700       150  # CO2 - Scale factor for CO2 effect on photosynthesis
        CO2NScale = 600     600       600  # CO2 - Scale factor for CO2 effects on plant N concentration
        CO2NMin = 0.7      0.7        0.7  # CO2 - Minimum fraction that plant N concentration may reduce to uder elevated CO2
        CO2NCurvature = 2         2           2  # CO2 - Curvature factor of CO2 effect on plant N concentration
        Frgr = 1         1           1  # Relative growth factor
        RootDistributionMethod = UserDefined  # Method to define the root distribution over the soil profile
        rlvp = 0.106    0.112    0.112    0.110    0.106    0.097    0.085    0.070    0.055    0.042    0.032    0.023    0.017    0.012    0.007    0.004    0.003    0.002    0.001    0.001    0.001    0.001    0.001    0.000    0.000    0.000    0.000    0.000    0.000    0.000    0.000  # Root distribution of swards (relative to each soil layer)
        WaterUptakeSource = apsim  # Water uptake done by AgPasture (calc) or by apsim?
        waterStressFactor = 1         1           1  # Scale factor of water stress on plant growth
      outputfile Results: filename=Easy Results.out; title=Easy Results
        variables
          variable:
            dd/mm/yyyy as Date
            leach_no3 as NO3Flow(150cm)
            removed_n as RemovedN
            NitrogenUptake as UptakeN
            ave_soil_temp  # Average soil surface temperature during the Apsim timestep. (oC)
        events Reporting Frequency: event=Daily
      manager Cut or graze AgPasture
        # Cut or graze rotation
        CutPasture_start_date = 1/01/1900  # Enter date to start rotation (dd/mm/yyyy)
        CutPasture_end_date = 1/12/2010  # Enter date to end rotation (dd/mm/yyyy)
        AgPasture_type = AgPasture  # Enter pasture type
        rotation_type = Fixed intervals  # Enter the rotation type
        cut_interval = 21  # Enter the interval between cuts/grazings (days)
        upper_threshold = 2500  # Enter the upper mass threshold (kg/ha)
        lower_threshold = 1250  # Enter the lower mass threshold (kg/ha)
        # Management of cut/grazed material
        treatment_type = Return as residue  # Enter the treatment type for the cut/grazed material
        remove_dm_frac = 0.98  # Enter fraction of dm that is removed from field (0-1)
        remove_n_frac = 0.98  # Enter fraction of N that is removed from field (0-1)
        dung_fraction = 0  # Enter proportion of N in dung of the returned amount (0-1)
        on init:
```
Start_sim_date = today
days_after_cut = [cut_interval] - 1
Do_Cut = 'FALSE'
Has_Cut = 'FALSE'
```
        on start_of_day:
```
if today >= date('[CutPasture_start_date]') and today <= date('[CutPasture_end_date]') then

   preharvest_dm = [AgPasture_type].AboveGroundWt
   preharvest_n = [AgPasture_type].AboveGroundN
   harvested_dm =0
   harvested_n = 0
   removed_dm = 0.0
   removed_n = 0.0
   return_dm = 0.0
   return_n = 0.0
   GrowthRateCalc = 0
   n_conc_total = 0
   days_after_cut = days_after_cut + 1
   Has_Cut = 'FALSE'

   if '[rotation_type]' = 'Fixed intervals' then
      if days_after_cut = [cut_interval] then
         Do_Cut = 'TRUE'
      else
         Do_Cut = 'FALSE'
      endif
   elseif '[rotation_type]' = 'Target mass' then
      if preharvest_dm >= [upper_threshold] then
         Do_Cut = 'TRUE'
      else
         Do_Cut = 'FALSE'
      endif
   endif

endif   ! of today

If Do_Cut = 'TRUE' then
   
!- Cut or graze ---------------------------------------------------------------------------------------

   if preharvest_dm > [lower_threshold] then
      [AgPasture_type] graze type = 'SetResidueAmount', amount = [lower_threshold]
      Has_Cut = 'TRUE'
      harvested_dm = [AgPasture_type].HarvestWt
      harvested_n = [AgPasture_type].HarvestN
      GrowthRateCalc = harvested_dm/days_after_cut
      if harvested_dm > 0 then
         n_conc_removed = harvested_n*100/harvested_dm
      endif

!- Residue management -------------------------------------------------------------------------
      removed_dm =  harvested_dm* [remove_dm_frac]
      removed_n = harvested_n* [remove_n_frac]
      return_dm = harvested_dm - removed_dm 
      return_n = harvested_n - removed_n 

      if '[treatment_type]' = 'Return as residue' and [remove_dm_frac] < 1 then
         'surface organic matter' add_surfaceom name = grass, type = grass, mass =  return_dm (kg/ha), n = return_n (kg/ha), cpr = 0
      elseif '[treatment_type]' = 'Return as dung & urine' then
         ! Is advised that dung and urine return should be done using other manager, 'Urine_patch' or 'Apply or return N and water'
         N_on_dung = return_n * [dung_fraction]
         N_on_urine = return_n - N_on_dung
         'surface organic matter' add_surfaceom name = dung, type = manure, mass =  return_dm (kg/ha), n = N_on_dung (kg/ha), cpr = 0
         if N_on_urine > 0 then
            fertiliser apply amount = N_on_urine (kg/ha), depth = 20 (mm), type = urea_n ()
         endif
      endif
   endif
   days_after_cut = 0

endif  ! of Do_Cut
```
      operations Operations1
        20-Jan  fertiliser apply amount = 5, depth = 1 (mm), type = urea_n
        20-Jan  fertiliser apply amount = 5, depth = 10 (mm), type = urea_n
        20-Jan  fertiliser apply amount = 5, depth = 20 (mm), type = urea_n
        20-Feb  fertiliser apply amount = 5, depth = 1 (mm), type = urea_n
        20-Feb  fertiliser apply amount = 5, depth = 10 (mm), type = urea_n
        20-Feb  fertiliser apply amount = 5, depth = 20 (mm), type = urea_n
        20-Mar  fertiliser apply amount = 5, depth = 1 (mm), type = urea_n
        20-Mar  fertiliser apply amount = 5, depth = 10 (mm), type = urea_n
        20-Mar  fertiliser apply amount = 5, depth = 20 (mm), type = urea_n
        20-Apr  fertiliser apply amount = 5, depth = 1 (mm), type = urea_n
        20-Apr  fertiliser apply amount = 5, depth = 10 (mm), type = urea_n
        20-Apr  fertiliser apply amount = 5, depth = 20 (mm), type = urea_n
        20-May  fertiliser apply amount = 5, depth = 1 (mm), type = urea_n
        20-May  fertiliser apply amount = 5, depth = 10 (mm), type = urea_n
        20-May  fertiliser apply amount = 5, depth = 20 (mm), type = urea_n
        20-Aug  fertiliser apply amount = 5, depth = 1 (mm), type = urea_n
        20-Aug  fertiliser apply amount = 5, depth = 10 (mm), type = urea_n
        20-Aug  fertiliser apply amount = 5, depth = 20 (mm), type = urea_n
        20-Sep  fertiliser apply amount = 5, depth = 1 (mm), type = urea_n
        20-Sep  fertiliser apply amount = 5, depth = 10 (mm), type = urea_n
        20-Sep  fertiliser apply amount = 5, depth = 20 (mm), type = urea_n
        20-Oct  fertiliser apply amount = 5, depth = 1 (mm), type = urea_n
        20-Oct  fertiliser apply amount = 5, depth = 10 (mm), type = urea_n
        20-Oct  fertiliser apply amount = 5, depth = 20 (mm), type = urea_n
        20-Nov  fertiliser apply amount = 5, depth = 1 (mm), type = urea_n
        20-Nov  fertiliser apply amount = 5, depth = 10 (mm), type = urea_n
        20-Nov  fertiliser apply amount = 5, depth = 20 (mm), type = urea_n
        20-Dec  fertiliser apply amount = 5, depth = 1 (mm), type = urea_n
        20-Dec  fertiliser apply amount = 5, depth = 10 (mm), type = urea_n
        20-Dec  fertiliser apply amount = 5, depth = 20 (mm), type = urea_n
