folder simulations: version=33
  memo Development Plan
    Isolate each process in the Water Module then test that process.

    SoilWat Process Simulations
    --------------------------------------------
    Create a baseline test for each process in SoilWat by turning off the various parameters.

    You can turn off the various processing in soilwat just by changing a handfull of parameters.
    For example,
    Saturated flow -> swcon = 0
    Unsaturated flow -> diffus const and diffus slope = 0
    runoff -> cn2 = 0
    es (soil evaporation) -> u and cona = 0
    Also you will need to create a met file where you set rainfall = 0. You can do this either
    by deleting the whole rainfall column and then putting a single line at the top of the file
    with [rain = 0]. This is how you set a constant in the met file.

    Make sure it is really turning off these processes by outputting the variables associated with each process to the output file.

    SoilWater Development
    -------------------------------------

    To start with just bring in the variables and test that you can input and output them.
    Just create a test simulation and run it for one day only, just to see if the inputting
    and outputting works. Dean says he would like you to commit this test simulation as well.

    After inputting the variables you then start adding in the processes into your new C#
    soilwater one at a time. Neil suggests that you do this in the following order,
    1. Saturated Flow
    2. Unsaturated Flow
    3. runoff
    4. es (soil evaporation)
    with 4 soil evaporation there is a whole bunch of cruft that you don't need to bother
    bringing into the new simulation because it is no longer used. You only need to bring
    in the Richie equation method for soil evaporation. All the other methods are no longer
    used and Niel Huth said that if he wants them he will add them back in himself.

    After you add each process you should do a commit. You should also commit the Tests that
    you used to test each process. These tests go in the Tests folder so that the build machine
    will do these tests as well. This way once you are finished the model with have a permanent
    test simulation for each of the individual processes in SoilWater. Also be doing it all the
    time if you leave the development of SoilWater and come back to it, if someone else makes
    changes to APSIM because the tests are in the test folder they will be able to see they broke
    SoilWater (even though it is only partially completed), and be able to fix it to be the same as how
    you left it, for when you come back.

    After you add each process you will need to test them against soilwat.

    So you create a whole bunch of test simulations (in the same .apsim file)
    where in each one you turn all the processes off except the one you want to look at.
    Attach a memo to each simulation explaining what process you are looking at in that
    simulation.

    In these test simulations once you add the 2nd and more processes you will also have
    to start turning the processes off in soilwater as well as in soilwat. You do this by
    the same method as in soilwat. Just setting the parameters to zero.
  memo Simulation Ideas
    The following are some ideas of the types of simulations that you need to create to
    test each process,
    (you may want to create a uniform soil with uniform thicknesses)

    1. Saturated Flow, make the starting sw in each layer uniform by setting them to SAT (sw = sat)
    and then drain the soil for 30 days. Because saturated flow occurs between SAT->DUL you should
    be able to watch and see the water drain from SAT to DUL in each layer over the 30 days and
    watch it drain out the bottom. You should make all the units mm and do a mass balance. A mass
    balance just means water in equals water out. So add up all the water in the soil that it starts
    with and then compare that to the amount that drains out the bottom. At 30 days in your simulation
    you can then have a rainfall event and then watch it drain again for another 30days.
    (use depth plots of sw to graph)
    Flux is the array variable that specifies saturated flow

    2. Unsaturated Flow, break this into 2 parts
    nb. in the following Wet means DUL and Dry means LL15. Wet is DUL not SAT because SAT to DUL is saturated flow.
    (i)  Wet layers over Dry layers (unsaturated drainage test)
    (ii) Dry layers over Wet layers (capillary rise test)
    To create the test simulation for (i) just use the GUI and specify the soil to be 50% and filled
    from the top. (make sure sw is not above DUL or below LL15).
    You won't be able to do this for (ii) where Dry over wet because there is no filled from the bottom in GUI.
    (use depth plots of sw to graph)

    nb. Instead of breaking it up into these 2 parts I just did alternating layers of wet and dry soil. Starting with wet soil.
    I combined the first and second layers because they are both just 15cm instead of 30cm like the other layers.

    Flow is the array variable that specifies unsaturated flow

    3. Runoff,
    You only need to look at runoff on a particular day because it only happens on the day the rain
    occured. So the clock for your simulation only has to run for a single day. BUT to save time just
    run the clock over more then one day and then just reset the water back to its starting sw after each
    day. Reseting the sw each day (you can do this just in manager logic in the simulation)
    nb. Neil says there should be a reset command in the fortran code for SoilWat. So you can use this
    command in the manage logic to just reset the soil profile back to the initial water that the simulation
    started with. (the way the reset command works I think is to just take the starting soil water from
    the sim file (the Params) and sets the variables in the model to that.

    Set up a simulation where you on day 1 you have a rainfall event and you look at the runoff then you reset
    the sw for the layers and then on day 2 you have an even larger rainfall event and you look at the runoff
    and then reset the layers and day 3 even larger etc.
    Then you copy this simulation several times and then just change the starting soil water to be various things from
    completely full, to being half full, to completely dry. So for each of these simulations you will see how much
    runoff occurs for various sized rainfall events.
    (use normal line graph of date on x axis and rain and runoff on y axis)

    Just out of interest:
    Ask neil about if irrigation is treated the same as rainfall because irrigation
    does not cause runoff (the model assumes the water just goes straght into the soil).

    Set starting soil to LL15 except for top layer which I set to SAT

    Set CnRed and CnCov both to 0 because we have no crop in the simulation so it is bare earth and there is no Cover so CnRed and CnCov are never used anyway. (CnRed was 20 and CnCov was 0.8)

    4. es,
    Since es in the model for the Richie equation is a square root of time, just have a thick top layer in your
    soil and make the entire profile full, and watch how the es drops off over time (ie serveral days). You don't
    need rain or irrigation because the top layer is starting off full, so it should start to evaporate straight
    away.

    Set the starting water to SAT not DUL
    The top layer sw_dep(1) will then dry down to air_dry_dep

    You don't need to bother about rain or irrigation, you just start the top layer as being full of water.

    es just works off the sw in the top layer of the soil. So you need to make it really thick.

    I ran it over a year instead of several days, to capture the difference in Evap due to the changeover from the summer date to winter date. To do this I also had to change the winter U and Cona so they were different to summer U and Cona.

    eos is the same as eo because there is no crop or surface residue in these simulations so no lighter interception and no surface residue interception,
    therefore since
    eos = eo x light interception from canopy x surface residue interception
    then
    eos = so
    (use normal line graphs of,
    radn on x axis and es on y axis,
    avg temp ((tmax + tmin)/2) on x axis and es on y axis)
  memo
    I started by just taking the Continuous Wheat Simulation from the "Examples" folder.

    Note there is some SoilWat tests under the "Tests" folder in a folder called "SoilWat Tests". They consist of some .con and .par files. I converted the .con files to sims.

    Read the module documentation for SoilWat.
  simulation Saturated Flow Only (OLD)
    metfile met
      filename=%apsim%\Tests\SoilWater\Process Event\Saturated Flow Only.met
    clock
      start_date = 01/01/1940  # Enter the start date of the simulation
      end_date = 02/03/1940  # Enter the end date of the simulation
    summaryfile
    area paddock
      Soil: LocalName=Waco; Site=Jimbour; Region=South East Queensland
        SoilType = Black Vertosol  # Soil description
        NearestTown = Jimbour, Q 4352
        NaturalVegetation = Grassland, mainly Qld bluegrass
        Sample Soil sample
          Thickness  NO3  NH4  SW
          150        0    0    0.59
          150        0    0    0.58
          300        0    0    0.59
          300        0    0    0.58
          300        0    0    0.57
          300        0    0    0.55
          300        0    0    0.55
          300        0    0    0.53
          300        0    0    0.52
          300        0    0    0.51
          300        0    0    0.49
          Date = 02/01/1940  # Sample date
        Water
          Thickness  BD    AirDry  LL15  DUL   SAT
          150        1.02  0.15    0.29  0.54  0.59
          150        1.03  0.26    0.29  0.53  0.58
          300        1.02  0.29    0.29  0.54  0.59
          300        1.02  0.29    0.29  0.54  0.58
          300        1.06  0.3     0.3   0.52  0.57
          300        1.11  0.31    0.31  0.5   0.55
          300        1.12  0.32    0.32  0.5   0.55
          300        1.15  0.33    0.33  0.48  0.53
          300        1.18  0.34    0.34  0.47  0.52
          300        1.2   0.35    0.35  0.46  0.51
          300        1.25  0.36    0.36  0.44  0.49
        SoilWater: Thickness=[150, 150, 300, 300, 300, 300, 300, 300, 300, 300, 300]; SWCON=[0.3, 0.3, 0.3, 0.3, 0.3, 0.3, 0.3, 0.3, 0.3, 0.3, 0.3]
          SummerCona = 0
          SummerU = 0
          SummerDate = 1-Nov
          WinterCona = 0
          WinterU = 0
          WinterDate = 1-Apr
          DiffusConst = 0
          DiffusSlope = 0
          Salb = 0.13
          CN2Bare = 1
          CNRed = 0
          CNCov = 0
        SoilOrganicMatter: RootCN=40; RootWt=200; SoilCN=12.5; EnrACoeff=7.4; EnrBCoeff=0.2
          Thickness  OC    FBiom  FInert
          150        1.04  0.025  0.4
          150        0.89  0.02   0.6
          300        0.89  0.015  0.8
          300        0.89  0.01   0.9
          300        0.77  0.01   0.95
          300        0.45  0.01   0.95
          300        0.27  0.01   0.95
          300        0.22  0.01   0.95
          300        0.16  0.01   0.95
          300        0.13  0.01   0.95
          300        0.12  0.01   0.95
        Analysis
          Thickness  EC    PH
          150        0.2   8.4
          150        0.25  8.8
          300        0.31  9
          300        0.4   9.2
          300        0.59  9.2
          300        0.84  9.1
          300        0.93  9
          300        1.01  9
          300        1.06  8.9
          300        1.05  8.9
          300        1.01  8.9
      outputfile: filename=Saturated Flow Only (OLD).out; title=Saturated Flow Only (OLD)
        variables
          variables: dlayer, sat_dep, dul_dep, ll15_dep, air_dry_dep, dd/mm/yyyy as Date, rain, sw_dep, flux, drain, runoff, es
        events Reporting Frequency: event=end_day
  simulation Saturated Flow Only (NEW) -> /simulations/Saturated Flow Only (OLD)
    PlugIns
      PlugIn=[%apsim%/UserInterface/ApsimUIPlugIn.xml, %apsim%/UserInterface/SoilTypes.xml, %apsim%/UserInterface/Graph.xml, %apsim%/UserInterface/Ausfarm.xml, %apsim%/UserInterface/DevelopersPlugIn.xml, %apsim%/Model/Accum.xml, %apsim%/Model/AgPasture.xml, %apsim%/Model/Bambatsi.xml, %apsim%/Model/Barley.xml, %apsim%/Model/Br.xml, %apsim%/Model/Bore.xml, %apsim%/Model/Broccoli.xml, %apsim%/Model/ButterflyPea.xml, %apsim%/Model/Canola.xml, %apsim%/Model/Canopy.xml, %apsim%/Model/Centro.xml, %apsim%/Model/Channel.xml, %apsim%/Model/Chickpea.xml, %apsim%/Model/Solute.xml, %apsim%/Model/Climatechange.xml, %apsim%/Model/Clock.xml, %apsim%/Model/Cowpea.xml, %apsim%/Model/CropUI.xml, %apsim%/Model/Dam.xml, %apsim%/Model/DCD.xml, %apsim%/Model/EGrandis.xml, %apsim%/Model/EMelliodora.xml, %apsim%/Model/Eo.xml, %apsim%/Model/EPopulnea.xml, %apsim%/Model/Erosion.xml, %apsim%/Model/Events.xml, %apsim%/Model/Fababean.xml, %apsim%/Model/Factorial.xml, %apsim%/Model/Factor.xml, %apsim%/Model/FactorComplex.xml, %apsim%/Model/FrenchBean.xml, %apsim%/Model/Fertiliser.xml, %apsim%/Model/Fieldpea.xml, %apsim%/Model/Gcm_data.xml, %apsim%/Model/Grasp.xml, %apsim%/Model/Graz.xml, %apsim%/Model/Growth.xml, %apsim%/Model/Horsegram.xml, %apsim%/Model/Ini.xml, %apsim%/Model/InitWater.xml, %apsim%/Model/Input.xml, %apsim%/Model/Irrigation.xml, %apsim%/Model/KWTest.xml, %apsim%/Model/Lablab.xml, %apsim%/Model/Lettuce.xml, %apsim%/Model/Log.xml, %apsim%/Model/Lucerne.xml, %apsim%/Model/Lupin.xml, %apsim%/Model/Maize.xml, %apsim%/Model/Manager.xml, %apsim%/Model/Map.xml, %apsim%/Model/Memo.xml, %apsim%/Model/MetFile.xml, %apsim%/Model/MicroMet.xml, %apsim%/Model/Millet.xml, %apsim%/Model/Millet1.xml, %apsim%/Model/Millet2.xml, %apsim%/Model/Millet3.xml, %apsim%/Model/Millet4.xml, %apsim%/Model/Millet5.xml, %apsim%/Model/Mucuna.xml, %apsim%/Model/Mungbean.xml, %apsim%/Model/Navybean.xml, %apsim%/Model/Oats.xml, %apsim%/Model/Ocean_data.xml, %apsim%/Model/Operations.xml, %apsim%/Model/Orobanche.xml, %apsim%/Model/Oryza.xml, %apsim%/Model/OutputFile.xml, %apsim%/Model/Ozcot.xml, %apsim%/Model/Patchinput.xml, %apsim%/Model/Peanut.xml, %apsim%/Model/Pigeonpea.xml, %apsim%/Model/Pond.xml, %apsim%/Model/Potato.xml, %apsim%/Model/RotPlot.xml, %apsim%/Model/RugPlotUI.xml, %apsim%/Model/Root.xml, %apsim%/Model/Rule.xml, %apsim%/Model/Seedling.xml, %apsim%/Model/SiloInput.xml, %apsim%/Model/Slurp.xml, %apsim%/Model/Soi.xml, %apsim%/Model/Soil.xml, %apsim%/Model/SoilNui.xml, %apsim%/Model/SoilTemp.xml, %apsim%/Model/Sorghum.xml, %apsim%/Model/SorghumConstants.xml, %apsim%/Model/SorghumGenotype.xml, %apsim%/Model/Soybean.xml, %apsim%/Model/Stylo.xml, %apsim%/Model/Sugar.xml, %apsim%/Model/Summaryfile.xml, %apsim%/Model/Sunflower.xml, %apsim%/Model/SurfaceOM.xml, %apsim%/Model/SweetCorn.xml, %apsim%/Model/SweetSorghum.xml, %apsim%/Model/SWIM2.xml, %apsim%/Model/SWIM2ui.xml, %apsim%/Model/Sysbal.xml, %apsim%/Model/Tcllink.xml, %apsim%/Model/Tclmanager.xml, %apsim%/Model/Tclui.xml, %apsim%/Model/Tracker.xml, %apsim%/Model/Tree.xml, %apsim%/Model/Variables.xml, %apsim%/Model/Venlink.xml, %apsim%/Model/vine.xml, %apsim%/Model/WaterSupply.xml, %apsim%/Model/Weed.xml, %apsim%/Model/Wheat.xml, %apsim%/Model/YPCalc.xml, %apsim%\Model\Soil with new water model.xml]
    summaryfile
    area paddock -> /simulations/Saturated Flow Only (OLD)/paddock
      outputfile: filename=Saturated Flow Only (NEW).out; title=Saturated Flow Only (NEW)
        variables -> /simulations/Saturated Flow Only (OLD)/paddock/outputfile/Variables
        events Reporting Frequency -> /simulations/Saturated Flow Only (OLD)/paddock/outputfile/Reporting Frequency
  simulation Unsaturated Flow Only (OLD)
    metfile met
      filename=%apsim%\Tests\SoilWater\Process Event\Unsaturated Flow Only.met
    clock
      start_date = 01/01/1940  # Enter the start date of the simulation
      end_date = 31/12/1950  # Enter the end date of the simulation
    summaryfile
    area paddock
      Soil: LocalName=Waco; Site=Jimbour; Region=South East Queensland
        SoilType = Black Vertosol  # Soil description
        NearestTown = Jimbour, Q 4352
        NaturalVegetation = Grassland, mainly Qld bluegrass
        Sample Soil sample
          Thickness  NO3  NH4  SW
          150        0    0    0.54
          150        0    0    0.53
          300        0    0    0.29
          300        0    0    0.54
          300        0    0    0.3
          300        0    0    0.5
          300        0    0    0.32
          300        0    0    0.48
          300        0    0    0.34
          300        0    0    0.46
          300        0    0    0.36
          Date = 02/01/1940  # Sample date
        Water: same as Saturated Flow Only (OLD).paddock.Soil.Water
        SoilWater: Thickness=[150, 150, 300, 300, 300, 300, 300, 300, 300, 300, 300]; SWCON=[0, 0, 0, 0, 0, 0, 0, 0, 0, 0, 0]
          SummerCona = 0
          SummerU = 0
          SummerDate = 1-Nov
          WinterCona = 0
          WinterU = 0
          WinterDate = 1-Apr
          DiffusConst = 40
          DiffusSlope = 16
          Salb = 0.13
          CN2Bare = 1
          CNRed = 0
          CNCov = 0
        SoilOrganicMatter: same as Saturated Flow Only (OLD).paddock.Soil.SoilOrganicMatter
        Analysis
          Thickness  EC    PH
          150        0.2   8.4
          150        0.25  8.8
          300        0.31  9
          300        0.4   9.2
          300        0.59  9.2
          300        0.84  9.1
          300        0.93  9
          300        1.01  9
          300        1.06  8.9
          300        1.05  8.9
          300        1.01  8.9
      outputfile: filename=Unsaturated Flow Only (OLD).out; title=Unsaturated Flow Only (OLD)
        variables
          variables: dlayer, sat_dep, dul_dep, ll15_dep, air_dry_dep, dd/mm/yyyy as Date, rain, sw_dep, flow, drain, runoff, es
        events Reporting Frequency: event=end_day
  simulation Unsaturated Flow Only (NEW) -> /simulations/Unsaturated Flow Only (OLD)
    PlugIns: same as Saturated Flow Only (NEW).PlugIns
    summaryfile
    area paddock -> /simulations/Unsaturated Flow Only (OLD)/paddock
      outputfile: filename=Unsaturated Flow Only (NEW).out; title=Unsaturated Flow Only (NEW)
        variables -> /simulations/Unsaturated Flow Only (OLD)/paddock/outputfile/Variables
        events Reporting Frequency -> /simulations/Unsaturated Flow Only (OLD)/paddock/outputfile/Reporting Frequency
  simulation Runoff Only (OLD)
    metfile met: filename=%apsim%\Tests\SoilWater\Process Event\Runoff Only.met
    clock
      start_date = 01/01/1940  # Enter the start date of the simulation
      end_date = 31/12/1950  # Enter the end date of the simulation
    summaryfile
    area paddock
      Soil: SoilType=Black Vertosol; LocalName=Waco; Site=Jimbour; NearestTown=Jimbour, Q 4352; Region=South East Queensland; NaturalVegetation=Grassland, mainly Qld bluegrass; Latitude=0; Longitude=0
        Sample Soil sample
          Thickness  NO3  NH4  SW
          150        0    0    0.59
          150        0    0    0.58
          300        0    0    0.29
          300        0    0    0.29
          300        0    0    0.3
          300        0    0    0.31
          300        0    0    0.32
          300        0    0    0.33
          300        0    0    0.34
          300        0    0    0.35
          300        0    0    0.36
          Date = 02/01/1940  # Sample date
        Water: same as Saturated Flow Only (OLD).paddock.Soil.Water
        SoilWater: Thickness=[150, 150, 300, 300, 300, 300, 300, 300, 300, 300, 300]; SWCON=[0, 0, 0, 0, 0, 0, 0, 0, 0, 0, 0]
          SummerCona = 0
          SummerU = 0
          SummerDate = 1-Nov
          WinterCona = 0
          WinterU = 0
          WinterDate = 1-Apr
          DiffusConst = 0
          DiffusSlope = 0
          Salb = 0.13
          CN2Bare = 73
          CNRed = 0
          CNCov = 0
        SoilOrganicMatter: same as Saturated Flow Only (OLD).paddock.Soil.SoilOrganicMatter
        Analysis
          Thickness  EC    PH
          150        0.2   8.4
          150        0.25  8.8
          300        0.31  9
          300        0.4   9.2
          300        0.59  9.2
          300        0.84  9.1
          300        0.93  9
          300        1.01  9
          300        1.06  8.9
          300        1.05  8.9
          300        1.01  8.9
      outputfile: filename=Runoff Only (OLD).out; title=Runoff Only (OLD)
        variables
          variables: dd/mm/yyyy as Date, rain, runoff, dlayer, sat_dep, dul_dep, ll15_dep, air_dry_dep, sw_dep, flux, flow, drain, es
        events Reporting Frequency: event=end_day
  simulation Runoff Only (NEW) -> /simulations/Runoff Only (OLD)
    PlugIns: same as Saturated Flow Only (NEW).PlugIns
    summaryfile
    area paddock -> /simulations/Runoff Only (OLD)/paddock
      outputfile: filename=Runoff Only (NEW).out; title=Runoff Only (NEW)
        variables -> /simulations/Runoff Only (OLD)/paddock/outputfile/Variables
        events Reporting Frequency -> /simulations/Runoff Only (OLD)/paddock/outputfile/Reporting Frequency
  simulation Soil Evaporation Only (OLD)
    metfile met
      filename=%apsim%\Tests\SoilWater\Process Event\Soil Evaporation Only.met
    clock
      start_date = 01/01/1940  # Enter the start date of the simulation
      end_date = 01/01/1941  # Enter the end date of the simulation
    summaryfile
    area paddock
      manager AvgTempCalculation
        on start_of_day:
```
avgTemp = (maxt + mint)/2
```
      Soil: LocalName=Waco; Site=Jimbour; Region=South East Queensland
        SoilType = Black Vertosol  # Soil description
        NearestTown = Jimbour, Q 4352
        NaturalVegetation = Grassland, mainly Qld bluegrass
        Sample Soil sample
          Thickness  NO3  NH4  SW
          150        0    0    0.59
          150        0    0    0.58
          300        0    0    0.59
          300        0    0    0.58
          300        0    0    0.57
          300        0    0    0.55
          300        0    0    0.55
          300        0    0    0.53
          300        0    0    0.52
          300        0    0    0.51
          300        0    0    0.49
          Date = 02/01/1940  # Sample date
        Water: same as Saturated Flow Only (OLD).paddock.Soil.Water
        SoilWater: Thickness=[150, 150, 300, 300, 300, 300, 300, 300, 300, 300, 300]; SWCON=[0, 0, 0, 0, 0, 0, 0, 0, 0, 0, 0]
          SummerCona = 3.5
          SummerU = 6
          SummerDate = 1-Nov
          WinterCona = 2.5
          WinterU = 5
          WinterDate = 1-Apr
          DiffusConst = 0
          DiffusSlope = 0
          Salb = 0.13
          CN2Bare = 1
          CNRed = 0
          CNCov = 0
        SoilOrganicMatter: same as Saturated Flow Only (OLD).paddock.Soil.SoilOrganicMatter
        Analysis
          Thickness  EC    PH
          150        0.2   8.4
          150        0.25  8.8
          300        0.31  9
          300        0.4   9.2
          300        0.59  9.2
          300        0.84  9.1
          300        0.93  9
          300        1.01  9
          300        1.06  8.9
          300        1.05  8.9
          300        1.01  8.9
      outputfile: filename=Soil Evaporation Only (OLD).out; title=Soil Evaporation Only (OLD)
        variables
          variables: dlayer, sat_dep, dul_dep, sw_dep, ll15_dep, air_dry_dep, flux, drain, runoff, rain, day, today, dd/mm/yyyy as Date, u, cona, t, es, eo, eos, sw_dep(1), radn, avgTemp
        events Reporting Frequency: event=end_day
  simulation Soil Evaporation Only (NEW) -> /simulations/Soil Evaporation Only (OLD)
    PlugIns: same as Saturated Flow Only (NEW).PlugIns
    summaryfile
    area paddock -> /simulations/Soil Evaporation Only (OLD)/paddock
      outputfile: filename=Soil Evaporation Only (NEW).out; title=Soil Evaporation Only (NEW)
        variables -> /simulations/Soil Evaporation Only (OLD)/paddock/outputfile/Variables
        events Reporting Frequency -> /simulations/Soil Evaporation Only (OLD)/paddock/outputfile/Reporting Frequency
  memo Ponding Only
    Ponding occurs when water backs up in the top layer because it can not drain fast enough (via Saturated Flow).
    So you need to set either MWCON or KS in the top layers to restrict flow through it and you want to tell it what the pond size is MaxPond.

    Use MWCON in one simulation and use KS in the other. They both handle the situation of what to do when the soil water goes above saturation.
    Doing two simulations will test their respective code to make sure they are working correctly.
    MWCON either moves all of it or none of it into the layer below depending up whether it is set to 0 or 1.
    KS you specify millimeters per day that move out of the layer into the layer below when it rises above saturation.

    You could test MWCON and KS in WaterTable Calculation test as well, but it is a bit hard to see what is going on, because you would have to enable saturated flow etc. as well. It's not as easy to see if it is working as this ponding example is. Whether water is moving because of KS or MWCON instead of the saturated flows etc.

    Set starting water to 0, so you have an empty profile so you can see it fill.

    Added 30mm of rain every four days to see the pond fill, then added a few 300mm rainfall events so that the pond went above max_pond and the water became runoff.

    In SoilWat sub component set MaxPond to 300mm

    Set MWCON to 0 in the top layer and 1 for all the other layers. This will create an impermeable layer in the top layer to cause ponding.
    Or Set KS to 1mm per day in top layer and 24mm per day in all the other layers to create the impermeable layer in the top layer to cause ponding.

    Turn all the other processes off (evap, unsaturated flow)
    Make sure you also set SWCON to 0 so that there is no flow as a result of Saturated flow (DUL to Sat). We only want to test the "Above Saturation" MWCON code.
    I even turned runoff off but you still should get runoff because once you go above max_pond it should become runoff. Turning runoff off will prove that it is this ponding runoff code working and not the actual runoff code working to provide the runoff from rainfall in this simulation.

    "pond" is the ouput variable for ponding, but sw of the top layer is also of interest.
    "pond_evap" is the evaporation of the pond which is also off interest.

    create a variable in a manager called total_pond where total_pond = pond + pond_evap.
    total_pond should equal max_pond when the pond is full.

    Flux is the variable for saturated flow and Flow for Unsaturated flow  are also of interest to make sure they are turned off
  simulation Ponding Only using MWCON (OLD)
    metfile met: filename=%apsim%\Tests\SoilWater\Process Event\Ponding Only.met
    clock
      start_date = 01/01/1940  # Enter the start date of the simulation
      end_date = 02/03/1940  # Enter the end date of the simulation
    summaryfile
    area paddock
      Soil: LocalName=Waco; Site=Jimbour; Region=South East Queensland
        SoilType = Black Vertosol  # Soil description
        NearestTown = Jimbour, Q 4352
        NaturalVegetation = Grassland, mainly Qld bluegrass
        Sample Soil sample
          Thickness  NO3  NH4  SW
          150        0    0    0
          150        0    0    0
          300        0    0    0
          300        0    0    0
          300        0    0    0
          300        0    0    0
          300        0    0    0
          300        0    0    0
          300        0    0    0
          300        0    0    0
          300        0    0    0
          Date = 02/01/1940  # Sample date
        Water: same as Saturated Flow Only (OLD).paddock.Soil.Water
        SoilWater
          Thickness  SWCON  MWCON
          150        0      0
          150        0      1
          300        0      1
          300        0      1
          300        0      1
          300        0      1
          300        0      1
          300        0      1
          300        0      1
          300        0      1
          300        0      1
          SummerCona = 0
          SummerU = 0
          SummerDate = 1-Nov
          WinterCona = 0
          WinterU = 0
          WinterDate = 1-Apr
          DiffusConst = 0
          DiffusSlope = 0
          Salb = 0.13
          CN2Bare = 1
          CNRed = 0
          CNCov = 0
          MaxPond = 300
        SoilOrganicMatter: same as Saturated Flow Only (OLD).paddock.Soil.SoilOrganicMatter
        Analysis
          Thickness  EC    PH
          150        0.2   8.4
          150        0.25  8.8
          300        0.31  9
          300        0.4   9.2
          300        0.59  9.2
          300        0.84  9.1
          300        0.93  9
          300        1.01  9
          300        1.06  8.9
          300        1.05  8.9
          300        1.01  8.9
      manager calculate total_pond
        on end_of_day:
```
total_pond = pond + pond_evap
```
      outputfile: filename=Ponding Only using MWCON (OLD).out; title=Ponding Only using MWCON (OLD)
        variables
          variables: dlayer, sat_dep, dul_dep, ll15_dep, air_dry_dep, dd/mm/yyyy as Date, rain, pond_evap, pond, total_pond, runoff, sw_dep(1-3) as sw_top, es, drain, flux, flow, sw_dep
        events Reporting Frequency: event=end_day
  simulation Ponding Only using MWCON (NEW) -> /simulations/Ponding Only using MWCON (OLD)
    PlugIns
      PlugIn=[%apsim%/UserInterface/ApsimUIPlugIn.xml, %apsim%/UserInterface/SoilTypes.xml, %apsim%/UserInterface/Graph.xml, %apsim%/UserInterface/Ausfarm.xml, %apsim%/UserInterface/DevelopersPlugIn.xml, %apsim%/Model/Accum.xml, %apsim%/Model/AgPasture.xml, %apsim%/Model/Bambatsi.xml, %apsim%/Model/Barley.xml, %apsim%/Model/Br.xml, %apsim%/Model/Bore.xml, %apsim%/Model/Broccoli.xml, %apsim%/Model/ButterflyPea.xml, %apsim%/Model/Canola.xml, %apsim%/Model/Canopy.xml, %apsim%/Model/Centro.xml, %apsim%/Model/Channel.xml, %apsim%/Model/Chickpea.xml, %apsim%/Model/Solute.xml, %apsim%/Model/Climatechange.xml, %apsim%/Model/Clock.xml, %apsim%/Model/Cowpea.xml, %apsim%/Model/CropUI.xml, %apsim%/Model/Dam.xml, %apsim%/Model/DCD.xml, %apsim%/Model/EGrandis.xml, %apsim%/Model/EMelliodora.xml, %apsim%/Model/Eo.xml, %apsim%/Model/EPopulnea.xml, %apsim%/Model/Erosion.xml, %apsim%/Model/Events.xml, %apsim%/Model/Fababean.xml, %apsim%/Model/Factorial.xml, %apsim%/Model/Factor.xml, %apsim%/Model/FactorComplex.xml, %apsim%/Model/FrenchBean.xml, %apsim%/Model/Fertiliser.xml, %apsim%/Model/Fieldpea.xml, %apsim%/Model/Gcm_data.xml, %apsim%/Model/Grasp.xml, %apsim%/Model/Graz.xml, %apsim%/Model/Growth.xml, %apsim%/Model/Horsegram.xml, %apsim%/Model/Ini.xml, %apsim%/Model/InitWater.xml, %apsim%/Model/Input.xml, %apsim%/Model/Irrigation.xml, %apsim%/Model/KWTest.xml, %apsim%/Model/Lablab.xml, %apsim%/Model/Lettuce.xml, %apsim%/Model/Log.xml, %apsim%/Model/Lucerne.xml, %apsim%/Model/Lupin.xml, %apsim%/Model/Maize.xml, %apsim%/Model/MaizeZ.xml, %apsim%/Model/Manager.xml, %apsim%/Model/Map.xml, %apsim%/Model/Memo.xml, %apsim%/Model/MetFile.xml, %apsim%/Model/MicroMet.xml, %apsim%/Model/Millet.xml, %apsim%/Model/Millet1.xml, %apsim%/Model/Millet2.xml, %apsim%/Model/Millet3.xml, %apsim%/Model/Millet4.xml, %apsim%/Model/Millet5.xml, %apsim%/Model/Mucuna.xml, %apsim%/Model/Mungbean.xml, %apsim%/Model/Navybean.xml, %apsim%/Model/Oats.xml, %apsim%/Model/Ocean_data.xml, %apsim%/Model/Operations.xml, %apsim%/Model/Orobanche.xml, %apsim%/Model/Oryza.xml, %apsim%/Model/OutputFile.xml, %apsim%/Model/Ozcot.xml, %apsim%/Model/Patchinput.xml, %apsim%/Model/Peanut.xml, %apsim%/Model/Pigeonpea.xml, %apsim%/Model/Pond.xml, %apsim%/Model/Potato.xml, %apsim%/Model/RotPlot.xml, %apsim%/Model/RugPlotUI.xml, %apsim%/Model/Root.xml, %apsim%/Model/Rule.xml, %apsim%/Model/Seedling.xml, %apsim%/Model/SiloInput.xml, %apsim%/Model/Slurp.xml, %apsim%/Model/Soi.xml, %apsim%/Model/Soil.xml, %apsim%/Model/SoilNui.xml, %apsim%/Model/SoilTemp.xml, %apsim%/Model/Sorghum.xml, %apsim%/Model/SorghumConstants.xml, %apsim%/Model/SorghumGenotype.xml, %apsim%/Model/Soybean.xml, %apsim%/Model/Stylo.xml, %apsim%/Model/Sugar.xml, %apsim%/Model/Summaryfile.xml, %apsim%/Model/Sunflower.xml, %apsim%/Model/SurfaceOM.xml, %apsim%/Model/SweetCorn.xml, %apsim%/Model/SweetSorghum.xml, %apsim%/Model/SWIM2.xml, %apsim%/Model/SWIM2ui.xml, %apsim%/Model/Sysbal.xml, %apsim%/Model/Tcllink.xml, %apsim%/Model/Tclmanager.xml, %apsim%/Model/Tclui.xml, %apsim%/Model/Tracker.xml, %apsim%/Model/Tree.xml, %apsim%/Model/Variables.xml, %apsim%/Model/Venlink.xml, %apsim%/Model/vine.xml, %apsim%/Model/WaterSupply.xml, %apsim%/Model/Weed.xml, %apsim%/Model/Wheat.xml, %apsim%/Model/YPCalc.xml, %apsim%\Model\Soil with new water model.xml]
    summaryfile
    area paddock -> /simulations/Ponding Only using MWCON (OLD)/paddock
      outputfile: filename=Ponding Only using MWCON (NEW).out; title=Ponding Only using MWCON (NEW)
        variables -> /simulations/Ponding Only using MWCON (OLD)/paddock/outputfile/Variables
        events Reporting Frequency -> /simulations/Ponding Only using MWCON (OLD)/paddock/outputfile/Reporting Frequency
  simulation Ponding Only using KS (OLD)
    metfile met: filename=%apsim%\Tests\SoilWater\Process Event\Ponding Only.met
    clock
      start_date = 01/01/1940  # Enter the start date of the simulation
      end_date = 02/03/1940  # Enter the end date of the simulation
    summaryfile
    area paddock
      Soil: LocalName=Waco; Site=Jimbour; Region=South East Queensland
        SoilType = Black Vertosol  # Soil description
        NearestTown = Jimbour, Q 4352
        NaturalVegetation = Grassland, mainly Qld bluegrass
        Sample Soil sample
          Thickness  NO3  NH4  SW
          150        0    0    0
          150        0    0    0
          300        0    0    0
          300        0    0    0
          300        0    0    0
          300        0    0    0
          300        0    0    0
          300        0    0    0
          300        0    0    0
          300        0    0    0
          300        0    0    0
          Date = 02/01/1940  # Sample date
        Water
          Thickness  KS  BD    AirDry  LL15  DUL   SAT
          150        1   1.02  0.15    0.29  0.54  0.59
          150        24  1.03  0.26    0.29  0.53  0.58
          300        24  1.02  0.29    0.29  0.54  0.59
          300        24  1.02  0.29    0.29  0.54  0.58
          300        24  1.06  0.3     0.3   0.52  0.57
          300        24  1.11  0.31    0.31  0.5   0.55
          300        24  1.12  0.32    0.32  0.5   0.55
          300        24  1.15  0.33    0.33  0.48  0.53
          300        24  1.18  0.34    0.34  0.47  0.52
          300        24  1.2   0.35    0.35  0.46  0.51
          300        24  1.25  0.36    0.36  0.44  0.49
        SoilWater: Thickness=[150, 150, 300, 300, 300, 300, 300, 300, 300, 300, 300]; SWCON=[0, 0, 0, 0, 0, 0, 0, 0, 0, 0, 0]
          SummerCona = 0
          SummerU = 0
          SummerDate = 1-Nov
          WinterCona = 0
          WinterU = 0
          WinterDate = 1-Apr
          DiffusConst = 0
          DiffusSlope = 0
          Salb = 0.13
          CN2Bare = 1
          CNRed = 0
          CNCov = 0
          MaxPond = 300
        SoilOrganicMatter: same as Saturated Flow Only (OLD).paddock.Soil.SoilOrganicMatter
        Analysis
          Thickness  EC    PH
          150        0.2   8.4
          150        0.25  8.8
          300        0.31  9
          300        0.4   9.2
          300        0.59  9.2
          300        0.84  9.1
          300        0.93  9
          300        1.01  9
          300        1.06  8.9
          300        1.05  8.9
          300        1.01  8.9
      manager calculate total_pond
        on end_of_day:
```
total_pond = pond + pond_evap
```
      outputfile: filename=Ponding Only using KS (OLD).out; title=Ponding Only using KS (OLD)
        variables
          variables: dlayer, sat_dep, dul_dep, ll15_dep, air_dry_dep, dd/mm/yyyy as Date, rain, pond_evap, pond, total_pond, runoff, sw_dep(1-3) as sw_top, es, drain, flux, flow, sw_dep
        events Reporting Frequency: event=end_day
  simulation Ponding Only using KS (NEW) -> /simulations/Ponding Only using KS (OLD)
    PlugIns
      PlugIn=[%apsim%\UserInterface\ApsimUIPlugIn.xml, %apsim%\UserInterface\SoilTypes.xml, %apsim%\UserInterface\Graph.xml, %apsim%\UserInterface\Ausfarm.xml, %apsim%\UserInterface\DevelopersPlugIn.xml, %apsim%\Model\Accum.xml, %apsim%\Model\AgPasture.xml, %apsim%\Model\Bambatsi.xml, %apsim%\Model\Barley.xml, %apsim%\Model\Br.xml, %apsim%\Model\Bore.xml, %apsim%\Model\Broccoli.xml, %apsim%\Model\ButterflyPea.xml, %apsim%\Model\Canola.xml, %apsim%\Model\Canopy.xml, %apsim%\Model\Centro.xml, %apsim%\Model\Channel.xml, %apsim%\Model\Chickpea.xml, %apsim%\Model\Solute.xml, %apsim%\Model\Climatechange.xml, %apsim%\Model\Clock.xml, %apsim%\Model\Cowpea.xml, %apsim%\Model\CropUI.xml, %apsim%\Model\Dam.xml, %apsim%\Model\DCD.xml, %apsim%\Model\EGrandis.xml, %apsim%\Model\EMelliodora.xml, %apsim%\Model\Eo.xml, %apsim%\Model\EPopulnea.xml, %apsim%\Model\Erosion.xml, %apsim%\Model\Events.xml, %apsim%\Model\Fababean.xml, %apsim%\Model\Factorial.xml, %apsim%\Model\Factor.xml, %apsim%\Model\FactorComplex.xml, %apsim%\Model\FrenchBean.xml, %apsim%\Model\Fertiliser.xml, %apsim%\Model\Fieldpea.xml, %apsim%\Model\Gcm_data.xml, %apsim%\Model\Grasp.xml, %apsim%\Model\Graz.xml, %apsim%\Model\Growth.xml, %apsim%\Model\Horsegram.xml, %apsim%\Model\Ini.xml, %apsim%\Model\InitWater.xml, %apsim%\Model\Input.xml, %apsim%\Model\Irrigation.xml, %apsim%\Model\KWTest.xml, %apsim%\Model\Lablab.xml, %apsim%\Model\Lettuce.xml, %apsim%\Model\Log.xml, %apsim%\Model\Lucerne.xml, %apsim%\Model\Lupin.xml, %apsim%\Model\Maize.xml, %apsim%\Model\MaizeZ.xml, %apsim%\Model\Manager.xml, %apsim%\Model\Map.xml, %apsim%\Model\Memo.xml, %apsim%\Model\MetFile.xml, %apsim%\Model\MicroMet.xml, %apsim%\Model\Millet.xml, %apsim%\Model\Millet1.xml, %apsim%\Model\Millet2.xml, %apsim%\Model\Millet3.xml, %apsim%\Model\Millet4.xml, %apsim%\Model\Millet5.xml, %apsim%\Model\Mucuna.xml, %apsim%\Model\Mungbean.xml, %apsim%\Model\Navybean.xml, %apsim%\Model\Oats.xml, %apsim%\Model\Ocean_data.xml, %apsim%\Model\Operations.xml, %apsim%\Model\Orobanche.xml, %apsim%\Model\Oryza.xml, %apsim%\Model\OutputFile.xml, %apsim%\Model\Ozcot.xml, %apsim%\Model\Patchinput.xml, %apsim%\Model\Peanut.xml, %apsim%\Model\Pigeonpea.xml, %apsim%\Model\Pond.xml, %apsim%\Model\Potato.xml, %apsim%\Model\RotPlot.xml, %apsim%\Model\RugPlotUI.xml, %apsim%\Model\Root.xml, %apsim%\Model\Rule.xml, %apsim%\Model\Seedling.xml, %apsim%\Model\SiloInput.xml, %apsim%\Model\Slurp.xml, %apsim%\Model\Soi.xml, %apsim%\Model\Soil.xml, %apsim%\Model\SoilNui.xml, %apsim%\Model\SoilTemp.xml, %apsim%\Model\Sorghum.xml, %apsim%\Model\SorghumConstants.xml, %apsim%\Model\SorghumGenotype.xml, %apsim%\Model\Soybean.xml, %apsim%\Model\Stylo.xml, %apsim%\Model\Sugar.xml, %apsim%\Model\Summaryfile.xml, %apsim%\Model\Sunflower.xml, %apsim%\Model\SurfaceOM.xml, %apsim%\Model\SweetCorn.xml, %apsim%\Model\SweetSorghum.xml, %apsim%\Model\SWIM2.xml, %apsim%\Model\SWIM2ui.xml, %apsim%\Model\Sysbal.xml, %apsim%\Model\Tcllink.xml, %apsim%\Model\Tclmanager.xml, %apsim%\Model\Tclui.xml, %apsim%\Model\Tracker.xml, %apsim%\Model\Tree.xml, %apsim%\Model\Variables.xml, %apsim%\Model\Venlink.xml, %apsim%\Model\vine.xml, %apsim%\Model\WaterSupply.xml, %apsim%\Model\Weed.xml, %apsim%\Model\Wheat.xml, %apsim%\Model\YPCalc.xml, %apsim%\Model\Soil with new water model.xml]
    summaryfile
    area paddock -> /simulations/Ponding Only using KS (OLD)/paddock
      outputfile: filename=Ponding Only using KS (NEW).out; title=Ponding Only using KS (NEW)
        variables -> /simulations/Ponding Only using KS (OLD)/paddock/outputfile/Variables
        events Reporting Frequency -> /simulations/Ponding Only using KS (OLD)/paddock/outputfile/Reporting Frequency
  memo Ponding with Soil Evap
    I have copied the

    Ponding Only using MWCON

    simulations (OLD and NEW)

    and added in Soil Evaporation (SummerU=6 and SummerCona=3.5, WinterU=5 and WinterCona=2.5) (copied these values form "Soil Evaporation Only" simulations).

    The reason for doing this is to see what happens when a pond drys out.
    We need to make sure that the Evaporation switches over nicely between

    pond_evap
    and
    es

    so for example lets say that EOS for today is 80mm but the pond depth is only 50mm (pond=50mm)
    in this situation you need to have pond_evap = 50mm (pond_evap is normally set to eos for that day because water from a pond surface evaporates at the maximum potential evaporation)
    so that the entire pond disappears, then the remaining EOS of 30mm is sent to the normal ritchie soil evaporation to work out what the "actual" soil evaporation (es) is from the 30mm potential.
    The total evaporation es is then 50mm + es from 30mm of EOS using Ritchie.
  simulation Ponding with Soil Evap (OLD)
    metfile met: filename=%apsim%\Tests\SoilWater\Process Event\Ponding Only.met
    clock
      start_date = 01/01/1940  # Enter the start date of the simulation
      end_date = 02/03/1940  # Enter the end date of the simulation
    summaryfile
    area paddock
      Soil: LocalName=Waco; Site=Jimbour; Region=South East Queensland
        SoilType = Black Vertosol  # Soil description
        NearestTown = Jimbour, Q 4352
        NaturalVegetation = Grassland, mainly Qld bluegrass
        Sample Soil sample
          Thickness  NO3  NH4  SW
          150        0    0    0
          150        0    0    0
          300        0    0    0
          300        0    0    0
          300        0    0    0
          300        0    0    0
          300        0    0    0
          300        0    0    0
          300        0    0    0
          300        0    0    0
          300        0    0    0
          Date = 02/01/1940  # Sample date
        Water: same as Saturated Flow Only (OLD).paddock.Soil.Water
        SoilWater
          Thickness  SWCON  MWCON
          150        0      0
          150        0      1
          300        0      1
          300        0      1
          300        0      1
          300        0      1
          300        0      1
          300        0      1
          300        0      1
          300        0      1
          300        0      1
          SummerCona = 3.5
          SummerU = 6
          SummerDate = 1-Nov
          WinterCona = 2.5
          WinterU = 5
          WinterDate = 1-Apr
          DiffusConst = 0
          DiffusSlope = 0
          Salb = 0.13
          CN2Bare = 1
          CNRed = 0
          CNCov = 0
          MaxPond = 300
        SoilOrganicMatter: same as Saturated Flow Only (OLD).paddock.Soil.SoilOrganicMatter
        Analysis
          Thickness  EC    PH
          150        0.2   8.4
          150        0.25  8.8
          300        0.31  9
          300        0.4   9.2
          300        0.59  9.2
          300        0.84  9.1
          300        0.93  9
          300        1.01  9
          300        1.06  8.9
          300        1.05  8.9
          300        1.01  8.9
      manager calculate total_pond
        on end_of_day:
```
total_pond = pond + pond_evap
```
      outputfile: filename=Ponding with Soil Evap (OLD).out; title=Ponding with Soil Evap (OLD)
        variables
          variables: dlayer, sat_dep, dul_dep, ll15_dep, air_dry_dep, dd/mm/yyyy as Date, rain, eos, es, pond_evap, pond, total_pond, runoff, sw_dep(1-3) as sw_top, drain, flux, flow, sw_dep
        events Reporting Frequency: event=end_day
  simulation Ponding with Soil Evap (NEW) -> /simulations/Ponding with Soil Evap (OLD)
    PlugIns: same as Ponding Only using KS (NEW).PlugIns
    area paddock -> /simulations/Ponding with Soil Evap (OLD)/paddock
      outputfile -> /simulations/Ponding with Soil Evap (OLD)/paddock/outputfile: filename=Ponding with Soil Evap (NEW).out; title=Ponding with Soil Evap (NEW)
        variables -> /simulations/Ponding with Soil Evap (OLD)/paddock/outputfile/Variables
        events Reporting Frequency -> /simulations/Ponding with Soil Evap (OLD)/paddock/outputfile/Reporting Frequency
  memo WaterTable Calculation
    (Don't use MWCON because will use that for the Ponding test. MWCON is more suited for use in ponding,
    Use KS it is more suited WaterTables [need to consider more layers in water tables than in ponding, so finer control is better])

    Set SAT and DUL to 0.8 and 0.5 respectively.

    Set starting water to just below SAT  in the top layers and to just above DUL in the bottom layers.
    Then set SWCON to slightly be sligthly faster in each layer down the profile. This will stop water backing up as it drains down the profile because the water is leaving the lower below slightly faster then it is coming in from the
    layer above.

    I set the very top layers to 0 because they are only 150mm deep and they make things harder to understand.

    Set KS to 0mm/day in the bottom layer and 8mm/day for all the other layers. This will create an impermeable layer in the bottom layer to cause a water table.

    Turn all the other processes off (runoff, evap, unsaturated flow)

    The idea is that water in the top layers will flow down until they hit the impermeable layer and then will gradually form a water table. You should be able to see the water table grow larger as the water drains into it.
    No water is added to the system it is all based on the starting water flowing down from the top and none of the layers ever getting above saturation until they hit the bottom and beging backing up.

    The output variable is called "water_table" . The whole pont of this is we want to show that the code calculating this water_table value is working correctly.
    It is the depth (as measured from the ground surface) of the first saturated layer of the soil. So as the water table goes up and down this value will change.
  simulation WaterTable Calculation (OLD)
    metfile met: filename=%apsim%\Tests\SoilWater\Process Event\WaterTable Only.met
    clock
      start_date = 01/01/1940  # Enter the start date of the simulation
      end_date = 02/03/1940  # Enter the end date of the simulation
    summaryfile
    area paddock
      Soil: LocalName=Waco; Site=Jimbour; Region=South East Queensland
        SoilType = Black Vertosol  # Soil description
        NearestTown = Jimbour, Q 4352
        NaturalVegetation = Grassland, mainly Qld bluegrass
        Sample Soil sample
          Thickness  NO3  NH4  SW
          150        0    0    0
          150        0    0    0
          300        0    0    0.79
          300        0    0    0.79
          300        0    0    0.79
          300        0    0    0.79
          300        0    0    0.6
          300        0    0    0.6
          300        0    0    0.6
          300        0    0    0.6
          300        0    0    0.6
          Date = 02/01/1940  # Sample date
        Water
          Thickness  KS  BD    AirDry  LL15  DUL  SAT
          150        8   1.02  0.15    0.29  0.5  0.8
          150        8   1.03  0.26    0.29  0.5  0.8
          300        8   1.02  0.29    0.29  0.5  0.8
          300        8   1.02  0.29    0.29  0.5  0.8
          300        8   1.06  0.3     0.3   0.5  0.8
          300        8   1.11  0.31    0.31  0.5  0.8
          300        8   1.12  0.32    0.32  0.5  0.8
          300        8   1.15  0.33    0.33  0.5  0.8
          300        8   1.18  0.34    0.34  0.5  0.8
          300        8   1.2   0.35    0.35  0.5  0.8
          300        0   1.25  0.36    0.36  0.5  0.8
        SoilWater: Thickness=[150, 150, 300, 300, 300, 300, 300, 300, 300, 300, 300]
          SWCON=[0, 0, 0.102, 0.103, 0.104, 0.105, 0.106, 0.107, 0.108, 0.109, 0]
          SummerCona = 0
          SummerU = 0
          SummerDate = 1-Nov
          WinterCona = 0
          WinterU = 0
          WinterDate = 1-Apr
          DiffusConst = 0
          DiffusSlope = 0
          Salb = 0.13
          CN2Bare = 1
          CNRed = 0
          CNCov = 0
        SoilOrganicMatter
          Thickness  OC  FBiom  FInert
          150        0   0.025  0.4
          150        0   0.02   0.6
          300        0   0.015  0.8
          300        0   0.01   0.9
          300        0   0.01   0.95
          300        0   0.01   0.95
          300        0   0.01   0.95
          300        0   0.01   0.95
          300        0   0.01   0.95
          300        0   0.01   0.95
          300        0   0.01   0.95
          RootCN = 40
          RootWt = 0
          SoilCN = 12.5
          EnrACoeff = 7.4
          EnrBCoeff = 0.2
        Analysis
          Thickness  EC    PH
          150        0.2   8.4
          150        0.25  8.8
          300        0.31  9
          300        0.4   9.2
          300        0.59  9.2
          300        0.84  9.1
          300        0.93  9
          300        1.01  9
          300        1.06  8.9
          300        1.05  8.9
          300        1.01  8.9
      outputfile: filename=WaterTable Calculation (OLD).out; title=WaterTable Calculation (OLD)
        variables
          variables: dlayer, sat_dep, dul_dep, ll15_dep, air_dry_dep, dd/mm/yyyy as Date, today, rain, runoff, drain, water_table, sw_dep, es, flux, flow
        events Reporting Frequency: event=end_day
  simulation WaterTable Calculation (NEW) -> /simulations/WaterTable Calculation (OLD)
    PlugIns: same as Ponding Only using MWCON (NEW).PlugIns
    summaryfile
    area paddock -> /simulations/WaterTable Calculation (OLD)/paddock
      outputfile: filename=WaterTable Calculation (NEW).out; title=WaterTable Calculation (NEW)
        variables -> /simulations/WaterTable Calculation (OLD)/paddock/outputfile/Variables
        events Reporting Frequency -> /simulations/WaterTable Calculation (OLD)/paddock/outputfile/Reporting Frequency
  memo Lateral Outflow
    Copied the Saturated Flow Only simulation.
    Turned off the saturated flow by setting SWCON to 0 for each layer.

    Put a value of,
    Slope =0.1
    DischargeWidth=50
    CatchmentArea=1000

    And set the KLAT for each layer to 0.5

    Add alot of rain to the met file so that sw stays above DUL so that more lateral flow can occur.

    report the outflow_lat array variable
  simulation Lateral Outflow Only (OLD)
    metfile met
      filename=%apsim%\Tests\SoilWater\Process Event\Lateral Outflow Only.met
    clock
      start_date = 01/01/1940  # Enter the start date of the simulation
      end_date = 02/03/1940  # Enter the end date of the simulation
    summaryfile
    area paddock
      Soil: LocalName=Waco; Site=Jimbour; Region=South East Queensland
        SoilType = Black Vertosol  # Soil description
        NearestTown = Jimbour, Q 4352
        NaturalVegetation = Grassland, mainly Qld bluegrass
        Sample Soil sample
          Thickness  NO3  NH4  SW
          150        0    0    0.59
          150        0    0    0.58
          300        0    0    0.59
          300        0    0    0.58
          300        0    0    0.57
          300        0    0    0.55
          300        0    0    0.55
          300        0    0    0.53
          300        0    0    0.52
          300        0    0    0.51
          300        0    0    0.49
          Date = 02/01/1940  # Sample date
        Water: same as Saturated Flow Only (OLD).paddock.Soil.Water
        SoilWater
          Thickness  SWCON  KLAT
          150        0      8
          150        0      8
          300        0      8
          300        0      8
          300        0      8
          300        0      8
          300        0      8
          300        0      8
          300        0      8
          300        0      8
          300        0      8
          SummerCona = 0
          SummerU = 0
          SummerDate = 1-Nov
          WinterCona = 0
          WinterU = 0
          WinterDate = 1-Apr
          DiffusConst = 0
          DiffusSlope = 0
          Salb = 0.13
          CN2Bare = 1
          CNRed = 0
          CNCov = 0
          Slope = 0.5
          DischargeWidth = 5
          CatchmentArea = 10
        SoilOrganicMatter: same as Saturated Flow Only (OLD).paddock.Soil.SoilOrganicMatter
        Analysis
          Thickness  EC    PH
          150        0.2   8.4
          150        0.25  8.8
          300        0.31  9
          300        0.4   9.2
          300        0.59  9.2
          300        0.84  9.1
          300        0.93  9
          300        1.01  9
          300        1.06  8.9
          300        1.05  8.9
          300        1.01  8.9
      outputfile: filename=Lateral Outflow Only (OLD).out; title=Lateral Outflow Only (OLD)
        variables
          variables: dlayer, sat_dep, dul_dep, ll15_dep, air_dry_dep, dd/mm/yyyy as Date, rain, outflow_lat, sw_dep, flux, drain, runoff, es
        events Reporting Frequency: event=end_day
  simulation Lateral Outflow Only (NEW) -> /simulations/Lateral Outflow Only (OLD)
    PlugIns: same as Ponding Only using MWCON (NEW).PlugIns
    summaryfile
    area paddock -> /simulations/Lateral Outflow Only (OLD)/paddock
      outputfile: filename=Lateral Outflow Only (NEW).out; title=Lateral Outflow Only (NEW)
        variables -> /simulations/Lateral Outflow Only (OLD)/paddock/outputfile/Variables
        events Reporting Frequency -> /simulations/Lateral Outflow Only (OLD)/paddock/outputfile/Reporting Frequency
  memo Runon and Lateral Inflow Inputs
    This is just a test to make sure the user can specify runon and inflow_lat as inputs.

    These values are just put directly into the soil with no modification. So there is no code to test here.
    Runon goes straight into the top layer
    lateral inflow (inflow_lat) goes straight into the respective layer. Unlike Lateral Outflow there is no calculation that needs to be done. Just put the whole amount into the layer as if it is an irrigation.

    Copied the Saturated Flow Only simulation.
    Turned off the saturated flow by setting SWCON to 0 for each layer.
    So we have turned everything off.

    Set starting water to 0 for all layers

    We only want to see if the simulation is reading the sparse data file correctly and inputting the runon and inflow_lat properly.
  simulation Runon and Lateral Inflow Inputs (OLD)
    metfile met
      filename=%apsim%\Tests\SoilWater\Process Event\Runon and Lateral Inflow Inputs.met
    clock
      start_date = 01/01/1940  # Enter the start date of the simulation
      end_date = 02/03/1940  # Enter the end date of the simulation
    summaryfile
    area paddock
      Soil: LocalName=Waco; Site=Jimbour; Region=South East Queensland
        SoilType = Black Vertosol  # Soil description
        NearestTown = Jimbour, Q 4352
        NaturalVegetation = Grassland, mainly Qld bluegrass
        Sample Soil sample
          Thickness  NO3  NH4  SW
          150        0    0    0
          150        0    0    0
          300        0    0    0
          300        0    0    0
          300        0    0    0
          300        0    0    0
          300        0    0    0
          300        0    0    0
          300        0    0    0
          300        0    0    0
          300        0    0    0
          Date = 02/01/1940  # Sample date
        Water: same as Saturated Flow Only (OLD).paddock.Soil.Water
        SoilWater: Thickness=[150, 150, 300, 300, 300, 300, 300, 300, 300, 300, 300]; SWCON=[0, 0, 0, 0, 0, 0, 0, 0, 0, 0, 0]
          SummerCona = 0
          SummerU = 0
          SummerDate = 1-Nov
          WinterCona = 0
          WinterU = 0
          WinterDate = 1-Apr
          DiffusConst = 0
          DiffusSlope = 0
          Salb = 0.13
          CN2Bare = 1
          CNRed = 0
          CNCov = 0
        SoilOrganicMatter: same as Saturated Flow Only (OLD).paddock.Soil.SoilOrganicMatter
        Analysis
          Thickness  EC    PH
          150        0.2   8.4
          150        0.25  8.8
          300        0.31  9
          300        0.4   9.2
          300        0.59  9.2
          300        0.84  9.1
          300        0.93  9
          300        1.01  9
          300        1.06  8.9
          300        1.05  8.9
          300        1.01  8.9
      outputfile: filename=Runon and Lateral Inflow Inputs (OLD).out; title=Runon and Lateral Inflow Inputs (OLD)
        variables
          variables: dlayer, sat_dep, dul_dep, ll15_dep, air_dry_dep, dd/mm/yyyy as Date, rain, runon, inflow_lat, sw_dep, flux, drain, runoff, es
        events Reporting Frequency: event=end_day
  simulation Runon and Lateral Inflow Inputs (NEW) -> /simulations/Runon and Lateral Inflow Inputs (OLD)
    PlugIns: same as Ponding Only using MWCON (NEW).PlugIns
    summaryfile
    area paddock -> /simulations/Runon and Lateral Inflow Inputs (OLD)/paddock
      outputfile: filename=Runon and Lateral Inflow Inputs (NEW).out; title=Runon and Lateral Inflow Inputs (NEW)
        variables -> /simulations/Runon and Lateral Inflow Inputs (OLD)/paddock/outputfile/Variables
        events Reporting Frequency -> /simulations/Runon and Lateral Inflow Inputs (OLD)/paddock/outputfile/Reporting Frequency
  memo Soil Evaporation with SurfaceOM
    Just copy the "Soil Evporation Only" simulation.

    Add a "Surface Organic Matter" component

    Out of interest do a diff between "Soil Evaporation with SurfaceOM" simulation and "Soil Evporation Only" .
    You will see that the soil evaporation changes as it should.

    Report the surfaceom_cover variable to see what the cover is.
  simulation Soil Evaporation with SurfaceOM (OLD)
    metfile met
      filename=%apsim%\Tests\SoilWater\Process Event\Soil Evaporation with SurfaceOM.met
    clock
      start_date = 01/01/1940  # Enter the start date of the simulation
      end_date = 01/01/1941  # Enter the end date of the simulation
    summaryfile
    area paddock
      manager AvgTempCalculation
        on start_of_day:
```
avgTemp = (maxt + mint)/2
```
      Soil: same as Soil Evaporation Only (OLD).paddock.Soil
      surfaceom Surface Organic Matter
        PoolName = wheat_stubble  # Organic Matter pool name
        type = wheat  # Organic Matter type
        mass = 1000.  # Initial surface residue (kg/ha)
        cnr = 80.0  # C:N ratio of initial residue
        standing_fraction = 0.0  # Fraction of residue standing
      outputfile: filename=Soil Evaporation with SurfaceOM (OLD).out; title=Soil Evaporation with SurfaceOM (OLD)
        variables
          variables: dlayer, sat_dep, dul_dep, sw_dep, ll15_dep, air_dry_dep, flux, drain, runoff, rain, day, today, dd/mm/yyyy as Date, u, cona, t, surfaceom_cover, es, eo, eos, sw_dep(1), radn, avgTemp
        events Reporting Frequency: event=end_day
  simulation Soil Evaporation with SurfaceOM (NEW) -> /simulations/Soil Evaporation with SurfaceOM (OLD)
    PlugIns: same as Ponding Only using MWCON (NEW).PlugIns
    summaryfile
    area paddock -> /simulations/Soil Evaporation with SurfaceOM (OLD)/paddock
      outputfile: filename=Soil Evaporation with SurfaceOM (NEW).out; title=Soil Evaporation with SurfaceOM (NEW)
        variables -> /simulations/Soil Evaporation with SurfaceOM (OLD)/paddock/outputfile/Variables
        events Reporting Frequency -> /simulations/Soil Evaporation with SurfaceOM (OLD)/paddock/outputfile/Reporting Frequency
  memo Runoff with SurfaceOM
    Just copy the "Runoff Only" simulation.

    Add a "Surface Organic Matter" component.

    In the "Runoff Only" simulation we,
    Set CnRed and CnCov both to 0 because we have no crop in the simulation so it is bare earth and there is no Cover so CnRed and CnCov are never used anyway. (CnRed was 20 and CnCov was 0.8 )
    So set the CnRed and CnCov back to 20 and 0.8 respectively

    Report the surfaceom_cover variable

    Out of interest do a diff between the output file from this "Runoff with SurfaceOM" simulation and the output file from the "Runoff Only" simulation and you wiill see the effect Surface OM has on runoff.
  simulation Runoff with SurfaceOM (OLD)
    metfile met
      filename=%apsim%\Tests\SoilWater\Process Event\Runoff with SurfaceOM.met
    clock
      start_date = 01/01/1940  # Enter the start date of the simulation
      end_date = 31/12/1950  # Enter the end date of the simulation
    summaryfile
    area paddock
      Soil: LocalName=Waco; Site=Jimbour; Region=South East Queensland
        SoilType = Black Vertosol  # Soil description
        NearestTown = Jimbour, Q 4352
        NaturalVegetation = Grassland, mainly Qld bluegrass
        Sample Soil sample
          Thickness  NO3  NH4  SW
          150        0    0    0.59
          150        0    0    0.58
          300        0    0    0.29
          300        0    0    0.29
          300        0    0    0.3
          300        0    0    0.31
          300        0    0    0.32
          300        0    0    0.33
          300        0    0    0.34
          300        0    0    0.35
          300        0    0    0.36
          Date = 02/01/1940  # Sample date
        Water: same as Saturated Flow Only (OLD).paddock.Soil.Water
        SoilWater: Thickness=[150, 150, 300, 300, 300, 300, 300, 300, 300, 300, 300]; SWCON=[0, 0, 0, 0, 0, 0, 0, 0, 0, 0, 0]
          SummerCona = 0
          SummerU = 0
          SummerDate = 1-Nov
          WinterCona = 0
          WinterU = 0
          WinterDate = 1-Apr
          DiffusConst = 0
          DiffusSlope = 0
          Salb = 0.13
          CN2Bare = 73
          CNRed = 20
          CNCov = 0.8
        SoilOrganicMatter: same as Saturated Flow Only (OLD).paddock.Soil.SoilOrganicMatter
        Analysis
          Thickness  EC    PH
          150        0.2   8.4
          150        0.25  8.8
          300        0.31  9
          300        0.4   9.2
          300        0.59  9.2
          300        0.84  9.1
          300        0.93  9
          300        1.01  9
          300        1.06  8.9
          300        1.05  8.9
          300        1.01  8.9
      surfaceom Surface Organic Matter
        PoolName = wheat_stubble  # Organic Matter pool name
        type = wheat  # Organic Matter type
        mass = 5000.  # Initial surface residue (kg/ha)
        cnr = 80.0  # C:N ratio of initial residue
        standing_fraction = 0.0  # Fraction of residue standing
      outputfile: filename=Runoff with SurfaceOM (OLD).out; title=Runoff with SurfaceOM (OLD)
        variables
          variables: dd/mm/yyyy as Date, rain, runoff, surfaceom_cover, dlayer, sat_dep, dul_dep, ll15_dep, air_dry_dep, sw_dep, flux, flow, drain, es
        events Reporting Frequency: event=end_day
  simulation Runoff with SurfaceOM (NEW) -> /simulations/Runoff with SurfaceOM (OLD)
    PlugIns: same as Ponding Only using MWCON (NEW).PlugIns
    summaryfile
    area paddock -> /simulations/Runoff with SurfaceOM (OLD)/paddock
      outputfile: filename=Runoff with SurfaceOM (NEW).out; title=Runoff with SurfaceOM (NEW)
        variables -> /simulations/Runoff with SurfaceOM (OLD)/paddock/outputfile/Variables
        events Reporting Frequency -> /simulations/Runoff with SurfaceOM (OLD)/paddock/outputfile/Reporting Frequency
  memo Runoff after Tillage Event
    The tillage event only alters the runoff. This of course effects other stuff such as infiltration but it does not affect infiltration (and others) directly. Only by effecting runoff does it effect infiltration (and others).

    Just copy the Runoff simulation

    Do a Tillage in a manager component

    Out of interest do a diff between the output file from these "Runoff ater Tillage Event" simulations and the output file from the "Runoff Only" simulation and you wiill see the effect a tillage has on runoff.
    Then you will see that after a certain amount of rainfall that the difference ends. This is because the amount of rainfall after which you stop reducing the runoff (cn_rain) has been passed.
    Do a search of the summary file for the phrase, "Tillage CN reduction finished" To see when this happens.
    You will see that it happens on the "14 Jan 1940". Before this date the runoffs don't match but after this date the runoff matches (between the "Runoff after Tillage" and "Runoff Only" simulations.
  simulation Runoff after Tillage Event (OLD)
    metfile met
      filename=%apsim%\Tests\SoilWater\Process Event\Runoff after Tillage Event.met
    clock
      start_date = 01/01/1940  # Enter the start date of the simulation
      end_date = 31/12/1950  # Enter the end date of the simulation
    summaryfile
    area paddock
      Soil: LocalName=Waco; Site=Jimbour; Region=South East Queensland
        SoilType = Black Vertosol  # Soil description
        NearestTown = Jimbour, Q 4352
        NaturalVegetation = Grassland, mainly Qld bluegrass
        Sample Soil sample
          Thickness  NO3  NH4  SW
          150        0    0    0.59
          150        0    0    0.58
          300        0    0    0.29
          300        0    0    0.29
          300        0    0    0.3
          300        0    0    0.31
          300        0    0    0.32
          300        0    0    0.33
          300        0    0    0.34
          300        0    0    0.35
          300        0    0    0.36
          Date = 02/01/1940  # Sample date
        Water: same as Saturated Flow Only (OLD).paddock.Soil.Water
        SoilWater: same as Runoff Only (OLD).paddock.Soil.SoilWater
        SoilOrganicMatter: same as Saturated Flow Only (OLD).paddock.Soil.SoilOrganicMatter
        Analysis
          Thickness  EC    PH
          150        0.2   8.4
          150        0.25  8.8
          300        0.31  9
          300        0.4   9.2
          300        0.59  9.2
          300        0.84  9.1
          300        0.93  9
          300        1.01  9
          300        1.06  8.9
          300        1.05  8.9
          300        1.01  8.9
      operations Operations Schedule
        3/01/1940  'Soil water' tillage type = user_defined, cn_red = 15.0, cn_rain = 200.0
      outputfile: filename=Runoff after Tillage Event (OLD).out; title=Runoff after Tillage Event (OLD)
        variables
          variables: dd/mm/yyyy as Date, rain, runoff, dlayer, sat_dep, dul_dep, ll15_dep, air_dry_dep, sw_dep, flux, flow, drain, es
        events Reporting Frequency: event=end_day
  simulation Runoff after Tillage Event (NEW) -> /simulations/Runoff after Tillage Event (OLD)
    PlugIns: same as Ponding Only using MWCON (NEW).PlugIns
    summaryfile
    area paddock -> /simulations/Runoff after Tillage Event (OLD)/paddock
      outputfile: filename=Runoff after Tillage Event (NEW).out; title=Runoff after Tillage Event (NEW)
        variables -> /simulations/Runoff after Tillage Event (OLD)/paddock/outputfile/Variables
        events Reporting Frequency -> /simulations/Runoff after Tillage Event (OLD)/paddock/outputfile/Reporting Frequency
  memo Runoff with Irrigation
    This is a new feature only added to the new SoilWater.NET module,  it is not added to the old SoilWat module.

    This is an exact copy of the "Runoff Only (NEW)"

    The only difference is that in the met file I have zeroed the first 8 rainfalls
    10, 20, 50, 100, 250, 500,1000, 2000 mm

    GOON 1940   2  26.30    32.2    19.4    10.0    8.48

    GOON 1940   5  25.92    32.7    19.4    20.0    8.48

    GOON 1940   8  22.91    32.2    16.1    50.0    8.31

    GOON 1940  11  27.46    35.5    20.0   100.0    8.31

    GOON 1940  14  25.53    35.5    22.7   250.0    8.31

    GOON 1940  17  28.30    41.1    25.0   500.0    8.09

    GOON 1940  20  26.15    37.2    22.7  1000.0    8.09

    GOON 1940  23  28.62    33.3    15.0  2000.0    7.86

    nb. I have left the small amounts of rainfall after these dates alone.

    and have replaced them with an equivalent amount of irrigation with the new "will_runoff" argument for the irrigation apply command set turned on.

    irrigation apply amount = 10 (mm), will_runoff = 1

    (See Operations Schedule)

    The "will_runoff" argument is used to make the irrigation runoff in exactly the same way as it would have if it was rain.
    This is an optional argument and if it is not provided it defaults to 0 (no runoff with the irrigation, it all goes into the soil)

    The idea of replacing the rainfall with the irrigations is that I should then be able to do a straight comparison between the output file from this simulation
    and the output file from "Runoff Only (NEW)" and the runoff column should be identical.
    It should not matter if the water was applied as rainfall or as an irrigation with "will_runoff = 1"  the runoff should be exactly the same.
  simulation Runoff with Irrigation (NEW)
    PlugIns
      PlugIn=[%apsim%\UserInterface\ApsimUIPlugIn.xml, %apsim%\UserInterface\SoilTypes.xml, %apsim%\UserInterface\Graph.xml, %apsim%\UserInterface\Ausfarm.xml, %apsim%\UserInterface\DevelopersPlugIn.xml, %apsim%\Model\Accum.xml, %apsim%\Model\AgPasture.xml, %apsim%\Model\Bambatsi.xml, %apsim%\Model\Barley.xml, %apsim%\Model\Br.xml, %apsim%\Model\Bore.xml, %apsim%\Model\Broccoli.xml, %apsim%\Model\ButterflyPea.xml, %apsim%\Model\Canola.xml, %apsim%\Model\Canopy.xml, %apsim%\Model\Centro.xml, %apsim%\Model\Channel.xml, %apsim%\Model\Chickpea.xml, %apsim%\Model\Solute.xml, %apsim%\Model\Climatechange.xml, %apsim%\Model\Clock.xml, %apsim%\Model\Cowpea.xml, %apsim%\Model\CropUI.xml, %apsim%\Model\Dam.xml, %apsim%\Model\DCD.xml, %apsim%\Model\EGrandis.xml, %apsim%\Model\EMelliodora.xml, %apsim%\Model\Eo.xml, %apsim%\Model\EPopulnea.xml, %apsim%\Model\Erosion.xml, %apsim%\Model\Events.xml, %apsim%\Model\Fababean.xml, %apsim%\Model\Factorial.xml, %apsim%\Model\Factor.xml, %apsim%\Model\FactorComplex.xml, %apsim%\Model\FrenchBean.xml, %apsim%\Model\Fertiliser.xml, %apsim%\Model\Fieldpea.xml, %apsim%\Model\Gcm_data.xml, %apsim%\Model\Grasp.xml, %apsim%\Model\Graz.xml, %apsim%\Model\Growth.xml, %apsim%\Model\Horsegram.xml, %apsim%\Model\Ini.xml, %apsim%\Model\InitWater.xml, %apsim%\Model\Input.xml, %apsim%\Model\Irrigation.xml, %apsim%\Model\KWTest.xml, %apsim%\Model\Lablab.xml, %apsim%\Model\Lettuce.xml, %apsim%\Model\Log.xml, %apsim%\Model\Lucerne.xml, %apsim%\Model\Lupin.xml, %apsim%\Model\Maize.xml, %apsim%\Model\Manager.xml, %apsim%\Model\Map.xml, %apsim%\Model\Memo.xml, %apsim%\Model\MetFile.xml, %apsim%\Model\MicroMet.xml, %apsim%\Model\Millet.xml, %apsim%\Model\Millet1.xml, %apsim%\Model\Millet2.xml, %apsim%\Model\Millet3.xml, %apsim%\Model\Millet4.xml, %apsim%\Model\Millet5.xml, %apsim%\Model\Mucuna.xml, %apsim%\Model\Mungbean.xml, %apsim%\Model\Navybean.xml, %apsim%\Model\Oats.xml, %apsim%\Model\Ocean_data.xml, %apsim%\Model\Operations.xml, %apsim%\Model\Orobanche.xml, %apsim%\Model\Oryza.xml, %apsim%\Model\OutputFile.xml, %apsim%\Model\Ozcot.xml, %apsim%\Model\Patchinput.xml, %apsim%\Model\Peanut.xml, %apsim%\Model\Pigeonpea.xml, %apsim%\Model\Pond.xml, %apsim%\Model\Potato.xml, %apsim%\Model\RotPlot.xml, %apsim%\Model\RugPlotUI.xml, %apsim%\Model\Root.xml, %apsim%\Model\Rule.xml, %apsim%\Model\Seedling.xml, %apsim%\Model\SiloInput.xml, %apsim%\Model\Slurp.xml, %apsim%\Model\Soi.xml, %apsim%\Model\Soil.xml, %apsim%\Model\SoilNui.xml, %apsim%\Model\SoilTemp.xml, %apsim%\Model\Sorghum.xml, %apsim%\Model\SorghumConstants.xml, %apsim%\Model\SorghumGenotype.xml, %apsim%\Model\Soybean.xml, %apsim%\Model\Stylo.xml, %apsim%\Model\Sugar.xml, %apsim%\Model\Summaryfile.xml, %apsim%\Model\Sunflower.xml, %apsim%\Model\SurfaceOM.xml, %apsim%\Model\SweetCorn.xml, %apsim%\Model\SweetSorghum.xml, %apsim%\Model\SWIM2.xml, %apsim%\Model\SWIM2ui.xml, %apsim%\Model\Sysbal.xml, %apsim%\Model\Tcllink.xml, %apsim%\Model\Tclmanager.xml, %apsim%\Model\Tclui.xml, %apsim%\Model\Tracker.xml, %apsim%\Model\Tree.xml, %apsim%\Model\Variables.xml, %apsim%\Model\Venlink.xml, %apsim%\Model\vine.xml, %apsim%\Model\WaterSupply.xml, %apsim%\Model\Weed.xml, %apsim%\Model\Wheat.xml, %apsim%\Model\YPCalc.xml, %apsim%\Model\Soil with new water model.xml]
    metfile met
      filename=%apsim%\Tests\SoilWater\Process Event\Runoff with Irrigation.met
    clock
      start_date = 01/01/1940  # Enter the start date of the simulation
      end_date = 31/12/1950  # Enter the end date of the simulation
    summaryfile
    area paddock
      Soil: same as Runoff Only (OLD).paddock.Soil
      irrigation
        automatic_irrigation = off
        asw_depth = 600  # Depth to which ASW is calculated. (mm)
        crit_fr_asw = 0.5  # Fraction of ASW below which irrigation is applied (0-1.0)
        irrigation_efficiency = 1  # Efficiency of the irrigation. (0-1.0)
        irrigation_allocation = off  # Allocation limits
        allocation = 0  # Allocation in mm
        default_no3_conc = 0.0  # Nitrate concentration (ppm N)
        default_nh4_conc = 0.0  # Ammonium concentration (ppm N)
        default_cl_conc = 0.0  # Chloride concentration (ppm Cl)
      operations Operations Schedule
        2/01/1940  irrigation apply amount = 10 (mm), will_runoff = 1
        5/01/1940  irrigation apply amount = 20 (mm), will_runoff = 1
        8/01/1940  irrigation apply amount = 50 (mm), will_runoff = 1
        11/01/1940  irrigation apply amount = 100 (mm), will_runoff = 1
        14/01/1940  irrigation apply amount = 250 (mm), will_runoff = 1
        17/01/1940  irrigation apply amount = 500 (mm), will_runoff = 1
        20/01/1940  irrigation apply amount = 1000 (mm), will_runoff = 1
        23/01/1940  irrigation apply amount = 2000 (mm), will_runoff = 1
      outputfile: filename=Runoff with Irrigation (NEW).out; title=Runoff with Irrigation (NEW)
        variables
          variables: dd/mm/yyyy as Date, irrigation, runoff, dlayer, sat_dep, dul_dep, ll15_dep, air_dry_dep, sw_dep, flux, flow, drain, es
        events Reporting Frequency: event=end_day
  memo Subsurface Irrigation
    Created a copy of the 'Unsaturated Flow Only (NEW)' simulation.

    I zeroed the initial soilwater in the "soil sample" node.

    changed the clock to run over just one month instead of a decade (end (31 Jan 1940)

    added "irrigation_layer" and "irrigation" as an output variable.
  simulation Subsurface Irrigation (NEW)
    PlugIns: same as Saturated Flow Only (NEW).PlugIns
    metfile met
      filename=%apsim%\Tests\SoilWater\Process Event\Subsurface Irrigation.met
    clock
      start_date = 01/01/1940  # Enter the start date of the simulation
      end_date = 31/01/1940  # Enter the end date of the simulation
    summaryfile
    area paddock
      Soil: SoilType=Black Vertosol; LocalName=Waco; Site=Jimbour; NearestTown=Jimbour, Q 4352; Region=South East Queensland; NaturalVegetation=Grassland, mainly Qld bluegrass; Latitude=0; Longitude=0
        Sample Soil sample: Date=02/01/1940; NO3Units=ppm; NH4Units=ppm; SWUnits=Volumetric; OCUnits=Total
          Thickness  NO3  NH4  SW
          150        0    0    0
          150        0    0    0
          300        0    0    0
          300        0    0    0
          300        0    0    0
          300        0    0    0
          300        0    0    0
          300        0    0    0
          300        0    0    0
          300        0    0    0
          300        0    0    0
        Water: same as Saturated Flow Only (OLD).paddock.Soil.Water
        SoilWater: SummerDate=1-Nov; WinterDate=1-Apr; DiffusConst=40; DiffusSlope=16; Salb=0.13; CN2Bare=1; Thickness=[150, 150, 300, 300, 300, 300, 300, 300, 300, 300, 300]; SWCON=[0, 0, 0, 0, 0, 0, 0, 0, 0, 0, 0]
          zero: SummerCona, SummerU, WinterCona, WinterU, CNRed, CNCov, Slope, DischargeWidth, CatchmentArea, MaxPond
        SoilOrganicMatter: same as Saturated Flow Only (OLD).paddock.Soil.SoilOrganicMatter
        Analysis: PHUnits=Water; BoronUnits=HotWater
          Thickness  EC    PH
          150        0.2   8.4
          150        0.25  8.8
          300        0.31  9
          300        0.4   9.2
          300        0.59  9.2
          300        0.84  9.1
          300        0.93  9
          300        1.01  9
          300        1.06  8.9
          300        1.05  8.9
          300        1.01  8.9
      irrigation: same as Runoff with Irrigation (NEW).paddock.Irrigation
      operations Operations Schedule
        1/01/1940  irrigation apply amount = 10 (mm), will_runoff = 1, depth = 600 (mm)           ! summary file test - setting the irrigation to runoff as well as subsurface should cause a warning in summary file.
        2/01/1940  irrigation apply amount = 10 (mm), depth = 1550 (mm)
        3/01/1940  'Soil Water' reset
        4/01/1940  irrigation apply amount = 10 (mm), depth = 300 (mm)         ! boundary of a layer (which layer will it put it in)
        5/01/1940  'Soil Water' reset
        6/01/1940  irrigation apply amount = 10 (mm), depth = 0 (mm)            !  top boundary of the soil
        7/01/1940  'Soil Water' reset
        8/01/1940  irrigation apply amount = 10 (mm), depth = 3000 (mm)      !  bottom boundary of the soil
        9/01/1940  'Soil Water' reset
        10/01/1940  irrigation apply amount = 10 (mm), depth = -10 (mm)         ! above the top layer  ( exeed top of the soil)
        11/01/1940  'Soil Water' reset
        12/01/1940  irrigation apply amount = 10 (mm), depth =  3100 (mm)    ! below the bottom layer   ( exceed bottom of the soil )
      outputfile: filename=Subsurface Irrigation (NEW).out; title=Subsurface Irrigation (NEW)
        variables
          variables: dd/mm/yyyy as Date, irrigation_layer, irrigation, dlayer, sat_dep, dul_dep, ll15_dep, air_dry_dep, rain, sw_dep, flow, drain, runoff, es
        events Reporting Frequency: event=end_day
  folder Solute Tests
    memo Solute
      Copied the Saturated and Unsaturated Flow simulations and just added solutes to them.

      Using no3 (mobile) and nh4 (immobile) as solutes is bad because they transform from one to the other.
      Plus because they both belong to SoilN module you want to use something that uses the Solute module (eg. CL) so that this tests to make sure SoilWater is talking with Solute module properly.

      Using CL as the mobile solute.

      Use NH4 as the immobile solute.

      To stop the mineralisation demineralisation process from happening in SoilN
      ie. to stop immobile NH4 transforming from NH4 (immobile) to NO3 (mobile) and then moving, I set the,
      PH of the soil to 1

      SoilOrganicMatter to OC (Total %) to 0 and RootWt to 0
      You can not have any root weight (RootWt) in the soil because they will decompose and put Nitrogen into the soil
      Same goes for Organic Carbon which is dead plant matter in the soil.

      Saturated flow is specified by leach_solutename. It is the drainage of solute out of the bottom layer and is a single value.
      There is an array variable inside the code called "leach" which is an array variable with the leaching from each layer. It is also referred to as flux.

      Unsaturated flow is specified by flow_solutename . It is an array value.
    simulation Solute - Saturated Flow Only (OLD)
      metfile met
        filename=%apsim%\Tests\SoilWater\Process Event\Solute - Saturated Flow Only.met
      clock
        start_date = 01/01/1940  # Enter the start date of the simulation
        end_date = 02/03/1940  # Enter the end date of the simulation
      summaryfile
      area paddock
        Solute Cl
          d0 = 108  # Cl diffusivity in water (mm2/d)
          layers = 300 150 200 250 200 250 200 250 200 250 200 250 200  # Cl in each layer (kg/ha)
        Soil: LocalName=Waco; Site=Jimbour; Region=South East Queensland
          SoilType = Black Vertosol  # Soil description
          NearestTown = Jimbour, Q 4352
          NaturalVegetation = Grassland, mainly Qld bluegrass
          Sample Soil sample: NH4Units=kgha
            Thickness  NO3  NH4  SW
            150        0    350  0.59
            150        0    250  0.58
            300        0    350  0.59
            300        0    250  0.58
            300        0    350  0.57
            300        0    250  0.55
            300        0    350  0.55
            300        0    250  0.53
            300        0    350  0.52
            300        0    250  0.51
            300        0    350  0.49
            Date = 02/01/1940  # Sample date
          Water: same as Saturated Flow Only (OLD).paddock.Soil.Water
          SoilWater: same as Saturated Flow Only (OLD).paddock.Soil.SoilWater
          SoilOrganicMatter: same as WaterTable Calculation (OLD).paddock.Soil.SoilOrganicMatter
          Analysis
            Thickness  EC    PH
            150        0.2   1
            150        0.25  1
            300        0.31  1
            300        0.4   1
            300        0.59  1
            300        0.84  1
            300        0.93  1
            300        1.01  1
            300        1.06  1
            300        1.05  1
            300        1.01  1
        outputfile: filename=Solute - Saturated Flow Only (OLD).out; title=Solute - Saturated Flow Only (OLD)
          variables
            variables: dlayer, sat_dep, dul_dep, ll15_dep, air_dry_dep, rain, sw_dep, flux, drain, runoff, es, dd/mm/yyyy as Date, leach_cl as leach_mobile, leach_nh4 as leach_immobile, leach_no3, leach_urea, cl format 3 as mobile, nh4 format 3 as immobile, no3 format 3, urea format 3
          events Reporting Frequency: event=end_day
    simulation Solute - Saturated Flow Only (NEW) -> /simulations/Solute Tests/Solute - Saturated Flow Only (OLD)
      PlugIns: same as Ponding Only using MWCON (NEW).PlugIns
      summaryfile
      area paddock -> /simulations/Solute Tests/Solute - Saturated Flow Only (OLD)/paddock
        outputfile: filename=Solute - Saturated Flow Only (NEW).out; title=Solute - Saturated Flow Only (NEW)
          variables -> /simulations/Solute Tests/Solute - Saturated Flow Only (OLD)/paddock/outputfile/Variables
          events Reporting Frequency -> /simulations/Solute Tests/Solute - Saturated Flow Only (OLD)/paddock/outputfile/Reporting Frequency
    simulation Solute - Unsaturated Flow Only (OLD)
      metfile met
        filename=%apsim%\Tests\SoilWater\Process Event\Solute - Unsaturated Flow Only.met
      clock
        start_date = 01/01/1940  # Enter the start date of the simulation
        end_date = 31/12/1950  # Enter the end date of the simulation
      summaryfile
      area paddock
        Solute Cl
          d0 = 108  # Cl diffusivity in water (mm2/d)
          layers = 300 150 200 250 200 250 200 250 200 250 200 250 200  # Cl in each layer (kg/ha)
        Soil: LocalName=Waco; Site=Jimbour; Region=South East Queensland
          SoilType = Black Vertosol  # Soil description
          NearestTown = Jimbour, Q 4352
          NaturalVegetation = Grassland, mainly Qld bluegrass
          Sample Soil sample: NH4Units=kgha
            Thickness  NO3  NH4  SW
            150        0    350  0.54
            150        0    250  0.53
            300        0    350  0.29
            300        0    250  0.54
            300        0    350  0.3
            300        0    250  0.5
            300        0    350  0.32
            300        0    250  0.48
            300        0    350  0.34
            300        0    250  0.46
            300        0    350  0.36
            Date = 02/01/1940  # Sample date
          Water: same as Saturated Flow Only (OLD).paddock.Soil.Water
          SoilWater: same as Unsaturated Flow Only (OLD).paddock.Soil.SoilWater
          SoilOrganicMatter: same as WaterTable Calculation (OLD).paddock.Soil.SoilOrganicMatter
          Analysis
            Thickness  EC    PH
            150        0.2   1
            150        0.25  1
            300        0.31  1
            300        0.4   1
            300        0.59  1
            300        0.84  1
            300        0.93  1
            300        1.01  1
            300        1.06  1
            300        1.05  1
            300        1.01  1
        outputfile: filename=Solute - Unsaturated Flow Only (OLD).out; title=Solute - Unsaturated Flow Only (OLD)
          variables
            variables: dlayer, sat_dep, dul_dep, ll15_dep, air_dry_dep, rain, sw_dep, flux, drain, runoff, es, dd/mm/yyyy as Date, flow_cl as flow_mobile, flow_nh4 as flow_immobile, flow_no3, flow_urea, cl format 3 as mobile, nh4 format 3 as immobile, no3 format 3, urea format 3
          events Reporting Frequency: event=end_day
    simulation Solute - Unsaturated Flow Only (NEW) -> /simulations/Solute Tests/Solute - Unsaturated Flow Only (OLD)
      PlugIns: same as Ponding Only using MWCON (NEW).PlugIns
      area paddock -> /simulations/Solute Tests/Solute - Unsaturated Flow Only (OLD)/paddock
        outputfile: filename=Solute - Unsaturated Flow Only (NEW).out; title=Solute - Unsaturated Flow Only (NEW)
          variables -> /simulations/Solute Tests/Solute - Unsaturated Flow Only (OLD)/paddock/outputfile/Variables
          events Reporting Frequency -> /simulations/Solute Tests/Solute - Unsaturated Flow Only (OLD)/paddock/outputfile/Reporting Frequency
    memo Solute Irrigation
      Solute Irrigation, I just copied the Runoff Only simulation and added irrigations to it.
      I copied the Runoff Only because I wanted to make sure Irrigations were not causing runoff when applied. Irrigations are assumed to go straight into the soil without any runoff.
      nb. if you fill up the layer though you may cause runoff due to "extra_runoff". Extra Runoff is due to the water backing up in the top layer due to its inability to drain quickly enough.

      Turned off the rain by addin,
      rain=0 (mm) to top of my met file.

      I had to zero the CL, NO3, NH4 in the soil so you can see the irrigation adding it.
      Also zeroed the starting soil water. (could not actually use zeros because it causes infinite numbers for cl in output file. Caused by divide by zero in solute module I suspect. So set to 0.0001 instead)

      Turned Automatic Irrigation to OFF and set  the soluted concentrations for irrigations.

      Added the irrigations with Operations Schedule manager.
    simulation Solute - Irrigation (OLD)
      metfile met
        filename=%apsim%\Tests\SoilWater\Process Event\Solute - Irrigation Only.met
      clock
        start_date = 01/01/1940  # Enter the start date of the simulation
        end_date = 01/06/1940  # Enter the end date of the simulation
      summaryfile
      area paddock
        Solute Cl
          d0 = 108  # Cl diffusivity in water (mm2/d)
          layers = 0 0 0 0 0 0 0 0 0 0 0 0 0  # Cl in each layer (kg/ha)
        irrigation: same as Runoff with Irrigation (NEW).paddock.Irrigation
        Soil: LocalName=Waco; Site=Jimbour; Region=South East Queensland
          SoilType = Black Vertosol  # Soil description
          NearestTown = Jimbour, Q 4352
          NaturalVegetation = Grassland, mainly Qld bluegrass
          Sample Soil sample
            Thickness  NO3  NH4  SW
            150        0    0    0.001
            150        0    0    0.001
            300        0    0    0.001
            300        0    0    0.001
            300        0    0    0.001
            300        0    0    0.001
            300        0    0    0.001
            300        0    0    0.001
            300        0    0    0.001
            300        0    0    0.001
            300        0    0    0.001
            Date = 02/01/1940  # Sample date
          Water: same as Saturated Flow Only (OLD).paddock.Soil.Water
          SoilWater: same as Runoff with SurfaceOM (OLD).paddock.Soil.SoilWater
          SoilOrganicMatter: same as WaterTable Calculation (OLD).paddock.Soil.SoilOrganicMatter
          Analysis
            Thickness  EC    PH
            150        0.2   1
            150        0.25  1
            300        0.31  1
            300        0.4   1
            300        0.59  1
            300        0.84  1
            300        0.93  1
            300        1.01  1
            300        1.06  1
            300        1.05  1
            300        1.01  1
        operations Operations Schedule
          1/2/1940  Irrigation apply amount = 20 (mm), NO3=200, NH4=300, CL=400
          1/3/1940  Irrigation apply amount = 20 (mm), NO3=225, NH4=325, CL=425
          1/4/1940  Irrigation apply amount = 20 (mm), NO3=250, NH4=350, CL=450
        outputfile: filename=Solute - Irrigation (OLD).out; title=Solute - Irrigation (OLD)
          variables
            variables: rain, runoff, dlayer, dul_dep, ll15_dep, air_dry_dep, sw_dep, flux, flow, drain, es, dd/mm/yyyy as Date, Irrigation.irrigation, sw_dep(1), no3(1), nh4(1), cl(1), sw_dep, no3, nh4, cl
          events Reporting Frequency: event=end_day
    simulation Solute - Irrigation (NEW) -> /simulations/Solute Tests/Solute - Irrigation (OLD)
      PlugIns: same as Ponding Only using MWCON (NEW).PlugIns
      summaryfile
      area paddock -> /simulations/Solute Tests/Solute - Irrigation (OLD)/paddock
        outputfile: filename=Solute - Irrigation (NEW).out; title=Solute - Irrigation (NEW)
          variables -> /simulations/Solute Tests/Solute - Irrigation (OLD)/paddock/outputfile/Variables
          events Reporting Frequency -> /simulations/Solute Tests/Solute - Irrigation (OLD)/paddock/outputfile/Reporting Frequency
  folder Manager Set Variables
    memo Manager Set Variables
      This folder does NOT contain "set" tests for ALL the variables

      It does NOT contain:

      "sets" for the water variables "sw", "sw_dep",  "dlt_sw and "dlt_sw_dep".

      "set" for the "water_table" to fix a water table at a fixed depth.

      "sets" for the initial starting soil water variables.

      This is because setting these variables should "cause an ExternalMassFlow event".
      Therefore they are tested in that folder and not in here.

      To test it, give it 3 days after each "set" just to make sure it has permanently changed it, rather then just changing it for just that day.

      nb. For every variable that is Settable, you should be able to use a Reset command to set it back to the original value (if you have used a "set" to change it to a different value).
    memo Setable Variables - Erosion
         These are Sets usually done for simulation of erosion

      Set starting water and nitrogen to zero.
      Set SAT, DUL, LL15, AIRDRY in the soil component to high values.

      In your manager change them to lower values.

      Cannon output max_pond because it is not an output variable.
      So just output pond
      and then set mwcon in top layer to 0 then in the met file put 1000mm of rain on each day. This should fill the pond up to max_pond.
      So (pond + pond_evap) should equal max_pond

      create a variable in a manager called total_pond where total_pond = pond + pond_evap.
      total_pond should equal max_pond when the pond is full.

      I have set max_pond in the SoilWat tab of the GUI to 200mm
      and this should change to 100mm on day 2 of the simulation in the manager code.

       changing max_pond simulates a dam bursting in a rice paddy. Which is sort of like erosion.

      nb. The squewing of the top layers in the graph for 1 Jan is caused by the layer 1 and layer 2 having a depth of 15cm instead of 30cm like all the other layers.
            They have the same fraction for SAT, DUL, LL15 and AIRDRY but because they don't have the same depth the graphs get squewed.
            Once the depths of layer 1 and 2 are set to 50cm the same as all the other layers on day=2 , you don't get the squewing in the top layers. They are all straight lines.
    simulation Setable Variables - Erosion (OLD)
      metfile met
        filename=%apsim%\Tests\SoilWater\Process Event\Setable Variables - Erosion.met
      clock
        start_date = 01/01/1940  # Enter the start date of the simulation
        end_date = 17/01/1940  # Enter the end date of the simulation
      summaryfile
      area paddock
        Soil: LocalName=Waco; Site=Jimbour; Region=South East Queensland
          SoilType = Black Vertosol  # Soil description
          NearestTown = Jimbour, Q 4352
          NaturalVegetation = Grassland, mainly Qld bluegrass
          Sample Soil sample
            Thickness  NO3  NH4  SW
            150        0    0    0
            150        0    0    0
            300        0    0    0
            300        0    0    0
            300        0    0    0
            300        0    0    0
            300        0    0    0
            300        0    0    0
            300        0    0    0
            300        0    0    0
            300        0    0    0
            Date = 02/01/1940  # Sample date
          Water
            Thickness  BD    AirDry  LL15  DUL  SAT
            150        1.02  0.4     0.6   0.7  0.8
            150        1.03  0.5     0.6   0.7  0.8
            300        1.02  0.5     0.6   0.7  0.8
            300        1.02  0.5     0.6   0.7  0.8
            300        1.06  0.5     0.6   0.7  0.8
            300        1.11  0.5     0.6   0.7  0.8
            300        1.12  0.5     0.6   0.7  0.8
            300        1.15  0.5     0.6   0.7  0.8
            300        1.18  0.5     0.6   0.7  0.8
            300        1.2   0.5     0.6   0.7  0.8
            300        1.25  0.5     0.6   0.7  0.8
          SoilWater
            Thickness  SWCON  MWCON
            150        0      0
            150        0      1
            300        0      1
            300        0      1
            300        0      1
            300        0      1
            300        0      1
            300        0      1
            300        0      1
            300        0      1
            300        0      1
            SummerCona = 0
            SummerU = 0
            SummerDate = 1-Nov
            WinterCona = 0
            WinterU = 0
            WinterDate = 1-Apr
            DiffusConst = 0
            DiffusSlope = 0
            Salb = 0.13
            CN2Bare = 1
            CNRed = 0
            CNCov = 0
            MaxPond = 200
          SoilOrganicMatter: same as Saturated Flow Only (OLD).paddock.Soil.SoilOrganicMatter
          Analysis
            Thickness  EC    PH
            150        0.2   8.4
            150        0.25  8.8
            300        0.31  9
            300        0.4   9.2
            300        0.59  9.2
            300        0.84  9.1
            300        0.93  9
            300        1.01  9
            300        1.06  8.9
            300        1.05  8.9
            300        1.01  8.9
        manager set setable variables
          on start_of_day:
```
if day = 2 and year = 1940 then
   'Soil Water' set max_pond = 100
     'Soil Water' set dlayer = 50 50 50 50 50 50 50 50 50 50 50         
endif

if day = 5 and year = 1940 then
    'Soil Water' set sat_dep = 30 30 30 30 30 30 30 30 30 30 30    
    'Soil Water' set dul_dep = 20 20 20 20 20 20 20 20 20 20 20  
   'Soil Water' set ll15_dep = 10 10 10 10 10 10 10 10 10 10 10  
'Soil Water' set air_dry_dep =  3  4  5  5  5  5  5  5  5  5  5    
endif


if day = 8 and year = 1940 then    
    'Soil Water' set sat = 0.5 0.5 0.5 0.5 0.5 0.5 0.5 0.5 0.5 0.5 0.5    
    'Soil Water' set dul = 0.4 0.4 0.4 0.4 0.4 0.4 0.4 0.4 0.4 0.4 0.4  
   'Soil Water' set ll15 = 0.3 0.3 0.3 0.3 0.3 0.3 0.3 0.3 0.3 0.3 0.3  
'Soil Water' set air_dry = 0.1 0.2 0.2 0.2 0.2 0.2 0.2 0.2 0.2 0.2 0.2  
endif


if day = 11 and year = 1940 then
     'Soil Water' set dlt_dlayer = 20 20 20 20 20 20 20 20 20 20 20         
endif

if day = 14 and year = 1940 then

   'Soil Water' reset
endif
```
        manager calculate total_pond
          on end_of_day:
```
total_pond = pond + pond_evap
```
        outputfile: filename=Setable Variables - Erosion (OLD).out; title=Setable Variables - Erosion (OLD)
          variables
            variables: dd/mm/yyyy as Date, pond, pond_evap, total_pond, dlayer, sat_dep, dul_dep, ll15_dep, air_dry_dep, sat, dul, ll15, air_dry, rain, runoff, sw_dep
          events Reporting Frequency: event=end_day
    simulation Setable Variables - Erosion (NEW) -> /simulations/Manager Set Variables/Setable Variables - Erosion (OLD)
      PlugIns: same as Ponding Only using MWCON (NEW).PlugIns
      summaryfile
      area paddock -> /simulations/Manager Set Variables/Setable Variables - Erosion (OLD)/paddock
        outputfile: filename=Setable Variables - Erosion (NEW).out; title=Setable Variables - Erosion (NEW)
          variables -> /simulations/Manager Set Variables/Setable Variables - Erosion (OLD)/paddock/outputfile/Variables
          events Reporting Frequency -> /simulations/Manager Set Variables/Setable Variables - Erosion (OLD)/paddock/outputfile/Reporting Frequency
    memo Setable Variables - Runoff
      Do not include eo_source because I don't know if we are going to be implementing this feature.

      If you do, don't do the set here, do it in it's own "Eo Source" simulation where you reset it to a different Eo module and see if it finds that module and changes the values.
    simulation Setable Variables - Runoff (OLD)
      metfile met
        filename=%apsim%\Tests\SoilWater\Process Event\Setable Variables - Runoff.met
      clock
        start_date = 01/01/1940  # Enter the start date of the simulation
        end_date = 10/01/1940  # Enter the end date of the simulation
      summaryfile
      area paddock
        Soil: LocalName=Waco; Site=Jimbour; Region=South East Queensland
          SoilType = Black Vertosol  # Soil description
          NearestTown = Jimbour, Q 4352
          NaturalVegetation = Grassland, mainly Qld bluegrass
          Sample Soil sample
            Thickness  NO3  NH4  SW
            150        0    0    0
            150        0    0    0
            300        0    0    0
            300        0    0    0
            300        0    0    0
            300        0    0    0
            300        0    0    0
            300        0    0    0
            300        0    0    0
            300        0    0    0
            300        0    0    0
            Date = 02/01/1940  # Sample date
          Water: same as Manager Set Variables.Setable Variables - Erosion (OLD).paddock.Soil.Water
          SoilWater
            Thickness  SWCON  MWCON
            150        0      0
            150        0      1
            300        0      1
            300        0      1
            300        0      1
            300        0      1
            300        0      1
            300        0      1
            300        0      1
            300        0      1
            300        0      1
            SummerCona = 0
            SummerU = 0
            SummerDate = 1-Nov
            WinterCona = 0
            WinterU = 0
            WinterDate = 1-Apr
            DiffusConst = 0
            DiffusSlope = 0
            Salb = 0.13
            CN2Bare = 50
            CNRed = 30
            CNCov = 0.5
            MaxPond = 200
          SoilOrganicMatter: same as Saturated Flow Only (OLD).paddock.Soil.SoilOrganicMatter
          Analysis
            Thickness  EC    PH
            150        0.2   8.4
            150        0.25  8.8
            300        0.31  9
            300        0.4   9.2
            300        0.59  9.2
            300        0.84  9.1
            300        0.93  9
            300        1.01  9
            300        1.06  8.9
            300        1.05  8.9
            300        1.01  8.9
        manager set setable variables
          on start_of_day:
```
if day = 4 and year = 1940 then
   'Soil Water' set cn2_bare = 100
   'Soil Water' set cn_red = 60      
   'Soil Water' set cn_cov = 0.8 
   !'Soil Water' set eo_source = 'Brand_New_Eo_Source' 
endif

if day = 7 and year = 1940 then

   'Soil Water' reset
endif
```
        outputfile: filename=Setable Variables - Runoff (OLD).out; title=Setable Variables - Runoff (OLD)
          variables
            variables: dd/mm/yyyy as Date, cn2_bare, cn_cov, cn_red
          events Reporting Frequency: event=end_day
    simulation Setable Variables - Runoff (NEW) -> /simulations/Manager Set Variables/Setable Variables - Runoff (OLD)
      PlugIns: same as Ponding Only using MWCON (NEW).PlugIns
      summaryfile
      area paddock -> /simulations/Manager Set Variables/Setable Variables - Runoff (OLD)/paddock
        outputfile: filename=Setable Variables - Runoff (NEW).out; title=Setable Variables - Runoff (NEW)
          variables -> /simulations/Manager Set Variables/Setable Variables - Runoff (OLD)/paddock/outputfile/Variables
          events Reporting Frequency -> /simulations/Manager Set Variables/Setable Variables - Runoff (OLD)/paddock/outputfile/Reporting Frequency
    folder cause ExternalMassFlow Event
      memo cause ExternalMassFlow Event
         An ExternalMassFlow event should be fired off when water inexplicably comes from no where into the system.
        Water comming from no where violates the principle that the SoilWater modules are a closed system where water into the system equals water out of the system.

        The "System Balance" module is used to keep track of all the water in the system and will let you know if the water IN does not equal the water OUT of the system.
        The ExternalMassFlow event is used to tell the "System Balance" module that water has appeared from no where and this is how much of it has either come in or being lost.
        This allows the "System Balance" module to compensate and not throw an error.

        The following simulations in my opinion should ALL cause External Mass Flow Events to be triggered because water just appears out of no where.
        Which should cause System Balance model to no longer balance.

        Even though all these should throw External Mass Flow events, not all of them do.
        Infact only the Reset command and the Set of "sw" does.

        In my view if setting "sw" throws a EMF event then so should setting "sw_dep", "dlt_sw and "dlt_sw_dep".

        I also believe that Setting the "water_table" to a fixed value should also cause an EMF , because any water extracted by the plant is just replaced automatically to maintain the fixed water_table depth. Therefore water is appearing out of no where into the system.

         Doing "sets" for the initial starting soil water variables should also cause an EMF event
      memo WaterTable - Set
        Also want to try "Setting" the WaterTable to a fixed value. To test this setting code. This code is supposed to fix the water table to a constant value so it does not go up or down.
        This simulates the more real world water table where water can flow out laterally or flow in laterally to maintain a fixed value. This does these losses for you without you have to use
        LateralFlow capability of this module.

        There is actually quite a bit of code to do this. Which is why it merits its own test.

         There is a bug in the SoilWat code you have to set the water_table each day otherwise it does not do it.
        That is why the manager code is in a start_of_day tab. The set command has to run every day.

        There is no point doing a Reset on the Water Table because thanks to the bug mentioned above you need to set it each day.
        So if you want to reset the Water Table then just don't set it on that day
      simulation WaterTable - Set to a fixed depth (OLD)
        metfile met
          filename=%apsim%\Tests\SoilWater\Process Event\WaterTable - Set to a fixed depth.met
        clock
          start_date = 01/01/1940  # Enter the start date of the simulation
          end_date = 02/03/1940  # Enter the end date of the simulation
        summaryfile
        area paddock
          Soil: LocalName=Waco; Site=Jimbour; Region=South East Queensland
            SoilType = Black Vertosol  # Soil description
            NearestTown = Jimbour, Q 4352
            NaturalVegetation = Grassland, mainly Qld bluegrass
            Sample Soil sample
              Thickness  NO3  NH4  SW
              150        0    0    0
              150        0    0    0
              300        0    0    0
              300        0    0    0
              300        0    0    0
              300        0    0    0
              300        0    0    0
              300        0    0    0
              300        0    0    0
              300        0    0    0
              300        0    0    0
              Date = 02/01/1940  # Sample date
            Water
              Thickness  BD    AirDry  LL15  DUL  SAT
              150        1.02  0.15    0.29  0.5  0.8
              150        1.03  0.26    0.29  0.5  0.8
              300        1.02  0.29    0.29  0.5  0.8
              300        1.02  0.29    0.29  0.5  0.8
              300        1.06  0.3     0.3   0.5  0.8
              300        1.11  0.31    0.31  0.5  0.8
              300        1.12  0.32    0.32  0.5  0.8
              300        1.15  0.33    0.33  0.5  0.8
              300        1.18  0.34    0.34  0.5  0.8
              300        1.2   0.35    0.35  0.5  0.8
              300        1.25  0.36    0.36  0.5  0.8
            SoilWater: same as Runon and Lateral Inflow Inputs (OLD).paddock.Soil.SoilWater
            SoilOrganicMatter: same as Saturated Flow Only (OLD).paddock.Soil.SoilOrganicMatter
            Analysis
              Thickness  EC    PH
              150        0.2   8.4
              150        0.25  8.8
              300        0.31  9
              300        0.4   9.2
              300        0.59  9.2
              300        0.84  9.1
              300        0.93  9
              300        1.01  9
              300        1.06  8.9
              300        1.05  8.9
              300        1.01  8.9
          manager set water table
            on start_of_day:
```
'Soil Water' set water_table = 2000
```
          outputfile: filename=WaterTable - Set to a fixed depth (OLD).out; title=WaterTable - Set to a fixed depth (OLD)
            variables
              variables: dlayer, sat_dep, dul_dep, ll15_dep, air_dry_dep, dd/mm/yyyy as Date, rain, runoff, es, drain, water_table, sw, flux, flow, sw_dep
            events Reporting Frequency: event=end_day
      simulation WaterTable - Set to a fixed depth (NEW) -> /simulations/Manager Set Variables/cause ExternalMassFlow Event/WaterTable - Set to a fixed depth (OLD)
        PlugIns: same as Ponding Only using MWCON (NEW).PlugIns
        summaryfile
        area paddock -> /simulations/Manager Set Variables/cause ExternalMassFlow Event/WaterTable - Set to a fixed depth (OLD)/paddock
          outputfile: filename=WaterTable - Set to a fixed depth (NEW).out; title=WaterTable - Set to a fixed depth (NEW)
            variables -> /simulations/Manager Set Variables/cause ExternalMassFlow Event/WaterTable - Set to a fixed depth (OLD)/paddock/outputfile/Variables
            events Reporting Frequency -> /simulations/Manager Set Variables/cause ExternalMassFlow Event/WaterTable - Set to a fixed depth (OLD)/paddock/outputfile/Reporting Frequency
      memo Setable Variables - Water
        The dlt_sw or "dlt_sw_dep" are just the delta's of the sw and sw_dep.
        So rather then setting sw or sw_dep to a specific number of mm, you instead tell it then number of mm by which to alter sw and sw_dep. Using + and - to indicate adding or removing.
        This way you don't need to worry about knowing what the current sw or sw_dep is.

        In my view if setting "sw" throws a EMF event

        then so should setting "sw_dep", "dlt_sw and "dlt_sw_dep".

        Give it 3 days after each "set" just to make sure it has permanently changed it, rather then just changing it for just that day.

        Notice the delta_sw violates this rule. But this is a bug I think. Since there are probably no simulations that use this delta_sw

        THIS TESTS THE SYSTEM BALANCE MODULE AS WELL
        ------------------------------------------------------------------------------------------------

        I dragged a "system balance checker" onto the paddock to see if it was working.

        If you take a look in the summary file you will see in various parts of the file the following,

           Component       "System balance checker" = %apsim%\Model\SysBal.dll

        5 January 1940(Day of year=5), System balance checker:
             **** SW balance - unaccounted gain (mm) =    600.000000

        14 January 1940(Day of year=14), System balance checker:
             **** SW balance - unaccounted loss (mm) =   -220.000000

        The 5 January was when we did a,
               'Soil Water' set dlt_sw =  0.2 0.2 0.2 0.2 0.2 0.2 0.2 0.2 0.2 0.2 0.2

        The 14 January was when we did a,
           'Soil Water' set dlt_sw_dep = -20 -20 -20 -20 -20 -20 -20 -20 -20 -20 -20

        Neither "dlt_sw" or "dlt_sw_dep" throw an EMF event when they are "set" (even though they should) which is why you get this warning.

        You will note that you don't get a warning when you set "sw" or "sw_dep" or when you do a Reset.
        This makes perfect sense for setting "sw" and doing a Reset because both of these throw and EMF event (with the amount of water that has been changed) when they are done.
        Therefore the "system balance checker" knows about this change in water and does not write a warning in the summary file.

        Setting "sw_dep" is a bit stranger because it does not throw an EMF event. That line is commented out of SoilWat's soilwat2_set_my_variable() function.
        You should get a warning but you don't. I think it must be hard coded into the "system balance checker" to take setting "sw_dep" into account.
      simulation Setable Variables - Water (OLD)
        metfile met
          filename=%apsim%\Tests\SoilWater\Process Event\Setable Variables - Water.met
        clock
          start_date = 01/01/1940  # Enter the start date of the simulation
          end_date = 20/01/1940  # Enter the end date of the simulation
        summaryfile
        area paddock
          sysbal System balance checker
          Soil: same as Manager Set Variables.cause ExternalMassFlow Event.WaterTable - Set to a fixed depth (OLD).paddock.Soil
          manager set setable variables
            on start_of_day:
```
!sw's (fractional values)

if day = 2 and year = 1940 then

          'Soil Water' set sw = 0.3 0.3 0.3 0.3 0.3 0.3 0.3 0.3 0.3 0.3 0.3    
endif


if day = 5 and year = 1940 then 

       'Soil Water' set dlt_sw =  0.2 0.2 0.2 0.2 0.2 0.2 0.2 0.2 0.2 0.2 0.2    
endif




!reset the soil water again

if day = 8 and year = 1940 then

   'Soil Water' reset    
endif




!sw_dep's (in millimeters)

if day = 11 and year = 1940 then

       'Soil Water' set sw_dep = 30 30 30 30 30 30 30 30 30 30 30   
endif


if day = 14 and year = 1940 then

   'Soil Water' set dlt_sw_dep = -20 -20 -20 -20 -20 -20 -20 -20 -20 -20 -20   
endif


if day = 17 and year = 1940 then

   'Soil Water' reset
endif
```
          outputfile: filename=Setable Variables - Water (OLD).out; title=Setable Variables - Water (OLD)
            variables
              variables: dd/mm/yyyy as Date, sw, sw_dep, dlayer, sat, dul, ll15, air_dry, sat_dep, dul_dep, ll15_dep, air_dry_dep, rain, runoff
            events Reporting Frequency: event=end_day
      simulation Setable Variables - Water (NEW) -> /simulations/Manager Set Variables/cause ExternalMassFlow Event/Setable Variables - Water (OLD)
        PlugIns: same as Ponding Only using MWCON (NEW).PlugIns
        summaryfile
        area paddock -> /simulations/Manager Set Variables/cause ExternalMassFlow Event/Setable Variables - Water (OLD)/paddock
          outputfile: filename=Setable Variables - Water (NEW).out; title=Setable Variables - Water (NEW)
            variables -> /simulations/Manager Set Variables/cause ExternalMassFlow Event/Setable Variables - Water (OLD)/paddock/outputfile/Variables
            events Reporting Frequency -> /simulations/Manager Set Variables/cause ExternalMassFlow Event/Setable Variables - Water (OLD)/paddock/outputfile/Reporting Frequency
      memo Setable Variables - Initial Soil Water
        Setting the initial starting water values of  'insoil', 'profile_esw_depth', 'wet_soil_depth', 'profile_fesw'  do NOT throw and EMF event.

        But they should.

        Note:
        The GUI no longer uses any of these initial starting soil water variables. These variables are only still supported for backward compatibility with the old .con and .par files.
        The GUI now does the calculations of how to spread the starting water amoungst the layers. It is no longer left up to the Soil Water module to do this.
        The GUI just hands the Soil Water module a set of "sw" values. It sets these sw values based on whether the user wants it filled from the top, spread evenly, etc.

        They are also still supported so the user can do "sets" using these starting soil water variables without having to specify the sw for each layer.

        There are 5 different ways to initialise the soil water.
        !One of these methods involves just directly doing a "set" on the sw variable.
        This is tested in the ExternalMassFlow Event Test so we don't do it here. So that only leaves the other 4 ways.
        !The new GUI only uses this direct "set" of sw method, but the old .con and .par files use the other 4 ways and so they need to be supported and tested.
        !We are manually reinitialising the soil water using each of the remaining 4 methods.

        For the wet_soil_depth = 2100mm (210cm) this depth corresponds to layer 9 in the soil.
        So you will see layer 8 and above are set to DUL where as layer 9 and layers below are set to LL15. This is how it should be.

        Setting the initial starting water values of  'insoil', 'profile_esw_depth', 'wet_soil_depth', 'profile_fesw'  do NOT throw and EMF event.

        But they should.

        Note:
        The GUI no longer uses any of these initial starting soil water variables. These variables are only still supported for backward compatibility with the old .con and .par files.
        The GUI now does the calculations of how to spread the starting water amoungst the layers. It is no longer left up to the Soil Water module to do this.
        The GUI just hands the Soil Water module a set of "sw" values. It sets these sw values based on whether the user wants it filled from the top, spread evenly, etc.

        They are also still supported so the user can do "sets" using these starting soil water variables without having to specify the sw for each layer.

        There are 5 different ways to initialise the soil water.
        !One of these methods involves just directly doing a "set" on the sw variable.
        This is tested in the ExternalMassFlow Event Test so we don't do it here. So that only leaves the other 4 ways.
        !The new GUI only uses this direct "set" of sw method, but the old .con and .par files use the other 4 ways and so they need to be supported and tested.
        !We are manually reinitialising the soil water using each of the remaining 4 methods.

        For the wet_soil_depth = 2100mm (210cm) this depth corresponds to layer 9 in the soil.
        So you will see layer 8 and above are set to DUL where as layer 9 and layers below are set to LL15. This is how it should be.
      simulation Setable Variables - Initial Soil Water (OLD)
        metfile met
          filename=%apsim%\Tests\SoilWater\Process Event\Setable Variables - Initial Soil Water.met
        clock
          start_date = 01/01/1940  # Enter the start date of the simulation
          end_date = 21/01/1940  # Enter the end date of the simulation
        summaryfile
        area paddock
          Soil: LocalName=Waco; Site=Jimbour; Region=South East Queensland
            SoilType = Black Vertosol  # Soil description
            NearestTown = Jimbour, Q 4352
            NaturalVegetation = Grassland, mainly Qld bluegrass
            Sample Soil sample
              Thickness  NO3  NH4  SW
              150        0    0    0
              150        0    0    0
              300        0    0    0
              300        0    0    0
              300        0    0    0
              300        0    0    0
              300        0    0    0
              300        0    0    0
              300        0    0    0
              300        0    0    0
              300        0    0    0
              Date = 02/01/1940  # Sample date
            Water
              Thickness  BD    AirDry  LL15  DUL  SAT
              150        1.02  0.1     0.2   0.5  0.8
              150        1.03  0.1     0.2   0.5  0.8
              300        1.02  0.1     0.2   0.5  0.8
              300        1.02  0.1     0.2   0.5  0.8
              300        1.06  0.1     0.2   0.5  0.8
              300        1.11  0.1     0.2   0.5  0.8
              300        1.12  0.1     0.2   0.5  0.8
              300        1.15  0.1     0.2   0.5  0.8
              300        1.18  0.1     0.2   0.5  0.8
              300        1.2   0.1     0.2   0.5  0.8
              300        1.25  0.1     0.2   0.5  0.8
            SoilWater: same as Runon and Lateral Inflow Inputs (OLD).paddock.Soil.SoilWater
            SoilOrganicMatter: same as Saturated Flow Only (OLD).paddock.Soil.SoilOrganicMatter
            Analysis
              Thickness  EC    PH
              150        0.2   8.4
              150        0.25  8.8
              300        0.31  9
              300        0.4   9.2
              300        0.59  9.2
              300        0.84  9.1
              300        0.93  9
              300        1.01  9
              300        1.06  8.9
              300        1.05  8.9
              300        1.01  8.9
          manager set setable variables
            on start_of_day:
```
insoil_check = 0
fesw = 0

if day = 2 and year = 1940 then
 
   'Soil Water' set insoil = 2
   'Soil Water' set sw = 0.2 0.2 0.2 0.2 0.2 0.2 0.2 0.2 0.2 0.2 0.2 
endif




if day = 5 and year = 1940 then

   'Soil Water' reset   
endif

if day = 6 and year = 1940 then

   'Soil Water' set insoil = 0.3
   
   insoil_check = ll15_dep() + (dul_dep() - ll15_dep()) * 0.3
endif




if day = 9 and year = 1940 then

   'Soil Water' reset   
endif

if day = 10 and year = 1940 then

   'Soil Water' set profile_fesw = 0.5
   
   max_esw = dul_dep() - ll15_dep()
   fesw = esw / max_esw
endif




if day = 13 and year = 1940 then

   'Soil Water' reset  
endif

if day = 14 and year = 1940 then
   
   'Soil Water' set profile_esw_depth = 87 
endif



if day = 17 and year = 1940 then

   'Soil Water' reset   
endif

if day = 18 and year = 1940 then

   'Soil Water' set wet_soil_depth = 2100 
endif
```
          outputfile: filename=Setable Variables - Initial Soil Water (OLD).out; title=Setable Variables - Initial Soil Water (OLD)
            variables
              variables: dd/mm/yyyy as Date, sw_dep() as sw_dep_total, insoil_check, fesw, esw, sw(8), sw(9), sw(10), sw, sw_dep, dlayer, sat_dep, dul_dep, ll15_dep, air_dry_dep, rain, runoff, es, drain, flux, flow, max_esw
            events Reporting Frequency: event=end_day
      simulation Setable Variables - Initial Soil Water (NEW) -> /simulations/Manager Set Variables/cause ExternalMassFlow Event/Setable Variables - Initial Soil Water (OLD)
        PlugIns: same as Ponding Only using MWCON (NEW).PlugIns
        summaryfile
        area paddock -> /simulations/Manager Set Variables/cause ExternalMassFlow Event/Setable Variables - Initial Soil Water (OLD)/paddock
          outputfile: filename=Setable Variables - Initial Soil Water (NEW).out; title=Setable Variables - Initial Soil Water (NEW)
            variables -> /simulations/Manager Set Variables/cause ExternalMassFlow Event/Setable Variables - Initial Soil Water (OLD)/paddock/outputfile/Variables
            events Reporting Frequency -> /simulations/Manager Set Variables/cause ExternalMassFlow Event/Setable Variables - Initial Soil Water (OLD)/paddock/outputfile/Reporting Frequency
  folder Crop Tests
    memo WaterChanged Event Test
       This event was added so that the Plant2 module could extract water via its roots from the SoilWater module.
       At the time Plant2 was not advanced enough to be able to do a "Set" on another modules variables.
       Plant2 still uses this method to extract water using its roots. See the Plant too "Root Organ" (Root.cs) for the OnWaterChanged event.

      AgPasture and a couple of other crop modules also use this OnWaterChangedEvent.

      nb. All Plant2 modules need to add a Micromet component. All Plant2 moduels use Micromet

      We are going to use Slurp as the crop. Slurp is a Plant2 module and so uses the OnWaterChanged event for its roots.

      under "Tests\Potato2" folder, "Potato2_validation.apsim", under "Cultivars" folder,  start with "Cultivar_Burbank" simulation.
      nb. also copy the Lincoln.met as well. (from \Examples\MetFiles)

      Delete all the graphs and output files.

      Report the following variables at end of day,

      PlantStatus
      dd/mm/yyyy as Date
      RootWaterSupply
      RootWaterUptake
      WaterDemand
      WaterSupplyDemandRatio
      Cover_green
      Height
      Cover_tot
    simulation OnWaterChanged Event Test (OLD)
      metfile met
        filename=%apsim%\Tests\SoilWater\Process Event\OnWaterChanged Event Test.met
      clock
        start_date = 20/10/2003  # Enter the start date of the simulation
        end_date = 23/05/2004  # Enter the end date of the simulation
      summaryfile
      area paddock
        fertiliser
        surfaceom surface organic matter
          PoolName = wheat  # Organic Matter pool name
          type = wheat  # Organic Matter type
          mass = 2000  # Initial surface residue (kg/ha)
          cnr = 80  # C:N ratio of initial residue
          standing_fraction = 0  # Fraction of residue standing
        folder Manager folder
          manager Harvesting rule (disabled)
            # Harvesting criteria
            crop = potato2  # Enter name of crop to harvest when ripe
            on start_of_day:
```
           if [crop].PhenologyCurrentPhaseName = 'Maturity' or [crop].plant_status = 'dead' then
              [crop]  harvest
              [crop]  endcrop
           endif
```
          operations
            20/10/2003  fertiliser apply amount= 100 (kg/ha), type= urea_N (), depth= 10 (mm)
            25/11/2003  fertiliser apply amount= 69 (kg/ha), type= urea_N (), depth= 10 (mm)
            26/11/2003  irrigation apply amount= 15 (mm)
            4/12/2003  irrigation apply amount= 50 (mm)
            16/12/2003  irrigation apply amount= 15 (mm)
            22/12/2003  irrigation apply amount= 50 (mm)
            30/12/2003  irrigation apply amount= 50 (mm)
            8/1/2004  irrigation apply amount= 50 (mm)
            21/1/2004  irrigation apply amount= 50 (mm)
            31/1/2004  irrigation apply amount= 50 (mm)
            27/2/2004  irrigation apply amount= 25 (mm)
            25/12/2003  fertiliser apply amount= 0 (kg/ha), type= urea_N (), depth= 10 (mm)
          irrigation
            automatic_irrigation = off
            asw_depth = 600  # Depth to which ASW is calculated. (mm)
            crit_fr_asw = 0.5  # Fraction of ASW below which irrigation is applied (0-1.0)
            irrigation_efficiency = 1  # Efficiency of the irrigation. (0-1.0)
            irrigation_allocation = off  # Allocation limits
            allocation = 0  # Allocation in ML
            default_no3_conc = 0  # Nitrate concentration (ppm N)
            default_nh4_conc = 0  # Ammonium concentration (ppm N)
            default_cl_conc = 0  # Chloride concentration (ppm Cl)
            default_no3_conc = 0  # Nitrate concentration (ppm N)
            default_nh4_conc = 0  # Ammonium concentration (ppm N)
            default_cl_conc = 0  # Chloride concentration (ppm Cl)
          manager Potato Sowing Rule
            sowing_date = 20/10/2003
            emergence_date = 12/11/2003
            row_width = 770  # Row width (mm)
            inrow_spacing = 280  # In-row plant spacing (mm)
            stem_number = 2.2  # Stem number per plant
            cultivar = RussetBurbank
            sowing_depth = 120  # Sowing depth (mm)
            Harvest_date = 03/06/2000
            tt_planting = 700  # Accumulated tt before planting
            on start_of_day:
```
Plant_population = 1/(([row_width]/1000)*([inrow_spacing]/1000))
if today = date('[sowing_date]') then
   potato2 sow population = Plant_population, depth = [sowing_depth], cultivar = [cultivar], maxcover = 1.0, budnumber = [stem_number], row_spacing = [row_width], crop_class = plant  
endif
```
            on Init:
```
Plant_population = 0
```
            memo Stem # note
              Measured stem number was 2.4 but I have increased this to account for the likelyhood the the 3 stem subsample favored large stems so the mean stem weight was over prediced and stem number under
        Soil Templeton
          Analysis: Thickness=[100, 200, 300, 300, 300, 300]; PH=[6.6, 6.2, 5.7, 5.5, 5.5, 5.5]
          InitialWater Initial water: FractionFull=1.00; PercentMethod=EvenlyDistributed
          Water
            Thickness  BD   AirDry  LL15  DUL   SAT
            100        1.2  0.08    0.16  0.33  0.5
            200        1.2  0.16    0.16  0.33  0.5
            300        1.2  0.15    0.15  0.31  0.44
            300        1.2  0.13    0.13  0.27  0.46
            300        1.2  0.15    0.15  0.3   0.44
            300        1.2  0.15    0.15  0.3   0.44
            SoilCrop wheat: LL=[0.13, 0.13, 0.1, 0.08, 0.11, 0.11]; KL=[0.06, 0.06, 0.06, 0.06, 0.06, 0.06]; XF=[1, 1, 1, 1, 1, 1]
            SoilCrop potato2: LL=[0.13, 0.13, 0.1, 0.15, 0.3, 0.3]; KL=[0.1, 0.06, 0.04, 0.01, 0, 0]; XF=[1, 1, 0.3, 0.3, 0, 0]
            SoilCrop potato21: LL=[0.13, 0.13, 0.1, 0.15, 0.3, 0.3]; KL=[0.1, 0.1, 0.07, 0.05, 0.05, 0.05]; XF=[1, 1, 1, 1, 0, 0]
          SoilWater: SummerCona=4.4; SummerU=9; SummerDate=1-Nov; WinterCona=4.4; WinterU=9; WinterDate=1-Apr; DiffusConst=88; DiffusSlope=35.4; Salb=0.18; CN2Bare=68; CNRed=20; CNCov=0.8; Thickness=[100, 200, 300, 300, 300, 300]; SWCON=[0.55, 0.55, 0.55, 0.55, 0.55, 0.55]
          SoilOrganicMatter: RootCN=30; RootWt=3000; SoilCN=11.5; EnrACoeff=7.4; EnrBCoeff=0.2
            Thickness  OC    FBiom  FInert
            100        3.5   0.025  0.3
            200        2.5   0.025  0.4
            300        1.2   0.015  0.75
            300        1.03  0.01   0.9
            300        0.47  0.01   0.96
            300        0.47  0.01   0.96
          Sample Initial nitrogen: NO3Units=kgha; NH4Units=kgha
            Thickness  NO3      NH4
            100        40       0.1
            200        30       0.1
            300        14       0.1
            300        14       0.1
            300        1.38889  0.1
            300        1.38889  0.1
        micromet
          soilalbedo = 0.23
          a_interception = 0
          b_interception = 0
          c_interception = 0
          d_interception = 0
        potato2
        outputfile: filename=OnWaterChanged Event Test (OLD).out; title=OnWaterChanged Event Test (OLD)
          variables
            variables: PlantStatus, StageCodeValue, dd/mm/yyyy as Date, Cover_green, Cover_tot, Height, RootDepth, RootWaterUptake, sw_dep, RootWaterSupply, WaterDemand, WaterSupplyDemandRatio, RootSoilWaterEffectValue
          events Reporting Frequency: event=Daily
        log Diagnostic log file
    simulation OnWaterChanged Event Test (NEW) -> /simulations/Crop Tests/OnWaterChanged Event Test (OLD)
      PlugIns: same as Ponding Only using MWCON (NEW).PlugIns
      summaryfile
      area paddock -> /simulations/Crop Tests/OnWaterChanged Event Test (OLD)/paddock
        Soil Templeton -> /simulations/Crop Tests/OnWaterChanged Event Test (OLD)/paddock/Templeton
          Water -> /simulations/Crop Tests/OnWaterChanged Event Test (OLD)/paddock/Templeton/Water
            SoilCrop wheat: LL=[0.13, 0.13, 0.1, 0.08, 0.11, 0.11]; KL=[0.06, 0.06, 0.06, 0.06, 0.06, 0.06]; XF=[1, 1, 1, 1, 1, 1]
            SoilCrop potato2: LL=[0.13, 0.13, 0.1, 0.15, 0.3, 0.3]; KL=[0.1, 0.06, 0.04, 0.01, 0, 0]; XF=[1, 1, 0.3, 0.3, 0, 0]
            SoilCrop potato21: LL=[0.13, 0.13, 0.1, 0.15, 0.3, 0.3]; KL=[0.1, 0.1, 0.07, 0.05, 0.05, 0.05]; XF=[1, 1, 1, 1, 0, 0]
        outputfile: filename=OnWaterChanged Event Test (NEW).out; title=OnWaterChanged Event Test (NEW)
          variables -> /simulations/Crop Tests/OnWaterChanged Event Test (OLD)/paddock/Outputfile/Variables
          events Reporting Frequency -> /simulations/Crop Tests/OnWaterChanged Event Test (OLD)/paddock/Outputfile/Reporting Frequency
        log Diagnostic log file
    folder Runoff with Crops
      memo Runoff with Crops
        Use slurp because we want to test the SoilWater module, we don't want to test the other crop module. Slurp almost never changes.
        So you will ONLY get a diff with this simulation if they do something to the SoilWater module.
        Where as if we used another crop we would get a diff with this simulation whenever they changed that crop. Not just when they change the SoilWater module.

        Open  "MicrometTest" simulation from  "MicrometTest2slurp.apsim" under "Tests\MicroMet" folder

        Start with "Runoff Only" Simulation

        In the "Runoff Only" simulation we,
        Set CnRed and CnCov both to 0 because we have no crop in the simulation so it is bare earth and there is no Cover so CnRed and CnCov are never used anyway. (CnRed was 20 and CnCov was 0.8 )
        So set the CnRed and CnCov back to 20 and 0.8 respectively
        (Just like in "Runoff with SurfaceOM" simulation)

        Cover is deemed to be the combination of the SurfaceOM cover and the Crop Cover.
        Which is why we need CnRed and CnCov for both the "Runoff with SurfaceOM" and "Runoff with Crop" simulations.

        Add the following components from the "MicrometTest" simulation,

        micromet
        slurp
        slurproot
        slurp manager
        Under the Water component of the soil, copy the LL, KL and XF compont for
        slurp
        slurproot

        In the "slurp manager" rule on "start of day" tab change,
        if day = 1 and year = 1960 then
        to
        if day = 1 and year = 1940 then

        on "end of day" tab delete,
        micromet lai_table

        Report the following variables at end of day,

        Cover_green
        Cover_tot
        Height
      memo Short Crop Height
        The Height of the cover is impotant. For a given amount of cover, if it is short the cover should have full effect on reducing runoff. If it is tall the cover should have a reduced effect on reducing runoff.
        see soilwat2_cover_surface_runoff()

        See "Runoff with Crops" memo then do the following:

        In the "Slurp manager" "start of day" tab change the
        slurp.height = 200mm.

        Out of interest do a diff between the output file from this "Runoff with Crop - Short" simulation and the output file from the "Runoff Only" simulation and you wiill see the effect a Short Crop has on runoff.

        If you do a diff between the Short and the Tall Crops you will notice that they have different runoff's despite having exactly the same green cover and total cover.
        This shows the effect the height of the cover has on the runoff.
        For the exact same amount of cover, you will notice that the Short Crop has less runoff then the Tall Crop which is how it should be. Because short crops are lower to the ground and therefore block runoff better and does not give the drops time to pick up speed as they drip off the leaf before hitting the ground (because they less distance then from tall crops).
      simulation Runoff with Crop - Short (OLD)
        metfile met
          filename=%apsim%\Tests\SoilWater\Process Event\Runoff with Canopy Height.met
        clock
          start_date = 01/01/1940  # Enter the start date of the simulation
          end_date = 31/12/1950  # Enter the end date of the simulation
        summaryfile
        area paddock
          micromet
            soilalbedo = 0.23
            a_interception = 0
            b_interception = 0
            c_interception = 0
            d_interception = 0
          Soil: LocalName=Waco; Site=Jimbour; Region=South East Queensland
            SoilType = Black Vertosol  # Soil description
            NearestTown = Jimbour, Q 4352
            NaturalVegetation = Grassland, mainly Qld bluegrass
            Sample Soil sample
              Thickness  NO3  NH4  SW
              150        0    0    0.59
              150        0    0    0.58
              300        0    0    0.29
              300        0    0    0.29
              300        0    0    0.3
              300        0    0    0.31
              300        0    0    0.32
              300        0    0    0.33
              300        0    0    0.34
              300        0    0    0.35
              300        0    0    0.36
              Date = 02/01/1940  # Sample date
            Water
              Thickness  BD    AirDry  LL15  DUL   SAT
              150        1.02  0.15    0.29  0.54  0.59
              150        1.03  0.26    0.29  0.53  0.58
              300        1.02  0.29    0.29  0.54  0.59
              300        1.02  0.29    0.29  0.54  0.58
              300        1.06  0.3     0.3   0.52  0.57
              300        1.11  0.31    0.31  0.5   0.55
              300        1.12  0.32    0.32  0.5   0.55
              300        1.15  0.33    0.33  0.48  0.53
              300        1.18  0.34    0.34  0.47  0.52
              300        1.2   0.35    0.35  0.46  0.51
              300        1.25  0.36    0.36  0.44  0.49
              SoilCrop Slurp
                Thickness  LL    KL    XF
                100        0.29  0.06  1
                250        0.29  0.06  1
                300        0.29  0.06  1
                350        0.29  0.06  1
                400        0.3   0.06  1
                300        0.31  0.06  1
                300        0.32  0.06  1
                300        0.33  0.06  1
                300        0.34  0.06  1
                300        0.35  0.06  1
                300        0.36  0.06  1
              SoilCrop SlurpRoot
                LL=[0.29, 0.29, 0.29, 0.29, 0.3, 0.31, 0.32, 0.33, 0.34, 0.35, 0.36]
                KL=[0.06, 0.06, 0.06, 0.06, 0.06, 0.06, 0.06, 0.06, 0.06, 0.06, 0.06]
                XF=[1, 1, 1, 1, 1, 1, 1, 1, 1, 1, 1]
            SoilWater: same as Runoff with SurfaceOM (OLD).paddock.Soil.SoilWater
            SoilOrganicMatter: same as Saturated Flow Only (OLD).paddock.Soil.SoilOrganicMatter
            Analysis
              Thickness  EC    PH
              150        0.2   8.4
              150        0.25  8.8
              300        0.31  9
              300        0.4   9.2
              300        0.59  9.2
              300        0.84  9.1
              300        0.93  9
              300        1.01  9
              300        1.06  8.9
              300        1.05  8.9
              300        1.01  8.9
          slurp
          root slurproot
          manager Slurp manager
            on start_of_day:
```
if day = 1 and year = 1940 then
   ! initialise 
   slurp sow cultivar=slurpcultivar
   slurp.leaflai = 7.0
   slurp.Leaflaidead = 0.1
   slurp.height = 200.
endif
```
          outputfile: filename=Runoff with Crop - Short (OLD).out; title=Runoff with Crop - Short (OLD)
            variables
              variables: dd/mm/yyyy as Date, rain, runoff, Cover_green, Cover_tot, Height, dlayer, sat_dep, dul_dep, ll15_dep, air_dry_dep, sw_dep, flux, flow, drain, es
            events Reporting Frequency: event=end_day
      simulation Runoff with Crop - Short (NEW) -> /simulations/Crop Tests/Runoff with Crops/Runoff with Crop - Short (OLD)
        PlugIns: same as Ponding Only using MWCON (NEW).PlugIns
        summaryfile
        area paddock -> /simulations/Crop Tests/Runoff with Crops/Runoff with Crop - Short (OLD)/paddock
          Soil -> /simulations/Crop Tests/Runoff with Crops/Runoff with Crop - Short (OLD)/paddock/Soil
            Water -> /simulations/Crop Tests/Runoff with Crops/Runoff with Crop - Short (OLD)/paddock/Soil/Water
              SoilCrop Slurp
                Thickness  LL    KL    XF
                100        0.29  0.06  1
                250        0.29  0.06  1
                300        0.29  0.06  1
                350        0.29  0.06  1
                400        0.3   0.06  1
                300        0.31  0.06  1
                300        0.32  0.06  1
                300        0.33  0.06  1
                300        0.34  0.06  1
                300        0.35  0.06  1
                300        0.36  0.06  1
              SoilCrop SlurpRoot
                LL=[0.29, 0.29, 0.29, 0.29, 0.3, 0.31, 0.32, 0.33, 0.34, 0.35, 0.36]
                KL=[0.06, 0.06, 0.06, 0.06, 0.06, 0.06, 0.06, 0.06, 0.06, 0.06, 0.06]
                XF=[1, 1, 1, 1, 1, 1, 1, 1, 1, 1, 1]
          outputfile: filename=Runoff with Crop - Short (NEW).out; title=Runoff with Crop - Short (NEW)
            variables -> /simulations/Crop Tests/Runoff with Crops/Runoff with Crop - Short (OLD)/paddock/outputfile/Variables
            events Reporting Frequency -> /simulations/Crop Tests/Runoff with Crops/Runoff with Crop - Short (OLD)/paddock/outputfile/Reporting Frequency
      memo Tall Crop Height
        The Height of the cover is impotant. For a given amount of cover, if it is short the cover should have full effect on reducing runoff. If it is tall the cover should have a reduced effect on reducing runoff.
        see soilwat2_cover_surface_runoff()

        See "Runoff with Crops" memo then do the following:

        In the "Slurp manager" "start of day" tab change the
        slurp.height = 3000mm.

        Out of interest do a diff between the output file from this "Runoff with Crop - Tall" simulation and the output file from the "Runoff Only" simulation and you wiill see the effect a Tall Crop has on runoff.

        If you do a diff between the Short and the Tall Crops you will notice that they have different runoff's despite having exactly the same green cover and total cover.
        This shows the effect the height of the cover has on the runoff.
        For the exact same amount of cover, you will notice that the Short Crop has less runoff then the Tall Crop which is how it should be. Because short crops are lower to the ground and therefore block runoff better and does not give the drops time to pick up speed as they drip off the leaf before hitting the ground (because they less distance then from tall crops).
      simulation Runoff with Crop - Tall (OLD)
        metfile met
          filename=%apsim%\Tests\SoilWater\Process Event\Runoff with Canopy Height.met
        clock
          start_date = 01/01/1940  # Enter the start date of the simulation
          end_date = 31/12/1950  # Enter the end date of the simulation
        summaryfile
        area paddock
          micromet
            soilalbedo = 0.23
            a_interception = 0
            b_interception = 0
            c_interception = 0
            d_interception = 0
          Soil: same as Crop Tests.Runoff with Crops.Runoff with Crop - Short (OLD).paddock.Soil
          slurp
          root slurproot
          manager Slurp manager
            on start_of_day:
```
if day = 1 and year = 1940 then
   ! initialise 
   slurp sow cultivar=slurpcultivar
   slurp.leaflai = 7.0
   slurp.Leaflaidead = 0.1
   slurp.height = 3000.
endif
```
          outputfile: filename=Runoff with Crop - Tall (OLD).out; title=Runoff with Crop - Tall (OLD)
            variables
              variables: dd/mm/yyyy as Date, rain, runoff, Cover_green, Cover_tot, Height, dlayer, sat_dep, dul_dep, ll15_dep, air_dry_dep, sw_dep, flux, flow, drain, es
            events Reporting Frequency: event=end_day
      simulation Runoff with Crop - Tall (NEW) -> /simulations/Crop Tests/Runoff with Crops/Runoff with Crop - Tall (OLD)
        PlugIns: same as Ponding Only using MWCON (NEW).PlugIns
        summaryfile
        area paddock -> /simulations/Crop Tests/Runoff with Crops/Runoff with Crop - Tall (OLD)/paddock
          Soil -> /simulations/Crop Tests/Runoff with Crops/Runoff with Crop - Tall (OLD)/paddock/Soil
            Water -> /simulations/Crop Tests/Runoff with Crops/Runoff with Crop - Tall (OLD)/paddock/Soil/Water
              SoilCrop Slurp
                Thickness  LL    KL    XF
                100        0.29  0.06  1
                250        0.29  0.06  1
                300        0.29  0.06  1
                350        0.29  0.06  1
                400        0.3   0.06  1
                300        0.31  0.06  1
                300        0.32  0.06  1
                300        0.33  0.06  1
                300        0.34  0.06  1
                300        0.35  0.06  1
                300        0.36  0.06  1
              SoilCrop SlurpRoot
                LL=[0.29, 0.29, 0.29, 0.29, 0.3, 0.31, 0.32, 0.33, 0.34, 0.35, 0.36]
                KL=[0.06, 0.06, 0.06, 0.06, 0.06, 0.06, 0.06, 0.06, 0.06, 0.06, 0.06]
                XF=[1, 1, 1, 1, 1, 1, 1, 1, 1, 1, 1]
          outputfile: filename=Runoff with Crop - Tall (NEW).out; title=Runoff with Crop - Tall (NEW)
            variables -> /simulations/Crop Tests/Runoff with Crops/Runoff with Crop - Tall (OLD)/paddock/outputfile/Variables
            events Reporting Frequency -> /simulations/Crop Tests/Runoff with Crops/Runoff with Crop - Tall (OLD)/paddock/outputfile/Reporting Frequency
      memo Intercropping Crops
        If there is more then one crop in the ground you have to add up the covers of ALL the crops in the ground to workout how to change the runoff according to the crop cover.

        See "Runoff with Canopy" memo then do the following:

        Add the following components,

        slurp1
        slurp manager 1
        slurp1root

        Under the water component in the soil, add LL, KL and XF for slurp1 and slurp1root as well.

        Out of interest do a diff between the output file from this "Runoff with Intercropping" simulation and the output file from the "Runoff Only" simulation and you wiill see the effect Intercropping has on runoff.

        Also if you do a diff between this Intercropping Simulation and either the Short and the Tall Crops you will notice that it has different runoff to either the Short or the Tall Crop
        This shows that Intercropping has a distinct effect on the runoff.
        Also notice that it has less runoff then either the Runoff Only, Short Crop or Tall Crop. As you would expect having so much more cover on it.
      simulation Runoff with Intercropping (OLD)
        metfile met
          filename=%apsim%\Tests\SoilWater\Process Event\Runoff with Canopy Height.met
        clock
          start_date = 01/01/1940  # Enter the start date of the simulation
          end_date = 31/12/1950  # Enter the end date of the simulation
        summaryfile
        area paddock
          micromet
            soilalbedo = 0.23
            a_interception = 0
            b_interception = 0
            c_interception = 0
            d_interception = 0
          Soil: LocalName=Waco; Site=Jimbour; Region=South East Queensland
            SoilType = Black Vertosol  # Soil description
            NearestTown = Jimbour, Q 4352
            NaturalVegetation = Grassland, mainly Qld bluegrass
            Sample Soil sample
              Thickness  NO3  NH4  SW
              150        0    0    0.59
              150        0    0    0.58
              300        0    0    0.29
              300        0    0    0.29
              300        0    0    0.3
              300        0    0    0.31
              300        0    0    0.32
              300        0    0    0.33
              300        0    0    0.34
              300        0    0    0.35
              300        0    0    0.36
              Date = 02/01/1940  # Sample date
            Water
              Thickness  BD    AirDry  LL15  DUL   SAT
              150        1.02  0.15    0.29  0.54  0.59
              150        1.03  0.26    0.29  0.53  0.58
              300        1.02  0.29    0.29  0.54  0.59
              300        1.02  0.29    0.29  0.54  0.58
              300        1.06  0.3     0.3   0.52  0.57
              300        1.11  0.31    0.31  0.5   0.55
              300        1.12  0.32    0.32  0.5   0.55
              300        1.15  0.33    0.33  0.48  0.53
              300        1.18  0.34    0.34  0.47  0.52
              300        1.2   0.35    0.35  0.46  0.51
              300        1.25  0.36    0.36  0.44  0.49
              SoilCrop Slurp
                Thickness  LL    KL    XF
                100        0.29  0.06  1
                250        0.29  0.06  1
                300        0.29  0.06  1
                350        0.29  0.06  1
                400        0.3   0.06  1
                300        0.31  0.06  1
                300        0.32  0.06  1
                300        0.33  0.06  1
                300        0.34  0.06  1
                300        0.35  0.06  1
                300        0.36  0.06  1
              SoilCrop SlurpRoot
                LL=[0.29, 0.29, 0.29, 0.29, 0.3, 0.31, 0.32, 0.33, 0.34, 0.35, 0.36]
                KL=[0.06, 0.06, 0.06, 0.06, 0.06, 0.06, 0.06, 0.06, 0.06, 0.06, 0.06]
                XF=[1, 1, 1, 1, 1, 1, 1, 1, 1, 1, 1]
              SoilCrop Slurp1
                LL=[0.29, 0.29, 0.29, 0.29, 0.3, 0.31, 0.32, 0.33, 0.34, 0.35, 0.36]
                KL=[0.06, 0.06, 0.06, 0.06, 0.06, 0.06, 0.06, 0.06, 0.06, 0.06, 0.06]
                XF=[1, 1, 1, 1, 1, 1, 1, 1, 1, 1, 1]
              SoilCrop Slurp1Root
                LL=[0.29, 0.29, 0.29, 0.29, 0.3, 0.31, 0.32, 0.33, 0.34, 0.35, 0.36]
                KL=[0.06, 0.06, 0.06, 0.06, 0.06, 0.06, 0.06, 0.06, 0.06, 0.06, 0.06]
                XF=[1, 1, 1, 1, 1, 1, 1, 1, 1, 1, 1]
            SoilWater: same as Runoff with SurfaceOM (OLD).paddock.Soil.SoilWater
            SoilOrganicMatter: same as Saturated Flow Only (OLD).paddock.Soil.SoilOrganicMatter
            Analysis
              Thickness  EC    PH
              150        0.2   8.4
              150        0.25  8.8
              300        0.31  9
              300        0.4   9.2
              300        0.59  9.2
              300        0.84  9.1
              300        0.93  9
              300        1.01  9
              300        1.06  8.9
              300        1.05  8.9
              300        1.01  8.9
          slurp
          root slurproot
          manager Slurp manager
            on start_of_day:
            script: same as in Crop Tests.Runoff with Crops.Runoff with Crop - Short (OLD).paddock.Slurp manager
          slurp slurp1
          root slurp1root
          manager Slurp manager1
            on start_of_day:
```
if day = 1 and year = 1940 then
   ! initialise 
   slurp1 sow cultivar=slurpcultivar
   slurp1.leaflai = 7.0
   slurp1.Leaflaidead = 0.1
   slurp1.height = 3000.
endif
```
          outputfile: filename=Runoff with Intercropping (OLD).out; title=Runoff with Intercropping (OLD)
            variables
              variables: dd/mm/yyyy as Date, rain, runoff, Cover_green, Cover_tot, Height, dlayer, sat_dep, dul_dep, ll15_dep, air_dry_dep, sw_dep, flux, flow, drain, es
            events Reporting Frequency: event=end_day
      simulation Runoff with Intercropping (NEW) -> /simulations/Crop Tests/Runoff with Crops/Runoff with Intercropping (OLD)
        PlugIns: same as Ponding Only using MWCON (NEW).PlugIns
        summaryfile
        area paddock -> /simulations/Crop Tests/Runoff with Crops/Runoff with Intercropping (OLD)/paddock
          Soil -> /simulations/Crop Tests/Runoff with Crops/Runoff with Intercropping (OLD)/paddock/Soil
            Water -> /simulations/Crop Tests/Runoff with Crops/Runoff with Intercropping (OLD)/paddock/Soil/Water
              SoilCrop Slurp
                Thickness  LL    KL    XF
                100        0.29  0.06  1
                250        0.29  0.06  1
                300        0.29  0.06  1
                350        0.29  0.06  1
                400        0.3   0.06  1
                300        0.31  0.06  1
                300        0.32  0.06  1
                300        0.33  0.06  1
                300        0.34  0.06  1
                300        0.35  0.06  1
                300        0.36  0.06  1
              SoilCrop SlurpRoot
                LL=[0.29, 0.29, 0.29, 0.29, 0.3, 0.31, 0.32, 0.33, 0.34, 0.35, 0.36]
                KL=[0.06, 0.06, 0.06, 0.06, 0.06, 0.06, 0.06, 0.06, 0.06, 0.06, 0.06]
                XF=[1, 1, 1, 1, 1, 1, 1, 1, 1, 1, 1]
              SoilCrop Slurp1
                LL=[0.29, 0.29, 0.29, 0.29, 0.3, 0.31, 0.32, 0.33, 0.34, 0.35, 0.36]
                KL=[0.06, 0.06, 0.06, 0.06, 0.06, 0.06, 0.06, 0.06, 0.06, 0.06, 0.06]
                XF=[1, 1, 1, 1, 1, 1, 1, 1, 1, 1, 1]
              SoilCrop Slurp1Root
                LL=[0.29, 0.29, 0.29, 0.29, 0.3, 0.31, 0.32, 0.33, 0.34, 0.35, 0.36]
                KL=[0.06, 0.06, 0.06, 0.06, 0.06, 0.06, 0.06, 0.06, 0.06, 0.06, 0.06]
                XF=[1, 1, 1, 1, 1, 1, 1, 1, 1, 1, 1]
          outputfile: filename=Runoff with Intercropping (NEW).out; title=Runoff with Intercropping (NEW)
            variables -> /simulations/Crop Tests/Runoff with Crops/Runoff with Intercropping (OLD)/paddock/outputfile/Variables
            events Reporting Frequency -> /simulations/Crop Tests/Runoff with Crops/Runoff with Intercropping (OLD)/paddock/outputfile/Reporting Frequency
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