folder simulations: version=36; creator=Apsim 7.6-r3391
  memo Info
    ========================================================================

          Generic tests for solute2 - Comparison between old and new models,

            >>  Using Cl, as Solute module (old Fortran code) or as Solute2 (.NET version)
            >>  Comparison using SoilWat or SWIM2

    ========================================================================

      NOTES:
        - Results between paddocks in the same simulation should be equal or very near (minor diffs might exist due to differences between the languages)
        - Comparison between simulations are not valid as the soil descriptions are not for the same soil type, they were taken arbitrarily
  simulation SolutesTest-Compare(SoilWat)
    clock
      start_date = 01/01/2000  # Enter the start date of the simulation
      end_date = 31/01/2000  # Enter the end date of the simulation
    metfile met: filename=%apsim%\Examples\MetFiles\MildTemperate.met
    memo Info
      ========================================================================
            Generic tests for solute2 - Comparison between old and new models, using Cl
      ========================================================================

        » Basic simulation description:
          + Bare soil
          + Generic soil - Silt Loam
          + Artificial mild temperate weather
          + 1 kg/ha of solute in top 3 layers at start
          + Solute applied 1 kg/ha in top layer

         » Paddock1 uses Solute module (old Fortran code)
         » Paddock2 uses Solute2 model (.NET version)

         + This simulation uses a tracer-like solute:
           - No interactions with soil, except leaching
           - No transformations in the solute
           - Solute diffusion computed by solute models

        >> NOTE:
          - The variable diffusion_Cl will not be numeric in Paddock1, as the Solute module does not output this variable, The values will be numeric for Paddock2.
    summaryfile
    area Paddock1
      folder ManagerFolder
        manager2 ApplyOldSolute
          # Apply a given solute to the soil
          ApplySolute_name = cl  # Name of the solute to apply
          # When and how often to apply
          ApplySolute_start_date = 16/01/2000  # Date to start applications (dd/mm/yyyy)
          ApplySolute_end_date = 31/12/2010  # Date to end applications (dd/mm/yyyy)
          ApplySolute_interval = 61  # Interval between applications (days)
          ApplySolute_times = 1  # Number of times to apply
          # Amount and depth for applications
          ApplySolute_amount2add = 1  # Amount of solute to apply (kg/ha)
          ApplySolute_depth2add = 1  # Depth for application (mm)
```vb
Imports System
Imports ModelFramework

' This manager applies a given amount of solute to the soil (using old Solute module). It will add from the surface till the depth specified (decreasing linearly)
'  The manager can also repeat the application periodically within a given window

'-->  Last uptaded in: 15/Sep/2013 ..................


Public Class Script 
   
   'Parameter variables:
   <param> Private ApplySolute_name As String
   <param> Private ApplySolute_start_date As String
   <param> Private ApplySolute_end_date As String
   <param> Private ApplySolute_interval As Integer
   <param> Private ApplySolute_times As Integer
   <param> Private ApplySolute_amount2add As Double
   <param> Private ApplySolute_depth2add As Double
   
   'link to paddock models
   <Link> Public MyPaddock As Paddock

   'Variables read from other modules
   <Input> Private today As DateTime            'Today's date
   <Input> Private dlayer As Double()           'Soil layers structure

   'Output variables
   <Output><Units("kg/ha")> Public SoluteAdded As Double       'The amount of solute added

   'Internal variables
   Private StartDate As DateTime                'The date when applications start (in date format)
   Private EndDate As DateTime                  'The date when applications finish (in date format)
   Private TimeAfterApplication As Integer      'Number of days after an application
   Private SoilDepth As Double                  'The soil depth (mm)
   Private LayerFraction() As Double        'The fraction of solute applied in each layer
   Private NumberOfApplications As Integer      'Number of applications

   <EventHandler()> Public Sub OnInitialised()

      'Put the dates into date format:
      StartDate = DateTime.Parse(ApplySolute_start_date & " 06:00:00 am")
      EndDate = DateTime.Parse(ApplySolute_end_date & " 06:00:00 pm")
      NumberOfApplications = 0
      TimeAfterApplication = 1
      
      'Computes the fraction of solute to be applied in each layer
      Console.WriteLine(" Applying solute, " & ApplySolute_amount2add.ToString("#0.0#") & " kg/ha, in following layers")
      ReDim LayerFraction(dlayer.length - 1)
      Dim Depth_from_surface As Double = 0
      Dim surf_L As Double = 2 / ApplySolute_depth2add
      Dim upper_L As Double = surf_L
      Dim lower_L As Double = 0
      Dim thisLayer As Double = 0
      For Layer As Integer = 0 To dlayer.length - 1
         Depth_from_surface += dlayer(Layer)
         If Depth_from_surface >= ApplySolute_depth2add Then
            ' last layer
            lower_L = 0
            thisLayer = dlayer(Layer) - (Depth_from_surface - ApplySolute_depth2add)
         Else
            ' intermediate layer
            lower_L = surf_L * (ApplySolute_depth2add - Depth_from_surface) / ApplySolute_depth2add
            thisLayer = dlayer(Layer)
         End If
         LayerFraction(Layer) = (upper_L + lower_L) * thisLayer / 2
         upper_L = lower_L
         Console.WriteLine(" Fraction in layer (" & Layer.ToString() & "): " & LayerFraction(Layer).ToString())
         If Depth_from_surface >= ApplySolute_depth2add Then Layer = dlayer.length               
      Next
      

   End Sub

   <EventHandler()> Public Sub OnPrepare()

      'Re-set variables
      SoluteAdded = 0
      Dim delta_solute(dlayer.Length - 1) As Double

      'Decide whether it is time to start applications:
      If (today.Date >= StartDate.Date) And (today.Date <= EndDate.Date) And (NumberOfApplications < ApplySolute_times) Then
         If (today - StartDate).TotalDays < 0.5 Then
            ' always apply on the starting date, or beginning of simulation
            For Layer As Integer = 0 To dlayer.length - 1
               delta_solute(Layer) = ApplySolute_amount2add * LayerFraction(Layer)
               SoluteAdded += delta_solute(Layer)
               If LayerFraction(Layer) <= 1E-12 Then Layer = dlayer.length
            Next
            TimeAfterApplication = 1
            NumberOfApplications += 1
         Else
            ' apply at given intervals
            If TimeAfterApplication >= ApplySolute_interval Then
               For Layer As Integer = 0 To dlayer.length - 1
                  delta_solute(Layer) = ApplySolute_amount2add * LayerFraction(Layer)
                  SoluteAdded += delta_solute(Layer)
                  If LayerFraction(Layer) <= 1E-12 Then Layer = dlayer.length               
               Next
               TimeAfterApplication = 1
               NumberOfApplications += 1
            Else
               TimeAfterApplication = TimeAfterApplication + 1
               SoluteAdded = 0
            End If
         End If

         'Make the application
         If TimeAfterApplication = 1 Then
            Dim DummyResult As Boolean
            DummyResult = MyPaddock.Set("dlt_" & ApplySolute_name, delta_solute)
            
            Console.WriteLine(today.ToString("dd MMMM yyyy") + " (Day of year=" + today.DayOfYear.ToString + "), ApplyOldSolute:")
            Console.WriteLine("     " & ApplySolute_name & " being applied at " + SoluteAdded.ToString("0.00") + "kg/ha, added down to depth " + ApplySolute_depth2add.ToString("0") + "mm")
         End If
      End If            
      
   End Sub

End Class
```
      micromet
        soilalbedo = 0.23
        a_interception = 0
        b_interception = 0
        c_interception = 0
        d_interception = 0
      Solute Cl
        solute_names = Cl  # Name of this solute
        d0 = 108  # Solute diffusivity in water (mm2/d)
        layers = 1.0  1.0  10  0.0  0.0  # Solute in each layer (kg/ha)
      surfaceom SurfaceOrganicMatter
        PoolName = grass  # Organic Matter pool name
        type = grass  # Organic Matter type
        mass = 200  # Initial surface residue (kg/ha)
        cnr = 20  # C:N ratio of initial residue
        standing_fraction = 0  # Fraction of residue standing
      Soil MediumTextureSoil: SoilType=NZ_Generic; Region=Plains; Country=New Zealand; Latitude=0; Longitude=0
        DataSource=Generic profile descriptions provided by Trevor Webb and data for functional horizions based on SWAMP project results
        Comments=Bulk density values were measured on the fine earth fraction so values entered into apsim soil are adjusted down to account for stone content (assuming stones are inert from all soil process so their mass and volume is removed from model paramaters).  SAT, DUL, LL15 and Air dry have been adjusted down to account for stone content.  OC has not been adjusted so the model will get the correct carbon and N amounts using the adjusted BD.
        Analysis: PHUnits=Water; BoronUnits=HotWater
          Thickness  Rocks  PH  CEC  ParticleSizeSand  ParticleSizeSilt  ParticleSizeClay
          250        0      6   13   14.5              65.5              20
          300        0      6   9    18                58                24
          300        0      6   9    14                63                23
          300        70     6   5    37.7916           57.0964           5.112
          350        70     6   5    37.7916           57.0964           5.112
          Rocks, PH, CEC, ParticleSizeSand, ParticleSizeSilt, ParticleSizeClay source: Estimated based on local knowledge
        Water
          Thickness  BD      AirDry   LL15    DUL     SAT       KS
          250        1.3105  0.07675  0.1535  0.3735  0.456165  4832.04
          300        1.524   0.201    0.201   0.332   0.39432   389.229
          300        1.65    0.201    0.201   0.3375  0.358515  16.3619
          300        0.39    0.012    0.012   0.039   0.12      16800
          350        0.39    0.012    0.012   0.039   0.12      16800
          BD, AirDry, LL15, DUL, SAT source: Estimated based on local knowledge
          SoilCrop Barley: LL=[0.1535, 0.201, 0.201, 0.012, 0.012]; KL=[0.220855, 0.226151, 0.029401, 0.0857287, 0.0202585]; XF=[1, 1, 0.301194, 1, 1]
            LL source: Estimated based on local knowledge
          SoilCrop Canola: LL=[0.1535, 0.201, 0.201, 0.012, 0.012]; KL=[0.220855, 0.226151, 0.029401, 0.0857287, 0.0202585]; XF=[1, 0.825307, 0.120996, 1, 1]
            LL source: Estimated based on local knowledge
          SoilCrop Cloverseed: LL=[0.1535, 0.201, 0.201, 0.012, 0.012]; KL=[0.154575, 0.052235, 0.00872456, 0.01292, 0.00222182]; XF=[1, 1, 0.153816, 1, 1]
            LL source: Estimated based on local knowledge
          SoilCrop Fieldpea: LL=[0.1535, 0.201, 0.201, 0.012, 0.012]; KL=[0.200508, 0.109925, 0.0154432, 0.0261437, 0.00445368]; XF=[1, 0.449329, 0.090718, 1, 1]
            LL source: Estimated based on local knowledge
          SoilCrop Fababean: LL=[0.1535, 0.201, 0.201, 0.012, 0.012]; KL=[0.240379, 0.330128, 0.0779416, 0.268694, 0.0951147]; XF=[1, 0.825307, 0.120996, 1, 1]
            LL source: Estimated based on local knowledge
          SoilCrop kale: same as SolutesTest-Compare(SoilWat).Paddock1.MediumTextureSoil.Water.Canola
          SoilCrop ItallianRyegrass: same as SolutesTest-Compare(SoilWat).Paddock1.MediumTextureSoil.Water.Canola
          SoilCrop Lucerne: LL=[0.1535, 0.201, 0.201, 0.012, 0.012]; KL=[0.20426, 0.363694, 0.126812, 0.424806, 0.284676]; XF=[1, 1, 0.301194, 1, 1]
            LL source: Estimated based on local knowledge
          SoilCrop Maize: LL=[0.1535, 0.201, 0.201, 0.012, 0.012]; KL=[0.249634, 0.358603, 0.128204, 0.411121, 0.203564]; XF=[1, 0.825307, 0.120996, 1, 1]
            LL source: Estimated based on local knowledge
          SoilCrop Oats: LL=[0.1535, 0.201, 0.201, 0.012, 0.012]; KL=[0.220855, 0.226151, 0.029401, 0.0857287, 0.0202585]; XF=[1, 1, 0.153816, 1, 1]
            LL source: Estimated based on local knowledge
          SoilCrop Potato: LL=[0.1535, 0.201, 0.201, 0.012, 0.012]; KL=[0.17408, 0.0379024, 0.0034704, 0.00256466, 0.000220782]; XF=[1, 0.449329, 0.090718, 1, 1]
            LL source: Estimated based on local knowledge
          SoilCrop Grassseed: LL=[0.1535, 0.201, 0.201, 0.012, 0.012]; KL=[0.180564, 0.0593637, 0.00760114, 0.00814475, 0.000990261]; XF=[1, 0.825307, 0.120996, 1, 1]
            LL source: Estimated based on local knowledge
          SoilCrop Triticale: same as SolutesTest-Compare(SoilWat).Paddock1.MediumTextureSoil.Water.Oats
          SoilCrop Wheat: same as SolutesTest-Compare(SoilWat).Paddock1.MediumTextureSoil.Water.Oats
          SoilCrop ryegrass_clover: same as SolutesTest-Compare(SoilWat).Paddock1.MediumTextureSoil.Water.Grassseed
          SoilCrop ryegrass: same as SolutesTest-Compare(SoilWat).Paddock1.MediumTextureSoil.Water.Grassseed
          SoilCrop whiteclover: same as SolutesTest-Compare(SoilWat).Paddock1.MediumTextureSoil.Water.Fieldpea
        SoilWater: SummerCona=4.4; SummerU=9; SummerDate=1-Oct; WinterCona=3; WinterU=6; WinterDate=1-Apr; DiffusConst=88; DiffusSlope=35; Salb=0.13; CN2Bare=73; CNRed=20; CNCov=0.8; Thickness=[250, 300, 300, 300, 350]; SWCON=[0.496442, 0.365575, 0.0968316, 0.650598, 0.650598]
        SoilOrganicMatter: RootCN=40; RootWt=1000; SoilCN=11; EnrACoeff=7.4; EnrBCoeff=0.2; OCUnits=Total
          Thickness  OC        FBiom      FInert
          250        2.36763   0.0288947  0.449328
          300        0.493357  0.0136287  0.758676
          300        0.226613  0.0105998  0.901885
          300        0.202414  0.0100992  0.960109
          350        0.200179  0.0100141  0.984954
          OC source: Estimated based on local knowledge
        InitialWater Initial water: FractionFull=1; PercentMethod=FilledFromTop
        Sample Initial nitrogen: NO3Units=kgha; NH4Units=kgha; SWUnits=Volumetric; OCUnits=Total; PHUnits=Water
          Thickness  NO3      NH4
          250        98.2875  6.5525
          300        102.87   6.858
          300        22.275   1.485
          300        5.265    0.351
          350        6.1425   0.4095
        SoilTemperature2
          MaxTTimeDefault = 14
          BoundaryLayerConductanceSource = calc
          BoundaryLayerConductance = 20
          BoundaryLayerConductanceIterations = 1
          NetRadiationSource = calc
          DefaultWindSpeed = 3
          DefaultAltitude = 18
          DefaultInstrumentHeight = 1.2
          BareSoilHeight = 57
      outputfile Outputs: filename=SolutesTest-Compare(SoilWat) Paddock1 Outputs.out; title=SolutesTest-Compare(SoilWat) Paddock1 Outputs
        variables
          variable:
            dd/mmm/yyyy as Date
            day as DoY
            rain as Rain
            drain as Drainage format 2
            sw_dep() as SoilWaterContent format 2
            Cl() format 3
            Cl format 3
            Leach_Cl format 3
            flow_Cl format 5
            Cl_ppm
            Diffusion_Cl format 7
            dlayer
        events Reporting Frequency: event=end_day
    area Paddock2 -> /simulations/SolutesTest-Compare(SoilWat)/Paddock1
      folder ManagerFolder
        manager2 ApplySolute
          # Apply a given solute to the soil
          ApplySolute_name = cl  # Name of the solute to apply
          # When and how often to apply
          ApplySolute_start_date = 16/01/2000  # Date to start applications (dd/mm/yyyy)
          ApplySolute_end_date = 31/12/2010  # Date to end applications (dd/mm/yyyy)
          ApplySolute_interval = 61  # Interval between applications (days)
          ApplySolute_times = 1  # Number of times to apply
          # Amount and depth for applications
          ApplySolute_amount2add = 1  # Amount of solute to apply (kg/ha)
          ApplySolute_depth2add = 1  # Depth for application (mm)
```vb
Imports System
Imports ModelFramework

' This manager applies a given amount of solute to the soil. It will add from the surface till the depth specified (decreasing linearly)
'  The manager can also repeat the application periodically within a given window

'-->  Last uptaded in: 10/Sep/2013 ..................


Public Class Script 
   
   'Parameter variables:
   <param> Private ApplySolute_name As String
   <param> Private ApplySolute_start_date As String
   <param> Private ApplySolute_end_date As String
   <param> Private ApplySolute_interval As Integer
   <param> Private ApplySolute_times As Integer
   <param> Private ApplySolute_amount2add As Double
   <param> Private ApplySolute_depth2add As Double
   
   'Events to raise
   <[Event]()> Public Event SoluteChanged As SoluteChangedDelegate

   'Variables read from other modules
   <Input> Private today As DateTime            'Today's date
   <Input> Private dlayer As Double()           'Soil layers structure

   'Output variables
   <Output><Units("kg/ha")> Public SoluteAdded As Double       'The amount of solute added

   'Internal variables
   Private StartDate As DateTime                'The date when applications start (in date format)
   Private EndDate As DateTime                  'The date when applications finish (in date format)
   Private TimeAfterApplication As Integer      'Number of days after an application
   Private SoilDepth As Double                  'The soil depth (mm)
   Private LayerFraction() As Double        'The fraction of solute applied in each layer
   Private NumberOfApplications As Integer      'Number of applications

   <EventHandler()> Public Sub OnInitialised()

      'Put the dates into date format:
      StartDate = DateTime.Parse(ApplySolute_start_date & " 06:00:00 am")
      EndDate = DateTime.Parse(ApplySolute_end_date & " 06:00:00 pm")
      NumberOfApplications = 0
      TimeAfterApplication = 1
      
      'Computes the fraction of solute to be applied in each layer
      Console.WriteLine(" Applying solute, " & ApplySolute_amount2add.ToString("#0.0#") & " kg/ha, in following layers")
      ReDim LayerFraction(dlayer.length - 1)
      Dim Depth_from_surface As Double = 0
      Dim surf_L As Double = 2 / ApplySolute_depth2add
      Dim upper_L As Double = surf_L
      Dim lower_L As Double = 0
      Dim thisLayer As Double = 0
      For Layer As Integer = 0 To dlayer.length - 1
         Depth_from_surface += dlayer(Layer)
         If Depth_from_surface >= ApplySolute_depth2add Then
            ' last layer
            lower_L = 0
            thisLayer = dlayer(Layer) - (Depth_from_surface - ApplySolute_depth2add)
         Else
            ' intermediate layer
            lower_L = surf_L * (ApplySolute_depth2add - Depth_from_surface) / ApplySolute_depth2add
            thisLayer = dlayer(Layer)
         End If
         LayerFraction(Layer) = (upper_L + lower_L) * thisLayer / 2
         upper_L = lower_L
         Console.WriteLine(" Fraction in layer (" & Layer.ToString() & "): " & LayerFraction(Layer).ToString())
         If Depth_from_surface >= ApplySolute_depth2add Then Layer = dlayer.length               
      Next
      

   End Sub

   <EventHandler()> Public Sub OnSoluteChange(SoluteChanges As SoluteChangedType)
      
      Console.WriteLine("Today:" + today.Date.ToString())
      Console.WriteLine("Name:" + SoluteChanges.SoluteName)
      Console.WriteLine("Layer(1):" + SoluteChanges.DeltaSolute(0).ToString())
      
   End Sub

   <EventHandler()> Public Sub OnPrepare()

      'Re-set variables
      SoluteAdded = 0
      Dim delta_solute(dlayer.Length - 1) As Double

      'Decide whether it is time to start applications:
      If (today.Date >= StartDate.Date) And (today.Date <= EndDate.Date) And (NumberOfApplications < ApplySolute_times) Then
         If (today - StartDate).TotalDays < 0.5 Then
            ' always apply on the starting date, or beginning of simulation
            For Layer As Integer = 0 To dlayer.length - 1
               delta_solute(Layer) = ApplySolute_amount2add * LayerFraction(Layer)
               SoluteAdded += delta_solute(Layer)
               If LayerFraction(Layer) <= 1E-12 Then Layer = dlayer.length
            Next
            TimeAfterApplication = 1
            NumberOfApplications += 1
         Else
            ' apply at given intervals
            If TimeAfterApplication >= ApplySolute_interval Then
               For Layer As Integer = 0 To dlayer.length - 1
                  delta_solute(Layer) = ApplySolute_amount2add * LayerFraction(Layer)
                  SoluteAdded += delta_solute(Layer)
                  If LayerFraction(Layer) <= 1E-12 Then Layer = dlayer.length               
               Next
               TimeAfterApplication = 1
               NumberOfApplications += 1
            Else
               TimeAfterApplication = TimeAfterApplication + 1
               SoluteAdded = 0
            End If
         End If

         'Make the application
         If TimeAfterApplication = 1 Then
            Dim SoluteChanges As SoluteChangedType = New SoluteChangedType()
            SoluteChanges.Sender = "Manager: ApplySolute"
            SoluteChanges.SoluteName = ApplySolute_name
            SoluteChanges.SoluteUnits = "kg/ha"
            SoluteChanges.DeltaSolute = delta_solute
            RaiseEvent SoluteChanged(SoluteChanges)

            Console.WriteLine(today.ToString("dd MMMM yyyy") + " (Day of year=" + today.DayOfYear.ToString + "), ApplySolute:")
            Console.WriteLine("     " & ApplySolute_name & " being applied at " + SoluteAdded.ToString("0.00") + "kg/ha, added down to depth " + ApplySolute_depth2add.ToString("0") + "mm")
            Console.WriteLine("TimeAfterApplication " + TimeAfterApplication.ToString())
         End If
      End If            
      
   End Sub

End Class
```
      Cl2 Cl
        # Initial solute content in the soil
        InitialContent = 1.0  1.0  10  0.0  0.0  # Amount of Cl for each layer (kg/ha)
        # Solute diffusivity
        MolecularDiffusivity = 108  # Diffusivity of Cl in water (mm2/day)
      outputfile Outputs -> /simulations/SolutesTest-Compare(SoilWat)/Paddock1/Outputs: filename=SolutesTest-Compare(SoilWat) Paddock2 Outputs.out; title=SolutesTest-Compare(SoilWat) Paddock2 Outputs
        variables -> /simulations/SolutesTest-Compare(SoilWat)/Paddock1/Outputs/Variables
        events Reporting Frequency -> /simulations/SolutesTest-Compare(SoilWat)/Paddock1/Outputs/Reporting Frequency
  simulation SolutesTest-Compare(SWIM2)
    clock
      start_date = 01/01/2000  # Enter the start date of the simulation
      end_date = 31/01/2000  # Enter the end date of the simulation
    metfile met: filename=%apsim%\Examples\MetFiles\MildTemperate.met
    memo Info
      ========================================================================
            Generic tests for solute2 - Comparison between old and new models, using Cl
      ========================================================================

        » Basic simulation description:
          + Bare soil
          + Generic soil - Silt Loam
          + Artificial mild temperate weather
          + 1 kg/ha of solute in top 3 layers at start
          + Solute applied 1 kg/ha in top layer

         » Paddock1 uses Solute module (old Fortran code)
         » Paddock2 uses Solute2 model (.NET version)

         + This simulation uses a tracer-like solute:
           - No interactions with soil, except leaching
           - No transformations in the solute
           - Solute diffusion computed by SWIM

         >> NOTE:
          - The variable diffusion_Cl will not be numeric in Paddock1, as the Solute module does not output this variable, The values will be all zero for Paddock2 as the diffusivity in Solute2 was set to zero
    summaryfile
    area Paddock1
      folder ManagerFolder: same as SolutesTest-Compare(SoilWat).Paddock1.ManagerFolder
      micromet
        soilalbedo = 0.23
        a_interception = 0
        b_interception = 0
        c_interception = 0
        d_interception = 0
      Solute Cl
        solute_names = Cl  # Name of this solute
        d0 = 0.0  # Solute diffusivity in water (mm2/d)
        layers = 1.0  1.0  10  0.0  0.0  # Solute in each layer (kg/ha)
      surfaceom SurfaceOrganicMatter
        PoolName = grass  # Organic Matter pool name
        type = grass  # Organic Matter type
        mass = 200  # Initial surface residue (kg/ha)
        cnr = 20  # C:N ratio of initial residue
        standing_fraction = 0  # Fraction of residue standing
      SWIM2ui2
        # SWIM boundary conditions
        top_boundary_condition = 0  # Choose top boundary condition (0=inf conduct; 1=const potential; 2=limtd conduct)
        runoff = 1  # Choose runnof/pond condition (0=all runoff; 1=all pond; 2=calc runoff)
        bottom_boundary_condition = 0  # Choose bottom boundary condition (0=set pot grad; 1=set potential; 2=impermeable;3=seepage)
        run_solutes = urea  nh4  no3  cl  # Type list of solutes SWIM will move
        max_water_increment = 0.5  # Type base water increment value
        # Description of soil profile
        x = 0  10  20  30  50  70  90  110  140  160  190  210  250  270  330  370  430  470  530  570  650  710  790  860  940  1060  1140  1260  1340  1440  1500  # Enter the values of x for each layer
        soil_type = A_ZL_mC  A_ZL_mC  A_ZL_mC  A_ZL_mC  A_ZL_mC  A_ZL_mC  A_ZL_mC  A_ZL_mC  A_ZL_mC  -  -  B1_ZL_mC  B1_ZL_mC  B1_ZL_mC  -  -  B2_SL_mC  B2_SL_mC  B2_SL_mC  B2_SL_mC  B2_SL_mC  B2_SL_mC  B2_SL_mC  -  -  BC_S_mC  BC_S_mC  BC_S_mC  BC_S_mC  BC_S_mC  BC_S_mC  # Enter the tags for each layer
        psi = -100  -100  -100  -100  -100  -100  -100  -100  -100  -100  -100  -100  -100  -100  -100  -100  -100  -100  -100  -100  -100  -100  -100  -100  -100  -100  -100  -100  -100  -100  -100  # Enter the inital values of psi for each layer
        ini Ini_SWIM2: filename=%apsim%\Tests\Solute2\ini_SWIMui2(GenericSiltLoam).xml
      SoilNitrogen
        # Parameters to initialise soil organic matter
        InitialFOMAmount = 1000  # Type the initial FOM amount in the soil (kgDM/ha)
        InitialCNrFOM = 30  # Type the initial C:N ratio of FOM
        HumusCNr = 12.5  # Type the C:N ratio of soil humus
        MBiomassCNr = 8  # Type the C:N ratio of soil microbial biomass
        # Enter the values for each layer
        ph = 6.0    6.0    6.0    6.0    6.0    6.0    6.0    6.0    6.0    6.0    6.0    6.0    6.0    6.0    6.0    6.0    6.0    6.0    6.0    6.0    6.0    6.0    6.0    6.0    6.0    6.0    6.0    6.0    6.0    6.0    6.0  # Type the inital soil pH
        oc = 4.817  4.789  4.760  4.717  4.665  4.613  4.331  3.977  3.667  3.396  3.148  2.877  2.630  2.336  2.023  1.761  1.550  1.379  1.241  1.111  0.996  0.912  0.844  0.797  0.752  0.723  0.704  0.692  0.685  0.681  0.680  # Type the initial soil organic carbon content (%)
        fbiom = 0.080  0.080  0.080  0.080  0.079  0.078  0.075  0.069  0.061  0.050  0.040  0.029  0.021  0.013  0.008  0.008  0.008  0.008  0.008  0.008  0.008  0.008  0.008  0.008  0.008  0.008  0.008  0.008  0.008  0.008  0.008  # Type the microbial biomass fraction of OC (0-1)
        finert = 0.454  0.461  0.468  0.474  0.487  0.515  0.571  0.626  0.678  0.718  0.755  0.786  0.819  0.843  0.876  0.895  0.915  0.927  0.940  0.947  0.958  0.964  0.971  0.976  0.980  0.985  0.988  0.990  0.992  0.993  0.994  # Type the inert fraction of soil humus (0-1)
        no3ppm = 1.50   2.00   2.40   2.50   2.50   2.50   2.50   2.50   2.50   2.45   2.30   2.15   2.00   1.85   1.60   1.35   1.15   0.90   0.80   0.71   0.65   0.59   0.51   0.44   0.39   0.34   0.30   0.26   0.21   0.20   0.20  # Type the initial concentration of NO3 is the soil (ppm)
        nh4ppm = 0.50   0.70   0.80   0.80   0.80   0.80   0.80   0.80   0.80   0.80   0.80   0.70   0.60   0.50   0.40   0.40   0.30   0.30   0.20   0.20   0.20   0.20   0.20   0.10   0.10   0.10   0.10   0.08   0.07   0.07   0.07  # Type the initial concentration of NH4 is the soil (ppm)
        ureappm = 0.00   0.00   0.00   0.00   0.00   0.00   0.00   0.00   0.00   0.00   0.00   0.00   0.00   0.00   0.00   0.00   0.00   0.00   0.00   0.00   0.00   0.00   0.00   0.00   0.00   0.00   0.00   0.00   0.00   0.00   0.00  # Type the initial concentration of urea is the soil (ppm)
      SoilTemperature2: MaxTTimeDefault=14; BoundaryLayerConductanceSource=calc; BoundaryLayerConductance=20; BoundaryLayerConductanceIterations=1; NetRadiationSource=calc; DefaultWindSpeed=3; DefaultAltitude=18; DefaultInstrumentHeight=1.2; BareSoilHeight=57
        Clay=15.0   15.0   15.0   15.0   15.0   15.0   15.0   15.0   15.0   15.0   15.0   15.0   15.0   15.0   15.0   15.0   15.0   15.0   15.0   15.0   15.0   15.0   15.0   15.0   15.0   15.0   15.0   15.0   15.0   15.0   15.0
      outputfile Outputs: filename=SolutesTest-Compare(SWIM2) Paddock1 Outputs.out; title=SolutesTest-Compare(SWIM2) Paddock1 Outputs
        variables
          variable:
            dd/mmm/yyyy as Date
            day as DoY
            rain as Rain
            drain as Drainage format 2
            sw_dep() as SoilWaterContent format 2
            Cl() format 3
            Cl format 3
            Leach_Cl format 3
            flow_Cl format 5
            Cl_ppm
            Diffusion_Cl
            dlayer
        events Reporting Frequency: event=end_day
    area Paddock2 -> /simulations/SolutesTest-Compare(SWIM2)/Paddock1
      folder ManagerFolder: same as SolutesTest-Compare(SoilWat).Paddock2.ManagerFolder
      Cl2 Cl
        # Initial solute content in the soil
        InitialContent = 1.0  1.0  10  0.0  0.0  # Amount of Cl for each layer (kg/ha)
        # Solute diffusivity
        MolecularDiffusivity = 0.0  # Diffusivity of Cl in water (mm2/day)
      outputfile Outputs -> /simulations/SolutesTest-Compare(SWIM2)/Paddock1/Outputs: filename=SolutesTest-Compare(SWIM2) Paddock2 Outputs.out; title=SolutesTest-Compare(SWIM2) Paddock2 Outputs
        variables -> /simulations/SolutesTest-Compare(SWIM2)/Paddock1/Outputs/Variables
        events Reporting Frequency -> /simulations/SolutesTest-Compare(SWIM2)/Paddock1/Outputs/Reporting Frequency
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