folder simulations: version=36; creator=Apsim 7.5-r3152
  simulation Solute2Test-NitrificationInhibitor
    clock
      start_date = 01/05/2000  # Enter the start date of the simulation
      end_date = 15/06/2000  # Enter the end date of the simulation
    metfile met: filename=%apsim%\Examples\MetFiles\MildTemperate.met
    memo Info
      ========================================================================
            Generic tests for NitrificationInhibitor (an implementation of Solute2)
      ========================================================================

        » Basic simulation description:
          + Rotational grazing on mixed pasture
          + Generic soil - Silt Loam
          + Artificial mild temperate weather
          + 100kgN/ha applied in the beginning of the simulation
          + Inhibitor (10kgDCD/ha) applied in paddocks 2 an 3, in different dates

        » Expected behaviour:
          + All outputs should have a numeric value (can be zero)
          + All outputs related to 'nitrificatoninhibitor' should be zero in paddock1
          + The application if inhibitor should slow down the conversion of NH4 into NO3 and the closer to the application of urea the larger the effect, so:
            - Amount of NH4 should remain high longer in paddock2, lower in paddock3, lowest in paddock1
            - Amount of NO3 in oposite order (paddock1>paddock3>paddock2)
            - Very little variations in urea amounts and on plant growth
            - Very little noticiable leaching at the bottom of the soil
            - Considerable effect on shallower layers (paddock2<paddock3<paddock1)

        » Variations:
          + changing the period of simulation:
            - No changes in trends, but the effect of inhibitor is more limited in summer (higher temperatures lead to higher degradation rates)
          + changing the amount of inhibitor:
            - The effect of inhibitor increases if amount applied increases (more NH4 in paddodck2, but small effect only in paddck3 as nitrfication is already underway)
            - The effect decreases if inhibitor amount is reduced (again the effect is greater in paddock2)
    summaryfile
    area Paddock1-NoInhibitor
      BrT
        InitialContent = 50  0  0  # Type initial content for dcd
      folder Manager folder
        manager2 Cut rotation for AgPasture
          # Setup cut rotation for AgPasture
          CutPasture_StartDate = 01/01/1900  # Enter date to start rotation (dd/mm/yyyy)
          CutPasture_EndDate = 31/07/2012  # Enter date to end rotation (dd/mm/yyyy)
          AgPasture_type = AgPasture  # Enter pasture module
          CutTrigger_type = Target standing mass  # Enter the cut trigger type
          CutInterval = 1  # If trigger is interval between cuttings, enter its value (days)
          UpperThreshold = 2000  # If trigger is the sward standing mass, enter the amount (kgDM/ha)
          CoverTarget = 2750  2600  2250  1950  1700  1450  1250  1275  1450  1575  1875  2500  2750  # If targeting a cover, enter the values over the year (kgDM/ha)
          RemoveAmount_type = Down to residual DM  # Enter how removed amount is computed
          Amount2Remove = 185  # If targeting amount or cover, enter the value to remove at each cut (kgDM/ha)
          FractAboveTarget = 0.75  # If targeting cover, enter the fraction above target to trigger cut (0-1)
          LowerThreshold = 1250  # If not targeting cover, enter the minimum residual after cut (kgDM/ha)
          # Management of cut material
          ResidueTreatment_type = Return as residue  # Enter the treatment type for the cut material
          DMRemovalOption = 1.00  # Enter fraction of DM that is removed from field (0-1)
          FracN2Remove = 1.00  # Enter fraction of N that is removed from field (0-1)
          # If returning as dung & urine
          FracN2Dung = 0.0  # Enter proportion of N returned in dung (0-1)
```vb
Imports System
Imports ModelFramework

'This manager sets up a cutting rotation for AgPasture. The rotation is bounded between two dates. Cuts happens in the first day,
' if possible, and thereof can follow various rotation types. Cut is done on above ground stem and leaf DM (dead and green).
' + Cut trigger types:
'  - Fixed interval:
'     Cut is allowed at given days only (set by start rotation date and then at regular intervals)
'     Cut happens if amount to remove is set or if existing DM is greater than LowerTheshold
'  - Target interval: 
'     Cut is allowed from given days (begins at start rotation date and at regular intervals after last cut)
'     Cut happens if amount to remove is set or if existing DM is greater than LowerTheshold
'  - Target standing mass:
'     Cut is allowed when existing DM reaches the target value (UpperThreshold)
'     Cut always happens (unless UpperThreshold is bellow LowerTheshold
'  - Target mass above residual to cut:
'     Cut is allowed when existing DM is larger than the LowerTheshold plus the given amount to remove
'     Cut allways happens, (this option is not only valid with remove amount option 'Set interval')
'  - Target DM cover: Cut when DM is above target cover (trigger based on interval or amount)
'     Cut is allowed:
'        1) When existing DM is larger than the target cover DM plus a given amount to remove (times fraction above target)
'        2) From given dates (begins at start rotation date and at regular intervals after last cut)
'     Cut happens if existing DM is above target cover DM
'
' + Remove amount options:
'  - Set amount: The amount to remove is fixed, if this amount is not available, no cut is performed
'  - Target amount: The amount is the smallest of a given value and difference between existing DM and a target (LowerTheshold of CoverTarget)
'  - Down to residual DM: Amount to remove is the difference between existing DM and LowerTheshold (option is not valid if CutTrigger is 'Target DM cover')
'  - Set interval: Amount to remove is computed, any time DM is above target ([existing DM - target cover]/fraction above target)
'     (option only valid if CutTrigger is 'Target DM cover'
'
' + Manage residues options:
'  - 
'  - Return as residue: A fraction of the DM cut is added as grass residue to the surfaceOM module;
'  - Return as dung & urine: A fraction of the amount cut is returned to the soil as evenly distributed urine and dung. 
'     This is a very simplified approach where the fractions of DM (C) and N to be removed are set separately. Also,
'      the partition of N between urine and dung is set by the user. 
'     N urine is added as urea fertiliser (top 10cm) and teh rmaining DM and N are added to surfaceOM as dung (RuminantDung_PastureFed).


'-->  Last uptaded in: 7/Aug/2012 ..................


Public Class Script 
   
   'Parameter variables:
   <param> Private CutPasture_StartDate As String        'Date to start the cutting rotation
   <param> Private CutPasture_EndDate As String          'Date to end cutting rotation
   <param> Private AgPasture_type As String              'The pasture module

   <param> Private CutTrigger_type As String             'The cut trigger type
   <param> Private CutInterval As Integer                'The interval between cuts, if cut type is fixed intervals (days)
   <param> Private UpperThreshold As Double              'The DM amount to trigger a cut, if cut type is target DM (kg/ha, DM above ground)
   <param> Private CoverTarget As String                 'The target cover over the year (values will be interpolated using DoY)

   <param> Private RemoveAmount_type As String           'The way to compute how much pasture is cut
   <param> Private Amount2Remove As Double               'The amount of DM to be removed at each cut, limited to residual DM (LowerThreshold) (kg/ha, DM above ground)
   <param> Private FractAboveTarget As Double                  'The fraction of the target amount to remove above the target cover that triggers a cut
   <param> Private LowerThreshold As Double              'The residual DM amount left after cut  (kg/ha, DM above ground); cut only happens if DM is greater than this

   <param> Private ResidueTreatment_type As String       'The treatment to the material cut
   <param> Private DMRemovalOption As String             'The option to remove DM, based on digestibility of a fraction (0-1)
   <param> Private FracN2Remove As Double                'Fraction of the N in the material cut that is removed from simulation (0-1)
   <param> Private FracN2Dung As Double                  'The fraction of returned N that goes into dung, if return is as dung and urine (0-1)
     
         
   'Links and events:
   <Link> Private MyAgPasture As AgPasture
   <Link> Private MySelf As Component
   <[Event]()> Public Event Graze As GrazeDelegate
   <[Event]()> Public Event BiomassRemoved As BiomassRemovedDelegate   
   <[Event]()> Public Event FertiliserApplication As FertiliserApplicationDelegate

   
   'Variables read from other modules
   <Input> Private today As DateTime                     'Today's date
   <Input> Private day As Integer                        'Today's day of year
   <input> Private StemWt As Double                      'The DM of stems (above ground DM)
   <input> Private LeafWt As Double                      'The DM of leaves (above ground DM)
   <input> Private StemN As Double                       'The N amount in stems (above ground N)
   <input> Private LeafN As Double                       'The N amount in leaves (above ground N)
   <input> Private HarvestWt As Double                   'The DM harvested (kg/ha)
   <input> Private HarvestN As Double                    'The N amount harvested (kgN/ha)
   <input> Private DefoliatedDigestibility As Double     'The pasture digestibility (0-1)
   
   'Outputs
   <output><units("")> Public Can_Cut As String                  'Whether todays is a cutting day
   <output><units("")> Public Has_Cut As String                  'Whether todays cut was done
   <output><units("kg/ha")> Public harvested_dm As Double        'Pasture DM harvested today (kg/ha)
   <output><units("kgN/ha")> Public harvested_n As Double        'N harvested today
   <output><units("kg/ha")> Public removed_dm As Double          'DM removed from the simulation
   <output><units("kgN/ha")> Public removed_n As Double          'N removed from the simulation
   <output><units("kgN/ha")> Public returned_dm As Double        'DM returned to the paddock
   <output><units("kgN/ha")> Public returned_n As Double         'N returned to the paddock
   <output><units("kgN/ha")> Public NReturn_asDung As Double     'N returned as dung (SurfOM)
   <output><units("kgN/ha")> Public NReturn_asUrine As Double    'N returned as urine (urea)
   <output><units("kg/ha/day")> Public GrowthRateCalc As Double  'Average growth rate for this cut
   <output><units("%")> Public Nconc_inRemoved As Double         'N concentration on the cut material
   <output><units("days")> Public DaysAfterCut As Integer        'Number of days after last cut
   <output><units("kg/ha")> Public TodaysCoverTarget As Double   'Todays cover target
   <output><units("kg/ha")> Public StandingWt As Double          'Total standing DM (Stem + Leaf)
   <output><units("kg/ha")> Public PostHarvestDM As Double       'Total standing DM (Stem + Leaf) after cut

   'Internal variables
   Private StartDate As DateTime             'The date when cutting starts (in date format)
   Private EndDate As DateTime               'The date when cuttings finish (in date format)
   Private FracDM2Remove As Double           'The fraction of DM to be removed from the simulation (0-1)
   Private TargetCoverDays() As Integer
   Private TargetCoverValues() As Double
   Private Allow_Cut As String
   
   <EventHandler()> Public Sub OnInit2()

      'Put the dates into date format:
      StartDate = DateTime.Parse(CutPasture_StartDate & " 06:00:00 am")
      EndDate = DateTime.Parse(CutPasture_EndDate & " 06:00:00 pm")
      
      'Verify that fractions are within limits
      If FractAboveTarget < 0 Or FractAboveTarget > 1 Then
         Throw New Exception("Fraction above target is out of bounds")
      End If
            
      'Set the target cover arrays
      TargetCoverValues = makeArray(CoverTarget)
      TargetCoverDays = setDays(TargetCoverValues)
      
      'Reset variables
      DaysAfterCut = CutInterval - 1
      Allow_Cut = "no" 
      Can_Cut = Allow_Cut
      Has_Cut = "no"
      TodaysCoverTarget = 0.0
  
      'The fraction of DM to remove
      ' - DMRemovalOption can be a value (0-1 = FracDM2Remove) or a string, which tell us that FracDM2Remove is based on digestibility
      If DMRemovalOption.ToLower = "based on digestibility" Then
         FracDM2Remove = 1 - DefoliatedDigestibility
      Else
         Try
            FracDM2Remove = DMRemovalOption
            If (FracDM2Remove < 0) Or FracDM2Remove > 1 Then
               Throw New Exception("Fraction of DM to remove is out of bounds")
            End If
         Catch
            Throw New Exception("Fraction of DM to remove is not valid")
         End Try
      End If
      If (FracN2Remove < 0) Or FracN2Remove > 1 Then
         Throw New Exception("Fraction of N to remove is out of bounds")
      End If
      If ResidueTreatment_type.Contains("urine") And ((FracN2Dung < 0) Or FracN2Dung > 1) Then
         Throw New Exception("Proportion of N to return as dung is out of bounds")
      End If
      
      'Check whether choices are allowed and prepare messages     
      Dim myMessage1 As String
      Dim myMessage2 As String
      Select Case CutTrigger_type.ToLower
         Case "fixed interval"
            If RemoveAmount_type.ToLower.Contains("interval") Then
               Throw New Exception("Fixed interval trigger is not valid with Cut amount defined by 'set interval'")
            ElseIf RemoveAmount_type.ToLower.Contains("amount") Then
               myMessage2 = "   remove " & RemoveAmount_type.ToLower & " = " & Amount2Remove.ToString("#0") & " kg/ha"
            Else
               myMessage2 = "   remove " & RemoveAmount_type.ToLower & " = " & LowerThreshold.ToString("#0") & " kg/ha"
            End If
            myMessage1 = ", cut only every " & CutInterval.ToString & " days"
         Case "target interval"
            If RemoveAmount_type.ToLower.Contains("interval") Then
               Throw New Exception("Target interval trigger is not valid with cut amount defined by 'set interval'")
            ElseIf RemoveAmount_type.ToLower.Contains("amount") Then
               myMessage2 = "   remove " & RemoveAmount_type.ToLower & " = " & Amount2Remove.ToString("#0") & " kg/ha"
            Else
               myMessage2 = "   remove " & RemoveAmount_type.ToLower & " = " & LowerThreshold.ToString("#0") & " kg/ha"
            End If
            myMessage1 = ", cut every " & CutInterval.ToString & " days, or when possible"
         Case "target standing mass" 
            If RemoveAmount_type.ToLower.Contains("interval") Then
               Throw New Exception("Target standing mass trigger is not valid with cut amount defined by 'set interval'")
            ElseIf RemoveAmount_type.ToLower.Contains("amount") Then
               myMessage2 = "   remove " & RemoveAmount_type.ToLower & " = " & Amount2Remove.ToString("#0") & " kg/ha"
            Else
               myMessage2 = "   remove " & RemoveAmount_type.ToLower & " = " & LowerThreshold.ToString("#0") & " kg/ha"
            End If
            myMessage1 = ", cut when DM reaches " & UpperThreshold.ToString("#0") & " kgDM/ha"
         Case "target mass above residual to cut"
            If RemoveAmount_type.ToLower.Contains("interval") Then
               Throw New Exception("Target cut mass trigger is only valid with a set interval")
            End If
            Dim myValue As Double = Amount2Remove + LowerThreshold
            myMessage1 = ", cut whenever DM is higher than " & myValue.ToString("#0") & " kgDM/ha"
            myMessage2 = "   remove " & RemoveAmount_type.ToLower & " ~ " & Amount2Remove.ToString("#0") & " kg/ha"
         Case "target dm cover"
            If RemoveAmount_type.ToLower.Contains("amount") Then
               Dim myValue As Double = Amount2Remove * FractAboveTarget
               myMessage1 = ", cut when standing DM is " & myValue.ToString("#0") & " kgDM/ha above the target cover"
               myMessage2 = "   remove given amount (" & Amount2Remove.ToString("#0") & " kg/ha) at variable interval"
            ElseIf RemoveAmount_type.ToLower.Contains("interval") Then
               myMessage1 = ", cut every " & CutInterval.ToString & " days, if standing DM is above the target cover"
               myMessage2 = "   remove variable amount at set interval"
            Else
               Throw New Exception("Target DM cover cannot be selected with amount to cut 'down to residual DM'")
            End If
         Case Else
            Throw New Exception("Cut trigger type is not valid")
      End Select
      
      'write messages on summary file
      Console.WriteLine("")
      Console.WriteLine("  Cut rotation for AgPasture initialised")
      Console.WriteLine("   rotation rule valid between " & StartDate.ToString("dd/MM/yyyy") & " and " & EndDate.ToString("dd/MM/yyyy"))
      Console.WriteLine("   cut type: " & CutTrigger_type & myMessage1)
      Console.WriteLine(myMessage2)
      Dim myValue1 As Double = (1 - FracDM2Remove) * 100
      Console.WriteLine("   fraction to " & ResidueTreatment_type.ToLower & ": " & myValue1.ToString("#0.0") & "%")
      Console.WriteLine("")
      
   End Sub
      
   <EventHandler()> Public Sub OnPrepare()
      
      StandingWt = StemWt + LeafWt
      Dim preharvest_dm As Double = StandingWt
      Dim preharvest_n As Double = StemN + LeafN
      Dim Amount2Cut As Double
      Dim AmountCuttable As Double
      
      'Reset variables:
      Has_Cut = "no"
      harvested_dm = 0.0
      harvested_n = 0.0
      removed_dm = 0.0
      removed_n = 0.0
      returned_dm = 0.0
      returned_n = 0.0
      GrowthRateCalc = 0.0
      Nconc_inRemoved = 0.0
      NReturn_asDung = 0.0
      NReturn_asUrine = 0.0
      DaysAfterCut = DaysAfterCut + 1

      'Decide whether cut is allowed:
      If (Today.Date >= StartDate.Date And Today.Date <= EndDate.Date) Then
         Select Case CutTrigger_type.ToLower
            Case "fixed interval"
               'Allways send an Allow_Cut if interval is right, it will be reset in the end of the day
               If DaysAfterCut >= CutInterval Then
                  Allow_Cut = "yes"
                  DaysAfterCut = 0  'always reset counter
               Else
                  Allow_Cut = "no"  'always reset allow_cut
               End If
            Case "target interval" 
               'Allways send an Allow_Cut if interval is right, it will be reset only if cut actually happens (depends on amount type)
               If DaysAfterCut >= CutInterval Then
                  Allow_Cut = "yes"
               End If
            Case "target standing mass"
               'Send an Allow_Cut if DM amount is above the target (UpperThreshold), it will be reset if cut actually happens
               If preharvest_dm >= UpperThreshold Then
                  Allow_Cut = "yes"
               End If
            Case "target mass above residual to cut"
               'Send an Allow_Cut if mass above residual is higher than residual (LowerThreshold) plus target, will be reset after cut
               If preharvest_dm >= LowerThreshold + Amount2Remove Then
                  Allow_Cut = "yes"
               End If            
            Case "target dm cover"
               TodaysCoverTarget = InterpolateVals(day, TargetCoverDays, TargetCoverValues)
               If RemoveAmount_type.ToLower.Contains("amount") Then
                  'Send an Allow_Cut if mass above cover target is higher than a threshold, will be reset after cut
                  If preharvest_dm >= TodaysCoverTarget + Amount2Remove * FractAboveTarget Then
                     Allow_Cut = "yes"
                     LowerThreshold = preharvest_dm - Amount2Remove
                  End If
               Else
                  'Send an Allow_Cut if interval between cuts is reached and standing mass is above cover target, will be reset after cut
                  If DaysAfterCut >= CutInterval And preharvest_dm > TodaysCoverTarget Then 
                     Allow_Cut = "yes"
                  End If
               End If
         End Select

         'The use of these avoid (or reduces) problems when two managers are used in the same simulation
         Can_Cut = Allow_Cut
         
         'Decide how much to cut:
         If Allow_Cut = "yes" Then
            Select Case RemoveAmount_type.ToLower
               Case "set amount"
                  Amount2Cut = Amount2Remove
                  If CutTrigger_type.ToLower = "fixed interval" Then
                     AmountCuttable = preharvest_dm
                  else
                     AmountCuttable = math.Max(0, preharvest_dm - LowerThreshold)
                  End If
               Case "target amount"
                  Amount2Cut = math.Min(math.Max(0, preharvest_dm - LowerThreshold), Amount2Remove)
                  AmountCuttable = math.Max(0, preharvest_dm - LowerThreshold)
               Case "down to residual dm"
                  Amount2Cut = math.Max(0, preharvest_dm - LowerThreshold)
                  AmountCuttable = math.Max(0, preharvest_dm - LowerThreshold)
               Case "set interval (for target cover only)"
                  Amount2Cut = (preharvest_dm - TodaysCoverTarget) / FractAboveTarget
                  AmountCuttable = preharvest_dm
               Case Else
                  Throw New Exception("Option to compute DM amount to remove is not valid")
            End Select  
            

            'Decide whether cut actually happens:
            If (AmountCuttable >= Amount2Cut) Then
               Call CutPasture(Amount2Cut)
               'reset cut variables
               DaysAfterCut = 0
               Has_Cut = "yes"
               Allow_Cut = "no"
               PostHarvestDM = MyAgPasture.StemWt + MyAgPasture.LeafWt
            End If
         Else
            Amount2Cut = 0
            AmountCuttable = 0
         End If         
      End If

   End Sub 
   
  
   Sub CutPasture(ByVal Amount2Cut As Double) 
       
      ' --------------------------------------------------------------------------------------------
      ' Cutting pasture
      ' --------------------------------------------------------------------------------------------
            
      Dim CutData As New GrazeType
      CutData.sender = AgPasture_type
      CutData.amount = Amount2Cut
      Cutdata.type = "removal"
      RaiseEvent Graze(CutData)
      harvested_dm = MyAgPasture.HarvestWt
      harvested_n = MyAgPasture.HarvestN

      GrowthRateCalc = harvested_dm / DaysAfterCut
      If harvested_dm > 0 Then
         Nconc_inRemoved = harvested_n * 100 / harvested_dm
      End If
                  
      'Let user know (via summary) that a cut was made
      Console.WriteLine(Today.ToString("dd MMMM yyyy") + " (Day of year=" + Today.DayOfYear.ToString + "), " & MySelf.Name & ":")
      Console.WriteLine("     Removing " + harvested_dm.ToString("#0") + "kg DM/ha, with " & harvested_n.ToString("#0.0") & "kg N/ha")

      ' -- Residue management -------------------------------------------------------------------------
      If DMRemovalOption.ToLower = "based on digestibility" Then
         FracDM2Remove = 1 - DefoliatedDigestibility
      End If
      removed_dm = harvested_dm * FracDM2Remove
      removed_n = harvested_n * FracN2Remove
      returned_dm = harvested_dm - removed_dm 
      returned_n = harvested_n - removed_n 
      
      console.WriteLine("ResidueTreatment_type: " & ResidueTreatment_type)
      If ResidueTreatment_type.ToLower = "return as residue" Then
         If FracDM2Remove < 1 Then
            Dim SOMData As New BiomassRemovedType
            SOMData.crop_type = "grass"
            SOMData.dm_type = New String() {"grass"}
            SOMData.dlt_crop_dm = New Single() {returned_dm}
            SOMData.dlt_dm_n = New Single() {returned_n}
            SOMData.dlt_dm_p = New Single() {0.0}
            SOMData.fraction_to_residue = New Single() {1.0}
            RaiseEvent BiomassRemoved(SOMData)     'this works        
         End If
         
      ElseIf ResidueTreatment_type.ToLower = "return as dung & urine" Then
         ' It is advised that dung and urine return should be done using another manager or modules, such as 'UrinePatch' 
         
         NReturn_asDung = returned_n * FracN2Dung
         NReturn_asUrine = math.Max(0, returned_n - NReturn_asDung)
         Dim SOMData As New BiomassRemovedType
         SOMData.crop_type = "RuminantDung_PastureFed"
         SOMData.dm_type = New String() {"dung"}
         SOMData.dlt_crop_dm = New Single() {returned_dm}
         SOMData.dlt_dm_n = New Single() {NReturn_asDung}
         SOMData.dlt_dm_p = New Single() {0.0}
         SOMData.fraction_to_residue = New Single() {1.0}
         RaiseEvent BiomassRemoved(SOMData)
         
         If NReturn_asUrine > 0 Then
            Dim UrineData As New FertiliserApplicationType
            UrineData.Amount = NReturn_asUrine
            UrineData.Depth = 10
            UrineData.Type = "urea"
            RaiseEvent FertiliserApplication(UrineData)
         End If
         
      Else
         Throw New Exception("Residue management type is not valid")
      End If
      
   End Sub
 
   Function makeArray(ByVal ArrayString As String) As Double()
      
      'Get the string with values from the user interface and put the values in an numeric array
      
      Dim MyArray_string As String()
      Dim MyArray_numeric As Double()
      Dim Separator As Char() = " "
      
      '1-Split string into array
      MyArray_string = ArrayString.Split(Separator, StringSplitOptions.RemoveEmptyEntries)
      
      '2-convert array into type single
      ReDim MyArray_numeric(MyArray_string.Length - 1)      
      For i As Integer = 0 To MyArray_numeric.length - 1
         MyArray_numeric(i) = CDbl(MyArray_string(i))
      Next
      Return MyArray_numeric
      
   End Function
   
   Function setDays(ByVal yArray As Double()) As Integer()
      
      'Define the day of year for each value on yArray - first value, day=1; last value day = 365; dates in between spread evenly (rounded)
      Dim NumDates = yArray.Length
      Dim xArray(yArray.Length - 1) As Integer
      xArray(0) = 1
      If NumDates < 366 Then
         If yArray.Length > 1 Then
            xArray(yArray.Length - 1) = 365
            If yArray.Length > 2 Then
               For i As Integer = 0 To yArray.Length - 1
                  xArray(i) = 365 * i / (yArray.Length - 1)
               Next
            End If
         End If
      Else
         Throw New Exception("Number of items on CoverTarget greater than maximum allowed (365)")
      End If
      Return xArray
      
   End Function

   Function InterpolateVals(ByVal my_x As Integer, ByVal xArray As Integer(), ByVal yArray As Double()) As Double
      
      'Find out the value correspondig to my_x in the function described by the x and y arrays
      Dim my_y As Double
      If my_x <= xArray(0) Then
         'values below x(0) are set to y(0)
         my_y = yArray(0)
      ElseIf my_x >= xArray(xArray.length - 1) Then
         'value above x(n) are set to y(n)
         my_y = yArray(yArray.length - 1)
      Else
         'find the nearest neighbours and interpolate (linear)
         For i As Integer = 1 To xArray.length - 1
            If my_x <= xArray(i) Then
               my_y = yArray(i - 1) + ((my_x - xArray(i - 1)) * (yArray(i) - yArray(i - 1)) / (xArray(i) - xArray(i - 1)))
               i = xArray.length 
            End If
         Next
      End If
      Return my_y
      
   End Function

End Class
```
        manager2 ApplyInhibitor
          # Apply a given solute to the soil
          ApplySolute_name = nitrificationinhibitor  # Name of the solute to apply
          # When and how often to apply
          ApplySolute_start_date = 04/05/2001  # Date to start applications (dd/mm/yyyy)
          ApplySolute_end_date = 31/12/2100  # Date to end applications (dd/mm/yyyy)
          ApplySolute_interval = 1461  # Interval between applications (days)
          ApplySolute_times = 1  # Number of times to apply
          # Amount and depth for applications
          ApplySolute_amount2add = 10  # Amount of solute to apply (kg/ha)
          ApplySolute_depth2add = 1  # Depth for application (mm)
```vb
Imports System
Imports ModelFramework

' This manager applies a given amount of solute to the soil. It will add from the surface till the depth specified (decreasing linearly)
'  The manager can also repeat the application periodically within a given window

'-->  Last uptaded in: 17/Sep/2013 ..................


Public Class Script 
   
   'Parameter variables:
   <param> Private ApplySolute_name As String
   <param> Private ApplySolute_start_date As String
   <param> Private ApplySolute_end_date As String
   <param> Private ApplySolute_interval As Integer
   <param> Private ApplySolute_times As Integer
   <param> Private ApplySolute_amount2add As Double
   <param> Private ApplySolute_depth2add As Double
   
   'Events to raise
   <[Event]()> Public Event SoluteChanged As SoluteChangedDelegate

   'Variables read from other modules
   <Input> Private today As DateTime            'Today's date
   <Input> Private dlayer As Double()           'Soil layers structure

   'Output variables
   <Output><Units("kg/ha")> Public SoluteAdded As Double       'The amount of solute added

   'Internal variables
   Private StartDate As DateTime                'The date when applications start (in date format)
   Private EndDate As DateTime                  'The date when applications finish (in date format)
   Private TimeAfterApplication As Integer      'Number of days after an application
   Private SoilDepth As Double                  'The soil depth (mm)
   Private LayerFraction() As Double        'The fraction of solute applied in each layer
   Private NumberOfApplications As Integer      'Number of applications

   <EventHandler()> Public Sub OnInitialised()

      'Put the dates into date format:
      StartDate = DateTime.Parse(ApplySolute_start_date & " 06:00:00 am")
      EndDate = DateTime.Parse(ApplySolute_end_date & " 06:00:00 pm")
      NumberOfApplications = 0
      TimeAfterApplication = 1
      
      'Computes the fraction of solute to be applied in each layer
      Console.WriteLine(" Applying solute, " & ApplySolute_amount2add.ToString("#0.0#") & " kg/ha, in following layers")
      ReDim LayerFraction(dlayer.length - 1)
      Dim Depth_from_surface As Double = 0
      Dim surf_L As Double = 2 / ApplySolute_depth2add
      Dim upper_L As Double = surf_L
      Dim lower_L As Double = 0
      Dim thisLayer As Double = 0
      For Layer As Integer = 0 To dlayer.length - 1
         Depth_from_surface += dlayer(Layer)
         If Depth_from_surface >= ApplySolute_depth2add Then
            ' last layer
            lower_L = 0
            thisLayer = dlayer(Layer) - (Depth_from_surface - ApplySolute_depth2add)
         Else
            ' intermediate layer
            lower_L = surf_L * (ApplySolute_depth2add - Depth_from_surface) / ApplySolute_depth2add
            thisLayer = dlayer(Layer)
         End If
         LayerFraction(Layer) = (upper_L + lower_L) * thisLayer / 2
         upper_L = lower_L
         Console.WriteLine(" Fraction in layer (" & Layer.ToString() & "): " & LayerFraction(Layer).ToString())
         If Depth_from_surface >= ApplySolute_depth2add Then Layer = dlayer.length               
      Next
      

   End Sub

   <EventHandler()> Public Sub OnPrepare()

      'Re-set variables
      SoluteAdded = 0
      Dim delta_solute(dlayer.Length - 1) As Double

      'Decide whether it is time to start applications:
      If (today.Date >= StartDate.Date) And (today.Date <= EndDate.Date) And (NumberOfApplications < ApplySolute_times) Then
         If (today - StartDate).TotalDays < 0.5 Then
            ' always apply on the starting date, or beginning of simulation
            For Layer As Integer = 0 To dlayer.length - 1
               delta_solute(Layer) = ApplySolute_amount2add * LayerFraction(Layer)
               SoluteAdded += delta_solute(Layer)
               If LayerFraction(Layer) <= 1E-12 Then Layer = dlayer.length
            Next
            TimeAfterApplication = 1
            NumberOfApplications += 1
         Else
            ' apply at given intervals
            If TimeAfterApplication >= ApplySolute_interval Then
               For Layer As Integer = 0 To dlayer.length - 1
                  delta_solute(Layer) = ApplySolute_amount2add * LayerFraction(Layer)
                  SoluteAdded += delta_solute(Layer)
                  If LayerFraction(Layer) <= 1E-12 Then Layer = dlayer.length               
               Next
               TimeAfterApplication = 1
               NumberOfApplications += 1
            Else
               TimeAfterApplication = TimeAfterApplication + 1
               SoluteAdded = 0
            End If
         End If

         'Make the application
         If TimeAfterApplication = 1 Then
            Dim SoluteChanges As SoluteChangedType = New SoluteChangedType()
            SoluteChanges.Sender = "Manager: ApplySolute"
            SoluteChanges.SoluteName = ApplySolute_name
            SoluteChanges.SoluteUnits = "kg/ha"
            SoluteChanges.DeltaSolute = delta_solute
            RaiseEvent SoluteChanged(SoluteChanges)

            Console.WriteLine(today.ToString("dd MMMM yyyy") + " (Day of year=" + today.DayOfYear.ToString + "), ApplySolute:")
            Console.WriteLine("     " & ApplySolute_name & " being applied at " + SoluteAdded.ToString("0.00") + "kg/ha, added down to depth " + ApplySolute_depth2add.ToString("0") + "mm")
         End If
      End If            
      
   End Sub

End Class
```
        operations
          5-May  fertiliser apply amount = 50 (kg/ha), depth = 1 (mm), type = urea_n
          5-May  fertiliser apply amount = 50 (kg/ha), depth = 6 (mm), type = urea_n
      micromet
        soilalbedo = 0.23
        a_interception = 0
        b_interception = 0
        c_interception = 0
        d_interception = 0
      irrigation
        automatic_irrigation = off
        asw_depth = 600  # Depth to which ASW is calculated. (mm)
        crit_fr_asw = 0.5  # Fraction of ASW below which irrigation is applied (0-1.0)
        irrigation_efficiency = 0.8  # Efficiency of the irrigation. (0-1.0)
        irrigation_allocation = off  # Allocation limits
        allocation = 0  # Allocation in ML
        default_no3_conc = 0  # Nitrate concentration (ppm N)
        default_nh4_conc = 0  # Ammonium concentration (ppm N)
        default_cl_conc = 0  # Chloride concentration (ppm Cl)
        default_no3_conc = 0  # Nitrate concentration (ppm N)
        default_nh4_conc = 0  # Ammonium concentration (ppm N)
        default_cl_conc = 0  # Chloride concentration (ppm Cl)
      fertiliser
      NitrificationInhibitor2 NitrificationInhibitor
        # Initial content of NitrificationInhibitor in the soil
        InitialContent = 0  0  0  0  0  0  0  0  0  0  0  0  0  0  0  0  0  0  0  0  0  0  0  0  0  0  0  0  0  0  0  # Amount of NitrificationInhibitor for each layer (kg/ha)
        # NitrificationInhibitor effect function - Michaelis-Menten function
        sif_kMichaelisMenten = 1.553  # The Michaelis-Menten factor - NitrificationInhibitor concentration for half inhibition effect (ppm)
        # NitrificationInhibitor degradation functions
        PotentialDegradationRate = 12.9  # Degradation rate for NitrificationInhibitor at optimum conditions (%/day)
        stf_TemperatureAtOptimum = 28  # The value of temperature at optimum conditions (oC)
        stf_FactorValueAtZeroDegrees = 0.035  # The value for temperature effect at zero degrees (0-1)
        stf_ExponentValue = 159  # The exponent value for the temperature effect function (approx. 1-5)
        swf_xValues = 0.0  0.8  1.0  1.4  2.0  3.0  # The values for the x-axis of the moisture effect - modified water content (0-3)
        swf_yValues = 0.0  0.0  0.1  1.0  1.0  0.5  # The values for the y-axis for the moisture effect - relative effect (0-1)
        phf_xValues = 0.0  3.5  5.0  8.0  9.5  14.0  # The values for the x-axis of the pH effect - soil pH
        phf_yValues = 0.0  0.0  1.0  1.0  0.0   0.0  # The values for the y-axis for the pH effect - relative effect (0-1)
        scf_kMichaelisMenten = 0.11  # The Michaelis-Menten factor for carbon effect - Soil carbon content for half effect (%)
      surfaceom SurfaceOrganicMatter
        PoolName = grass  # Organic Matter pool name
        type = grass  # Organic Matter type
        mass = 200  # Initial surface residue (kg/ha)
        cnr = 20  # C:N ratio of initial residue
        standing_fraction = 0  # Fraction of residue standing
      SWIM2ui2
        # SWIM boundary conditions
        top_boundary_condition = 0  # Choose top boundary condition (0=inf conduct; 1=const potential; 2=limtd conduct)
        runoff = 1  # Choose runnof/pond condition (0=all runoff; 1=all pond; 2=calc runoff)
        bottom_boundary_condition = 0  # Choose bottom boundary condition (0=set pot grad; 1=set potential; 2=impermeable;3=seepage)
        run_solutes = urea  nh4  no3  nitrificationinhibitor  # Type list of solutes SWIM will move
        max_water_increment = 0.5  # Type base water increment value
        # Description of soil profile
        x = 0  10  20  30  50  70  90  110  140  160  190  210  250  270  330  370  430  470  530  570  650  710  790  860  940  1060  1140  1260  1340  1440  1500  # Enter the values of x for each layer
        soil_type = A_ZL_mC  A_ZL_mC  A_ZL_mC  A_ZL_mC  A_ZL_mC  A_ZL_mC  A_ZL_mC  A_ZL_mC  A_ZL_mC  -  -  B1_ZL_mC  B1_ZL_mC  B1_ZL_mC  -  -  B2_SL_mC  B2_SL_mC  B2_SL_mC  B2_SL_mC  B2_SL_mC  B2_SL_mC  B2_SL_mC  -  -  BC_S_mC  BC_S_mC  BC_S_mC  BC_S_mC  BC_S_mC  BC_S_mC  # Enter the tags for each layer
        psi = -100  -100  -100  -100  -100  -100  -100  -100  -100  -100  -100  -100  -100  -100  -100  -100  -100  -100  -100  -100  -100  -100  -100  -100  -100  -100  -100  -100  -100  -100  -100  # Enter the inital values of psi for each layer
        ini Ini_SWIM2: filename=%apsim%\Tests\Solute2\ini_SWIMui2(GenericSiltLoam).xml
      SoilNitrogen
        # Parameters to initialise soil organic matter
        root_wt = 1000  # Type the initial FOM amount in the soil (kgDM/ha)
        root_cn = 30  # Type the initial C:N ratio of FOM
        soil_cn = 12.5  # Type the C:N ratio of soil humus
        mcn = 8  # Type the C:N ratio of soil microbial biomass
        # Enter the values for each layer
        ph = 6.0    6.0    6.0    6.0    6.0    6.0    6.0    6.0    6.0    6.0    6.0    6.0    6.0    6.0    6.0    6.0    6.0    6.0    6.0    6.0    6.0    6.0    6.0    6.0    6.0    6.0    6.0    6.0    6.0    6.0    6.0  # Type the inital soil pH
        oc = 4.817  4.789  4.760  4.717  4.665  4.613  4.331  3.977  3.667  3.396  3.148  2.877  2.630  2.336  2.023  1.761  1.550  1.379  1.241  1.111  0.996  0.912  0.844  0.797  0.752  0.723  0.704  0.692  0.685  0.681  0.680  # Type the initial soil organic carbon content (%)
        fbiom = 0.080  0.080  0.080  0.080  0.079  0.078  0.075  0.069  0.061  0.050  0.040  0.029  0.021  0.013  0.008  0.008  0.008  0.008  0.008  0.008  0.008  0.008  0.008  0.008  0.008  0.008  0.008  0.008  0.008  0.008  0.008  # Type the microbial biomass fraction of OC (0-1)
        finert = 0.454  0.461  0.468  0.474  0.487  0.515  0.571  0.626  0.678  0.718  0.755  0.786  0.819  0.843  0.876  0.895  0.915  0.927  0.940  0.947  0.958  0.964  0.971  0.976  0.980  0.985  0.988  0.990  0.992  0.993  0.994  # Type the inert fraction of soil humus (0-1)
        no3ppm = 1.50   2.00   2.40   2.50   2.50   2.50   2.50   2.50   2.50   2.45   2.30   2.15   2.00   1.85   1.60   1.35   1.15   0.90   0.80   0.71   0.65   0.59   0.51   0.44   0.39   0.34   0.30   0.26   0.21   0.20   0.20  # Type the initial concentration of NO3 is the soil (ppm)
        nh4ppm = 0.50   0.70   0.80   0.80   0.80   0.80   0.80   0.80   0.80   0.80   0.80   0.70   0.60   0.50   0.40   0.40   0.30   0.30   0.20   0.20   0.20   0.20   0.20   0.10   0.10   0.10   0.10   0.08   0.07   0.07   0.07  # Type the initial concentration of NH4 is the soil (ppm)
        ureappm = 0.00   0.00   0.00   0.00   0.00   0.00   0.00   0.00   0.00   0.00   0.00   0.00   0.00   0.00   0.00   0.00   0.00   0.00   0.00   0.00   0.00   0.00   0.00   0.00   0.00   0.00   0.00   0.00   0.00   0.00   0.00  # Type the initial concentration of urea is the soil (ppm)
      SoilTemperature2: MaxTTimeDefault=14; BoundaryLayerConductanceSource=calc; BoundaryLayerConductance=20; BoundaryLayerConductanceIterations=1; NetRadiationSource=calc; DefaultWindSpeed=3; DefaultAltitude=18; DefaultInstrumentHeight=1.2; BareSoilHeight=57
        Clay=15.0   15.0   15.0   15.0   15.0   15.0   15.0   15.0   15.0   15.0   15.0   15.0   15.0   15.0   15.0   15.0   15.0   15.0   15.0   15.0   15.0   15.0   15.0   15.0   15.0   15.0   15.0   15.0   15.0   15.0   15.0
      AgPasture
        Nspecies = 2  # Number of species
        thisCropName = AgPasture  # Crop name shown as on the simulation tree
        cropName = ryegrass whiteclover paspalum  # Species names
        micrometType = grass     grass    grass  # Crop type for MicroMet
        isAnnual = 0           0          0  # Annual species? no=0, yes=1
        isLegume = 0           1          0  # Legume species? no=0, yes=1
        photoPath = 3           3          4  # C3 or C4 species? C3=3, C4=4
        rootDepth = 750       350      1000
        growthTmin = 2           3          10  # Minimum temperature for growth
        growthTmax = 32        32         40  # Maximum temperature for growth
        growthTopt = 20        20         22  # Optimum temperature for growth
        growthTq = 1.75     1.75        2.0  # Curvature of growth response to temperature
        massFluxTmin = 2           3          7.5  # Minimum temperature for mass flux
        massFluxTopt = 20        20         22  # Optimum temperature for mass flux
        massFluxW0 = 2          2           2  # Scale factor for response of mass flux to soil moisture
        massFluxWopt = 0.5       0.5        0.5  # Optimum soil moisture for mass flux
        heatOnsetT = 32.5     32.5      40  # Heat effects- Onset temperature
        heatFullT = 100      100      100  # Heat effects- Full temperature
        heatSumT = 30        30         50  # Heat effects- Temperature sum for recovery
        coldOnsetT = 0          0           8  # Cold effects- Onset temperature
        coldFullT = -3          -3         3  # Cold effects- Full temperature
        coldSumT = 20         20        50  # Cold effects- Temperature sum for recovery
        Pm = 1           1          1.2  # Reference CO2 assimilation rate (mg CO2/m2.s)
        maintRespiration = 3           3          3  # Maintenance respiration coefficient (%)
        growthEfficiency = 0.75      0.75     0.75
        SLA = 20        20         20  # Specific leaf area
        lightExtCoeff = 0.5       0.8        0.6  # Light extinction coefficient
        stockParameter = 0.05     0.05      0.05  # Stock influence parameter
        maxRootFraction = 0.2       0.2        0.2  # Maximum biomass fraction allocated to root
        leafRate = 3          3           3.5  # Reference leaf appearance rate without stress
        fLeaf = 0.7       0.7        0.7  # Reference growth partition to leaves
        fStolon = 0.0       0.2        0.0  # Reference growth partition to stolon
        digestLive = 0.6       0.6        0.6  # Digestibility of live plant material
        digestDead = 0.2       0.2        0.2  # Digestibility of dead plant material
        dmtotal = 1150    575       150  # Initial shoot dry matter (kg/ha)
        dmlitter = 250      50         10  # Initial litter dry matter (kg/ha)
        dmgreenmin = 350      100       25  # Minimum green dry matter (kg/ha)
        NcleafOpt = 4.0       4.5        3.0  # N concentration - leaf optimum
        NcleafMax = 5.0       5.5        3.5  # N concentration - leaf luxury
        NcleafMin = 1.2       2.0        0.5  # N concentration - leaf scenescent
        NcstemFr = 0.5      0.5         0.5  # Stem N concentration as fraction of leaf N concentration
        NcstolFr = 0.0      0.5         0.0  # Stolon N concentration as fraction of leaf N concentration
        NcrootFr = 0.5      0.5         0.5  # Root N concentration as fraction of leaf N concentration
        NMinFix = 0.0      0.2         0.0  # Minimum N fixation (when soil N is sufficient)
        NMaxFix = 0.0      0.6         0.0  # Maximum N fixation (when soil N is unavailable)
        CO2PmaxScale = 700     700       150  # CO2 - Scale factor for CO2 effect on photosynthesis
        CO2NScale = 600     600       600  # CO2 - Scale factor for CO2 effects on plant N concentration
        CO2NMin = 0.7      0.7        0.7  # CO2 - Minimum fraction that plant N concentration may reduce to uder elevated CO2
        CO2NCurvature = 2         2           2  # CO2 - Curvature factor of CO2 effect on plant N concentration
        Frgr = 1         1           1  # Relative growth factor
        waterStressFactor = 1         1           1  # Scale factor of water stress on plant growth [0-1]
        rlvp = 0.107  0.112  0.112  0.110  0.106  0.097  0.085  0.070  0.055  0.042  0.032  0.023  0.017  0.012  0.007  0.004  0.003  0.002  0.001  0.001  0.001  0.001  0.000  0.000  0.000  0.000  0.000  0.000  0.000  0.000  0.000  # Root distribution of swards (relative to each soil layer)
        WaterUptakeSource = apsim  # Water uptake done by AgPasture (calc) or by apsim?
      outputfile Outputs
        filename=Solute2Test-NitrificationInhibitor Paddock1-NoInhibitor Outputs.out
        title=Solute2Test-NitrificationInhibitor Paddock1-NoInhibitor Outputs
        variables
          variable:
            dd/mmm/yyyy as Date
            day as DoY
            rain as Rain
            drain as Drainage format 2
            sw_dep() as SoilWaterContent format 2
            NitrificationInhibitor() format 3
            NitrificationInhibitor(1) format 3
            NitrificationInhibitor(2) format 3
            NitrificationInhibitor(3) format 3
            NitrificationInhibitor(4) format 3
            NitrificationInhibitor(5) format 3
            Leach_NitrificationInhibitor format 3
            Degradation_NitrificationInhibitor() format 3
            fertiliser as FertiliserN format 2
            SoluteAdded as NitrificationInhibitorAdded
            PlantFixedN as FixedN format 2
            dlt_urea_hydrol() as HydrolisedN format 2
            nitrification() as NitrifiedN format 2
            dnit() as DenitrifiedN format 2
            leach_urea as LeachedUrea format 2
            leach_nh4 as LeachedNH4 format 2
            leach_no3 as LeachedNO3 format 2
            flow_no3(7) as NO3Leach(10cm)
            flow_no3(11) as NO3Leach(20cm)
            removed_n as removedN format 2
            n2o_atm() as N2Oemissions format 3
            urea() as UreaTotal format 2
            nh4() as NH4Total format 2
            no3() as NO3Total format 2
            surfaceom_n as SurfaceOM_N format 2
            fom_n() as FOM_N format 2
            biom_n() as Biom_N format 2
            hum_n() as Hum_N format 2
            TotalPlantN as PlantN format 2
            removed_dm as RemovedDM
            TotalPlantWt as PastureDM
            flow_nitrificationinhibitor(1)
            flow_nitrificationinhibitor(5)
            degradation_nitrificationinhibitor(1)
            degradation_nitrificationinhibitor(5)
            NitrificationInhibitor(18) format 3
        events Reporting Frequency: event=end_day
    area Paddock2-WithInhibitor1 -> /simulations/Solute2Test-NitrificationInhibitor/Paddock1-NoInhibitor
      folder Manager folder -> /simulations/Solute2Test-NitrificationInhibitor/Paddock1-NoInhibitor/Manager folder
        manager2 ApplyInhibitor
          # Apply a given solute to the soil
          ApplySolute_name = nitrificationinhibitor  # Name of the solute to apply
          # When and how often to apply
          ApplySolute_start_date = 04/05/2000  # Date to start applications (dd/mm/yyyy)
          ApplySolute_end_date = 31/12/2100  # Date to end applications (dd/mm/yyyy)
          ApplySolute_interval = 1461  # Interval between applications (days)
          ApplySolute_times = 1  # Number of times to apply
          # Amount and depth for applications
          ApplySolute_amount2add = 10  # Amount of solute to apply (kg/ha)
          ApplySolute_depth2add = 1  # Depth for application (mm)
```vb
Imports System
Imports ModelFramework

' This manager applies a given amount of solute to the soil. It will add from the surface till the depth specified (decreasing linearly)
'  The manager can also repeat the application periodically within a given window

'-->  Last uptaded in: 17/Sep/2013 ..................


Public Class Script 
   
   'Parameter variables:
   <param> Private ApplySolute_name As String
   <param> Private ApplySolute_start_date As String
   <param> Private ApplySolute_end_date As String
   <param> Private ApplySolute_interval As Integer
   <param> Private ApplySolute_times As Integer
   <param> Private ApplySolute_amount2add As Double
   <param> Private ApplySolute_depth2add As Double
   
   'Events to raise
   <[Event]()> Public Event SoluteChanged As SoluteChangedDelegate

   'Variables read from other modules
   <Input> Private today As DateTime            'Today's date
   <Input> Private dlayer As Double()           'Soil layers structure

   'Output variables
   <Output><Units("kg/ha")> Public SoluteAdded As Double       'The amount of solute added

   'Internal variables
   Private StartDate As DateTime                'The date when applications start (in date format)
   Private EndDate As DateTime                  'The date when applications finish (in date format)
   Private TimeAfterApplication As Integer      'Number of days after an application
   Private SoilDepth As Double                  'The soil depth (mm)
   Private LayerFraction() As Double        'The fraction of solute applied in each layer
   Private NumberOfApplications As Integer      'Number of applications

   <EventHandler()> Public Sub OnInitialised()

      'Put the dates into date format:
      StartDate = DateTime.Parse(ApplySolute_start_date & " 06:00:00 am")
      EndDate = DateTime.Parse(ApplySolute_end_date & " 06:00:00 pm")
      NumberOfApplications = 0
      TimeAfterApplication = 1
      
      'Computes the fraction of solute to be applied in each layer
      Console.WriteLine(" Applying solute, " & ApplySolute_amount2add.ToString("#0.0#") & " kg/ha, in following layers")
      ReDim LayerFraction(dlayer.length - 1)
      Dim Depth_from_surface As Double = 0
      Dim surf_L As Double = 2 / ApplySolute_depth2add
      Dim upper_L As Double = surf_L
      Dim lower_L As Double = 0
      Dim thisLayer As Double = 0
      For Layer As Integer = 0 To dlayer.length - 1
         Depth_from_surface += dlayer(Layer)
         If Depth_from_surface >= ApplySolute_depth2add Then
            ' last layer
            lower_L = 0
            thisLayer = dlayer(Layer) - (Depth_from_surface - ApplySolute_depth2add)
         Else
            ' intermediate layer
            lower_L = surf_L * (ApplySolute_depth2add - Depth_from_surface) / ApplySolute_depth2add
            thisLayer = dlayer(Layer)
         End If
         LayerFraction(Layer) = (upper_L + lower_L) * thisLayer / 2
         upper_L = lower_L
         Console.WriteLine(" Fraction in layer (" & Layer.ToString() & "): " & LayerFraction(Layer).ToString())
         If Depth_from_surface >= ApplySolute_depth2add Then Layer = dlayer.length               
      Next
      

   End Sub

   <EventHandler()> Public Sub OnPrepare()

      'Re-set variables
      SoluteAdded = 0
      Dim delta_solute(dlayer.Length - 1) As Double

      'Decide whether it is time to start applications:
      If (today.Date >= StartDate.Date) And (today.Date <= EndDate.Date) And (NumberOfApplications < ApplySolute_times) Then
         If (today - StartDate).TotalDays < 0.5 Then
            ' always apply on the starting date, or beginning of simulation
            For Layer As Integer = 0 To dlayer.length - 1
               delta_solute(Layer) = ApplySolute_amount2add * LayerFraction(Layer)
               SoluteAdded += delta_solute(Layer)
               If LayerFraction(Layer) <= 1E-12 Then Layer = dlayer.length
            Next
            TimeAfterApplication = 1
            NumberOfApplications += 1
         Else
            ' apply at given intervals
            If TimeAfterApplication >= ApplySolute_interval Then
               For Layer As Integer = 0 To dlayer.length - 1
                  delta_solute(Layer) = ApplySolute_amount2add * LayerFraction(Layer)
                  SoluteAdded += delta_solute(Layer)
                  If LayerFraction(Layer) <= 1E-12 Then Layer = dlayer.length               
               Next
               TimeAfterApplication = 1
               NumberOfApplications += 1
            Else
               TimeAfterApplication = TimeAfterApplication + 1
               SoluteAdded = 0
            End If
         End If

         'Make the application
         If TimeAfterApplication = 1 Then
            Dim SoluteChanges As SoluteChangedType = New SoluteChangedType()
            SoluteChanges.Sender = "Manager: ApplySolute"
            SoluteChanges.SoluteName = ApplySolute_name
            SoluteChanges.SoluteUnits = "kg/ha"
            SoluteChanges.DeltaSolute = delta_solute
            RaiseEvent SoluteChanged(SoluteChanges)

            Console.WriteLine(today.ToString("dd MMMM yyyy") + " (Day of year=" + today.DayOfYear.ToString + "), ApplySolute:")
            Console.WriteLine("     " & ApplySolute_name & " being applied at " + SoluteAdded.ToString("0.00") + "kg/ha, added down to depth " + ApplySolute_depth2add.ToString("0") + "mm")
            Console.WriteLine("TimeAfterApplication " + TimeAfterApplication.ToString())
         End If
      End If            
      
   End Sub

End Class
```
      outputfile Outputs -> /simulations/Solute2Test-NitrificationInhibitor/Paddock1-NoInhibitor/Outputs
        filename=Solute2Test-NitrificationInhibitor Paddock2-WithInhibitor1 Outputs.out
        title=Solute2Test-NitrificationInhibitor Paddock2-WithInhibitor1 Outputs
        variables -> /simulations/Solute2Test-NitrificationInhibitor/Paddock1-NoInhibitor/Outputs/Variables
        events Reporting Frequency -> /simulations/Solute2Test-NitrificationInhibitor/Paddock1-NoInhibitor/Outputs/Reporting Frequency
    area Paddock3-WithInhibitor2 -> /simulations/Solute2Test-NitrificationInhibitor/Paddock1-NoInhibitor
      folder Manager folder -> /simulations/Solute2Test-NitrificationInhibitor/Paddock1-NoInhibitor/Manager folder
        manager2 ApplyInhibitor
          # Apply a given solute to the soil
          ApplySolute_name = nitrificationinhibitor  # Name of the solute to apply
          # When and how often to apply
          ApplySolute_start_date = 11/05/2000  # Date to start applications (dd/mm/yyyy)
          ApplySolute_end_date = 31/12/2100  # Date to end applications (dd/mm/yyyy)
          ApplySolute_interval = 1461  # Interval between applications (days)
          ApplySolute_times = 1  # Number of times to apply
          # Amount and depth for applications
          ApplySolute_amount2add = 10  # Amount of solute to apply (kg/ha)
          ApplySolute_depth2add = 1  # Depth for application (mm)
          script: same as in Solute2Test-NitrificationInhibitor.Paddock2-WithInhibitor1.Manager folder.ApplyInhibitor
      outputfile Outputs -> /simulations/Solute2Test-NitrificationInhibitor/Paddock1-NoInhibitor/Outputs
        filename=Solute2Test-NitrificationInhibitor Paddock3-WithInhibitor2 Outputs.out
        title=Solute2Test-NitrificationInhibitor Paddock3-WithInhibitor2 Outputs
        variables -> /simulations/Solute2Test-NitrificationInhibitor/Paddock1-NoInhibitor/Outputs/Variables
        events Reporting Frequency -> /simulations/Solute2Test-NitrificationInhibitor/Paddock1-NoInhibitor/Outputs/Reporting Frequency
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