folder simulations: version=36; creator=Apsim 7.5-r3171
  simulation BaseTaupo
    clock
      start_date = 01/08/2008  # Enter the start date of the simulation
      end_date = 30/03/2010  # Enter the end date of the simulation
    metfile met
      filename=%apsim%\Tests\Solute2\NitrificationInhibitor\Validation\TaupoLysimeters\Taupo-Poihipi.met
    memo Info
       ===================================================================================
           Validation test for nitrification inhibitor (Solute2 model)
       ===================================================================================

        » This is a base simulation describing the lysimeter experiment, The actual experiments (with appropriate treatments) are given in the derived simulations (linked to this one)
    summaryfile
    area paddock
      SoilN_dcd
        root_wt = 1000  # Type the amount of dead roots in the soil (kg/ha)
        root_cn = 50  # Type the C:N ratio of dead roots
        soil_cn = 12.5  # Type the C:N ratio of soil humus
        ph = 6.0   6.0   6.0   6.0   6.0   6.0   6.0   6.0   6.0   6.0   6.0   6.0   6.0   6.0   6.0   6.0   6.0   6.0   6.0   6.0   6.0   6.0  # Type the inital soil pH
        oc = 5.796 5.743 5.690 5.610 5.510 5.410 5.322 5.222 5.133 5.056 4.971 4.498 4.059 3.534 2.964 2.480 2.082 1.754 1.485 1.263 1.033 0.930  # Type the initial soil organic carbon content (%)
        fbiom = 0.080  0.080  0.080  0.080  0.079  0.077  0.072  0.063  0.048  0.031  0.017  0.010  0.008  0.008  0.008  0.008  0.008  0.008  # Type the microbial biomass fraction of OC (0-1)
        finert = 0.489 0.496 0.503 0.509 0.521 0.532 0.544 0.555 0.571 0.582 0.597 0.630 0.667 0.699 0.745 0.778 0.812 0.837 0.862 0.881 0.903 0.917  # Type the inert fraction of soil humus (0-1)
        no3ppm = 4.50    6.00    7.20    7.50    7.50    7.50    7.50    7.50    7.50    7.30    6.80    6.30    5.90    5.30    4.50    3.70    3.00    2.40    2.20    2.00    1.70    1.50  # Type the initial concentration of NO3 is the soil (ppm)
        nh4ppm = 1.50    2.00    2.40    2.50    2.50    2.50    2.50    2.50    2.50    2.43    2.27    2.10    1.97    1.77    1.50    1.23    1.00    0.80    0.73    0.67    0.57    0.50  # Type the initial concentration of NH4 is the soil (ppm)
        ureappm = 0.00  0.00  0.00  0.00  0.00  0.00  0.00  0.00  0.00  0.00  0.00  0.00  0.00  0.00  0.00  0.00  0.00  0.00  0.00  0.00  0.00  0.00  # Type the initial concentration of urea is the soil (ppm)
        nitrification_pot = 40  # Maximum potential nitrification rate (ug NH4/g soil)
        nh4_at_half_pot = 90  # NH4 concentration at half of nitrification rate (ppm)
        opt_temp = 28  # Optimal temperatures for mineralis. and nitrif. (oC)
      folder Manager folder
        manager ClimateControl
          # Climate Control Window
          date1 = 1-jan-2009  # Enter window START date (dd-mmm)
          date2 = 30-aug-2012  # Enter window END date (dd-mmm)
          # Climate Change Parameters
          RainChange = 5  # Relative change in daily rainfall (%)
          on prenewmet:
```
if (date_within('[date1], [date2]') = 1) then
   rain = rain + rain * [RainChange] / 100
 endif
```
        manager Experiment manager
          on init:
```
Ini_Date = date('27/05/2009')
End_Date = date('23/03/2010')
Day_of_Experiment = -1
Do_LeachCollect = 'NONE'


NH4_L1 = 0
NH4_L2 = 0
NH4_L3 = 0

NO3_L1 = 0
NO3_L2 = 0
NO3_L3 = 0

DCD_L1 = 0
DCD_L2 = 0
DCD_L3 = 0
```
          on start_of_day:
```
! this is for getting more decimals
Mineral_N = nh4()+no3()
leach_urea_N = leach_urea
leach_nh4_N = leach_nh4
leach_no3_N = leach_no3
denit_N = dnit()


CloverContent = SpeciesTotalWt(2)/(SpeciesTotalWt(1) + SpeciesTotalWt(2))
!CloverContent = SpeciesTotalWt(2)/(SpeciesTotalWt(1) + SpeciesTotalWt(2) + +SpeciesTotalWt(3))

if today >= Ini_Date then
   isExpDay = 1
   Day_of_Experiment = Day_of_Experiment + 1
else
   isExpDay = 0
   Day_of_Experiment = -1
endif
```
          on end_of_day:
```
PET = peta + petr

NH4_L1 = nh4(1) + nh4(2) + nh4(3) + nh4(4) + nh4(5) + nh4(6)
NH4_L2 = nh4(7) + nh4(8) + nh4(9)
NH4_L3 = nh4(10) + nh4(11) + nh4(12) + nh4(13) + nh4(14)

NO3_L1 = no3(1) + no3(2) + no3(3) + no3(4) + no3(5) + no3(6)
NO3_L2 = no3(7) + no3(8) + no3(9)
NO3_L3 = no3(10) + no3(11) + no3(12) + no3(13) + no3(14)

DCD_L1 = nitrificationinhibitor(1) + nitrificationinhibitor(2) + nitrificationinhibitor(3) + nitrificationinhibitor(4) + nitrificationinhibitor(5) + nitrificationinhibitor(6)
DCD_L2 = nitrificationinhibitor(7) + nitrificationinhibitor(8) + nitrificationinhibitor(9)
DCD_L3 = nitrificationinhibitor(10) + nitrificationinhibitor(11) + nitrificationinhibitor(12) + nitrificationinhibitor(13) + nitrificationinhibitor(14)
```
        manager Collect Leachate Taupo
          on init:
```
!-- Recording Leaching data at specific (observed) dates ----- 

DoRecord_LData = 'NONE'

DrainCollected = 0
UreaLeachCollected = 0
NH4LeachCollected = 0
NO3LeachCollected = 0
DCDLeachCollected = 0
CumDrain = 0
CumUreaLeach = 0
CumNH4Leach = 0
CumNO3Leach = 0
CumDCDLeach = 0

! Dates to record leaching data:
RecDate00 = date('27-May-2009')
RecDate01 = date('03-Jun-2009')
RecDate02 = date('18-Jun-2009')
RecDate03 = date('02-Jul-2009')
RecDate04 = date('07-Jul-2009')
RecDate05 = date('24-Jul-2009')
RecDate06 = date('31-Jul-2009')
RecDate07 = date('18-Aug-2009')
RecDate08 = date('21-Aug-2009')
RecDate09 = date('01-Sep-2009')
RecDate10 = date('30-Sep-2009')
RecDate11 = date('09-Oct-2009')
RecDate12 = date('19-Oct-2009')
RecDate13 = date('04-Feb-2010')
```
          on end_of_day:
```
!Leachate collection  --------------------------------------------------------------------------------------------------------

if today > RecDate00 then
   DrainCollected = 0
   UreaLeachCollected = 0
   NH4LeachCollected = 0
   NO3LeachCollected = 0
   DCDLeachCollected = 0
   CumDrain = CumDrain + Drain
   CumUreaLeach = CumUreaLeach + leach_urea
   CumNH4Leach = CumNH4Leach + leach_nh4
   CumNO3Leach = CumNO3Leach + leach_no3
   CumDCDLeach = CumDCDLeach + leach_nitrificationinhibitor

   if today = RecDate00 then
      DoRecord_LData = 'FALSE'
   elseif today = RecDate01 or today = RecDate02 or today = RecDate03 or today = RecDate04 or today = RecDate05 or today = RecDate06 or today = RecDate07 or today = RecDate08 or today = RecDate09 or today = RecDate10 then
      DoRecord_LData = 'TRUE'
   elseif today = RecDate11 or today = RecDate12 or today = RecDate13 then
      DoRecord_LData = 'TRUE'
   else
      DoRecord_LData = 'FALSE'
   endif
endif

if DoRecord_LData = 'TRUE' then
   DrainCollected = CumDrain
   UreaLeachCollected = CumUreaLeach
   NH4LeachCollected = CumNH4Leach
   NO3LeachCollected = CumNO3Leach
   DCDLeachCollected = CumDCDLeach 
   CumDrain = 0
   CumUreaLeach = 0
   CumNH4Leach = 0
   CumNO3Leach = 0
   CumDCDLeach = 0
endif
```
        manager2 ModifySolutes(no3)
          # Modifying the solute's adsorption parameters
          MdfSolute_name = no3  # Name of the solute to modify
          # New adsorption parameters, for each layer
          str_exco = 0.85  0.85  0.85  0.85  0.85  0.83  0.8  0.8  0.7  0.60  0.60  0.60  0.50  0.45  0.40  0.45  0.45  0.45  0.35  0.30  0.25  # Adsorption coefficient (exco)
          str_fip = 1.0  1.0  1.0  1.0  1.0  1.0  1.0  1.0  1.0  1.0  1.0  1.0  1.0  1.0  1.0  1.0  1.0  1.0  1.0  1.0  1.0  1.0  # Adsorption exponent (fip)
```vb
Imports System
Imports ModelFramework

' This manager modifies the adsorption parameters for some solutes

'-->  Last uptaded in: 10/Sep/2013 ..................


Public Class Script 
   
   'Parameter variables:
   <param> Private MdfSolute_name As String
   <param> Private str_exco As String
   <param> Private str_fip As String
   
   'Link to other modules
   <Link> Private MySwim As SWIM2ui2
   
   'Variables read from other modules
   <Input> Private dlayer As Double()           'Soil layers structure

   'Internal variables
   Private Old_exco As Double()
   Private Temp_exco As Double()
   Private New_exco As Double()
   Private Old_fip As Double()
   Private Temp_fip As Double()
   Private New_fip As Double()

   <EventHandler()> Public Sub OnInitialised()

      'Convert given values into array, check whether all solutes exist, pass on the values


      Dim NumLayers = dlayer.length - 1
      Dim SoluteFound As Boolean
      ReDim New_exco(NumLayers)
      ReDim New_fip(NumLayers)
      
      Temp_exco = makeArray(str_exco)
      Temp_fip = makeArray(str_fip)
      If Temp_exco.length > 1 Or Temp_fip.length > 1 Then
         'we have some values, check that the solute exists
         Try
            'get old values
            SoluteFound = MySwim.Get("exco_" & MdfSolute_name, Old_exco)
            SoluteFound = MySwim.Get("fip_" & MdfSolute_name, Old_fip)
         Catch
            Console.WriteLine(" Solute " & MdfSolute_name & " was not found!!!")
         End Try
         
         If SoluteFound Then
            'verify whether values changed
            For Layer As Integer = 0 To NumLayers               
               If Layer < Temp_exco.Length  Then
                  New_exco(Layer) = Temp_exco(Layer)
               Else
                  New_exco(Layer) = Old_exco(Layer)
               End If
               If Layer < Temp_fip.Length  Then
                  New_fip(Layer) = Temp_fip(Layer)
               Else
                  New_fip(Layer) = Old_fip(Layer)
               End If
            Next
            MySwim.Set("exco_" & MdfSolute_name, New_exco)
            MySwim.Set("fip_" & MdfSolute_name, New_fip)
            Console.WriteLine(" Solute parameters have been updated (in SWIM)")
         End If
      Else
         Console.WriteLine(" No new values were supplied")
      End If
      Console.WriteLine()
      
   End Sub

   Function makeArray(ByVal ArrayString As String) As Double()
      
      'Get the string with values from the user interface and put the values in an numeric array
      
      Dim MyArray_string As String()
      Dim MyArray_single As Double()
      Dim Separator As Char() = " "
      
      '1-Split string into array
      MyArray_string = ArrayString.Split(Separator, StringSplitOptions.RemoveEmptyEntries)
      
      '2-convert array into type single
      ReDim MyArray_single(MyArray_string.Length - 1)      
      For i As Integer = 0 To MyArray_single.length - 1
         MyArray_single(i) = CDbl(MyArray_string(i))
      Next
      Return MyArray_single
      
   End Function
   
End Class
```
        manager2 ModifySolutes(dcd)
          # Modifying the solute's adsorption parameters
          MdfSolute_name = nitrificationinhibitor  # Name of the solute to modify
          # New adsorption parameters, for each layer
          str_exco = 1.4  1.35  1.3  1.3  1.3  1.0  0.8  0.8  0.7  0.60  0.40  0.40  0.35  0.35  0.30  0.25  0.25  0.25  0.25  0.24  0.24  # Adsorption coefficient (exco)
          str_fip = 1.0  1.0  1.0  1.0  1.0  1.0  1.0  1.0  1.0  1.0  1.0  1.0  1.0  1.0  1.0  1.0  1.0  1.0  1.0  1.0  1.0  1.0  # Adsorption exponent (fip)
          script: same as in BaseTaupo.paddock.Manager folder.ModifySolutes(no3)
        manager2 Cut AgPasture on given dates
          # Setup cut procedure for AgPasture
          AgPasture_type = AgPasture  # Enter pasture module
          RemoveAmount_type = Down to residual DM  # Enter how removed amount is computed
          Amount2RemoveFix = 270  # If setting amount, enter the value to remove at each cut (kgDM/ha)
          LowerThreshold = 1500  # If not setting amount, enter the minimum residual after cut (kgDM/ha)
          # Management of cut material
          ResidueTreatment_type = Return as residue  # Enter the treatment type for the cut material
          DMRemovalOption = 1.0  # Enter fraction of DM that is removed from field (0-1)
          FracN2Remove = 1.0  # Enter fraction of N that is removed from field (0-1)
          # If returning as dung & urine
          FracN2Dung = 0.0  # Enter proportion of N returned in dung (0-1)
          # Enter the dates for each cut
          CuttingDates = 1/08/2008 25/08/2008 20/09/2008 15/10/2008 10/11/2008 5/12/2008 5/01/2009 5/02/2009 5/03/2009 5/04/2009 1/05/2009 26/05/2009 18/08/2009 21/09/2009 19/10/2009 16/11/2009 21/12/2009 4/02/2010 23/03/2010  # Use shift+enter for new line, date formats = dd-mmm-yyyy; dd/mm/yyyy
          # If setting variable amounts enter values below (one for each date)
          Amounts2RemoveVar = 350  # Amount to remove at each cutting date (kgDM/ha)
```vb
Imports System
Imports ModelFramework

'This manager sets up a cutting procedure for AgPasture at given dates. Cuts happensat each given date, if possible, according to remove options, below.
' Cut is done on above ground stem and leaf DM (dead and green).  
' + Remove amount options:
'  - Set amount: The amount to remove is fixed, always performed
'  - Target amount: The amount is the smallest of a given value and difference between existing DM and a target (LowerTheshold of CoverTarget)
'  - Set variable amount: The amounts for each date is given
'  - Down to residual DM: Amount to remove is the difference between existing DM and LowerTheshold
'
' + Manage residues options:
'  - Return as residue: A fraction of the DM cut is added as grass residue to the surfaceOM module;
'  - Return as dung & urine: A fraction of the amount cut is returned to the soil as evenly distributed urine and dung. 
'     This is a very simplified approach where the fractions of DM (C) and N to be removed are set separately. Also,
'      the partition of N between urine and dung is set by the user. 
'     N urine is added as urea fertiliser (top 10cm) and teh rmaining DM and N are added to surfaceOM as dung (RuminantDung_PastureFed).

'-->  Last uptaded in: 7/Aug/2011 ..................


Public Class Script 
   
   'Parameter variables:
   <param> Private AgPasture_type As String              'The pasture module
   
   <param> Private RemoveAmount_type As String           'The way to compute how much pasture is cut
   <param> Private Amount2RemoveFix As Double            'The amount of DM to be removed at each cut (kg/ha, DM above ground)
   <param> Private LowerThreshold As Double              'The residual DM amount left after cut  (kg/ha, DM above ground)

   <param> Private CuttingDates As String                'Dates for cutting pasture
   <param> Private Amounts2RemoveVar As String          'Amounts to cut at each date (kg/ha, DM above ground)
   
   <param> Private ResidueTreatment_type As String       'The treatment to the material cut
   <param> Private DMRemovalOption As String             'The option to remove DM, based on digestibility of a fraction (0-1)
   <param> Private FracN2Remove As Double                'Fraction of the N in the material cut that is removed from simulation (0-1)
   <param> Private FracN2Dung As Double                  'The fraction of returned N that goes into dung, if return is as dung and urine (0-1)

   'Links and events:
   <Link> Private MyAgPasture As AgPasture   
   <[Event]()> Public Event Graze As GrazeDelegate
   <[Event]()> Public Event BiomassRemoved As BiomassRemovedDelegate
   <[Event]()> Public Event FertiliserApplication As FertiliserApplicationDelegate

   
   'Variables read from other modules
   <Input> Private today As DateTime                     'Today's date
   <input> Private StemWt As Double                      'The DM of stems (above ground DM)
   <input> Private LeafWt As Double                      'The DM of leaves (above ground DM)
   <input> Private StemN As Double                       'The N amount in stems (above ground N)
   <input> Private LeafN As Double                       'The N amount in leaves (above ground N)
   <input> Private HarvestWt As Double                   'The DM harvested (kg/ha)
   <input> Private HarvestN As Double                    'The N amount harvested (kgN/ha)
   <input> Private DefoliatedDigestibility As Double     'The pasture digestibility (0-1)

   'Outputs
   <output><units("")> Public Can_Cut As String                   'Whether todays is a cutting day
   <output><units("")> Public Has_Cut As String                  'Whether todays cut was done
   <output><units("kg/ha")> Public harvested_dm As Double        'Pasture DM harvested today (kg/ha)
   <output><units("kgN/ha")> Public harvested_n As Double        'N harvested today
   <output><units("kg/ha")> Public removed_dm As Double          'DM removed from the simulation
   <output><units("kgN/ha")> Public removed_n As Double          'N removed from the simulation
   <output><units("kgN/ha")> Public returned_dm As Double        'DM returned to the paddock
   <output><units("kgN/ha")> Public returned_n As Double         'N returned to the paddock
   <output><units("kgN/ha")> Public NReturn_asDung As Double     'N returned as dung (SurfOM)
   <output><units("kgN/ha")> Public NReturn_asUrine As Double    'N returned as urine (urea)
   <output><units("kg/ha/day")> Public GrowthRateCalc As Double  'Average growth rate for this cut
   <output><units("%")> Public Nconc_inRemoved As Double         'N concentration on the cut material
   <output><units("days")> Public DaysAfterCut As Integer        'Number of days after last cut
   <output><units("kg/ha")> Public StandingWt As Double          'Total standing DM (Stem + Leaf)

   'Internal variables
   Private Dates2Cut As DateTime()              'The dates when pasture is to be cut
   Private Amount2Remove As Double()            'Amount to cut at each date
   Private CutCounter As Integer                'A counter for the number of cut
   Private FracDM2Remove As Double              'The fraction of DM to be removed from the simulation (0-1)
   Private Allow_cut As String
   
   <EventHandler()> Public Sub OnInit2()

      'Put the dates into date format:
      Dim Eachdates As String() = CuttingDates.Split()
      Dim EachAmounts As String() = Amounts2RemoveVar.Split()
      ReDim Dates2Cut(Eachdates.Length - 1)
      ReDim Amount2Remove(Dates2Cut.Length - 1)
      If RemoveAmount_type.ToLower = "set variable amount" Then
         If Eachdates.Length - 1 <> EachAmounts.Length - 1 Then Throw New Exception("Number of dates and amount to remove are not have the same")
      End If
      For i As Integer = 0 To Eachdates.Length - 1
         Dates2Cut(i) = DateTime.Parse(Eachdates(i) & " 06:00:00 am")
         If RemoveAmount_type.ToLower = "set variable amount" Then
            Amount2Remove(i) = CDbl(EachAmounts(i))
         Else
            Amount2Remove(i) = Amount2RemoveFix
         End If
      Next
      
      'Reset variables
      CutCounter = 0
      DaysAfterCut = -1
      Allow_Cut = "no" 
      Can_Cut = Allow_Cut
      Has_Cut = "no"
  
      'The fraction of DM to remove
      ' - DMRemovalOption can be a value (0-1 = FracDM2Remove) or a string, which tell us that FracDM2Remove is based on digestibility
      If DMRemovalOption.ToLower = "based on digestibility" Then
         FracDM2Remove = 1 - DefoliatedDigestibility
      Else
         Try
            FracDM2Remove = DMRemovalOption
            If (FracDM2Remove < 0) Or FracDM2Remove > 1 Then
               Throw New Exception("Fraction of DM to remove is out of bounds")
            End If
         Catch
               Throw New Exception("Fraction of DM to remove is not valid")
         End Try
      End If
      
      'prepare message:
      Dim myMessage As String
      If RemoveAmount_type.Contains("residual") Then
         myMessage = RemoveAmount_type.ToLower
      ElseIf RemoveAmount_type.Contains("variable") Then
         mymessage = "variable amounts"
      Else
         myMessage = RemoveAmount_type.ToLower & " = " & LowerThreshold.ToString("#0") & " kg/ha"
      End If

      'write messages on summary file
      Console.WriteLine("")
      Console.WriteLine("  Cut rotation for AgPasture initialised")
      Console.WriteLine("   cut type: at given dates")
      Console.WriteLine("   remove " & myMessage)
      Dim myValue1 As Double = (1 - FracDM2Remove) * 100
      Console.WriteLine("   " & ResidueTreatment_type.ToLower & ", " & myValue1.ToString("#0.0") & "%")
      Console.WriteLine("")
      
   End Sub
      
   <EventHandler()> Public Sub OnPrepare()
      
      StandingWt = StemWt + LeafWt
      Dim preharvest_dm As Double = StandingWt
      Dim preharvest_n As Double = StemN + LeafN
      Dim Amount2Cut As Double
      Dim AmountCuttable As Double

      'Reset variables
      Has_Cut = "no"
      harvested_dm = 0.0
      harvested_n = 0.0
      removed_dm = 0.0
      removed_n = 0.0
      returned_dm = 0.0
      returned_n = 0.0
      GrowthRateCalc = 0.0
      Nconc_inRemoved = 0.0
      NReturn_asDung = 0.0
      NReturn_asUrine = 0.0
      DaysAfterCut = DaysAfterCut + 1

      'Decide whether it is time to cut:
      If CutCounter < Dates2Cut.length Then
         If Today.Date = Dates2Cut(CutCounter).Date Then
            Allow_Cut = "yes"
         End If
      Else
         Allow_cut = "no"
      End If

      'The use of these avoid (or reduces) problems when two managers are used in the same simulation
      Can_Cut = Allow_Cut
      
      'Decide how much to cut:
      If Allow_Cut = "yes" Then
         Select Case RemoveAmount_type.ToLower
            Case "set amount"
               Amount2Cut = Amount2Remove(0)
               AmountCuttable = preharvest_dm
            Case "target amount"
               Amount2Cut = math.Min(math.Max(0, preharvest_dm - LowerThreshold), Amount2Remove(0))
               AmountCuttable = math.Max(0, preharvest_dm - LowerThreshold)
            Case "set variable amount"
               Amount2Cut = Amount2Remove(CutCounter)
               AmountCuttable = preharvest_dm
            Case "down to residual dm"
               Amount2Cut = math.Max(0, preharvest_dm - LowerThreshold)
               AmountCuttable = math.Max(0, preharvest_dm - LowerThreshold)
            Case Else
               Throw New Exception("Option to compute DM amount to remove is not valid")
         End Select  
         
         'Decide whether cut actually happens:
         If (AmountCuttable >= Amount2Cut) Then
            Call CutPasture(Amount2Cut)
            'reset cut variables
            CutCounter = CutCounter + 1
            DaysAfterCut = 0
            Has_Cut = "yes"
            Allow_Cut = "no"
         End If
      Else
         Amount2Cut = 0
         AmountCuttable = 0
      End If

   End Sub 
   

   Sub CutPasture(ByVal Amount2Cut As Double) 
       
      ' --------------------------------------------------------------------------------------------
      ' Cutting pasture
      ' --------------------------------------------------------------------------------------------

      Console.WriteLine("Sender: " & "Manager2")
      Console.WriteLine("Amount2Cut: " & Amount2Cut)
      Console.WriteLine("type: " & "removal")
      
      Dim CutData As GrazeType 
      CutData = New GrazeType
      CutData.sender = "Manager2"  'AgPasture_type
      CutData.amount = Amount2Cut
      Cutdata.type = "removal"
      MyAgPasture.Graze(CutData)
      'RaiseEvent Graze(CutData)
      harvested_dm = MyAgPasture.HarvestWt
      harvested_n = MyAgPasture.HarvestN

      If DaysAfterCut > 0 Then
         GrowthRateCalc = harvested_dm / DaysAfterCut
      Else
         GrowthRateCalc = 0
      End If
      If harvested_dm > 0 Then
         Nconc_inRemoved = harvested_n * 100 / harvested_dm
      End If
      
      'Let user know (via summary) that a cut was made
      Console.WriteLine(Today.ToString("dd MMMM yyyy") + " (Day of year=" + Today.DayOfYear.ToString + "), Cutting AgPasture:")
      Console.WriteLine("     Removing " + harvested_dm.ToString("#0") + "kg DM/ha, with " & harvested_n.ToString("#0.0") & "kg N/ha")

      ' -- Residue management -------------------------------------------------------------------------
      If DMRemovalOption.ToLower = "based on digestibility" Then
         FracDM2Remove = 1 - DefoliatedDigestibility
      End If
      removed_dm = harvested_dm * FracDM2Remove
      removed_n = harvested_n * FracN2Remove
      returned_dm = harvested_dm - removed_dm 
      returned_n = harvested_n - removed_n 
      
      console.WriteLine("ResidueTreatment_type: " & ResidueTreatment_type)
      If ResidueTreatment_type.ToLower = "return as residue" Then
         If FracDM2Remove < 1 Then
            Dim SOMData As New BiomassRemovedType
            SOMData.crop_type = "grass"
            SOMData.dm_type = New String() {"grass"}
            SOMData.dlt_crop_dm = New Single() {returned_dm}
            SOMData.dlt_dm_n = New Single() {returned_n}
            SOMData.dlt_dm_p = New Single() {0.0}
            SOMData.fraction_to_residue = New Single() {1.0}
            RaiseEvent BiomassRemoved(SOMData)     'this works        
         End If
         
      ElseIf ResidueTreatment_type.ToLower = "return as dung & urine" Then
         ' It is advised that dung and urine return should be done using another manager or modules, such as 'UrinePatch' 
         
         NReturn_asDung = returned_n * FracN2Dung
         NReturn_asUrine = math.Max(0, returned_n - NReturn_asDung)
         Dim SOMData As New BiomassRemovedType
         SOMData.crop_type = "RuminantDung_PastureFed"
         SOMData.dm_type = New String() {"dung"}
         SOMData.dlt_crop_dm = New Single() {returned_dm}
         SOMData.dlt_dm_n = New Single() {NReturn_asDung}
         SOMData.dlt_dm_p = New Single() {0.0}
         SOMData.fraction_to_residue = New Single() {1.0}
         RaiseEvent BiomassRemoved(SOMData)
         
         If NReturn_asUrine > 0 Then
            Dim UrineData As New FertiliserApplicationType
            UrineData.Amount = NReturn_asUrine
            UrineData.Depth = 10
            UrineData.Type = "urea"
            RaiseEvent FertiliserApplication(UrineData)
         End If
         
      Else
         Throw New Exception("Residue management type is not valid")
      End If
      
   End Sub
    
End Class
```
          memo Info
             * * *   Cut AgPasture on given dates   * * *

            > Created in 17/Jul/2011
            >> Last modified: 07/Sep/2012

            > Author: Rogerio Cichota
            >> Modified by: check notes on code

            > General description:
                This script allows to set up a cut/graze rotation for AgPasture. Cuts are allowed only given dates. The user can choose how much is to be cut, how much is to be removed from fieldn and how the remaining is returned.
             Although return as dung and urine is allowe it is not recommended, it should be done using the UrinePatch module.  The cuts happen on Prepare event.

            > Specific details:
                + Remove amount options:
                  - Set amount: The amount to remove is fixed, always performed
                  - Target amount: The amount is the smallest of a given value and difference between existing DM and a target (minimum residual of CoverTarget)
                  - Set variable amount: The amounts for each date is given
                  - Down to residual DM: Amount to remove is the difference between existing DM and minimum residual

               + Manage residues options:
                 - Return as residue: A fraction of the DM cut is added as grass residue to the surfaceOM module;
                 - Return as dung & urine: A fraction of the amount cut is returned to the soil as evenly distributed urine and dung.
                   This is a very simplified approach where the fractions of DM (C) and N to be removed are set separately. Also,
                    the partition of N between urine and dung is set by the user.
                   N urine is added as urea fertiliser (top 10cm) and the remaining DM and N are added to surfaceOM as dung (RuminantDung_PastureFed).

            > Notes on modifications:
                + RCichota, Aug/2012: added the possibility of supplying variable amounts to cut
        manager2 UrinePatchApply
          # Date and amount for urine deposition
          UrinePatch_start_date = 27/05/2009  # Date to start applications (dd/mm/yyyy)
          UrinePatch_end_date = 31/12/2100  # Date to end applications (dd/mm/yyyy)
          Apply_interval = 5000  # Type the interval between applications (days)
          Apply_times = 1  # Number of applications
          doFirstTime = yes  # Apply first urine patch?
          Urine_Water_to_add = 8.6  # Type the amount of water to apply (mm)
          Urine_N_to_add = 600  # Type the amount of urea N to apply (kg/ha)
          # Urine patch parameters
          Apply_WeN = No  # Apply water and N combined?
          p_eq_urine = 0.99  # Max proportion of SAT-DUL that urine can fill
          Dist_type = Linearly decreasing over depth  # Choose the type urine distribution in the soil profile
          Depth_for_urine = 350  # The depth reached by urine (mm)
          line_factor = 1.5  # Type the factor (exponent) to modify the linear dist.
```vb
Imports System
Imports ModelFramework

'This manager applies urine (water plus urea) at the amount and depth specified.
' it can also distribute it in the soil profile according to rules give (to simulate fast infiltration/prefential flow)
' (The deposition can also be set to be repeated periodically - also specify the number of depostions and whether the first one happens)
'  [Used to test temporal overlaps]

'-->  Last uptaded in: 29/Aug/2012 ..................


Public Class Script 
   
   'Parameter variables:
   <param> Private UrinePatch_start_date As String
   <param> Private UrinePatch_end_date As String
   <param> Private Apply_interval As Integer
   <param> Private Apply_times As Integer
   <param> Private doFirstTime As String
   <param><Output><Units("mm")> Private Urine_Water_to_add As Double
   <param><Output><Units("kg/ha")> Private Urine_N_to_add As Double
   <param> Private p_eq_urine As Double
   <param> Private Dist_type As String
   <param> Private Apply_WeN As String 
   <param> Private Depth_for_urine As Double
   <param> Private line_factor As Double
   
   'Link to other modules:
   <Link> Private MyPaddock As Paddock
   <Link> Private Irrigator As Irrigation   
   <Link> Private FertModule As Fertiliser
   Private SoilWaterModule As Object
   Private SoilNModule As Object
      
   'Variables read from other modules
   <Input> Private today As DateTime         'Today's date
   <Input> Private dlayer As Double()        'Thickness of soil layers (mm)
   <Input> Private sw As Double()            'Soil water content (cm3/cm3)
   <Input> Private sw_dep As Double()        'Soil water content (mm)
   <Input> Private sat_dep As Double()       'Saturated soil water content (mm)

   'Output variables
   <Output><Units("")> Public Urine_frac As Double()              'The actual fraction of urine added to each layer
   <Output><Units("mm")> Public Urine_depth As Double             'The depth reached by the urine infiltration at application
   <Output><Units("mm")> Public Urine_Wprofile_added As Double    'The amount of urine water added in the soil profile (exclude added as pond)
   <Output><Units("mm")> Public Urine_Wpond_added As Double       'The amount of urine water added as pond (irrigation)
   <Output><Units("mm")> Public Urine_Water_added As Double       'The total amount of urine water added
   <Output><Units("kg/ha")> Public Urine_Nprofile_added As Double 'The amount of urea N added to the profile
   <Output><Units("kg/ha")> Public Urine_Npond_added As Double    'The amount of urea N added as pond (fertiliser at layer zero)
   <Output><Units("kg/ha")> Public Urine_N_added As Double        'The total amount of urea N added
   
   'Internal variables
   Private StartDate As Date                'The date when urine applications start (in date format)
   Private EndDate As Date                'The date when urine applications finish (in date format)
   Private TimeAfterApplication As Integer 'Number of days after a urine application
   Private Urine_prop As Double()          'The potential proportion of urine for each soil layer
   Private SoilDepth As Double             'The soil depth (mm)
   Private NumberOfDepositions As Integer             'Number of urine depositons

   <EventHandler()> Public Sub OnInit2()

      'check the presence of one of the soil modules
      Call CheckModules()

      'Put the dates into date format:
      StartDate = Date.Parse(UrinePatch_start_date)
      EndDate = Date.Parse(UrinePatch_end_date)
      NumberOfDepositions = 0
      
      'Calculates the proportion of urine to be added at each layer:
      ReDim Urine_prop(dlayer.Length - 1)
      If Dist_type.ToLower = "free" Then    'Urine will be added according to 'water infiltration'
         For z As Integer = 0 To dlayer.length - 1
            Urine_prop(z) = 1
         Next
      Else        
         'A given distribution over depth has been chosen, 
         ' urine will be applied up to or at a given depth.
         
         Dim Depth_from_surface  As Double = 0
         For z As Integer = 0 To dlayer.length - 1
            SoilDepth = SoilDepth + dlayer(z)
         Next
         
         'Check that the urine depth is not larger that the soil depth
         If Depth_for_urine > SoilDepth Then Depth_for_urine = SoilDepth
           
         If Dist_type.ToLower = "at a given depth" Then
            For z As Integer = 0 To dlayer.length - 1
               If Depth_for_urine >= Depth_from_surface And Depth_for_urine < Depth_from_surface + dlayer(z) Then
                  Urine_prop(z) = 1
               Else 
                  Urine_prop(z) = 0
               End If
               Depth_from_surface = Depth_from_surface + dlayer(z)
            Next
         ElseIf Dist_type.ToLower = "uniformly distributed" Then
            For z As Integer = 0 To dlayer.length - 1
               If Depth_for_urine >= Depth_from_surface  Then
                  If Depth_for_urine > Depth_from_surface + dlayer(z) Then
                     If Depth_for_urine > 0 Then
                        Urine_prop(z) = dlayer(z) / Depth_for_urine
                     Else
                        Urine_prop(z) = 1
                     End If
                  Else
                     If Depth_for_urine > 0 Then
                        Urine_prop(z) = (Depth_for_urine - Depth_from_surface) / Depth_for_urine
                     Else
                        Urine_prop(z) = 1
                     End If
                  End If
                  Depth_from_surface = Depth_from_surface + dlayer(z)
               Else
                  Urine_prop(z) = 0
               End If 
            Next
         ElseIf Dist_type.ToLower = "linearly decreasing over depth" Then
            'The parameter 'line_factor' makes the line a curve...
            Dim atZ0 As Double
            Dim atZ1 As Double
            Dim Tot_prop As Double = Depth_for_urine * (1 ^ line_factor) / (line_factor + 1)
            
            atZ1 = (Depth_for_urine - Depth_from_surface) * ((1 - Depth_from_surface / Depth_for_urine) ^ line_factor) / (line_factor + 1)
            For z As Integer = 0 To dlayer.length - 1
               atZ0 = atZ1
               Depth_from_surface = Depth_from_surface + dlayer(z)
               atZ1 = (Depth_for_urine - Depth_from_surface) * ((1 - Depth_from_surface / Depth_for_urine) ^ line_factor) / (line_factor + 1)
               If (1 - (Depth_from_surface / Depth_for_urine)) < 0 Then atZ1 = 0
               Urine_prop(z) = (atZ0 - atZ1) / Tot_prop
            Next
         End If
      End If
      Console.WriteLine("")
      Console.WriteLine("Distribution type: " + Dist_type + ", down to " + Depth_for_urine.ToString + "mm depth")
      Console.WriteLine("")
      For z As Integer = 0 To dlayer.length - 1
         Console.WriteLine("    Urine_prop(" + z.ToString + ") = " + Urine_prop(z).ToString)
      Next
      Console.WriteLine("")
   End Sub
   
   'Public WaterChanged As ApsimTypeDelegate WaterChanged.DeltaWater()
   
   <EventHandler()> Public Sub OnPrepare()
      
      Dim urea_conc As Double = 100 * Urine_N_to_add / Urine_Water_to_add  'Urea concentration in urine (ppm)
      Dim sw_deficit(dlayer.Length - 1) As Double                     'Soil water deficit (mm)
      Dim Add_Urine As Boolean = False                            'Indicate whether urine is to be applied or not
      Dim PondedUrine As IrrigationApplicationType = New IrrigationApplicationType

      'Re-set variables
      ReDim Urine_frac(dlayer.Length - 1)
      Urine_Wprofile_added = 0
      Urine_Wpond_added = 0
      Urine_Water_added = 0
      Urine_Nprofile_added = 0
      Urine_Npond_added = 0
      Urine_N_added = 0
      Urine_depth = 0

      If (Today >= StartDate And Today <= EndDate) And (Urine_N_to_add > 0) And (NumberOfDepositions < Apply_times) Then
         'Decide whether it is time to apply urine:
         If Today = StartDate Then
            If doFirstTime.ToLower = "yes" Then               
               Add_Urine = True
            End If
            TimeAfterApplication = 1
            NumberOfDepositions += 1
         Else
            If TimeAfterApplication >= Apply_interval Then
               Add_Urine = True
               TimeAfterApplication = 1
               NumberOfDepositions += 1
            Else 
               Add_Urine = False
               TimeAfterApplication += 1
            End If
         End If

         If Add_Urine = True Then
            'Apply urine according to the Dist_type chosen:
            
            Dim delta_sw_dep(dlayer.Length-1) As Double
            Dim delta_urea(dlayer.Length-1) As Double
            Dim New_sw(dlayer.Length-1) As Double
            Dim Single_NewSW(dlayer.Length-1) As Single
            Dim Cum_water_added As Double = 0 
            Dim Cum_sw_deficit As Double = 0 
            SoilDepth = 0
            
            'Compute the pore space that is available to be filled with urine water
            'it is the value between the actual water content and a fraction of SAT
            For z As Integer = 0 To dlayer.Length - 1
               sw_deficit(z) = Math.Max(0, (sat_dep(z) * p_eq_urine) - sw_dep(z))
               SoilDepth = SoilDepth + dlayer(z)
               If SoilDepth <= Depth_for_urine Then Cum_sw_deficit += sw_deficit(z)
            Next
            
            'Calculates the actual fraction for each layer
            For z As Integer = 0 To dlayer.Length - 1
               If Dist_type.ToLower = "free" Then
                  'to be coded
               Else
                  'Distribution is given in the UI
                  If sw_deficit(z) > 0 And Urine_prop(z) > 0
                     delta_sw_dep(z) = Math.Min(Urine_Water_to_add * Urine_prop(z), sw_deficit(z))
                     If Cum_water_added + delta_sw_dep(z) > Urine_Water_to_add Then
                        delta_sw_dep(z) = Urine_Water_to_add - Cum_water_added 
                        Cum_water_added = Urine_Water_to_add
                     Else
                        Cum_water_added = Cum_water_added + delta_sw_dep(z)
                     End If
                     New_sw(z) = sw(z) + (delta_sw_dep(z) / dlayer(z))
                  Else
                     delta_sw_dep(z) = 0
                     New_sw(z) = sw(z)
                  End If
                  Single_NewSW(z) = CSng(New_sw(z))
                  If Apply_WeN = "yes" Then
                     delta_urea(z) = delta_sw_dep(z) * urea_conc / 100
                  Else
                     delta_urea(z) = Urine_prop(z) * Urine_N_to_add
                  End If
                  Urine_Nprofile_added += delta_urea(z)
                  
                  Urine_frac(z) = delta_sw_dep(z) / Urine_Water_to_add
                  If Urine_frac(z) > 0 Then 
                     Urine_depth = Urine_depth + dlayer(z)
                  End If

                  If Cum_water_added < Urine_Water_to_add Then
                     Urine_Wpond_added = Urine_Water_to_add - Cum_water_added
                     PondedUrine.Amount = Urine_Wpond_added
                     PondedUrine.source = New String() {}
                     PondedUrine.time = ""
                     PondedUrine.Duration = 0
                     PondedUrine.Crop_Area = 0
                     PondedUrine.NH4 = 0
                     PondedUrine.NO3 = 0
                     PondedUrine.CL = 0
                     If Apply_WeN = "yes" Then
                        Urine_Npond_added = Urine_Wpond_added * urea_conc
                     else
                        Urine_Npond_added = 0
                     End If
                  Else
                     Urine_Wpond_added = 0
                     Urine_Npond_added = 0
                  End If
               End If
            Next
            'SoilNModule.dlt_urea = delta_urea
            Dim NitrogenChanges As NitrogenChangedType
            NitrogenChanges = New NitrogenChangedType()
            
				NitrogenChanges.Sender = "UrinePatchApply"
				NitrogenChanges.SenderType = "Manager"
            NitrogenChanges.DeltaUrea = delta_urea
            SoilNModule.NitrogenChanged(NitrogenChanges)
            
            SoilWaterModule.sw = Single_NewSW            
            'Dim WaterChanges As WaterChangedType
            'WaterChanges = New WaterChangedType()
            'WaterChanges.DeltaWater = delta_sw
            'SoilWaterModule.WaterChanged(WaterChanges)
            
            
            
            
            If Urine_Wpond_added > 0 Then
               Irrigator.Variable("irrigation_efficiency").Set(1.0)
               Irrigator.Apply(PondedUrine)
            End If
            If Urine_Npond_added > 0 Then FertModule.Apply(Urine_Npond_added, 0, "Urea_N")
            Urine_Wprofile_added = Cum_water_added
            Urine_Water_added = Urine_Wprofile_added + Urine_Wpond_added
            Urine_N_added = Urine_Nprofile_added + Urine_Npond_added
            Console.WriteLine(Today.ToString("dd MMMM yyyy") + " (Day of year=" + Today.DayOfYear.ToString + "), Urine patch deposition:")
            Console.WriteLine("     Urine patch being applied. Nitrogen load = " + Urine_N_added.ToString + "kg/ha. Water amount = " + Urine_Water_added.ToString + "mm")
         Else
            Array.Clear(Urine_frac, 0, Urine_frac.Length - 1)
            Urine_Wprofile_added = 0
            Urine_Nprofile_added = 0
         End If
      End If      
   End Sub

   Private Sub CheckModules()
   
      If Irrigator Is Nothing Then
         Throw New Exception("Centre pivot manager requires the presense of the irrigation module in the paddock")
      End If
      If FertModule Is Nothing Then
         Throw New Exception("Centre pivot manager requires the presense of the fertiliser module in the paddock")
      End If
      If MyPaddock.LinkByType("SoilWat") Is Nothing Then
         If MyPaddock.LinkByName("SWIM2ui") Is Nothing Then
            If MyPaddock.LinkByName("SWIM2ui2") Is Nothing Then
               Throw New Exception("Urine_patch manager didn't find a valid soil water module in the paddock")
            Else
               SoilWaterModule = MyPaddock.LinkByName("SWIM2ui2")
            End If
         Else
            SoilWaterModule = MyPaddock.LinkByName("SWIM2ui")
         End If
      Else
         SoilWaterModule = MyPaddock.LinkByType("SoilWat")
      End If
      
      If MyPaddock.LinkByType("SoilN") Is Nothing Then
         If MyPaddock.LinkByName("SoilNui") Is Nothing Then
            Throw New Exception("Urine_Patch manager didn't find a valid SoilN module in the paddock")
         Else
            SoilNModule = MyPaddock.LinkByName("SoilNui")
         End If
      Else
         SoilNModule = MyPaddock.LinkByType("SoilN")
      End If
      
   End Sub

End Class
```
        manager2 nh3_volatilisation
          # NH3 volatilisation parameters
          Depth_for_NH3 = 50  # Depth to which NH3 volatilisation is considered (mm)
          # Base soil and pH change parameters
          Soil_pH_base = 6.0     6.0     6.0     6.0     6.0     6.0     6.0     6.0     6.0     6.0     6.0     6.0     6.0     6.0     6.0     6.0     6.0     6.0     6.0     6.0     6.0  # The base soil pH for each soil layer
          Soil_CEC_strng = 16.80   16.80   16.80   16.80   14.91   13.13   13.13   13.13   8.83   4.53    4.53    4.53    4.53    4.50    4.37    4.37    3.93    3.53    3.53    3.29    2.90  # The CEC for each soil layer (meq/100g)
          k_BC = 0.03  # Soil buffer capacity factor
          k_pH_hyd = 1  # Factor to convert dlt_urea_hydrol into pH changes
          k_pH_nit = 1  # Factor to convert dlt_nh4_nitrif into pH changes
          k_pH_x = 0.2  # Minimum pH fraction decaying per day (0-1)
          # Gas exchange parameters
          k_AFPV = 75  # Factor for soil/atmosphere gas exchange (AFPV/mm)
          f_NV_strng = 1.0  0.9  0.8  0.5  0.2  0.1  0.0  0.0  # Fractor for volatilisable NH3, per soil layer (0-1)
          # Additional limits for volatilisation
          f_AV = 0.5  # Fraction of total soil NH4 that can be volatilised per day
          CritRain1 = 3  # Rain+irrigation below which volatilisation is not limited (mm)
          CritRain2 = 10  # Rain+irrigation above which no volatilisation occur (mm)
```vb
Imports System
Imports ModelFramework

'This module estimate the amount of NH3 in the soil and its volatilisation

'-->  Last uptaded in: 12/Jul/2011 ..................


Public Class Script
   
   'Parameter variables:
   <param> Private Depth_for_NH3 As Single            'The depth to which volatilisation is considered (mm)
   <param> Private Soil_pH_base As String             'The base soil pH, apsim will try to keep to this value, same for all layers
   <param> Private Soil_CEC_strng As String           'The CEC for each layer (meq/100g)
   <param> Private k_BC As Single                     'Soil buffer capacity factor ()
   <param> Private k_pH_hyd As Single                 'Factor to convert urea hydrolysed into H+ changes ()
   <param> Private k_pH_nit As Single                 'Factor to convert NH4 nitrified into H+ changes ()
   <param> Private k_pH_x As Single                   'Minimum decrease for pH (fraction/day)
   <param> Private k_AFPV As Single                   'Factor to transform potential evaporation in air filled pore volumes that are potential exchanged with to atmosphere
   <param> Private f_NV_strng As String               'The fraction of potential NH3 volatilisation for each layer that is transpoted to the soil surface ()
   <param> Private f_AV As Single                     'Fraction of total soil NH4 that can be volatilised per day, limits volatilisation and ensure mass balance ()
   <param> Private CritRain1 As Single                'Critial rainfall. Below this volatilisation is not limited by rainfall or irrigation
   <param> Private CritRain2 As Single                'Critial rainfall. Above this no volatilisation occurs
    
   'Events to be raised:
   <[Event]()> Public Event NitrogenChanged As NitrogenChangedDelegate

   'Variables read from other modules
   <Input> Private rain As Single                     'Rainfall (mm)
   <Input> Private eo As Single                       'Potential evapotranspiration (mm)
   <Input> Private irrigation As Single               'Irrigation amount today (mm)
   <Input> Private dlayer As Single()                 'Soil layers thickness
   <Input> Private bd As Single()                     'Soil bulk density (g/cm3 = kg/L)
   <Input> Private sw As Single()                     'Soil water content (cm3/cm3)
   <Input> Private sat As Single()                    'Soil water content at saturarion, porosity (cm3/cm3)
   <Input(IsOptional:=True)> Private ave_soil_temp As Single()    'Soil temperature from SoilTemp - for each layer (oC)
   <Input(IsOptional:=True)> Private st As Single()               'Soil temperature from SoilN - for each layer (oC)
   <Input> Private nh4 As Single()                    'Amount of NH4 in the soil (kg/ha)
   <Input> Private nh4ppm As Single()                 'Amount of NH4 in the soil (ppm)
   <Input> Private conc_water_nh4 As Single()         'Amount of NH4 not adsorbed (ppm)
   <Input> Private dlt_rntrf As Single()              'Amount of N nitrified (kg/ha)   
   <Input> Private dlt_urea_hydrol As Single()        'Amount of urea N hydrolised (kg/ha)
   
   'Output variables
   <Output><Units("ppm")> Public nh3ppm As Single()               'The estimated amount of NH3 in the soil (ppm)
   <Output><Units("kgN/ha")> Public nh3 As Single()               'The estimated amount of NH3 in the soil (kg/ha)
   <Output><Units("g/ha")> Public nh3_gas As Single()             'The estimated amount of NH3 in the soil in gaseous form (g/ha)
   <Output><Units("kgN/ha")> Public emission_nh3 As Single()      'The estimated amount of NH3 volatilised (kg/ha/day)
   <Output><Units("")> Public SoilpH  As Single()                 'dummy soil pH
   <Output><Units("kgN/ha")> Public nh4_sol As Single()           'The amount of NH4 in the soil solution (kg/ha)   
   <Output><Units("oC")> Public SoilTemp As Single()              'The soil temperature (oC)

   <Output><Units("AFPV/day")> Public PotGasExchangeNH As Single  'The potential soil-atmosphere gas exchange (Air-filled-pore-spaces/day)
   <Output><Units("L/m2/day")> Public GasExchangeNH As Single()   'The volume of gas exchanged (L/m2/day)
   <Output><Units("L/m2")> Public AirFilledPoreVolume As Single() 'The volume of air filled pore space in each soil layer (L_air/m2)
   <Output><Units("")> Public NH3toNHx_ratio As Single()          'The ratio between NH3 and NHx in the soil solution
   <Output><Units("x1000")> Public NH3GtoNH3A_ratio As Single()   'The ratio between NH3 liquide and gas in the soil, times 1000
   <Output><Units("")> Public pK_NHx As Single()                  'The equilibrium constant for NH4-NH3
   <Output><Units("")> Public pG_NH3 As Single()                  'The equilibrium constant for NH3A-NH3G

   'Internal variables
   Private NH3_z As Integer                           'The layer to consider NH3 volatilization
   Private f_NV As Single()                           'The fraction of NH3 transport from each layer
   Private Ini_SoilpH As Single()                     'The initial, or base, soil pH
   Private SoilCEC As Single()                        'The CEC (mol/kg)
   
   <EventHandler()> Public Sub OnInit2()

      ReDim SoilpH(dlayer.length - 1)
      ReDim Ini_SoilpH(dlayer.length - 1)

      'Split the read values of f_NV into an array
      f_NV = makeArray(f_NV_strng)
      'Split the read values of pH into an array
      Ini_SoilpH = makeArray(Soil_pH_base)
      'Split the read values of CEC into an array
      SoilCEC = makeArray(Soil_CEC_strng)
      ReDim Preserve Ini_SoilpH(dlayer.length - 1)
      ReDim Preserve SoilCEC(dlayer.length - 1)
      'Assign initial pH values and convert CEC from meq to mol
      For z As Integer = 0 To dlayer.length - 1
         Ini_SoilpH(z) = math.Max(0, Ini_SoilpH(z))
         SoilpH(z) = Ini_SoilpH(z)
         SoilCEC(z) = 0.01 * math.Max(0.1, SoilCEC(z))     'mol/kg
      Next

      'Identify the layer down to which volatilization is considered
      Dim Depth_from_surface As Single = 0
      For z As Integer = 0 To dlayer.length - 1
         Depth_from_surface = Depth_from_surface + dlayer(z)
         If Depth_from_surface <= Depth_for_NH3 Then
            NH3_z = z
         Else
            z = dlayer.length
         End If
      Next

      'verify the bounds of the pH converting factor
      k_pH_hyd = math.Min(1, math.Max(0, k_pH_hyd))
      k_pH_nit = math.Min(1, math.Max(0, k_pH_nit))
      k_pH_x = math.Min(1, math.Max(0, k_pH_x))
      k_BC = math.Max(0, k_BC)
      ReDim Preserve f_NV(dlayer.length - 1)
      For z As Integer = 0 To dlayer.length - 1
         f_NV(z) = math.Min(1, math.Max(0, f_NV(z)))
      Next

      '----------- NH3 volatilization ---------------------------------------------------
      Console.WriteLine("")
      Console.WriteLine("Volatilization will be calculated by manager")
      Console.WriteLine("   Top " & Depth_for_NH3.ToString & "mm are considered,")
      Console.WriteLine("   pH variation is mimicked by dlt_urea_hydrol + dlt_nh4_nitrif")
      Console.WriteLine("")

   End Sub

   
   <EventHandler()> Public Sub OnPrepare()
            
      Dim urea_hydrol As Single                    'The amount of urea hydrolised (mol/L)
      Dim nh4_nitrif As Single                     'The amount of NH4 nitrified (mol/L)
      Dim dlt_H As Single                          'Estimated variation of H+ in the soil (mol/L)
      Dim delta_pH_Hyd As Single = 0               'Variation in soil pH due to urea hydrolysis
      Dim delta_pH_Nit As Single = 0               'Variation in soil pH due to NH4 nitrification
      Dim delta_pH_X As Single = 0                 'Minimum decrease in soil pH, to ensure pH returns to base after urea deposition
      Dim delta_pH_Vol As Single = 0               'Variatin in pH due to volatilisation
      Dim Beta As Single = 1                       'The soil buffer capacity ()
      Dim delta_nh4(dlayer.length - 1) As Double   'The variation in NH4 content due to volatilisation (kg/ha)
      Dim RainFactor As Single = 1.0               'The rain factor

      Try  'to get the soil temperature from SoilTemp, otherwise use SoilN's:
         SoilTemp = ave_soil_temp
      Catch
         SoilTemp = st
      End Try
      
      ReDim nh3ppm(dlayer.length - 1)
      ReDim nh4_sol(dlayer.length - 1)
      ReDim nh3(dlayer.length - 1)
      ReDim nh3_gas(dlayer.length - 1)
      ReDim emission_nh3(dlayer.length - 1)
      ReDim GasExchangeNH(dlayer.length - 1)
      ReDim AirFilledPoreVolume(dlayer.length - 1)
      ReDim NH3toNHx_ratio(dlayer.length - 1)
      ReDim NH3GtoNH3A_ratio(dlayer.length - 1)
      ReDim pK_NHx(dlayer.length - 1)
      ReDim pG_NH3(dlayer.length - 1)

      'Calc the irrigation factor
      If Rain + Irrigation < CritRain1 Then
         RainFactor = 1.0
      ElseIf Rain + Irrigation > CritRain2 Then
         RainFactor = 0.0
      Else
         RainFactor = (Rain + Irrigation - CritRain1) / (CritRain2 - CritRain1) 
      End If
      
      '+++++++++++++++++++++++++++++++++++++++++++++++++++++++++++++++++++++++++++++++++++++++++++++++++++++++++++++++++++++++++++
      '  NOTES:
      '     The RainFactor accounts for the downwards transport of NH3 gas when water from rain or irrigation is being drained throught the soil.
      '        Below RainCrit1, precipitation has no effect, above RainCrit2 volatilisation is zero.  A linear relationship is used between
      '        these two limits:
      '
      '                              |
      '                         F   1+                /-----------
      '                       R a    |               /:
      '                       a c    |              / :
      '                       i t    |             /  :
      '                       n o    |            /   :
      '                         r    |           /    :
      '                              |          /     :
      '                              |         /      :
      '                             0+========+-------+--------------> Rain + Irrigation
      '                              |      Rain    Rain
      '                                     Crit1   Crit2
      '+++++++++++++++++++++++++++++++++++++++++++++++++++++++++++++++++++++++++++++++++++++++++++++++++++++++++++++++++++++++++++


      For z As Integer = 0 To dlayer.length - 1
         
         '0-Compute the value of Beta
         Beta = k_BC * bd(z) * SoilCEC(z) / sw(z)

         '1-Compute the consumption of H+ by urea hydrolysis
         urea_hydrol = dlt_urea_hydrol(z) / (dlayer(z) * 10000)   'kg_urea_N/L_soil
         urea_hydrol = urea_hydrol * 1000 / sw(z)                 'g_urea_N/L_water
         urea_hydrol = urea_hydrol / 14.00674                     'mol_urea_N/L_water  - All N pools as expresseed in kg_N, so molecular mass is 14
         dlt_H = -2 * urea_hydrol * k_pH_hyd                      'mol/L

         '2-Compute changes in soil pH due to urea hydrolysis
         If dlt_H < 0 Then
            delta_pH_Hyd = (14 / (1 + ((14 - soilpH(z)) / SoilpH(z)) * 10 ^ (dlt_H / Beta))) - SoilpH(z)
         Else
            delta_pH_Hyd = 0
         End If
         SoilpH(z) = SoilpH(z) + delta_pH_Hyd

         '3-Compute the production of H+ by nitrification and its effect on soil pH
         nh4_nitrif = dlt_rntrf(z) / (dlayer(z) * 10000)          'kg_nh4_N/L_soil
         nh4_nitrif = nh4_nitrif * 1000 / sw(z)                   'g_nh4_N/L_water
         nh4_nitrif = nh4_nitrif / 14.0067                        'mol_nh4_N/L_water  - All N pools as expresseed in kg_N, so molecular mass is 14
         dlt_H = 2 * nh4_nitrif * k_pH_nit                        'mol/L
         If dlt_H > 0 Then
            delta_pH_Nit = (14 / (1 + ((14 - soilpH(z)) / SoilpH(z)) * 10 ^ (dlt_H / Beta))) - SoilpH(z)
         Else
            delta_pH_Nit = 0
         End If
         
         '4-Compute soil forced pH change - this is to ensure pH will decline to its base value
         If SoilpH(z) > Ini_SoilpH(z) Then
            delta_pH_x = -(SoilpH(z) - Ini_SoilpH(z)) * k_pH_x
         Else
            delta_pH_x = 0
         End If
         SoilpH(z) = SoilpH(z) + math.Min(delta_pH_Nit, delta_pH_X)

         '5-bound pH between base and 14
         SoilpH(z) = math.Min(14, math.Max(Ini_SoilpH(z), SoilpH(z)))

         
         '+++++++++++++++++++++++++++++++++++++++++++++++++++++++++++++++++++++++++++++++++++++++++++++++++++++++++++++++++++++++++++
         '  NOTES:
         '     The changes in pH are due to the consumption of H+ as urea is hydrolysed or the production of H+ by nitrification,
         '        in theory for each mol of N hydrolised two mols of H+ are consumed, while two mols are produced by nitrification;
         '     The k_pH_nit ad k_pH_hyd factors allow to control the extent that H+ is affected by hydrolysis and nitrification,
         '        when set to zero there's no effect, while setting it to one causes full theoretical effect
         '     The parameter Beta describes the soil buffer capacity, which is a function of CEC, k_BC is used for adjusting the relationship.
         '     k_pH_x stablish a minimum rate for pH decay, it mimicks soil buffering and other reactions that bring pH down
         '        after urea/urine deposition. Used when nitrification is not enough to bring the pH down.
         '+++++++++++++++++++++++++++++++++++++++++++++++++++++++++++++++++++++++++++++++++++++++++++++++++++++++++++++++++++++++++++


         '6-compute the NH3 equilibrium factors
         pK_NHx(z) = pK("aq", soilTemp(z) + 273.15)      'Aqueous equilibrium [NH4 <--> NH3]
         pG_NH3(z) = pK("gs", soilTemp(z) + 273.15)      'Gaseous equilibrium [NH3_liquid <--> NH3_gas]
         
         '7-Calc the proportion of total NHx that is in the form of NH3
         Dim NH3toNHx As Single = 1 / (1 + 10 ^ (pK_NHx(z) - SoilpH(z)))
         NH3toNHx_ratio(z) = NH3toNHx
         
         '8-Calc the amount of NH3 in aqueous solution (original equation uses mol/L, thus the ratio of molecular mass is needed)
         nh3ppm(z) = conc_water_nh4(z) * NH3toNHx * (17.03 / 18.04 )      'ppm (ug/cm3_water)
         
         '9-Calc the proportion of total NH3 that is in the gaseous form
         Dim NH3GtoNH3A As Single = 1 / (1 + 10 ^ (pG_NH3(z)))
         NH3GtoNH3A_ratio(z) = NH3GtoNH3A * 1000
         
         '10-Calc the amount of NH3 in gaseous form
         nh3_gas(z) = nh3ppm(z) * NH3GtoNH3A                   'ppm (ug/cm3_air in soil = mg/L)

         '11-Calc the amount of NH3 in gaseous form and the amount effectivelly lost by volatilization
         PotGasExchangeNH = eo * k_AFPV   'air filled pore volumes/day
         AirFilledPoreVolume(z) = (sat(z) - sw(z)) * dlayer(z)    'L_air/m2
         If z <= NH3_z Then
            GasExchangeNH(z) = PotGasExchangeNH * AirFilledPoreVolume(z)      'L_air/m2/day
            GasExchangeNH(z) = GasExchangeNH(z) * RainFactor
            If GasExchangeNH(z) > 0 Then
               emission_nh3(z) = nh3_gas(z) * GasExchangeNH(z) * f_NV(z)      'mg/m2
               emission_nh3(z) = emission_nh3(z) * 10E+4                      'mg/ha
               emission_nh3(z) = emission_nh3(z) * 10E-6                      'kg/ha
            Else
               emission_nh3(z) = 0
            End If
            'Limit volatilisation to a fraction of NH4 for each layer
            emission_nh3(z) = Math.Min(emission_nh3(z), f_AV * nh4(z))
         Else
            GasExchangeNH(z) = 0
            emission_nh3(z) = 0
         End If
         
         
         '+++++++++++++++++++++++++++++++++++++++++++++++++++++++++++++++++++++++++++++++++++++++++++++++++++++++++++++++++++++++++++
         '  NOTES:
         '     To estimate the amount of NH3 volatilised during the day, it is assumed that the amount of NH3 in gaseous form in the
         '        beginning of the day represents well the proportion of NHx 'volatilisable'. It is assumed also that the potential evaporation
         '        is a good estimator for the gas exchange between soil and atmosphere (this makes volatilisation sensible to temperature and
         '        wind).  By scaling the gas exchange to the air filled pore space in the soil, we get volatilisation also sensible to water
         '        content, which mimicks the decrease in gas transport when the soil is wet.  Finally a factor (f_NV) is used to limit the
         '        contribution of each soil layer to the overall volatilisation (deep layers would volatilise less because NH3 needs to move
         '        transport to the surface.
         '+++++++++++++++++++++++++++++++++++++++++++++++++++++++++++++++++++++++++++++++++++++++++++++++++++++++++++++++++++++++++++

         
         '12-Compute soil pH change due to volatilisation
         Dim emission_nh3ised As Single = emission_nh3(z) / (dlayer(z) * 10000)  'kg_nh3_N/L_soil
         emission_nh3ised = emission_nh3ised * 1000 / sw(z)                      'g_nh3_N/L_water
         emission_nh3ised = emission_nh3ised / 14.0067                           'mol_nh3_N/L_water  - All N pools as expresseed in kg_N, so molecular mass is 14
         dlt_H = emission_nh3ised                                                'mol/L
         If dlt_H > 0 Then
            delta_pH_vol = (14 / (1 + ((14 - soilpH(z)) / SoilpH(z)) * 10 ^ (dlt_H / Beta))) - SoilpH(z)
         Else
            delta_pH_vol = 0
         End If

         '13- Calc new pH and bound it between base and 14
         SoilpH(z) = SoilpH(z) + delta_pH_vol
         SoilpH(z) = math.Min(14, math.Max(Ini_SoilpH(z), SoilpH(z)))

         '14-Transform variables to publishable units
         nh3(z) = nh3ppm(z) * sw(z) / 1000                     'mg/cm3_soil = g/L_soil
         nh3(z) = nh3(z) * dlayer(z) * 10000                   'g/ha_soil
         nh3(z) = nh3(z) / 1000                                'kg/ha

         nh3_gas(z) = nh3_gas(z) * (sat(z) - sw(z)) / 1000     'mg/cm3_soil = g/L_soil
         nh3_gas(z) = nh3_gas(z) * dlayer(z) * 10000           'g/ha_soil

         nh4_sol(z) = conc_water_nh4(z) * sw(z) / 1000         'mg/cm3_soil = g/L_soil
         nh4_sol(z) = nh4_sol(z) * dlayer(z) * 10000           'g/ha_soil
         nh4_sol(z) = nh4_sol(z) / 1000                        'kg/ha

         'Compute the delta in nh4 amount
         delta_nh4(z) = -emission_nh3(z)
      Next
      
      'send the delta nh4 to soil
      Dim NitrogenChanges As NitrogenChangedType = New NitrogenChangedType
		NitrogenChanges.Sender = "nh3_volatilisation"
		NitrogenChanges.SenderType = "Manager"
      NitrogenChanges.DeltaNH4 = delta_nh4
      NitrogenChanges.DeltaNO3 = New Double() {}
      RaiseEvent NitrogenChanged(NitrogenChanges)

   End Sub
      

   Function makeArray(ByVal ArrayString As String) As Single()
      
      'Get the string with values from the user interface and put the values in an numeric array
      
      Dim MyArray_string As String()
      Dim MyArray_single As Single()
      Dim Separator As Char() = " "
      
      '1-Split string into array
      MyArray_string = ArrayString.Split(Separator, StringSplitOptions.RemoveEmptyEntries)
      
      '2-convert array into type single
      ReDim MyArray_single(MyArray_string.Length - 1)      
      For i As Integer = 0 To MyArray_single.length - 1
         MyArray_single(i) = MyArray_string(i)
      Next
      Return MyArray_single
      
   End Function

   
   Function pK(ByVal N_species As String, ByVal Temp As Single) As Single
      
      'Calculates the equilibrium constants, 
      '  if 'aq' then nh4-nh3 equilibrium in water
      '  if 'gs' then gas-liquid equilibrium for nh3
      
      Dim a_pK As Single() = {0.09018, -1.69}
      Dim b_pK As Single() = {2729.92, 1477.7}
      Dim sp As Integer
      
      If n_species = "aq" Then
         sp = 0
      ElseIf n_species = "gs"
         sp = 1
      End If
      pK = a_pK(sp) + b_pK(sp) / Temp
         
   End Function
   
End Class
```
        manager2 ApplyInhibitor
          # Apply a given solute to the soil
          ApplySolute_name = nitrificationinhibitor  # Name of the solute to apply
          # When and how often to apply
          ApplySolute_start_date = 15/05/2009  # Date to start applications (dd/mm/yyyy)
          ApplySolute_end_date = 31/12/2100  # Date to end applications (dd/mm/yyyy)
          ApplySolute_interval = 5000  # Interval between applications (days)
          ApplySolute_times = 0  # Number of times to apply
          # Amount and depth for applications
          ApplySolute_amount2add = 10  # Amount of solute to apply (kg/ha)
          ApplySolute_depth2add = 1  # Depth for application (mm)
```vb
Imports System
Imports ModelFramework

' This manager applies a given amount of solute to the soil. It will add from the surface till the depth specified (decreasing linearly)
'  The manager can also repeat the application periodically within a given window

'-->  Last uptaded in: 17/Sep/2013 ..................


Public Class Script 
   
   'Parameter variables:
   <param> Private ApplySolute_name As String
   <param> Private ApplySolute_start_date As String
   <param> Private ApplySolute_end_date As String
   <param> Private ApplySolute_interval As Integer
   <param> Private ApplySolute_times As Integer
   <param> Private ApplySolute_amount2add As Double
   <param> Private ApplySolute_depth2add As Double
   
   'Events to raise
   <[Event]()> Public Event SoluteChanged As SoluteChangedDelegate

   'Variables read from other modules
   <Input> Private today As DateTime            'Today's date
   <Input> Private dlayer As Double()           'Soil layers structure

   'Output variables
   <Output><Units("kg/ha")> Public SoluteAdded As Double       'The amount of solute added

   'Internal variables
   Private StartDate As DateTime                'The date when applications start (in date format)
   Private EndDate As DateTime                  'The date when applications finish (in date format)
   Private TimeAfterApplication As Integer      'Number of days after an application
   Private SoilDepth As Double                  'The soil depth (mm)
   Private LayerFraction() As Double        'The fraction of solute applied in each layer
   Private NumberOfApplications As Integer      'Number of applications

   <EventHandler()> Public Sub OnInitialised()

      'Put the dates into date format:
      StartDate = DateTime.Parse(ApplySolute_start_date & " 06:00:00 am")
      EndDate = DateTime.Parse(ApplySolute_end_date & " 06:00:00 pm")
      NumberOfApplications = 0
      TimeAfterApplication = 1
      
      'Computes the fraction of solute to be applied in each layer
      Console.WriteLine(" Applying solute, " & ApplySolute_amount2add.ToString("#0.0#") & " kg/ha, in following layers")
      ReDim LayerFraction(dlayer.length - 1)
      Dim Depth_from_surface As Double = 0
      Dim surf_L As Double = 2 / ApplySolute_depth2add
      Dim upper_L As Double = surf_L
      Dim lower_L As Double = 0
      Dim thisLayer As Double = 0
      For Layer As Integer = 0 To dlayer.length - 1
         Depth_from_surface += dlayer(Layer)
         If Depth_from_surface >= ApplySolute_depth2add Then
            ' last layer
            lower_L = 0
            thisLayer = dlayer(Layer) - (Depth_from_surface - ApplySolute_depth2add)
         Else
            ' intermediate layer
            lower_L = surf_L * (ApplySolute_depth2add - Depth_from_surface) / ApplySolute_depth2add
            thisLayer = dlayer(Layer)
         End If
         LayerFraction(Layer) = (upper_L + lower_L) * thisLayer / 2
         upper_L = lower_L
         Console.WriteLine(" Fraction in layer (" & Layer.ToString() & "): " & LayerFraction(Layer).ToString())
         If Depth_from_surface >= ApplySolute_depth2add Then Layer = dlayer.length               
      Next
      

   End Sub

   <EventHandler()> Public Sub OnPrepare()

      'Re-set variables
      SoluteAdded = 0
      Dim delta_solute(dlayer.Length - 1) As Double

      'Decide whether it is time to start applications:
      If (today.Date >= StartDate.Date) And (today.Date <= EndDate.Date) And (NumberOfApplications < ApplySolute_times) Then
         If (today - StartDate).TotalDays < 0.5 Then
            ' always apply on the starting date, or beginning of simulation
            For Layer As Integer = 0 To dlayer.length - 1
               delta_solute(Layer) = ApplySolute_amount2add * LayerFraction(Layer)
               SoluteAdded += delta_solute(Layer)
               If LayerFraction(Layer) <= 1E-12 Then Layer = dlayer.length
            Next
            TimeAfterApplication = 1
            NumberOfApplications += 1
         Else
            ' apply at given intervals
            If TimeAfterApplication >= ApplySolute_interval Then
               For Layer As Integer = 0 To dlayer.length - 1
                  delta_solute(Layer) = ApplySolute_amount2add * LayerFraction(Layer)
                  SoluteAdded += delta_solute(Layer)
                  If LayerFraction(Layer) <= 1E-12 Then Layer = dlayer.length               
               Next
               TimeAfterApplication = 1
               NumberOfApplications += 1
            Else
               TimeAfterApplication = TimeAfterApplication + 1
               SoluteAdded = 0
            End If
         End If

         'Make the application
         If TimeAfterApplication = 1 Then
            Dim SoluteChanges As SoluteChangedType = New SoluteChangedType()
            SoluteChanges.Sender = "Manager: ApplySolute"
            SoluteChanges.SoluteName = ApplySolute_name
            SoluteChanges.SoluteUnits = "kg/ha"
            SoluteChanges.DeltaSolute = delta_solute
            RaiseEvent SoluteChanged(SoluteChanges)

            Console.WriteLine(today.ToString("dd MMMM yyyy") + " (Day of year=" + today.DayOfYear.ToString + "), ApplySolute:")
            Console.WriteLine("     " & ApplySolute_name & " being applied at " + SoluteAdded.ToString("0.00") + "kg/ha, added down to depth " + ApplySolute_depth2add.ToString("0") + "mm")
         End If
      End If            
      
   End Sub

End Class
```
        operations Operations_Taupo
          15-Feb-2009  fertiliser apply amount = 15, depth = 2 (mm), type = urea_n
          15-Feb-2009  fertiliser apply amount = 10, depth = 10 (mm), type = urea_n
          20-May-2009  fertiliser apply amount = 15, depth = 2 (mm), type = urea_n
          20-May-2009  fertiliser apply amount = 10, depth = 10 (mm), type = urea_n
          20-May-2009  fertiliser apply amount = 5, depth = 15 (mm), type = urea_n
          27-May-2009  irrigation apply amount = 2
      micromet
        soilalbedo = 0.23
        a_interception = 0
        b_interception = 0
        c_interception = 0
        d_interception = 0
      irrigation
        automatic_irrigation = off
        asw_depth = 600  # Depth to which ASW is calculated. (mm)
        crit_fr_asw = 0.5  # Fraction of ASW below which irrigation is applied (0-1.0)
        irrigation_efficiency = 0.80  # Efficiency of the irrigation. (0-1.0)
        irrigation_allocation = off  # Allocation limits
        allocation = 0  # Allocation in ML
        default_no3_conc = 0  # Nitrate concentration (ppm N)
        default_nh4_conc = 0  # Ammonium concentration (ppm N)
        default_cl_conc = 0  # Chloride concentration (ppm Cl)
        default_no3_conc = 0  # Nitrate concentration (ppm N)
        default_nh4_conc = 0  # Ammonium concentration (ppm N)
        default_cl_conc = 0  # Chloride concentration (ppm Cl)
      fertiliser
      NitrificationInhibitor2 NitrificationInhibitor
        # Initial solute content in the soil
        InitialContent = 0  0  0  0  0  0  0  0  0  0  0  0  0  0  0  0  0  0  0  0  0  0  0  0  0  0  0  0  0  0  0  # Amount of NitrificationInhibitor for each layer (kg/ha)
        # NitrificationInhibitor effect function - Michaelis-Menten function
        sif_kMichaelisMenten = 1.553  # The Michaelis-Menten factor - NitrificationInhibitor concentration for half inhibition effect (ppm)
        # NitrificationInhibitor degradation functions
        PotentialDegradationRate = 11.0  # Degradation rate for NitrificationInhibitor at optimum conditions (%/day)
        stf_TemperatureAtOptimum = 28  # The value of temperature at optimum conditions (oC)
        stf_FactorValueAtZeroDegrees = 0.035  # The value for temperature effect at zero degrees (0-1)
        stf_ExponentValue = 159  # The exponent value for the temperature effect function (approx. 1-5)
        swf_xValues = 0.0  0.8  1.0  1.4  2.0  3.0  # The values for the x-axis of the moisture effect - modified water content (0-3)
        swf_yValues = 0.0  0.0  0.1  1.0  1.0  0.5  # The values for the y-axis for the moisture effect - relative effect (0-1)
        phf_xValues = 0.0  3.5  5.0  8.0  9.5  14.0  # The values for the x-axis of the pH effect - soil pH
        phf_yValues = 0.0  0.0  1.0  1.0  0.0   0.0  # The values for the y-axis for the pH effect - relative effect (0-1)
        scf_kMichaelisMenten = 0.11  # The Michaelis-Menten factor for carbon effect - Soil carbon content for half effect (%)
      surfaceom SurfaceOrganicMatter
        PoolName = grass  # Organic Matter pool name
        type = grass  # Organic Matter type
        mass = 200  # Initial surface residue (kg/ha)
        cnr = 20  # C:N ratio of initial residue
        standing_fraction = 0  # Fraction of residue standing
      SWIM2ui2
        # SWIM boundary conditions
        top_boundary_condition = 0  # Choose top boundary condition (0=inf conduct; 1=const potential; 2=limtd conduct)
        runoff = 1  # Choose runnof/pond condition (0=all runoff; 1=all pond; 2=calc runoff)
        bottom_boundary_condition = 0  # Choose bottom boundary condition (0=set pot grad; 1=set potential; 2=impermeable;3=seepage)
        run_solutes = urea  nh4  no3  nitrificationinhibitor  # Type list of solutes SWIM will move
        max_water_increment = 0.3  # Type base water increment value
        # Description of soil profile
        x = 0       10      20      30      50      70      90      110     140     160     190     210     250     270     330     370     430     470     530     550     600  # Enter the values of x for each layer
        soil_type = H1_TaupoD  H1_TaupoD  H1_TaupoD  H1_TaupoD  -         H2_TaupoD  H2_TaupoD  H2_TaupoD  -         H3_TaupoD  H3_TaupoD  H3_TaupoD  H3_TaupoD  -         H4_TaupoD  H4_TaupoD  -         H5_TaupoD  H5_TaupoD  -         H6_TaupoD  # Enter the tags for each layer
        psi = -100.0  -100.0  -100.0  -100.0  -100.0  -100.0  -100.0  -100.0  -100.0  -100.0  -100.0  -100.0  -100.0  -100.0  -100.0  -100.0  -100.0  -100.0  -100.0  -100.0  -100.0  # Enter the inital values of psi for each layer
        ini Ini_SWIM2
          filename=%apsim%\Tests\Solute2\NitrificationInhibitor\Validation\Ini_SWIM2ui2(NITests).xml
      SoilNitrogen
        # Parameters to initialise soil organic matter
        root_wt = 1800  # Type the initial FOM amount in the soil (kgDM/ha)
        root_cn = 30  # Type the initial C:N ratio of FOM
        soil_cn = 12.5  # Type the C:N ratio of soil humus
        mcn = 8  # Type the C:N ratio of soil microbial biomass
        # Enter the values for each layer
        ph = 6.0     6.0     6.0     6.0     6.0     6.0     6.0     6.0     6.0     6.0     6.0     6.0     6.0     6.0     6.0     6.0     6.0     6.0     6.0     6.0     6.0  # Type the inital soil pH
        oc = 6.365   6.327   6.289   6.232   6.163   6.094   5.271   4.309   3.538   2.924   2.423   1.944   1.566   1.189   0.865   0.652   0.514   0.426   0.368   0.331   0.303  # Type the initial soil organic carbon content (%)
        fbiom = 0.080   0.080   0.080   0.080   0.079   0.078   0.075   0.069   0.061   0.050   0.040   0.029   0.021   0.013   0.008   0.008   0.008   0.008   0.008   0.008   0.008  # Type the microbial biomass fraction of OC (0-1)
        finert = 0.526   0.533   0.540   0.546   0.559   0.583   0.613   0.641   0.672   0.698   0.725   0.749   0.778   0.803   0.839   0.865   0.892   0.910   0.927   0.937   0.949  # Type the inert fraction of soil humus (0-1)
        no3ppm = 4.50    6.00    7.20    7.50    7.50    7.50    7.50    7.50    7.50    7.30    6.80    6.30    5.90    5.30    4.50    3.70    3.00    2.40    2.20    2.00    1.70  # Type the initial concentration of NO3 is the soil (ppm)
        nh4ppm = 1.50    2.00    2.40    2.50    2.50    2.50    2.50    2.50    2.50    2.43    2.27    2.10    1.97    1.77    1.50    1.23    1.00    0.80    0.73    0.67    0.57  # Type the initial concentration of NH4 is the soil (ppm)
        ureappm = 0.00    0.00    0.00    0.00    0.00    0.00    0.00    0.00    0.00    0.00    0.00    0.00    0.00    0.00    0.00    0.00    0.00    0.00    0.00    0.00    0.00  # Type the initial concentration of urea is the soil (ppm)
        # Parameters to compute Nitrification
        Nitrification_pot = 85  # Maximum potential Nitrification rate (mg NH4/kg soil/day)
        nh4_at_half_pot = 90  # NH4 concentration at half of Nitrification rate (ppm)
      SoilTemperature2
        MaxTTimeDefault = 14
        BoundaryLayerConductanceSource = calc
        BoundaryLayerConductance = 20
        BoundaryLayerConductanceIterations = 1
        NetRadiationSource = calc
        DefaultWindSpeed = 3
        DefaultAltitude = 18
        DefaultInstrumentHeight = 1.2
        BareSoilHeight = 57
        Clay = 15.0    15.0    15.0    15.0    12.5    10.0    10.0    10.0    9.0     8.0     8.0     8.0     8.0     5.5     3.0     3.0     3.0     3.0     3.0     3.0     3.0
      AgPasture
        Nspecies = 2  # Number of species
        thisCropName = AgPasture  # Crop name shown as on the simulation tree
        cropName = ryegrass whiteclover paspalum  # Species names
        micrometType = grass     grass    grass  # Crop type for MicroMet
        isAnnual = 0           0          0  # Annual species? no=0, yes=1
        isLegume = 0           1          0  # Legume species? no=0, yes=1
        photoPath = 3           3          4  # C3 or C4 species? C3=3, C4=4
        rootDepth = 600       300      1000
        growthTmin = 2           3          10  # Minimum temperature for growth
        growthTmax = 32        32         40  # Maximum temperature for growth
        growthTopt = 20        20         22  # Optimum temperature for growth
        growthTq = 1.75     1.75        2.0  # Curvature of growth response to temperature
        massFluxTmin = 2           3          7.5  # Minimum temperature for mass flux
        massFluxTopt = 20        20         22  # Optimum temperature for mass flux
        massFluxW0 = 2          2           2  # Scale factor for response of mass flux to soil moisture
        massFluxWopt = 0.5       0.5        0.5  # Optimum soil moisture for mass flux
        heatOnsetT = 32.5     32.5      40  # Heat effects- Onset temperature
        heatFullT = 100      100      100  # Heat effects- Full temperature
        heatSumT = 30        30         50  # Heat effects- Temperature sum for recovery
        coldOnsetT = 0          0           8  # Cold effects- Onset temperature
        coldFullT = -3          -3         3  # Cold effects- Full temperature
        coldSumT = 20         20        50  # Cold effects- Temperature sum for recovery
        Pm = 1.0        1.0      1.2  # Reference CO2 assimilation rate (mg CO2/m2.s)
        maintRespiration = 3           3          3  # Maintenance respiration coefficient (%)
        growthEfficiency = 0.75      0.75     0.75
        SLA = 20        20         20  # Specific leaf area
        lightExtCoeff = 0.5       0.8        0.6  # Light extinction coefficient
        stockParameter = 0.05     0.05      0.05  # Stock influence parameter
        maxRootFraction = 0.2       0.2        0.2  # Maximum biomass fraction allocated to root
        leafRate = 3          3           3.5  # Reference leaf appearance rate without stress
        fLeaf = 0.7       0.7        0.7  # Reference growth partition to leaves
        fStolon = 0.0       0.2        0.0  # Reference growth partition to stolon
        digestLive = 0.6       0.6        0.6  # Digestibility of live plant material
        digestDead = 0.2       0.2        0.2  # Digestibility of dead plant material
        dmtotal = 1150    575       150  # Initial shoot dry matter (kg/ha)
        dmlitter = 250      50         10  # Initial litter dry matter (kg/ha)
        dmgreenmin = 350      100       25  # Minimum green dry matter (kg/ha)
        NcleafOpt = 4.0       4.5        3.0  # N concentration - leaf optimum
        NcleafMax = 5.0       5.5        3.5  # N concentration - leaf luxury
        NcleafMin = 1.2       2.0        0.5  # N concentration - leaf scenescent
        NcstemFr = 0.5      0.5         0.5  # Stem N concentration as fraction of leaf N concentration
        NcstolFr = 0.0      0.5         0.0  # Stolon N concentration as fraction of leaf N concentration
        NcrootFr = 0.5      0.5         0.5  # Root N concentration as fraction of leaf N concentration
        NMinFix = 0.0      0.2         0.0  # Minimum N fixation (when soil N is sufficient)
        NMaxFix = 0.0      0.6         0.0  # Maximum N fixation (when soil N is unavailable)
        CO2PmaxScale = 700     700       150  # CO2 - Scale factor for CO2 effect on photosynthesis
        CO2NScale = 600     600       600  # CO2 - Scale factor for CO2 effects on plant N concentration
        CO2NMin = 0.7      0.7        0.7  # CO2 - Minimum fraction that plant N concentration may reduce to uder elevated CO2
        CO2NCurvature = 2         2           2  # CO2 - Curvature factor of CO2 effect on plant N concentration
        Frgr = 1         1           1  # Relative growth factor
        waterStressFactor = 1         1           1  # Scale factor of water stress on plant growth [0-1]
        WaterUptakeSource = apsim  # Water uptake done by AgPasture (calc) or by apsim?
        rlvp = 0.107   0.114   0.112   0.110   0.106   0.097   0.085   0.070   0.055   0.042   0.032   0.023   0.017   0.012   0.007   0.004   0.003   0.002   0.001   0.001   0.000  # Root distribution of swards (relative to each soil layer)
        rateLive2Dead = 0.04     0.04      0.05  # Type the live to dead coefficient
      outputfile Results: filename=BaseTaupo Results.out; title=BaseTaupo Results
        variables
          variable:
            dd/mm/yyyy as Date
            year as Year
            month_str as Month
            isExpDay as isExpDay
            Day_of_Experiment as DayOfExp
            rain as Rain
            irrigation as Irrigation
            Urine_Water_added as UrineWater
            es as Evaporation
            WaterUptake as WaterUptake
            drain as Drainage format 3
            sw_dep() as SoilWaterContent
            pond as PondedWater
            PET
            PlantFixedN as FixedN
            Fertiliser as FertiliserN
            Urine_N_added as UrineN
            denit_N as DenitrifiedN
            emission_nh3() as VolatilisedN
            leach_urea as UreaLeached  format 3
            leach_nh4 as NH4Leached  format 3
            leach_no3 as NO3Leached  format 3
            removed_n as RemovedN
            urea() as UreaAmount
            nh4() as NH4Amount
            no3() as NO3Amount
            Mineral_N as MineralN
            hum_n() as SoilHumusN
            biom_n() as SoilBiomassN
            fom_n() as SoilFOMN
            surfaceom_n as SurfaceOMN
            AboveGroundN as ShootN
            BelowGroundN as RootN
            removed_dm as RemovedDM
            TotalPlantWt as PastureDM
            SpeciesTotalWt as TotalDMspecies
            CloverContent as %Clover
            HerbageGrowthWt as DailyGrowth
            GrowthRateCalc as GrowthRateCalc
            LAI_total as TotalLAI
            LAI_green as GreenLAI
            GLFwater as GLFwater
            GLFtemp as GLFtemp
            GLFn as GLFNitrog
            GLFnConcentration
            SoluteAdded as dcd_added
            nitrificationinhibitor(1) as DCD(0cm)
            nitrificationinhibitor(7) as DCD(10cm)
            nitrificationinhibitor(11) as DCD(20cm)
            nitrificationinhibitor() as TotalDCD format 3
            leach_nitrificationinhibitor as DCDLeached format 3
            Degradation_NitrificationInhibitor() as DCDdegradation format 3
            DoRecord_LData
            DrainCollected
            UreaLeachCollected
            NH4LeachCollected
            NO3LeachCollected
            DCDLeachCollected
            nitrification_inhibition(1)
            nitrification_inhibition(2)
            nitrification_inhibition(3)
            NH4_L1 as NH4(0-8cm)
            NH4_L2 as NH4(8-15cm)
            NH4_L3 as NH4(15-30cm)
            NO3_L1 as NO3(0-8cm)
            NO3_L2 as NO3(8-15cm)
            NO3_L3 as NO3(15-30cm)
            DCD_L1 as DCD(0-8cm)
            DCD_L2 as DCD(8-15cm)
            DCD_L3 as DCD(15-30cm)
        events Reporting Frequency: event=Daily
  folder Experiment
    memo Info
       ===================================================================================
           Validation test for nitrification inhibitor (Solute2 model)
       ===================================================================================

        » Comparing drainage, N leaching, DCD leaching, and pasture growth from lysimeters receiving DCD as nitrification inhibitor with lysimiter without inhibitor
        » N and DCD content in the soil from nearby field is also used in the comparisons
            + Soil: Taupo sandy
            + Weather: Collected in loco, and complemented with Poihipi, New Zealand (obtained from Virtual Climate Station)
            + Cow urine applied at 600kgN/ha, in 8.6mm
            + Inhibitor applied at 10 and 30kg/ha
            + No irrigation applied
            + N fertiliser applied in two occasions
            + Grass cut at estimated 1500kgDM/ha residue, on days as recorded during experiment
    simulation Taupo-Control -> /simulations/BaseTaupo
      area paddock -> /simulations/BaseTaupo/paddock
        folder Manager folder -> /simulations/BaseTaupo/paddock/Manager folder
          manager2 UrinePatchApply
            # Date and amount for urine deposition
            UrinePatch_start_date = 27/05/2009  # Date to start applications (dd/mm/yyyy)
            UrinePatch_end_date = 31/12/2100  # Date to end applications (dd/mm/yyyy)
            Apply_interval = 5000  # Type the interval between applications (days)
            Apply_times = 1  # Number of applications
            doFirstTime = yes  # Apply first urine patch?
            Urine_Water_to_add = 8.6  # Type the amount of water to apply (mm)
            Urine_N_to_add = 0  # Type the amount of urea N to apply (kg/ha)
            # Urine patch parameters
            Apply_WeN = No  # Apply water and N combined?
            p_eq_urine = 0.99  # Max proportion of SAT-DUL that urine can fill
            Dist_type = Linearly decreasing over depth  # Choose the type urine distribution in the soil profile
            Depth_for_urine = 350  # The depth reached by urine (mm)
            line_factor = 3  # Type the factor (exponent) to modify the linear dist.
```vb
Imports System
Imports ModelFramework

'This manager applies urine (water plus urea) at the amount and depth specified.
' it can also distribute it in the soil profile according to rules give (to simulate fast infiltration/prefential flow)
' (The deposition can also be set to be repeated periodically - also specify the number of depostions and whether the first one happens)
'  [Used to test temporal overlaps]

'-->  Last uptaded in: 29/Aug/2012 ..................


Public Class Script 
   
   'Parameter variables:
   <param> Private UrinePatch_start_date As String
   <param> Private UrinePatch_end_date As String
   <param> Private Apply_interval As Integer
   <param> Private Apply_times As Integer
   <param> Private doFirstTime As String
   <param><Output><Units("mm")> Private Urine_Water_to_add As Double
   <param><Output><Units("kg/ha")> Private Urine_N_to_add As Double
   <param> Private p_eq_urine As Double
   <param> Private Dist_type As String
   <param> Private Apply_WeN As String 
   <param> Private Depth_for_urine As Double
   <param> Private line_factor As Double
   
   'Link to other modules:
   <Link> Private MyPaddock As Paddock
   <Link> Private Irrigator As Irrigation   
   <Link> Private FertModule As Fertiliser
   Private SoilWaterModule As Object
   Private SoilNModule As Object
      
   'Variables read from other modules
   <Input> Private today As DateTime         'Today's date
   <Input> Private dlayer As Double()        'Thickness of soil layers (mm)
   <Input> Private sw As Double()            'Soil water content (cm3/cm3)
   <Input> Private sw_dep As Double()        'Soil water content (mm)
   <Input> Private sat_dep As Double()       'Saturated soil water content (mm)

   'Output variables
   <Output><Units("")> Public Urine_frac As Double()              'The actual fraction of urine added to each layer
   <Output><Units("mm")> Public Urine_depth As Double             'The depth reached by the urine infiltration at application
   <Output><Units("mm")> Public Urine_Wprofile_added As Double    'The amount of urine water added in the soil profile (exclude added as pond)
   <Output><Units("mm")> Public Urine_Wpond_added As Double       'The amount of urine water added as pond (irrigation)
   <Output><Units("mm")> Public Urine_Water_added As Double       'The total amount of urine water added
   <Output><Units("kg/ha")> Public Urine_Nprofile_added As Double 'The amount of urea N added to the profile
   <Output><Units("kg/ha")> Public Urine_Npond_added As Double    'The amount of urea N added as pond (fertiliser at layer zero)
   <Output><Units("kg/ha")> Public Urine_N_added As Double        'The total amount of urea N added
   
   'Internal variables
   Private StartDate As Date                'The date when urine applications start (in date format)
   Private EndDate As Date                'The date when urine applications finish (in date format)
   Private TimeAfterApplication As Integer 'Number of days after a urine application
   Private Urine_prop As Double()          'The potential proportion of urine for each soil layer
   Private SoilDepth As Double             'The soil depth (mm)
   Private NumberOfDepositions As Integer             'Number of urine depositons

   <EventHandler()> Public Sub OnInit2()

      'check the presence of one of the soil modules
      Call CheckModules()

      'Put the dates into date format:
      StartDate = Date.Parse(UrinePatch_start_date)
      EndDate = Date.Parse(UrinePatch_end_date)
      NumberOfDepositions = 0
      
      'Calculates the proportion of urine to be added at each layer:
      ReDim Urine_prop(dlayer.Length - 1)
      If Dist_type.ToLower = "free" Then    'Urine will be added according to 'water infiltration'
         For z As Integer = 0 To dlayer.length - 1
            Urine_prop(z) = 1
         Next
      Else        
         'A given distribution over depth has been chosen, 
         ' urine will be applied up to or at a given depth.
         
         Dim Depth_from_surface  As Double = 0
         For z As Integer = 0 To dlayer.length - 1
            SoilDepth = SoilDepth + dlayer(z)
         Next
         
         Console.WriteLine("SoilDepth : " & SoilDepth.ToString())

         'Check that the urine depth is not larger that the soil depth
         If Depth_for_urine > SoilDepth Then Depth_for_urine = SoilDepth
           
         If Dist_type.ToLower = "at a given depth" Then
            For z As Integer = 0 To dlayer.length - 1
               If Depth_for_urine >= Depth_from_surface And Depth_for_urine < Depth_from_surface + dlayer(z) Then
                  Urine_prop(z) = 1
               Else 
                  Urine_prop(z) = 0
               End If
               Depth_from_surface = Depth_from_surface + dlayer(z)
            Next
         ElseIf Dist_type.ToLower = "uniformly distributed" Then
            For z As Integer = 0 To dlayer.length - 1
               If Depth_for_urine >= Depth_from_surface  Then
                  If Depth_for_urine > Depth_from_surface + dlayer(z) Then
                     If Depth_for_urine > 0 Then
                        Urine_prop(z) = dlayer(z) / Depth_for_urine
                     Else
                        Urine_prop(z) = 1
                     End If
                  Else
                     If Depth_for_urine > 0 Then
                        Urine_prop(z) = (Depth_for_urine - Depth_from_surface) / Depth_for_urine
                     Else
                        Urine_prop(z) = 1
                     End If
                  End If
                  Depth_from_surface = Depth_from_surface + dlayer(z)
               Else
                  Urine_prop(z) = 0
               End If 
            Next
         ElseIf Dist_type.ToLower = "linearly decreasing over depth" Then
            'The parameter 'line_factor' makes the line a curve...
            Dim atZ0 As Double
            Dim atZ1 As Double
            Dim Tot_prop As Double = Depth_for_urine * (1 ^ line_factor) / (line_factor + 1)
            
            atZ1 = (Depth_for_urine - Depth_from_surface) * ((1 - Depth_from_surface / Depth_for_urine) ^ line_factor) / (line_factor + 1)
            For z As Integer = 0 To dlayer.length - 1
               atZ0 = atZ1
               Depth_from_surface = Depth_from_surface + dlayer(z)
               atZ1 = (Depth_for_urine - Depth_from_surface) * ((1 - Depth_from_surface / Depth_for_urine) ^ line_factor) / (line_factor + 1)
               If (1 - (Depth_from_surface / Depth_for_urine)) < 0 Then atZ1 = 0
               Urine_prop(z) = (atZ0 - atZ1) / Tot_prop
            Next
         End If
      End If
      Console.WriteLine("")
      Console.WriteLine("Distribution type: " + Dist_type + ", down to " + Depth_for_urine.ToString + "mm depth")
      Console.WriteLine("")
      For z As Integer = 0 To dlayer.length - 1
         Console.WriteLine("    Urine_prop(" + z.ToString + ") = " + Urine_prop(z).ToString)
      Next
      Console.WriteLine("")
   End Sub
   
   'Public WaterChanged As ApsimTypeDelegate WaterChanged.DeltaWater()
   
   <EventHandler()> Public Sub OnPrepare()
      
      Dim urea_conc As Double = 100 * Urine_N_to_add / Urine_Water_to_add  'Urea concentration in urine (ppm)
      Dim sw_deficit(dlayer.Length - 1) As Double                     'Soil water deficit (mm)
      Dim Add_Urine As Boolean = False                            'Indicate whether urine is to be applied or not
      Dim PondedUrine As IrrigationApplicationType = New IrrigationApplicationType

      'Re-set variables
      ReDim Urine_frac(dlayer.Length - 1)
      Urine_Wprofile_added = 0
      Urine_Wpond_added = 0
      Urine_Water_added = 0
      Urine_Nprofile_added = 0
      Urine_Npond_added = 0
      Urine_N_added = 0
      Urine_depth = 0

      If (Today >= StartDate And Today <= EndDate) And (Urine_N_to_add > 0) And (NumberOfDepositions < Apply_times) Then
         'Decide whether it is time to apply urine:
         If Today = StartDate Then
            If doFirstTime.ToLower = "yes" Then               
               Add_Urine = True
            End If
            TimeAfterApplication = 1
            NumberOfDepositions += 1
         Else
            If TimeAfterApplication >= Apply_interval Then
               Add_Urine = True
               TimeAfterApplication = 1
               NumberOfDepositions += 1
            Else 
               Add_Urine = False
               TimeAfterApplication += 1
            End If
         End If

         If Add_Urine = True Then
            'Apply urine according to the Dist_type chosen:
            
            Dim delta_sw_dep(dlayer.Length-1) As Double
            Dim delta_urea(dlayer.Length-1) As Double
            Dim New_sw(dlayer.Length-1) As Double
            Dim Single_NewSW(dlayer.Length-1) As Single
            Dim Cum_water_added As Double = 0 
            Dim Cum_sw_deficit As Double = 0 
            SoilDepth = 0
            
            'Compute the pore space that is available to be filled with urine water
            'it is the value between the actual water content and a fraction of SAT
            For z As Integer = 0 To dlayer.Length - 1
               sw_deficit(z) = Math.Max(0, (sat_dep(z) * p_eq_urine) - sw_dep(z))
               SoilDepth = SoilDepth + dlayer(z)
               If SoilDepth <= Depth_for_urine Then Cum_sw_deficit += sw_deficit(z)
            Next
            
            'Calculates the actual fraction for each layer
            For z As Integer = 0 To dlayer.Length - 1
               If Dist_type.ToLower = "free" Then
                  'to be coded
               Else
                  'Distribution is given in the UI
                  If sw_deficit(z) > 0 And Urine_prop(z) > 0
                     delta_sw_dep(z) = Math.Min(Urine_Water_to_add * Urine_prop(z), sw_deficit(z))
                     If Cum_water_added + delta_sw_dep(z) > Urine_Water_to_add Then
                        delta_sw_dep(z) = Urine_Water_to_add - Cum_water_added 
                        Cum_water_added = Urine_Water_to_add
                     Else
                        Cum_water_added = Cum_water_added + delta_sw_dep(z)
                     End If
                     New_sw(z) = sw(z) + (delta_sw_dep(z) / dlayer(z))
                  Else
                     delta_sw_dep(z) = 0
                     New_sw(z) = sw(z)
                  End If
                  Single_NewSW(z) = CSng(New_sw(z))
                  If Apply_WeN = "yes" Then
                     delta_urea(z) = delta_sw_dep(z) * urea_conc / 100
                  Else
                     delta_urea(z) = Urine_prop(z) * Urine_N_to_add
                  End If
                  Urine_Nprofile_added += delta_urea(z)
                  
                  Urine_frac(z) = delta_sw_dep(z) / Urine_Water_to_add
                  If Urine_frac(z) > 0 Then 
                     Urine_depth = Urine_depth + dlayer(z)
                  End If

                  If Cum_water_added < Urine_Water_to_add Then
                     Urine_Wpond_added = Urine_Water_to_add - Cum_water_added
                     PondedUrine.Amount = Urine_Wpond_added
                     PondedUrine.source = New String() {}
                     PondedUrine.time = ""
                     PondedUrine.Duration = 0
                     PondedUrine.Crop_Area = 0
                     PondedUrine.NH4 = 0
                     PondedUrine.NO3 = 0
                     PondedUrine.CL = 0
                     If Apply_WeN = "yes" Then
                        Urine_Npond_added = Urine_Wpond_added * urea_conc
                     else
                        Urine_Npond_added = 0
                     End If
                  Else
                     Urine_Wpond_added = 0
                     Urine_Npond_added = 0
                  End If
               End If
            Next
            'SoilNModule.dlt_urea = delta_urea
            Dim NitrogenChanges As NitrogenChangedType
            NitrogenChanges = New NitrogenChangedType()
            
				NitrogenChanges.Sender = "UrinePatchApply"
				NitrogenChanges.SenderType = "Manager"
            NitrogenChanges.DeltaUrea = delta_urea
            SoilNModule.NitrogenChanged(NitrogenChanges)
            
            SoilWaterModule.sw = Single_NewSW            
            'Dim WaterChanges As WaterChangedType
            'WaterChanges = New WaterChangedType()
            'WaterChanges.DeltaWater = delta_sw
            'SoilWaterModule.WaterChanged(WaterChanges)
            
            
            
            
            If Urine_Wpond_added > 0 Then
               Irrigator.Variable("irrigation_efficiency").Set(1.0)
               Irrigator.Apply(PondedUrine)
            End If
            If Urine_Npond_added > 0 Then FertModule.Apply(Urine_Npond_added, 0, "Urea_N")
            Urine_Wprofile_added = Cum_water_added
            Urine_Water_added = Urine_Wprofile_added + Urine_Wpond_added
            Urine_N_added = Urine_Nprofile_added + Urine_Npond_added
            Console.WriteLine(Today.ToString("dd MMMM yyyy") + " (Day of year=" + Today.DayOfYear.ToString + "), Urine patch deposition:")
            Console.WriteLine("     Urine patch being applied. Nitrogen load = " + Urine_N_added.ToString + "kg/ha. Water amount = " + Urine_Water_added.ToString + "mm")
         Else
            Array.Clear(Urine_frac, 0, Urine_frac.Length - 1)
            Urine_Wprofile_added = 0
            Urine_Nprofile_added = 0
         End If
      End If      
   End Sub

   Private Sub CheckModules()
   
      If Irrigator Is Nothing Then
         Throw New Exception("Centre pivot manager requires the presense of the irrigation module in the paddock")
      End If
      If FertModule Is Nothing Then
         Throw New Exception("Centre pivot manager requires the presense of the fertiliser module in the paddock")
      End If
      If MyPaddock.LinkByType("SoilWat") Is Nothing Then
         If MyPaddock.LinkByName("SWIM2ui") Is Nothing Then
            If MyPaddock.LinkByName("SWIM2ui2") Is Nothing Then
               Throw New Exception("Urine_patch manager didn't find a valid soil water module in the paddock")
            Else
               SoilWaterModule = MyPaddock.LinkByName("SWIM2ui2")
            End If
         Else
            SoilWaterModule = MyPaddock.LinkByName("SWIM2ui")
         End If
      Else
         SoilWaterModule = MyPaddock.LinkByType("SoilWat")
      End If
      
      If MyPaddock.LinkByType("SoilN") Is Nothing Then
         If MyPaddock.LinkByName("SoilNui") Is Nothing Then
            Throw New Exception("Urine_Patch manager didn't find a valid SoilN module in the paddock")
         Else
            SoilNModule = MyPaddock.LinkByName("SoilNui")
         End If
      Else
         SoilNModule = MyPaddock.LinkByType("SoilN")
      End If
      
   End Sub

End Class
```
          manager2 ApplyInhibitor: same as BaseTaupo.paddock.Manager folder.ApplyInhibitor
        outputfile Results -> /simulations/BaseTaupo/paddock/Results: filename=Taupo-Control Results.out; title=Taupo-Control Results
          variables -> /simulations/BaseTaupo/paddock/Results/Variables
          events Reporting Frequency -> /simulations/BaseTaupo/paddock/Results/Reporting Frequency
    simulation Taupo-noDCD -> /simulations/BaseTaupo
      area paddock -> /simulations/BaseTaupo/paddock
        folder Manager folder -> /simulations/BaseTaupo/paddock/Manager folder
          manager2 UrinePatchApply
            # Date and amount for urine deposition
            UrinePatch_start_date = 27/05/2009  # Date to start applications (dd/mm/yyyy)
            UrinePatch_end_date = 31/12/2100  # Date to end applications (dd/mm/yyyy)
            Apply_interval = 5000  # Type the interval between applications (days)
            Apply_times = 1  # Number of applications
            doFirstTime = yes  # Apply first urine patch?
            Urine_Water_to_add = 8.6  # Type the amount of water to apply (mm)
            Urine_N_to_add = 600  # Type the amount of urea N to apply (kg/ha)
            # Urine patch parameters
            Apply_WeN = No  # Apply water and N combined?
            p_eq_urine = 0.99  # Max proportion of SAT-DUL that urine can fill
            Dist_type = Linearly decreasing over depth  # Choose the type urine distribution in the soil profile
            Depth_for_urine = 350  # The depth reached by urine (mm)
            line_factor = 3  # Type the factor (exponent) to modify the linear dist.
            script: same as in BaseTaupo.paddock.Manager folder.UrinePatchApply
          manager2 ApplyInhibitor: same as BaseTaupo.paddock.Manager folder.ApplyInhibitor
        outputfile Results -> /simulations/BaseTaupo/paddock/Results: filename=Taupo-noDCD Results.out; title=Taupo-noDCD Results
          variables -> /simulations/BaseTaupo/paddock/Results/Variables
          events Reporting Frequency -> /simulations/BaseTaupo/paddock/Results/Reporting Frequency
    simulation Taupo-withDCD10 -> /simulations/BaseTaupo
      area paddock -> /simulations/BaseTaupo/paddock
        folder Manager folder -> /simulations/BaseTaupo/paddock/Manager folder
          manager2 ApplyInhibitor
            # Apply a given solute to the soil
            ApplySolute_name = nitrificationinhibitor  # Name of the solute to apply
            # When and how often to apply
            ApplySolute_start_date = 27/05/2009  # Date to start applications (dd/mm/yyyy)
            ApplySolute_end_date = 31/12/2100  # Date to end applications (dd/mm/yyyy)
            ApplySolute_interval = 5000  # Interval between applications (days)
            ApplySolute_times = 1  # Number of times to apply
            # Amount and depth for applications
            ApplySolute_amount2add = 10  # Amount of solute to apply (kg/ha)
            ApplySolute_depth2add = 1  # Depth for application (mm)
            script: same as in BaseTaupo.paddock.Manager folder.ApplyInhibitor
        outputfile Results -> /simulations/BaseTaupo/paddock/Results: filename=Taupo-withDCD10 Results.out; title=Taupo-withDCD10 Results
          variables -> /simulations/BaseTaupo/paddock/Results/Variables
          events Reporting Frequency -> /simulations/BaseTaupo/paddock/Results/Reporting Frequency
    simulation Taupo-withDCD30 -> /simulations/BaseTaupo
      area paddock -> /simulations/BaseTaupo/paddock
        folder Manager folder -> /simulations/BaseTaupo/paddock/Manager folder
          manager2 ApplyInhibitor
            # Apply a given solute to the soil
            ApplySolute_name = nitrificationinhibitor  # Name of the solute to apply
            # When and how often to apply
            ApplySolute_start_date = 27/05/2009  # Date to start applications (dd/mm/yyyy)
            ApplySolute_end_date = 31/12/2100  # Date to end applications (dd/mm/yyyy)
            ApplySolute_interval = 5000  # Interval between applications (days)
            ApplySolute_times = 1  # Number of times to apply
            # Amount and depth for applications
            ApplySolute_amount2add = 30  # Amount of solute to apply (kg/ha)
            ApplySolute_depth2add = 1  # Depth for application (mm)
            script: same as in BaseTaupo.paddock.Manager folder.ApplyInhibitor
        outputfile Results -> /simulations/BaseTaupo/paddock/Results: filename=Taupo-withDCD30 Results.out; title=Taupo-withDCD30 Results
          variables -> /simulations/BaseTaupo/paddock/Results/Variables
          events Reporting Frequency -> /simulations/BaseTaupo/paddock/Results/Reporting Frequency
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