folder simulations: version=36; creator=Apsim 7.5-r3148
  simulation Solute2Test-Tracer
    clock
      start_date = 01/01/2000  # Enter the start date of the simulation
      end_date = 31/01/2000  # Enter the end date of the simulation
    metfile met: filename=%apsim%\Examples\MetFiles\MildTemperate.met
    memo Info
      ========================================================================
            Generic tests for solute2 - tracer
      ========================================================================

        » This simulation uses a tracer solute:
          + No interactions with soil, except leaching
          + No transformations in the solute
          + Diffusion computed by SWIM

        » Basic simulation description:
          + Bare soil
          + Generic soil - Silt Loam
          + Artificial mild temperate weather
          + 1 kg/ha of tracer in top layer at start
          + Tracer applied 10 kg/ha, on a deep layer (1250mm)

        » Expected behaviour:
          + All outputs should have a numeric value (can be zero)
          + Before the addition of tracer at deep layer:
            - The total amount of tracer in the soil should be constant
            - No noticiable leaching
            - Redistribution of initial solute from the surface downwards in the soil profile
          + After the addition of tracer:
            - Total solute amount spikes up and soon start to decrease
            - Leaching starts soon after application
            - Redistribution at depth is mostly downwards, but goes also upwards

        » Variations:
          + Increasing the initial concentration in the top layer to 10 kg/ha:
            - No changes in total solute prior to deep layer addition, as no leaching occurs
            - Redistribution at surface follows similar trend as before, but changes are a bit faster (greater gradient)

          + Adding the tracer at a depth smaller than 1000mm:
            - No noticiable leaching for depth smaller than 990mm
            - Redistribution floows similar pattern as before
    summaryfile
    area Paddock
      folder ManagerFolder
        manager2 Apply_Tracer
          # Date to start applications (dd/mm/yyyy)
          ApplyTracer_StartDate = 10/01/2000  # Date to start applications (dd/mm/yyyy)
          ApplyTracer_EndDate = 31/12/2100  # Date to end applications (dd/mm/yyyy)
          ApplyTracer_Interval = 1461  # Type the interval between applications (days)
          ApplyTracer_Amount2Add = 10  # Type the amount of inhibitor to apply ((kg/ha)
          ApplyTracer_Depth = 1250  # Type the depth to apply inhibitor (mm)
```vb
Imports System
Imports ModelFramework

'This manager applies a tracer solute at the amount and depth specified (it also can repeat the application periodically)
' RCichota, last update: 23/Jul/2013

Public Class Script
   
   'Parameter variables:
   <param> Private ApplyTracer_StartDate As String
   <param> Private ApplyTracer_EndDate As String
   <param> Private ApplyTracer_Interval As Integer
   <param> Private ApplyTracer_Amount2Add As Single
   <param> Private ApplyTracer_Depth As Single
   
   <[Event]()> Public Event SoluteChanged As SoluteChangedDelegate

   'Variables read from other modules
   <Input> Private today As DateTime
   <Input> Private dlayer As Single()

   'Output variables
   <Output><Units("kg/ha")> Public TracerAdded As Single       'The amount of tracer added

   'Internal variables
   Private StartDate As DateTime                   'The date when applications start (in date format)
   Private EndDate As DateTime                     'The date when applications finish (in date format)
   Private TimeAfterApplication As Integer         'Number of days after a urine application
   Private SoilDepth As Single                     'The soil depth (mm)
   Private Layer2Apply As Integer                  'The layer at which tracer will be applied

   <EventHandler()> Public Sub OnInit2()

      'Put the dates into date format:
      StartDate = Date.Parse(ApplyTracer_StartDate)
      EndDate = Date.Parse(ApplyTracer_EndDate)
              
      'Computes the layer at which NitInhibitor will be applied
      Dim DepthFromSurface As Single = 0
      For z As Integer = 0 To dlayer.length - 1
         If DepthFromSurface <= ApplyTracer_Depth Then Layer2Apply = z
         DepthFromSurface = DepthFromSurface + dlayer(z)
      Next
      
      console.WriteLine(" TracerAdded to be applied at " & ApplyTracer_Depth.ToString() & " mm depth, layer " & (Layer2Apply + 1).ToString())

   End Sub

   <EventHandler()> Public Sub OnPrepare()

      Dim delta_solute As Double()
      Dim canApplyTracer As Boolean = False
      
      'Re-set variables
      ReDim delta_solute(dlayer.Length - 1)
      TracerAdded = 0

      'Decide whether it is time to apply inhibitor:
      If today >= StartDate And today <= EndDate Then
         If today = StartDate Then
            canApplyTracer = True
         Else
            If TimeAfterApplication >= ApplyTracer_Interval Then
               canApplyTracer = True
            Else
               TimeAfterApplication = TimeAfterApplication + 1
               TracerAdded = 0
            End If
         End If
         
         If canApplyTracer Then
            
            'fill the delta_solute array
            For z As Integer=0 To dlayer.Length - 1
               delta_solute(z) = 0.0
            Next
            delta_solute(Layer2Apply) = CDbl(ApplyTracer_Amount2Add)
            TracerAdded += ApplyTracer_Amount2Add
         
            ' send delta_solute to apsim
            Dim SoluteChanges As SoluteChangedType = New SoluteChangedType()
            SoluteChanges.Sender = "Manager: Apply_Tracer"
            SoluteChanges.SoluteName = "tracer"
            SoluteChanges.SoluteUnits = "kg/ha"
            SoluteChanges.DeltaSolute = delta_solute
            RaiseEvent SoluteChanged(SoluteChanges)

            TimeAfterApplication = 1

            Console.WriteLine(today.ToString("dd MMMM yyyy") + " (Day of year=" + today.DayOfYear.ToString + "), Apply_Tracer:")
            Console.WriteLine("     tracer being applied. " + TracerAdded.ToString + "kg/ha added at depth " + ApplyTracer_Depth.ToString + "mm")
            
         End If         
      End If                  
   End Sub

End Class
```
      micromet
        soilalbedo = 0.23
        a_interception = 0
        b_interception = 0
        c_interception = 0
        d_interception = 0
      tracer2 Tracer
        # Initial content of Tracer in the soil
        InitialContent = 1.0  0.0  0.0  0.0  0.0  0.0  0.0  0.0  0.0  0.0  0.0  0.0  0.0  0.0  0.0  0.0  0.0  0.0  0.0  0.0  # Amount of Tracer for each layer (kg/ha)
        # Solute diffusivity
        MolecularDiffusivity = 0.0  # Diffusivity of Tracer in water (mm2/day)
      surfaceom SurfaceOrganicMatter
        PoolName = grass  # Organic Matter pool name
        type = grass  # Organic Matter type
        mass = 200  # Initial surface residue (kg/ha)
        cnr = 20  # C:N ratio of initial residue
        standing_fraction = 0  # Fraction of residue standing
      SWIM2ui2
        # SWIM boundary conditions
        top_boundary_condition = 0  # Choose top boundary condition (0=inf conduct; 1=const potential; 2=limtd conduct)
        runoff = 1  # Choose runnof/pond condition (0=all runoff; 1=all pond; 2=calc runoff)
        bottom_boundary_condition = 0  # Choose bottom boundary condition (0=set pot grad; 1=set potential; 2=impermeable;3=seepage)
        run_solutes = urea  nh4  no3  tracer  # Type list of solutes SWIM will move
        max_water_increment = 0.5  # Type base water increment value
        # Description of soil profile
        x = 0  10  20  30  50  70  90  110  140  160  190  210  250  270  330  370  430  470  530  570  650  710  790  860  940  1060  1140  1260  1340  1440  1500  # Enter the values of x for each layer
        soil_type = A_ZL_mC  A_ZL_mC  A_ZL_mC  A_ZL_mC  A_ZL_mC  A_ZL_mC  A_ZL_mC  A_ZL_mC  A_ZL_mC  -  -  B1_ZL_mC  B1_ZL_mC  B1_ZL_mC  -  -  B2_SL_mC  B2_SL_mC  B2_SL_mC  B2_SL_mC  B2_SL_mC  B2_SL_mC  B2_SL_mC  -  -  BC_S_mC  BC_S_mC  BC_S_mC  BC_S_mC  BC_S_mC  BC_S_mC  # Enter the tags for each layer
        psi = -100  -100  -100  -100  -100  -100  -100  -100  -100  -100  -100  -100  -100  -100  -100  -100  -100  -100  -100  -100  -100  -100  -100  -100  -100  -100  -100  -100  -100  -100  -100  # Enter the inital values of psi for each layer
        ini Ini_SWIM2: filename=%apsim%\Tests\Solute2\ini_SWIMui2(GenericSiltLoam).xml
      SoilNitrogen
        # Parameters to initialise soil organic matter
        root_wt = 1000  # Type the initial FOM amount in the soil (kgDM/ha)
        root_cn = 30  # Type the initial C:N ratio of FOM
        soil_cn = 12.5  # Type the C:N ratio of soil humus
        mcn = 8  # Type the C:N ratio of soil microbial biomass
        # Enter the values for each layer
        ph = 6.0    6.0    6.0    6.0    6.0    6.0    6.0    6.0    6.0    6.0    6.0    6.0    6.0    6.0    6.0    6.0    6.0    6.0    6.0    6.0    6.0    6.0    6.0    6.0    6.0    6.0    6.0    6.0    6.0    6.0    6.0  # Type the inital soil pH
        oc = 4.817  4.789  4.760  4.717  4.665  4.613  4.331  3.977  3.667  3.396  3.148  2.877  2.630  2.336  2.023  1.761  1.550  1.379  1.241  1.111  0.996  0.912  0.844  0.797  0.752  0.723  0.704  0.692  0.685  0.681  0.680  # Type the initial soil organic carbon content (%)
        fbiom = 0.080  0.080  0.080  0.080  0.079  0.078  0.075  0.069  0.061  0.050  0.040  0.029  0.021  0.013  0.008  0.008  0.008  0.008  0.008  0.008  0.008  0.008  0.008  0.008  0.008  0.008  0.008  0.008  0.008  0.008  0.008  # Type the microbial biomass fraction of OC (0-1)
        finert = 0.454  0.461  0.468  0.474  0.487  0.515  0.571  0.626  0.678  0.718  0.755  0.786  0.819  0.843  0.876  0.895  0.915  0.927  0.940  0.947  0.958  0.964  0.971  0.976  0.980  0.985  0.988  0.990  0.992  0.993  0.994  # Type the inert fraction of soil humus (0-1)
        no3ppm = 1.50   2.00   2.40   2.50   2.50   2.50   2.50   2.50   2.50   2.45   2.30   2.15   2.00   1.85   1.60   1.35   1.15   0.90   0.80   0.71   0.65   0.59   0.51   0.44   0.39   0.34   0.30   0.26   0.21   0.20   0.20  # Type the initial concentration of NO3 is the soil (ppm)
        nh4ppm = 0.50   0.70   0.80   0.80   0.80   0.80   0.80   0.80   0.80   0.80   0.80   0.70   0.60   0.50   0.40   0.40   0.30   0.30   0.20   0.20   0.20   0.20   0.20   0.10   0.10   0.10   0.10   0.08   0.07   0.07   0.07  # Type the initial concentration of NH4 is the soil (ppm)
        ureappm = 0.00   0.00   0.00   0.00   0.00   0.00   0.00   0.00   0.00   0.00   0.00   0.00   0.00   0.00   0.00   0.00   0.00   0.00   0.00   0.00   0.00   0.00   0.00   0.00   0.00   0.00   0.00   0.00   0.00   0.00   0.00  # Type the initial concentration of urea is the soil (ppm)
      SoilTemperature2: MaxTTimeDefault=14; BoundaryLayerConductanceSource=calc; BoundaryLayerConductance=20; BoundaryLayerConductanceIterations=1; NetRadiationSource=calc; DefaultWindSpeed=3; DefaultAltitude=18; DefaultInstrumentHeight=1.2; BareSoilHeight=57
        Clay=15.0   15.0   15.0   15.0   15.0   15.0   15.0   15.0   15.0   15.0   15.0   15.0   15.0   15.0   15.0   15.0   15.0   15.0   15.0   15.0   15.0   15.0   15.0   15.0   15.0   15.0   15.0   15.0   15.0   15.0   15.0
      outputfile Outputs: filename=Solute2Test-Tracer Outputs.out; title=Solute2Test-Tracer Outputs
        variables
          variable:
            dd/mmm/yyyy as Date
            day as DoY
            rain as Rain
            drain as Drainage format 2
            sw_dep() as SoilWaterContent format 2
            TracerAdded format 2
            Tracer() format 3
            Leach_tracer format 3
            InitialContent
            tracer format 3
            flow_tracer
            Diffusion_tracer
            tracer_ppm
            dlayer
        events Reporting Frequency: event=end_day
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