folder simulations: version=32
  memo
    Simulations numbered as per Table 2. "Datasets used for model development" in:

    Keating, B.A., Robertson, M.J., Muchow, R.C. and Huth, N.I. (1999). Modelling sugarcane production systems I. Development and performance of the sugarcane module.
    Field Crops Research, 61: 253-271.
  simulation Old
    metfile met: filename=Ingham.met
    clock
      start_date = 23/07/1992  # Enter the start date of the simulation
      end_date = 21/10/1993  # Enter the end date of the simulation
    summaryfile
    area paddock
      soil
        InitWater Initial water
          PercentMethod: Percent=1.00; Distributed=Filled from top
        Water
          Layer:
            Thickness (mm)  BD (g/cc)  AirDry (mm/mm)  LL15 (mm/mm)  DUL (mm/mm)  SAT (mm/mm)
            200             1.15       0.05            0.16          0.28         0.45
            200             1.35       0.05            0.18          0.3          0.45
            200             1.4        0.05            0.2           0.32         0.45
            300             1.45       0.05            0.21          0.33         0.45
            300             1.45       0.05            0.24          0.36         0.45
            300             1.5        0.05            0.29          0.41         0.43
            300             1.5        0.05            0.29          0.41         0.43
          SoilCrop sugar
            Layer:
              Thickness (mm)  LL (mm/mm)  KL (/day)  XF (0-1)
              200             0.16        0.1        1
              200             0.18        0.1        1
              200             0.2         0.1        1
              300             0.21        0.08       1
              300             0.24        0.08       1
              300             0.29        0.04       1
              300             0.29        0.04       1
        SoilWat: SummerCona=3; SummerU=4; SummerDate=1-Nov; WinterCona=3; WinterU=4; WinterDate=1-Apr; DiffusConst=40; DiffusSlope=16; Salb=0.1; CN2Bare=65; CNRed=20; CNCov=0.8
          Layer:
            Thickness (mm)  SWCON (0-1)
            200             0.4
            200             0.4
            200             0.4
            300             0.4
            300             0.4
            300             0.4
            300             0.4
        SoilOrganicMatter: RootCN=70; RootWT=50; SoilCN=11; EnrACoeff=7.4; EnrBCoeff=0.2
          Layer:
            Thickness (mm)  OC (Total %)  FBiom (0-1)  FInert (0-1)
            200             1.3           0.06         0.3
            200             0.9           0.045        0.45
            200             0.54          0.035        0.85
            300             0.4           0.015        0.95
            300             0.4           0.005        0.95
            300             0.4           0.005        0.99
            300             0.4           0.005        0.99
        Analysis
          Layer:
            Thickness (mm)  PH (1:5 water)
            200             6
            200             6
            200             6
            300             6
            300             6
            300             6
            300             6
        Sample Initial nitrogen
          Layer:
            Thickness (mm)  NO3 (ppm)  NH4 (ppm)
            200             2          1
            200             2          1
            200             1          1
            300             1          0.5
            300             1          0.5
            300             1          0.5
            300             1          0.5
      surfaceom Surface Organic Matter
        PoolName = sugar_trash  # Organic Matter pool name
        type = sugar  # Organic Matter type
        mass = 100  # Initial surface residue (kg/ha)
        cnr = 80  # C:N ratio of initial residue
        standing_fraction = 1  # Fraction of residue standing
      fertiliser
      irrigation
        automatic_irrigation = on
        asw_depth = 1800  # Depth to which ASW is calculated. (mm)
        crit_fr_asw = 0.999  # Fraction of ASW below which irrigation is applied (0-1.0)
        irrigation_efficiency = 1  # Efficiency of the irrigation. (0-1.0)
        irrigation_allocation = off  # Allocation limits
        allocation = 0  # Allocation in ML
        default_no3_conc = 500  # Nitrate concentration (ppm N)
        default_nh4_conc = 0  # Ammonium concentration (ppm N)
        default_cl_conc = 0  # Chloride concentration (ppm Cl)
        default_no3_conc = 0  # Nitrate concentration (ppm N)
        default_nh4_conc = 0  # Ammonium concentration (ppm N)
        default_cl_conc = 0  # Chloride concentration (ppm Cl)
      sugar
      manager Empty manager
        on start_of_day:
```
cabstem=cabbage_wt + cane_wt
```
      operations
        23/07/1992  sugar sow plants = 10, sowing_depth = 100, cultivar = Q117, ratoon = 0
        21/10/1993  sugar harvest  (end_of_day)
        21/10/1993  sugar end_crop  (end_of_day)
      outputfile: filename=Old.out; title=Old
        variables
          variable:
            dd/mm/yyyy as date
            tt_tot()
            stagename
            stage_code as stagecodevalue
            leaf_no()
            node_no_dead()
            lai as LeafLAI
            leafgreenwt
            senescedwt
            cabbage_wt
            cane_wt as stemlivewt
            cabstem
            rootgreenwt
            biomass
            green_biomass
            surfaceom_wt
            biomass_n
            green_biomass_n
            swdef_photo
            nfact_photo
            root_depth as RootDepth
            dlt_dm
            slai
            dlt_dm
            leaf_no() as LeafAppearedCohortNo
            node_no_dead() as LeafDeadCohortNo
        events Reporting Frequency: event=Daily
  simulation SugarCane
    metfile met -> /simulations/Old/met
    clock -> /simulations/Old/clock
    summaryfile
    area paddock -> /simulations/Old/paddock
      SugarCane
      manager Empty manager
        on init:
```
sla=0
```
        on start_of_day:
```
calcgreenbiomass=leaflivewt+stemlivewt

if SugarCane.leaflai>0 then
   sla=SugarCane.leaflai/SugarCane.leaflivewt*1000000
else
   sla=0
endif
```
      operations
        23/07/1992  SugarCane sow population = 10, depth = 100, cultivar = Q117, maxcover = 1.0, BudNumber = 1, row_spacing = 1500, crop_class = plant
        21/10/1993  SugarCane harvest  (end_of_day)
        21/10/1993  SugarCane end_crop  (end_of_day)
      outputfile: filename=SugarCane.out; title=SugarCane
        variables
          variable:
            dd/mm/yyyy as date
            PhenologyThermalTimeValue
            PhenologyCurrentPhaseName
            StageCodeValue
            LeafAppearedCohortNo
            LeafDeadCohortNo
            LeafPlantAppearedGreenLeafNo
            LeafExpandedCohortNo
            LeafLAI
            LeafLiveWt
            LeafDeadWt
            StemLiveWt
            BelowGroundDM
            AboveGroundDM
            calcgreenbiomass
            surfaceom_wt as SugarCane_surfaceom_wt
            LeafFw
            LeafFn
            RootDepth
            TotalDM
            LeafLAIDead
            sla
            leafspecificarea
            LeafDMSupplyPhotosynthesis
            leafphotosynthesisft
            leafphotosynthesisfvpd
        events Reporting Frequency -> /simulations/Old/paddock/Outputfile/Reporting Frequency
      micromet: soilalbedo=0.23; a_interception=0.0; b_interception=0.0; c_interception=0.0; d_interception=0.0
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