folder simulations: version=36
  simulation Sugar with No Climate Change
    metfile met: filename=%apsim%/Examples/MetFiles/Ingham.met
    clock
      start_date = 01/01/1990  # Enter the start date of the simulation
      end_date = 31/12/2000  # Enter the end date of the simulation
    summaryfile
    area paddock
      Soil: LocalName=Waco; Site=Jimbour; Region=South East Queensland
        SoilType = Black Vertosol  # Soil description
        NearestTown = Jimbour, Q 4352
        NaturalVegetation = Grassland, mainly Qld bluegrass
        InitialWater Initial water: FractionFull=0.5004617; PercentMethod=FilledFromTop
        Water
          Thickness  BD    AirDry  LL15  DUL   SAT
          150        1.02  0.14    0.29  0.54  0.59
          150        1.03  0.26    0.29  0.53  0.58
          300        1.02  0.29    0.29  0.54  0.59
          300        1.02  0.29    0.29  0.54  0.58
          300        1.06  0.3     0.3   0.52  0.57
          300        1.11  0.31    0.31  0.5   0.55
          300        1.12  0.32    0.32  0.5   0.55
          300        1.15  0.33    0.33  0.48  0.53
          300        1.18  0.34    0.34  0.47  0.52
          300        1.2   0.35    0.35  0.46  0.51
          300        1.25  0.36    0.36  0.44  0.49
          SoilCrop Barley
            LL=[0.29, 0.29, 0.32, 0.38, 0.39, 0.39, 0.41, 0.48, 0.47, 0.46, 0.44]
            KL=[0.1, 0.1, 0.08, 0.06, 0.04, 0.02, 0.01, 0, 0, 0, 0]
            XF=[1, 1, 1, 1, 1, 1, 1, 0, 0, 0, 0]
          SoilCrop Chickpea
            LL=[0.29, 0.29, 0.36, 0.43, 0.51, 0.5, 0.5, 0.48, 0.47, 0.46, 0.44]
            KL=[0.1, 0.1, 0.08, 0.06, 0.04, 0.02, 0.01, 0, 0, 0, 0]
            XF=[1, 1, 1, 1, 1, 1, 1, 0, 0, 0, 0]
          SoilCrop Lucerne
            LL=[0.29, 0.29, 0.29, 0.29, 0.3, 0.31, 0.32, 0.33, 0.34, 0.35, 0.36]
            KL=[0.1, 0.1, 0.1, 0.1, 0.09, 0.09, 0.09, 0.09, 0.09, 0.09, 0.09]
            XF=[1, 1, 1, 1, 1, 1, 1, 1, 1, 1, 1]
          SoilCrop Maize
            LL=[0.29, 0.29, 0.34, 0.34, 0.37, 0.4, 0.42, 0.48, 0.47, 0.46, 0.44]
            KL=[0.1, 0.1, 0.1, 0.08, 0.06, 0.04, 0.02, 0, 0, 0, 0]
            XF=[1, 1, 1, 1, 1, 1, 1, 0, 0, 0, 0]
          SoilCrop Perennial Grass
            LL=[0.29, 0.29, 0.39, 0.41, 0.4, 0.4, 0.41, 0.41, 0.4, 0.4, 0.42]
            KL=[0.1, 0.1, 0.1, 0.1, 0.09, 0.07, 0.05, 0, 0, 0, 0]
            XF=[1, 1, 1, 1, 1, 1, 1, 0, 0, 0, 0]
          SoilCrop Sorghum
            LL=[0.29, 0.29, 0.35, 0.38, 0.4, 0.4, 0.4, 0.48, 0.47, 0.46, 0.44]
            KL=[0.1, 0.1, 0.1, 0.08, 0.06, 0.04, 0.02, 0, 0, 0, 0]
            XF=[1, 1, 1, 1, 1, 1, 1, 0, 0, 0, 0]
          SoilCrop Wheat
            LL=[0.29, 0.29, 0.32, 0.32, 0.35, 0.38, 0.41, 0.48, 0.47, 0.46, 0.44]
            KL=[0.1, 0.1, 0.08, 0.06, 0.04, 0.02, 0.01, 0, 0, 0, 0]
            XF=[1, 1, 1, 1, 1, 1, 1, 0, 0, 0, 0]
          SoilCrop Sugar
            LL=[0.29, 0.29, 0.32, 0.32, 0.35, 0.38, 0.41, 0.48, 0.47, 0.46, 0.44]
            KL=[0.1, 0.1, 0.08, 0.06, 0.04, 0.02, 0.01, 0, 0, 0, 0]
            XF=[1, 1, 1, 1, 1, 1, 1, 0, 0, 0, 0]
        SoilWater: SummerCona=3.5; SummerU=6; SummerDate=1-Nov; WinterCona=3.5; WinterU=6; WinterDate=1-Apr; DiffusConst=40; DiffusSlope=16; Salb=0.13; CN2Bare=73; CNRed=20; CNCov=0.8; Thickness=[150, 150, 300, 300, 300, 300, 300, 300, 300, 300, 300]; SWCON=[0.3, 0.3, 0.3, 0.3, 0.3, 0.3, 0.3, 0.3, 0.3, 0.3, 0.3]
        SoilOrganicMatter: RootCN=40; RootWt=200; SoilCN=12.5; EnrACoeff=7.4; EnrBCoeff=0.2
          Thickness  OC    FBiom  FInert
          150        1.04  0.025  0.4
          150        0.89  0.02   0.6
          300        0.89  0.015  0.8
          300        0.89  0.01   0.9
          300        0.77  0.01   0.95
          300        0.45  0.01   0.95
          300        0.27  0.01   0.95
          300        0.22  0.01   0.95
          300        0.16  0.01   0.95
          300        0.13  0.01   0.95
          300        0.12  0.01   0.95
        Analysis
          Thickness  EC    PH
          150        0.2   8.4
          150        0.25  8.8
          300        0.31  9
          300        0.4   9.2
          300        0.59  9.2
          300        0.84  9.1
          300        0.93  9
          300        1.01  9
          300        1.06  8.9
          300        1.05  8.9
          300        1.01  8.9
        Sample Initial nitrogen
          Thickness  NO3    NH4
          150        6.500  0.600
          150        2.100  0.100
          300        2.100  0.100
          300        1.700  0.100
          300        1.700  0.100
          300        1.700  0.100
          300        1.700  0.100
          300        1.700  0.100
          300        1.700  0.100
          300        1.700  0.100
          300        1.700  0.100
      fertiliser
      sugar
      folder Manager folder
        manager SUGAR management
          # Sugar plant crop management parameters
          crop = sugar  # Enter name of crop to sow
          planting_day = 1-apr  # Enter planting date (dd-mmm)
          plantlen = 450  # Duration of a plant crop (days) (30 days/month * 15 months)
          plant_stalks = 10  # Stalk density of plant crop (/m2)
          variety = q117  # Planting variety
          sowing_depth = 150  # Planting depth mm)
          # Ratoon management parameters
          NoRatoons = 4  # Number of ratoons (max = 5)
          ratoonlen = 390  # Duration of a ratoon crop (days) (30 days/month * 13 months)
          ratoon_stalks = 10  # Stalk density of ratoon crop (/m2)
          on start_of_day:
```
            ! -----------------------------------------------------------------
            ! Book keeping to round days to integer values
            plantlen = nearest_int(plantlen)
            ratoonlen = nearest_int(ratoonlen)

            ! Initialise and set a time counter for entire run
            dah = 0

            if (sugar.crop_status = 'alive') then
               dah = 0

               ! Set harvest dates for each crop phase
               if (sugar.DaysAfterSowing = [plantlen] and ratoon_no = 0) or
                  (sugar.DaysAfterSowing = [ratoonlen] and ratoon_no > 0) then

                  sugar harvest

                  if (ratoon_no = [NoRatoons] + 1) then
                     ! plough the crop out
                     sugar kill_crop
                     sugar end_crop

                  else
                     ! Set stalk density
                     sugar.plants = [ratoon_stalks]
                  endif
               else
                  ! We have not reached the harvest date for this ratoon.
               endif

            elseif (sugar.crop_status = 'dead') then
               sugar harvest
               sugar end_crop

            elseif (sugar.crop_status = 'out') and (today = date('[planting_day]') then
               sugar sow plants = 10 (), cultivar = [variety], sowing_depth = [sowing_depth]
               sugar.plants = [plant_stalks]
               dah = 0

            else
               dah = dah + 1
            endif
```
          on init:
```
            nextcrop = 0
            fallowin = 0
            plantlen = 0
            ratoonlen = 0
```
        manager Fertilise on fixed date
          # When should fertiliser be applied
          fert_date = 01-sep  # Enter fertiliser date (dd-mmm)
          fert_criteria = 1000  # Don't add fertiliser if N in top 2 layers exceeds (kg/ha)
          # Fertiliser application details
          fertmodule = fertiliser  # Module used to apply the fertiliser
          fert_amount = 200  # Amount of fertiliser to apply (kg/ha)
          fert_type = urea_N  # Sowing fertiliser type
          on start_of_day:
```
         if (today = date('[fert_date]') then
            N_topsoil = no3(1) + nh4(1) + no3(2) + nh4(2)
            if (N_topsoil < [fert_criteria]) then
               [fertmodule] apply amount = [fert_amount] (kg/ha), depth = 50 (mm), type = [fert_type] ()
            endif
         endif
```
      outputfile: filename=Sugar with No Climate Change.out; title=Sugar with No Climate Change
        variables
          variables: dd/mm/yyyy as Date, biomass, cane_wt, sucrose_wt, sw_demand, DaysAfterSowing, ratoon_no, crop_status, esw, lai, nfact_photo, root_depth, swdef_photo, canefw, radn, rain, maxt, mint
        events Reporting Frequency: event=post  # End of daily simulation time step
  memo ClimateControl Note
    I zeroed  Temperature, Rainfall and Radiation changes.

    Only intersted in seeing the changes to the simulation caused by specifying a different CO2 value

    I output to the summary file the old RUE and transp_eff_cf values read from the ini file
    and the new values.

    These new values are  calculated using Jody Biggs equations which he got from Sorghum climate change

     rue = rue * (0.000142*CO2 + 0.94995)
    transp_eff_cf = transp_eff_cf  * (0.0008 * CO2 + (1-0.0008*350))
  simulation Sugar with Climate Change 350ppm -> /simulations/Sugar with No Climate Change
    manager ClimateControl
      # Climate Control Window
      date1 = 1-jan  # Enter window START date (dd-mmm)
      date2 = 31-dec  # Enter window END date (dd-mmm)
      # Climate Change Parameters
      MaxtChange = 0  # Change in maximum temperature (oC)
      MintChange = 0  # Change in minimum temperature (oC)
      RainChange = 0  # Relative change in daily rainfall (%)
      RadnChange = 0  # Relative change in daily radiation (%)
      CO2 = 350  # Atmospheric CO2 Concentration (ppm)
      on prenewmet:
```
!  Adjust daily temperatures, rainfall and radiation up or down according to user-defined amounts
! To apply different levels of climate control to different times of year add multiple copies of this logic into your simulation and change the window.

if (date_within('[date1], [date2]') = 1) then
   maxt = maxt + [MaxtChange]
   mint = mint + [MintChange]
   rain = rain + rain * [RainChange] / 100
   radn = radn + radn * [RadnChange] / 100
   co2 = [CO2]
 endif
```
      on Init:
```
co2 = [CO2]
tav = tav + ([MaxtChange] + [MintChange]) / 2
```
    area paddock -> /simulations/Sugar with No Climate Change/paddock
      outputfile -> /simulations/Sugar with No Climate Change/paddock/outputfile: filename=Sugar with Climate Change 350ppm.out; title=Sugar with Climate Change 350ppm
        variables -> /simulations/Sugar with No Climate Change/paddock/outputfile/Variables
        events Reporting Frequency -> /simulations/Sugar with No Climate Change/paddock/outputfile/Reporting Frequency
  simulation Sugar with Climate Change 450ppm -> /simulations/Sugar with No Climate Change
    manager ClimateControl
      # Climate Control Window
      date1 = 1-jan  # Enter window START date (dd-mmm)
      date2 = 31-dec  # Enter window END date (dd-mmm)
      # Climate Change Parameters
      MaxtChange = 0  # Change in maximum temperature (oC)
      MintChange = 0  # Change in minimum temperature (oC)
      RainChange = 0  # Relative change in daily rainfall (%)
      RadnChange = 0  # Relative change in daily radiation (%)
      CO2 = 450  # Atmospheric CO2 Concentration (ppm)
      on prenewmet:
      script: same as in Sugar with Climate Change 350ppm.ClimateControl
      on Init:
```
co2 = [CO2]
tav = tav + ([MaxtChange] + [MintChange]) / 2
```
    area paddock -> /simulations/Sugar with No Climate Change/paddock
      outputfile -> /simulations/Sugar with No Climate Change/paddock/outputfile: filename=Sugar with Climate Change 450ppm.out; title=Sugar with Climate Change 450ppm
        variables -> /simulations/Sugar with No Climate Change/paddock/outputfile/Variables
        events Reporting Frequency -> /simulations/Sugar with No Climate Change/paddock/outputfile/Reporting Frequency
  simulation Sugar with Climate Change 550ppm -> /simulations/Sugar with No Climate Change
    manager ClimateControl
      # Climate Control Window
      date1 = 1-jan  # Enter window START date (dd-mmm)
      date2 = 31-dec  # Enter window END date (dd-mmm)
      # Climate Change Parameters
      MaxtChange = 0  # Change in maximum temperature (oC)
      MintChange = 0  # Change in minimum temperature (oC)
      RainChange = 0  # Relative change in daily rainfall (%)
      RadnChange = 0  # Relative change in daily radiation (%)
      CO2 = 550  # Atmospheric CO2 Concentration (ppm)
      on prenewmet:
      script: same as in Sugar with Climate Change 350ppm.ClimateControl
      on Init:
```
co2 = [CO2]
tav = tav + ([MaxtChange] + [MintChange]) / 2
```
    area paddock -> /simulations/Sugar with No Climate Change/paddock
      outputfile -> /simulations/Sugar with No Climate Change/paddock/outputfile: filename=Sugar with Climate Change 550ppm.out; title=Sugar with Climate Change 550ppm
        variables -> /simulations/Sugar with No Climate Change/paddock/outputfile/Variables
        events Reporting Frequency -> /simulations/Sugar with No Climate Change/paddock/outputfile/Reporting Frequency
  simulation Sugar with Climate Change 650ppm -> /simulations/Sugar with No Climate Change
    manager ClimateControl
      # Climate Control Window
      date1 = 1-jan  # Enter window START date (dd-mmm)
      date2 = 31-dec  # Enter window END date (dd-mmm)
      # Climate Change Parameters
      MaxtChange = 0  # Change in maximum temperature (oC)
      MintChange = 0  # Change in minimum temperature (oC)
      RainChange = 0  # Relative change in daily rainfall (%)
      RadnChange = 0  # Relative change in daily radiation (%)
      CO2 = 650  # Atmospheric CO2 Concentration (ppm)
      on prenewmet:
      script: same as in Sugar with Climate Change 350ppm.ClimateControl
      on Init:
```
co2 = [CO2]
tav = tav + ([MaxtChange] + [MintChange]) / 2
```
    area paddock -> /simulations/Sugar with No Climate Change/paddock
      outputfile -> /simulations/Sugar with No Climate Change/paddock/outputfile: filename=Sugar with Climate Change 650ppm.out; title=Sugar with Climate Change 650ppm
        variables -> /simulations/Sugar with No Climate Change/paddock/outputfile/Variables
        events Reporting Frequency -> /simulations/Sugar with No Climate Change/paddock/outputfile/Reporting Frequency
  simulation Sugar with Climate Change 750ppm -> /simulations/Sugar with No Climate Change
    manager ClimateControl
      # Climate Control Window
      date1 = 1-jan  # Enter window START date (dd-mmm)
      date2 = 31-dec  # Enter window END date (dd-mmm)
      # Climate Change Parameters
      MaxtChange = 0  # Change in maximum temperature (oC)
      MintChange = 0  # Change in minimum temperature (oC)
      RainChange = 0  # Relative change in daily rainfall (%)
      RadnChange = 0  # Relative change in daily radiation (%)
      CO2 = 750  # Atmospheric CO2 Concentration (ppm)
      on prenewmet:
      script: same as in Sugar with Climate Change 350ppm.ClimateControl
      on Init:
```
co2 = [CO2]
tav = tav + ([MaxtChange] + [MintChange]) / 2
```
    area paddock -> /simulations/Sugar with No Climate Change/paddock
      outputfile -> /simulations/Sugar with No Climate Change/paddock/outputfile: filename=Sugar with Climate Change 750ppm.out; title=Sugar with Climate Change 750ppm
        variables -> /simulations/Sugar with No Climate Change/paddock/outputfile/Variables
        events Reporting Frequency -> /simulations/Sugar with No Climate Change/paddock/outputfile/Reporting Frequency
  memo INI changes
    Jody Biggs originally simulated climate change by manually changing the RUE and transp_eff_cf in the ini file.

    He used the following equations

     rue = rue * (0.000142*CO2 + 0.94995)
    transp_eff_cf = transp_eff_cf  * (0.0008 * CO2 + (1-0.0008*350))

    It is his equations I have put into the source code, so that when people use the Climate Control now, it automatically uses these equations to change the rue and transp_eff_cf
    without the user having to manually change these values in the ini file.
  simulation Sugar with INI changes 350ppm -> /simulations/Sugar with No Climate Change
    area paddock -> /simulations/Sugar with No Climate Change/paddock
      sugar -> /simulations/Sugar with No Climate Change/paddock/sugar
        ini: filename=Sugar350co2.xml
      outputfile -> /simulations/Sugar with No Climate Change/paddock/outputfile: filename=Sugar with INI changes 350ppm.out; title=Sugar with INI changes 350ppm
        variables -> /simulations/Sugar with No Climate Change/paddock/outputfile/Variables
        events Reporting Frequency -> /simulations/Sugar with No Climate Change/paddock/outputfile/Reporting Frequency
  simulation Sugar with INI changes 450ppm -> /simulations/Sugar with No Climate Change
    area paddock -> /simulations/Sugar with No Climate Change/paddock
      sugar -> /simulations/Sugar with No Climate Change/paddock/sugar
        ini: filename=Sugar450co2.xml
      outputfile -> /simulations/Sugar with No Climate Change/paddock/outputfile: filename=Sugar with INI changes 450ppm.out; title=Sugar with INI changes 450ppm
        variables -> /simulations/Sugar with No Climate Change/paddock/outputfile/Variables
        events Reporting Frequency -> /simulations/Sugar with No Climate Change/paddock/outputfile/Reporting Frequency
  simulation Sugar with INI changes 550ppm -> /simulations/Sugar with No Climate Change
    area paddock -> /simulations/Sugar with No Climate Change/paddock
      sugar -> /simulations/Sugar with No Climate Change/paddock/sugar
        ini: filename=Sugar550co2.xml
      outputfile -> /simulations/Sugar with No Climate Change/paddock/outputfile: filename=Sugar with INI changes 550ppm.out; title=Sugar with INI changes 550ppm
        variables -> /simulations/Sugar with No Climate Change/paddock/outputfile/Variables
        events Reporting Frequency -> /simulations/Sugar with No Climate Change/paddock/outputfile/Reporting Frequency
  simulation Sugar with INI changes 650ppm -> /simulations/Sugar with No Climate Change
    area paddock -> /simulations/Sugar with No Climate Change/paddock
      sugar -> /simulations/Sugar with No Climate Change/paddock/sugar
        ini: filename=Sugar650co2.xml
      outputfile -> /simulations/Sugar with No Climate Change/paddock/outputfile: filename=Sugar with INI changes 650ppm.out; title=Sugar with INI changes 650ppm
        variables -> /simulations/Sugar with No Climate Change/paddock/outputfile/Variables
        events Reporting Frequency -> /simulations/Sugar with No Climate Change/paddock/outputfile/Reporting Frequency
  simulation Sugar with INI changes 750ppm -> /simulations/Sugar with No Climate Change
    area paddock -> /simulations/Sugar with No Climate Change/paddock
      sugar -> /simulations/Sugar with No Climate Change/paddock/sugar
        ini: filename=Sugar750co2.xml
      outputfile -> /simulations/Sugar with No Climate Change/paddock/outputfile: filename=Sugar with INI changes 750ppm.out; title=Sugar with INI changes 750ppm
        variables -> /simulations/Sugar with No Climate Change/paddock/outputfile/Variables
        events Reporting Frequency -> /simulations/Sugar with No Climate Change/paddock/outputfile/Reporting Frequency
