folder simulations: version=36; creator=Apsim 7.7-r3618
  simulation Sugar (OLD)
    manager2 Script(C#)
      MethodToUse = Kimball_Bellamy_1986  # Method to use for calculating hourly values
```csharp
using System;
using ModelFramework;

public class Script 
{      
   [Param] string MethodToUse;         // The value for this will come from the Properties page.
   [Input] DateTime Today;             // Equates to the value of the current simulation date - value comes from CLOCK
   [Input] double Latitude;
   [Output] [Units("0/1")] int HourlyMetExists;
   [Output] [Units("hrs")] double DayLength;
   [Output] [Units("MJ/m^2")] double[] RadnHourly = new double[24];        
   [Output] [Units("oC")] double[] TempHourly = new double[24];
   [Output] [Units("hPa")] double[] VPDHourly= new double[24];

  
   //Local Variables (they get assigned from NewMet Argument in the EventHandler)

   double Radn;
   double MaxT;
   double MinT;
   double vp = -99999.9;       //vp is optional in the met file so, do this assignment of a non valid number to test if vp was read in from met file.


  
   // The following event handler will be called each day just after Met variables are retrieved.
   [EventHandler] public void OnpreNewmet(NewMetType NewMet)
   {
      Radn = NewMet.radn;
      MaxT = NewMet.maxt;
      MinT = NewMet.mint;
      vp = NewMet.vp;
      
      if (MethodToUse == "Kimball_Bellamy_1986")
      {
         Kimball_Bellamy_1986();
      }

   }
   
   
   private void Kimball_Bellamy_1986()
   {
      //Generation of diurnal solar radiation, temperature, and humidity patterns
      //B.A.Kimball, L.A. Bellamy
      //U.S. Water Conservation Laboratory, 4331 East Broadway, Phoenix, AZ 85040 U.S.A.
      //(Accepted 20 February 1986) 
      
      //Energy in Agriculture, 5 (1986) 185--197 185 
      //Elsevier Sciences Publishers B.V., Amsterdam-- Printed in The Netherlands
      
      HourlyMetExists = 1;   //set a variable to tell other modules Hourly Met Values exist.
      DayLength = DayLengthCalc(Today.DayOfYear, Latitude, 0);
      
      for (int hour = 0; hour < 24; hour++)
      {   
         RadnHourly[hour] = HourlyR((double) hour, DayLength, Radn);
         TempHourly[hour] = HourlyT((double) hour, DayLength, MaxT, MinT);
         VPDHourly[hour] = HourlyVPD(TempHourly[hour], vp, MinT);
      }
      
   }
   
   
   
   
   private double DayLengthCalc(int day, double lat, double sun_angle)
   {
      double DEC = 0;
      double DECr = 0;
      double LATr = 0;
      double HS = 0;
      double sun_alt = 0;
      double coshra = 0;
      double slsd = 0;
      double clcd = 0;
      double altmn = 0;
      double altmx = 0;
      double alt = 0;
      const double pi = 3.14159265359;

      sun_alt = sun_angle * 2.0 * pi / 365.25;

      DEC = 23.45 * Math.Sin(2.0 * pi / 365.25 * (day - 82.25));
      DECr = DEC * 2.0 * pi / 360.0;
      LATr = lat * 2.0 * pi / 360.0;

      if (lat == 90) 
      {
         coshra = Math.Sign(-DEC) * Math.Sign(lat);
      } 
      else 
      {
         slsd = Math.Sin(LATr) * Math.Sin(DECr);
         clcd = Math.Cos(LATr) * Math.Cos(DECr);

         altmn = Math.Asin(bound(slsd - clcd, -1.0, 1.0));
         altmx = Math.Asin(bound(slsd + clcd, -1.0, 1.0));
         alt = bound(sun_alt, altmn, altmx);

         // get cos of the hour angle

         coshra = (Math.Sin(alt) - slsd) / clcd;
         coshra = bound(coshra, -1.0, 1.0);
      }

      HS = Math.Acos(coshra);


      return HS * 2.0 * 24.0 / (2.0 * pi);

   }
   
   private double bound(double Value, double Lower, double Upper)
   {
      Value = Math.Min(Value, Upper);
      Value = Math.Max(Value, Lower);
      return Value;
   }
   
   
   
   
   
   
   private double HourlyR(double SolarTime, double DayLength, double Radn)
   {
      //SolarTime (is t)
      //DayLength (is D)
      // Radn is daily radiation. (ie. radn from met file) (is Sd)
      
      double S_noon;
      double S_i;
      double tb, te;     //Solar time begining of the hour, and end of the hour
      double tr, ts;     //Solar time of SunRise, and SunSet
      const double pi = 3.14159265359;

      
      
      S_noon = ((Radn * pi) / (2 * DayLength)) * (1000000.0 / 3600.0); 
      
      
      tb = SolarTime;            
      te = SolarTime + 1.0;     //solar time is in hours, so we add 1 hour.
      tr = 12 - (DayLength / 2);   //sunrise
      ts = 12 + (DayLength / 2);   //sunset
      
      //if this hour is the hour when sunrise happens, 
      if ((tb < tr) && (te > tr))
      {
         tb = tr;  //set start time for the hour to sunrise.
      }
      //if this hour is the hour when sunset happens, 
      if ((tb < ts) && (te > ts))
      {
         te = ts;  //set end time for the hour to sunset.
      }
       
      if ((tb < ts) && (te > tr))
      {
         //Do the integration over this hour
         S_i = S_noon * (3600.0 / 1000000.0) * (DayLength / pi) * 
            ( Math.Sin(pi * ((te - 12) / DayLength)) - Math.Sin(pi * ((tb - 12) / DayLength)));   
      }
      else
      {
         //it is night time so there is no radiation.
         S_i = 0.0;    
      }
      
      
      return S_i;
   }
   
   
   
   
   
   private double HourlyT(double t, double Da, double tmax, double tmin)
   {
      //t is solar time in hours not temperature.
      //Da is DayLength (D)
      
      double returnValue = 0.0;

      double TimeMin = 0;
      double TimeRise = 0;
      double TimeSet = 0;
      double d = 0;
      double Tset = 0;

      const double a = 1.86;
      const double b = 2.2;
      const double c = 0.17;

      //Da = DayLength(day, lat, 0);
      TimeRise = (12 - Da / 2);
      TimeSet = (12 + Da / 2);
      TimeMin = TimeRise - c;
      Tset = tmin + (tmax - tmin) * Math.Sin(3.14159 * (TimeSet - TimeMin) / (Da + 2 * a));
      d = (Tset - tmin) / (Math.Exp(b) - 1);

      if (t >= TimeRise & t <= TimeSet) {
         returnValue = tmin + (tmax - tmin) * Math.Sin(3.14159 * (t - TimeMin) / (Da + 2 * a));
      } else if (t < TimeRise) {
         returnValue = (tmin - d) + (Tset - (tmin - d)) * Math.Exp(-b * (t + 24 - TimeSet) / (24 - Da - c));
      } else {
         returnValue = (tmin - d) + (Tset - (tmin - d)) * Math.Exp(-b * (t - TimeSet) / (24 - Da - c));
      }
      return returnValue;

   }

   
   
   
   
   
   private double HourlyVPD(double Temp_hour, double VP, double Temp_min)
   {
      
      double vpd_hour;  //nb. the units are in hPa
      
      //was vp read in from the met file
      if (VP != -99999.9)
      {
         //assume the VP (vapour pressue) was constant throughout the day 
         //(ie. vp at every hour in the day was the same)
         vpd_hour = svp(Temp_hour) - VP;
      }
      else
      {
         //Since we don't have VP from met file we need to approximate one. 
         //Once again we make the assumption VP is constant throughout the day.
         //We know that when dew forms VP and SVP are equal.
         //Also we know that dew usually forms when the temperature is at it's minimum temp during the day. 
         //therefore the constant VP for the entire day should be the same as the SVP at Tmin.
         //(nb. this assumtion can break down in summer when Dew does not form at the coldest temperature in the day) 
         
         vpd_hour = svp(Temp_hour) - svp(Temp_min);
      }
      
      vpd_hour = Math.Max(vpd_hour, 0.010);  //restrict how small the deficit can be.
      
      return vpd_hour;
   }
      
   private double svp(double Temp)
   {
     //   ! sv- This function was extracted from inside the  cproc_transp_eff1() function 

      //   *+  Purpose
      //   *       Saturated Vapour Pressure.
      //   ! function to get saturation vapour pressure for a given temperature in oC (kpa)
      //
      //   !+  Assumptions
      //   !       the temperatures are > -237.3 oC for the svp function.

      double l_svp;
      double mb2kpa;
      double kpa2hpa = 10;  //kpa = 1000pa , hpa = 100pa
      
      //! convert pressure mbar to kpa  
      mb2kpa = 100.0 / 1000.0;     //! 1000 mbar = 100 kpa 
        
      l_svp = 6.1078 * Math.Exp(17.269 * Temp / (237.3 + Temp)) * mb2kpa;       

      return l_svp * kpa2hpa;  //changed to return units in hpa instead of kpa.
   }       
   
   
   
}
```
    metfile met: filename=%apsim%\Examples\MetFiles\Ingham.met
    clock
      start_date = 01/01/1990  # Enter the start date of the simulation
      end_date = 31/12/2000  # Enter the end date of the simulation
    summaryfile
    area paddock
      Soil: SoilType=Black Vertosol; LocalName=Waco; Site=Jimbour; NearestTown=Jimbour, Q 4352; Region=South East Queensland; NaturalVegetation=Grassland, mainly Qld bluegrass; Latitude=0; Longitude=0
        InitialWater Initial water: FractionFull=0.5004617; PercentMethod=FilledFromTop
        Water
          Thickness  BD    AirDry  LL15  DUL   SAT
          150        1.02  0.14    0.29  0.54  0.59
          150        1.03  0.26    0.29  0.53  0.58
          300        1.02  0.29    0.29  0.54  0.59
          300        1.02  0.29    0.29  0.54  0.58
          300        1.06  0.3     0.3   0.52  0.57
          300        1.11  0.31    0.31  0.5   0.55
          300        1.12  0.32    0.32  0.5   0.55
          300        1.15  0.33    0.33  0.48  0.53
          300        1.18  0.34    0.34  0.47  0.52
          300        1.2   0.35    0.35  0.46  0.51
          300        1.25  0.36    0.36  0.44  0.49
          SoilCrop Barley
            LL=[0.29, 0.29, 0.32, 0.38, 0.39, 0.39, 0.41, 0.48, 0.47, 0.46, 0.44]
            KL=[0.1, 0.1, 0.08, 0.06, 0.04, 0.02, 0.01, 0, 0, 0, 0]
            XF=[1, 1, 1, 1, 1, 1, 1, 0, 0, 0, 0]
          SoilCrop Chickpea
            LL=[0.29, 0.29, 0.36, 0.43, 0.51, 0.5, 0.5, 0.48, 0.47, 0.46, 0.44]
            KL=[0.1, 0.1, 0.08, 0.06, 0.04, 0.02, 0.01, 0, 0, 0, 0]
            XF=[1, 1, 1, 1, 1, 1, 1, 0, 0, 0, 0]
          SoilCrop Lucerne
            LL=[0.29, 0.29, 0.29, 0.29, 0.3, 0.31, 0.32, 0.33, 0.34, 0.35, 0.36]
            KL=[0.1, 0.1, 0.1, 0.1, 0.09, 0.09, 0.09, 0.09, 0.09, 0.09, 0.09]
            XF=[1, 1, 1, 1, 1, 1, 1, 1, 1, 1, 1]
          SoilCrop Maize
            LL=[0.29, 0.29, 0.34, 0.34, 0.37, 0.4, 0.42, 0.48, 0.47, 0.46, 0.44]
            KL=[0.1, 0.1, 0.1, 0.08, 0.06, 0.04, 0.02, 0, 0, 0, 0]
            XF=[1, 1, 1, 1, 1, 1, 1, 0, 0, 0, 0]
          SoilCrop Perennial Grass
            LL=[0.29, 0.29, 0.39, 0.41, 0.4, 0.4, 0.41, 0.41, 0.4, 0.4, 0.42]
            KL=[0.1, 0.1, 0.1, 0.1, 0.09, 0.07, 0.05, 0, 0, 0, 0]
            XF=[1, 1, 1, 1, 1, 1, 1, 0, 0, 0, 0]
          SoilCrop Sorghum
            LL=[0.29, 0.29, 0.35, 0.38, 0.4, 0.4, 0.4, 0.48, 0.47, 0.46, 0.44]
            KL=[0.1, 0.1, 0.1, 0.08, 0.06, 0.04, 0.02, 0, 0, 0, 0]
            XF=[1, 1, 1, 1, 1, 1, 1, 0, 0, 0, 0]
          SoilCrop Wheat
            LL=[0.29, 0.29, 0.32, 0.32, 0.35, 0.38, 0.41, 0.48, 0.47, 0.46, 0.44]
            KL=[0.1, 0.1, 0.08, 0.06, 0.04, 0.02, 0.01, 0, 0, 0, 0]
            XF=[1, 1, 1, 1, 1, 1, 1, 0, 0, 0, 0]
          SoilCrop Sugar
            LL=[0.29, 0.29, 0.32, 0.32, 0.35, 0.38, 0.41, 0.48, 0.47, 0.46, 0.44]
            KL=[0.1, 0.1, 0.08, 0.06, 0.04, 0.02, 0.01, 0, 0, 0, 0]
            XF=[1, 1, 1, 1, 1, 1, 1, 0, 0, 0, 0]
        SoilWater: SummerCona=3.5; SummerU=6; SummerDate=1-Nov; WinterCona=3.5; WinterU=6; WinterDate=1-Apr; DiffusConst=40; DiffusSlope=16; Salb=0.13; CN2Bare=73; CNRed=20; CNCov=0.8; Thickness=[150, 150, 300, 300, 300, 300, 300, 300, 300, 300, 300]; SWCON=[0.3, 0.3, 0.3, 0.3, 0.3, 0.3, 0.3, 0.3, 0.3, 0.3, 0.3]
        SoilOrganicMatter: RootCN=40; RootWt=200; SoilCN=12.5; EnrACoeff=7.4; EnrBCoeff=0.2
          Thickness  OC    FBiom  FInert
          150        1.04  0.025  0.4
          150        0.89  0.02   0.6
          300        0.89  0.015  0.8
          300        0.89  0.01   0.9
          300        0.77  0.01   0.95
          300        0.45  0.01   0.95
          300        0.27  0.01   0.95
          300        0.22  0.01   0.95
          300        0.16  0.01   0.95
          300        0.13  0.01   0.95
          300        0.12  0.01   0.95
        Analysis
          Thickness  EC    PH
          150        0.2   8.4
          150        0.25  8.8
          300        0.31  9
          300        0.4   9.2
          300        0.59  9.2
          300        0.84  9.1
          300        0.93  9
          300        1.01  9
          300        1.06  8.9
          300        1.05  8.9
          300        1.01  8.9
        Sample Initial nitrogen
          Thickness  NO3    NH4
          150        6.500  0.600
          150        2.100  0.100
          300        2.100  0.100
          300        1.700  0.100
          300        1.700  0.100
          300        1.700  0.100
          300        1.700  0.100
          300        1.700  0.100
          300        1.700  0.100
          300        1.700  0.100
          300        1.700  0.100
      fertiliser
      sugar
        ini: filename=SugarOLD.xml
      folder Manager folder
        manager SUGAR management
          # Sugar plant crop management parameters
          crop = sugar  # Enter name of crop to sow
          planting_day = 1-apr  # Enter planting date (dd-mmm)
          plantlen = 450  # Duration of a plant crop (days) (30 days/month * 15 months)
          plant_stalks = 10  # Stalk density of plant crop (/m2)
          variety = q117  # Planting variety
          sowing_depth = 150  # Planting depth mm)
          # Ratoon management parameters
          NoRatoons = 4  # Number of ratoons (max = 5)
          ratoonlen = 390  # Duration of a ratoon crop (days) (30 days/month * 13 months)
          ratoon_stalks = 10  # Stalk density of ratoon crop (/m2)
          on start_of_day:
```
            ! -----------------------------------------------------------------
            ! Book keeping to round days to integer values
            plantlen = nearest_int(plantlen)
            ratoonlen = nearest_int(ratoonlen)

            ! Initialise and set a time counter for entire run
            dah = 0

            if (sugar.crop_status = 'alive') then
               dah = 0

               ! Set harvest dates for each crop phase
               if (sugar.DaysAfterSowing = [plantlen] and ratoon_no = 0) or
                  (sugar.DaysAfterSowing = [ratoonlen] and ratoon_no > 0) then

                  sugar harvest

                  if (ratoon_no = [NoRatoons] + 1) then
                     ! plough the crop out
                     sugar kill_crop
                     sugar end_crop

                  else
                     ! Set stalk density
                     sugar.plants = [ratoon_stalks]
                  endif
               else
                  ! We have not reached the harvest date for this ratoon.
               endif

            elseif (sugar.crop_status = 'dead') then
               sugar harvest
               sugar end_crop

            elseif (sugar.crop_status = 'out') and (today = date('[planting_day]') then
               sugar sow plants = 10 (), cultivar = [variety], sowing_depth = [sowing_depth]
               sugar.plants = [plant_stalks]
               dah = 0

            else
               dah = dah + 1
            endif
```
          on init:
```
            nextcrop = 0
            fallowin = 0
            plantlen = 0
            ratoonlen = 0
```
        manager Fertilise on fixed date
          # When should fertiliser be applied
          fert_date = 01-sep  # Enter fertiliser date (dd-mmm)
          fert_criteria = 1000  # Don't add fertiliser if N in top 2 layers exceeds (kg/ha)
          # Fertiliser application details
          fertmodule = fertiliser  # Module used to apply the fertiliser
          fert_amount = 200  # Amount of fertiliser to apply (kg/ha)
          fert_type = urea_N  # Sowing fertiliser type
          on start_of_day:
```
         if (today = date('[fert_date]') then
            N_topsoil = no3(1) + nh4(1) + no3(2) + nh4(2)
            if (N_topsoil < [fert_criteria]) then
               [fertmodule] apply amount = [fert_amount] (kg/ha), depth = 50 (mm), type = [fert_type] ()
            endif
         endif
```
      outputfile sw_supply: filename=Sugar (OLD) sw_supply.out; title=Sugar (OLD) sw_supply
        variables
          variable:
            dd/mm/yyyy as Date
            day_of_year
            sw_supply
            rlv
            rlv_tot as rlv_without_air_filled_pore_space
        events Reporting Frequency: event=post
      outputfile sw_uptake: filename=Sugar (OLD) sw_uptake.out; title=Sugar (OLD) sw_uptake
        variables
          variables: dd/mm/yyyy as Date, day_of_year, sw_uptake, ep, sw_uptake()
        events Reporting Frequency: event=post
  simulation Sugar (NEW) -> /simulations/Sugar (OLD)
    area paddock -> /simulations/Sugar (OLD)/paddock
      sugar
        ini: filename=SugarNEW.xml
      outputfile sw_supply -> /simulations/Sugar (OLD)/paddock/sw_supply: filename=Sugar (NEW) sw_supply.out; title=Sugar (NEW) sw_supply
        variables -> /simulations/Sugar (OLD)/paddock/sw_supply/Variables
        events Reporting Frequency -> /simulations/Sugar (OLD)/paddock/sw_supply/Reporting Frequency
      outputfile sw_uptake -> /simulations/Sugar (OLD)/paddock/sw_uptake: filename=Sugar (NEW) sw_uptake.out; title=Sugar (NEW) sw_uptake
        variables -> /simulations/Sugar (OLD)/paddock/sw_uptake/Variables
        events Reporting Frequency -> /simulations/Sugar (OLD)/paddock/sw_uptake/Reporting Frequency
  memo
    Sugar(OLD) has ini file WITHOUT the sw_supply_per_rootlength in the ini file.

    This means it uses the KL approach to calculating the sw supply.

    Sugar(NEW) has ini file WITH the sw_supply_per_rootlength in the ini file

    so it uses the RootLength approach to calculating the sw supply.

    Because sw_supply is not an output variable so use sw_uptake instead.
    The difference is sw_uptake only will uptake what ep (sw_demand) requests.
    Even if the roots have a greater potential to uptake more, as long as ep does not request that water it will not be uptaken.
