folder simulations: version=36; creator=Apsim 7.7-r3618
  simulation Sugar
    metfile met: filename=%apsim%/Examples/MetFiles/Ingham.met
    clock
      start_date = 01/01/1990  # Enter the start date of the simulation
      end_date = 31/12/2000  # Enter the end date of the simulation
    summaryfile
    area paddock
      Soil: LocalName=Waco; Site=Jimbour; Region=South East Queensland
        SoilType = Black Vertosol  # Soil description
        NearestTown = Jimbour, Q 4352
        NaturalVegetation = Grassland, mainly Qld bluegrass
        InitialWater Initial water: FractionFull=0.5004617; PercentMethod=FilledFromTop
        Water
          Thickness  BD    AirDry  LL15  DUL   SAT
          150        1.02  0.14    0.29  0.54  0.59
          150        1.03  0.26    0.29  0.53  0.58
          300        1.02  0.29    0.29  0.54  0.59
          300        1.02  0.29    0.29  0.54  0.58
          300        1.06  0.3     0.3   0.52  0.57
          300        1.11  0.31    0.31  0.5   0.55
          300        1.12  0.32    0.32  0.5   0.55
          300        1.15  0.33    0.33  0.48  0.53
          300        1.18  0.34    0.34  0.47  0.52
          300        1.2   0.35    0.35  0.46  0.51
          300        1.25  0.36    0.36  0.44  0.49
          SoilCrop Barley
            LL=[0.29, 0.29, 0.32, 0.38, 0.39, 0.39, 0.41, 0.48, 0.47, 0.46, 0.44]
            KL=[0.1, 0.1, 0.08, 0.06, 0.04, 0.02, 0.01, 0, 0, 0, 0]
            XF=[1, 1, 1, 1, 1, 1, 1, 0, 0, 0, 0]
          SoilCrop Chickpea
            LL=[0.29, 0.29, 0.36, 0.43, 0.51, 0.5, 0.5, 0.48, 0.47, 0.46, 0.44]
            KL=[0.1, 0.1, 0.08, 0.06, 0.04, 0.02, 0.01, 0, 0, 0, 0]
            XF=[1, 1, 1, 1, 1, 1, 1, 0, 0, 0, 0]
          SoilCrop Lucerne
            LL=[0.29, 0.29, 0.29, 0.29, 0.3, 0.31, 0.32, 0.33, 0.34, 0.35, 0.36]
            KL=[0.1, 0.1, 0.1, 0.1, 0.09, 0.09, 0.09, 0.09, 0.09, 0.09, 0.09]
            XF=[1, 1, 1, 1, 1, 1, 1, 1, 1, 1, 1]
          SoilCrop Maize
            LL=[0.29, 0.29, 0.34, 0.34, 0.37, 0.4, 0.42, 0.48, 0.47, 0.46, 0.44]
            KL=[0.1, 0.1, 0.1, 0.08, 0.06, 0.04, 0.02, 0, 0, 0, 0]
            XF=[1, 1, 1, 1, 1, 1, 1, 0, 0, 0, 0]
          SoilCrop Perennial Grass
            LL=[0.29, 0.29, 0.39, 0.41, 0.4, 0.4, 0.41, 0.41, 0.4, 0.4, 0.42]
            KL=[0.1, 0.1, 0.1, 0.1, 0.09, 0.07, 0.05, 0, 0, 0, 0]
            XF=[1, 1, 1, 1, 1, 1, 1, 0, 0, 0, 0]
          SoilCrop Sorghum
            LL=[0.29, 0.29, 0.35, 0.38, 0.4, 0.4, 0.4, 0.48, 0.47, 0.46, 0.44]
            KL=[0.1, 0.1, 0.1, 0.08, 0.06, 0.04, 0.02, 0, 0, 0, 0]
            XF=[1, 1, 1, 1, 1, 1, 1, 0, 0, 0, 0]
          SoilCrop Wheat
            LL=[0.29, 0.29, 0.32, 0.32, 0.35, 0.38, 0.41, 0.48, 0.47, 0.46, 0.44]
            KL=[0.1, 0.1, 0.08, 0.06, 0.04, 0.02, 0.01, 0, 0, 0, 0]
            XF=[1, 1, 1, 1, 1, 1, 1, 0, 0, 0, 0]
          SoilCrop Sugar
            LL=[0.29, 0.29, 0.32, 0.32, 0.35, 0.38, 0.41, 0.48, 0.47, 0.46, 0.44]
            KL=[0.1, 0.1, 0.08, 0.06, 0.04, 0.02, 0.01, 0, 0, 0, 0]
            XF=[1, 1, 1, 1, 1, 1, 1, 0, 0, 0, 0]
        SoilWater: SummerCona=3.5; SummerU=6; SummerDate=1-Nov; WinterCona=3.5; WinterU=6; WinterDate=1-Apr; DiffusConst=40; DiffusSlope=16; Salb=0.13; CN2Bare=73; CNRed=20; CNCov=0.8; Thickness=[150, 150, 300, 300, 300, 300, 300, 300, 300, 300, 300]; SWCON=[0.3, 0.3, 0.3, 0.3, 0.3, 0.3, 0.3, 0.3, 0.3, 0.3, 0.3]
        SoilOrganicMatter: RootCN=40; RootWt=200; SoilCN=12.5; EnrACoeff=7.4; EnrBCoeff=0.2
          Thickness  OC    FBiom  FInert
          150        1.04  0.025  0.4
          150        0.89  0.02   0.6
          300        0.89  0.015  0.8
          300        0.89  0.01   0.9
          300        0.77  0.01   0.95
          300        0.45  0.01   0.95
          300        0.27  0.01   0.95
          300        0.22  0.01   0.95
          300        0.16  0.01   0.95
          300        0.13  0.01   0.95
          300        0.12  0.01   0.95
        Analysis
          Thickness  EC    PH
          150        0.2   8.4
          150        0.25  8.8
          300        0.31  9
          300        0.4   9.2
          300        0.59  9.2
          300        0.84  9.1
          300        0.93  9
          300        1.01  9
          300        1.06  8.9
          300        1.05  8.9
          300        1.01  8.9
        Sample Initial nitrogen
          Thickness  NO3    NH4
          150        6.500  0.600
          150        2.100  0.100
          300        2.100  0.100
          300        1.700  0.100
          300        1.700  0.100
          300        1.700  0.100
          300        1.700  0.100
          300        1.700  0.100
          300        1.700  0.100
          300        1.700  0.100
          300        1.700  0.100
      fertiliser
      sugar
      folder Manager folder
        manager SUGAR management
          # Sugar plant crop management parameters
          crop = sugar  # Enter name of crop to sow
          planting_day = 1-apr  # Enter planting date (dd-mmm)
          plantlen = 450  # Duration of a plant crop (days) (30 days/month * 15 months)
          plant_stalks = 10  # Stalk density of plant crop (/m2)
          variety = q117  # Planting variety
          sowing_depth = 150  # Planting depth mm)
          # Ratoon management parameters
          NoRatoons = 4  # Number of ratoons (max = 5)
          ratoonlen = 390  # Duration of a ratoon crop (days) (30 days/month * 13 months)
          ratoon_stalks = 10  # Stalk density of ratoon crop (/m2)
          on start_of_day:
```
            ! -----------------------------------------------------------------
            ! Book keeping to round days to integer values
            plantlen = nearest_int(plantlen)
            ratoonlen = nearest_int(ratoonlen)

            ! Initialise and set a time counter for entire run
            dah = 0

            if (sugar.crop_status = 'alive') then
               dah = 0

               ! Set harvest dates for each crop phase
               if (sugar.DaysAfterSowing = [plantlen] and ratoon_no = 0) or
                  (sugar.DaysAfterSowing = [ratoonlen] and ratoon_no > 0) then

                  sugar harvest

                  if (ratoon_no = [NoRatoons] + 1) then
                     ! plough the crop out
                     sugar kill_crop
                     sugar end_crop

                  else
                     ! Set stalk density
                     sugar.plants = [ratoon_stalks]
                  endif
               else
                  ! We have not reached the harvest date for this ratoon.
               endif

            elseif (sugar.crop_status = 'dead') then
               sugar harvest
               sugar end_crop

            elseif (sugar.crop_status = 'out') and (today = date('[planting_day]') then
               sugar sow plants = 10 (), cultivar = [variety], sowing_depth = [sowing_depth]
               sugar.plants = [plant_stalks]
               dah = 0

            else
               dah = dah + 1
            endif
```
          on init:
```
            nextcrop = 0
            fallowin = 0
            plantlen = 0
            ratoonlen = 0
```
        manager Fertilise on fixed date
          # When should fertiliser be applied
          fert_date = 01-sep  # Enter fertiliser date (dd-mmm)
          fert_criteria = 1000  # Don't add fertiliser if N in top 2 layers exceeds (kg/ha)
          # Fertiliser application details
          fertmodule = fertiliser  # Module used to apply the fertiliser
          fert_amount = 200  # Amount of fertiliser to apply (kg/ha)
          fert_type = urea_N  # Sowing fertiliser type
          on start_of_day:
```
         if (today = date('[fert_date]') then
            N_topsoil = no3(1) + nh4(1) + no3(2) + nh4(2)
            if (N_topsoil < [fert_criteria]) then
               [fertmodule] apply amount = [fert_amount] (kg/ha), depth = 50 (mm), type = [fert_type] ()
            endif
         endif
```
      outputfile: filename=Sugar.out; title=Sugar
        variables
          variables: dd/mm/yyyy as Date, transp_eff
        events Reporting Frequency: event=post
  simulation Sugar (with CO2) -> /simulations/Sugar
    manager Climate Change Yearly Increase
      # Climate Control Year
      startyear = 1990  # Enter year to start climate change from
      # Yearly Increase in Climate Change Parameters
      MaxtChange = 0  # Change in maximum temperature (oC)
      MintChange = 0  # Change in minimum temperature (oC)
      RainChange = 0  # Relative change in daily rainfall (%)
      RadnChange = 0  # Relative change in daily radiation (%)
      CO2 = 380  # Atmospheric CO2 Concentration (ppm)
      on prenewmet:
```
!  Yearly increase the daily temperatures, rainfall and radiation up or down according to user-defined amounts

if (year > [startyear]) then
   changemultiplier = year - [startyear]
   maxt = maxt + ([MaxtChange] * changemultiplier)
   mint = mint + ([MintChange]  * changemultiplier)
   tav = tavoriginal + ([MaxtChange] + [MintChange]) / 2 * changemultiplier
   rain = rain + rain * (([RainChange] / 100)  * changemultiplier)
   radn = radn + radn * (([RadnChange] / 100)  * changemultiplier)
   co2 = ([CO2]  * changemultiplier)
 endif
```
      on init:
```
tavoriginal = tav
```
    area paddock -> /simulations/Sugar/paddock
      sugar
        ini: filename=Sugar (with CO2).xml
      outputfile -> /simulations/Sugar/paddock/outputfile: filename=Sugar (with CO2).out; title=Sugar (with CO2)
        variables -> /simulations/Sugar/paddock/outputfile/Variables
        events Reporting Frequency -> /simulations/Sugar/paddock/outputfile/Reporting Frequency
  simulation Sugar (TE by Stress)
    metfile met: filename=%apsim%/Examples/MetFiles/Ingham.met
    clock
      start_date = 01/01/1990  # Enter the start date of the simulation
      end_date = 31/12/2000  # Enter the end date of the simulation
    summaryfile
    area paddock
      Soil: same as Sugar.paddock.Soil
      fertiliser
      sugar
        ini: filename=Sugar (TE by Stress).xml
      folder Manager folder: same as Sugar.paddock.Manager folder
      outputfile: filename=Sugar (TE by Stress).out; title=Sugar (TE by Stress)
        variables
          variables: dd/mm/yyyy as Date, transp_eff
        events Reporting Frequency: event=post
  simulation Sugar (TE by Stress)(with CO2) -> /simulations/Sugar (TE by Stress)
    manager Climate Change Yearly Increase: same as Sugar (with CO2).Climate Change Yearly Increase
    area paddock -> /simulations/Sugar (TE by Stress)/paddock
      sugar
        ini: filename=Sugar (TE by Stress)(with CO2).xml
      outputfile -> /simulations/Sugar (TE by Stress)/paddock/outputfile: filename=Sugar (TE by Stress)(with CO2).out; title=Sugar (TE by Stress)(with CO2)
        variables -> /simulations/Sugar (TE by Stress)/paddock/outputfile/Variables
        events Reporting Frequency -> /simulations/Sugar (TE by Stress)/paddock/outputfile/Reporting Frequency
