folder SurfaceOM_Tests: version=36; creator=Apsim 7.8-r3867
  simulation SurfaceOM_Test1
    memo Test1
      No crop, no additions or tillages
      Two initial residues of same type and mass but one has some standing
    clock: start_date=1/1/1988; end_date=30/1/1988
    summaryfile
    metfile met: filename=optimum.met
    area paddock
      outputfile report: filename=SurfaceOM_Test1 report.out; title=SurfaceOM_Test1 report
        variables
          variable:
            day
            year
            surfaceom.surfaceom_wt
            surfaceom.surfaceom_wt_residue1
            surfaceom.surfaceom_wt_residue2
            surfaceom.surfaceom_n_residue1
            surfaceom.surfaceom_n_residue2
            surfaceom.tf
            surfaceom.wf
            surfaceom.cf
        events: event=end_day
      Soil
        Water
          Thickness  BD    AirDry  LL15  DUL   SAT
          150        1.30  .10     .230  .450  .500
          150        1.30  .20     .240  .459  .509
          300        1.29  .20     .240  .45   .510
          300        1.31  .20     .250  .44   .505
          300        1.35  .20     .260  .42   .490
          300        1.36  .20     .270  .41   .480
          300        1.36  .20     .280  .41   .480
        SoilWater: SummerCona=2.5; SummerU=4; SummerDate=1-Nov; WinterCona=2.5; WinterU=4; WinterDate=1-Apr; DiffusConst=88.; DiffusSlope=35.4; Salb=0.13; CN2Bare=80; CNRed=20; CNCov=.8; Thickness=[150, 150, 300, 300, 300, 300, 300]; SWCON=[0.2, 0.2, 0.2, 0.2, 0.2, 0.2, 0.2]
        SoilOrganicMatter: RootCN=20; RootWt=1000; SoilCN=14.5; EnrACoeff=7.4; EnrBCoeff=0.2; OCUnits=Total
          Thickness  OC    FBiom  FInert
          150        1     0.035  0.3
          150        0.84  0.025  0.5
          300        0.77  0.015  0.6
          300        0.65  0.01   0.75
          300        0.54  0.01   0.9
          300        0.48  0.01   0.99
          300        0.43  0.01   0.99
        Analysis: Thickness=[150, 150, 300, 300, 300, 300, 300]; PH=[8.20, 8.50, 8.60, 8.60, 7.40, 5.30, 5.00]
        Sample Initial nitrogen
          Thickness  NO3  NH4
          150        9.2  0.30
          150        7.6  0.30
          300        4.9  0.30
          300        2.7  0.30
          300        1.5  0.30
          300        1.8  0.50
          300        1.4  0.50
        Sample Initial water: Thickness=[150, 150, 300, 300, 300, 300, 300]; SW=[.280, .364, .43, .43, .40, .41, .41]
      surfaceom
        PoolName = residue1       residue2  # Organic Matter pool name
        type = lucerne       lucerne  # Organic Matter type
        mass = 4000        4000  # Initial surface residue (kg/ha)
        cnr = 10          10  # C:N ratio of initial residue
        standing_fraction = 0.0         0.5  # Fraction of residue standing
  simulation SurfaceOM_Test2
    memo Test2
      ================ TEST 2 ===============================
      Two inert residue pools are simulated to test code for adding and removing OM.
      The two pools have the same mass but one pool has a standing fraction.
    clock: start_date=1/1/1988; end_date=30/1/1988
    summaryfile
    metfile met: filename=optimum.met
    area paddock
      outputfile report: filename=SurfaceOM_Test2 report.out; title=SurfaceOM_Test2 report
        variables
          variable:
            day
            year
            surfaceom.surfaceom_wt
            surfaceom.surfaceom_wt_residue1
            surfaceom.surfaceom_wt_residue2
            surfaceom.surfaceom_n_residue1
            surfaceom.surfaceom_n_residue2
            fom_c()
            fom_c
        events: event=end_day
      manager
        on start_of_day:
```
            if day = 10 then
               surfaceom tillage type = user_defined, f_incorp = 0.5, tillage_depth = 100.
            endif
            if day = 15 then
               surfaceom tillage type = user_defined, f_incorp = 0.5, tillage_depth = 0.
            endif
            if day = 20 then
               surfaceom add_surfaceom name=residue1, type = inert, mass=2000, cnr = 10, cpr = 100
            endif
            if day = 25 then
               surfaceom add_surfaceom name=residue3, type = inert, mass=2000, cnr = 10, cpr = 100
            endif
```
      Soil
        Water: same as SurfaceOM_Test1.paddock.soil.Water
        SoilWater: same as SurfaceOM_Test1.paddock.soil.SoilWater
        SoilOrganicMatter: RootCN=20.; RootWt=1000.; SoilCN=14.5; EnrACoeff=7.4; EnrBCoeff=0.2
          Thickness  OC    FBiom  FInert
          150        1.00  .035   0.30
          150        0.84  .025   0.50
          300        0.77  .015   0.60
          300        0.65  0.01   0.75
          300        0.54  0.01   0.90
          300        0.48  0.01   0.99
          300        0.43  0.01   0.99
        Analysis: Thickness=[150, 150, 300, 300, 300, 300, 300]; PH=[8.20, 8.50, 8.60, 8.60, 7.40, 5.30, 5.00]
        Sample Initial nitrogen
          Thickness  NO3  NH4
          150        9.2  0.30
          150        7.6  0.30
          300        4.9  0.30
          300        2.7  0.30
          300        1.5  0.30
          300        1.8  0.50
          300        1.4  0.50
        Sample Initial water: Thickness=[150, 150, 300, 300, 300, 300, 300]; SW=[.280, .364, .43, .43, .40, .41, .41]
      surfaceom
        PoolName = residue1       residue2  # Organic Matter pool name
        type = inert        inert  # Organic Matter type
        mass = 4000        4000  # Initial surface residue (kg/ha)
        cnr = 10          10  # C:N ratio of initial residue
        standing_fraction = 0.0          0.5  # Fraction of residue standing
  simulation SurfaceOM_Test3
    memo Test3
      ================ TEST 3 ===============================
      Two residue pools are simulated where N is limiting (via HIGH C:N)
      Temperature and water are non-limiting (via met file)
      (Test is is similar to Test 1 but with a different C:N)
    clock: start_date=1/1/1988; end_date=30/1/1988
    summaryfile
    metfile met: filename=optimum.met
    area paddock
      outputfile report: filename=SurfaceOM_Test3 report.out; title=SurfaceOM_Test3 report
        variables
          variable:
            day
            year
            surfaceom.surfaceom_wt
            surfaceom.surfaceom_wt_residue1
            surfaceom.surfaceom_wt_residue2
            surfaceom.surfaceom_n_residue1
            surfaceom.surfaceom_n_residue2
            surfaceom.tf
            surfaceom.wf
            surfaceom.cf
        events: event=end_day
      Soil: same as SurfaceOM_Test2.paddock.soil
      surfaceom
        PoolName = residue1       residue2  # Organic Matter pool name
        type = lucerne       lucerne  # Organic Matter type
        mass = 4000        4000  # Initial surface residue (kg/ha)
        cnr = 120          120  # C:N ratio of initial residue
        standing_fraction = 0.0         0.5  # Fraction of residue standing
  simulation SurfaceOM_Test4
    memo Test4
      ! ================ TEST 4 ===============================
      ! Two residue pools are simulated where N is non-limiting (via low C:N)
      ! and temperature and water are non-limiting (via met file)
      ! The two pools have the same mass but one pool has a standing fraction
    clock: start_date=1/1/1988; end_date=30/1/1988
    summaryfile
    metfile met: filename=optimum.met
    area paddock
      outputfile report: filename=SurfaceOM_Test4 report.out; title=SurfaceOM_Test4 report
        variables
          variable:
            day
            year
            surfaceom.surfaceom_wt
            surfaceom.surfaceom_wt_residue1
            surfaceom.surfaceom_wt_residue2
            surfaceom.surfaceom_cover_residue1
            surfaceom.surfaceom_cover_residue2
            surfaceom.surfaceom_cover
            surfaceom.tf
            surfaceom.wf
            surfaceom.cf
        events: event=end_day
      Soil: same as SurfaceOM_Test2.paddock.soil
      surfaceom
        PoolName = residue1       residue2  # Organic Matter pool name
        type = lucerne       lucerne  # Organic Matter type
        mass = 4000        4000  # Initial surface residue (kg/ha)
        cnr = 120          120  # C:N ratio of initial residue
        standing_fraction = 0.0         0.5  # Fraction of residue standing
  simulation SurfaceOM_Test5
    memo Test5
      ! ================ TEST 5 ===============================
      ! Two residue pools are simulated where N is non-limiting (via low C:N)
      ! and temperature and water are non-limiting (via met file)
      ! The two pools have the same mass but one pool has a standing fraction
      ! Try doing crop chopped to surface OM with type information not unique
    clock: start_date=1/1/1988; end_date=30/1/1988
    summaryfile
    metfile met: filename=optimum.met
    area paddock
      outputfile report: filename=SurfaceOM_Test5 report.out; title=SurfaceOM_Test5 report
        variables
          variable:
            day
            year
            surfaceom.surfaceom_wt
            surfaceom.surfaceom_wt_residue1
            surfaceom.surfaceom_wt_residue2
            surfaceom.surfaceom_wt_bambatsi
            bambatsi.foliage_mass
            bambatsi.adm_green(1)  as stem_mass
        events: event=end_day
      Soil
        Water
          Thickness  BD    AirDry  LL15  DUL   SAT
          150        1.30  .10     .230  .450  .500
          150        1.30  .20     .240  .459  .509
          300        1.29  .20     .240  .45   .510
          300        1.31  .20     .250  .44   .505
          300        1.35  .20     .260  .42   .490
          300        1.36  .20     .270  .41   .480
          300        1.36  .20     .280  .41   .480
          SoilCrop bambatsi: LL=[.230, .240, .240, .250, .260, .270, .280]; KL=[0.08, 0.08, 0.08, 0.08, 0.05, 0.03, 0.01]; XF=[1.00, 1.00, 1.00, 1.00, 1.00, 1.00, 1.00]
        SoilWater: same as SurfaceOM_Test1.paddock.soil.SoilWater
        SoilOrganicMatter: same as SurfaceOM_Test2.paddock.soil.SoilOrganicMatter
        Analysis: Thickness=[150, 150, 300, 300, 300, 300, 300]; PH=[8.20, 8.50, 8.60, 8.60, 7.40, 5.30, 5.00]
        Sample Initial nitrogen
          Thickness  NO3  NH4
          150        9.2  0.30
          150        7.6  0.30
          300        4.9  0.30
          300        2.7  0.30
          300        1.5  0.30
          300        1.8  0.50
          300        1.4  0.50
        Sample Initial water: Thickness=[150, 150, 300, 300, 300, 300, 300]; SW=[.280, .364, .43, .43, .40, .41, .41]
      surfaceom
        PoolName = residue1     residue2   bambatsi  # Organic Matter pool name
        type = bambatsi       bambatsi  bambatsi  # Organic Matter type
        mass = 200         200            0  # Initial surface residue (kg/ha)
        cnr = 10          10            10  # C:N ratio of initial residue
        standing_fraction = .0          .5            0  # Fraction of residue standing
      bambatsi
      folder Manager folder
        manager Planting rule
          # Sowing criteria
          date1 = 10-jan  # Enter planting date (dd-mmm)
          # Sowing parameters
          crop = bambatsi  # Enter name of growth module to sow
          density = 1000000  # Enter sowing density (plants/ha)
          on start_of_day:
```
         if (date('[date1]') = today) and [crop].plant_status = 'out' then
               [crop]  establish plants =[density], init_section = seedling
         endif
```
        manager Cutting rule
          # Cutting criteria
          hmass = 2000  # Enter critical biomass for harvest (kg/ha)
          # Cutting parameters
          crop = bambatsi  # Enter name of growth module to cut
          ffraction = 0.9  # Enter fraction of foliage removed (0-1)
          sfraction = 0.9  # Enter fraction of stem removed (0-1)
          on start_of_day:
```
         if ([crop].biomass > [hmass] and [crop].plant_status = 'alive' then
               [crop]  cut foliage_remove_fr = [ffraction], adm_remove_fr = [sfraction]
         endif
```
        manager Kill Bambatsi
          on start_of_day:
```
            if day = 11 then
               bambatsi  kill
            endif
```
          on end_of_day:
```
            report do_output
```
  simulation SurfaceOM_Test6
    memo Test6
      ! ================ TEST 6 ===============================
      ! A multi crop rotation is simulated to check calculation of cover when several (3+) residues are in system
    clock: start_date=1/1/1986; end_date=31/12/1993
    summaryfile
    metfile met: filename=optimum_long.met
    area paddock
      outputfile report: filename=SurfaceOM_Test6 report.out; title=SurfaceOM_Test6 report
        variables
          variable:
            day
            year
            wheat.biomass as wht_biomass
            sorghum.biomass as sor_biomass
            canola.biomass as can_biomass
            surfaceom.surfaceom_wt
            surfaceom.surfaceom_wt_old_wheat
            surfaceom.surfaceom_wt_wheat
            surfaceom.surfaceom_wt_sorghum
            surfaceom.surfaceom_wt_canola
            surfaceom.surfaceom_cover
            surfaceom.surfaceom_cover_old_wheat
            surfaceom.surfaceom_cover_wheat
            surfaceom.surfaceom_cover_sorghum
            surfaceom.surfaceom_cover_canola
        events: event=end_day
      fertiliser
      irrigation
        automatic_irrigation = off
        asw_depth = 600  # Depth to which ASW is calculated. (mm)
        crit_fr_asw = 0.5  # Fraction of ASW below which irrigation is applied (0-1.0)
        irrigation_efficiency = 1  # Efficiency of the irrigation. (0-1.0)
        irrigation_allocation = off  # Allocation limits
        allocation = 0  # Allocation in mm
        default_no3_conc = 0.0  # Nitrate concentration (ppm N)
        default_nh4_conc = 0.0  # Ammonium concentration (ppm N)
        default_cl_conc = 0.0  # Chloride concentration (ppm Cl)
      manager
        on start_of_day:
```
            !**** wheat *********
            if day = 169 and year = 1986 then
               wheat sow cultivar = hartog, plants = 120, sowing_depth = 30 (mm)
            endif
            if wheat.stagename = 'harvest_ripe' or wheat.plant_status = 'dead' then
               wheat harvest
               wheat end_crop
            endif
            !**** sorghum *********
               if day = 305 and year = 1986 then
                  sorghum sow cultivar = early, plants = 10, sowing_depth = 30 (mm), tiller_no_fertile = 0 (), row_spacing = 1.0 (m)
                            ! optional skiprow arguments are: skip = solid; skip = single; skip = double
               irrigation apply amount = 150 (mm)
               fertiliser apply amount = 100 (kg/ha), depth = 50 (mm), type = no3_n
               endif
               if (sorghum.stage = 11) then
                  sorghum harvest
                  sorghum end_crop
               endif
            ! if crop killed due to stress, end simulation
            if (sorghum.plant_status = 'dead')  then
                  sorghum harvest
                  sorghum kill_crop
                  sorghum end_crop
            endif
            !**** canola *********
            if day = 130 and year  = 1989 then
               fertiliser apply amount = 100 (kg/ha), depth = 50 (mm), type = no3_n
               canola sow cultivar = hyola42, plants = 40 (/m2), sowing_depth = 20 (mm), row_spacing = 300 (mm)
            endif
            if canola.stagename = 'harvest_ripe' or canola.plant_status = 'dead' then
               canola harvest
               canola end_crop
            endif
            !**** wheat again *********
            if day = 169 and year = 1990 then
               wheat sow cultivar = hartog, plants = 120, sowing_depth = 30 (mm)
            endif
            if wheat.stagename = 'harvest_ripe' or wheat.plant_status = 'dead' then
               wheat harvest
               wheat end_crop
            endif
```
      Soil
        Water
          Thickness  BD    AirDry  LL15  DUL   SAT
          150        1.30  .10     .230  .450  .500
          150        1.30  .20     .240  .459  .509
          300        1.29  .20     .240  .45   .510
          300        1.31  .20     .250  .44   .505
          300        1.35  .20     .260  .42   .490
          300        1.36  .20     .270  .41   .480
          300        1.36  .20     .280  .41   .480
          SoilCrop canola: LL=[.230, .240, .240, .250, .260, .270, .280]; KL=[0.08, 0.08, 0.08, 0.08, 0.05, 0.03, 0.01]; XF=[1.00, 1.00, 1.00, 1.00, 1.00, 1.00, 1.00]
          SoilCrop wheat: LL=[0.230, 0.240, 0.240, 0.250, 0.260, 0.270, 0.280]; KL=[0.07, 0.07, 0.07, 0.07, 0.05, 0.05, 0.04]; XF=[1.0, 1.0, 1.0, 1.0, 1.0, 1.0, 1.0]
          SoilCrop sorghum: LL=[0.230, 0.240, 0.240, 0.250, 0.260, 0.270, 0.280]; KL=[0.07, 0.07, 0.07, 0.07, 0.05, 0.05, 0.04]; XF=[1.0, 1.0, 1.0, 1.0, 1.0, 1.0, 1.0]
        SoilWater: same as SurfaceOM_Test1.paddock.soil.SoilWater
        SoilOrganicMatter: same as SurfaceOM_Test2.paddock.soil.SoilOrganicMatter
        Analysis: Thickness=[150, 150, 300, 300, 300, 300, 300]; PH=[8.20, 8.50, 8.60, 8.60, 7.40, 5.30, 5.00]
        Sample Initial nitrogen
          Thickness  NO3  NH4
          150        9.2  0.30
          150        7.6  0.30
          300        4.9  0.30
          300        2.7  0.30
          300        1.5  0.30
          300        1.8  0.50
          300        1.4  0.50
        Sample Initial water: Thickness=[150, 150, 300, 300, 300, 300, 300]; SW=[.280, .364, .43, .43, .40, .41, .41]
      surfaceom
        PoolName = old_wheat   wheat    sorghum   canola  # Organic Matter pool name
        type = wheat       wheat     sorghum  canola  # Organic Matter type
        mass = 4000          0          0        0  # Initial surface residue (kg/ha)
        cnr = 10            0          0        0  # C:N ratio of initial residue
        standing_fraction = .0            0          0        0  # Fraction of residue standing
      canola
      wheat
      sorghum
  simulation SurfaceOM_Test7
    memo Test7
      ! ================ TEST 7 ===============================
      ! A rice crop simulation in which algal biomass is accumulated in APSIM-Pond and added to SurfaceOM pool at end as a residue.
      ! Then testing the 'tillage_single' command following rice harvest because the aim is to remove the 'rice' residue, but leave the 'algae' residue
    clock
      start_date = 01/01/2005
      end_date = 31/12/2005
    summaryfile
    metfile met: filename=%apsim%\Examples\MetFiles\Bhola.met
    area paddock
      outputfile report: filename=SurfaceOM_Test7 report.out; title=SurfaceOM_Test7 report
        variables
          variable:
            dd/mmm/yyyy
            day
            year
            rice.wagt as rice_biomass
            rice.wrr as rice_yield
            pond.PAB_mass as algal_biomass
            pond.algal_turnover as algal_turnover
            surfaceom.surfaceom_wt
            surfaceom.surfaceom_wt_rice
            surfaceom.surfaceom_wt_algae
            surfaceom.surfaceom_cover
            surfaceom.surfaceom_cover_rice
            surfaceom.surfaceom_cover_algae
            pond
        events: event=end_day
      fertiliser
      irrigation: same as SurfaceOM_Test6.paddock.irrigation
      manager
        on start_of_day:
```
! **************** Rice crop 2005 ***********************

! estaablish paddy bunds on 1 June (152) 

if day = 152 and year = 2005 then
   max_pond = 200
endif

! sow crop on 11 June 2005
if day = 163 and year = 2005 then 
   rice sow cultivar = IR72, establishment = transplant, sbdur = 25, nplh = 2, nh = 25, nplsb = 1000
   fertiliser apply amount = 5, depth = 50, type = urea_N  
endif

!Fertilizer application at transplanting
if day = 188 and year = 2005 then
     fertiliser apply amount = 40, depth = 50, type = urea_N  
endif

! irrigate as soon as there is no standing water on the surface, if the rice crop stage is less than late grain-filling
if day > 163 and rice.dvs < 2.2 and year = 2005 then 
     if pond = 0 then
        irrigation apply amount = 60
        count = 0
     endif
  endif

! ***** EXAMPLE OF AWD LOGIC *********
!if day > 163 and day < 295 then 
!     if pond = 0 and count = 7 and irri_count < 25 then
!        irrigation apply amount = 60
!        irri_count = irri_count + 1
!        count = 0
!     endif
!     if pond = 0 and count <7 then
!        count = count +1
!     endif
!  endif
! ***********************************

! top dress 1 21 DAT
if day = 209 and year = 2005 then        
   fertiliser apply amount = 40, depth = 0, type = urea_N   
endif

! top dress 2 35 DAT
if day = 244 and year = 2005 then        
   fertiliser apply amount = 40, depth = 0, type = urea_N   
endif

! open up rice bunds and drain pond at after maturity stage
if rice.dvs > 2.2 then
   max_pond = 0
endif

! harvest rice 
if dvs > 2.4 and year = 2005 then
     rice end_crop
endif

! two weeks after rice harvest, remove 100% of rice residue for livestock feed, leave the algae
if day = 293 and year = 2005 then
     SurfaceOM tillage_single name = rice, type = burn  ! remove 100% of rice residues from the field, but leave all the algae 
!     SurfaceOM tillage type = burn  ! this is what we don't want to do....remove 100% of both rice residues and algae from the field 
endif
```
      Soil
        Water
          Thickness  BD    AirDry  LL15  DUL    SAT    KS
          150        1.3   0.1     0.23  0.45   0.5    20
          150        1.3   0.2     0.24  0.459  0.509  3
          300        1.29  0.2     0.24  0.45   0.51   20
          300        1.31  0.2     0.25  0.44   0.505  20
          300        1.35  0.2     0.26  0.42   0.49   20
          300        1.36  0.2     0.27  0.41   0.48   20
          300        1.36  0.2     0.28  0.41   0.48   20
          SoilCrop canola: LL=[0.23, 0.24, 0.24, 0.25, 0.26, 0.27, 0.28]; KL=[0.08, 0.08, 0.08, 0.08, 0.05, 0.03, 0.01]; XF=[1, 1, 1, 1, 1, 1, 1]
          SoilCrop wheat: LL=[0.23, 0.24, 0.24, 0.25, 0.26, 0.27, 0.28]; KL=[0.07, 0.07, 0.07, 0.07, 0.05, 0.05, 0.04]; XF=[1, 1, 1, 1, 1, 1, 1]
          SoilCrop sorghum: LL=[0.23, 0.24, 0.24, 0.25, 0.26, 0.27, 0.28]; KL=[0.07, 0.07, 0.07, 0.07, 0.05, 0.05, 0.04]; XF=[1, 1, 1, 1, 1, 1, 1]
        SoilWater: SummerCona=2.5; SummerU=4; SummerDate=1-Nov; WinterCona=2.5; WinterU=4; WinterDate=1-Apr; DiffusConst=88; DiffusSlope=35.4; Salb=0.13; CN2Bare=80; CNRed=20; CNCov=0.8; Thickness=[150, 150, 300, 300, 300, 300, 300]; SWCON=[0.2, 0.05, 0.2, 0.2, 0.2, 0.2, 0.2]
        SoilOrganicMatter: same as SurfaceOM_Test1.paddock.soil.SoilOrganicMatter
        Analysis: Thickness=[150, 150, 300, 300, 300, 300, 300]; PH=[8.2, 8.5, 8.6, 8.6, 7.4, 5.3, 5]; PHUnits=Water; BoronUnits=HotWater
        Sample Initial nitrogen: NO3Units=ppm; NH4Units=ppm; SWUnits=Volumetric; OCUnits=Total; PHUnits=Water
          Thickness  NO3  NH4
          150        9.2  0.3
          150        7.6  0.3
          300        4.9  0.3
          300        2.7  0.3
          300        1.5  0.3
          300        1.8  0.5
          300        1.4  0.5
        Sample Initial water: Thickness=[150, 150, 300, 300, 300, 300, 300]; SW=[0.28, 0.364, 0.43, 0.43, 0.4, 0.41, 0.41]; NO3Units=ppm; NH4Units=ppm; SWUnits=Volumetric; OCUnits=Total; PHUnits=Water
      surfaceom
        PoolName = rice   algae  # Organic Matter pool name
        type = rice     algae  # Organic Matter type
        mass = 0        0  # Initial surface residue (kg/ha)
        cnr = 0        0  # C:N ratio of initial residue
        standing_fraction = 0        0  # Fraction of residue standing
      rice
      pond
        algae_present = 1  # is there algae present in this pond (0 or 1)
        CEC = 30.0  # surface soil cation exchange capacity
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