folder SurfaceOrganicMatter_Tests: version=28
  folder SurfaceOM_Tests
    simulation SurfaceOM_Test1
      memo Test1
        No crop, no additions or tillages
        Two initial residues of same type and mass but one has some standing
      clock: start_date=1/1/1988; end_date=30/1/1988
      summaryfile
      metfile met: filename=optimum.met
      area paddock
        outputfile report: filename=SurfaceOM_Test1 report.out; title=SurfaceOM_Test1 report
          variables
            variable:
              day
              year
              surfaceom.surfaceom_wt
              surfaceom.surfaceom_wt_residue1
              surfaceom.surfaceom_wt_residue2
              surfaceom.surfaceom_n_residue1
              surfaceom.surfaceom_n_residue2
              surfaceom.tf
              surfaceom.wf
              surfaceom.cf
          events: event=end_day
        soil
          Water
            Layer:
              Thickness (mm)  BD (g/cc)  AirDry (mm/mm)  LL15 (mm/mm)  DUL (mm/mm)  SAT (mm/mm)
              150             1.30       .10             .230          .450         .500
              150             1.30       .20             .240          .459         .509
              300             1.29       .20             .240          .45          .510
              300             1.31       .20             .250          .44          .505
              300             1.35       .20             .260          .42          .490
              300             1.36       .20             .270          .41          .480
              300             1.36       .20             .280          .41          .480
          SoilWat: SummerCona=2.5; SummerU=4; SummerDate=1-Nov; WinterCona=2.5; WinterU=4; WinterDate=1-Apr; DiffusConst=88.; DiffusSlope=35.4; Salb=0.13; Cn2Bare=80; CnRed=20; CnCov=.8
            Layer:
              Thickness (mm)  SWCON (0-1)
              150             0.2
              150             0.2
              300             0.2
              300             0.2
              300             0.2
              300             0.2
              300             0.2
          SoilOrganicMatter: RootCn=20.; RootWt=1000.; SoilCn=14.5; EnrACoeff=7.4; EnrBCoeff=0.2
            Layer:
              Thickness (mm)  OC (Total %)  FBiom (0-1)  FInert (0-1)
              150             1.00          .035         0.30
              150             0.84          .025         0.50
              300             0.77          .015         0.60
              300             0.65          0.01         0.75
              300             0.54          0.01         0.90
              300             0.48          0.01         0.99
              300             0.43          0.01         0.99
          Analysis
            Layer:
              Thickness (mm)  PH (1:5 water)
              150             8.20
              150             8.50
              300             8.60
              300             8.60
              300             7.40
              300             5.30
              300             5.00
          Sample Initial nitrogen
            Layer:
              Thickness (mm)  NO3 (ppm)  NH4 (ppm)
              150             9.2        0.30
              150             7.6        0.30
              300             4.9        0.30
              300             2.7        0.30
              300             1.5        0.30
              300             1.8        0.50
              300             1.4        0.50
          Sample Initial water
            Layer:
              Thickness (mm)  SW (mm/mm)
              150             .280
              150             .364
              300             .43
              300             .43
              300             .40
              300             .41
              300             .41
        surfaceom
          PoolName = residue1       residue2  # Organic Matter pool name
          type = lucerne       lucerne  # Organic Matter type
          mass = 4000        4000  # Initial surface residue (kg/ha)
          cnr = 10          10  # C:N ratio of initial residue
          standing_fraction = 0.0         0.5  # Fraction of residue standing
    simulation SurfaceOM_Test2
      memo Test2
        ================ TEST 2 ===============================
        Two inert residue pools are simulated to test code for adding and removing OM.
        The two pools have the same mass but one pool has a standing fraction.
      clock: start_date=1/1/1988; end_date=30/1/1988
      summaryfile
      metfile met: filename=optimum.met
      area paddock
        outputfile report: filename=SurfaceOM_Test2 report.out; title=SurfaceOM_Test2 report
          variables
            variable:
              day
              year
              surfaceom.surfaceom_wt
              surfaceom.surfaceom_wt_residue1
              surfaceom.surfaceom_wt_residue2
              surfaceom.surfaceom_n_residue1
              surfaceom.surfaceom_n_residue2
              fom_c()
              fom_c
          events: event=end_day
        manager
          on start_of_day:
```
            if day = 10 then
               surfaceom tillage type = disc, f_incorp = 0.5, tillage_depth = 100.
            endif
            if day = 15 then
               surfaceom tillage type = disc, f_incorp = 0.5, tillage_depth = 0.
            endif
            if day = 20 then
               surfaceom add_surfaceom name=residue1, type = inert, mass=2000, cnr = 10, cpr = 100
            endif
            if day = 25 then
               surfaceom add_surfaceom name=residue3, type = inert, mass=2000, cnr = 10, cpr = 100
            endif
```
        soil: same as SurfaceOM_Tests.SurfaceOM_Test1.paddock.soil
        surfaceom
          PoolName = residue1       residue2  # Organic Matter pool name
          type = inert        inert  # Organic Matter type
          mass = 4000        4000  # Initial surface residue (kg/ha)
          cnr = 10          10  # C:N ratio of initial residue
          standing_fraction = 0.0          0.5  # Fraction of residue standing
    simulation SurfaceOM_Test3
      memo Test3
        ================ TEST 3 ===============================
        Two residue pools are simulated where N is limiting (via HIGH C:N)
        Temperature and water are non-limiting (via met file)
        (Test is is similar to Test 1 but with a different C:N)
      clock: start_date=1/1/1988; end_date=30/1/1988
      summaryfile
      metfile met: filename=optimum.met
      area paddock
        outputfile report: filename=SurfaceOM_Test3 report.out; title=SurfaceOM_Test3 report
          variables
            variable:
              day
              year
              surfaceom.surfaceom_wt
              surfaceom.surfaceom_wt_residue1
              surfaceom.surfaceom_wt_residue2
              surfaceom.surfaceom_n_residue1
              surfaceom.surfaceom_n_residue2
              surfaceom.tf
              surfaceom.wf
              surfaceom.cf
          events: event=end_day
        soil: same as SurfaceOM_Tests.SurfaceOM_Test1.paddock.soil
        surfaceom
          PoolName = residue1       residue2  # Organic Matter pool name
          type = lucerne       lucerne  # Organic Matter type
          mass = 4000        4000  # Initial surface residue (kg/ha)
          cnr = 120          120  # C:N ratio of initial residue
          standing_fraction = 0.0         0.5  # Fraction of residue standing
    simulation SurfaceOM_Test4
      memo Test4
        ! ================ TEST 4 ===============================
        ! Two residue pools are simulated where N is non-limiting (via low C:N)
        ! and temperature and water are non-limiting (via met file)
        ! The two pools have the same mass but one pool has a standing fraction
      clock: start_date=1/1/1988; end_date=30/1/1988
      summaryfile
      metfile met: filename=optimum.met
      area paddock
        outputfile report: filename=SurfaceOM_Test4 report.out; title=SurfaceOM_Test4 report
          variables
            variable:
              day
              year
              surfaceom.surfaceom_wt
              surfaceom.surfaceom_wt_residue1
              surfaceom.surfaceom_wt_residue2
              surfaceom.surfaceom_cover_residue1
              surfaceom.surfaceom_cover_residue2
              surfaceom.surfaceom_cover
              surfaceom.tf
              surfaceom.wf
              surfaceom.cf
          events: event=end_day
        soil: same as SurfaceOM_Tests.SurfaceOM_Test1.paddock.soil
        surfaceom
          PoolName = residue1       residue2  # Organic Matter pool name
          type = lucerne       lucerne  # Organic Matter type
          mass = 4000        4000  # Initial surface residue (kg/ha)
          cnr = 120          120  # C:N ratio of initial residue
          standing_fraction = 0.0         0.5  # Fraction of residue standing
    simulation SurfaceOM_Test5
      memo Test5
        ! ================ TEST 5 ===============================
        ! Two residue pools are simulated where N is non-limiting (via low C:N)
        ! and temperature and water are non-limiting (via met file)
        ! The two pools have the same mass but one pool has a standing fraction
        ! Try doing crop chopped to surface OM with type information not unique
      clock: start_date=1/1/1988; end_date=30/1/1988
      summaryfile
      metfile met: filename=optimum.met
      area paddock
        outputfile report: filename=SurfaceOM_Test5 report.out; title=SurfaceOM_Test5 report
          variables
            variable:
              day
              year
              surfaceom.surfaceom_wt
              surfaceom.surfaceom_wt_residue1
              surfaceom.surfaceom_wt_residue2
              surfaceom.surfaceom_wt_bambatsi
              bambatsi.foliage_mass
              bambatsi.adm_green(1)  as stem_mass
          events: event=end_day
        soil
          Water
            Layer:
              Thickness (mm)  BD (g/cc)  AirDry (mm/mm)  LL15 (mm/mm)  DUL (mm/mm)  SAT (mm/mm)
              150             1.30       .10             .230          .450         .500
              150             1.30       .20             .240          .459         .509
              300             1.29       .20             .240          .45          .510
              300             1.31       .20             .250          .44          .505
              300             1.35       .20             .260          .42          .490
              300             1.36       .20             .270          .41          .480
              300             1.36       .20             .280          .41          .480
            SoilCrop bambatsi
              Layer:
                Thickness (mm)  LL (mm/mm)  KL (/day)  XF (0-1)
                150             .230        0.08       1.00
                150             .240        0.08       1.00
                300             .240        0.08       1.00
                300             .250        0.08       1.00
                300             .260        0.05       1.00
                300             .270        0.03       1.00
                300             .280        0.01       1.00
          SoilWat: same as SurfaceOM_Tests.SurfaceOM_Test1.paddock.soil.SoilWat
          SoilOrganicMatter: same as SurfaceOM_Tests.SurfaceOM_Test1.paddock.soil.SoilOrganicMatter
          Analysis: same as SurfaceOM_Tests.SurfaceOM_Test1.paddock.soil.Analysis
          Sample Initial nitrogen: same as SurfaceOM_Tests.SurfaceOM_Test1.paddock.soil.Initial nitrogen
          Sample Initial water: same as SurfaceOM_Tests.SurfaceOM_Test1.paddock.soil.Initial water
        surfaceom
          PoolName = residue1     residue2   bambatsi  # Organic Matter pool name
          type = bambatsi       bambatsi  bambatsi  # Organic Matter type
          mass = 200         200            0  # Initial surface residue (kg/ha)
          cnr = 10          10            10  # C:N ratio of initial residue
          standing_fraction = .0          .5            0  # Fraction of residue standing
        bambatsi
        folder Manager folder
          manager Planting rule
            # Sowing criteria
            date1 = 10-jan  # Enter planting date (dd-mmm)
            # Sowing parameters
            crop = bambatsi  # Enter name of growth module to sow
            density = 1000000  # Enter sowing density (plants/ha)
            on start_of_day:
```
         if (date('[date1]') = today) and [crop].plant_status = 'out' then
               [crop]  establish plants =[density], init_section = seedling
         endif
```
          manager Cutting rule
            # Cutting criteria
            hmass = 2000  # Enter critical biomass for harvest (kg/ha)
            # Cutting parameters
            crop = bambatsi  # Enter name of growth module to cut
            ffraction = 0.9  # Enter fraction of foliage removed (0-1)
            sfraction = 0.9  # Enter fraction of stem removed (0-1)
            on start_of_day:
```
         if ([crop].biomass > [hmass] and [crop].plant_status = 'alive' then
               [crop]  cut foliage_remove_fr = [ffraction], adm_remove_fr = [sfraction]
         endif
```
          manager Kill Bambatsi
            on start_of_day:
```
            if day = 11 then
               bambatsi  kill
            endif
```
            on end_of_day:
```
            report do_output
```
    simulation SurfaceOM_Test6
      memo Test6
        ! ================ TEST 6 ===============================
        ! A multi crop rotation is simulated to check calculation of cover when several (3+) residues are in system
      clock: start_date=1/1/1986; end_date=31/12/1993
      summaryfile
      metfile met: filename=optimum_long.met
      area paddock
        outputfile report: filename=SurfaceOM_Test6 report.out; title=SurfaceOM_Test6 report
          variables
            variable:
              day
              year
              wheat.biomass as wht_biomass
              sorghum.biomass as sor_biomass
              canola.biomass as can_biomass
              surfaceom.surfaceom_wt
              surfaceom.surfaceom_wt_old_wheat
              surfaceom.surfaceom_wt_wheat
              surfaceom.surfaceom_wt_sorghum
              surfaceom.surfaceom_wt_canola
              surfaceom.surfaceom_cover
              surfaceom.surfaceom_cover_old_wheat
              surfaceom.surfaceom_cover_wheat
              surfaceom.surfaceom_cover_sorghum
              surfaceom.surfaceom_cover_canola
          events: event=end_day
        fertiliser
        irrigation
          automatic_irrigation = off
          asw_depth = 600  # Depth to which ASW is calculated. (mm)
          crit_fr_asw = 0.5  # Fraction of ASW below which irrigation is applied (0-1.0)
          irrigation_efficiency = 1  # Efficiency of the irrigation. (0-1.0)
          irrigation_allocation = off  # Allocation limits
          allocation = 0  # Allocation in mm
          default_no3_conc = 0.0  # Nitrate concentration (ppm N)
          default_nh4_conc = 0.0  # Ammonium concentration (ppm N)
          default_cl_conc = 0.0  # Chloride concentration (ppm Cl)
        manager
          on start_of_day:
```
            !**** wheat *********
            if day = 169 and year = 1986 then
               wheat sow cultivar = hartog, plants = 120, sowing_depth = 30 (mm)
            endif
            if wheat.stagename = 'harvest_ripe' or wheat.plant_status = 'dead' then
               wheat harvest
               wheat end_crop
            endif
            !**** sorghum *********
               if day = 305 and year = 1986 then
                  sorghum sow cultivar = early, plants = 10, sowing_depth = 30 (mm), tiller_no_fertile = 0 (), row_spacing = 1.0 (m)
                            ! optional skiprow arguments are: skip = solid; skip = single; skip = double
               irrigation apply amount = 150 (mm)
               fertiliser apply amount = 100 (kg/ha), depth = 50 (mm), type = no3_n
               endif
               if (sorghum.stage = 11) then
                  sorghum harvest
                  sorghum end_crop
               endif
            ! if crop killed due to stress, end simulation
            if (sorghum.plant_status = 'dead')  then
                  sorghum harvest
                  sorghum kill_crop
                  sorghum end_crop
            endif
            !**** canola *********
            if day = 130 and year  = 1989 then
               fertiliser apply amount = 100 (kg/ha), depth = 50 (mm), type = no3_n
               canola sow cultivar = hyola42, plants = 40 (/m2), sowing_depth = 20 (mm), row_spacing = 300 (mm)
            endif
            if canola.stagename = 'harvest_ripe' or canola.plant_status = 'dead' then
               canola harvest
               canola end_crop
            endif
            !**** wheat again *********
            if day = 169 and year = 1990 then
               wheat sow cultivar = hartog, plants = 120, sowing_depth = 30 (mm)
            endif
            if wheat.stagename = 'harvest_ripe' or wheat.plant_status = 'dead' then
               wheat harvest
               wheat end_crop
            endif
```
        soil
          Water
            Layer:
              Thickness (mm)  BD (g/cc)  AirDry (mm/mm)  LL15 (mm/mm)  DUL (mm/mm)  SAT (mm/mm)
              150             1.30       .10             .230          .450         .500
              150             1.30       .20             .240          .459         .509
              300             1.29       .20             .240          .45          .510
              300             1.31       .20             .250          .44          .505
              300             1.35       .20             .260          .42          .490
              300             1.36       .20             .270          .41          .480
              300             1.36       .20             .280          .41          .480
            SoilCrop canola: same as SurfaceOM_Tests.SurfaceOM_Test5.paddock.soil.Water.bambatsi
            SoilCrop wheat
              Layer:
                Thickness (mm)  LL (mm/mm)  KL (/day)  XF (0-1)
                150             0.230       0.07       1.0
                150             0.240       0.07       1.0
                300             0.240       0.07       1.0
                300             0.250       0.07       1.0
                300             0.260       0.05       1.0
                300             0.270       0.05       1.0
                300             0.280       0.04       1.0
            SoilCrop sorghum: same as SurfaceOM_Tests.SurfaceOM_Test6.paddock.soil.Water.wheat
          SoilWat: same as SurfaceOM_Tests.SurfaceOM_Test1.paddock.soil.SoilWat
          SoilOrganicMatter: same as SurfaceOM_Tests.SurfaceOM_Test1.paddock.soil.SoilOrganicMatter
          Analysis: same as SurfaceOM_Tests.SurfaceOM_Test1.paddock.soil.Analysis
          Sample Initial nitrogen: same as SurfaceOM_Tests.SurfaceOM_Test1.paddock.soil.Initial nitrogen
          Sample Initial water: same as SurfaceOM_Tests.SurfaceOM_Test1.paddock.soil.Initial water
        surfaceom
          PoolName = old_wheat   wheat    sorghum   canola  # Organic Matter pool name
          type = wheat       wheat     sorghum  canola  # Organic Matter type
          mass = 4000          0          0        0  # Initial surface residue (kg/ha)
          cnr = 10            0          0        0  # C:N ratio of initial residue
          standing_fraction = .0            0          0        0  # Fraction of residue standing
        canola
        wheat
        sorghum
  folder SurfaceOrganicMatter_Tests
    PlugIns
      PlugIn=[%apsim%/UserInterface/ApsimUIPlugIn.xml, %apsim%/UserInterface/SoilTypes.xml, %apsim%/UserInterface/Graph.xml, %apsim%/UserInterface/Ausfarm.xml, %apsim%/UserInterface/DevelopersPlugIn.xml, %apsim%/Model/Accum.xml, %apsim%/Model/AgPasture.xml, %apsim%/Model/Bambatsi.xml, %apsim%/Model/Barley.xml, %apsim%/Model/Br.xml, %apsim%/Model/Bore.xml, %apsim%/Model/Broccoli.xml, %apsim%/Model/ButterflyPea.xml, %apsim%/Model/Canola.xml, %apsim%/Model/Canopy.xml, %apsim%/Model/Centro.xml, %apsim%/Model/Channel.xml, %apsim%/Model/Chickpea.xml, %apsim%/Model/Cl.xml, %apsim%/Model/Climatechange.xml, %apsim%/Model/Clock.xml, %apsim%/Model/Cowpea.xml, %apsim%/Model/CropUI.xml, %apsim%/Model/Dam.xml, %apsim%/Model/DCD.xml, %apsim%/Model/EGrandis.xml, %apsim%/Model/EMelliodora.xml, %apsim%/Model/Eo.xml, %apsim%/Model/EPopulnea.xml, %apsim%/Model/Erosion.xml, %apsim%/Model/Events.xml, %apsim%/Model/Fababean.xml, %apsim%/Model/Factorial.xml, %apsim%/Model/Factor.xml, %apsim%/Model/FactorComplex.xml, %apsim%/Model/FrenchBean.xml, %apsim%/Model/Fertiliser.xml, %apsim%/Model/Fieldpea.xml, %apsim%/Model/Gcm_data.xml, %apsim%/Model/Grasp.xml, %apsim%/Model/Graz.xml, %apsim%/Model/Growth.xml, %apsim%/Model/Horsegram.xml, %apsim%/Model/Ini.xml, %apsim%/Model/InitWater.xml, %apsim%/Model/Input.xml, %apsim%/Model/Irrigation.xml, %apsim%/Model/KWTest.xml, %apsim%/Model/Lablab.xml, %apsim%/Model/Lettuce.xml, %apsim%/Model/Log.xml, %apsim%/Model/Lucerne.xml, %apsim%/Model/Lupin.xml, %apsim%/Model/Maize.xml, %apsim%/Model/MaizeZ.xml, %apsim%/Model/Manager.xml, %apsim%/Model/Map.xml, %apsim%/Model/Memo.xml, %apsim%/Model/MetFile.xml, %apsim%/Model/MicroMet.xml, %apsim%/Model/Millet.xml, %apsim%/Model/Millet1.xml, %apsim%/Model/Millet2.xml, %apsim%/Model/Millet3.xml, %apsim%/Model/Millet4.xml, %apsim%/Model/Millet5.xml, %apsim%/Model/Mucuna.xml, %apsim%/Model/Mungbean.xml, %apsim%/Model/Navybean.xml, %apsim%/Model/Oats.xml, %apsim%/Model/Ocean_data.xml, %apsim%/Model/Operations.xml, %apsim%/Model/Orobanche.xml, %apsim%/Model/Oryza.xml, %apsim%/Model/OutputFile.xml, %apsim%/Model/Ozcot.xml, %apsim%/Model/Patchinput.xml, %apsim%/Model/Peanut.xml, %apsim%/Model/Pigeonpea.xml, %apsim%/Model/Pond.xml, %apsim%/Model/Potato.xml, %apsim%/Model/RotPlot.xml, %apsim%/Model/RugPlotUI.xml, %apsim%/Model/Root.xml, %apsim%/Model/Rule.xml, %apsim%/Model/Seedling.xml, %apsim%/Model/SiloInput.xml, %apsim%/Model/Slurp.xml, %apsim%/Model/Soi.xml, %apsim%/Model/Soil.xml, %apsim%/Model/SoilNui.xml, %apsim%/Model/SoilTemp.xml, %apsim%/Model/Sorghum.xml, %apsim%/Model/SorghumConstants.xml, %apsim%/Model/SorghumGenotype.xml, %apsim%/Model/Soybean.xml, %apsim%/Model/Stylo.xml, %apsim%/Model/Sugar.xml, %apsim%/Model/Summaryfile.xml, %apsim%/Model/Sunflower.xml, %apsim%/Model/SurfaceOM.xml, %apsim%/Model/SurfaceOrganicMatter.xml, %apsim%/Model/SweetCorn.xml, %apsim%/Model/SweetSorghum.xml, %apsim%/Model/SWIM2.xml, %apsim%/Model/SWIM2ui.xml, %apsim%/Model/Sysbal.xml, %apsim%/Model/SysBal2.xml, %apsim%/Model/Tcllink.xml, %apsim%/Model/Tclmanager.xml, %apsim%/Model/Tclui.xml, %apsim%/Model/Tracker.xml, %apsim%/Model/Tree.xml, %apsim%/Model/Variables.xml, %apsim%/Model/Venlink.xml, %apsim%/Model/vine.xml, %apsim%/Model/WaterSupply.xml, %apsim%/Model/Weed.xml, %apsim%/Model/Wheat.xml, %apsim%/Model/YPCalc.xml, %apsim%\Model\SurfaceOrganicMatter.xml]
    simulation SurfaceOrganicMatter_Test1 -> /SurfaceOrganicMatter_Tests/SurfaceOM_Tests/SurfaceOM_Test1
      area paddock -> /SurfaceOrganicMatter_Tests/SurfaceOM_Tests/SurfaceOM_Test1/paddock
        outputfile report: filename=SurfaceOrganicMatter_Test1 report.out; title=SurfaceOrganicMatter_Test1 report
          events: event=end_day
          variables
            variable:
              day
              year
              surfaceom_wt
              surfaceom_wt_all(1) as surfaceom_wt_residue1
              surfaceom_wt_all(2) as surfaceom_wt_residue2
              surfaceom_n_all(1) as surfaceom_n_residue1
              surfaceom_n_all(2) as surfaceom_n_residue2
              SurfaceOM.tf
              SurfaceOM.wf
              SurfaceOM.cf
    simulation SurfaceOrganicMatter_Test2 -> /SurfaceOrganicMatter_Tests/SurfaceOM_Tests/SurfaceOM_Test2
      area paddock -> /SurfaceOrganicMatter_Tests/SurfaceOM_Tests/SurfaceOM_Test2/paddock
        outputfile report: filename=SurfaceOrganicMatter_Test2 report.out; title=SurfaceOrganicMatter_Test2 report
          variables
            variable:
              day
              year
              surfaceom_wt
              surfaceom_wt_all(1) as surfaceom_wt_residue1
              surfaceom_wt_all(2) as surfaceom_wt_residue2
              surfaceom_n_all(1) as surfaceom_n_residue1
              surfaceom_n_all(2) as surfaceom_n_residue2
              fom_c()
              fom_c
          events: event=end_day
    simulation SurfaceOrganicMatter_Test3 -> /SurfaceOrganicMatter_Tests/SurfaceOM_Tests/SurfaceOM_Test3
      area paddock -> /SurfaceOrganicMatter_Tests/SurfaceOM_Tests/SurfaceOM_Test3/paddock
        outputfile report: filename=SurfaceOrganicMatter_Test3 report.out; title=SurfaceOrganicMatter_Test3 report
          variables
            variable:
              day
              year
              surfaceom_wt
              surfaceom_wt_all(1) as surfaceom_wt_residue1
              surfaceom_wt_all(2) as surfaceom_wt_residue2
              surfaceom_n_all(1) as surfaceom_n_residue1
              surfaceom_n_all(2) as surfaceom_n_residue2
              surfaceom.tf
              surfaceom.wf
              surfaceom.cf
          events: event=end_day
    simulation SurfaceOrganicMatter_Test4 -> /SurfaceOrganicMatter_Tests/SurfaceOM_Tests/SurfaceOM_Test4
      area paddock -> /SurfaceOrganicMatter_Tests/SurfaceOM_Tests/SurfaceOM_Test4/paddock
        outputfile report: filename=SurfaceOrganicMatter_Test4 report.out; title=SurfaceOrganicMatter_Test4 report
          variables
            variable:
              day
              year
              surfaceom_wt
              surfaceom_wt_all(1) as surfaceom_wt_residue1
              surfaceom_wt_all(2) as surfaceom_wt_residue2
              surfaceom_cover_all(1) as surfaceom_cover_residue1
              surfaceom_cover_all(2) as surfaceom_cover_residue2
              surfaceom_cover
              surfaceom.tf
              surfaceom.wf
              surfaceom.cf
          events: event=end_day
    simulation SurfaceOrganicMatter_Test5 -> /SurfaceOrganicMatter_Tests/SurfaceOM_Tests/SurfaceOM_Test5
      area paddock -> /SurfaceOrganicMatter_Tests/SurfaceOM_Tests/SurfaceOM_Test5/paddock
        outputfile report: filename=SurfaceOrganicMatter_Test5 report.out; title=SurfaceOrganicMatter_Test5 report
          variables
            variable:
              day
              year
              surfaceom_wt
              surfaceom_wt_all(1) as surfaceom_wt_residue1
              surfaceom_wt_all(2) as surfaceom_wt_residue2
              surfaceom_wt_all(3) as surfaceom_wt_bambatsi
              bambatsi.foliage_mass
              bambatsi.adm_green(1)  as stem_mass
              dlt_no3
          events: event=end_day
    simulation SurfaceOrganicMatter_Test6 -> /SurfaceOrganicMatter_Tests/SurfaceOM_Tests/SurfaceOM_Test6
      area paddock -> /SurfaceOrganicMatter_Tests/SurfaceOM_Tests/SurfaceOM_Test6/paddock
        outputfile report: filename=SurfaceOrganicMatter_Test6 report.out; title=SurfaceOrganicMatter_Test6 report
          variables
            variable:
              day
              year
              wheat.biomass as wht_biomass
              sorghum.biomass as sor_biomass
              canola.biomass as can_biomass
              surfaceom_wt
              surfaceom_wt_all(1) as surfaceom_wt_old_wheat
              surfaceom_wt_all(2) as surfaceom_wt_wheat
              surfaceom_wt_all(3) as surfaceom_wt_sorghum
              surfaceom_wt_all(4) as surfaceom_wt_canola
              surfaceom_cover
              surfaceom_cover_all(1) as surfaceom_cover_old_wheat
              surfaceom_cover_all(2) as surfaceom_cover_wheat
              surfaceom_cover_all(3) as surfaceom_cover_sorghum
              surfaceom_cover_all(4) as surfaceom_cover_canola
          events: event=end_day
  folder SoilNitrogen_Tests
    PlugIns
      PlugIn=[%apsim%/UserInterface/ApsimUIPlugIn.xml, %apsim%/UserInterface/SoilTypes.xml, %apsim%/UserInterface/Graph.xml, %apsim%/UserInterface/Ausfarm.xml, %apsim%/UserInterface/DevelopersPlugIn.xml, %apsim%/Model/Accum.xml, %apsim%/Model/Bambatsi.xml, %apsim%/Model/Barley.xml, %apsim%/Model/Br.xml, %apsim%/Model/Bore.xml, %apsim%/Model/Broccoli.xml, %apsim%/Model/ButterflyPea.xml, %apsim%/Model/Canola.xml, %apsim%/Model/Canopy.xml, %apsim%/Model/Centro.xml, %apsim%/Model/Channel.xml, %apsim%/Model/Chickpea.xml, %apsim%/Model/Cl.xml, %apsim%/Model/Climatechange.xml, %apsim%/Model/Clock.xml, %apsim%/Model/Cowpea.xml, %apsim%/Model/CropUI.xml, %apsim%/Model/Dam.xml, %apsim%/Model/DCD.xml, %apsim%/Model/EGrandis.xml, %apsim%/Model/EMelliodora.xml, %apsim%/Model/Eo.xml, %apsim%/Model/EPopulnea.xml, %apsim%/Model/Erosion.xml, %apsim%/Model/Events.xml, %apsim%/Model/Fababean.xml, %apsim%/Model/Factorial.xml, %apsim%/Model/FrenchBean.xml, %apsim%/Model/Fertiliser.xml, %apsim%/Model/Fieldpea.xml, %apsim%/Model/Gcm_data.xml, %apsim%/Model/Grasp.xml, %apsim%/Model/Graz.xml, %apsim%/Model/Growth.xml, %apsim%/Model/Horsegram.xml, %apsim%/Model/Ini.xml, %apsim%/Model/InitWater.xml, %apsim%/Model/Input.xml, %apsim%/Model/Irrigation.xml, %apsim%/Model/KWTest.xml, %apsim%/Model/Lablab.xml, %apsim%/Model/Lettuce.xml, %apsim%/Model/Log.xml, %apsim%/Model/Lucerne.xml, %apsim%/Model/Lupin.xml, %apsim%/Model/Maize.xml, %apsim%/Model/Manager.xml, %apsim%/Model/Map.xml, %apsim%/Model/Memo.xml, %apsim%/Model/MetFile.xml, %apsim%/Model/MicroMet.xml, %apsim%/Model/Millet.xml, %apsim%/Model/Millet1.xml, %apsim%/Model/Millet2.xml, %apsim%/Model/Millet3.xml, %apsim%/Model/Millet4.xml, %apsim%/Model/Millet5.xml, %apsim%/Model/Mucuna.xml, %apsim%/Model/Mungbean.xml, %apsim%/Model/Navybean.xml, %apsim%/Model/Oats.xml, %apsim%/Model/Ocean_data.xml, %apsim%/Model/Operations.xml, %apsim%/Model/Orobanche.xml, %apsim%/Model/Oryza.xml, %apsim%/Model/OutputFile.xml, %apsim%/Model/Ozcot.xml, %apsim%/Model/Patchinput.xml, %apsim%/Model/Peanut.xml, %apsim%/Model/Pigeonpea.xml, %apsim%/Model/Pond.xml, %apsim%/Model/Potato.xml, %apsim%/Model/RotPlot.xml, %apsim%/Model/RugPlotUI.xml, %apsim%/Model/Root.xml, %apsim%/Model/Rule.xml, %apsim%/Model/Seedling.xml, %apsim%/Model/SiloInput.xml, %apsim%/Model/Slurp.xml, %apsim%/Model/Soi.xml, %apsim%/Model/Soil.xml, %apsim%/Model/Soil with new nitrogen model.xml, %apsim%/Model/SoilNui.xml, %apsim%/Model/SoilTemp.xml, %apsim%/Model/Solute.xml, %apsim%/Model/Sorghum.xml, %apsim%/Model/SorghumConstants.xml, %apsim%/Model/SorghumGenotype.xml, %apsim%/Model/Soybean.xml, %apsim%/Model/Stylo.xml, %apsim%/Model/Sugar.xml, %apsim%/Model/Summaryfile.xml, %apsim%/Model/Sunflower.xml, %apsim%/Model/SurfaceOM.xml, %apsim%/Model/SweetCorn.xml, %apsim%/Model/SweetSorghum.xml, %apsim%/Model/SWIM2ui.xml, %apsim%/Model/Sysbal.xml, %apsim%/Model/Tcllink.xml, %apsim%/Model/Tclmanager.xml, %apsim%/Model/Tclui.xml, %apsim%/Model/Tracker.xml, %apsim%/Model/Tree.xml, %apsim%/Model/Variables.xml, %apsim%/Model/Venlink.xml, %apsim%/Model/vine.xml, %apsim%/Model/WaterSupply.xml, %apsim%/Model/Weed.xml, %apsim%/Model/Wheat.xml, %apsim%/Model/YPCalc.xml, %apsim%\Model\SurfaceOrganicMatter.xml]
    simulation SurfaceOrganicMatter_SoilNitrogen_Test1 -> /SurfaceOrganicMatter_Tests/SurfaceOM_Tests/SurfaceOM_Test1
      area paddock -> /SurfaceOrganicMatter_Tests/SurfaceOM_Tests/SurfaceOM_Test1/paddock
        outputfile report: filename=SurfaceOrganicMatter_SoilNitrogen_Test1 report.out; title=SurfaceOrganicMatter_SoilNitrogen_Test1 report
          events: event=end_day
          variables
            variable:
              day
              year
              surfaceom_wt
              surfaceom_wt_all(1) as surfaceom_wt_residue1
              surfaceom_wt_all(2) as surfaceom_wt_residue2
              surfaceom_n_all(1) as surfaceom_n_residue1
              surfaceom_n_all(2) as surfaceom_n_residue2
              SurfaceOM.tf
              SurfaceOM.wf
              SurfaceOM.cf
    simulation SurfaceOrganicMatter_SoilNitrogen_Test2 -> /SurfaceOrganicMatter_Tests/SurfaceOM_Tests/SurfaceOM_Test2
      area paddock -> /SurfaceOrganicMatter_Tests/SurfaceOM_Tests/SurfaceOM_Test2/paddock
        outputfile report: filename=SurfaceOrganicMatter_SoilNitrogen_Test2 report.out; title=SurfaceOrganicMatter_SoilNitrogen_Test2 report
          variables
            variable:
              day
              year
              surfaceom_wt
              surfaceom_wt_all(1) as surfaceom_wt_residue1
              surfaceom_wt_all(2) as surfaceom_wt_residue2
              surfaceom_n_all(1) as surfaceom_n_residue1
              surfaceom_n_all(2) as surfaceom_n_residue2
              fom_c()
              fom_c
          events: event=end_day
    simulation SurfaceOrganicMatter_SoilNitrogen_Test3 -> /SurfaceOrganicMatter_Tests/SurfaceOM_Tests/SurfaceOM_Test3
      area paddock -> /SurfaceOrganicMatter_Tests/SurfaceOM_Tests/SurfaceOM_Test3/paddock
        outputfile report: filename=SurfaceOrganicMatter_SoilNitrogen_Test3 report.out; title=SurfaceOrganicMatter_SoilNitrogen_Test3 report
          variables
            variable:
              day
              year
              surfaceom_wt
              surfaceom_wt_all(1) as surfaceom_wt_residue1
              surfaceom_wt_all(2) as surfaceom_wt_residue2
              surfaceom_n_all(1) as surfaceom_n_residue1
              surfaceom_n_all(2) as surfaceom_n_residue2
              surfaceom.tf
              surfaceom.wf
              surfaceom.cf
          events: event=end_day
    simulation SurfaceOrganicMatter_SoilNitrogen_Test4 -> /SurfaceOrganicMatter_Tests/SurfaceOM_Tests/SurfaceOM_Test4
      area paddock -> /SurfaceOrganicMatter_Tests/SurfaceOM_Tests/SurfaceOM_Test4/paddock
        outputfile report: filename=SurfaceOrganicMatter_SoilNitrogen_Test4 report.out; title=SurfaceOrganicMatter_SoilNitrogen_Test4 report
          variables
            variable:
              day
              year
              surfaceom_wt
              surfaceom_wt_all(1) as surfaceom_wt_residue1
              surfaceom_wt_all(2) as surfaceom_wt_residue2
              surfaceom_cover_all(1) as surfaceom_cover_residue1
              surfaceom_cover_all(2) as surfaceom_cover_residue2
              surfaceom_cover
              surfaceom.tf
              surfaceom.wf
              surfaceom.cf
          events: event=end_day
    simulation SurfaceOrganicMatter_SoilNitrogen_Test5 -> /SurfaceOrganicMatter_Tests/SurfaceOM_Tests/SurfaceOM_Test5
      area paddock -> /SurfaceOrganicMatter_Tests/SurfaceOM_Tests/SurfaceOM_Test5/paddock
        outputfile report: filename=SurfaceOrganicMatter_SoilNitrogen_Test5 report.out; title=SurfaceOrganicMatter_SoilNitrogen_Test5 report
          variables
            variable:
              day
              year
              surfaceom_wt
              surfaceom_wt_all(1) as surfaceom_wt_residue1
              surfaceom_wt_all(2) as surfaceom_wt_residue2
              surfaceom_wt_all(3) as surfaceom_wt_bambatsi
              bambatsi.foliage_mass
              bambatsi.adm_green(1)  as stem_mass
              dlt_no3
          events: event=end_day
    simulation SurfaceOrganicMatter_SoilNitrogen_Test6 -> /SurfaceOrganicMatter_Tests/SurfaceOM_Tests/SurfaceOM_Test6
      area paddock -> /SurfaceOrganicMatter_Tests/SurfaceOM_Tests/SurfaceOM_Test6/paddock
        outputfile report: filename=SurfaceOrganicMatter_SoilNitrogen_Test6 report.out; title=SurfaceOrganicMatter_SoilNitrogen_Test6 report
          variables: same as SurfaceOrganicMatter_Tests.SurfaceOrganicMatter_Test6.paddock.report.variables
          events: event=end_day
