folder simulations: version=27
  simulation test
    metfile met: filename=%apsim%\Examples\MetFiles\goond.met
    clock
      start_date = 01/01/1970  # Enter the start date of the simulation
      end_date = 30/06/1970  # Enter the end date of the simulation
    summaryfile: filename=Continuous Wheat Simulation.sum
    area paddock
      soil: Site=Jimbour; Region=South East Queensland; LocalName=Waco
        SoilType = Black Vertosol  # Classification
        NearestTown = Jimbour, Q 4352
        NaturalVegetation = Grassland, mainly Qld bluegrass
        InitWater Initial water
          percentmethod: percent=1; distributed=filled from top
        Water
          Layer:
            Thickness (mm)  BD (g/cc)  AirDry (mm/mm)  LL15 (mm/mm)  DUL (mm/mm)  SAT (mm/mm)
            150             1.02       0.15            0.29          0.54         0.59
            150             1.03       0.26            0.29          0.53         0.58
            300             1.02       0.29            0.29          0.54         0.59
            300             1.02       0.29            0.29          0.54         0.58
            300             1.06       0.3             0.3           0.52         0.57
            300             1.11       0.31            0.31          0.5          0.55
            300             1.12       0.32            0.32          0.5          0.55
            300             1.15       0.33            0.33          0.48         0.53
            300             1.18       0.34            0.34          0.47         0.52
            300             1.2        0.35            0.35          0.46         0.51
            300             1.25       0.36            0.36          0.44         0.49
          SoilCrop Barley
            Layer:
              Thickness (mm)  LL (mm/mm)  KL (/day)  XF (0-1)
              150             0.29        0.1        1
              150             0.29        0.1        1
              300             0.32        0.08       1
              300             0.38        0.06       1
              300             0.39        0.04       1
              300             0.39        0.02       1
              300             0.41        0.01       1
              300             0.48        0          0
              300             0.47        0          0
              300             0.46        0          0
              300             0.44        0          0
          SoilCrop Chickpea
            Layer:
              Thickness (mm)  LL (mm/mm)  KL (/day)  XF (0-1)
              150             0.29        0.1        1
              150             0.29        0.1        1
              300             0.36        0.08       1
              300             0.43        0.06       1
              300             0.51        0.04       1
              300             0.5         0.02       1
              300             0.5         0.01       1
              300             0.48        0          0
              300             0.47        0          0
              300             0.46        0          0
              300             0.44        0          0
          SoilCrop Lucerne
            Layer:
              Thickness (mm)  LL (mm/mm)  KL (/day)  XF (0-1)
              150             0.29        0.1        1
              150             0.29        0.1        1
              300             0.29        0.1        1
              300             0.29        0.1        1
              300             0.3         0.09       1
              300             0.31        0.09       1
              300             0.32        0.09       1
              300             0.33        0.09       1
              300             0.34        0.09       1
              300             0.35        0.09       1
              300             0.36        0.09       1
          SoilCrop Maize
            Layer:
              Thickness (mm)  LL (mm/mm)  KL (/day)  XF (0-1)
              150             0.29        0.1        1
              150             0.29        0.1        1
              300             0.34        0.1        1
              300             0.34        0.08       1
              300             0.37        0.06       1
              300             0.4         0.04       1
              300             0.42        0.02       1
              300             0.48        0          0
              300             0.47        0          0
              300             0.46        0          0
              300             0.44        0          0
          SoilCrop Perennial Grass
            Layer:
              Thickness (mm)  LL (mm/mm)  KL (/day)  XF (0-1)
              150             0.29        0.1        1
              150             0.29        0.1        1
              300             0.39        0.1        1
              300             0.41        0.1        1
              300             0.4         0.09       1
              300             0.4         0.07       1
              300             0.41        0.05       1
              300             0.41        0          0
              300             0.4         0          0
              300             0.4         0          0
              300             0.42        0          0
          SoilCrop Sorghum
            Layer:
              Thickness (mm)  LL (mm/mm)  KL (/day)  XF (0-1)
              150             0.29        0.1        1
              150             0.29        0.1        1
              300             0.35        0.1        1
              300             0.38        0.08       1
              300             0.4         0.06       1
              300             0.4         0.04       1
              300             0.4         0.02       1
              300             0.48        0          0
              300             0.47        0          0
              300             0.46        0          0
              300             0.44        0          0
          SoilCrop Wheat
            Layer:
              Thickness (mm)  LL (mm/mm)  KL (/day)  XF (0-1)
              150             0.29        0.1        1
              150             0.29        0.1        1
              300             0.32        0.08       1
              300             0.32        0.06       1
              300             0.35        0.04       1
              300             0.38        0.02       1
              300             0.41        0.01       1
              300             0.48        0          0
              300             0.47        0          0
              300             0.46        0          0
              300             0.44        0          0
        SoilWat: SummerCona=3.5; SummerU=6; SummerDate=1-Nov; WinterCona=3.5; WinterU=6; WinterDate=1-Apr; DiffusConst=40; DiffusSlope=16; Salb=0.13; Cn2Bare=73; CnRed=20; CnCov=0.8
          Layer:
            Thickness (mm)  SWCON (0-1)
            150             0.3
            150             0.3
            300             0.3
            300             0.3
            300             0.3
            300             0.3
            300             0.3
            300             0.3
            300             0.3
            300             0.3
            300             0.3
        SoilOrganicMatter: RootCn=40; RootWt=200; SoilCn=12.5; EnrACoeff=7.4; EnrBCoeff=0.2
          Layer:
            Thickness (mm)  OC (Total %)  FBiom (0-1)  FInert (0-1)
            150             1.04          0.025        0.4
            150             0.89          0.02         0.6
            300             0.89          0.015        0.8
            300             0.89          0.01         0.9
            300             0.77          0.01         0.95
            300             0.45          0.01         0.95
            300             0.27          0.01         0.95
            300             0.22          0.01         0.95
            300             0.16          0.01         0.95
            300             0.13          0.01         0.95
            300             0.12          0.01         0.95
        Analysis
          Layer:
            Thickness (mm)  EC (1:5 dS/m)  PH (1:5 water)
            150             0.2            8.4
            150             0.25           8.8
            300             0.31           9
            300             0.4            9.2
            300             0.59           9.2
            300             0.84           9.1
            300             0.93           9
            300             1.01           9
            300             1.06           8.9
            300             1.05           8.9
            300             1.01           8.9
        Sample Initial nitrogen
          Layer:
            Thickness (mm)  NO3 (ppm)  NH4 (ppm)
            150             6.503      0.599004
            150             2.101      0.100001
            300             2.101      0.100001
            300             1.701      0.100001
            300             1.701      0.100001
            300             1.701      0.100001
            300             1.701      0.100001
            300             1.701      0.100001
            300             1.701      0.100001
            300             1.701      0.100001
            300             1.701      0.100001
      surfaceom surface organic matter
        PoolName = wheat  # Organic Matter pool name
        type = wheat  # Organic Matter type
        mass = 1000  # Initial surface residue (kg/ha)
        cnr = 80  # C:N ratio of initial residue
        standing_fraction = 0  # Fraction of residue standing
      fertiliser
      irrigation
        automatic_irrigation = on
        asw_depth = 600  # Depth to which ASW is calculated. (mm)
        crit_fr_asw = 0.5  # Fraction of ASW below which irrigation is applied (0-1.0)
        irrigation_efficiency = 1  # Efficiency of the irrigation. (0-1.0)
        irrigation_allocation = off  # Allocation limits
        allocation = 0  # Allocation in mm
        default_no3_conc = 0.0  # Nitrate concentration (ppm N)
        default_nh4_conc = 0.0  # Ammonium concentration (ppm N)
        default_cl_conc = 0.0  # Chloride concentration (ppm Cl)
      folder Manager folder
        manager2 Apply irrigation at start of week
          # When should irrigation be applied?
          pastDays = 7  # If rainfall over the past number of days
          enoughRain = 200  # Is less than (mm)
          # This will happen
          irrigate_eff = 1  # Irrigation efficiency (0-1)
```csharp
using System;
using ModelFramework;

public class Script : Instance
{
   [Link]  Irrigation irr_mod;
   [Input] int day = 0;
   [Input] float rain;
   [Param] int pastDays = 0;
   [Param] float enoughRain = 0.0f;
   [Param] float irrigate_eff = 1.0f;
   [Output]float applyIrr = 0.0f;
   private float rainThisWeek = 0.0f;
   [EventHandler] public void OnPrepare()
   {
      if (day % 7 == 0)
      {
         if (rainThisWeek < enoughRain)
         {
            applyIrr = enoughRain - rainThisWeek;
            irr_mod.Apply(applyIrr, 1.0f, "", null, 0.0f, 0.0f, 0.0f, 0.0f);
            rainThisWeek = 0;
            applyIrr = 0;
         }
      }
      else
      {
         rainThisWeek += rain;
      }
   }
}
```
        manager Fertilise on fixed date - top up
          # When should fertiliser be applied
          fert_date = 01-Jan  # Enter fertiliser date (dd-mmm)
          fert_criteria = 1000  # Amount of N required in top 3 layers (kg/ha)
          # Fertiliser application details
          fertmodule = Fertiliser  # Module used to apply the fertiliser
          fert_type = urea_N  # Fertiliser type
          on start_of_day:
```
         if (today = date('[fert_date]') then
            N_deficit = [fert_criteria] - (no3(1) + nh4(1) + no3(2) + nh4(2) + no3(3) + nh4(3))
            '[fertmodule]' apply amount = N_deficit (kg/ha), depth = 50 (mm), type = [fert_type] ()
         endif
```
        manager2 SysBal2
```csharp
using System;
using ModelFramework;

public class SysBal2 : Instance
{
   [Link]   SurfaceOM SurfaceOM;
   [Link]   SoilN SoilN;
   [Link]   Paddock MyPaddock;
   [Input]   double[] sw_dep;
   [Input]   double rain = 0;
   [Input]   double drain = 0;
   [Input]   double runoff = 0;
   [Input]   double es = 0;
   [Input]   double leach_no3 = 0;
   [Input]   double irrigation = 0;
   [Input]   double fertiliser = 0;
   [Output]   double WaterBalance = 0;
   [Output]   double CarbonBalance = 0;
   [Output]   double NitrogenBalance = 0;

   private double cropTotal = 0;
   private double swStart = 0;
   private double stor = 0;
   private double inFlow = 0;
   private double outFlow = 0;
   
   [EventHandler]
   public void OnPrepare()
   {
      swStart = 0;
      stor = 0;
      foreach (Double d in sw_dep)
         swStart += d;
   }

   [EventHandler]
   public void OnPost()
   {
      //Carbon and Nitrogen balance; reset variables
      CarbonBalance = SoilN.Variable("CarbonBalance").ToDouble() + SurfaceOM.Variable("CarbonBalance").ToDouble();
      NitrogenBalance = SoilN.Variable("NitrogenBalance").ToDouble() - leach_no3 + fertiliser + SurfaceOM.Variable("NitrogenBalance").ToDouble();
      
      foreach (Component Crop in MyPaddock.Crops)
      {
         CarbonBalance += Crop.Variable("CarbonBalance").ToDouble(); // variable has not been added to crops yet
         cropTotal += Crop.Variable("ep").ToDouble();  //does not work with Plant2 modules
      }
      if (Math.Abs(CarbonBalance) > 0.1) // catch FP precision issues
      {
         Console.WriteLine("             !!!!!!!!!!!!!!!!!!!!!!!!!!!!!!!!!!!!!!!!!!");
         Console.WriteLine("             !               APSIM Warning            !");
         Console.WriteLine("             !!!!!!!!!!!!!!!!!!!!!!!!!!!!!!!!!!!!!!!!!!");
         Console.WriteLine("          Error in Carbon Balance. Mass balance error(kg/ha): " + CarbonBalance.ToString());
      }
      else
         CarbonBalance = 0;
      if (Math.Abs(NitrogenBalance) > 0.1) // catch FP precision issues
      {
         Console.WriteLine("             !!!!!!!!!!!!!!!!!!!!!!!!!!!!!!!!!!!!!!!!!!");
         Console.WriteLine("             !               APSIM Warning            !");
         Console.WriteLine("             !!!!!!!!!!!!!!!!!!!!!!!!!!!!!!!!!!!!!!!!!!");
         Console.WriteLine("          Error in Nitrogen Balance. Mass balance error(kg/ha): " + NitrogenBalance.ToString());
      }
      else NitrogenBalance = 0;

      //Water balance
      cropTotal = 0;
      foreach (Double d in sw_dep)
         stor += d;
      stor -= swStart;
      inFlow = rain + irrigation; 
      outFlow = drain + cropTotal + es + runoff;
      WaterBalance = inFlow - outFlow - stor;
      if (Math.Abs(WaterBalance) > 0.1) // catch FP precision issues
      {
         Console.WriteLine("             !!!!!!!!!!!!!!!!!!!!!!!!!!!!!!!!!!!!!!!!!!");
         Console.WriteLine("             !               APSIM Warning            !");
         Console.WriteLine("             !!!!!!!!!!!!!!!!!!!!!!!!!!!!!!!!!!!!!!!!!!");
         Console.WriteLine("          Error in Water Balance. Balance error: " + WaterBalance.ToString());
      }
      else WaterBalance = 0;
   }
}
```
      outputfile
        variables
          variables: dd/mm/yyyy as Date, WaterBalance, SysBal2.NitrogenBalance, SysBal2.CarbonBalance
        events Reporting Frequency: event=end_day
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