folder simulations: version=36; creator=Apsim 7.8-r4018
  simulation TaroTongaExpt_2015
    metfile met: filename=Tongatapu.met
    clock
      start_date = 22/07/2015  # Enter the start date of the simulation
      end_date = 26/04/2016  # Enter the end date of the simulation
    summaryfile
    area paddock
      Taro2
      Soil Vaini: State=Tongatapu; Country=Tonga; Latitude=-21.180265; Longitude=-175.26905; YearOfSampling=0
        Water
          Thickness  BD    AirDry  LL15  DUL  SAT
          150        0.92  0.15    0.25  0.4  0.6
          150        0.81  0.17    0.3   0.4  0.6
          300        0.77  0.27    0.33  0.4  0.6
          300        0.76  0.3     0.35  0.4  0.6
          300        0.79  0.33    0.36  0.4  0.6
          300        1.03  0.36    0.38  0.4  0.6
          300        0.98  0.39    0.39  0.4  0.6
          BD, DUL source: Field measured and checked for sensibility
          AirDry, LL15 source: Estimated based on local knowledge
          SAT source: Calculated from measured, estimated or calculated BD
          SoilCrop Taro2: LL=[0.25, 0.3, 0.33, 0.35, 0.36, 0.38, 0.39]; KL=[0.1, 0.1, 0.08, 0.06, 0.04, 0.02, 0.01]; XF=[1, 1, 1, 1, 0, 0, 0]
          SoilCrop Potato: LL=[0.362, 0.454, 0.444, 0.451, 0.47, 0.412, 0.377]; KL=[0.06, 0.06, 0.06, 0.06, 0.06, 0.06, 0.06]; XF=[1, 1, 1, 1, 1, 1, 1]
          SoilCrop weed: LL=[0.362, 0.454, 0.444, 0.451, 0.47, 0.412, 0.377]; KL=[0.06, 0.06, 0.06, 0.06, 0.06, 0.06, 0.06]; XF=[1, 1, 1, 1, 1, 1, 1]
        SoilWater: SummerCona=6; SummerU=2; SummerDate=1-Nov; WinterCona=6; WinterU=2; WinterDate=1-Apr; DiffusConst=256; DiffusSlope=22; Salb=0.12; CN2Bare=95; CNRed=20; CNCov=0.8; Thickness=[150, 150, 300, 300, 300, 300, 300]; SWCON=[0.7, 0.7, 0.7, 0.7, 0.7, 0.7, 0.7]
        SoilOrganicMatter: RootCN=40; RootWt=1000; SoilCN=12; EnrACoeff=7.4; EnrBCoeff=0.2; OCUnits=Total
          Thickness  OC   FBiom  FInert
          150        2.9  0.04   0.4
          150        2.3  0.02   0.5
          300        2.4  0.01   0.6
          300        2.7  0.01   0.7
          300        0.5  0.01   0.9
          300        0.4  0.01   0.95
          300        0.4  0.01   0.99
          OC source: Estimated based on local knowledge
        Analysis: Thickness=[150, 150, 300, 300, 300, 300, 300]; PH=[6.2, 6.2, 6.2, 6.2, 6.2, 6.2, 6.2]; PHUnits=Water; BoronUnits=HotWater
          PH source: Estimated based on local knowledge
        Sample InitialNitrogen: NO3Units=kgha; NH4Units=kgha; SWUnits=Volumetric; OCUnits=Total; PHUnits=Water
          Thickness  NO3     NH4    SW
          150        21.39   9.66   0.35
          150        5.9535  2.43   0.4
          300        4.389   2.31   0.4
          300        2.508   1.14   0.4
          300        4.977   1.896  0.4
          300        2.163   0.927  0.4
          300        0.882   0.294  0.4
      surfaceom SurfaceOrganicMatter
        PoolName = wheat_stubble  # Organic Matter pool name
        type = wheat  # Organic Matter type
        mass = 0.0  # Initial surface residue (kg/ha)
        cnr = 80.0  # C:N ratio of initial residue
        standing_fraction = 0.0  # Fraction of residue standing
      fertiliser
      folder Manager folder
        manager Sow on a fixed date
          # Sowing criteria
          date = 23-jul-2015  # Enter sowing date (dd-mmm)
          # Sowing parameters
          crop = Taro2  # Enter name of crop to sow
          density = 1  # Enter sowing density (plants/m2)
          depth = 1  # Enter sowing depth (mm)
          cultivar = Lauila  # Enter cultivar
          class = Plant  # Enter crop growth class
          row_spacing = 1000  # Enter row spacing (mm)
          on start_of_day:
```
        if (today = date('[date]') then
              [crop] sow population =[density], depth = [depth], cultivar = [cultivar], MaxCover = 1.0, BudNumber = 1, row_spacing = [row_spacing], crop_class = [class]
         endif
```
        operations Operations Schedule
          24-Jul-2015  Irrigation apply amount = 0.86 (mm)
          27-Jul-2015  Irrigation apply amount = 0.86 (mm)
          28-Jul-2015  Irrigation apply amount = 0.86 (mm)
          29-Jul-2015  Irrigation apply amount = 0.86 (mm)
          30-Jul-2015  Irrigation apply amount = 0.86 (mm)
          31-Jul-2015  Irrigation apply amount = 0.86 (mm)
          03-Aug-2015  Irrigation apply amount = 0.86 (mm)
          06-Aug-2015  Irrigation apply amount = 0.86 (mm)
          12-Aug-2015  Irrigation apply amount = 0.65 (mm)
          14-Aug-2015  Irrigation apply amount = 0.65 (mm)
          20-Aug-2015  Irrigation apply amount = 0.65 (mm)
          21-Aug-2015  Irrigation apply amount = 0.86 (mm)
          31-Aug-2015  Irrigation apply amount = 0.65 (mm)
          11-Sep-2015  Irrigation apply amount = 0.86  (mm)
          01-Oct-2015  Irrigation apply amount = 0.65  (mm)
          21-Oct-2015  Irrigation apply amount = 2.15  (mm)
          22-Oct-2015  Irrigation apply amount = 12.92 (mm)
          28-Oct-2015  Irrigation apply amount = 3.58  (mm)
          29-Oct-2015  Irrigation apply amount = 10.77 (mm)
          09-Nov-2015  Irrigation apply amount = 2.15  (mm)
          10-Nov-2015  Irrigation apply amount = 4.31  (mm)
          17-Nov-2015  Irrigation apply amount = 4.31  (mm)
          20-Nov-2015  Irrigation apply amount = 3.23  (mm)
          10-Dec-2015  Irrigation apply amount = 5.38  (mm)
          14-Dec-2015  Irrigation apply amount = 2.15  (mm)
          17-Dec-2015  Irrigation apply amount = 2.15  (mm)
          23-Dec-2015  Irrigation apply amount = 2.15  (mm)
          24-Dec-2015  Irrigation apply amount = 5.92  (mm)
          31-Dec-2015  Irrigation apply amount = 1.62  (mm)
          05-Jan-2016  Irrigation apply amount = 4.31  (mm)
          12-Jan-2016  Irrigation apply amount = 2.15  (mm)
          14-Jan-2016  Irrigation apply amount = 4.31  (mm)
          15-Jan-2016  Irrigation apply amount = 2.15  (mm)
          18-Jan-2016  Irrigation apply amount = 3.23  (mm)
          19-Jan-2016  Irrigation apply amount = 2.15  (mm)
          20-Jan-2016  Irrigation apply amount = 5.38  (mm)
          21-Jan-2016  Irrigation apply amount = 10.77 (mm)
          22-Jan-2016  Irrigation apply amount = 7.54  (mm)
          25-Jan-2016  Irrigation apply amount = 7.54  (mm)
          26-Jan-2016  Irrigation apply amount = 5.38  (mm)
          29-Jan-2016  Irrigation apply amount = 1.43  (mm)
          30-Jan-2016  Irrigation apply amount = 8.62  (mm)
          01-Feb-2016  Irrigation apply amount = 5.38  (mm)
          02-Feb-2016  Irrigation apply amount = 7.54  (mm)
          03-Feb-2016  Irrigation apply amount = 7.54  (mm)
          04-Feb-2016  Irrigation apply amount = 7.54  (mm)
          04-Feb-2016  Irrigation apply amount = 8.62  (mm)
          05-Feb-2016  Irrigation apply amount = 7.54  (mm)
          18-Feb-2016  Irrigation apply amount = 7.54  (mm)
          19-Feb-2016  Irrigation apply amount = 7.54  (mm)
          22-Feb-2016  Irrigation apply amount = 7.54  (mm)
          23-Feb-2016  Irrigation apply amount = 7.54  (mm)
          24-Feb-2016  Irrigation apply amount = 7.54  (mm)
          25-Feb-2016  Irrigation apply amount = 17.23 (mm)
          26-Feb-2016  Irrigation apply amount = 7.54   (mm)
          29-Feb-2016  Irrigation apply amount = 7.54   (mm)
          01-Mar-2016  Irrigation apply amount = 4.31   (mm)
          03-Mar-2016  Irrigation apply amount = 7.54   (mm)
          09-Mar-2016  Irrigation apply amount = 7.54   (mm)
          11-Mar-2016  Irrigation apply amount = 4.31   (mm)
          29-Mar-2016  Irrigation apply amount = 6.46   (mm)
          31-Mar-2016  Irrigation apply amount = 6.46   (mm)
          10-sep-2015  fertiliser apply amount = 21.0 (kg/ha), depth = 50 (mm), type = NO3_N ()
          29-oct-2015  fertiliser apply amount = 140.0 (kg/ha), depth = 50 (mm), type = NO3_N ()
          10-feb-2016  fertiliser apply amount = 70.0 (kg/ha), depth = 50 (mm), type = NO3_N ()
          23-jul-2015  fertiliser apply amount = 140.0 (kg/ha), depth = 50 (mm), type = NO3_N ()
        manager Harvesting rule Taro2
          # Harvesting criteria
          crop = Taro2  # Enter name of crop to harvest when ripe
          on end_of_day:
```
           if ([crop].plant_status <> 'out') then
              if ([crop].PhenologyCurrentStageName = 'HarvestReady' or [crop].plant_status = 'dead') then
                 [crop] harvest
                 [crop] endcrop
              endif
           endif
```
      outputfile: filename=TaroTongaExpt_2015.out; title=TaroTongaExpt_2015
        variables
          variables: dd/mm/yyyy as Date, day, rain, StageCodeValue, PhenologyCurrentPhaseName, PhenologyCurrentStageName, Taro2.LeafLAI, LeafLAItot, AboveGroundWt, sw_dep(), WaterDemand, LeafFw, LeafTranspiration, LeafWaterDemand, RootWaterUptake, surfaceom_wt, no3(), StructureMainStemNodeNo, LeafExpandedNodeNo, LeafExpandedCohortNo, LeafThermalTimeValue, StemLiveWt, StemLiveStructuralNConc, StemLiveNConc, CormLiveWt, BelowGroundWt, TotalWt, TotalWttot, LeafLiveWt, RootLiveWt, Taro2.LeafLiveN, LeafAppearedCohortNo, LeafDeadWt, LeafDMSupplyPhotosynthesis, LeafExpandedCohortNo, LeafExpandedNodeNo, LeafExpandingCohortNo, LeafExpansionStressValue, LeafExtinctionCoeffValue, LeafGreenCohortNo, LeafLiveNonStructuralWt, LeafLivePotentialDMAllocation, LeafPlantAppearedGreenLeafNo, LeafPotentialGrowth, LeafSenescingCohortNo, RadIntTot, CumRadIntTot, TotalPotentialDMAllocation, Cover_green, RootWttot, StemWttot, CormWttot, LeafWttot, stemSenescenceRateValue, cormSenescenceRateValue, CormDeadWt, StemDeadWt, leaffn, leafphotosynthesysfn, LeafSpecificLeafAreaMaxValue, LeafSpecificLeafAreaMinValue, LeafSpecificArea, sw_dep, rain, irrigation, irrig_tot, PhenologyThermalTimeValue, ll15_dep, dul_dep, sat_dep, Corm_N, Leaf_n, CormNSupplyUptake, LeafNSupplyUptake
        events Reporting Frequency: event=daily
      micromet
        soilalbedo = 0.12
        a_interception = 0.0
        b_interception = 0.0
        c_interception = 0.0
        d_interception = 0.0
      irrigation
        automatic_irrigation = off
        asw_depth = 150  # Depth to which ASW is calculated. (mm)
        crit_fr_asw = 0.8  # Fraction of ASW below which irrigation is applied (0-1.0)
        irrigation_efficiency = 1  # Efficiency of the irrigation. (0-1.0)
        irrigation_allocation = off  # Allocation limits
        allocation = 0  # Allocation in mm
        default_no3_conc = 0.0  # Nitrate concentration (ppm N)
        default_nh4_conc = 0.0  # Ammonium concentration (ppm N)
        default_cl_conc = 0.0  # Chloride concentration (ppm Cl)
      tracker
        variable:
          sum of cormNsupplyuptake on start_of_day from sowing to now as Corm_N
          sum of leafNsupplyuptake on start_of_day from sowing to now as Leaf_N
      folder Taro Crop Analysis Graphs
        outputfile Outputs: filename=TaroTongaExpt_2015 Outputs.out; title=TaroTongaExpt_2015 Outputs
          events Reporting Frequency: event=end_day
          variables
            variables: dd/mmm/yyyy, no3(), nh4(), urea(), surfaceom_n, biom_n(), fom_n(), hum_n(), dnit(), leach_no3, AccumPlantN, AccumMineralisation, AccumDenit, AccumFert, AccumLeach, AccumDetach, DeltaSoilMineralN, RootNSupplyUptake, eo, es, sw_dep(), dul_dep(), drain, runoff, outflow_lat(), pond, AccumEO, AccumEP, AccumES, AccumDrainage, AccumRunoff, AccumRainfall, AccumIrrigation, AccumOutflowLat, SoilWaterDeficit, LeafDeadWt, LeafLiveWt, CormDeadWt, CormLiveWt, RootDeadWt, RootLiveWt, RootLiveN, RootDeadN, LeafDeadN, LeafLiveN, CormDeadN, CormLiveN, RootWaterSupply, RootWaterUptake, LeafTranspiration, LeafWaterDemand, RootDepth, Cover_green, Cover_tot, Cover_dead, LeafLAI, LeafLAIDead, Height, LeafFn, LeafFw, LeafFrgr, LeafPhotosynthesisFtValue, LeafPhotosynthesisFvpdValue, LeafAppearedCohortNo, LeafExpandingCohortNo, LeafGreenCohortNo, LeafDeadCohortNo, LeafSenescingCohortNo, LeafPlantAppearedGreenLeafNo, RootLiveNConc, RootDeadNConc, LeafCohortSize(), RootMaximumNConcValue, TotalLiveNonStructuralN, TotalStructuralN, TotalWt, RadIntTot, RootMinimumNConcValue, irrigation, dlayer, flow_no3, flow, flux, no3, nh4, dd/mmm/yyyy as date, rain, surfaceom_wt, surfaceom_cover, wf, rain, LeafLiveNConc, LeafMaxAreaValue, LeafMinimumNConcValue, LeafMaximumNConcValue, LeafDeadNConc, RootWaterSupply, StageCodeValue, PhenologyCurrentStageName, CormMaximumNConcValue, CormMinimumNConcValue, CormLiveNConc
        manager Diagnostic variables
          CropType = Taro2  # Select crop type to report variables for
          on init:
```
SimDay = 1

AccumPlantN = 0
AccumMineralisation = 0
AccumDenit = 0
AccumFert = 0
AccumLeach = 0
AccumDetach = 0
DeltaSoilOMN = 0
DeltaSurfaceOMN = 0
DeltaSoilMineralN = 0

AccumEO = 0
AccumEP = 0
AccumES = 0
AccumDrainage = 0
AccumRunoff = 0
AccumOutflowLat = 0
AccumIrrigation = 0
AccumRainfall = 0
SoilWaterDeficit = 0

AccumTtemerg = 0
```
          on start_of_day:
```
if simday = 1 then
InitialSoilOMN = biom_n() + fom_n() + hum_n()
InitialSurfaceOMN = surfaceom_n
InitialMineralN = no3() + nh4() + urea()
endif

!!!!!! Nitrogen balance components !!!!!!
!!!!!!^^^^^^^^^^^^^^^^^^^^^^^^^^^^^!!!!!!
if ([CropType].plant_status <> 'out') then
   AccumPlantN =  AccumPlantN - [CropType].RootNuptake
endif
AccumMineralisation = AccumMineralisation + dlt_n_min() + dlt_n_min_res()
AccumDenit = AccumDenit - dnit() 
AccumFert = AccumFert + fertiliser
AccumLeach = AccumLeach - leach_urea - leach_no3 - leach_nh4 
AccumDetach = 0 !plant2 doesn't detach yet
DeltaSoilOMN = (biom_n() + fom_n() + hum_n()) - InitialSoilOMN
DeltaSurfaceOMN = surfaceom_n - InitialSurfaceOMN
DeltaSoilMineralN = (no3() + nh4() + urea()) - InitialMineralN

!!!!!! Water balance components !!!!!!
!!!!!!^^^^^^^^^^^^^^^^^^^^^^^^^^!!!!!!
AccumEO = AccumEO - eo
if ([CropType].plant_status <> 'out') then
   AccumEP = AccumEP - [CropType].LeafTranspiration
Endif
AccumES = AccumES - es
AccumDrainage = AccumDrainage - drain
AccumRunoff = AccumRunoff - runoff
AccumOutflowLat = AccumOutflowLat - outflow_lat()
AccumIrrigation = AccumIrrigation + Irrigation
AccumRainfall = Accumrainfall + rain
SoilWaterDeficit =  sw_dep() - dul_dep()

!!!!!! Thermal time calculation !!!!!!
!!!!!! ^^^^^^^^^^^^^^^^^^^^^^^^ !!!!!!
if ([CropType].plant_status <> 'out') then
   If [CropType].StageCodeValue >= 3 Then
      AccumTtemerg = AccumTtemerg + [CropType].PhenologyThermalTimeValue
   Endif
Endif
```
          on end_of_day:
```
if SimDay = 1 then
SimDay = 2
Else SimDay = 2
endif
```
  simulation ContinuousTaro Tonga SurfOMreset
    metfile met: filename=Tongatapu.met
    clock
      start_date = 22/07/1980  # Enter the start date of the simulation
      end_date = 30/03/2016  # Enter the end date of the simulation
    summaryfile
    area paddock
      Soil Vaini: State=Tongatapu; Country=Tonga; Latitude=-21.180265; Longitude=-175.26905; YearOfSampling=0
        Water: same as TaroTongaExpt_2015.paddock.Vaini.Water
        SoilWater: same as TaroTongaExpt_2015.paddock.Vaini.SoilWater
        SoilOrganicMatter: same as TaroTongaExpt_2015.paddock.Vaini.SoilOrganicMatter
        Analysis: same as TaroTongaExpt_2015.paddock.Vaini.Analysis
        Sample InitialNitrogen: NO3Units=kgha; NH4Units=kgha; SWUnits=Volumetric; OCUnits=Total; PHUnits=Water
          Thickness  NO3     NH4
          150        21.39   9.66
          150        5.9535  2.43
          300        4.389   2.31
          300        2.508   1.14
          300        4.977   1.896
          300        2.163   0.927
          300        0.882   0.294
        InitialWater: FractionFull=0.6; PercentMethod=FilledFromTop; RelativeTo=ll15
      micromet: soilalbedo=0.23; a_interception=0.0; b_interception=0.0; c_interception=0.0; d_interception=0.0
      Taro2
      surfaceom SurfaceOrganicMatter
        PoolName = wheat_stubble  # Organic Matter pool name
        type = wheat  # Organic Matter type
        mass = 0.0  # Initial surface residue (kg/ha)
        cnr = 80.0  # C:N ratio of initial residue
        standing_fraction = 0.0  # Fraction of residue standing
      fertiliser
      irrigation: same as TaroTongaExpt_2015.paddock.Irrigation
      folder Manager folder
        manager Harvesting rule
          # Harvesting criteria
          crop = Taro2  # Enter name of crop to harvest when ripe
          on end_of_day:
          script: same as in TaroTongaExpt_2015.paddock.Manager folder.Harvesting rule Taro2
        manager Sow using a variable rule
          # Sowing criteria
          date1 = 23-jul  # Enter sowing window START date (dd-mmm)
          date2 = 23-sep  # Enter sowing window END date (dd-mmm)
          must_sow = yes  # Must sow?
          raincrit = 10  # Amount of rainfall
          rainnumdays = 3  # Number of days of rainfall
          esw_amount = 200  # Enter minimum allowable available soil water (mm)
          # Sowing parameters
          crop = Taro2  # Enter name of crop to sow
          density = 1  # Enter sowing density (plants/m2)
          depth = 1  # Enter sowing depth (mm)
          cultivar = Lauila  # Enter cultivar
          class = plant  # Enter crop growth class
          row_spacing = 1000  # Enter row spacing (mm)
          on start_of_day:
```
      if (paddock_is_fallow() = 1 and FallowIn <> 'yes' and (NextCrop = 0 or NextCrop = '[crop]')) then
         if (date_within('[date1], [date2]') = 1) then
            if (rain[[rainnumdays]] >= [raincrit] AND esw >= [esw_amount]) OR
                ('[must_sow]' = 'yes' AND today = date('[date2]'))) THEN
               ChooseNextCrop = 'yes'   ! for rotations
              [crop] sow population =[density], depth = [depth], cultivar = [cultivar], MaxCover = 1.0, BudNumber = 1, row_spacing = [row_spacing], crop_class = [class]
            endif
            if today = date('[date2]') then
               ChooseNextCrop = 'yes'
            endif
         endif
      endif
```
        manager Taro2_FW
          on init:
```
   yield = 0.0
   N_Stress = 0.0
   SW_Stress = 0.0
```
          on end_of_day:
```
if (taro2.plant_status <> 'out') then
   yield = Taro2.CormLiveWt * 30.0  ! based on 2/3rd water
   if (DaysAfterSowing > 0.0) then  
      N_Stress = (DaysAfterSowing - Nstress) / DaysAfterSowing 
      SW_Stress = (DaysAfterSowing - SWstress) / DaysAfterSowing
   else
      N_Stress = 0.0
      SW_Stress = 0.0
   endif 
else
   yield = 0.0
   N_Stress = 0.0
   SW_Stress = 0.0

endif
```
        manager Reset water, nitrogen, surfaceOM and phosphorus on fixed date
          # When should a reset be done
          reset_date = 22-jul  # Enter date of reset (dd-mmm)
          # Reset details
          soilmodule = Vaini  # Name of your soil module
          surfaceommodule = SurfaceOrganicMatter  # Name of your surface organic matter module
          pmodule = Phosphorus  # Name of your phosphorus module
          resetWater = no  # Reset soil water?
          resetNitrogen = no  # Reset soil nitrogen?
          resetSurfaceOM = yes  # Reset surface organic matter?
          resetP = no  # Reset phosphorus?
          on start_of_day:
```
         if (today = date('[reset_date]')) then
            resetWater = '[resetWater]'
            resetNitrogen  = '[resetNitrogen]'
            resetSurfaceOM = '[resetSurfaceOM]'
            resetP = '[resetP]'
            if (resetWater = 'yes') then
                '[soilmodule] Water' reset
            endif
            if (resetNitrogen = 'yes') then
                '[soilmodule] Nitrogen' reset
            endif
            if (resetSurfaceOM = 'yes') then
                '[surfaceommodule]' reset
            endif
            if (resetP = 'yes') then
                '[pmodule]' reset
            endif
            act_mods reseting
         endif
```
      tracker
        variable:
          sum of rain on start_of_day from sowing to now as RainSinceSowing
          sum of dlt_n_min() on end_of_day from reported to now as Minz_N
          sum of leafFn on end_of_day from sowing to now as Nstress
          sum of leafFw on end_of_day from sowing to now as SWstress
          sum of dlt_res_no3_min() on end_of_day from reported to now as Minz_res_N
      outputfile: filename=ContinuousTaro Tonga SurfOMreset.out; title=ContinuousTaro Tonga SurfOMreset
        variables
          variables: dd/mm/yyyy as Date, day, Taro2.LeafLAI, sw_dep(), surfaceom_wt, no3(), CormLiveWt, LeafLiveWt, Taro2.LeafLiveN, LeafDeadWt, RainSinceSowing, Minz_N, Minz_res_N, oc(), carbon_tot(), yield, DaysAfterSowing, no3(), oc, N_Stress, SW_Stress
        events Reporting Frequency: event=CropEnding
  simulation ContinuousTaro Tonga SW N SurfOMreset
    metfile met: filename=Tongatapu.met
    clock
      start_date = 22/07/1980  # Enter the start date of the simulation
      end_date = 30/03/2016  # Enter the end date of the simulation
    summaryfile
    area paddock
      Soil Vaini: same as ContinuousTaro Tonga SurfOMreset.paddock.Vaini
      micromet: soilalbedo=0.23; a_interception=0.0; b_interception=0.0; c_interception=0.0; d_interception=0.0
      Taro2
      surfaceom SurfaceOrganicMatter
        PoolName = wheat_stubble  # Organic Matter pool name
        type = wheat  # Organic Matter type
        mass = 0.0  # Initial surface residue (kg/ha)
        cnr = 80.0  # C:N ratio of initial residue
        standing_fraction = 0.0  # Fraction of residue standing
      fertiliser
      irrigation: same as TaroTongaExpt_2015.paddock.Irrigation
      folder Manager folder
        manager Harvesting rule: same as ContinuousTaro Tonga SurfOMreset.paddock.Manager folder.Harvesting rule
        manager Sow using a variable rule: same as ContinuousTaro Tonga SurfOMreset.paddock.Manager folder.Sow using a variable rule
        manager Taro2_FW: same as ContinuousTaro Tonga SurfOMreset.paddock.Manager folder.Taro2_FW
        manager Reset water, nitrogen, surfaceOM and phosphorus on fixed date
          # When should a reset be done
          reset_date = 22-jul  # Enter date of reset (dd-mmm)
          # Reset details
          soilmodule = Vaini  # Name of your soil module
          surfaceommodule = SurfaceOrganicMatter  # Name of your surface organic matter module
          pmodule = Phosphorus  # Name of your phosphorus module
          resetWater = yes  # Reset soil water?
          resetNitrogen = yes  # Reset soil nitrogen?
          resetSurfaceOM = yes  # Reset surface organic matter?
          resetP = no  # Reset phosphorus?
          on start_of_day:
          script: same as in ContinuousTaro Tonga SurfOMreset.paddock.Manager folder.Reset water, nitrogen, surfaceOM and phosphorus on fixed date
      tracker
        variable:
          sum of rain on start_of_day from sowing to now as RainSinceSowing
          sum of dlt_n_min() on end_of_day from reported to now as Minz_N
          sum of leafFn on end_of_day from sowing to now as Nstress
          sum of leafFw on end_of_day from sowing to now as SWstress
          sum of dlt_res_no3_min() on end_of_day from reported to now as Minz_res_N
      outputfile: filename=ContinuousTaro Tonga SW N SurfOMreset.out; title=ContinuousTaro Tonga SW N SurfOMreset
        variables
          variables: dd/mm/yyyy as Date, day, Taro2.LeafLAI, sw_dep(), surfaceom_wt, no3(), CormLiveWt, LeafLiveWt, Taro2.LeafLiveN, LeafDeadWt, RainSinceSowing, Minz_N, Minz_res_N, oc(), carbon_tot(), yield, DaysAfterSowing, no3(), oc, N_Stress, SW_Stress
        events Reporting Frequency: event=CropEnding
  simulation Taro2FijiTrial1
    metfile met: filename=suva3.met
    clock
      start_date = 01/12/2012  # Enter the start date of the simulation
      end_date = 31/12/2013  # Enter the end date of the simulation
    summaryfile
    area paddock
      Soil Loam: SoilType=Loam; LocalName=Waco; Site=Jimbour; NearestTown=Jimbour, Q 4352; Region=South East Queensland; NaturalVegetation=Grassland, mainly Qld bluegrass; Latitude=0; Longitude=0; YearOfSampling=0
        Water
          Thickness  BD    AirDry  LL15  DUL    SAT
          150        1.14  0.15    0.29  0.465  0.489
          150        1.24  0.26    0.29  0.431  0.454
          300        1     0.29    0.29  0.514  0.542
          300        1.05  0.29    0.29  0.497  0.523
          300        1.01  0.3     0.3   0.512  0.539
          300        1.01  0.31    0.31  0.512  0.539
          SoilCrop Taro2: LL=[0.29, 0.29, 0.29, 0.3, 0.4, 0.5]; KL=[0.1, 0.1, 0.08, 0.06, 0.04, 0.02]; XF=[1, 1, 1, 1, 1, 1]
          SoilCrop cassava2: LL=[0.29, 0.29, 0.29, 0.29, 0.3, 0.31]; KL=[0.06, 0.06, 0.06, 0.06, 0.06, 0.06]; XF=[1, 1, 1, 1, 1, 1]
          SoilCrop Potato: LL=[0.29, 0.29, 0.29, 0.29, 0.3, 0.31]; KL=[0.06, 0.06, 0.06, 0.06, 0.06, 0.06]; XF=[1, 1, 1, 1, 1, 1]
          SoilCrop Wheat: LL=[0.29, 0.29, 0.29, 0.29, 0.3, 0.31]; KL=[0.06, 0.06, 0.06, 0.06, 0.06, 0.06]; XF=[1, 1, 1, 1, 1, 1]
          SoilCrop Weed: LL=[0.29, 0.29, 0.29, 0.29, 0.3, 0.31]; KL=[0.06, 0.06, 0.06, 0.06, 0.06, 0.06]; XF=[1, 1, 1, 1, 1, 1]
          SoilCrop Weed1: LL=[0.29, 0.29, 0.29, 0.29, 0.3, 0.31]; KL=[0.06, 0.06, 0.06, 0.06, 0.06, 0.06]; XF=[1, 1, 1, 1, 1, 1]
        SoilWater: SummerCona=3.5; SummerU=6; SummerDate=1-Nov; WinterCona=3.5; WinterU=6; WinterDate=1-Apr; DiffusConst=40; DiffusSlope=16; Salb=0.13; CN2Bare=73; CNRed=20; CNCov=0.8; Thickness=[150, 150, 300, 300, 300, 300]; SWCON=[0.3, 0.3, 0.3, 0.3, 0.3, 0.3]
        SoilOrganicMatter: RootCN=40; RootWt=200; SoilCN=12.5; EnrACoeff=7.4; EnrBCoeff=0.2; OCUnits=Total
          Thickness  OC    FBiom  FInert
          150        1.04  0.025  0.4
          150        0.89  0.02   0.6
          300        0.89  0.015  0.8
          300        0.89  0.01   0.9
          300        0.77  0.01   0.95
          300        0.45  0.01   0.95
          ini: filename=SurfaceOMTaro2.xml
        Analysis: PHUnits=Water; BoronUnits=HotWater
          Thickness  EC    PH
          150        0.2   7.5
          150        0.25  7.5
          300        0.31  7.5
          300        0.4   7.5
          300        0.59  7.5
          300        0.84  7.5
        Sample Initial Nitrogen: NO3Units=kgha; NH4Units=kgha; SWUnits=Volumetric; OCUnits=Total; PHUnits=Water
          Thickness  NO3   NH4   SW
          150        1.28  0.77  0.29
          150        1.76  0.69  0.29
          300        3.01  0.6   0.29
          300        4.11  0.79  0.3
          300        3     0.7   0.4
          300        3     0.7   0.5
          999999     -     -     -
          999999     -     -     -
      Taro2
      surfaceom SurfaceOrganicMatter
        PoolName = wheat_stubble  # Organic Matter pool name
        type = wheat  # Organic Matter type
        mass = 0.0  # Initial surface residue (kg/ha)
        cnr = 80.0  # C:N ratio of initial residue
        standing_fraction = 0.0  # Fraction of residue standing
      irrigation
        automatic_irrigation = off
        asw_depth = 600  # Depth to which ASW is calculated. (mm)
        crit_fr_asw = 0.5  # Fraction of ASW below which irrigation is applied (0-1.0)
        irrigation_efficiency = 1  # Efficiency of the irrigation. (0-1.0)
        irrigation_allocation = off  # Allocation limits
        allocation = 0  # Allocation in mm
        default_no3_conc = 0.0  # Nitrate concentration (ppm N)
        default_nh4_conc = 0.0  # Ammonium concentration (ppm N)
        default_cl_conc = 0.0  # Chloride concentration (ppm Cl)
      micromet: soilalbedo=0.23; a_interception=0.0; b_interception=0.0; c_interception=0.0; d_interception=0.0
      fertiliser
      folder Manager folder
        manager Sow on a fixed date
          # Sowing criteria
          date = 22/01/2013  # Enter sowing date (dd-mmm)
          # Sowing parameters
          crop = Taro2  # Enter name of crop to sow
          density = 1  # Enter sowing density (plants/m2)
          depth = 1  # Enter sowing depth (mm)
          cultivar = Tausala  # Enter cultivar
          class = Plant  # Enter crop growth class
          row_spacing = 1000  # Enter row spacing (mm)
          on start_of_day:
          script: same as in TaroTongaExpt_2015.paddock.Manager folder.Sow on a fixed date
        operations Operations Schedule
          22/1/2013  fertiliser apply amount = 39 (kg/ha), depth = 50 (mm), type = NO3_N ()
          26/2/2013  fertiliser apply amount = 52 (kg/ha), depth = 50 (mm), type = Urea_N ()
          1/4/2013  fertiliser apply amount = 52 (kg/ha), depth = 50 (mm), type = Urea_N ()
          25/4/2013  Irrigation apply amount = 2 (mm)
          6/5/2013  fertiliser apply amount = 52 (kg/ha), depth = 50 (mm), type = Urea_N ()
        manager Harvesting rule Taro2: same as TaroTongaExpt_2015.paddock.Manager folder.Harvesting rule Taro2
        manager Fertilise incrop on critical NO3 level- top up
          # When should fertiliser be applied
          modulename = Taro2  # In which crop is fertiliser being applied
          fert_criteria = 120  # Maximum Amount of NO3 required in top 3 layers (kg/ha)
          fert_critical = 20  # Critical Amount of NO3 in top 3 layers (kg/ha)
          # Fertiliser application details
          fertmodule = fertiliser  # Module used to apply the fertiliser
          fert_type = NO3_N  # Fertiliser type
          on start_of_day:
```
         if ([modulename].plant_status = 'alive') then
            NO3_available = no3(1) + no3(2) + no3(3)
            if (NO3_available <= [fert_critical]) then
               N_deficit = [fert_criteria] - NO3_available
               '[fertmodule]' apply amount = N_deficit (kg/ha), depth = 50 (mm), type = [fert_type] ()
            endif
         endif
```
      outputfile: filename=Taro2FijiTrial1.out; title=Taro2FijiTrial1
        variables
          variables: dd/mm/yyyy as Date, StageCodeValue, PhenologyCurrentPhaseName, PhenologyCurrentStageName, LeafLAI, AboveGroundWt, sw_dep(), WaterDemand, LeafFw, LeafTranspiration, LeafWaterDemand, RootWaterUptake, surfaceom_wt, no3(), StructureMainStemNodeNo, LeafExpandedNodeNo, LeafExpandedCohortNo, LeafThermalTimeValue, StemLiveWt, StemLiveStructuralNConc, StemLiveNConc, CormLiveWt, BelowGroundWt, TotalWt, LeafLiveWt, RootLiveWt, FruitLiveWt, Taro2.LeafLiveN
        events Reporting Frequency: event=daily
      folder Taro Crop Analysis Graphs
        outputfile Outputs: filename=Taro2FijiTrial1 Outputs.out; title=Taro2FijiTrial1 Outputs
          events Reporting Frequency: event=end_day
          variables
            variables: dd/mmm/yyyy, no3(), nh4(), urea(), surfaceom_n, biom_n(), fom_n(), hum_n(), dnit(), leach_no3, AccumPlantN, AccumMineralisation, AccumDenit, AccumFert, AccumLeach, AccumDetach, DeltaSoilMineralN, RootNSupplyUptake, eo, es, sw_dep(), dul_dep(), drain, runoff, outflow_lat(), pond, AccumEO, AccumEP, AccumES, AccumDrainage, AccumRunoff, AccumRainfall, AccumIrrigation, AccumOutflowLat, SoilWaterDeficit, LeafDeadWt, LeafLiveWt, CormDeadWt, CormLiveWt, RootDeadWt, RootLiveWt, RootLiveN, RootDeadN, LeafDeadN, LeafLiveN, CormDeadN, CormLiveN, RootWaterSupply, RootWaterUptake, LeafTranspiration, LeafWaterDemand, RootDepth, Cover_green, Cover_tot, Cover_dead, LeafLAI, LeafLAIDead, Height, LeafFn, LeafFw, LeafFrgr, LeafPhotosynthesisFtValue, LeafPhotosynthesisFvpdValue, LeafAppearedCohortNo, LeafExpandingCohortNo, LeafGreenCohortNo, LeafDeadCohortNo, LeafSenescingCohortNo, LeafPlantAppearedGreenLeafNo, RootLiveNConc, RootDeadNConc, LeafCohortSize(), RootMaximumNConcValue, TotalLiveNonStructuralN, TotalStructuralN, TotalWt, RadIntTot, RootMinimumNConcValue, irrigation, dlayer, flow_no3, flow, flux, no3, nh4, dd/mmm/yyyy as date, rain, surfaceom_wt, surfaceom_cover, wf, rain, LeafLiveNConc, LeafMaxAreaValue, LeafMinimumNConcValue, LeafMaximumNConcValue, LeafDeadNConc, RootWaterSupply, StageCodeValue, PhenologyCurrentStageName, CormMaximumNConcValue, CormMinimumNConcValue, CormLiveNConc, TotalLiveWt, TotalGreen, N_deficit, NO3_available
        manager Diagnostic variables
          CropType = Taro2  # Select crop type to report variables for
          on init:
```
SimDay = 1

AccumPlantN = 0
AccumMineralisation = 0
AccumDenit = 0
AccumFert = 0
AccumLeach = 0
AccumDetach = 0
DeltaSoilOMN = 0
DeltaSurfaceOMN = 0
DeltaSoilMineralN = 0

AccumEO = 0
AccumEP = 0
AccumES = 0
AccumDrainage = 0
AccumRunoff = 0
AccumOutflowLat = 0
AccumIrrigation = 0
AccumRainfall = 0
SoilWaterDeficit = 0

AccumTtemerg = 0

TotalGreen = 0.0
```
          on start_of_day:
```
if simday = 1 then
InitialSoilOMN = biom_n() + fom_n() + hum_n()
InitialSurfaceOMN = surfaceom_n
InitialMineralN = no3() + nh4() + urea()
endif

!!!!!! Nitrogen balance components !!!!!!
!!!!!!^^^^^^^^^^^^^^^^^^^^^^^^^^^^^!!!!!!
if ([CropType].plant_status <> 'out') then
   AccumPlantN =  AccumPlantN - [CropType].RootNuptake
endif
AccumMineralisation = AccumMineralisation + dlt_n_min() + dlt_n_min_res()
AccumDenit = AccumDenit - dnit() 
AccumFert = AccumFert + fertiliser
AccumLeach = AccumLeach - leach_urea - leach_no3 - leach_nh4 
AccumDetach = 0 !plant2 doesn't detach yet
DeltaSoilOMN = (biom_n() + fom_n() + hum_n()) - InitialSoilOMN
DeltaSurfaceOMN = surfaceom_n - InitialSurfaceOMN
DeltaSoilMineralN = (no3() + nh4() + urea()) - InitialMineralN

!!!!!! Water balance components !!!!!!
!!!!!!^^^^^^^^^^^^^^^^^^^^^^^^^^!!!!!!
AccumEO = AccumEO - eo
if ([CropType].plant_status <> 'out') then
   AccumEP = AccumEP - [CropType].LeafTranspiration
Endif
AccumES = AccumES - es
AccumDrainage = AccumDrainage - drain
AccumRunoff = AccumRunoff - runoff
AccumOutflowLat = AccumOutflowLat - outflow_lat()
AccumIrrigation = AccumIrrigation + Irrigation
AccumRainfall = Accumrainfall + rain
SoilWaterDeficit =  sw_dep() - dul_dep()

!!!!!! Thermal time calculation !!!!!!
!!!!!! ^^^^^^^^^^^^^^^^^^^^^^^^ !!!!!!
if ([CropType].plant_status <> 'out') then
   If [CropType].StageCodeValue >= 3 Then
      AccumTtemerg = AccumTtemerg + [CropType].PhenologyThermalTimeValue
   Endif
Endif

!!!!!! Biomass calculations !!!!!!
!!!!!! ^^^^^^^^^^^^^^^^^^^^^^^^ !!!!!!
if ([CropType].plant_status <> 'out') then
   TotalGreen = [CropType].CormLiveWt + [CropType].LeafLiveWt
Endif
```
          on end_of_day:
```
if SimDay = 1 then
SimDay = 2
Else SimDay = 2
endif
```
  simulation Taro2Vanuatu_2013
    metfile met: filename=VARTC_Trial.met
    clock
      start_date = 22/01/2013  # Enter the start date of the simulation
      end_date = 31/12/2013  # Enter the end date of the simulation
    summaryfile
    area paddock
      Taro2
      Soil: SoilType=Black Vertosol; LocalName=Waco; Site=Jimbour; NearestTown=Jimbour, Q 4352; Region=South East Queensland; NaturalVegetation=Grassland, mainly Qld bluegrass; Latitude=0; Longitude=0; YearOfSampling=0
        Water
          Thickness  BD    AirDry  LL15   DUL    SAT    KS
          150        0.86  0.113   0.227  0.529  0.627  0
          150        0.84  0.189   0.27   0.556  0.632  0
          300        0.86  0.254   0.254  0.512  0.626  0
          300        0.78  0.243   0.243  0.525  0.656  0
          300        0.85  0.284   0.284  0.593  0.628  0
          300        0.89  0.319   0.319  0.591  0.616  0
          300        0.82  0.271   0.271  0.551  0.642  0
          SoilCrop Taro2: LL=[0.227, 0.312, 0.371, 0.365, 0.42, 0.43, 0.401]; KL=[0.1, 0.1, 0, 0, 0, 0, 0]; XF=[1, 1, 0, 0, 0, 0, 0]
          SoilCrop Taro21: LL=[0.227, 0.312, 0.371, 0.365, 0.42, 0.43, 0.401]; KL=[0.1, 0.1, 0.08, 0.06, 0.04, 0.02, 0.01]; XF=[1, 1, 1, 1, 1, 1, 1]
          SoilCrop Taro22: LL=[0.227, 0.312, 0.371, 0.365, 0.42, 0.43, 0.401]; KL=[0.1, 0.1, 0.08, 0.06, 0.04, 0.02, 0.01]; XF=[1, 1, 1, 1, 1, 1, 1]
          SoilCrop Taro23: LL=[0.227, 0.312, 0.371, 0.365, 0.42, 0.43, 0.401]; KL=[0.1, 0.1, 0.08, 0.06, 0.04, 0.02, 0.01]; XF=[1, 1, 1, 1, 1, 1, 1]
        SoilWater: SummerCona=5; SummerU=9; SummerDate=1-Nov; WinterCona=5; WinterU=9; WinterDate=1-Apr; DiffusConst=54; DiffusSlope=28; Salb=0.12; CN2Bare=73; CNRed=20; CNCov=0.8; Thickness=[150, 150, 300, 300, 300, 300, 300]; SWCON=[0.7, 0.7, 0.7, 0.7, 0.7, 0.7, 0.7]
        SoilOrganicMatter: RootCN=40; RootWt=200; SoilCN=12.5; EnrACoeff=7.4; EnrBCoeff=0.2; OCUnits=Total
          Thickness  OC   FBiom  FInert
          150        2.8  0.04   0.4
          150        2.4  0.035  0.6
          300        2.4  0.025  0.8
          300        2.4  0.02   0.9
          300        2.1  0.015  0.95
          300        1.2  0.01   0.95
          300        0.7  0.01   0.95
        Analysis: PHUnits=Water; BoronUnits=HotWater
          Thickness  EC    PH
          150        0.2   7
          150        0.25  7
          300        0.31  7
          300        0.4   7
          300        0.59  7
          300        0.84  7
          300        0.93  7
        Sample Initial Nitrogen: NO3Units=kgha; NH4Units=kgha; SWUnits=Volumetric; OCUnits=Total; PHUnits=Water
          Thickness  NO3  NH4  SW
          150        10   3    0.529
          150        6    2    0.556
          300        4    1    0.512
          300        2    0.5  0.525
          300        1    0.5  0.593
          300        1    0.2  0.591
          300        1    0.1  0.551
          999999     -    -    -
      surfaceom SurfaceOrganicMatter
        PoolName = wheat_stubble  # Organic Matter pool name
        type = wheat  # Organic Matter type
        mass = 0.0  # Initial surface residue (kg/ha)
        cnr = 80.0  # C:N ratio of initial residue
        standing_fraction = 0.0  # Fraction of residue standing
      micromet: soilalbedo=0.23; a_interception=0.0; b_interception=0.0; c_interception=0.0; d_interception=0.0
      fertiliser
      irrigation: same as TaroTongaExpt_2015.paddock.Irrigation
      folder Manager folder
        manager Sow on a fixed date
          # Sowing criteria
          date = 04/03/2013  # Enter sowing date (dd-mmm)
          # Sowing parameters
          crop = Taro2  # Enter name of crop to sow
          density = 1  # Enter sowing density (plants/m2)
          depth = 1  # Enter sowing depth (mm)
          cultivar = Tarapatan  # Enter cultivar
          class = Plant  # Enter crop growth class
          row_spacing = 1000  # Enter row spacing (mm)
          on start_of_day:
          script: same as in TaroTongaExpt_2015.paddock.Manager folder.Sow on a fixed date
        operations Operations Schedule
          22/1/2013  fertiliser apply amount = 39 (kg/ha), depth = 50 (mm), type = NO3_N ()
          26/2/2013  fertiliser apply amount = 52 (kg/ha), depth = 50 (mm), type = Urea_N ()
          1/4/2014  fertiliser apply amount = 52 (kg/ha), depth = 50 (mm), type = Urea_N ()
          25/4/2013  Irrigation apply amount = 2 (mm)
          6/5/2013  fertiliser apply amount = 52 (kg/ha), depth = 50 (mm), type = Urea_N ()
        manager Taro2_FW
          on init:
```
   yield = 0.0
```
          on end_of_day:
```
if (taro2.plant_status <> 'out') then
   yield = Taro2.CormLiveWt * 30.0  ! based on 2/3rd water
else
   yield = 0.0
endif
```
        manager Taro2_DW
          on init:
```
   biomass = 0.0
   biomass_n = 0.0
```
          on end_of_day:
```
if (taro2.plant_status <> 'out') then
   biomass = Taro2.AboveGroundWt * 10.0
   biomass_n = Taro2.AboveGroundN * 10.0
else
   biomass = 0.0
   biomass_n = 0.0
endif
```
        manager Harvesting rule Taro2: same as TaroTongaExpt_2015.paddock.Manager folder.Harvesting rule Taro2
      outputfile: filename=Taro2Vanuatu_2013.out; title=Taro2Vanuatu_2013
        variables
          variables: dd/mm/yyyy as Date, day, DaysAfterSowing, StageCodeValue, PhenologyCurrentPhaseName, PhenologyCurrentStageName, Taro2.LeafLAI, AboveGroundWt, sw_dep(), WaterDemand, LeafFw, LeafTranspiration, LeafWaterDemand, RootWaterUptake, surfaceom_wt, no3(), StructureMainStemNodeNo, LeafExpandedNodeNo, LeafExpandedCohortNo, LeafThermalTimeValue, CormLiveWt, BelowGroundWt, TotalWt, LeafLiveWt, RootLiveWt, Taro2.LeafLiveN, LeafAppearedCohortNo, LeafDeadWt, LeafDMSupplyPhotosynthesis, LeafExpandedCohortNo, LeafExpandedNodeNo, LeafExpandingCohortNo, LeafExpansionStressValue, LeafExtinctionCoeffValue, LeafGreenCohortNo, LeafLiveNonStructuralWt, LeafLivePotentialDMAllocation, LeafPlantAppearedGreenLeafNo, LeafPotentialGrowth, LeafSenescingCohortNo, RadIntTot, CumRadIntTot, TotalPotentialDMAllocation, Cover_green, cormSenescenceRateValue, CormDeadWt, leaffn, LeafPhotosynthesisFNValue, LeafSpecificLeafAreaMaxValue, LeafSpecificLeafAreaMinValue, LeafSpecificArea, RootWaterSupply, RootWaterUptake, Rain, es, sw_dep, flow, flow_water, flux, LeafPhotosynthesisFVPDValue, LeafPhotosynthesisFWValue, yield as CormYieldFW, biomass, biomass_N
        events Reporting Frequency: event=end_day
      folder Taro Crop Analysis Graphs
        outputfile Outputs: filename=Taro2Vanuatu_2013 Outputs.out; title=Taro2Vanuatu_2013 Outputs
          events Reporting Frequency: event=end_day
          variables: same as TaroTongaExpt_2015.paddock.Taro Crop Analysis Graphs.Outputs.Variables
        manager Diagnostic variables: same as TaroTongaExpt_2015.paddock.Taro Crop Analysis Graphs.Diagnostic variables
  simulation Taro2Vanuatu_2014NoPt
    metfile met: filename=VARTC_Trial.met
    manager ClimateControl
      # Climate Control Window
      date1 = 1-jan  # Enter window START date (dd-mmm)
      date2 = 31-dec  # Enter window END date (dd-mmm)
      # Climate Change Parameters
      MaxtChange = 0  # Change in maximum temperature (oC)
      MintChange = 0  # Change in minimum temperature (oC)
      RainChange = 0  # Relative change in daily rainfall (%)
      RadnChange = 0  # Relative change in daily radiation (%)
      CO2 = 350  # Atmospheric CO2 Concentration (ppm)
      on prenewmet:
```
!  Adjust daily temperatures, rainfall and radiation up or down according to user-defined amounts
! To apply different levels of climate control to different times of year add multiple copies of this logic into your simulation and change the window.

if (date_within('[date1], [date2]') = 1) then
   maxt = maxt + [MaxtChange]
   mint = mint + [MintChange]
   rain = rain + rain * [RainChange] / 100
   radn = radn + radn * [RadnChange] / 100
   co2 = [CO2]
 endif
```
      on Init:
```
co2 = [CO2]
tav = tav + ([MaxtChange] + [MintChange]) / 2
```
    clock
      start_date = 07/04/2014  # Enter the start date of the simulation
      end_date = 31/01/2015  # Enter the end date of the simulation
    summaryfile
    area paddock
      Taro2
      Soil: same as Taro2Vanuatu_2013.paddock.Soil
      surfaceom SurfaceOrganicMatter
        PoolName = wheat_stubble  # Organic Matter pool name
        type = wheat  # Organic Matter type
        mass = 0.0  # Initial surface residue (kg/ha)
        cnr = 80.0  # C:N ratio of initial residue
        standing_fraction = 0.0  # Fraction of residue standing
      micromet: soilalbedo=0.23; a_interception=0.0; b_interception=0.0; c_interception=0.0; d_interception=0.0
      fertiliser
      irrigation: same as TaroTongaExpt_2015.paddock.Irrigation
      folder Manager folder
        manager Sow on a fixed date
          # Sowing criteria
          date = 07/04/2014  # Enter sowing date (dd-mmm)
          # Sowing parameters
          crop = Taro2  # Enter name of crop to sow
          density = 1  # Enter sowing density (plants/m2)
          depth = 1  # Enter sowing depth (mm)
          cultivar = Tarapatan  # Enter cultivar
          class =  # Enter crop growth class
          row_spacing = 1000  # Enter row spacing (mm)
          on start_of_day:
          script: same as in TaroTongaExpt_2015.paddock.Manager folder.Sow on a fixed date
        operations Operations Schedule
          17/4/2014  fertiliser apply amount = 138 (kg/ha), depth = 50 (mm), type = UREA_N ()
          10/07/2014  fertiliser apply amount = 32.5 (kg/ha), depth = 50 (mm), type = NO3_N ()
          21/1/2015  ! Taro2 harvest
          21/1/2015  ! Taro2 endCrop
        manager Harvesting rule Taro2: same as TaroTongaExpt_2015.paddock.Manager folder.Harvesting rule Taro2
        manager Taro2_FW
          on init:
```
   yield = 0.0
```
          on end_of_day:
          script: same as in Taro2Vanuatu_2013.paddock.Manager folder.Taro2_FW
        manager Taro2_DW
          on init:
```
   biomass = 0.0
   biomass_n = 0.0
```
          on end_of_day:
          script: same as in Taro2Vanuatu_2013.paddock.Manager folder.Taro2_DW
      outputfile: filename=Taro2Vanuatu_2014NoPt.out; title=Taro2Vanuatu_2014NoPt
        variables
          variables: dd/mm/yyyy as Date, day, DaysAfterSowing, StageCodeValue, PhenologyCurrentPhaseName, PhenologyCurrentStageName, Taro2.LeafLAI, AboveGroundWt, sw_dep(), WaterDemand, LeafFw, LeafTranspiration, LeafWaterDemand, RootWaterUptake, surfaceom_wt, no3(), StructureMainStemNodeNo, LeafExpandedNodeNo, LeafExpandedCohortNo, LeafThermalTimeValue, CormLiveWt, BelowGroundWt, TotalWt, LeafLiveWt, RootLiveWt, Taro2.LeafLiveN, LeafAppearedCohortNo, LeafDeadWt, LeafDMSupplyPhotosynthesis, LeafExpandedCohortNo, LeafExpandedNodeNo, LeafExpandingCohortNo, LeafExpansionStressValue, LeafExtinctionCoeffValue, LeafGreenCohortNo, LeafLiveNonStructuralWt, LeafLivePotentialDMAllocation, LeafPlantAppearedGreenLeafNo, LeafPotentialGrowth, LeafSenescingCohortNo, TotalPotentialDMAllocation, Cover_green, cormSenescenceRateValue, CormDeadWt, leaffn, LeafPhotosynthesisFNValue, LeafSpecificLeafAreaMaxValue, LeafSpecificLeafAreaMinValue, LeafSpecificArea, RootWaterSupply, RootWaterUptake, Rain, es, sw_dep, flow, flow_water, flux, LeafPhotosynthesisFVPDValue, LeafPhotosynthesisFWValue, yield as CormYieldFW, biomass, biomass_N
        events Reporting Frequency: event=end_day
      outputfile outputfileLeafCohorts: filename=Taro2Vanuatu_2014NoPt outputfileLeafCohorts.out; title=Taro2Vanuatu_2014NoPt outputfileLeafCohorts
        variables
          variables: dd/mm/yyyy as Date, StageCodeValue, PhenologyCurrentPhaseName, PhenologyCurrentStageName, LeafLAI, LeafFw, LeafTranspiration, LeafWaterDemand, LeafExpandedNodeNo, LeafExpandedCohortNo, LeafThermalTimeValue, LeafLiveWt, Taro2.LeafLiveN, LeafAppearedCohortNo, LeafDeadWt, LeafDMSupplyPhotosynthesis, LeafExpandedCohortNo, LeafExpandedNodeNo, LeafExpandingCohortNo, LeafExpansionStressValue, LeafExtinctionCoeffValue, LeafGreenCohortNo, LeafLiveNonStructuralWt, LeafLivePotentialDMAllocation, LeafMaxAreaValue, LeafMaxCover, LeafMaxLeafArea, LeafPlantAppearedGreenLeafNo, LeafPotentialGrowth, LeafSenescingCohortNo, RadIntTot, TotalPotentialDMAllocation
        events Reporting Frequency: event=end_day
      folder Taro Crop Analysis Graphs
        outputfile Outputs: filename=Taro2Vanuatu_2014NoPt Outputs.out; title=Taro2Vanuatu_2014NoPt Outputs
          events Reporting Frequency: event=end_day
          variables: same as TaroTongaExpt_2015.paddock.Taro Crop Analysis Graphs.Outputs.Variables
        manager Diagnostic variables: same as TaroTongaExpt_2015.paddock.Taro Crop Analysis Graphs.Diagnostic variables
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