folder simulations: version=32
  simulation Wheat2
    metfile met: filename=%apsim%\Examples\MetFiles\Goond.met
    clock
      start_date = 01/04/1940  # Enter the start date of the simulation
      end_date = 31/12/1943  # Enter the end date of the simulation
    summaryfile
    area paddock
      soil: LocalName=Waco; Site=Jimbour; Region=South East Queensland
        SoilType = Black Vertosol  # Soil description
        NearestTown = Jimbour, Q 4352
        NaturalVegetation = Grassland, mainly Qld bluegrass
        Water
          Layer:
            Thickness (mm)  KS (mm/day)  BD (g/cc)  AirDry (mm/mm)  LL15 (mm/mm)  DUL (mm/mm)  SAT (mm/mm)
            150             100          1.02       0.15            0.29          0.54         0.59
            150             100          1.03       0.26            0.29          0.53         0.58
            300             100          1.02       0.29            0.29          0.54         0.59
            300             100          1.02       0.29            0.29          0.54         0.58
            300             100          1.06       0.3             0.3           0.52         0.57
            300             100          1.11       0.31            0.31          0.5          0.55
            300             100          1.12       0.32            0.32          0.5          0.55
            300             100          1.15       0.33            0.33          0.48         0.53
            300             100          1.18       0.34            0.34          0.47         0.52
            300             100          1.2        0.35            0.35          0.46         0.51
            300             100          1.25       0.36            0.36          0.44         0.49
          SoilCrop Barley
            Layer:
              Thickness (mm)  LL (mm/mm)  KL (/day)  XF (0-1)
              150             0.29        0.1        1
              150             0.29        0.1        1
              300             0.32        0.08       1
              300             0.38        0.06       1
              300             0.39        0.04       1
              300             0.39        0.02       1
              300             0.41        0.01       1
              300             0.48        0          0
              300             0.47        0          0
              300             0.46        0          0
              300             0.44        0          0
          SoilCrop Chickpea
            Layer:
              Thickness (mm)  LL (mm/mm)  KL (/day)  XF (0-1)
              150             0.29        0.1        1
              150             0.29        0.1        1
              300             0.36        0.08       1
              300             0.43        0.06       1
              300             0.51        0.04       1
              300             0.5         0.02       1
              300             0.5         0.01       1
              300             0.48        0          0
              300             0.47        0          0
              300             0.46        0          0
              300             0.44        0          0
          SoilCrop Potato2
            Layer:
              Thickness (mm)  LL (mm/mm)  KL (/day)  XF (0-1)
              150             0.29        0.1        1
              150             0.29        0.1        1
              300             0.29        0.1        1
              300             0.29        0.1        1
              300             0.3         0.09       1
              300             0.31        0.09       1
              300             0.32        0.09       1
              300             0.33        0.09       1
              300             0.34        0.09       1
              300             0.35        0.09       1
              300             0.36        0.09       1
          SoilCrop Maize
            Layer:
              Thickness (mm)  LL (mm/mm)  KL (/day)  XF (0-1)
              150             0.29        0.1        1
              150             0.29        0.1        1
              300             0.34        0.1        1
              300             0.34        0.08       1
              300             0.37        0.06       1
              300             0.4         0.04       1
              300             0.42        0.02       1
              300             0.48        0          0
              300             0.47        0          0
              300             0.46        0          0
              300             0.44        0          0
          SoilCrop Perennial Grass
            Layer:
              Thickness (mm)  LL (mm/mm)  KL (/day)  XF (0-1)
              150             0.29        0.1        1
              150             0.29        0.1        1
              300             0.39        0.1        1
              300             0.41        0.1        1
              300             0.4         0.09       1
              300             0.4         0.07       1
              300             0.41        0.05       1
              300             0.41        0          0
              300             0.4         0          0
              300             0.4         0          0
              300             0.42        0          0
          SoilCrop Sorghum
            Layer:
              Thickness (mm)  LL (mm/mm)  KL (/day)  XF (0-1)
              150             0.29        0.1        1
              150             0.29        0.1        1
              300             0.35        0.1        1
              300             0.38        0.08       1
              300             0.4         0.06       1
              300             0.4         0.04       1
              300             0.4         0.02       1
              300             0.48        0          0
              300             0.47        0          0
              300             0.46        0          0
              300             0.44        0          0
          SoilCrop Wheat
            Layer:
              Thickness (mm)  LL (mm/mm)  KL (/day)  XF (0-1)
              150             0.29        0.1        1
              150             0.29        0.1        1
              300             0.32        0.08       1
              300             0.32        0.06       1
              300             0.35        0.04       1
              300             0.38        0.02       1
              300             0.41        0.01       1
              300             0.48        0          0
              300             0.47        0          0
              300             0.46        0          0
              300             0.44        0          0
          SoilCrop wheat2: same as Wheat2.paddock.Soil.Water.Wheat
        SoilWat
          Layer:
            Thickness (mm)  SWCON (0-1)
            150             0.3
            150             0.3
            300             0.3
            300             0.3
            300             0.3
            300             0.3
            300             0.3
            300             0.3
            300             0.3
            300             0.3
            300             0.3
          SummerCona = 5
          SummerU = 9
          SummerDate = 1-Nov
          WinterCona = 5
          WinterU = 9
          WinterDate = 1-Apr
          DiffusConst = 40
          DiffusSlope = 16
          Salb = 0.13
          Cn2Bare = 73
          CnRed = 20
          CnCov = 0.8
        SoilOrganicMatter: RootCn=40; RootWt=200; SoilCn=12.5; EnrACoeff=7.4; EnrBCoeff=0.2
          Layer:
            Thickness (mm)  OC (Total %)  FBiom (0-1)  FInert (0-1)
            150             1.04          0.025        0.4
            150             0.89          0.02         0.6
            300             0.89          0.015        0.8
            300             0.89          0.01         0.9
            300             0.77          0.01         0.95
            300             0.45          0.01         0.95
            300             0.27          0.01         0.95
            300             0.22          0.01         0.95
            300             0.16          0.01         0.95
            300             0.13          0.01         0.95
            300             0.12          0.01         0.95
        Analysis
          Layer:
            Thickness (mm)  EC (1:5 dS/m)  PH (1:5 water)
            150             0.2            8.4
            150             0.25           8.8
            300             0.31           9
            300             0.4            9.2
            300             0.59           9.2
            300             0.84           9.1
            300             0.93           9
            300             1.01           9
            300             1.06           8.9
            300             1.05           8.9
            300             1.01           8.9
        InitWater Initial Water
          percentmethod: percent=1; distributed=filled from top
        Sample Initial Nitrogen
          Layer:
            Thickness (mm)  NO3 (ppm)  NH4 (ppm)
            150             6.503      0.599004
            150             2.101      0.100001
            300             2.101      0.100001
            300             1.701      0.100001
            300             1.701      0.100001
            300             1.701      0.100001
            300             1.701      0.100001
            300             1.701      0.100001
            300             1.701      0.100001
            300             1.701      0.100001
            300             1.701      0.100001
      surfaceom surface organic matter
        PoolName = wheat  # Organic Matter pool name
        type = wheat  # Organic Matter type
        mass = 1000  # Initial surface residue (kg/ha)
        cnr = 80  # C:N ratio of initial residue
        standing_fraction = 0  # Fraction of residue standing
      fertiliser
      folder Manager folder
        manager Sow on a fixed date
          # Sowing criteria
          date = 1-jun  # Enter sowing date (dd-mmm)
          # Sowing parameters
          crop = potato2  # Enter name of crop to sow
          density = 150  # Enter sowing density (plants/m2)
          depth = 50  # Enter sowing depth (mm)
          cultivar = Bondi  # Enter cultivar
          class =  # Enter crop growth class
          row_spacing = 500  # Enter row spacing (mm)
          on start_of_day:
```
        if (today = date('[date]') then
              [crop] sow population =[density], depth = [depth], cultivar = [cultivar], MaxCover = 1.0, BudNumber = 1, row_spacing = [row_spacing], crop_class = [class]
         endif
```
        manager Harvesting rule
          # Harvesting criteria
          date = 1-jan  # Date of harvest
          crop = potato2  # Enter name of crop to harvest when ripe
          on end_of_day:
```
      live_biomass = 0
      
      if (today = date('[date]') then
           live_biomass = [crop].TotalLiveWt
           [crop]  harvest
           [crop]  endcrop
           act_mods harvesting
      endif
```
      micromet: soilalbedo=0.23; a_interception=0.0; b_interception=0.0; c_interception=0.0; d_interception=0.0
      TextOutput TextOutput1
        initsection
          filename = Wheat2 paddock_TextOutput1.out
          interval = 1
          intervalunit = day
          summary_file =
          apsim_format = true
          title = ApsimVersion = 7.4 Title = Wheat2 paddock_TextOutput1.out
          outputfrequency = harvesting
          dateformat = dd/MM/yyyy
          init outputs: array=T
            element
              varname = esw
              alias =
              aggreg =
              decplaces = 1
            element
              varname = potato2.AboveGroundWt
              alias = TotalLiveWt
              aggreg =
              decplaces = 1
            element
              varname = LeafCohortArea
              alias = LeafCohortArea
              aggreg =
              decplaces = 1
      TextOutput TextOutput2
        initsection
          filename = Wheat2 paddock_TextOutput2.out
          interval = 14
          intervalunit = day
          summary_file =
          apsim_format = true
          title = ApsimVersion = 7.4 Title = Wheat2 paddock_TextOutput2.out
          outputfrequency = post
          dateformat = dd/MM/yyyy
          init outputs: array=T
            element
              varname = maxt
              alias = Max(maxt) for 14 days
              aggreg = max
              decplaces = 1
            element
              varname = mint
              alias = Min(mint)
              aggreg = min
              decplaces = 1
            element
              varname = maxt
              alias = Av(maxt)
              aggreg = average
              decplaces = 1
            element
              varname = rain
              alias = Total rain
              aggreg = total
              decplaces = 1
            element
              varname = live_biomass
              alias = Max(live (g/m^2))
              aggreg = max
              decplaces = 1
      TextOutput TextOutput3
        initsection
          filename = Wheat2 paddock_TextOutput3.out
          interval = 1
          intervalunit = day
          summary_file =
          apsim_format = true
          title = ApsimVersion = 7.4 Title = Wheat2 paddock_TextOutput3.out
          outputfrequency = [end_month, end_week]
          dateformat = dd/MM/yyyy
          init outputs: array=T
            element
              varname = maxt
              alias = maxt
              aggreg =
              decplaces = 1
            element
              varname = mint
              alias = maxt
              aggreg =
              decplaces = 1
            element
              varname = rain
              alias = Rain
              aggreg =
              decplaces = 1
      potato2
