folder simulations: version=32
  simulation Test_UrinePatch
    manager2 FarmSimOptions
      # FARMSIM
      UI_FarmType = Dairy  # Choose the farm type
      # Soil type
      UI_SoilType = Heavy  # Choose the soil type in the farm
      # Fertiliser parameter
      UI_FertLevel = Medium  # Choose the fertiliser level
      # Dairy farm specific parameters
      UI_StockRate = 2  # Choose the cow stocking rate (2-5cows /ha)
      UI_SuppType = GrainOrConcentrate  # Choose the type of supplement
      # Sheep and beef farm specific parameter
      UI_BeefPercentage = 100  # Choose the percentage of beef stock units on the farm (0, 10, 20, 50 or 100%)
      # Irrigation parameters
      UI_IrrigSeason = Long  # Choose season length - None, Short (Oct-Mar), or Long (Aug-Apr)?
      UI_IrrigAmount_type = Scheduled  # How is the irrigation amount determined?
      UI_IrrigAmount_FixedAmount = 30  # If fixed, what is the amount applied at each irrigation?
      UI_IrrigAmount_RefillPercentage = 95  # If sheduled, what is the percentage of PAW after irrigation (80-100%)?
      UI_IrrigInterval_type = Scheduled  # How the irrigation interval is determined?
      UI_IrrigInterval_FixedInterval = 5  # If fixed, what is the interval between irrigations (days)?
      UI_IrrigInterval_TriggerPercentage = 75  # If sheduled, at what percentage of PAW does irrigation start (50-75%)?
```vb
Imports System
Imports ModelFramework

Public Class Script

   <Param()><Output()> Public UI_FarmType As String
   <Param()><Output()> Public UI_SoilType As String
   <Param()><Output()> Public UI_FertLevel As String
   <Param()><Output()> Public UI_StockRate As Single
   <Param()><Output()> Public UI_SuppType As String
   <Param()><Output()> Public UI_BeefPercentage As Single
   
   <Param()><Output()> Public UI_IrrigSeason  As String
   <Param()><Output()> Public UI_IrrigAmount_type As String
   <Param()><Output()> Public UI_IrrigAmount_FixedAmount As Single
   <Param()><Output()> Public UI_IrrigAmount_RefillPercentage As Single
   <Param()><Output()> Public UI_IrrigInterval_type As String
   <Param()><Output()> Public UI_IrrigInterval_FixedInterval As Single
   <Param()><Output()> Public UI_IrrigInterval_TriggerPercentage As Single


   '<EventHandler()> Public Sub OnInit2()

     

   'End Sub
   
End Class
```
    clock
      start_date = 01/01/1980  # Enter the start date of the simulation
      end_date = 28/02/1980  # Enter the end date of the simulation
    metfile met: filename=%apsim%\Examples\MetFiles\WinchmoreMet.met
    summaryfile
    area paddock01
      UrinePatch
      AgPasture ryegrass_clover
        thisCropName = ryegrass_clover  # Crop name shown as on the simulation tree
        speciesToSimulate = ryegrass whiteclover  # Name of species to simulate
        speciesName = ryegrass whiteclover  # Species names
        micrometType = grass grass  # crop type for MicroMet
        isLegume = 0 1  # Legume species? no=0, yes=1
        photoPath = 3 3  # C3 or C4 species? C3=3, C4=4
        rootDepth = 900  300
        tempMinGrowth = 3 3  # Minimum temperature for growth
        growthTmax = 32 32  # Maximum temperature for growth
        tempOptGrowth = 20 20  # Optimum temperature for growth
        exponentTempGrowth = 2 2  # Curvture of growth response to temperature
        tempMinTissueTurnover = 2 2  # Minimum temperature for mass flux
        tempMaxTissueTurnover = 20 20  # Optimum temperature for mass flux
        scaleFactorGLFWTissueTurnover = 2 2  # Scale factor for response of mass flux to soil moisture
        referenceGLFWTissueTurnover = 0.5 0.5  # Optimum soil moisture for mass flux
        useHeatStress = yes  yes  # Consider effects of high temperatures on photosynthesis? (yes/no)
        tempOnsetHeatStress = 28 28  # Heat effects- Onset temperature
        tempFullHeatStress = 35 35  # Heat effects- Full temperature
        sumTempHeatStress = 30 30  # Heat effects- Temperature sum for recovery
        useColdStress = yes  yes  # Consider effects of low temperatures on photosynthesis? (yes/no)
        tempOnsetColdStress = 0 0  # Cold effects- Onset temperature
        tempFullColdStress = -3 -3  # Cold effects- Full temperature
        sumTempColdStress = 20 20  # Cold effects- Temperature sum for recovery
        Pm = 1 1  # Reference CO2 assimilation rate (mg CO2/m2.s)
        maintRespiration = 3 3  # Maintenance respiration coefficient (%)
        growthEfficiency = 0.75 0.75
        SpecificLeafArea = 20 20
        lightExtCoeff = 0.5 0.8  # Light extinction coefficient
        stockParameter = 0.05 0.05  # Stock influence parameter
        maxRootFraction = 0.25 0.25  # Maximum biomass fraction allocated to root
        leafRate = 3 3  # Reference leaf appearance rate without stress
        fLeaf = 0.7 0.56  # Reference growth partition to leaves
        fStolon = 0 0.2  # Reference growth partition to stolon
        digestLive = 0.6 0.6  # Digestibility of live plant material
        digestDead = 0.2 0.2  # Digestibility of dead plant material
        dmshoot = 1800 350  # Initial shoot dry matter (kg/ha)
        dmgreenmin = 500 80  # Minimum green dry matter (kg/ha)
        NconcOptimum_leaves = 4 4.5  # N concentration - leaf optimum
        NconcMaximum_leaves = 5 5.5  # N concentration - leaf luxary
        NconcMinimum_leaves = 1.2 2.0  # N concentration - leaf scenescent
        RelativeNconc_Stems = 0.5 0.5  # Stem N concentration as fraction of leaf N concentration
        RelativeNconc_Stolons = 0 0.5  # Stolon N concentration as fraction of leaf N concentration
        RelativeNconc_Roots = 0.5 0.5  # Root N concentration as fraction of leaf N concentration
        NMinFix = 0 0.2  # Minimum N fixation (when soil N is sufficient)
        NMaxFix = 0 0.6  # Maximum N fixation (when soil N is unavailable)
        CO2PmaxScale = 700 700  # CO2 - Scale factor for CO2 effect on photosynthesis
        CO2NScale = 600 600  # CO2 - Scale factor for CO2 effects on plant N concentration
        CO2NMin = 0.7 0.7  # CO2 - Minimum fraction that plant N concentration may reduce to uder elevated CO2
        CO2NCurvature = 2 2  # CO2 - Curvature factor of CO2 effect on plant N concentration
        Frgr = 1 1  # Relative growth factor
        RootDistributionMethod = Homogeneous  # Method to define the root distribution over the soil profile
        rlvp = 1.0 1.0  # Root distribution of swards (relative to each soil layer)
      SoilTemp2 Soil Temperature (dotNET)
        maxt_time_default = 14  # hours
        bound_layer_cond_source = calc  # boundary layer conductance source (calc/constant)
        bound_layer_cond = 20  # boundary layer conductance
        boundary_layer_conductance_iterations = 1  # Number of iterations to calc boundary layer conductance (0-10)
        net_radn_source = calc  # net radiation source (calc/eos)
        default_wind_speed = 3  # m/s
        default_altitude = 18  # default altitude (m) 275m (700 ft) is approx 980 hPa
        default_instrum_height = 1.2  # default instrument height for wind and temperature (m)
        bare_soil_height = 57  # height of bare soil (mm)
      micromet
        soilalbedo = 0.23
        a_interception = 0
        b_interception = 0
        c_interception = 0
        d_interception = 0
      fertiliser
      surfaceom Surface Organic Matter
        PoolName = AgPasture  # Organic Matter pool name
        type = grass  # Organic Matter type
        mass = 1000  # Initial surface residue (kg/ha)
        cnr = 15  # C:N ratio of initial residue
        standing_fraction = 0  # Fraction of residue standing
      irrigation
        automatic_irrigation = on
        asw_depth = 400  # Depth to which ASW is calculated. (mm)
        crit_fr_asw = 0.75  # Fraction of ASW below which irrigation is applied (0-1.0)
        irrigation_efficiency = 1  # Efficiency of the irrigation. (0-1.0)
        irrigation_allocation = off  # Allocation limits
        allocation = 0  # Allocation in mm
        default_no3_conc = 0  # Nitrate concentration (ppm N)
        default_nh4_conc = 0  # Ammonium concentration (ppm N)
        default_cl_conc = 0  # Chloride concentration (ppm Cl)
      soil Canterbury_VL: Region=Plains; State=Canterbury; Country=New Zealand
        DataSource=Generic profile descriptions provided by Trevor Webb and data for functional horizions based on SWAMP project results
        Comments=Bulk density values were measured on the fine earth fraction so values entered into apsim soil are adjusted down to account for stone content (assuming stones are inert from all soil process so their mass and volume is removed from model paramaters).  SAT, DUL, LL15 and Air dry have been adjusted down to account for stone content.  OC has not been adjusted so the model will get the correct carbon and N amounts using the adjusted BD.
        SoilType = NZ_sedementary  # Soil description
        Water
          Layer:
            Thickness (mm)  KS (mm/day)  BD (g/cc)  Airdry (mm/mm)  LL15 (mm/mm)  DUL (mm/mm)  SAT (mm/mm)
            180             12000        1.04       0.064           0.128         0.304        0.376
            150             12000        0.975      0.12            0.12          0.285        0.3525
            200             1920         0.595      0.0255          0.0255        0.14875      0.18275
            300             16800        0.39       0.012           0.012         0.039        0.12
            170             24000        0.2        0.008           0.008         0.022        0.1
            500             24000        0.2        0.008           0.008         0.022        0.1
          SoilCrop Barley
            Layer:
              Thickness (mm)  LL (mm/mm)  kl (/day)  xf (0-1)
              180             0.128       0.0875     1
              150             0.12        0.0875     1
              200             0.0255      0.07875    1
              300             0.012       0.0695217  1
              170             0.008       0.058653   1
              500             0.008       0.0355748  1
          SoilCrop Canola
            Layer:
              Thickness (mm)  LL (mm/mm)  kl (/day)  xf (0-1)
              180             0.128       0.075      1
              150             0.12        0.075      1
              200             0.0255      0.0675     1
              300             0.012       0.0531165  1
              170             0.008       0.0411609  1
              500             0.008       0.019443   1
          SoilCrop Cloverseed
            Layer:
              Thickness (mm)  LL (mm/mm)  kl (/day)   xf (0-1)
              180             0.128       0.065       1
              150             0.12        0.065       1
              200             0.0255      0.0585      1
              300             0.012       0.0259037   1
              170             0.008       0.0131233   1
              500             0.008       0.00177604  1
          SoilCrop Fieldpea
            Layer:
              Thickness (mm)  LL (mm/mm)  kl (/day)    xf (0-1)
              180             0.128       0.1          1
              150             0.12        0.1          1
              200             0.0255      0.0469841    1
              300             0.012       0.0116484    1
              170             0.008       0.00497871   0.67032
              500             0.008       0.000408677  0.67032
          SoilCrop Fababean
            Layer:
              Thickness (mm)  LL (mm/mm)  kl (/day)  xf (0-1)
              180             0.128       0.1        1
              150             0.12        0.1        1
              200             0.0255      0.09       1
              300             0.012       0.1        1
              170             0.008       0.0904837  1
              500             0.008       0.0548812  1
          SoilCrop kale: same as Test_UrinePatch.paddock01.Canterbury_VL.Water.Canola
          SoilCrop ItallianRyegrass
            Layer:
              Thickness (mm)  LL (mm/mm)  kl (/day)  xf (0-1)
              180             0.128       0.075      1
              150             0.12        0.075      1
              200             0.0255      0.0675     1
              300             0.012       0.05959    1
              170             0.008       0.050274   1
              500             0.008       0.0304927  1
          SoilCrop Lucerne
            Layer:
              Thickness (mm)  LL (mm/mm)  kl (/day)  xf (0-1)
              180             0.128       0.0375     1
              150             0.12        0.0375     1
              200             0.0255      0.0316198  1
              300             0.012       0.0202184  1
              170             0.008       0.0161361  1
              500             0.008       0.0113691  1
          SoilCrop Maize: same as Test_UrinePatch.paddock01.Canterbury_VL.Water.Canola
          SoilCrop Oats: same as Test_UrinePatch.paddock01.Canterbury_VL.Water.Canola
          SoilCrop Potato
            Layer:
              Thickness (mm)  LL (mm/mm)  kl (/day)    xf (0-1)
              180             0.128       0.1          1
              150             0.12        0.0810584    1
              200             0.0255      0.0179899    1
              300             0.012       0.00244775   1
              170             0.008       0.000744658  0.67032
              500             0.008       2.24867e-05  0.67032
          SoilCrop Grassseed
            Layer:
              Thickness (mm)  LL (mm/mm)  kl (/day)   xf (0-1)
              180             0.128       0.065       1
              150             0.12        0.065       1
              200             0.0255      0.0305397   1
              300             0.012       0.00757147  1
              170             0.008       0.00323616  1
              500             0.008       0.00026564  1
          SoilCrop Triticale
            Layer:
              Thickness (mm)  LL (mm/mm)  kl (/day)  xf (0-1)
              180             0.128       0.0875     1
              150             0.12        0.0875     1
              200             0.0255      0.07875    1
              300             0.012       0.0552373  1
              170             0.008       0.0393163  1
              500             0.008       0.0144637  1
          SoilCrop Wheat: same as Test_UrinePatch.paddock01.Canterbury_VL.Water.Canola
          SoilCrop ryegrass_clover
            Layer:
              Thickness (mm)  LL (mm/mm)  kl (/day)    xf (0-1)
              180             0.128       0.05         1
              150             0.12        0.05         1
              200             0.0255      0.0206283    1
              300             0.012       0.0037887    1
              170             0.008       0.00136619   1
              500             0.008       6.80184e-05  1
          SoilCrop ryegrass: same as Test_UrinePatch.paddock01.Canterbury_VL.Water.ryegrass_clover
          SoilCrop whiteclover: same as Test_UrinePatch.paddock01.Canterbury_VL.Water.Fieldpea
        Analysis
          Layer:
            Thickness (mm)  Rocks (%)  PH (1:5 water)  CEC (cmol+/kg)  ParticleSizeSand (%)  ParticleSizeSilt (%)  ParticleSizeClay (%)
            180             20         6               13              12.7966               66.7554               20.448
            150             25         6               9               12.7966               66.7554               20.448
            200             57.5       6               8               15.796                76.536                7.668
            300             70         6               5               37.7916               57.0964               5.112
            170             80         6               4               39.7912               55.0968               5.112
            500             80         6               4               39.7912               55.0968               5.112
        SoilWat: SummerCona=4.4; SummerU=9; SummerDate=1-Oct; WinterCona=3; WinterU=6; WinterDate=1-Apr; DiffusConst=88; DiffusSlope=35; Salb=0.13; Cn2Bare=73; CnRed=20; CnCov=0.8
          Layer:
            Thickness (mm)  SWCON (0-1)
            180             0.517917
            150             0.581307
            200             0.581307
            300             0.650598
            170             0.6506
            500             0.6506
        SoilOrganicMatter: RootCn=40; RootWt=1000; SoilCn=11; EnrACoeff=7.4; EnrBCoeff=0.2
          Layer:
            Thickness (mm)  OC (Total %)  FBIOM (0-1)  FINERT (0-1)
            180             2.88977       0.0333099    0.478186
            150             1.05591       0.0186614    0.681918
            200             0.807728      0.013031     0.811837
            300             0.800052      0.0106763    0.911118
            170             0.8           0.0101651    0.956083
            500             0.8           0.0100221    0.983924
        InitWater
          percentmethod: percent=1; distributed=filled from top
        Sample Initial nitrogen
          Layer:
            Thickness (mm)  NO3 (kg/ha)  NH4 (kg/ha)
            80              25           1
            5               20           1
            20              15           1
            67              10           1
      manager ApplyUrine
        on start_of_day:
```
if day = 9 then
 UrinePatch ApplyUrine UrineNLoad = 20.0 (kgN/ha), StockDensity = 40.0 (hd/ha), StockType = DairyCow ()
elseif day = 11 then
 UrinePatch ApplyUrine UrineNLoad = 20.0 (kgN/ha), StockDensity = 40.0 (hd/ha), StockType = Sheep ()
elseif day = 13 then
 urinePatch ApplyUrine UrineNLoad = 20.0 (kgN/ha), StockDensity = 40.0 (hd/ha), StockType = Beef ()
elseif day = 15 then
 urinePatch ApplyUrine UrineNLoad = 20.0 (kgN/ha), StockDensity = 40.0 (hd/ha), StockType = Lamb ()
elseif day = 17 then
 urinePatch ApplyUrine UrineNLoad = 20.0 (kgN/ha), StockDensity = 40.0 (hd/ha), StockType = SheepBeef ()
endif
```
      outputfile: filename=Test_UrinePatch paddock01.out; title=Test_UrinePatch paddock01
        variables
          variables: dd/mm/yyyy as Date, UrineN_FromAnimal, UrineConcentration, UrineN_PropLeached, UrineN_Leached, UrineN_Retained, UP_AnimalType
        events Reporting Frequency: event=Daily  # End of daily simulation time step
