folder simulations: version=28
  simulation DCD_Test
    metfile met: filename=%apsim%\Examples\MetFiles\Goond.met
    clock
      start_date = 01/07/1940  # Enter the start date of the simulation
      end_date = 31/07/1940  # Enter the end date of the simulation
    summaryfile
    area Pdk_plusDCD
      folder Manager folder
        manager Cut or graze AgPasture
          # Cut or graze rotation
          CutPasture_start_date = 1/01/1900  # Enter date to start rotation (dd/mm/yyyy)
          CutPasture_end_date = 1/12/2010  # Enter date to end rotation (dd/mm/yyyy)
          AgPasture_type = AgPasture  # Enter pasture type
          rotation_type = Fixed intervals  # Enter the rotation type
          cut_interval = 21  # Enter the interval between cuts/grazings (days)
          upper_threshold = 2500  # Enter the upper mass threshold (kg/ha)
          lower_threshold = 1250  # Enter the lower mass threshold (kg/ha)
          # Management of cut/grazed material
          treatment_type = Return as residue  # Enter the treatment type for the cut/grazed material
          remove_dm_frac = 0.98  # Enter fraction of dm that is removed from field (0-1)
          remove_n_frac = 0.98  # Enter fraction of N that is removed from field (0-1)
          dung_fraction = 0  # Enter proportion of N in dung of the returned amount (0-1)
          on init:
```
Start_sim_date = today
days_after_cut = [cut_interval] - 1
Do_Cut = 'FALSE'
Has_Cut = 'FALSE'
```
          on start_of_day:
```
if today >= date('[CutPasture_start_date]') and today <= date('[CutPasture_end_date]') then

   preharvest_dm = [AgPasture_type].AboveGroundWt
   preharvest_n = [AgPasture_type].AboveGroundN
   harvested_dm =0
   harvested_n = 0
   removed_dm = 0.0
   removed_n = 0.0
   return_dm = 0.0
   return_n = 0.0
   GrowthRateCalc = 0
   n_conc_total = 0
   days_after_cut = days_after_cut + 1
   Has_Cut = 'FALSE'

   if '[rotation_type]' = 'Fixed intervals' then
      if days_after_cut = [cut_interval] then
         Do_Cut = 'TRUE'
      endif
   elseif '[rotation_type]' = 'Target mass' then
      if preharvest_dm >= [upper_threshold] then
         Do_Cut = 'TRUE'
      endif
   endif

endif   ! of today

If Do_Cut = 'TRUE' then
   
!- Cut or graze ---------------------------------------------------------------------------------------

   if preharvest_dm > [lower_threshold] then
      [AgPasture_type] graze type = 'residue', amount = [lower_threshold]
      Has_Cut = 'TRUE'
      harvested_dm = [AgPasture_type].HarvestWt
      harvested_n = [AgPasture_type].HarvestN
      GrowthRateCalc = harvested_dm/days_after_cut
      if harvested_dm > 0 then
         n_conc_removed = harvested_n*100/harvested_dm
      endif

!- Residue management -------------------------------------------------------------------------
      removed_dm =  harvested_dm* [remove_dm_frac]
      removed_n = harvested_n* [remove_n_frac]
      return_dm = harvested_dm - removed_dm 
      return_n = harvested_n - removed_n 

      if '[treatment_type]' = 'Return as residue' and [remove_dm_frac] < 1 then
         'surface organic matter' add_surfaceom name = grass, type = grass, mass =  return_dm (kg/ha), n = return_n (kg/ha), cpr = 0
      elseif '[treatment_type]' = 'Return as dung & urine' then
         ! Is advised that dung and urine return should be done using other manager, 'Urine_patch' or 'Apply or return N and water'
         N_on_dung = return_n * [dung_fraction]
         N_on_urine = return_n - N_on_dung
         'surface organic matter' add_surfaceom name = dung, type = manure, mass =  return_dm (kg/ha), n = N_on_dung (kg/ha), cpr = 0
         if N_on_urine > 0 then
            fertiliser apply amount = N_on_urine (kg/ha), depth = 20 (mm), type = urea_n ()
         endif
      endif
   endif
   days_after_cut = 0
   Do_Cut = 'FALSE'

endif  ! of Do_Cut
```
        manager2 Apply_DCD
          # Date to start applications (dd/mm/yyyy)
          ApplyDCD_start_date = 05/07/1940  # Date to start applications (dd/mm/yyyy)
          ApplyDCD_end_date = 31/12/2010  # Date to end applications (dd/mm/yyyy)
          ApplyDCD_interval = 5000  # Type the interval between applications (days)
          DCD_to_add = 10  # Type the amount of DCD to apply ((kg/ha)
          Depth_for_DCD = 1  # Type the depth to apply DCD mm)
```vb
Imports System
Imports ModelFramework

'This manager applies dcd at the amount and depth specified (it also can repeat the application periodically)
'It also calculated the nitrification inhibiton factor and DCD degradation following functions given in the UI

Public Class Script 
   Inherits Instance
   
   'Parameter variables:
   <param> Private ApplyDCD_start_date As String
   <param> Private ApplyDCD_end_date As String
   <param> Private ApplyDCD_interval As Integer
   <param> Private DCD_to_add As Single
   <param> Private Depth_for_DCD As Single

   'Variables read from other modules
   <Input> Private dd_mmm_yyyy As String
   <Input> Private dlayer As Single()
   <Input> Private dcd As Single()
   <Link>  Private MyPaddock As Paddock


   'Output variables
   <Output><Units("kg/ha")> Public dcd_added As Single       'The amount of dcd added

   Private Ini_Date As Date                     'The date when DCD applications start (in date format)
   Private End_Date As Date                     'The date when DCD applications finish (in date format)
   Private Today_Date As Date                   'The date of today (in date format)
   Private TimeAfterApplication As Integer      'Number of days after a urine application
   Private SoilDepth As Single                  'The soil depth (mm)
   Private dcd_layer As Integer                 'The layer at which dcd will be applied

   <EventHandler()> Public Sub OnInit2()

      'Put the dates into date format:
      Ini_Date = ApplyDCD_start_date
      End_Date = ApplyDCD_end_date
        
      
      'Computes the layer at which dcd will be applied
      Dim Depth_from_surface As Single = 0
      For z As Integer = 0 To dlayer.length - 1
         If Depth_from_surface <= Depth_for_DCD Then dcd_layer = z
         Depth_from_surface = Depth_from_surface + dlayer(z)
      Next
      

   End Sub

   <EventHandler()> Public Sub OnPrepare()

      Dim MyDCD As Component = MyPaddock.ComponentByType("Solute")
      Dim delta_dcd As Single()

      'Re-set variables
      Today_Date = dd_mmm_yyyy.Replace("_", "/")
      ReDim delta_dcd(dlayer.Length - 1)
      dcd_added = 0

      'Decide whether it is time to apply DCD:
      If Today_date >= Ini_date And Today_date <= End_date Then
         If Today_date = Ini_date Then
            delta_dcd(dcd_layer) = DCD_to_add
            dcd_added += DCD_to_add
            TimeAfterApplication = 1
         Else
            If TimeAfterApplication >= ApplyDCD_interval Then
               delta_dcd(dcd_layer) = DCD_to_add
               dcd_added += DCD_to_add
               TimeAfterApplication = 1
            Else
               TimeAfterApplication = TimeAfterApplication + 1
               dcd_added = 0
            End If
         End If

         If TimeAfterApplication = 1 Then
            MyDCD.Variable("dlt_dcd").Set(delta_dcd)
            Console.WriteLine(Today_date.ToString("dd MMMM yyyy") + " (Day of year=" + today_date.DayOfYear.ToString + "), Apply_DCD:")
            Console.WriteLine("     DCD being applied. " + DCD_added.ToString + "kg/ha added at depth " + Depth_for_DCD.ToString + "mm")
         End If
      End If            
      
   End Sub

End Class
```
        manager2 DCD_action
          # DCD effect function
          dcd_x = 0.2  2.0  5  10  # Type the dcd concent. [ppm] (x values for dcd effect)
          dcd_y = 0.0  0.1  0.7  1.0  # Type the inhibition factor [0-1] (y values for dcd effect)
          # DCD degradation functions
          dcd_degrad_pot = 70  # Type the dcd degradation rate at optimum cond. (%/day)
          sw_dcd_x = 0.0  0.2  0.4  0.5  0.8  0.9  1.0  # Type the water content [% of WP-SAT] (x values for sw effect on dcd)
          sw_dcd_y = 0.0  0.2  0.8  1.0  1.0  0.7  0.0  # Type the dcd degradation (y values for sw effect on dcd)
          temp_dcd_x = 0  10  20  30  # Type the soil temp. (x values for temp. effect on dcd)
          temp_dcd_y = 0.0  0.1  0.3  1.0  # Type the dcd degrad. (y values for temp. effect on dcd)
          ph_dcd_x = 4.0  5.0  7.5  9.0  # Type the soil pH (x values for pH effect on dcd)
          ph_dcd_y = 0.0  1.0  1.0  0.0  # Type the dcd degrad. (y values for pH effect on dcd)
          carbon_dcd_x = 0.1  0.5  1.0  2.0  3.0  4.0  # Type the soil org. carbon[%] (x values for C effect on dcd)
          carbon_dcd_y = 0.00  0.03  0.15  0.55  0.90  1.00  # Type the dcd degrad. (y values for C effect on dcd)
```vb
Imports System
Imports ModelFramework

'This manager applies dcd at the amount and depth specified (it also can repeat the application periodically)
'It also calculated the nitrification inhibiton factor and DCD degradation following functions given in the UI

Public Class Script 
   Inherits Instance

   <Link>  Private MyPaddock As Paddock
   
   'Parameter variables:   
   <param> Private dcd_x As String
   <param> Private dcd_y As String
   <param> Private dcd_degrad_pot As Single
   <param> Private sw_dcd_x As String
   <param> Private sw_dcd_y As String
   <param> Private temp_dcd_x As String
   <param> Private temp_dcd_y As String
   <param> Private ph_dcd_x As String
   <param> Private ph_dcd_y As String
   <param> Private carbon_dcd_x As String
   <param> Private carbon_dcd_y As String

   'Variables read from other modules
   <Input> Private dlayer As Single()
   <Input> Private dcd As Single()                    'Amount of dcd in the soil, per layer (kg/ha)
   <Input(IsOptional := True)> Private ave_soil_temp As Single()    'Soil temperature for each layer (oC)

   'Output variables
   <Output><Units(" ")> Public dcd_inhibition_effect As Single()  'The nitrification inhibition factor due to the presence of DCD
   <Output><Units(" ")> Public dcd_degradation As Single()        'The fraction of DCD that is 'oxidised' each day
   <Output><Units("kg/ha")> Public dcd_degraded As Single
   
   Private SoilTemp As Single()                 'The soil temperature (oC)

   Private SoilCarbon As Single()               'Total soil carbon (%)
   Private SoilPH As Single()                   'The soil pH
   Private dcd_layer As Integer                 'The layer at which dcd will be applied
   Private delta_dcd As Single()                'The changes in dcd content for each layer
   Private sw_fraction As Single()              'The sw fractioin between LL15 and SAT (100)

   Private x_dcd_effect_function As Single()    'The values of x of the function describing the dcd effect
   Private y_dcd_effect_function As Single()    'The values of y of the function describing the dcd effect
   Private x_sw_effect_function As Single()     'The values of x of the function describing the effect of soil water on dcd degradation
   Private y_sw_effect_function As Single()     'The values of y of the function describing the effect of soil water on dcd degradation
   Private x_temp_effect_function As Single()   'The values of x of the function describing the effect of temperature on dcd degradation
   Private y_temp_effect_function As Single()   'The values of y of the function describing the effect of temperature on dcd degradation
   Private x_ph_effect_function As Single()     'The values of x of the function describing the effect of soil pH on dcd degradation
   Private y_ph_effect_function As Single()     'The values of y of the function describing the effect of soil pH on dcd degradation
   Private x_carbon_effect_function As Single() 'The values of x of the function describing the effect of soil organic carbon on dcd degradation
   Private y_carbon_effect_function As Single() 'The values of y of the function describing the effect of soil organic carbon on dcd degradation

   <EventHandler()> Public Sub OnInit2()

      'Initialise the inhibition factor:
      ReDim dcd_inhibition_effect(dlayer.Length - 1)
      ReDim dcd_degradation(dlayer.Length - 1)
      ReDim SoilCarbon(dlayer.Length - 1)
      ReDim SoilPH(dlayer.Length - 1)

      'Set base ph
      For z As Integer = 0 To dlayer.length - 1
         SoilPH(z) = 6  'Soil pH is not simulated so assumed as a constant
      Next
      
      'Get the dcd effect coefficients:
      x_dcd_effect_function = makeArray(dcd_x)
      y_dcd_effect_function = makeArray(dcd_y)
      Call checkArray(x_dcd_effect_function, y_dcd_effect_function)
      '  This represents the response curve for nitrification inhibition due to the
      '    presence of dcd. It varies between 0 (no effect) and 1 (total inhibition).
      '  The x vakues represent the dcd amount in the soil and y the correspondent inhibiton effect.

      'Get the coefficients for the sw effect on dcd degradation:
      x_sw_effect_function = makeArray(sw_dcd_x)
      y_sw_effect_function = makeArray(sw_dcd_y)
      Call checkArray(x_sw_effect_function, y_sw_effect_function)
      '  This is the effect of water content on dcd degradation, it varies between 0 (no degradation) 
      '    and 1(potential degradation).
      '  The x vakues represent the soil water content and y the correspondent water effect.
      
      'Get the coefficients for the temp effect on dcd degradation:
      x_temp_effect_function = makeArray(temp_dcd_x)
      y_temp_effect_function = makeArray(temp_dcd_y)
      Call checkArray(x_temp_effect_function, y_temp_effect_function)
      '  This is the effect of soil temperature on dcd degradation, it varies between 0 (no degradation) 
      '    and 1(potential degradation).
      '  The x vakues represent the soil temperature and y the correspondent effect.

      'Get the coefficients for the pH effect on dcd degradation:
      x_ph_effect_function = makeArray(ph_dcd_x)
      y_ph_effect_function = makeArray(ph_dcd_y)
      Call checkArray(x_ph_effect_function, y_ph_effect_function)
      '  This is the effect of soil pH on dcd degradation, it varies between 0 (no degradation) 
      '    and 1(potential degradation).
      '  The x vakues represent the soil pH and y the correspondent pH effect.

      'Get the coefficients for the carbon effect on dcd degradation:
      x_carbon_effect_function = makeArray(carbon_dcd_x)
      y_carbon_effect_function = makeArray(carbon_dcd_y)
      Call checkArray(x_carbon_effect_function, y_carbon_effect_function)
      '  This is the effect of soil carbon on dcd degradation, it varies between 0 (no degradation) 
      '    and 1(potential degradation).
      '  The x vakues represent the soil carbon content and y the correspondent effect.

   End Sub

   <EventHandler()> Public Sub OnPrepare()

      Dim MySoilN As SoilNui = MyPaddock.ComponentByType("SoilNui")
      Dim MyDCD As Component = MyPaddock.ComponentByType("Solute")
      Dim MySoilW As SWIM2ui = MyPaddock.ComponentByType("SWIM2ui")
      Dim SoilWater As Single() = MySoilW.sw                         'Soil water content ()
      Dim SoilCarb_tot As Single() = MySoilN.carbon_tot           'Total soil carbon (kg/ha)
      Dim SoilDensity As Single() = MySoilW.bd                       'Soil bulk density (g/cm3)
      Dim delta_urea As Single()
      
      Try
         ReDim SoilTemp(ave_soil_temp.Length - 1)
         ave_soil_temp.CopyTo(SoilTemp, 0) 
      Catch
         Dim st As Single() = MySoilN.st   'Soil temperature from SoilN (oC)
         ReDim SoilTemp(st.Length - 1)
         st.CopyTo(SoilTemp, 0) 
      End Try

      ReDim delta_dcd(dlayer.Length - 1)
      ReDim delta_urea(dlayer.Length - 1)
      Dim SWFraction As Single() = CalcSW_Frac(SoilWater)
      
      dcd_degraded = 0
      For z As Integer = 0 To dlayer.length - 1
         'calculate the dcd_inhibition factor
         If dcd(z) > 0 Then
            'Transform dcd from kg/ha to ppm
            Dim dcd_ppm As Single = dcd(z) * 10 / dlayer(z)    'g/L_soil
            dcd_ppm = dcd_ppm * 1000 / SoilDensity(z)          'ppm
            
            'interpolated value based on the function given in the UI, bounds it between 0 and 1.
            dcd_inhibition_effect(z) = math.Max(0, math.Min(1, InterpolateVals(dcd_ppm, x_dcd_effect_function, y_dcd_effect_function)))

            'Calculate the dcd degradation factor
            '       * all factor vary between 0 and 1, except f_temp
            Dim f_water As Single = math.Max(0, math.Min(1, InterpolateVals(SWFraction(z), x_sw_effect_function, y_sw_effect_function)))
            Dim f_temp As Single = math.Max(0, math.Min(1, InterpolateVals(SoilTemp(z), x_temp_effect_function, y_temp_effect_function)))
            Dim f_ph As Single = math.Max(0, math.Min(1, InterpolateVals(Soilph(z), x_ph_effect_function, y_pH_effect_function)))
            SoilCarbon(z) = SoilCarb_tot(z) / (SoilDensity(z) * dlayer(z) * 100)   'Transform soil carbon from kg/ha into %
            Dim f_carbon As Single = math.Max(0, math.Min(1, InterpolateVals(SoilCarbon(z), x_carbon_effect_function, y_carbon_effect_function)))
            dcd_degradation(z) = dcd_degrad_pot * f_water * f_temp * f_ph * f_carbon   '(%)
            dcd_degradation(z) = Math.Max(0, Math.Min(1, dcd_degradation(z) / 100))    'make sure degradation is 0-1
            delta_dcd(z) = -dcd(z) * dcd_degradation(z)       '(kg/ha)
            delta_urea(z) = -delta_dcd(z)    'dcd_degrade into urea
            
            dcd_degraded += delta_dcd(z)
         Else
            dcd_inhibition_effect(z) = 0
            dcd_degradation(z) = 0
         End If
      Next
      MySoilN.Variable("nitrification_inhibition").Set(dcd_inhibition_effect)
      MyDCD.Variable("dlt_dcd").Set(delta_dcd)
      MySoilN.dlt_urea = delta_urea

   End Sub
   
   Sub checkArray(ByRef MyArray_x As Single(), ByRef MyArray_y As Single()) 
      
      'make sure that both x and y arrays have the same length (the smallest is chosen if not)
      
      If MyArray_x.Length > MyArray_y.Length Then
         ReDim Preserve MyArray_x(MyArray_y.Length - 1)
      ElseIf MyArray_x.Length < MyArray_y.Length Then
         ReDim Preserve MyArray_y(MyArray_x.Length - 1)
      End If
      
   End Sub
   
   Function makeArray(ByVal ArrayString As String) As Single()
      
      'Get the string with values from the user interface and put the values in an numeric array
      
      Dim MyArray_string As String()
      Dim MyArray_single As Single()
      Dim Separator As Char() = " "
      
      '1-Split string into array
      MyArray_string = ArrayString.Split(Separator, StringSplitOptions.RemoveEmptyEntries)
      
      '2-convert array into type single
      ReDim MyArray_single(MyArray_string.Length - 1)      
      For i As Integer = 0 To MyArray_single.length - 1
         MyArray_single(i) = MyArray_string(i)
      Next
      Return MyArray_single
      
   End Function

   
   Function CalcSW_Frac(ByVal SoilWater As Single()) As Single()
      Dim SoilWaterComp As SWIM2ui = MyPaddock.ComponentByType("SWIM2ui")
      Dim SAT As Single() = SoilWaterComp.sat                       'Soil water content at saturation ()
      Dim WP As Single() = SoilWaterComp.ll15                       'Soil water content at lower limit/wilting point ()
      Dim WFraction(SoilWater.Length -1) As Single
      
      For z As Integer = 0 To SoilWater.Length - 1
         WFraction(z) = (SoilWater(z) - WP(z)) / (SAT(z) - WP(z))
      Next
      Return WFraction
      
   End Function

   Function InterpolateVals(ByVal my_x As Single, ByVal x_array As Single(), ByVal y_array As Single()) As Single
      
      'Find out the value correspondig to my_x in the function described by the x and y arrays
      InterpolateVals = 0
      If my_x <= x_array(0) Then
         InterpolateVals = y_array(0)
      ElseIf my_x >= x_array(x_array.length - 1)
         InterpolateVals = y_array(y_array.length - 1)
      Else
         For i As Integer = 1 To x_array.length - 1
            If my_x <= x_array(i) Then
               InterpolateVals = y_array(i - 1) + ((my_x - x_array(i - 1)) * (y_array(i) - y_array(i - 1)) / (x_array(i) - x_array(i - 1)))
               i = x_array.length 
            End If
         Next
      End If

   End Function

End Class
```
        manager2 CentrePivotIrrigation
          # Central Pivot Irrigation Manager
          DoIrrigate = no  # Turn irrigation on?
          # Parameters for all soils
          Irrigation_start_date = 1-oct  # Start of irrigation season (dd-mmm)
          Irrigation_end_date = 30-apr  # End of irrigation season (dd-mmm)
          PAW_depth = 500  # Enter the depth to which water deficit is computed (mm)
          CritPAWForShallow = 30  # PAW below which soil is considered "shallow" (mm)
          CritRainToPause = 30  # Amount of rainfall over the last 3 days to cause pause to irrigator (mm)
          DaysToPauseOnCritRain = 3  # Number of days to pause irrigator after critical rainfall (days)
          # Shallow Soils
          PercPAWIrrigDeficitShallow = 30  # Percentage of PAW at which irrigation starts (%)
          IrrigReturnShallow = 2  # Irrigation return period (days)
          IrrigAmtShallow = 10  # Effective irrigation amount (mm)
          IrrigEffShallow = 75  # Irrigation efficiency (%)
          # Deep Soils
          IrrigDeficitDeep = 40  # Deficit at which irrigation starts (mm)
          PercPAWIrrigDeficitDeep = 30  # Minimum percentage of PAW to force irrigation to start (%)
          IrrigReturnDeep = 4  # Irrigation return period (days)
          IrrigAmtDeep = 20  # Effective irrigation amount (mm)
          IrrigEffDeep = 85  # Irrigation efficiency for deep soils (%)
```vb
Imports System
Imports ModelFramework

Public Class Script 
   Inherits Instance
   
   <Link>  Private MyPaddock As Paddock
   
   'Parameter variables:
   <param> Private DoIrrigate As String                     'Indicates whether irrigation is on (yes) or off (no)
   <param> Private Irrigation_start_date As String               'Start of the irrigation season (dd-mmm)
   <param> Private Irrigation_end_date As String                 'End of the irrigation season (dd-mmm)
   <param> Private PAW_depth As Single                      'Depth to consider plant available water, and deficit (mm)
   <param> Private CritPAWForShallow As Single              'Critical TPAW below which soil is considered shalow (mm)

   <param> Private CritRainToPause As Single                'Value of rain (sum over 3 days) when irrigation is paused (mm)
   <param> Private DaysToPauseOnCritRain As Single          'Number of days irrigations is paused when CritRain is reached
   
   <param> Private PercPAWIrrigDeficitShallow As Single     'Water deficit, as percentage of TPAW, that triggers irrigation for shallow soils (%)
   <param> Private IrrigReturnShallow As Single             'Minimum number of days between irrigation events for shallow soils
   <param> Private IrrigAmtShallow As Single                'Amount of water added per irrigation event for shallow soils (mm)
   <param> Private IrrigEffShallow As Single                'Irrigation efficiency for shallow soils (%)
   <param> Private IrrigDeficitDeep As Single               'Water deficit to trigger start of irrigation for deep soils (mm)
   <param> Private PercPAWIrrigDeficitDeep As Single        'Percentage of PAW that trigger irrigation in deep soils regardless the IrrigDeficitDeep (%)
   <param> Private IrrigReturnDeep As Single                'Minimum number of days between irrigation events for deep soils
   <param> Private IrrigAmtDeep As Single                   'Amount of water added per irrigation event for deep soils (mm)
   <param> Private IrrigEffDeep As Single                   'Irrigation efficiency for deep soils (%)

   'Variables read from other modules
   <Input> Private dd_mmm_yyyy As String                    'Today's date
   <Input> Private dlayer As Single()                       'Thickness of soil layers (mm)
   <Input> Private rain As Single                           'Rainfall (mm)

   'Output variables
   <Output><Units("mm")> Public SoilWaterDeficit As Single  'Soil water deficit (mm)
   <Output><Units("")> Public DaysAfterIrrigation As Single 'The number of days after irrigation was applied
   <Output><Units("")> Public SoilPAW As Single             'The potencial plant available water (mm)
   <Output><Units("")> Public IrrigDeficit As Single        'The soil water deficit that triggers irrigation (mm)
   <Output><Units("")> Public IrrigReturn As Single         'The return period for irrigation
   <Output><Units("")> Public IrrigAmt As Single            'The amount of water to add in an irrigation event (mm)
   <Output><Units("")> Public IrrigEff As Single            'The irrigaton efficiency (%)
   <Output><Units("mm")> Public RainOnPrevious3Days As Single 'The amount of rainfall over the previous 3 days
   <Output><Units("")> Public Days2Pause As Single          'The number of days irrigation is paused due to large rainfall

   'Internal variables
   Private StartDate As Date                                'The date when irrigation start (in date format)
   Private EndDate As Date                                  'The date when irrigation finish (in date format)
   Private RainOnPreviousDays(2) As Single                  'Record the rain of the previous 3 days (mm)
   
   <EventHandler()> Public Sub OnInit2()

      'Put the dates into date format:
      StartDate = Date.Parse(Irrigation_start_date)
      EndDate = Date.Parse(Irrigation_end_date)

      DaysAfterIrrigation = 5000  'so will reset to 1 on first day

      'Zero rain on previous 3 days
      RainOnPrevious3Days = 0.0
      Array.Clear(RainOnPreviousDays, 0, RainOnPreviousDays.Length)

      Dim SoilWater As SWIM2ui = MyPaddock.ComponentByType("SWIM2ui")
      If (SoilWater Is Nothing) Then
         Console.WriteLine("asdf")
      End If

      Dim sw_DUL As Single() = SoilWater.dul_dep        'sw at DUL
      Dim sw_LL15 As Single() = SoilWater.ll15_dep        'sw at LL15 
      Dim DepthFromSurface As Single = 0
      For z As Integer = 0 To dlayer.length - 1
         DepthFromSurface += dlayer(z)
         If DepthFromSurface <= PAW_depth Then
            SoilPAW += sw_dul(z) - sw_LL15(z)
         Else
            z = dlayer.Length - 1
         End If
      Next
      
      Console.WriteLine("------- Irrigation Manager Initialisation ------------------------------------")
      Console.WriteLine("")
      Console.WriteLine("   Irrigation season between " & StartDate.ToString("dd MMMM") & " and " & EndDate.ToString("dd MMMM"))
      Console.WriteLine("   Soil Layer to calculate irrigation is  " & PAW_depth & " mm")
      Console.WriteLine("   With plant available water of " & SoilPAW & " mm")
      If SoilPAW <= CritPAWForShallow Then
         Console.WriteLine("   Soil is considered shallow")
      Else
         Console.WriteLine("   Soil is considered Deep")
      End If
      Console.WriteLine("")


   End Sub

   <EventHandler()> Public Sub OnPrepare()
      Dim SoilWater As SWIM2ui = MyPaddock.ComponentByType("SWIM2ui")
      
      Dim sw_dul As Single() = SoilWater.dul_dep        'sw at DUL
      Dim sw_sw As Single() = SoilWater.sw_dep          'sw at LL 
      
      'Calc the amount of rain today plus the previous two days
      RainOnPreviousDays(2) = RainOnPreviousDays(1)
      RainOnPreviousDays(1) = RainOnPreviousDays(0)
      RainOnPreviousDays(0) = rain
      RainOnPrevious3Days = RainOnPreviousDays(0) + RainOnPreviousDays(1) + RainOnPreviousDays(2)
      
      'Calc the number of days paused after large rainfal
      If RainOnPrevious3Days >= CritRainToPause Then
         Days2Pause = DaysToPauseOnCritRain
      Else
         Days2Pause = Days2Pause - 1   'Can go negative, thats OK
      End If
      
      'Calc the soil water deficit     
      Dim DepthFromSurface As Integer = 0
      SoilWaterDeficit = 0.0         
      For z As Integer = 0 To dlayer.length - 1
         DepthFromSurface += dlayer(z)
         If DepthFromSurface <= PAW_depth Then
            SoilWaterDeficit += Math.Min(0, sw_sw(z) - sw_dul(z))
         Else
            z = dlayer.Length - 1
         End If
      Next
      '      SoilWaterDeficit_nve = -1 * SoilWaterDeficit 

      If DoIrrigate = "yes" Then
         Dim Today As Date = Date.Parse(dd_mmm_yyyy.Replace("_", "/"))
         If isBetween(today, StartDate, EndDate) Then
                  
            'Decide whether irrigation is needed
            If SoilPAW <= CritPAWForShallow Then
               'Use shallow soil parameters
               IrrigDeficit = PercPAWIrrigDeficitShallow / 100 * SoilPAW
               IrrigReturn = IrrigReturnShallow
               IrrigAmt = IrrigAmtShallow
               IrrigEff = IrrigEffShallow            
            Else
               'Use deep soil parameters
               'IrrigDeficit = IrrigDeficitDeep
               IrrigDeficit = Math.Min(IrrigDeficitDeep, PercPAWIrrigDeficitShallow / 100 * SoilPAW)
               IrrigReturn = IrrigReturnDeep
               IrrigAmt = IrrigAmtDeep
               IrrigEff = IrrigEffDeep
            End If
         
            'Check whether irrigation is paused
            DaysAfterIrrigation = DaysAfterIrrigation + 1
            If Days2Pause < 0.5 Then
               'Irrigation is not paused, check return
               If DaysAfterIrrigation > IrrigReturn Then
                  DaysAfterIrrigation = 1  'irrigation is allowed

                  'Check whether soil needs irrigation
                  If SoilWaterDeficit <= -IrrigDeficit Then
                     Dim Irrigation As Irrigation = MyPaddock.ComponentByType("Irrigation")
                     Dim irrig As IrrigationApplicationType = New IrrigationApplicationType()
                     irrig.Amount = IrrigAmt / (IrrigEff * 0.01)
                     irrig.Duration = 0
                     irrig.time = ""
                     ReDim irrig.source(-1)
                     irrig.Crop_Area = 0
                     irrig.NO3 = 0
                     irrig.NH4 = 0
                     irrig.CL = 0
                     Irrigation.Apply(irrig)
                  End If
               End If
            End If
            
         End If  'Today
      End If  'DoIrrigate
         
   End Sub

   Private Function isBetween(ByVal today As Date, ByVal startdate As Date, ByVal enddate As Date) As Boolean
      
      'Check whether today is between the start and the end dates.  This is needed because start and end dates don't have year
      
      Dim date1 As Date = New Date(today.Year, startdate.Month, startdate.Day)
      Dim date2 As Date = New Date(today.Year, enddate.Month, enddate.Day)

      If (date1 > date2) Then
         'Irrigation in the middle of the year - ex: summer in the northern hemisphere
         Return (today >= date1 Or today <= date2)
      Else
         'Irrigation in the end of the year - ex: summer in the southern hemisphere
         Return (today >= date1 And today <= date2)
      End If
      
   End Function
   
End Class
```
        operations
          02-Jul  fertiliser apply amount = 7, depth = 1 (mm), type = urea_n
          02-Jul  fertiliser apply amount = 7, depth = 10 (mm), type = urea_n
          02-Jul  fertiliser apply amount = 7, depth = 20 (mm), type = urea_n
          02-Jul  fertiliser apply amount = 7, depth = 40 (mm), type = urea_n
          02-Jul  fertiliser apply amount = 7, depth = 50 (mm), type = urea_n
      micromet
        soilalbedo = 0.23
        a_interception = 0
        b_interception = 0
        c_interception = 0
        d_interception = 0
      irrigation
        automatic_irrigation = off
        asw_depth = 600  # Depth to which ASW is calculated. (mm)
        crit_fr_asw = 0.5  # Fraction of ASW below which irrigation is applied (0-1.0)
        irrigation_efficiency = 0.8  # Efficiency of the irrigation. (0-1.0)
        irrigation_allocation = off  # Allocation limits
        allocation = 0  # Allocation in ML
        default_no3_conc = 0  # Nitrate concentration (ppm N)
        default_nh4_conc = 0  # Ammonium concentration (ppm N)
        default_cl_conc = 0  # Chloride concentration (ppm Cl)
        default_no3_conc = 0  # Nitrate concentration (ppm N)
        default_nh4_conc = 0  # Ammonium concentration (ppm N)
        default_cl_conc = 0  # Chloride concentration (ppm Cl)
      fertiliser
      DCD
        d0 = 108  # dcd diffusivity in water (mm2/d)
        layers = 0 0 0 0 0 0 0 0 0 0 0 0  # dcd in each layer (kg/ha)
      surfaceom surface organic matter
        PoolName = grass  # Organic Matter pool name
        type = grass  # Organic Matter type
        mass = 20  # Initial surface residue (kg/ha)
        cnr = 17  # C:N ratio of initial residue
        standing_fraction = 0  # Fraction of residue standing
      SWIM2ui
        ini Ini_SWIM2: filename=ini_HorotiuCloseSWIMSoil.xml
      AgPasture
        Nspecies = 2  # Number of species
        thisCropName = AgPasture  # Crop name shown as on the simulation tree
        cropName = ryegrass whiteclover paspalum  # Species names
        micrometType = grass     grass    grass  # Crop type for MicroMet
        isAnnual = 0           0          0  # Annual species? no=0, yes=1
        isLegume = 0           1          0  # Legume species? no=0, yes=1
        photoPath = 3           3          4  # C3 or C4 species? C3=3, C4=4
        rootDepth = 850       325      1000
        growthTmin = 2           3          10  # Minimum temperature for growth
        growthTmax = 32        32         40  # Maximum temperature for growth
        growthTopt = 20        20         22  # Optimum temperature for growth
        growthTq = 1.5       1.5        1.2  # Curvature of growth response to temperature
        massFluxTmin = 2           2          5  # Minimum temperature for mass flux
        massFluxTopt = 20        20         22  # Optimum temperature for mass flux
        massFluxW0 = 2          2           2  # Scale factor for response of mass flux to soil moisture
        massFluxWopt = 0.5       0.5        0.5  # Optimum soil moisture for mass flux
        heatOnsetT = 28        28         35  # Heat effects- Onset temperature
        heatFullT = 35        35         40  # Heat effects- Full temperature
        heatSumT = 30        30         50  # Heat effects- Temperature sum for recovery
        coldOnsetT = 0          0           8  # Cold effects- Onset temperature
        coldFullT = -3          -3         3  # Cold effects- Full temperature
        coldSumT = 20         20        50  # Cold effects- Temperature sum for recovery
        Pm = 1           1          1.2  # Reference CO2 assimilation rate (mg CO2/m2.s)
        maintRespiration = 3           3          3  # Maintenance respiration coefficient (%)
        growthEfficiency = 0.75      0.75     0.75
        SLA = 20        20         20  # Specific leaf area
        lightExtCoeff = 0.5       0.8        0.6  # Light extinction coefficient
        stockParameter = 0.05     0.05      0.05  # Stock influence parameter
        maxRootFraction = 0.2       0.2        0.2  # Maximum biomass fraction allocated to root
        leafRate = 3          3           3.5  # Reference leaf appearance rate without stress
        fLeaf = 0.7       0.7        0.7  # Reference growth partition to leaves
        fStolon = 0.0       0.0        2.0  # Reference growth partition to stolon
        digestLive = 0.6       0.6        0.6  # Digestibility of live plant material
        digestDead = 0.2       0.2        0.2  # Digestibility of dead plant material
        dmtotal = 1500    500       150  # Initial shoot dry matter (kg/ha)
        dmlitter = 250      50         10  # Initial litter dry matter (kg/ha)
        dmgreenmin = 300      100       25  # Minimum green dry matter (kg/ha)
        NcleafOpt = 4.0       4.5        3.0  # N concentration - leaf optimum
        NcleafMax = 5.0       5.5        3.5  # N concentration - leaf luxury
        NcleafMin = 1.2       2.0        0.5  # N concentration - leaf scenescent
        NcstemFr = 0.5      0.5         0.5  # Stem N concentration as fraction of leaf N concentration
        NcstolFr = 0.0      0.5         0.0  # Stolon N concentration as fraction of leaf N concentration
        NcrootFr = 0.5      0.5         0.5  # Root N concentration as fraction of leaf N concentration
        NMinFix = 0.0      0.2         0.0  # Minimum N fixation (when soil N is sufficient)
        NMaxFix = 0.0      0.6         0.0  # Maximum N fixation (when soil N is unavailable)
        CO2PmaxScale = 700     700       150  # CO2 - Scale factor for CO2 effect on photosynthesis
        CO2NScale = 600     600       600  # CO2 - Scale factor for CO2 effects on plant N concentration
        CO2NMin = 0.7      0.7        0.7  # CO2 - Minimum fraction that plant N concentration may reduce to uder elevated CO2
        CO2NCurvature = 2         2           2  # CO2 - Curvature factor of CO2 effect on plant N concentration
        Frgr = 1         1           1  # Relative growth factor
        rlvp = 0.106    0.112    0.112    0.110    0.106    0.097    0.085    0.070    0.055    0.042    0.032    0.023    0.017    0.012    0.007    0.004    0.003    0.002    0.001    0.001    0.001    0.001    0.001    0.000    0.000    0.000    0.000    0.000    0.000    0.000    0.000  # Root distribution of swards (relative to each soil layer)
        WaterUptakeSource = apsim  # Water uptake done by AgPasture (calc) or by apsim?
        waterStressFactor = 1         1           1  # Scale factor of water stress on plant growth
      outputfile ForAnalysis: filename=DCD_Test Pdk_plusDCD ForAnalysis.out; title=DCD_Test Pdk_plusDCD ForAnalysis
        variables
          variables: dd/mm/yyyy as Date, nh4(), no3(), dcd()
        events Reporting Frequency: event=Daily
      SoilTemp2 SoilTemp2 (withSWIM)
        maxt_time_default = 14  # hours
        bound_layer_cond_source = calc  # boundary layer conductance source (calc/constant)
        bound_layer_cond = 20  # boundary layer conductance
        boundary_layer_conductance_iterations = 1  # Number of iterations to calc boundary layer conductance (0-10)
        net_radn_source = calc  # net radiation source (calc/eos)
        default_wind_speed = 3  # m/s
        default_altitude = 18  # default altitude (m) 275m (700 ft) is approx 980 hPa
        default_instrum_height = 1.2  # default instrument height for wind and temperature (m)
        bare_soil_height = 57  # height of bare soil (mm)
        clay = 21  21  21  21  21  21  21  21  21  21  21  21  21  22  23  24  24  24  24  24  24  22  21  19  19  19  19  19  19  19   19  # The clay content for each soil layer (%)
      SoilNui
        # Parameters to initialise soil organic matter
        root_wt = 1000  # Type the amount of dead roots in the soil (kg/ha)
        root_cn = 30  # Type the C:N ratio of dead roots
        soil_cn = 13  # Type the C:N ratio of soil humus
        # Enter the values for each layer
        ph = 6.0  6.0  6.0  6.0  6.0  6.0  6.0  6.0  6.0  6.0  6.0  6.0  6.0  6.0  6.0  6.0  6.0  6.0  6.0  6.0  6.0  6.0  6.0  6.0  6.0  6.0  6.0  6.0  6.0  6.0  6.0  # Type the inital soil pH
        oc = 1.680  1.676  1.673  1.669  1.665  1.661  1.658  1.654  1.650  1.646  1.622  1.529  1.399  1.265  1.114  0.974  0.857  0.760  0.678  0.610  0.554  0.496  0.442  0.395  0.357  0.330  0.312  0.299  0.291  0.285  0.283  # Type the initial soil organic carbon content (%)
        fbiom = 0.080  0.080  0.080  0.080  0.080  0.079  0.077  0.073  0.065  0.056  0.045  0.034  0.025  0.017  0.010  0.008  0.008  0.008  0.008  0.008  0.008  0.008  0.008  0.008  0.008  0.008  0.008  0.008  0.008  0.008  0.008  # Type the microbial biomass fraction of OC (0-1)
        finert = 0.00  0.00  0.00  0.00  0.00  0.00  0.00  0.00  0.00  0.00  0.00  0.00  0.00  0.00  0.00  0.00  0.00  0.00  0.00  0.00  0.00  0.00  0.00  0.00  0.00  0.00  0.00  0.00  0.00  0.00  0.00  # Type the inert fraction of soil humus (0-1)
        no3ppm = 0.00  0.00  0.00  0.00  0.00  0.00  0.00  0.00  0.00  0.00  0.00  0.00  0.00  0.00  0.00  0.00  0.00  0.00  0.00  0.00  0.00  0.00  0.00  0.00  0.00  0.00  0.00  0.00  0.00  0.00  0.00  # Type the initial concentration of NO3 is the soil (ppm)
        nh4ppm = 0.00  0.00  0.00  0.00  0.00  0.00  0.00  0.00  0.00  0.00  0.00  0.00  0.00  0.00  0.00  0.00  0.00  0.00  0.00  0.00  0.00  0.00  0.00  0.00  0.00  0.00  0.00  0.00  0.00  0.00  0.00  # Type the initial concentration of NH4 is the soil (ppm)
        ureappm = 0.00  0.00  0.00  0.00  0.00  0.00  0.00  0.00  0.00  0.00  0.00  0.00  0.00  0.00  0.00  0.00  0.00  0.00  0.00  0.00  0.00  0.00  0.00  0.00  0.00  0.00  0.00  0.00  0.00  0.00  0.00  # Type the initial concentration of urea is the soil (ppm)
        # Other parameters
        nitrification_pot = 40  # Maximum potential nitrification rate (ug NH4/g soil/day)
        nh4_at_half_pot = 90  # NH4 concentration at half of nitrification rate (ppm)
        opt_temp = 32  # Optimal temperatures for mineralis. and nitrif. (oC)
    area Pdk_noDCD
      folder Manager folder
        manager Cut or graze AgPasture: same as DCD_Test.Pdk_plusDCD.Manager folder.Cut or graze AgPasture
        manager2 Apply_DCD
          # Date to start applications (dd/mm/yyyy)
          ApplyDCD_start_date = 05/07/1940  # Date to start applications (dd/mm/yyyy)
          ApplyDCD_end_date = 31/12/2010  # Date to end applications (dd/mm/yyyy)
          ApplyDCD_interval = 5000  # Type the interval between applications (days)
          DCD_to_add = 0  # Type the amount of DCD to apply ((kg/ha)
          Depth_for_DCD = 1  # Type the depth to apply DCD mm)
```vb
Imports System
Imports ModelFramework

'This manager applies dcd at the amount and depth specified (it also can repeat the application periodically)
'It also calculated the nitrification inhibiton factor and DCD degradation following functions given in the UI

Public Class Script
   Inherits Instance
   
   <Link>  Private MyPaddock As Paddock
   
   'Parameter variables:
   <param> Private ApplyDCD_start_date As String
   <param> Private ApplyDCD_end_date As String
   <param> Private ApplyDCD_interval As Integer
   <param> Private DCD_to_add As Single
   <param> Private Depth_for_DCD As Single

   'Variables read from other modules
   <Input> Private dd_mmm_yyyy As String
   <Input> Private dlayer As Single()
   <Input> Private dcd As Single()

   'Output variables
   <Output><Units("kg/ha")> Public dcd_added As Single       'The amount of dcd added

   Private Ini_Date As Date                     'The date when DCD applications start (in date format)
   Private End_Date As Date                     'The date when DCD applications finish (in date format)
   Private Today_Date As Date                   'The date of today (in date format)
   Private TimeAfterApplication As Integer      'Number of days after a urine application
   Private SoilDepth As Single                  'The soil depth (mm)
   Private dcd_layer As Integer                 'The layer at which dcd will be applied

   <EventHandler()> Public Sub OnInit2()

      'Put the dates into date format:
      Ini_Date = ApplyDCD_start_date
      End_Date = ApplyDCD_end_date
        
      
      'Computes the layer at which dcd will be applied
      Dim Depth_from_surface As Single = 0
      For z As Integer = 0 To dlayer.length - 1
         If Depth_from_surface <= Depth_for_DCD Then dcd_layer = z
         Depth_from_surface = Depth_from_surface + dlayer(z)
      Next
      

   End Sub

   <EventHandler()> Public Sub OnPrepare()

      Dim MyDCD As Component = MyPaddock.ComponentByType("Solute")
      Dim delta_dcd As Single()

      'Re-set variables
      Today_Date = dd_mmm_yyyy.Replace("_", "/")
      ReDim delta_dcd(dlayer.Length - 1)
      dcd_added = 0

      'Decide whether it is time to apply DCD:
      If Today_date >= Ini_date And Today_date <= End_date Then
         If Today_date = Ini_date Then
            delta_dcd(dcd_layer) = DCD_to_add
            dcd_added += DCD_to_add
            TimeAfterApplication = 1
         Else
            If TimeAfterApplication >= ApplyDCD_interval Then
               delta_dcd(dcd_layer) = DCD_to_add
               dcd_added += DCD_to_add
               TimeAfterApplication = 1
            Else
               TimeAfterApplication = TimeAfterApplication + 1
               dcd_added = 0
            End If
         End If

         If TimeAfterApplication = 1 Then
            MyDCD.Variable("dlt_dcd").Set(delta_dcd)
            Console.WriteLine(Today_date.ToString("dd MMMM yyyy") + " (Day of year=" + today_date.DayOfYear.ToString + "), Apply_DCD:")
            Console.WriteLine("     DCD being applied. " + DCD_added.ToString + "kg/ha added at depth " + Depth_for_DCD.ToString + "mm")
         End If
      End If            
      
   End Sub

End Class
```
        manager2 DCD_action
          # DCD effect function
          dcd_x = 0.2  2.0  5  10  # Type the dcd concent. [ppm] (x values for dcd effect)
          dcd_y = 0.0  0.1  0.7  1.0  # Type the inhibition factor [0-1] (y values for dcd effect)
          # DCD degradation functions
          dcd_degrad_pot = 70  # Type the dcd degradation rate at optimum cond. (%/day)
          sw_dcd_x = 0.0  0.2  0.4  0.5  0.8  0.9  1.0  # Type the water content [% of WP-SAT] (x values for sw effect on dcd)
          sw_dcd_y = 0.0  0.2  0.8  1.0  1.0  0.7  0.0  # Type the dcd degradation (y values for sw effect on dcd)
          temp_dcd_x = 0  10  20  30  # Type the soil temp. (x values for temp. effect on dcd)
          temp_dcd_y = 0.0  0.1  0.3  1.0  # Type the dcd degrad. (y values for temp. effect on dcd)
          ph_dcd_x = 4.0  5.0  7.5  9.0  # Type the soil pH (x values for pH effect on dcd)
          ph_dcd_y = 0.0  1.0  1.0  0.0  # Type the dcd degrad. (y values for pH effect on dcd)
          carbon_dcd_x = 0.1  0.5  1.0  2.0  3.0  4.0  # Type the soil org. carbon[%] (x values for C effect on dcd)
          carbon_dcd_y = 0.00  0.03  0.15  0.55  0.90  1.00  # Type the dcd degrad. (y values for C effect on dcd)
```vb
Imports System
Imports ModelFramework

'This manager applies dcd at the amount and depth specified (it also can repeat the application periodically)
'It also calculated the nitrification inhibiton factor and DCD degradation following functions given in the UI

Public Class Script 
   Inherits Instance

   <Link> Private MyPaddock As Paddock
   
   'Parameter variables:   
   <param> Private dcd_x As String
   <param> Private dcd_y As String
   <param> Private dcd_degrad_pot As Single
   <param> Private sw_dcd_x As String
   <param> Private sw_dcd_y As String
   <param> Private temp_dcd_x As String
   <param> Private temp_dcd_y As String
   <param> Private ph_dcd_x As String
   <param> Private ph_dcd_y As String
   <param> Private carbon_dcd_x As String
   <param> Private carbon_dcd_y As String

   'Variables read from other modules
   <Input> Private dlayer As Single()
   <Input> Private dcd As Single()                    'Amount of dcd in the soil, per layer (kg/ha)
   <Input(IsOptional:=True)> Private ave_soil_temp As Single()    'Soil temperature for each layer (oC)

   'Output variables
   <Output><Units(" ")> Public dcd_inhibition_effect As Single()  'The nitrification inhibition factor due to the presence of DCD
   <Output><Units(" ")> Public dcd_degradation As Single()        'The fraction of DCD that is 'oxidised' each day
   <Output><Units("kg/ha")> Public dcd_degraded As Single
   
   Private SoilTemp As Single()                 'The soil temperature (oC)

   Private SoilCarbon As Single()               'Total soil carbon (%)
   Private SoilPH As Single()                   'The soil pH
   Private dcd_layer As Integer                 'The layer at which dcd will be applied
   Private delta_dcd As Single()                'The changes in dcd content for each layer
   Private sw_fraction As Single()              'The sw fractioin between LL15 and SAT (100)

   Private x_dcd_effect_function As Single()    'The values of x of the function describing the dcd effect
   Private y_dcd_effect_function As Single()    'The values of y of the function describing the dcd effect
   Private x_sw_effect_function As Single()     'The values of x of the function describing the effect of soil water on dcd degradation
   Private y_sw_effect_function As Single()     'The values of y of the function describing the effect of soil water on dcd degradation
   Private x_temp_effect_function As Single()   'The values of x of the function describing the effect of temperature on dcd degradation
   Private y_temp_effect_function As Single()   'The values of y of the function describing the effect of temperature on dcd degradation
   Private x_ph_effect_function As Single()     'The values of x of the function describing the effect of soil pH on dcd degradation
   Private y_ph_effect_function As Single()     'The values of y of the function describing the effect of soil pH on dcd degradation
   Private x_carbon_effect_function As Single() 'The values of x of the function describing the effect of soil organic carbon on dcd degradation
   Private y_carbon_effect_function As Single() 'The values of y of the function describing the effect of soil organic carbon on dcd degradation

   <EventHandler()> Public Sub OnInit2()

      'Initialise the inhibition factor:
      ReDim dcd_inhibition_effect(dlayer.Length - 1)
      ReDim dcd_degradation(dlayer.Length - 1)
      ReDim SoilCarbon(dlayer.Length - 1)
      ReDim SoilPH(dlayer.Length - 1)

      'Set base ph
      For z As Integer = 0 To dlayer.length - 1
         SoilPH(z) = 6  'Soil pH is not simulated so assumed as a constant
      Next
      
      'Get the dcd effect coefficients:
      x_dcd_effect_function = makeArray(dcd_x)
      y_dcd_effect_function = makeArray(dcd_y)
      Call checkArray(x_dcd_effect_function, y_dcd_effect_function)
      '  This represents the response curve for nitrification inhibition due to the
      '    presence of dcd. It varies between 0 (no effect) and 1 (total inhibition).
      '  The x vakues represent the dcd amount in the soil and y the correspondent inhibiton effect.

      'Get the coefficients for the sw effect on dcd degradation:
      x_sw_effect_function = makeArray(sw_dcd_x)
      y_sw_effect_function = makeArray(sw_dcd_y)
      Call checkArray(x_sw_effect_function, y_sw_effect_function)
      '  This is the effect of water content on dcd degradation, it varies between 0 (no degradation) 
      '    and 1(potential degradation).
      '  The x vakues represent the soil water content and y the correspondent water effect.
      
      'Get the coefficients for the temp effect on dcd degradation:
      x_temp_effect_function = makeArray(temp_dcd_x)
      y_temp_effect_function = makeArray(temp_dcd_y)
      Call checkArray(x_temp_effect_function, y_temp_effect_function)
      '  This is the effect of soil temperature on dcd degradation, it varies between 0 (no degradation) 
      '    and 1(potential degradation).
      '  The x vakues represent the soil temperature and y the correspondent effect.

      'Get the coefficients for the pH effect on dcd degradation:
      x_ph_effect_function = makeArray(ph_dcd_x)
      y_ph_effect_function = makeArray(ph_dcd_y)
      Call checkArray(x_ph_effect_function, y_ph_effect_function)
      '  This is the effect of soil pH on dcd degradation, it varies between 0 (no degradation) 
      '    and 1(potential degradation).
      '  The x vakues represent the soil pH and y the correspondent pH effect.

      'Get the coefficients for the carbon effect on dcd degradation:
      x_carbon_effect_function = makeArray(carbon_dcd_x)
      y_carbon_effect_function = makeArray(carbon_dcd_y)
      Call checkArray(x_carbon_effect_function, y_carbon_effect_function)
      '  This is the effect of soil carbon on dcd degradation, it varies between 0 (no degradation) 
      '    and 1(potential degradation).
      '  The x vakues represent the soil carbon content and y the correspondent effect.

   End Sub

   <EventHandler()> Public Sub OnPrepare()

      Dim MySoilN As SoilNui = MyPaddock.ComponentByType("SoilNui")
      Dim MySoilW As SWIM2ui = MyPaddock.ComponentByType("SWIM2ui")
      Dim MyDCD As Component = MyPaddock.ComponentByType("Solute")
      Dim SoilWater As Single() = MySoilW.sw                         'Soil water content ()
      Dim SoilCarb_tot As Single() = MySoilN.carbon_tot           'Total soil carbon (kg/ha)
      Dim SoilDensity As Single() = MySoilW.bd                       'Soil bulk density (g/cm3)
      Dim delta_urea As Single()
      
      Try
         ReDim SoilTemp(ave_soil_temp.Length - 1)
         ave_soil_temp.CopyTo(SoilTemp, 0) 
      Catch
         Dim st As Single() = MySoilN.st   'Soil temperature from SoilN (oC)
         ReDim SoilTemp(st.Length - 1)
         st.CopyTo(SoilTemp, 0) 
      End Try

      ReDim delta_dcd(dlayer.Length - 1)
      ReDim delta_urea(dlayer.Length - 1)
      Dim SWFraction As Single() = CalcSW_Frac(SoilWater)
      
      dcd_degraded = 0
      For z As Integer = 0 To dlayer.length - 1
         'calculate the dcd_inhibition factor
         If dcd(z) > 0 Then
            'Transform dcd from kg/ha to ppm
            Dim dcd_ppm As Single = dcd(z) * 10 / dlayer(z)    'g/L_soil
            dcd_ppm = dcd_ppm * 1000 / SoilDensity(z)          'ppm
            
            'interpolated value based on the function given in the UI, bounds it between 0 and 1.
            dcd_inhibition_effect(z) = math.Max(0, math.Min(1, InterpolateVals(dcd_ppm, x_dcd_effect_function, y_dcd_effect_function)))

            'Calculate the dcd degradation factor
            '       * all factor vary between 0 and 1, except f_temp
            Dim f_water As Single = math.Max(0, math.Min(1, InterpolateVals(SWFraction(z), x_sw_effect_function, y_sw_effect_function)))
            Dim f_temp As Single = math.Max(0, math.Min(1, InterpolateVals(SoilTemp(z), x_temp_effect_function, y_temp_effect_function)))
            Dim f_ph As Single = math.Max(0, math.Min(1, InterpolateVals(Soilph(z), x_ph_effect_function, y_pH_effect_function)))
            SoilCarbon(z) = SoilCarb_tot(z) / (SoilDensity(z) * dlayer(z) * 100)   'Transform soil carbon from kg/ha into %
            Dim f_carbon As Single = math.Max(0, math.Min(1, InterpolateVals(SoilCarbon(z), x_carbon_effect_function, y_carbon_effect_function)))
            dcd_degradation(z) = dcd_degrad_pot * f_water * f_temp * f_ph * f_carbon   '(%)
            dcd_degradation(z) = Math.Max(0, Math.Min(1, dcd_degradation(z) / 100))    'make sure degradation is 0-1
            delta_dcd(z) = -dcd(z) * dcd_degradation(z)       '(kg/ha)
            delta_urea(z) = -delta_dcd(z)    'dcd_degrade into urea
            
            dcd_degraded += delta_dcd(z)
         Else
            dcd_inhibition_effect(z) = 0
            dcd_degradation(z) = 0
         End If
      Next
      MySoilN.Variable("nitrification_inhibition").Set(dcd_inhibition_effect)
      MyDCD.Variable("dlt_dcd").Set(delta_dcd)
      MySoilN.dlt_urea = delta_urea

   End Sub
   
   Sub checkArray(ByRef MyArray_x As Single(), ByRef MyArray_y As Single()) 
      
      'make sure that both x and y arrays have the same length (the smallest is chosen if not)
      
      If MyArray_x.Length > MyArray_y.Length Then
         ReDim Preserve MyArray_x(MyArray_y.Length - 1)
      ElseIf MyArray_x.Length < MyArray_y.Length Then
         ReDim Preserve MyArray_y(MyArray_x.Length - 1)
      End If
      
   End Sub
   
   Function makeArray(ByVal ArrayString As String) As Single()
      
      'Get the string with values from the user interface and put the values in an numeric array
      
      Dim MyArray_string As String()
      Dim MyArray_single As Single()
      Dim Separator As Char() = " "
      
      '1-Split string into array
      MyArray_string = ArrayString.Split(Separator, StringSplitOptions.RemoveEmptyEntries)
      
      '2-convert array into type single
      ReDim MyArray_single(MyArray_string.Length - 1)      
      For i As Integer = 0 To MyArray_single.length - 1
         MyArray_single(i) = MyArray_string(i)
      Next
      Return MyArray_single
      
   End Function

   
   Function CalcSW_Frac(ByVal SoilWater As Single()) As Single()
      Dim MySoilW As SWIM2ui = MyPaddock.ComponentByType("SWIM2ui")
      
      Dim SAT As Single() = MySoilW.sat                       'Soil water content at saturation ()
      Dim WP As Single() = MySoilW.ll15                       'Soil water content at lower limit/wilting point ()
      Dim WFraction(SoilWater.Length -1) As Single
      
      For z As Integer = 0 To SoilWater.Length - 1
         WFraction(z) = (SoilWater(z) - WP(z)) / (SAT(z) - WP(z))
      Next
      Return WFraction
      
   End Function

   Function InterpolateVals(ByVal my_x As Single, ByVal x_array As Single(), ByVal y_array As Single()) As Single
      
      'Find out the value correspondig to my_x in the function described by the x and y arrays
      InterpolateVals = 0
      If my_x <= x_array(0) Then
         InterpolateVals = y_array(0)
      ElseIf my_x >= x_array(x_array.length - 1)
         InterpolateVals = y_array(y_array.length - 1)
      Else
         For i As Integer = 1 To x_array.length - 1
            If my_x <= x_array(i) Then
               InterpolateVals = y_array(i - 1) + ((my_x - x_array(i - 1)) * (y_array(i) - y_array(i - 1)) / (x_array(i) - x_array(i - 1)))
               i = x_array.length 
            End If
         Next
      End If

   End Function

End Class
```
        manager2 CentrePivotIrrigation
          # Central Pivot Irrigation Manager
          DoIrrigate = no  # Turn irrigation on?
          # Parameters for all soils
          Irrigation_start_date = 1-oct  # Start of irrigation season (dd-mmm)
          Irrigation_end_date = 30-apr  # End of irrigation season (dd-mmm)
          PAW_depth = 500  # Enter the depth to which water deficit is computed (mm)
          CritPAWForShallow = 30  # PAW below which soil is considered "shallow" (mm)
          CritRainToPause = 30  # Amount of rainfall over the last 3 days to cause pause to irrigator (mm)
          DaysToPauseOnCritRain = 3  # Number of days to pause irrigator after critical rainfall (days)
          # Shallow Soils
          PercPAWIrrigDeficitShallow = 30  # Percentage of PAW at which irrigation starts (%)
          IrrigReturnShallow = 2  # Irrigation return period (days)
          IrrigAmtShallow = 10  # Effective irrigation amount (mm)
          IrrigEffShallow = 75  # Irrigation efficiency (%)
          # Deep Soils
          IrrigDeficitDeep = 40  # Deficit at which irrigation starts (mm)
          PercPAWIrrigDeficitDeep = 30  # Minimum percentage of PAW to force irrigation to start (%)
          IrrigReturnDeep = 4  # Irrigation return period (days)
          IrrigAmtDeep = 20  # Effective irrigation amount (mm)
          IrrigEffDeep = 85  # Irrigation efficiency for deep soils (%)
```vb
Imports System
Imports ModelFramework

Public Class Script 
   Inherits Instance
   
   <Link> Private MyPaddock As Paddock
   
   'Parameter variables:
   <param> Private DoIrrigate As String                     'Indicates whether irrigation is on (yes) or off (no)
   <param> Private Irrigation_start_date As String               'Start of the irrigation season (dd-mmm)
   <param> Private Irrigation_end_date As String                 'End of the irrigation season (dd-mmm)
   <param> Private PAW_depth As Single                      'Depth to consider plant available water, and deficit (mm)
   <param> Private CritPAWForShallow As Single              'Critical TPAW below which soil is considered shalow (mm)

   <param> Private CritRainToPause As Single                'Value of rain (sum over 3 days) when irrigation is paused (mm)
   <param> Private DaysToPauseOnCritRain As Single          'Number of days irrigations is paused when CritRain is reached
   
   <param> Private PercPAWIrrigDeficitShallow As Single     'Water deficit, as percentage of TPAW, that triggers irrigation for shallow soils (%)
   <param> Private IrrigReturnShallow As Single             'Minimum number of days between irrigation events for shallow soils
   <param> Private IrrigAmtShallow As Single                'Amount of water added per irrigation event for shallow soils (mm)
   <param> Private IrrigEffShallow As Single                'Irrigation efficiency for shallow soils (%)
   <param> Private IrrigDeficitDeep As Single               'Water deficit to trigger start of irrigation for deep soils (mm)
   <param> Private PercPAWIrrigDeficitDeep As Single        'Percentage of PAW that trigger irrigation in deep soils regardless the IrrigDeficitDeep (%)
   <param> Private IrrigReturnDeep As Single                'Minimum number of days between irrigation events for deep soils
   <param> Private IrrigAmtDeep As Single                   'Amount of water added per irrigation event for deep soils (mm)
   <param> Private IrrigEffDeep As Single                   'Irrigation efficiency for deep soils (%)

   'Variables read from other modules
   <Input> Private dd_mmm_yyyy As String                    'Today's date
   <Input> Private dlayer As Single()                       'Thickness of soil layers (mm)
   <Input> Private rain As Single                           'Rainfall (mm)

   'Output variables
   <Output><Units("mm")> Public SoilWaterDeficit As Single  'Soil water deficit (mm)
   <Output><Units("")> Public DaysAfterIrrigation As Single 'The number of days after irrigation was applied
   <Output><Units("")> Public SoilPAW As Single             'The potencial plant available water (mm)
   <Output><Units("")> Public IrrigDeficit As Single        'The soil water deficit that triggers irrigation (mm)
   <Output><Units("")> Public IrrigReturn As Single         'The return period for irrigation
   <Output><Units("")> Public IrrigAmt As Single            'The amount of water to add in an irrigation event (mm)
   <Output><Units("")> Public IrrigEff As Single            'The irrigaton efficiency (%)
   <Output><Units("mm")> Public RainOnPrevious3Days As Single 'The amount of rainfall over the previous 3 days
   <Output><Units("")> Public Days2Pause As Single          'The number of days irrigation is paused due to large rainfall

   'Internal variables
   Private StartDate As Date                                'The date when irrigation start (in date format)
   Private EndDate As Date                                  'The date when irrigation finish (in date format)
   Private RainOnPreviousDays(2) As Single                  'Record the rain of the previous 3 days (mm)
   
   <EventHandler()> Public Sub OnInit2()

      'Put the dates into date format:
      StartDate = Date.Parse(Irrigation_start_date)
      EndDate = Date.Parse(Irrigation_end_date)

      DaysAfterIrrigation = 5000  'so will reset to 1 on first day

      'Zero rain on previous 3 days
      RainOnPrevious3Days = 0.0
      Array.Clear(RainOnPreviousDays, 0, RainOnPreviousDays.Length)

      Dim SoilWater As SWIM2ui = MyPaddock.ComponentByType("SWIM2ui")
      Dim sw_DUL As Single() = SoilWater.dul_dep        'sw at DUL
      Dim sw_LL15 As Single() = SoilWater.ll15_dep        'sw at LL15 
      Dim DepthFromSurface As Single = 0
      For z As Integer = 0 To dlayer.length - 1
         DepthFromSurface += dlayer(z)
         If DepthFromSurface <= PAW_depth Then
            SoilPAW += sw_dul(z) - sw_LL15(z)
         Else
            z = dlayer.Length - 1
         End If
      Next
      
      Console.WriteLine("------- Irrigation Manager Initialisation ------------------------------------")
      Console.WriteLine("")
      Console.WriteLine("   Irrigation season between " & StartDate.ToString("dd MMMM") & " and " & EndDate.ToString("dd MMMM"))
      Console.WriteLine("   Soil Layer to calculate irrigation is  " & PAW_depth & " mm")
      Console.WriteLine("   With plant available water of " & SoilPAW & " mm")
      If SoilPAW <= CritPAWForShallow Then
         Console.WriteLine("   Soil is considered shallow")
      Else
         Console.WriteLine("   Soil is considered Deep")
      End If
      Console.WriteLine("")


   End Sub

   <EventHandler()> Public Sub OnPrepare()
      Dim SoilWater As SWIM2ui = MyPaddock.ComponentByType("SWIM2ui")

      Dim sw_dul As Single() = SoilWater.dul_dep        'sw at DUL
      Dim sw_sw As Single() = SoilWater.sw_dep          'sw at LL 
      
      'Calc the amount of rain today plus the previous two days
      RainOnPreviousDays(2) = RainOnPreviousDays(1)
      RainOnPreviousDays(1) = RainOnPreviousDays(0)
      RainOnPreviousDays(0) = rain
      RainOnPrevious3Days = RainOnPreviousDays(0) + RainOnPreviousDays(1) + RainOnPreviousDays(2)
      
      'Calc the number of days paused after large rainfal
      If RainOnPrevious3Days >= CritRainToPause Then
         Days2Pause = DaysToPauseOnCritRain
      Else
         Days2Pause = Days2Pause - 1   'Can go negative, thats OK
      End If
      
      'Calc the soil water deficit     
      Dim DepthFromSurface As Integer = 0
      SoilWaterDeficit = 0.0         
      For z As Integer = 0 To dlayer.length - 1
         DepthFromSurface += dlayer(z)
         If DepthFromSurface <= PAW_depth Then
            SoilWaterDeficit += Math.Min(0, sw_sw(z) - sw_dul(z))
         Else
            z = dlayer.Length - 1
         End If
      Next
      '      SoilWaterDeficit_nve = -1 * SoilWaterDeficit 

      If DoIrrigate = "yes" Then
         Dim Today As Date = Date.Parse(dd_mmm_yyyy.Replace("_", "/"))
         If isBetween(today, StartDate, EndDate) Then
                  
            'Decide whether irrigation is needed
            If SoilPAW <= CritPAWForShallow Then
               'Use shallow soil parameters
               IrrigDeficit = PercPAWIrrigDeficitShallow / 100 * SoilPAW
               IrrigReturn = IrrigReturnShallow
               IrrigAmt = IrrigAmtShallow
               IrrigEff = IrrigEffShallow            
            Else
               'Use deep soil parameters
               'IrrigDeficit = IrrigDeficitDeep
               IrrigDeficit = Math.Min(IrrigDeficitDeep, PercPAWIrrigDeficitShallow / 100 * SoilPAW)
               IrrigReturn = IrrigReturnDeep
               IrrigAmt = IrrigAmtDeep
               IrrigEff = IrrigEffDeep
            End If
         
            'Check whether irrigation is paused
            DaysAfterIrrigation = DaysAfterIrrigation + 1
            If Days2Pause < 0.5 Then
               'Irrigation is not paused, check return
               If DaysAfterIrrigation > IrrigReturn Then
                  DaysAfterIrrigation = 1  'irrigation is allowed

                  'Check whether soil needs irrigation
                  If SoilWaterDeficit <= -IrrigDeficit Then
                     Dim Irrigation As Irrigation = MyPaddock.ComponentByType("Irrigation")
                     Dim irrig As IrrigationApplicationType = New IrrigationApplicationType()
                     irrig.Amount = IrrigAmt / (IrrigEff * 0.01)
                     irrig.Duration = 0
                     irrig.time = ""
                     ReDim irrig.source(-1)
                     irrig.Crop_Area = 0
                     irrig.NO3 = 0
                     irrig.NH4 = 0
                     irrig.CL = 0
                     Irrigation.Apply(irrig)
                  End If
               End If
            End If
            
         End If  'Today
      End If  'DoIrrigate
         
   End Sub

   Private Function isBetween(ByVal today As Date, ByVal startdate As Date, ByVal enddate As Date) As Boolean
      
      'Check whether today is between the start and the end dates.  This is needed because start and end dates don't have year
      
      Dim date1 As Date = New Date(today.Year, startdate.Month, startdate.Day)
      Dim date2 As Date = New Date(today.Year, enddate.Month, enddate.Day)

      If (date1 > date2) Then
         'Irrigation in the middle of the year - ex: summer in the northern hemisphere
         Return (today >= date1 Or today <= date2)
      Else
         'Irrigation in the end of the year - ex: summer in the southern hemisphere
         Return (today >= date1 And today <= date2)
      End If
      
   End Function
   
End Class
```
        operations: same as DCD_Test.Pdk_plusDCD.Manager folder.operations
      micromet
        soilalbedo = 0.23
        a_interception = 0
        b_interception = 0
        c_interception = 0
        d_interception = 0
      irrigation: same as DCD_Test.Pdk_plusDCD.Irrigation
      fertiliser
      DCD
        d0 = 108  # dcd diffusivity in water (mm2/d)
        layers = 0 0 0 0 0 0 0 0 0 0 0 0  # dcd in each layer (kg/ha)
      surfaceom surface organic matter
        PoolName = grass  # Organic Matter pool name
        type = grass  # Organic Matter type
        mass = 20  # Initial surface residue (kg/ha)
        cnr = 17  # C:N ratio of initial residue
        standing_fraction = 0  # Fraction of residue standing
      SWIM2ui
        ini Ini_SWIM2: filename=ini_HorotiuCloseSWIMSoil.xml
      outputfile ForAnalysis: filename=DCD_Test Pdk_noDCD ForAnalysis.out; title=DCD_Test Pdk_noDCD ForAnalysis
        variables
          variables: dd/mm/yyyy as Date, nh4(), no3(), dcd()
        events Reporting Frequency: event=Daily
      SoilTemp2 SoilTemp2 (withSWIM): same as DCD_Test.Pdk_plusDCD.SoilTemp2 (withSWIM)
      SoilNui: same as DCD_Test.Pdk_plusDCD.SoilNui
      AgPasture: same as DCD_Test.Pdk_plusDCD.AgPasture
    area Pdk_earlyDCD
      folder Manager folder
        manager Cut or graze AgPasture: same as DCD_Test.Pdk_plusDCD.Manager folder.Cut or graze AgPasture
        manager2 Apply_DCD
          # Date to start applications (dd/mm/yyyy)
          ApplyDCD_start_date = 02/07/1940  # Date to start applications (dd/mm/yyyy)
          ApplyDCD_end_date = 31/12/2010  # Date to end applications (dd/mm/yyyy)
          ApplyDCD_interval = 5000  # Type the interval between applications (days)
          DCD_to_add = 10  # Type the amount of DCD to apply ((kg/ha)
          Depth_for_DCD = 1  # Type the depth to apply DCD mm)
          script: same as in DCD_Test.Pdk_noDCD.Manager folder.Apply_DCD
        manager2 DCD_action
          # DCD effect function
          dcd_x = 0.2  2.0  5  10  # Type the dcd concent. [ppm] (x values for dcd effect)
          dcd_y = 0.0  0.1  0.7  1.0  # Type the inhibition factor [0-1] (y values for dcd effect)
          # DCD degradation functions
          dcd_degrad_pot = 70  # Type the dcd degradation rate at optimum cond. (%/day)
          sw_dcd_x = 0.0  0.2  0.4  0.5  0.8  0.9  1.0  # Type the water content [% of WP-SAT] (x values for sw effect on dcd)
          sw_dcd_y = 0.0  0.2  0.8  1.0  1.0  0.7  0.0  # Type the dcd degradation (y values for sw effect on dcd)
          temp_dcd_x = 0  10  20  30  # Type the soil temp. (x values for temp. effect on dcd)
          temp_dcd_y = 0.0  0.1  0.3  1.0  # Type the dcd degrad. (y values for temp. effect on dcd)
          ph_dcd_x = 4.0  5.0  7.5  9.0  # Type the soil pH (x values for pH effect on dcd)
          ph_dcd_y = 0.0  1.0  1.0  0.0  # Type the dcd degrad. (y values for pH effect on dcd)
          carbon_dcd_x = 0.1  0.5  1.0  2.0  3.0  4.0  # Type the soil org. carbon[%] (x values for C effect on dcd)
          carbon_dcd_y = 0.00  0.03  0.15  0.55  0.90  1.00  # Type the dcd degrad. (y values for C effect on dcd)
```vb
Imports System
Imports ModelFramework

'This manager applies dcd at the amount and depth specified (it also can repeat the application periodically)
'It also calculated the nitrification inhibiton factor and DCD degradation following functions given in the UI

Public Class Script 
   Inherits Instance
   
   <Link> Private MyPaddock As Paddock
   
   'Parameter variables:   
   <param> Private dcd_x As String
   <param> Private dcd_y As String
   <param> Private dcd_degrad_pot As Single
   <param> Private sw_dcd_x As String
   <param> Private sw_dcd_y As String
   <param> Private temp_dcd_x As String
   <param> Private temp_dcd_y As String
   <param> Private ph_dcd_x As String
   <param> Private ph_dcd_y As String
   <param> Private carbon_dcd_x As String
   <param> Private carbon_dcd_y As String

   'Variables read from other modules
   <Input> Private dlayer As Single()
   <Input> Private dcd As Single()                    'Amount of dcd in the soil, per layer (kg/ha)
   <Input(IsOptional:=True)> Private ave_soil_temp As Single()    'Soil temperature for each layer (oC)

   'Output variables
   <Output><Units(" ")> Public dcd_inhibition_effect As Single()  'The nitrification inhibition factor due to the presence of DCD
   <Output><Units(" ")> Public dcd_degradation As Single()        'The fraction of DCD that is 'oxidised' each day
   <Output><Units("kg/ha")> Public dcd_degraded As Single
   
   Private SoilTemp As Single()                 'The soil temperature (oC)

   Private SoilCarbon As Single()               'Total soil carbon (%)
   Private SoilPH As Single()                   'The soil pH
   Private dcd_layer As Integer                 'The layer at which dcd will be applied
   Private delta_dcd As Single()                'The changes in dcd content for each layer
   Private sw_fraction As Single()              'The sw fractioin between LL15 and SAT (100)

   Private x_dcd_effect_function As Single()    'The values of x of the function describing the dcd effect
   Private y_dcd_effect_function As Single()    'The values of y of the function describing the dcd effect
   Private x_sw_effect_function As Single()     'The values of x of the function describing the effect of soil water on dcd degradation
   Private y_sw_effect_function As Single()     'The values of y of the function describing the effect of soil water on dcd degradation
   Private x_temp_effect_function As Single()   'The values of x of the function describing the effect of temperature on dcd degradation
   Private y_temp_effect_function As Single()   'The values of y of the function describing the effect of temperature on dcd degradation
   Private x_ph_effect_function As Single()     'The values of x of the function describing the effect of soil pH on dcd degradation
   Private y_ph_effect_function As Single()     'The values of y of the function describing the effect of soil pH on dcd degradation
   Private x_carbon_effect_function As Single() 'The values of x of the function describing the effect of soil organic carbon on dcd degradation
   Private y_carbon_effect_function As Single() 'The values of y of the function describing the effect of soil organic carbon on dcd degradation

   <EventHandler()> Public Sub OnInit2()

      'Initialise the inhibition factor:
      ReDim dcd_inhibition_effect(dlayer.Length - 1)
      ReDim dcd_degradation(dlayer.Length - 1)
      ReDim SoilCarbon(dlayer.Length - 1)
      ReDim SoilPH(dlayer.Length - 1)

      'Set base ph
      For z As Integer = 0 To dlayer.length - 1
         SoilPH(z) = 6  'Soil pH is not simulated so assumed as a constant
      Next
      
      'Get the dcd effect coefficients:
      x_dcd_effect_function = makeArray(dcd_x)
      y_dcd_effect_function = makeArray(dcd_y)
      Call checkArray(x_dcd_effect_function, y_dcd_effect_function)
      '  This represents the response curve for nitrification inhibition due to the
      '    presence of dcd. It varies between 0 (no effect) and 1 (total inhibition).
      '  The x vakues represent the dcd amount in the soil and y the correspondent inhibiton effect.

      'Get the coefficients for the sw effect on dcd degradation:
      x_sw_effect_function = makeArray(sw_dcd_x)
      y_sw_effect_function = makeArray(sw_dcd_y)
      Call checkArray(x_sw_effect_function, y_sw_effect_function)
      '  This is the effect of water content on dcd degradation, it varies between 0 (no degradation) 
      '    and 1(potential degradation).
      '  The x vakues represent the soil water content and y the correspondent water effect.
      
      'Get the coefficients for the temp effect on dcd degradation:
      x_temp_effect_function = makeArray(temp_dcd_x)
      y_temp_effect_function = makeArray(temp_dcd_y)
      Call checkArray(x_temp_effect_function, y_temp_effect_function)
      '  This is the effect of soil temperature on dcd degradation, it varies between 0 (no degradation) 
      '    and 1(potential degradation).
      '  The x vakues represent the soil temperature and y the correspondent effect.

      'Get the coefficients for the pH effect on dcd degradation:
      x_ph_effect_function = makeArray(ph_dcd_x)
      y_ph_effect_function = makeArray(ph_dcd_y)
      Call checkArray(x_ph_effect_function, y_ph_effect_function)
      '  This is the effect of soil pH on dcd degradation, it varies between 0 (no degradation) 
      '    and 1(potential degradation).
      '  The x vakues represent the soil pH and y the correspondent pH effect.

      'Get the coefficients for the carbon effect on dcd degradation:
      x_carbon_effect_function = makeArray(carbon_dcd_x)
      y_carbon_effect_function = makeArray(carbon_dcd_y)
      Call checkArray(x_carbon_effect_function, y_carbon_effect_function)
      '  This is the effect of soil carbon on dcd degradation, it varies between 0 (no degradation) 
      '    and 1(potential degradation).
      '  The x vakues represent the soil carbon content and y the correspondent effect.

   End Sub

   <EventHandler()> Public Sub OnPrepare()

      Dim MySoilN As SoilNui = MyPaddock.ComponentByType("SoilNui")
      Dim MySoilW As SWIM2ui = MyPaddock.ComponentByType("SWIM2ui")
      Dim MyDCD As Component = MyPaddock.ComponentByType("Solute")
      Dim SoilWater As Single() = MySoilW.sw                         'Soil water content ()
      Dim SoilCarb_tot As Single() = MySoilN.carbon_tot           'Total soil carbon (kg/ha)
      Dim SoilDensity As Single() = MySoilW.bd                       'Soil bulk density (g/cm3)
      Dim delta_urea As Single()
      
      Try
         ReDim SoilTemp(ave_soil_temp.Length - 1)
         ave_soil_temp.CopyTo(SoilTemp, 0) 
      Catch
         Dim st As Single() = MySoilN.st   'Soil temperature from SoilN (oC)
         ReDim SoilTemp(st.Length - 1)
         st.CopyTo(SoilTemp, 0) 
      End Try

      ReDim delta_dcd(dlayer.Length - 1)
      ReDim delta_urea(dlayer.Length - 1)
      Dim SWFraction As Single() = CalcSW_Frac(SoilWater)
      
      dcd_degraded = 0
      For z As Integer = 0 To dlayer.length - 1
         'calculate the dcd_inhibition factor
         If dcd(z) > 0 Then
            'Transform dcd from kg/ha to ppm
            Dim dcd_ppm As Single = dcd(z) * 10 / dlayer(z)    'g/L_soil
            dcd_ppm = dcd_ppm * 1000 / SoilDensity(z)          'ppm
            
            'interpolated value based on the function given in the UI, bounds it between 0 and 1.
            dcd_inhibition_effect(z) = math.Max(0, math.Min(1, InterpolateVals(dcd_ppm, x_dcd_effect_function, y_dcd_effect_function)))

            'Calculate the dcd degradation factor
            '       * all factor vary between 0 and 1, except f_temp
            Dim f_water As Single = math.Max(0, math.Min(1, InterpolateVals(SWFraction(z), x_sw_effect_function, y_sw_effect_function)))
            Dim f_temp As Single = math.Max(0, math.Min(1, InterpolateVals(SoilTemp(z), x_temp_effect_function, y_temp_effect_function)))
            Dim f_ph As Single = math.Max(0, math.Min(1, InterpolateVals(Soilph(z), x_ph_effect_function, y_pH_effect_function)))
            SoilCarbon(z) = SoilCarb_tot(z) / (SoilDensity(z) * dlayer(z) * 100)   'Transform soil carbon from kg/ha into %
            Dim f_carbon As Single = math.Max(0, math.Min(1, InterpolateVals(SoilCarbon(z), x_carbon_effect_function, y_carbon_effect_function)))
            dcd_degradation(z) = dcd_degrad_pot * f_water * f_temp * f_ph * f_carbon   '(%)
            dcd_degradation(z) = Math.Max(0, Math.Min(1, dcd_degradation(z) / 100))    'make sure degradation is 0-1
            delta_dcd(z) = -dcd(z) * dcd_degradation(z)       '(kg/ha)
            delta_urea(z) = -delta_dcd(z)    'dcd_degrade into urea
            
            dcd_degraded += delta_dcd(z)
         Else
            dcd_inhibition_effect(z) = 0
            dcd_degradation(z) = 0
         End If
      Next
      MySoilN.Variable("nitrification_inhibition").Set(dcd_inhibition_effect)
      MyDCD.Variable("dlt_dcd").Set(delta_dcd)
      MySoilN.dlt_urea = delta_urea

   End Sub
   
   Sub checkArray(ByRef MyArray_x As Single(), ByRef MyArray_y As Single()) 
      
      'make sure that both x and y arrays have the same length (the smallest is chosen if not)
      
      If MyArray_x.Length > MyArray_y.Length Then
         ReDim Preserve MyArray_x(MyArray_y.Length - 1)
      ElseIf MyArray_x.Length < MyArray_y.Length Then
         ReDim Preserve MyArray_y(MyArray_x.Length - 1)
      End If
      
   End Sub
   
   Function makeArray(ByVal ArrayString As String) As Single()
      
      'Get the string with values from the user interface and put the values in an numeric array
      
      Dim MyArray_string As String()
      Dim MyArray_single As Single()
      Dim Separator As Char() = " "
      
      '1-Split string into array
      MyArray_string = ArrayString.Split(Separator, StringSplitOptions.RemoveEmptyEntries)
      
      '2-convert array into type single
      ReDim MyArray_single(MyArray_string.Length - 1)      
      For i As Integer = 0 To MyArray_single.length - 1
         MyArray_single(i) = MyArray_string(i)
      Next
      Return MyArray_single
      
   End Function

   
   Function CalcSW_Frac(ByVal SoilWater As Single()) As Single()

      Dim SoilWaterComp As SWIM2ui = MyPaddock.ComponentByType("SWIM2ui")
      
      Dim SAT As Single() = SoilWaterComp.sat                       'Soil water content at saturation ()
      Dim WP As Single() = SoilWaterComp.ll15                       'Soil water content at lower limit/wilting point ()
      Dim WFraction(SoilWater.Length -1) As Single
      
      For z As Integer = 0 To SoilWater.Length - 1
         WFraction(z) = (SoilWater(z) - WP(z)) / (SAT(z) - WP(z))
      Next
      Return WFraction
      
   End Function

   Function InterpolateVals(ByVal my_x As Single, ByVal x_array As Single(), ByVal y_array As Single()) As Single
      
      'Find out the value correspondig to my_x in the function described by the x and y arrays
      InterpolateVals = 0
      If my_x <= x_array(0) Then
         InterpolateVals = y_array(0)
      ElseIf my_x >= x_array(x_array.length - 1)
         InterpolateVals = y_array(y_array.length - 1)
      Else
         For i As Integer = 1 To x_array.length - 1
            If my_x <= x_array(i) Then
               InterpolateVals = y_array(i - 1) + ((my_x - x_array(i - 1)) * (y_array(i) - y_array(i - 1)) / (x_array(i) - x_array(i - 1)))
               i = x_array.length 
            End If
         Next
      End If

   End Function

End Class
```
        manager2 CentrePivotIrrigation
          # Central Pivot Irrigation Manager
          DoIrrigate = no  # Turn irrigation on?
          # Parameters for all soils
          Irrigation_start_date = 1-oct  # Start of irrigation season (dd-mmm)
          Irrigation_end_date = 30-apr  # End of irrigation season (dd-mmm)
          PAW_depth = 500  # Enter the depth to which water deficit is computed (mm)
          CritPAWForShallow = 30  # PAW below which soil is considered "shallow" (mm)
          CritRainToPause = 30  # Amount of rainfall over the last 3 days to cause pause to irrigator (mm)
          DaysToPauseOnCritRain = 3  # Number of days to pause irrigator after critical rainfall (days)
          # Shallow Soils
          PercPAWIrrigDeficitShallow = 30  # Percentage of PAW at which irrigation starts (%)
          IrrigReturnShallow = 2  # Irrigation return period (days)
          IrrigAmtShallow = 10  # Effective irrigation amount (mm)
          IrrigEffShallow = 75  # Irrigation efficiency (%)
          # Deep Soils
          IrrigDeficitDeep = 40  # Deficit at which irrigation starts (mm)
          PercPAWIrrigDeficitDeep = 30  # Minimum percentage of PAW to force irrigation to start (%)
          IrrigReturnDeep = 4  # Irrigation return period (days)
          IrrigAmtDeep = 20  # Effective irrigation amount (mm)
          IrrigEffDeep = 85  # Irrigation efficiency for deep soils (%)
```vb
Imports System
Imports ModelFramework

Public Class Script 
   Inherits Instance

   <Link> Private MyPaddock As Paddock
   
   'Parameter variables:
   <param> Private DoIrrigate As String                     'Indicates whether irrigation is on (yes) or off (no)
   <param> Private Irrigation_start_date As String               'Start of the irrigation season (dd-mmm)
   <param> Private Irrigation_end_date As String                 'End of the irrigation season (dd-mmm)
   <param> Private PAW_depth As Single                      'Depth to consider plant available water, and deficit (mm)
   <param> Private CritPAWForShallow As Single              'Critical TPAW below which soil is considered shalow (mm)

   <param> Private CritRainToPause As Single                'Value of rain (sum over 3 days) when irrigation is paused (mm)
   <param> Private DaysToPauseOnCritRain As Single          'Number of days irrigations is paused when CritRain is reached
   
   <param> Private PercPAWIrrigDeficitShallow As Single     'Water deficit, as percentage of TPAW, that triggers irrigation for shallow soils (%)
   <param> Private IrrigReturnShallow As Single             'Minimum number of days between irrigation events for shallow soils
   <param> Private IrrigAmtShallow As Single                'Amount of water added per irrigation event for shallow soils (mm)
   <param> Private IrrigEffShallow As Single                'Irrigation efficiency for shallow soils (%)
   <param> Private IrrigDeficitDeep As Single               'Water deficit to trigger start of irrigation for deep soils (mm)
   <param> Private PercPAWIrrigDeficitDeep As Single        'Percentage of PAW that trigger irrigation in deep soils regardless the IrrigDeficitDeep (%)
   <param> Private IrrigReturnDeep As Single                'Minimum number of days between irrigation events for deep soils
   <param> Private IrrigAmtDeep As Single                   'Amount of water added per irrigation event for deep soils (mm)
   <param> Private IrrigEffDeep As Single                   'Irrigation efficiency for deep soils (%)

   'Variables read from other modules
   <Input> Private dd_mmm_yyyy As String                    'Today's date
   <Input> Private dlayer As Single()                       'Thickness of soil layers (mm)
   <Input> Private rain As Single                           'Rainfall (mm)

   'Output variables
   <Output><Units("mm")> Public SoilWaterDeficit As Single  'Soil water deficit (mm)
   <Output><Units("")> Public DaysAfterIrrigation As Single 'The number of days after irrigation was applied
   <Output><Units("")> Public SoilPAW As Single             'The potencial plant available water (mm)
   <Output><Units("")> Public IrrigDeficit As Single        'The soil water deficit that triggers irrigation (mm)
   <Output><Units("")> Public IrrigReturn As Single         'The return period for irrigation
   <Output><Units("")> Public IrrigAmt As Single            'The amount of water to add in an irrigation event (mm)
   <Output><Units("")> Public IrrigEff As Single            'The irrigaton efficiency (%)
   <Output><Units("mm")> Public RainOnPrevious3Days As Single 'The amount of rainfall over the previous 3 days
   <Output><Units("")> Public Days2Pause As Single          'The number of days irrigation is paused due to large rainfall

   'Internal variables
   Private StartDate As Date                                'The date when irrigation start (in date format)
   Private EndDate As Date                                  'The date when irrigation finish (in date format)
   Private RainOnPreviousDays(2) As Single                  'Record the rain of the previous 3 days (mm)
   
   <EventHandler()> Public Sub OnInit2()

      'Put the dates into date format:
      StartDate = Date.Parse(Irrigation_start_date)
      EndDate = Date.Parse(Irrigation_end_date)

      DaysAfterIrrigation = 5000  'so will reset to 1 on first day

      'Zero rain on previous 3 days
      RainOnPrevious3Days = 0.0
      Array.Clear(RainOnPreviousDays, 0, RainOnPreviousDays.Length)

      Dim MySoilW As SWIM2ui = MyPaddock.ComponentByType("SWIM2ui")
      Dim sw_DUL As Single() = MySoilW.dul_dep        'sw at DUL
      Dim sw_LL15 As Single() = MySoilW.ll15_dep        'sw at LL15 
      Dim DepthFromSurface As Single = 0
      For z As Integer = 0 To dlayer.length - 1
         DepthFromSurface += dlayer(z)
         If DepthFromSurface <= PAW_depth Then
            SoilPAW += sw_dul(z) - sw_LL15(z)
         Else
            z = dlayer.Length - 1
         End If
      Next
      
      Console.WriteLine("------- Irrigation Manager Initialisation ------------------------------------")
      Console.WriteLine("")
      Console.WriteLine("   Irrigation season between " & StartDate.ToString("dd MMMM") & " and " & EndDate.ToString("dd MMMM"))
      Console.WriteLine("   Soil Layer to calculate irrigation is  " & PAW_depth & " mm")
      Console.WriteLine("   With plant available water of " & SoilPAW & " mm")
      If SoilPAW <= CritPAWForShallow Then
         Console.WriteLine("   Soil is considered shallow")
      Else
         Console.WriteLine("   Soil is considered Deep")
      End If
      Console.WriteLine("")


   End Sub

   <EventHandler()> Public Sub OnPrepare()

      Dim MySoilW As SWIM2ui = MyPaddock.ComponentByType("SWIM2ui")
      
      Dim sw_dul As Single() = MySoilW.dul_dep        'sw at DUL
      Dim sw_sw As Single() = MySoilW.sw_dep          'sw at LL 
      
      'Calc the amount of rain today plus the previous two days
      RainOnPreviousDays(2) = RainOnPreviousDays(1)
      RainOnPreviousDays(1) = RainOnPreviousDays(0)
      RainOnPreviousDays(0) = rain
      RainOnPrevious3Days = RainOnPreviousDays(0) + RainOnPreviousDays(1) + RainOnPreviousDays(2)
      
      'Calc the number of days paused after large rainfal
      If RainOnPrevious3Days >= CritRainToPause Then
         Days2Pause = DaysToPauseOnCritRain
      Else
         Days2Pause = Days2Pause - 1   'Can go negative, thats OK
      End If
      
      'Calc the soil water deficit     
      Dim DepthFromSurface As Integer = 0
      SoilWaterDeficit = 0.0         
      For z As Integer = 0 To dlayer.length - 1
         DepthFromSurface += dlayer(z)
         If DepthFromSurface <= PAW_depth Then
            SoilWaterDeficit += Math.Min(0, sw_sw(z) - sw_dul(z))
         Else
            z = dlayer.Length - 1
         End If
      Next
      '      SoilWaterDeficit_nve = -1 * SoilWaterDeficit 

      If DoIrrigate = "yes" Then
         Dim Today As Date = Date.Parse(dd_mmm_yyyy.Replace("_", "/"))
         If isBetween(today, StartDate, EndDate) Then
                  
            'Decide whether irrigation is needed
            If SoilPAW <= CritPAWForShallow Then
               'Use shallow soil parameters
               IrrigDeficit = PercPAWIrrigDeficitShallow / 100 * SoilPAW
               IrrigReturn = IrrigReturnShallow
               IrrigAmt = IrrigAmtShallow
               IrrigEff = IrrigEffShallow            
            Else
               'Use deep soil parameters
               'IrrigDeficit = IrrigDeficitDeep
               IrrigDeficit = Math.Min(IrrigDeficitDeep, PercPAWIrrigDeficitShallow / 100 * SoilPAW)
               IrrigReturn = IrrigReturnDeep
               IrrigAmt = IrrigAmtDeep
               IrrigEff = IrrigEffDeep
            End If
         
            'Check whether irrigation is paused
            DaysAfterIrrigation = DaysAfterIrrigation + 1
            If Days2Pause < 0.5 Then
               'Irrigation is not paused, check return
               If DaysAfterIrrigation > IrrigReturn Then
                  DaysAfterIrrigation = 1  'irrigation is allowed

                  'Check whether soil needs irrigation
                  If SoilWaterDeficit <= -IrrigDeficit Then
                     Dim Irrigation As Irrigation = MyPaddock.ComponentByType("Irrigation")
                     Dim irrig As IrrigationApplicationType = New IrrigationApplicationType()
                     irrig.Amount = IrrigAmt / (IrrigEff * 0.01)
                     irrig.Duration = 0
                     irrig.time = ""
                     ReDim irrig.source(-1)
                     irrig.Crop_Area = 0
                     irrig.NO3 = 0
                     irrig.NH4 = 0
                     irrig.CL = 0                     
                     Irrigation.Apply(irrig)
                  End If
               End If
            End If
            
         End If  'Today
      End If  'DoIrrigate
         
   End Sub

   Private Function isBetween(ByVal today As Date, ByVal startdate As Date, ByVal enddate As Date) As Boolean
      
      'Check whether today is between the start and the end dates.  This is needed because start and end dates don't have year
      
      Dim date1 As Date = New Date(today.Year, startdate.Month, startdate.Day)
      Dim date2 As Date = New Date(today.Year, enddate.Month, enddate.Day)

      If (date1 > date2) Then
         'Irrigation in the middle of the year - ex: summer in the northern hemisphere
         Return (today >= date1 Or today <= date2)
      Else
         'Irrigation in the end of the year - ex: summer in the southern hemisphere
         Return (today >= date1 And today <= date2)
      End If
      
   End Function
   
End Class
```
        operations: same as DCD_Test.Pdk_plusDCD.Manager folder.operations
      micromet
        soilalbedo = 0.23
        a_interception = 0
        b_interception = 0
        c_interception = 0
        d_interception = 0
      irrigation: same as DCD_Test.Pdk_plusDCD.Irrigation
      fertiliser
      DCD
        d0 = 108  # dcd diffusivity in water (mm2/d)
        layers = 0 0 0 0 0 0 0 0 0 0 0 0  # dcd in each layer (kg/ha)
      surfaceom surface organic matter
        PoolName = grass  # Organic Matter pool name
        type = grass  # Organic Matter type
        mass = 20  # Initial surface residue (kg/ha)
        cnr = 17  # C:N ratio of initial residue
        standing_fraction = 0  # Fraction of residue standing
      SWIM2ui
        ini Ini_SWIM2: filename=ini_HorotiuCloseSWIMSoil.xml
      outputfile ForAnalysis: filename=DCD_Test Pdk_earlyDCD ForAnalysis.out; title=DCD_Test Pdk_earlyDCD ForAnalysis
        variables
          variables: dd/mm/yyyy as Date, nh4(), no3(), dcd()
        events Reporting Frequency: event=Daily
      SoilTemp2 SoilTemp2 (withSWIM): same as DCD_Test.Pdk_plusDCD.SoilTemp2 (withSWIM)
      SoilNui: same as DCD_Test.Pdk_plusDCD.SoilNui
      AgPasture: same as DCD_Test.Pdk_plusDCD.AgPasture
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