folder simulations: version=36; creator=Apsim 7.6-r3467
  simulation NZWI
    metfile met: filename=%apsim%\Tests\UserRuns\FtRG_SoilC\NZWI\NZWI.met
    clock
      start_date = 01/08/1996  # Enter the start date of the simulation
      end_date = 31/12/2011  # Enter the end date of the simulation
    summaryfile
    area paddock
      SoilTemperature2
        MaxTTimeDefault = 14
        BoundaryLayerConductanceSource = calc
        BoundaryLayerConductance = 20
        BoundaryLayerConductanceIterations = 1
        NetRadiationSource = calc
        DefaultWindSpeed = 3
        DefaultAltitude = 18
        DefaultInstrumentHeight = 1.2
        BareSoilHeight = 57
      Soil: LocalName=Horotiu Silt Loam; Latitude=0; Longitude=0
        DataSource=Val generated from Landcare soils database, published data and pedotransfer functions
        Water
          Thickness  BD    AirDry  LL15   DUL    SAT    KS
          170        1.2   0.039   0.27   0.32   0.48   960
          110        1.35  0.042   0.27   0.32   0.48   1440
          80         1.42  0.045   0.12   0.17   0.44   1440
          110        0.29  0.012   0.04   0.16   0.44   2400
          80         0.44  0.012   0.041  0.085  0.158  2400
          150        0.44  0.012   0.041  0.085  0.158  2400
          250        0.34  0.005   0.018  0.044  0.108  2400
          550        0.29  0.003   0.009  0.026  0.076  2400
          SoilCrop AgPasture: LL=[0.13, 0.139, 0.151, 0.04, 0.041, 0.041, 0.018, 0.009]; KL=[0.1, 0.1, 0.1, 0.1, 0.05, 0, 0, 0]; XF=[1, 1, 1, 0.5, 0.1, 0, 0, 0]
        InitialWater Initial water: FractionFull=0.1; PercentMethod=EvenlyDistributed; RelativeTo=ll15
        SoilOrganicMatter: RootCN=40; RootWt=200; SoilCN=12.5; EnrACoeff=7.4; EnrBCoeff=0.2; OCUnits=Total
          Thickness  OC     FBiom  FInert
          170        0.035  0.08   0.58
          110        0.018  0.02   0.7
          80         0.014  0.015  0.77
          110        0.002  0.01   0.9
          80         0.002  0.01   0.95
          150        0.002  0.01   0.95
          250        0.001  0.01   0.99
          550        0.001  0.01   0.99
        Analysis: PHUnits=Water; BoronUnits=HotWater
          Thickness  Rocks  PH   CEC    ParticleSizeSand  ParticleSizeSilt  ParticleSizeClay
          170        0      5.7  14.66  13.78             64.72             21.5
          110        0      5.8  11.27  14.35             62.65             23
          80         0      5.8  9.6    18.42             59.58             22
          110        72     5.8  6.77   12.96             8.32              6.72
          80         67     5.9  4.93   25.53             3.51              3.96
          150        67     5.9  4.93   25.53             3.51              3.96
          250        76     6    4.1    21.73             1.07              1.2
          550        81     6.1  4.97   17.93             0.5               0.57
        Sample Initial nitrogen: NO3Units=ppm; NH4Units=ppm; SWUnits=Volumetric; OCUnits=Total; PHUnits=Water
          Thickness  NO3    NH4
          170        6.503  0.599
          110        2.101  0.1
          80         0.1    0.1
          110        0.1    0.1
          80         0.1    0.1
          150        0.1    0.1
          250        0.1    0.1
          550        0.1    0.1
        LayerStructure
          Thickness=[10, 20, 30, 40, 50, 50, 50, 50, 100, 100, 100, 100, 100, 150, 150, 150, 150, 100]
        Swim: Salb=0.13; CN2Bare=73; CNRed=20; CNCov=0.8; KDul=1; PSIDul=-100; VC=true; DTmin=0; DTmax=1440; MaxWaterIncrement=10; SpaceWeightingFactor=0; SoluteSpaceWeightingFactor=0; Diagnostics=false
          SwimSoluteParameters: Dis=15; Disp=1; A=1; DTHP=1
            zero: DTHC, WaterTableCl, WaterTableNO3, WaterTableNH4, WaterTableUrea, WaterTableTracer, WaterTableMineralisationInhibitor, WaterTableUreaseInhibitor, WaterTableNitrificationInhibitor, WaterTableDenitrificationInhibitor
            Thickness  NO3Exco  NO3FIP  NH4Exco  NH4FIP  UreaExco  UreaFIP  ClExco  ClFIP  TracerExco  TracerFIP
            170        0        1       38.875   0.522   0         1        0       1      0           1
            110        0        1       45.016   0.468   0         1        0       1      0           1
            80         0        1       45.886   0.453   0         1        0       1      0           1
            110        0        1       14.54    0.833   0         1        0       1      0           1
            80         0        1       0.13     1       0         1        0       1      0           1
            150        0        1       0.13     1       0         1        0       1      0           1
            250        0        1       0.076    1       0         1        0       1      0           1
            550        0        1       0.054    1       0         1        0       1      0           1
      folder Manager folder
        manager2 Irrigate3wk
          # Irrigation parameters
          amount = 100  # Amount of irrigation to apply (mm)
          eff = 0.5  # Irrigation efficiency (0-1)
          start = 15-sep  # The earliest date irrigation will be applied (dd-mmm)
          end = 15-apr  # The latest date irrigation will be applied (dd-mmm)
          irrig_weeks = 3  # Apply irrigation every X weeks (1=every week)
```csharp
using System;
using ModelFramework;
using CSGeneral;

public class Script 
{      
   [Link] Irrigation Irrigation; 
   [Input] DateTime today;
   [Param] float amount;         //amount of irrigation to apply (mm)
   [Param] float eff;            //irrigation efficiency
   [Param] string start;         //no irrigation will be applied before this date
   [Param] string end;           //no irrigation will be applied after this date
   [Param] int irrig_weeks;   //every number of weeks to irrigate
   
   private int week_num;
   
   [EventHandler] public void OnInit2()
   {
      week_num = irrig_weeks-1;
   }
          
   // The following event handler will be called each day at the start of the day
   [EventHandler] public void OnPrepare()
   {
    
      
      //if it's Monday then cycle week_number
      if (today.DayOfWeek.ToString().Equals("Monday"))
      {
         week_num += 1;
         if (week_num > irrig_weeks)
         {
            week_num = 1;
         }
      
      //if it's Monday and we're in the irrigation window
         if (today.DayOfWeek.ToString().Equals("Monday") && DateUtility.WithinDates(start, today, end))
         {
            // test week_number against irrig_weeks
            if (week_num == irrig_weeks)
            {
               // if week_number = irrig_weeks then do the irrrigation and reset week_number to 0
               IrrigationApplicationType data = new IrrigationApplicationType();
               data.Amount = amount; 
               Irrigation.Set("irrigation_efficiency", eff);
               Irrigation.Apply(data);
            }
         }
      }
   }  
}
```
        manager2 DoGrazing
          # Set grazing parameters
          GrazingTrigger = Both  # Trigger grazing by Interval, Biomass or the earliest of either
          arr_Interval = 36 36 36 36 57 57 100 100 80 36 36 36  # Array of monthly (Jan to Dec) grazing intervals (days)
          arr_PreGraze = 2500 2500 2500 2500 2500 2500 2500 2500 2500 2500 2500 2500  # Array of monthly pre-grazing biomass to trigger grazing (kgDM/ha)
          arr_PostGraze = 1500 1500 1500 1250 1000 1000 1000 1000 1250 1250 1500 1500  # Array of monthly post-grazing biomass (kgDM/ha)
          # Treatment of excreta
          PropNExcreted = 0.75  # Proportion of the ingested N that is excreted (dung and urine)
          PropExcretedNUrine = 0.6  # Proportion of the excreted N that is as urine
          DepthUrineDeposition = 150  # Depth to which urine is deposited in the soil (mm)
          AmtWaterUrine = 10  # Equivalent depth of water associated with the urine (mm) [NOT WORKING YET!]
          # Treatment of surface litter and tramplling
          PropTrampled = 0.05  # Proportion of the pre-grazing biomass that is trampled to litter
          TrampleSOM = 0.25  # Proportion of surface litter incorporated into the soil by hoof action
          TrampleSOMDepth = 100  # Depth to which that litter is incorporated (mm)
```vb
Imports System
Imports ModelFramework


Public Class Script 
   
   <Link()> Dim MyPaddock As Paddock
   <Link()> Dim SOM As SurfaceOM
   <Link()> Dim Fert As Fertiliser
   <Link()> Dim Pasture As AgPasture
   <Link()> Dim MySoilN As SoilN
   '<Link()> Dim MySoilWater As SWIM
   
   <Param()> <Output()> Private GrazingTrigger As String
   <Param()> <Output()> Private arr_Interval() As Double 
   <Param()> <Output()> Private arr_PreGraze() As Double 
   <Param()> <Output()> Private arr_PostGraze() As Double 

   <Param()> <Output()> Private PropTrampled As Double    'applies to the pre-graxing biomass
   <Param()> <Output()> Private PropNExcreted As Double 
   <Param()> <Output()> Private PropExcretedNUrine As Double 
   <Param()> <Output()> Private DepthUrineDeposition As Double 

   <Param()> <Output()> Private AmtWaterUrine As Double 
   <Param()> <Output()> Private TrampleSOM As Double 
   <Param()> <Output()> Private TrampleSOMDepth As Double 

   'Events to be raised:
   'Event ChangeSoilNitrogen As NitrogenChangedDelegate

   Private RotLen As Double
   
   <Input> Private dd_mmm_yyyy As String     'Today's date
   <Input> Private dlayer() As Double
   Private Today As Date              'The date of today (in date format)
   Private MonthNum As Integer

   <Output()> Private DaysSinceCut As Integer

   <Output()> Private GrazeNow As Boolean
   <Output()> Private GrazeYesterday As Boolean
   
   'Internal variables
   <Output()> Private Interval As Integer
   <Output()> Private PreGraze As Double 
   <Output()> Private PostGraze As Double 
   
   <Output()> Private DM_Grazed As Double
   <Output()> Private N_Grazed As Double

   <Output()> Private ApparentGR As Double  'apparent growth rate, DM_harvested / DaysSinceCut
   
   <EventHandler()> Public Sub OnInit2()
      
      ReDim Preserve arr_Interval(11)
      ReDim Preserve arr_PreGraze(11)
      ReDim Preserve arr_PostGraze(11)      

      GrazeNow = False
      DaysSinceCut = 0
      ApparentGR = 0.0
      
   End Sub

   <EventHandler()> Public Sub OnPrepare()

      Today = Date.Parse(dd_mmm_yyyy.Replace("_", "/"))
      MonthNum = Today.Month

      Interval = arr_Interval(MonthNum - 1)
      PreGraze = arr_PreGraze(MonthNum - 1)
      PostGraze = arr_PostGraze(MonthNum - 1)
      
      GrazeNow = False
      ApparentGR = 0.0
      DaysSinceCut += 1
      
      If ((GrazingTrigger = "Interval") And (DaysSinceCut >= Interval)) Then
         GrazeNow = True
      ElseIf ((GrazingTrigger = "Biomass") And (Pasture.AboveGroundWt >= PreGraze)) Then
         GrazeNow = True
      ElseIf ((GrazingTrigger = "Both") And ((DaysSinceCut >= Interval) Or (Pasture.AboveGroundWt >= PreGraze))) Then
         GrazeNow = True
      End If
         
      If (GrazeNow) Then

         Dim DM_PreGrazing As Double = 0.0
         Dim N_PreGrazing As Double = 0.0
         
         Dim DM_Removed As Double = 0.0
         Dim N_Removed As Double = 0.0

         Dim DM_ToAllocate As Double = 0.0
         Dim N_ToAllocate As Double = 0.0
      
         Dim DM_Trampled As Double = 0.0
         Dim N_Trampled As Double = 0.0

         Dim DM_ExcretedDung As Double
         Dim N_Excreted as Double
         Dim N_ExcretedDung As Double
         Dim N_ExcretedUrine as Double

         DM_PreGrazing = Pasture.AboveGroundWt 
         N_PreGrazing = Pasture.AboveGroundN 
      
         Dim GZ As GrazeType = New GrazeType()
         GZ.amount = PostGraze
         GZ.type = "residue"
         GZ.sender = "DoGrazing"
         Pasture.Graze(GZ)
         
         'from standing biomass
         DM_Removed = DM_PreGrazing - Pasture.AboveGroundWt: DM_ToAllocate = DM_Removed: DM_Grazed = DM_Removed
         N_Removed = N_PreGrazing - Pasture.AboveGroundN: N_ToAllocate = N_Removed: N_Grazed = N_Removed
         ApparentGR = DM_Removed / DaysSinceCut


         ' allocate some of the biomass removed to trampling and litter
         DM_Trampled = Math.Max(0.0, PropTrampled * DM_ToAllocate): DM_ToAllocate -= DM_Trampled
         N_Trampled = Math.Max(0.0, PropTrampled * N_ToAllocate): N_ToAllocate -= N_Trampled

         ' C excreted comes from digesitibility
         N_Excreted = Math.Max(0.0, PropNExcreted * N_ToAllocate): N_ToAllocate -= N_Excreted
         N_ExcretedUrine = Math.Max(0.0, N_Excreted * PropExcretedNUrine)
         N_ExcretedDung = Math.Max(0.0, N_Excreted - N_ExcretedUrine)
         DM_ExcretedDung = Math.Max(0.0, (1.0 - Pasture.HerbageDigestibility) * DM_ToAllocate)
                  
         'move the trampled DM to litter
         Dim litter As BiomassRemovedType = New BiomassRemovedType()
         litter.crop_type = "grass"
         litter.dm_type = New String() {"grass"}
         litter.dlt_crop_dm = New Single() {DM_Trampled}  
         litter.dlt_dm_n = New Single() {N_Trampled}
         litter.dlt_dm_p = New Single() {0.0}
         litter.fraction_to_residue = New Single() {1.0}
         SOM.Biomassremoved(litter)

         'move the dung to litter
         Dim dung As BiomassRemovedType = New BiomassRemovedType()
         dung.crop_type = "RuminantDung_PastureFed"
         dung.dm_type = New String() {"RuminantDung_PastureFed"}  
         dung.dlt_crop_dm = New Single() {DM_ExcretedDung} 
         dung.dlt_dm_n = New Single() {N_ExcretedDung}  
         dung.dlt_dm_p = New Single() {0.0}
         dung.fraction_to_residue = New Single() {1.0}
         SOM.Biomassremoved(dung)
         
         'move the urine to the soil
         Dim SumDepth As Double = 0.0
         Dim UrineUrea(dlayer.length) As Double
         Dim UrineWater(dlayer.length) As Double
         For i As Integer = 0 To dlayer.Length - 1
            SumDepth += dlayer(i)
            If SumDepth <= DepthUrineDeposition Then
               UrineUrea(i) = dlayer(i) / DepthUrineDeposition * N_ExcretedUrine
               UrineWater(i) = dlayer(i) / DepthUrineDeposition * AmtWaterUrine
            Else
               UrineUrea(i) = Math.Max(0.0, (DepthUrineDeposition - SumDepth)) / DepthUrineDeposition * N_ExcretedUrine
               UrineWater(i) = Math.Max(0.0, (DepthUrineDeposition - SumDepth)) / DepthUrineDeposition * AmtWaterUrine
            End If
            'MySoilWater.sw_dep(i) += UrineWater(i)
         Next
         
         Dim urine As NitrogenChangedType = New NitrogenChangedType
         urine.DeltaUrea = UrineUrea
         urine.DeltaNO3 = New Double() {}
         urine.DeltaNH4 = New Double() {}
         MySoilN.NitrogenChanged(urine)  
         
         Dim trampling As TillageType = New TillageType
         trampling.tillage_depth = TrampleSOMDepth
         trampling.f_incorp = TrampleSOM
         SOM.Tillage(trampling)
         
         GrazeYesterday = True
         DaysSinceCut = 0
         
      Else

         DM_Grazed = 0.0
         N_Grazed = 0.0
         
      End If
      
   End Sub

   
End Class
```
        manager2 Reporting
          ReportStart_str = 01/01/1900  # Date to start the reporting
          AccumStart_str = 01/01/1900  # Date to start the accumulation calculations
          ReportModuleName = Sim  # Name of the Reporting module
          ResetCum = yes  # Reset the accumulation every year?
          ReportingFreq = Monthly  # Reporting frequency
```vb
Imports System
Imports ModelFramework


Public Class Script 
   
   <Link()> Dim MyPaddock As Paddock
   <Link()> Dim MySoilN As SoilN
   <Link()> Dim MyIrrig As Irrigation
   <Link()> Dim MyFert As Fertiliser
   <Link()> Dim MyOutput As Outputfile

   'My properties
   <Param> Private ReportingFreq As String   '<Param> Private ReportingFreq As String
   <Param> Private AccumStart_str As String
   <Param> Private ReportStart_str As String
   <Param> Private ReportModuleName As String
   <Param> Private ResetCum As String

   
   'Time type information 
   <Input> Private dd_mmm_yyyy As String     'Today's date
   <Input> Private day As Integer
   <Input> Private year As Integer
   <Input> Private day_of_month As Integer
   <Input> Private is_end_week As Boolean
   <Input> Private is_end_month As Boolean
   <Input> Private is_end_year As Boolean
   <Input> Private simulation_end_day As Integer
   <Input> Private simulation_end_year As Integer
   <Input> Private simulation_days As Integer
   
   
   <Output><Units("")> Public DaysInAve As Integer
   <Output><Units("")> Public DaysInCum As Integer
   <Output><Units("")> Public DaysInSum As Integer
   <Output><Units("")> Public DaysAfterStart As Integer
   <Output><Units("")> Public end_sim As Integer
   
   <Input> Private dlayer As Single()         'Thickness of soil layers (mm)
   
   Private Today As Date                      'The date of today (in date format)
   Private AccumStart As Date                 'Date to start the accumulations
   Private ReportStart As Date                'Date to start the reporting
   <Output>Private ReportToday As Integer     
   <Output>Private ReportYesterday As Integer 
   
   <Input>  Private DM_Grazed As Single
   <Output><Units("mm")> Private CumDMGrazed As Single
   <Input>  Private N_Grazed As Single
   <Output><Units("mm")> Private CumNGrazed As Single

   <Input>  Private HerbageGrowthWt As Single
   <Output><Units("mm")> Private SumGrowth As Single
   <Output><Units("mm")> Private CumGrowth As Single
   
   
   <Input>  Private rain As Single
   <Input>  Private Irrigation as Single
   <Output><Units("mm")> Private CumPrecip As Single

   <Input>  Private sw_dep As Single()
   <Input>  Private sat_dep As Single()
   <Input>  Private dul_dep As Single()
   <Input>  Private ll15_dep As Single()
   <Output><Units("mm")> Private Satdep As Single()
   <Output><Units("mm")> Private Duldep As Single()
   <Output><Units("mm")> Private ll15dep As Single()
   <Output><Units("mm")> Private SWdep As Single()
   
   <Input>  Private drain As Single
   <Output><Units("mm")> Private CumDrain As Single
   
   <Input>  Private sw As Single()
   <Output><Units("kg/ha")> Private SW_l As Single()
   <Input>  Private dul As Single()
   <Output><Units("kg/ha")> Private Dul_l As Single()
   <Input>  Private ll15 As Single()
   <Output><Units("kg/ha")> Private ll15_l As Single()
   
   
   <Input>  Private urea As Single()
   <Output><Units("kg/ha")> Private urea_l As Single()
   <Input>  Private nh4 As Single()
   <Output><Units("kg/ha")> Private nh4_l As Single()
   <Input>  Private no3 As Single()
   <Output><Units("kg/ha")> Private no3_l As Single()

   <Input>  Private biom_n As Single()
   <Output><Units("kg/ha")> Private biom_n_l As Single()

   <Input>  Private fom_n As Single()
   <Output><Units("kg/ha")> Private fom_n_l As Single()

   <Input>  Private hum_n As Single()
   <Output><Units("kg/ha")> Private hum_n_l As Single()

   <Output><Units("kg/ha")> Private org_n_l As Single()
   <Output><Units("kg/ha")> Private min_n_l As Single()
   <Output><Units("kg/ha")> Private dlt_biom_n_l As Single()
   <Output><Units("kg/ha")> Private dlt_fom_n_l As Single()
   <Output><Units("kg/ha")> Private dlt_hum_n_l As Single()
   <Output><Units("kg/ha")> Private dlt_org_n_l As Single()
   <Output><Units("kg/ha")> Private dlt_min_n_l As Single()
   
   <Input>  Private HarvestWt As Single
   <Output><Units("mm")> Private cumHarvestWt As Single
   <Input>  Private HarvestN As Single
   <Output><Units("mm")> Private cumHarvestN As Single

   <Input>  Private leach_no3 As Single
   <Output><Units("mm")> Private cumleach_no3 As Single
   <Input>  Private leach_nh4 As Single
   <Output><Units("mm")> Private cumleach_nh4 As Single

   <Input>  Private dnit As Single()
   <Output><Units("kg/ha")> Private cum_dnit As Single
   <Input>  Private n2o_atm As Single()
   <Output><Units("kg/ha")> Private cum_n2o_atm As Single

   
   
   Private ini_biom_n_l As Single()
   Private ini_fom_n_l As Single()
   Private ini_hum_n_l As Single()
   Private ini_org_n_l As Single()
   Private ini_min_n_l As Single()

   Private OutStartDepth As Single()
   Private OutEndDepth As Single()
   Private NumDepths As Integer
   Private WeightsArray As Single(,)
   Private SimStartDepth As Single()
   Private SimEndDepth As Single()


   <EventHandler()> Public Sub OnInit2()
      
      
      'ReportingFreq = "never"
      'ReportStart_str = "01/01/1900"
      
      
      NumDepths = 5
      ReDim OutStartDepth(NumDepths - 1)
      ReDim OutEndDepth(NumDepths - 1)
      ReDim WeightsArray(dlayer.Length - 1, NumDepths - 1)
      
      ReDim Satdep(NumDepths - 1)
      ReDim Duldep(NumDepths - 1)
      ReDim ll15dep(NumDepths - 1)
      ReDim SWdep(NumDepths - 1)
      ReDim Dul_l(NumDepths - 1)
      ReDim ll15_l(NumDepths - 1)
      ReDim SW_l(NumDepths - 1)
      ReDim urea_l(NumDepths - 1)
      ReDim nh4_l(NumDepths - 1)
      ReDim no3_l(NumDepths - 1)
      'ReDim SoilpH_l(NumDepths - 1)
      ReDim biom_n_l(NumDepths - 1)
      ReDim fom_n_l(NumDepths - 1)
      ReDim hum_n_l(NumDepths - 1)
      ReDim org_n_l(NumDepths - 1)
      ReDim min_n_l(NumDepths - 1)

      ReDim dlt_biom_n_l(NumDepths - 1)
      ReDim dlt_fom_n_l(NumDepths - 1)
      ReDim dlt_hum_n_l(NumDepths - 1)
      ReDim dlt_org_n_l(NumDepths - 1)
      ReDim dlt_min_n_l(NumDepths - 1)
      ReDim ini_biom_n_l(NumDepths - 1)
      ReDim ini_fom_n_l(NumDepths - 1)
      ReDim ini_hum_n_l(NumDepths - 1)
      ReDim ini_org_n_l(NumDepths - 1)
      ReDim ini_min_n_l(NumDepths - 1)

      
      OutStartDepth(0) = 0.0: OutEndDepth(0) = 20.0
      OutStartDepth(1) = 20.0: OutEndDepth(1) = 100.0
      OutStartDepth(2) = 100.0: OutEndDepth(2) = 200.0
      OutStartDepth(3) = 200.0: OutEndDepth(3) = 700.0
      'OutStartDepth(4) = 0.0: OutEndDepth(4) = 700.0
      
      Dim SimStartDepth As Single()
      Dim SimEndDepth As Single()
      ReDim SimStartDepth(dlayer.length - 1)
      ReDim SimEndDepth(dlayer.length - 1)
      SimStartDepth(0) = 0.0
      SimEndDepth(0) = dlayer(0)
      For SimLayer As Integer = 1 To dlayer.length - 1
         SimStartDepth(SimLayer) = SimEndDepth(SimLayer - 1)
         SimEndDepth(SimLayer) = SimEndDepth(SimLayer - 1) + dlayer(SimLayer)
      Next

      
      For OutLayer As Integer = 0 To NumDepths - 1
         For SimLayer As Integer = 0 To dlayer.length - 1

            WeightsArray(SimLayer, OutLayer) = Math.MAX(0.0, Math.MIN(Math.MIN(OutEndDepth(OutLayer), SimEndDepth(SimLayer)) - OutStartDepth(OutLayer), Math.MIN(OutEndDepth(OutLayer), SimEndDepth(SimLayer)) - SimStartDepth(SimLayer))) 
            WeightsArray(SimLayer, OutLayer) = WeightsArray(SimLayer, OutLayer) / (SimEndDepth(SimLayer) - SimStartDepth(SimLayer))
         
         Next  'SimLayer
      Next     'OutLayer

      Console.WriteLine("Array of Weights")
      For SimLayer As Integer = 0 To dlayer.length - 1
         Dim Line2Write As String = "End depth (mm): " & SimEndDepth(SimLayer)
         For i As Integer = 0 To NumDepths - 1
            Line2Write += "   " & WeightsArray(SimLayer, i)
         Next
         Console.WriteLine(Line2Write)
      Next  'SimLayer 
      
      
      AccumStart = Date.Parse(AccumStart_str)
      ReportStart = Date.Parse(ReportStart_str)
      ReportYesterday = 1
      
   End Sub

   <EventHandler()> Public Sub OnPrepare()

      Today = Date.Parse(dd_mmm_yyyy.Replace("_", "/"))
      If (day = simulation_end_day) And (year = simulation_end_year) Then
         end_sim = 1
      End If

   ReportToday = 0      
   If Today >= ReportStart Then
      DaysAfterStart += 1
         If ReportingFreq.ToLower = "daily" Then
            ReportToday = 1
         ElseIf ReportingFreq.ToLower = "weekly" Then
            If (is_end_week) Then
               ReportToday = 1
            End If
         ElseIf ReportingFreq.ToLower = "tendaily" Then
            If (day_of_month = 10) Or (day_of_month = 20) Or (is_end_month) Then
               ReportToday = 1
            End If
         ElseIf ReportingFreq.ToLower = "monthly" Then
            If (is_end_month) Then
               ReportToday = 1
            End If
         ElseIf ReportingFreq.ToLower = "annual" Then
            If (is_end_year) Then
               ReportToday = 1
            End If
         ElseIf ReportingFreq.ToLower = "never" Then
            ReportToday = 0      
         Else
            Throw New Exception("Invalid reporting frequency")
         End If
      End If

      If (Today = ReportStart) Or (ReportYesterday = 1) Then 
         ZeroAverages()
         ZeroSums()
         ReportYesterday = 0
      End If

      If (ResetCum.ToLower = "yes") Then
         If (Today.Month = AccumStart.Month) And (Today.Day = AccumStart.Day) Then
            ZeroAccums()
         End If
      End If

      
      If simulation_days = 0 Then

         DoDepthArrays()  ' if this is the first day of the simulation then need ot do the depth aggregation first.  Other days is left over from previous post
         console.writeline("Initialised the deltas")
      End If

      For OutLayer As Integer = 0 To NumDepths - 1 
         ini_biom_n_l(OutLayer) = biom_n_l(OutLayer)
         ini_fom_n_l(OutLayer) = fom_n_l(OutLayer)
         ini_hum_n_l(OutLayer) = hum_n_l(OutLayer)
         ini_org_n_l(OutLayer) = org_n_l(OutLayer)
         ini_min_n_l(OutLayer) = min_n_l(OutLayer) 
      Next
      
      
   End Sub

   <EventHandler()> Public Sub OnPost() 
      
      If Today >= ReportStart Then
         
         DoDepthArrays()
         DoDeltas()
         DoAverages()                        ' sum the Sum outputs
         DoSums()                        ' sum the Sum outputs
         DoAccums()                      ' accum the Cum outputs
                 
         If ReportToday = 1 Then         ' publish the report as needed and set reporting flags

            AverageAverages()
 
            MyOutput.Publish("do_output")
            ReportYesterday = 1
         End If
         
      End If

   End Sub
   
   
   Public Sub ZeroAverages()

      DaysInAve = 0
      
   End Sub
   
   
   Public Sub ZeroSums()
      
      DaysInSum = 0
      SumGrowth = 0.0

   End Sub

   
   Public Sub ZeroAccums()
      
      DaysInCum = 0
      
      CumPrecip = 0.0
      CumDrain = 0.0
      
      cumHarvestWt = 0.0
      cumHarvestN = 0.0

      cumleach_no3 = 0.0
      leach_nh4 = 0.0

      cum_dnit = 0.0
      cum_n2o_atm = 0.0
      
      CumDMGrazed = 0.0
      CumNGrazed = 0.0

      CumGrowth = 0.0

   End Sub
   
   
   Public Sub DoDepthArrays()
      
      For OutLayer As Integer = 0 To NumDepths - 1
         Satdep(OutLayer) = 0.0
         Duldep(OutLayer) = 0.0
         ll15dep(OutLayer) = 0.0
         SWdep(OutLayer) = 0.0
         Dul_l(OutLayer) = 0.0
         ll15_l(OutLayer) = 0.0
         SW_l(OutLayer) = 0.0
         urea_l(OutLayer) = 0.0
         nh4_l(OutLayer) = 0.0
         no3_l(OutLayer) = 0.0
         'SoilpH_l(OutLayer) = 0.0
         biom_n_l(OutLayer) = 0.0
         fom_n_l(OutLayer) = 0.0
         hum_n_l(OutLayer) = 0.0

         For SimLayer As Integer = 0 To dlayer.length - 1

            ll15dep(OutLayer) += WeightsArray(SimLayer, OutLayer) * ll15_dep(SimLayer)
            Duldep(OutLayer) += WeightsArray(SimLayer, OutLayer) * dul_dep(SimLayer)
            Satdep(OutLayer) += WeightsArray(SimLayer, OutLayer) * sat_dep(SimLayer)
            SWdep(OutLayer) += WeightsArray(SimLayer, OutLayer) * sw_dep(SimLayer)
            urea_l(OutLayer) += WeightsArray(SimLayer, OutLayer) * urea(SimLayer)
            nh4_l(OutLayer) += WeightsArray(SimLayer, OutLayer) * nh4(SimLayer)
            no3_l(OutLayer) += WeightsArray(SimLayer, OutLayer) * no3(SimLayer)
            'SoilpH_l(OutLayer) += WeightsArray(SimLayer, OutLayer) * SoilpH(SimLayer) / dlayer(SimLayer)
            biom_n_l(OutLayer) += WeightsArray(SimLayer, OutLayer) * biom_n(SimLayer)
            fom_n_l(OutLayer) += WeightsArray(SimLayer, OutLayer) * fom_n(SimLayer)
            hum_n_l(OutLayer) += WeightsArray(SimLayer, OutLayer) * hum_n(SimLayer)

         Next  'SimLayer
         
         'SoilpH_l(OutLayer) = SoilpH_l(OutLayer) / (OutEndDepth(OutLayer) - OutStartDepth(OutLayer))

         ll15_l(OutLayer) = ll15dep(OutLayer) / (OutEndDepth(OutLayer) - OutStartDepth(OutLayer))
         Dul_l(OutLayer) = Duldep(OutLayer) / (OutEndDepth(OutLayer) - OutStartDepth(OutLayer))
         SW_l(OutLayer) = SWdep(OutLayer) / (OutEndDepth(OutLayer) - OutStartDepth(OutLayer))

         org_n_l(OutLayer) = biom_n_l(OutLayer) + fom_n_l(OutLayer) + hum_n_l(OutLayer)
         min_n_l(OutLayer) = urea_l(OutLayer) + nh4_l(OutLayer) + no3_l(OutLayer)
         
      Next     'OutLayer
      
      
   End Sub
   
   Public Sub DoDeltas()
      
      For OutLayer As Integer = 0 To NumDepths - 1 
         dlt_biom_n_l(OutLayer) = biom_n_l(OutLayer) - ini_biom_n_l(OutLayer) 
         dlt_fom_n_l(OutLayer) = fom_n_l(OutLayer) - ini_fom_n_l(OutLayer) 
         dlt_hum_n_l(OutLayer) = hum_n_l(OutLayer) - ini_hum_n_l(OutLayer) 
         dlt_org_n_l(OutLayer) = org_n_l(OutLayer) - ini_org_n_l(OutLayer) 
         dlt_min_n_l(OutLayer) = min_n_l(OutLayer) - ini_min_n_l(OutLayer) 
      Next


   End Sub
   
   Public Sub DoAverages()
      
      DaysInAve += 1

   End Sub
   
   Public Sub DoSums()
      
      DaysInSum += 1
      
      SumGrowth += HerbageGrowthWt 

   End Sub

   
   Public Sub DoAccums()
      
      DaysInCum += 1
      
      CumPrecip += rain + Irrigation
      CumDrain += drain
      
      cumHarvestWt = cumHarvestWt + HarvestWt
      cumHarvestN = cumHarvestN + HarvestN
      HarvestWt = 0.0
      HarvestN = 0.0
      
      cumleach_no3 += leach_no3
      cumleach_nh4 += leach_nh4

      CumDMGrazed += DM_Grazed
      CumNGrazed += N_Grazed
      
      CumGrowth += HerbageGrowthWt 

    
      For SimLayer As Integer = 0 To dlayer.length - 1
         cum_dnit += dnit(SimLayer)
         cum_n2o_atm += n2o_atm(SimLayer)
      Next  'SimLayer 
      
   End Sub
   
   
   Public Sub AverageAverages()

      
   End Sub



   
End Class
```
      micromet
        soilalbedo = 0.23
        a_interception = 0
        b_interception = 0
        c_interception = 0
        d_interception = 0
      irrigation
        automatic_irrigation = off
        asw_depth = 300  # Depth to which ASW is calculated. (mm)
        crit_fr_asw = 0.85  # Fraction of ASW below which irrigation is applied (0-1.0)
        irrigation_efficiency = 1.0  # Efficiency of the irrigation. (0-1.0)
        irrigation_allocation = off  # Allocation limits
        allocation = 0  # Allocation in ML
        default_no3_conc = 0  # Nitrate concentration (ppm N)
        default_nh4_conc = 0  # Ammonium concentration (ppm N)
        default_cl_conc = 0  # Chloride concentration (ppm Cl)
        default_no3_conc = 0  # Nitrate concentration (ppm N)
        default_nh4_conc = 0  # Ammonium concentration (ppm N)
        default_cl_conc = 0  # Chloride concentration (ppm Cl)
      fertiliser
      surfaceom surface organic matter
        PoolName = grass  # Organic Matter pool name
        type = grass  # Organic Matter type
        mass = 700  # Initial surface residue (kg/ha)
        cnr = 17  # C:N ratio of initial residue
        standing_fraction = 0  # Fraction of residue standing
      AgPasture
        Nspecies = 2  # Number of species
        thisCropName = AgPasture  # Crop name shown as on the simulation tree
        speciesName = ryegrass whiteclover  # Species names
        dmshoot = 1000      250  # Initial shoot dry matter (kg/ha)
        dmlitter = 250        50  # Initial litter dry matter (kg/ha)
        dmgreenmin = 500        50  # Minimum green dry matter (kg/ha)
        rootDepth = 600        250  # Root depth (mm)
        RootDistributionMethod = ExpoLinear  # Method to define the root distribution over the soil profile
        ExpoLinearDepthParam = 0.3  # Root distribution parameter, fraction of root depth to decrease root proportion (0-1)
        ExpoLinearCurveParam = 1.0  # Root distribution parameter, exponent for decreasing phase of root proportion
        WaterUptakeSource = apsim  # Water uptake done by AgPasture (calc) or by apsim?
      outputfile Sim: filename=NZWI Sim.out; title=NZWI Sim; events=Freq
        variables Data
          variables: dd/mmm/yyyy as Date, CumDMGrazed, CumGrowth, SumGrowth, carbon_tot(), biom_c(), fom_c(), hum_c()
