folder Simulations: version=36; creator=Apsim 7.7-r3599
  memo
     General Notes:

    -------------------------------------------------------------------------------------------------------------------------------------------------------------------------------------------------------------------------------------------------------------------------------------------------------------------------------------------------------------
     + Changes in soil parameters
    -------------------------------------------------------------------------------------------------------------------------------------------------------------------------------------------------------------------------------------------------------------------------------------------------------------------------------------------------------------
      - nitrification_pot: from 90 to 147 ugN/g soil/day
      - nh4_at_half_pot: from 90 to 32 ugN/g soil
       » This follows approximately the results from Monaghan and Barraclough (1992)
          It also conforms with the methodology of Snow et all (2011)
         - One point is that higher nitrification can be expected in NZ due to higher C content in the soil as well as larger N load in urine patches
         - One issue is the fact that most measurements were made at relatively low temperature (15-25oC), In APSIM we need the value at 32oC, or to reduce the optimim temperature (28oC has been used)

     - dnit_rate_coeff: from 0.0006 to 0.001379 kg/mgC/day
       » After Thorburn et al (2010). Optimised value for an Australian soil under sugar cane  (relatively high fertiliser regime)

     - nit_n2o_frac: from 0.0 to 0.002
       » After Thorburn (2010), also used by other authors (Vogeler et al, 2013) - it is a rough estimate

    -------------------------------------------------------------------------------------------------------------------------------------------------------------------------------------------------------------------------------------------------------------------------------------------------------------------------------------------------------------

    -------------------------------------------------------------------------------------------------------------------------------------------------------------------------------------------------------------------------------------------------------------------------------------------------------------------------------------------------------------
     + Changes in Canola
    -------------------------------------------------------------------------------------------------------------------------------------------------------------------------------------------------------------------------------------------------------------------------------------------------------------------------------------------------------------
      - x_temp: from [0.0  20.0  35.0] to [4.0  20.0  35.0]
      - y_tt: from [0.0  20.0  0.0] to [4.0  20.0  0.0]
      - y_node_app_rate: from [75  75  20  20] to [43  73  20  20]
       » This follows the results from Fletcher et al (2013).
       ... The fist and last value of y_tt should not be really changed - Maybe was a typo...

     - y_rue: from [0.0  0.0  1.35  1.35  1.35  1.35  1.35  1.35  0.0  0.0  0.0] to [0.0  0.0  1.76  1.76  1.76   1.76  1.76  1.76  0.0  0.0  0.0] g/MJ
       » This follows Chakwizira and Fletcher (2012).

     - y_leaf_size: from [1000  2000  14000  15000] to [1500  3000  21000  22500] mm2
       » This is a conservative change based on values from Chakwizira (pers. comm.).

     - initial_root_depth: from 100 to 10mm
       » This aligns with sowing depth

     - y_height: from [0  1500] to [1  1500] mm
       »

    -------------------------------------------------------------------------------------------------------------------------------------------------------------------------------------------------------------------------------------------------------------------------------------------------------------------------------------------------------------
  simulation BaseSimulation
    clock
      start_date = 13/03/2012  # Select the start date of the simulation
      end_date = 23/01/2013  # Select the end date of the simulation
    metfile met: filename=Broadfields(2011-2012).met
    summaryfile
    area paddock
      folder Manager folder
        operations Operations Fert
          14/03/2012  SurfaceOrganicMatter tillage type = disc
          20/03/2012  Fertiliser apply amount = 50 (kg/ha), depth = 0 (mm), type = NH4_N ()
          30/04/2012  Fertiliser apply amount = 50 (kg/ha), depth = 0 (mm), type = urea_N ()
        operations Operations Crops
          14/03/2012  Canola sow plants =129 (plants/m2), sowing_depth = 10 (mm), cultivar = Early, row_spacing = 150 (mm), crop_class = plant
          04/07/2012  Canola harvest height = 60.0 (mm) , remove = 1.00 ()
          29/08/2012  Canola  end_crop
          25/09/2012  Wheat sow plants =1000 (plants/m2), sowing_depth = 10 (mm), cultivar = Richmond, row_spacing = 150 (mm), crop_class = plant
          12/12/2012  Wheat harvest height = 60.0 (mm) , remove = 1.00 ()
        operations Operations Urine
          18/07/2012  Fertiliser apply amount = 135 (kg/ha), depth = 2.5 (mm), type = urea_N ()
          18/07/2012  Fertiliser apply amount = 125 (kg/ha), depth = 10.0 (mm), type = urea_N ()
          18/07/2012  Fertiliser apply amount = 110 (kg/ha), depth = 20.0 (mm), type = urea_N ()
          18/07/2012  Fertiliser apply amount = 95 (kg/ha), depth = 32.5 (mm), type = urea_N ()
          18/07/2012  Fertiliser apply amount = 70 (kg/ha), depth = 50.0 (mm), type = urea_N ()
          18/07/2012  Fertiliser apply amount = 50 (kg/ha), depth = 70.0 (mm), type = urea_N ()
          18/07/2012  Fertiliser apply amount = 15 (kg/ha), depth = 90.0 (mm), type = urea_N ()
          18/07/2012  Irrigation apply amount = 10 (mm)
        operations Operations Irrig
          13/01/2012  Irrigation apply amount = 24 (mm)
          16/01/2012  Irrigation apply amount = 26 (mm)
          18/01/2012  Irrigation apply amount = 25 (mm)
          13/02/2012  Irrigation apply amount = 19 (mm)
          14/02/2012  Irrigation apply amount = 3.2 (mm)
          15/05/2012  Irrigation apply amount = 46.17 (mm)
          21/05/2012  Irrigation apply amount = 33.7 (mm)
          10/07/2012  Irrigation apply amount = 8.7 (mm)
          16/07/2012  Irrigation apply amount = 8.7 (mm)
          20/11/2012  Irrigation apply amount = 2.9 (mm)
          26/11/2012  Irrigation apply amount = 38 (mm)
          03/12/2012  Irrigation apply amount = 17.4 (mm)
        manager2 nh3_volatilisation
          # NH3 volatilisation parameters
          Depth_for_NH3 = 50  # Depth to which NH3 volatilisation is considered (mm)
          # Base soil and pH change parameters
          Soil_pH_base = 6.4     6.4     6.4     6.4     6.4     6.3     6.0     6.0     6.0     6.0     6.0     6.0     6.0     6.0     6.0     6.0     6.0     6.0     6.0     6.0     6.0     6.0     6.0     6.0     6.0     6.0  # The base soil pH for each soil layer
          Soil_CEC_strng = 17  17  17  17  17  16.75  16  16  16  15  15  15 14  14  14  12  12  12  12  11  11  11  9  9  9  9  9  # The CEC for each soil layer (meq/100g)
          k_BC = 0.03  # Soil buffer capacity factor
          k_pH_hyd = 1  # Factor to convert dlt_urea_hydrol into pH changes
          k_pH_nit = 1  # Factor to convert dlt_nh4_nitrif into pH changes
          k_pH_x = 0.1  # Minimum pH fraction decaying per day (0-1)
          # Gas exchange parameters
          k_AFPV = 75  # Factor for soil/atmosphere gas exchange (AFPV/mm)
          f_NV_strng = 1.0  0.8  0.5 0.1  0.0  0.0  0.0  0.0  # Fractor for volatilisable NH3, per soil layer (0-1)
          # Additional limits for volatilisation
          f_AV = 0.5  # Fraction of total soil NH4 that can be volatilised per day
          CritRain1 = 25  # Rain+irrigation below which volatilisation is not limited (mm)
          CritRain2 = 25  # Rain+irrigation above which no volatilisation occur (mm)
```vb
Imports System
Imports ModelFramework

'This module estimate the amount of NH3 in the soil and its volatilisation

'-->  Last uptaded in: 22/Nov/2013 ..................


Public Class Script
   
   'Parameter variables:
   <param> Private Depth_for_NH3 As Single            'The depth to which volatilisation is considered (mm)
   <param> Private Soil_pH_base As String             'The base soil pH, apsim will try to keep to this value, same for all layers
   <param> Private Soil_CEC_strng As String           'The CEC for each layer (meq/100g)
   <param> Private k_BC As Single                     'Soil buffer capacity factor ()
   <param> Private k_pH_hyd As Single                 'Factor to convert urea hydrolysed into H+ changes ()
   <param> Private k_pH_nit As Single                 'Factor to convert NH4 nitrified into H+ changes ()
   <param> Private k_pH_x As Single                   'Minimum decrease for pH (fraction/day)
   <param> Private k_AFPV As Single                   'Factor to transform potential evaporation in air filled pore volumes that are potential exchanged with to atmosphere
   <param> Private f_NV_strng As String               'The fraction of potential NH3 volatilisation for each layer that is transpoted to the soil surface ()
   <param> Private f_AV As Single                     'Fraction of total soil NH4 that can be volatilised per day, limits volatilisation and ensure mass balance ()
   <param> Private CritRain1 As Single                'Critial rainfall. Below this volatilisation is not limited by rainfall or irrigation
   <param> Private CritRain2 As Single                'Critial rainfall. Above this no volatilisation occurs
    
   'Events to be raised:
   <[Event]()> Public Event NitrogenChanged As NitrogenChangedDelegate

   'Variables read from other modules
   <Input> Private rain As Single                     'Rainfall (mm)
   <Input> Private eo As Single                       'Potential evapotranspiration (mm)
   <Input(IsOptional:=True)> Private irrigation As Single               'Irrigation amount today (mm)
   <Input> Private dlayer As Single()                 'Soil layers thickness
   <Input> Private bd As Single()                     'Soil bulk density (g/cm3 = kg/L)
   <Input> Private sw As Single()                     'Soil water content (cm3/cm3)
   <Input> Private sat As Single()                    'Soil water content at saturarion, porosity (cm3/cm3)
   <Input(IsOptional:=True)> Private ave_soil_temp As Single()    'Soil temperature from SoilTemp - for each layer (oC)
   <Input(IsOptional:=True)> Private st As Single()               'Soil temperature from SoilN - for each layer (oC)
   <Input> Private nh4 As Single()                    'Amount of NH4 in the soil (kg/ha)
   <Input> Private nh4ppm As Single()                 'Amount of NH4 in the soil (ppm)
   <Input> Private conc_water_nh4 As Single()         'Amount of NH4 not adsorbed (ppm)
   <Input> Private dlt_rntrf As Single()              'Amount of N nitrified (kg/ha)   
   <Input> Private dlt_urea_hydrol As Single()        'Amount of urea N hydrolised (kg/ha)
   
   'Output variables
   <Output><Units("ppm")> Public nh3ppm As Single()               'The estimated amount of NH3 in the soil (ppm)
   <Output><Units("kgN/ha")> Public nh3 As Single()               'The estimated amount of NH3 in the soil (kg/ha)
   <Output><Units("g/ha")> Public nh3_gas As Single()             'The estimated amount of NH3 in the soil in gaseous form (g/ha)
   <Output><Units("kgN/ha")> Public emission_nh3 As Single()      'The estimated amount of NH3 volatilised (kg/ha/day)
   <Output><Units("")> Public SoilpH  As Single()                 'dummy soil pH
   <Output><Units("kgN/ha")> Public nh4_sol As Single()           'The amount of NH4 in the soil solution (kg/ha)   
   <Output><Units("oC")> Public SoilTemp As Single()              'The soil temperature (oC)

   <Output><Units("AFPV/day")> Public PotGasExchangeNH As Single  'The potential soil-atmosphere gas exchange (Air-filled-pore-spaces/day)
   <Output><Units("L/m2/day")> Public GasExchangeNH As Single()   'The volume of gas exchanged (L/m2/day)
   <Output><Units("L/m2")> Public AirFilledPoreVolume As Single() 'The volume of air filled pore space in each soil layer (L_air/m2)
   <Output><Units("")> Public NH3toNHx_ratio As Single()          'The ratio between NH3 and NHx in the soil solution
   <Output><Units("x1000")> Public NH3GtoNH3A_ratio As Single()   'The ratio between NH3 liquide and gas in the soil, times 1000
   <Output><Units("")> Public pK_NHx As Single()                  'The equilibrium constant for NH4-NH3
   <Output><Units("")> Public pG_NH3 As Single()                  'The equilibrium constant for NH3A-NH3G

   'Internal variables
   Private NH3_z As Integer                           'The layer to consider NH3 volatilization
   Private f_NV As Single()                           'The fraction of NH3 transport from each layer
   Private Ini_SoilpH As Single()                     'The initial, or base, soil pH
   Private SoilCEC As Single()                        'The CEC (mol/kg)
   
   <EventHandler()> Public Sub OnInit2()

      ReDim SoilpH(dlayer.length - 1)
      ReDim Ini_SoilpH(dlayer.length - 1)

      Irrigation = 0
      
      'Split the read values of f_NV into an array
      f_NV = makeArray(f_NV_strng)
      'Split the read values of pH into an array
      Ini_SoilpH = makeArray(Soil_pH_base)
      'Split the read values of CEC into an array
      SoilCEC = makeArray(Soil_CEC_strng)
      ReDim Preserve Ini_SoilpH(dlayer.length - 1)
      ReDim Preserve SoilCEC(dlayer.length - 1)
      'Assign initial pH values and convert CEC from meq to mol
      For z As Integer = 0 To dlayer.length - 1
         Ini_SoilpH(z) = math.Max(0, Ini_SoilpH(z))
         SoilpH(z) = Ini_SoilpH(z)
         SoilCEC(z) = 0.01 * math.Max(0.1, SoilCEC(z))     'mol/kg
      Next

      'Identify the layer down to which volatilization is considered
      Dim Depth_from_surface As Single = 0
      For z As Integer = 0 To dlayer.length - 1
         Depth_from_surface = Depth_from_surface + dlayer(z)
         If Depth_from_surface <= Depth_for_NH3 Then
            NH3_z = z
         Else
            z = dlayer.length
         End If
      Next

      'verify the bounds of the pH converting factor
      k_pH_hyd = math.Min(1, math.Max(0, k_pH_hyd))
      k_pH_nit = math.Min(1, math.Max(0, k_pH_nit))
      k_pH_x = math.Min(1, math.Max(0, k_pH_x))
      k_BC = math.Max(0, k_BC)
      ReDim Preserve f_NV(dlayer.length - 1)
      For z As Integer = 0 To dlayer.length - 1
         f_NV(z) = math.Min(1, math.Max(0, f_NV(z)))
      Next

      '----------- NH3 volatilization ---------------------------------------------------
      Console.WriteLine("")
      Console.WriteLine("Volatilization will be calculated by manager")
      Console.WriteLine("   Top " & Depth_for_NH3.ToString & "mm are considered,")
      Console.WriteLine("   pH variation is mimicked by dlt_urea_hydrol + dlt_nh4_nitrif")
      Console.WriteLine("")

   End Sub

   
   <EventHandler()> Public Sub OnPrepare()
            
      Dim urea_hydrol As Single                    'The amount of urea hydrolised (mol/L)
      Dim nh4_nitrif As Single                     'The amount of NH4 nitrified (mol/L)
      Dim dlt_H As Single                          'Estimated variation of H+ in the soil (mol/L)
      Dim delta_pH_Hyd As Single = 0               'Variation in soil pH due to urea hydrolysis
      Dim delta_pH_Nit As Single = 0               'Variation in soil pH due to NH4 nitrification
      Dim delta_pH_X As Single = 0                 'Minimum decrease in soil pH, to ensure pH returns to base after urea deposition
      Dim delta_pH_Vol As Single = 0               'Variatin in pH due to volatilisation
      Dim Beta As Single = 1                       'The soil buffer capacity ()
      Dim delta_nh4(dlayer.length - 1) As Double   'The variation in NH4 content due to volatilisation (kg/ha)
      Dim RainFactor As Single = 1.0               'The rain factor

      Try  'to get the soil temperature from SoilTemp, otherwise use SoilN's:
         SoilTemp = ave_soil_temp
      Catch
         SoilTemp = st
      End Try
      
      ReDim nh3ppm(dlayer.length - 1)
      ReDim nh4_sol(dlayer.length - 1)
      ReDim nh3(dlayer.length - 1)
      ReDim nh3_gas(dlayer.length - 1)
      ReDim emission_nh3(dlayer.length - 1)
      ReDim GasExchangeNH(dlayer.length - 1)
      ReDim AirFilledPoreVolume(dlayer.length - 1)
      ReDim NH3toNHx_ratio(dlayer.length - 1)
      ReDim NH3GtoNH3A_ratio(dlayer.length - 1)
      ReDim pK_NHx(dlayer.length - 1)
      ReDim pG_NH3(dlayer.length - 1)

      'Calc the irrigation factor
      If Rain + Irrigation < CritRain1 Then
         RainFactor = 1.0
      ElseIf Rain + Irrigation > CritRain2 Then
         RainFactor = 0.0
      Else
         RainFactor = (Rain + Irrigation - CritRain1) / (CritRain2 - CritRain1) 
      End If
      
      '+++++++++++++++++++++++++++++++++++++++++++++++++++++++++++++++++++++++++++++++++++++++++++++++++++++++++++++++++++++++++++
      '  NOTES:
      '     The RainFactor accounts for the downwards transport of NH3 gas when water from rain or irrigation is being drained throught the soil.
      '        Below RainCrit1, precipitation has no effect, above RainCrit2 volatilisation is zero.  A linear relationship is used between
      '        these two limits:
      '
      '                              |
      '                         F   1+                /-----------
      '                       R a    |               /:
      '                       a c    |              / :
      '                       i t    |             /  :
      '                       n o    |            /   :
      '                         r    |           /    :
      '                              |          /     :
      '                              |         /      :
      '                             0+========+-------+--------------> Rain + Irrigation
      '                              |      Rain    Rain
      '                                     Crit1   Crit2
      '+++++++++++++++++++++++++++++++++++++++++++++++++++++++++++++++++++++++++++++++++++++++++++++++++++++++++++++++++++++++++++


      For z As Integer = 0 To dlayer.length - 1
         
         '0-Compute the value of Beta
         Beta = k_BC * bd(z) * SoilCEC(z) / sw(z)

         '1-Compute the consumption of H+ by urea hydrolysis
         urea_hydrol = dlt_urea_hydrol(z) / (dlayer(z) * 10000)   'kg_urea_N/L_soil
         urea_hydrol = urea_hydrol * 1000 / sw(z)                 'g_urea_N/L_water
         urea_hydrol = urea_hydrol / 14.00674                     'mol_urea_N/L_water  - All N pools as expresseed in kg_N, so molecular mass is 14
         dlt_H = -2 * urea_hydrol * k_pH_hyd                      'mol/L

         '2-Compute changes in soil pH due to urea hydrolysis
         If dlt_H < 0 Then
            delta_pH_Hyd = (14 / (1 + ((14 - soilpH(z)) / SoilpH(z)) * 10 ^ (dlt_H / Beta))) - SoilpH(z)
         Else
            delta_pH_Hyd = 0
         End If
         SoilpH(z) = SoilpH(z) + delta_pH_Hyd

         '3-Compute the production of H+ by nitrification and its effect on soil pH
         nh4_nitrif = dlt_rntrf(z) / (dlayer(z) * 10000)          'kg_nh4_N/L_soil
         nh4_nitrif = nh4_nitrif * 1000 / sw(z)                   'g_nh4_N/L_water
         nh4_nitrif = nh4_nitrif / 14.0067                        'mol_nh4_N/L_water  - All N pools as expresseed in kg_N, so molecular mass is 14
         dlt_H = 2 * nh4_nitrif * k_pH_nit                        'mol/L
         If dlt_H > 0 Then
            delta_pH_Nit = (14 / (1 + ((14 - soilpH(z)) / SoilpH(z)) * 10 ^ (dlt_H / Beta))) - SoilpH(z)
         Else
            delta_pH_Nit = 0
         End If
         
         '4-Compute soil forced pH change - this is to ensure pH will decline to its base value
         If SoilpH(z) > Ini_SoilpH(z) Then
            delta_pH_x = -(SoilpH(z) - Ini_SoilpH(z)) * k_pH_x
         Else
            delta_pH_x = 0
         End If
         SoilpH(z) = SoilpH(z) + math.Min(delta_pH_Nit, delta_pH_X)

         '5-bound pH between base and 14
         SoilpH(z) = math.Min(14, math.Max(Ini_SoilpH(z), SoilpH(z)))

         
         '+++++++++++++++++++++++++++++++++++++++++++++++++++++++++++++++++++++++++++++++++++++++++++++++++++++++++++++++++++++++++++
         '  NOTES:
         '     The changes in pH are due to the consumption of H+ as urea is hydrolysed or the production of H+ by nitrification,
         '        in theory for each mol of N hydrolised two mols of H+ are consumed, while two mols are produced by nitrification;
         '     The k_pH_nit ad k_pH_hyd factors allow to control the extent that H+ is affected by hydrolysis and nitrification,
         '        when set to zero there's no effect, while setting it to one causes full theoretical effect
         '     The parameter Beta describes the soil buffer capacity, which is a function of CEC, k_BC is used for adjusting the relationship.
         '     k_pH_x stablish a minimum rate for pH decay, it mimicks soil buffering and other reactions that bring pH down
         '        after urea/urine deposition. Used when nitrification is not enough to bring the pH down.
         '+++++++++++++++++++++++++++++++++++++++++++++++++++++++++++++++++++++++++++++++++++++++++++++++++++++++++++++++++++++++++++


         '6-compute the NH3 equilibrium factors
         pK_NHx(z) = pK("aq", soilTemp(z) + 273.15)      'Aqueous equilibrium [NH4 <--> NH3]
         pG_NH3(z) = pK("gs", soilTemp(z) + 273.15)      'Gaseous equilibrium [NH3_liquid <--> NH3_gas]
         
         '7-Calc the proportion of total NHx that is in the form of NH3
         Dim NH3toNHx As Single = 1 / (1 + 10 ^ (pK_NHx(z) - SoilpH(z)))
         NH3toNHx_ratio(z) = NH3toNHx
         
         '8-Calc the amount of NH3 in aqueous solution (original equation uses mol/L, thus the ratio of molecular mass is needed)
         nh3ppm(z) = conc_water_nh4(z) * NH3toNHx * (17.03 / 18.04 )      'ppm (ug/cm3_water)
         
         '9-Calc the proportion of total NH3 that is in the gaseous form
         Dim NH3GtoNH3A As Single = 1 / (1 + 10 ^ (pG_NH3(z)))
         NH3GtoNH3A_ratio(z) = NH3GtoNH3A * 1000
         
         '10-Calc the amount of NH3 in gaseous form
         nh3_gas(z) = nh3ppm(z) * NH3GtoNH3A                   'ppm (ug/cm3_air in soil = mg/L)

         '11-Calc the amount of NH3 in gaseous form and the amount effectivelly lost by volatilization
         PotGasExchangeNH = eo * k_AFPV   'air filled pore volumes/day
         AirFilledPoreVolume(z) = (sat(z) - sw(z)) * dlayer(z)    'L_air/m2
         If z <= NH3_z Then
            GasExchangeNH(z) = PotGasExchangeNH * AirFilledPoreVolume(z)      'L_air/m2/day
            GasExchangeNH(z) = GasExchangeNH(z) * RainFactor
            If GasExchangeNH(z) > 0 Then
               emission_nh3(z) = nh3_gas(z) * GasExchangeNH(z) * f_NV(z)      'mg/m2
               emission_nh3(z) = emission_nh3(z) * 10E+4                      'mg/ha
               emission_nh3(z) = emission_nh3(z) * 10E-6                      'kg/ha
            Else
               emission_nh3(z) = 0
            End If
            'Limit volatilisation to a fraction of NH4 for each layer
            emission_nh3(z) = Math.Min(emission_nh3(z), f_AV * nh4(z))
         Else
            GasExchangeNH(z) = 0
            emission_nh3(z) = 0
         End If
         
         
         '+++++++++++++++++++++++++++++++++++++++++++++++++++++++++++++++++++++++++++++++++++++++++++++++++++++++++++++++++++++++++++
         '  NOTES:
         '     To estimate the amount of NH3 volatilised during the day, it is assumed that the amount of NH3 in gaseous form in the
         '        beginning of the day represents well the proportion of NHx 'volatilisable'. It is assumed also that the potential evaporation
         '        is a good estimator for the gas exchange between soil and atmosphere (this makes volatilisation sensible to temperature and
         '        wind).  By scaling the gas exchange to the air filled pore space in the soil, we get volatilisation also sensible to water
         '        content, which mimicks the decrease in gas transport when the soil is wet.  Finally a factor (f_NV) is used to limit the
         '        contribution of each soil layer to the overall volatilisation (deep layers would volatilise less because NH3 needs to move
         '        transport to the surface.
         '+++++++++++++++++++++++++++++++++++++++++++++++++++++++++++++++++++++++++++++++++++++++++++++++++++++++++++++++++++++++++++

         
         '12-Compute soil pH change due to volatilisation
         Dim emission_nh3ised As Single = emission_nh3(z) / (dlayer(z) * 10000)  'kg_nh3_N/L_soil
         emission_nh3ised = emission_nh3ised * 1000 / sw(z)                      'g_nh3_N/L_water
         emission_nh3ised = emission_nh3ised / 14.0067                           'mol_nh3_N/L_water  - All N pools as expresseed in kg_N, so molecular mass is 14
         dlt_H = emission_nh3ised                                                'mol/L
         If dlt_H > 0 Then
            delta_pH_vol = (14 / (1 + ((14 - soilpH(z)) / SoilpH(z)) * 10 ^ (dlt_H / Beta))) - SoilpH(z)
         Else
            delta_pH_vol = 0
         End If

         '13- Calc new pH and bound it between base and 14
         SoilpH(z) = SoilpH(z) + delta_pH_vol
         SoilpH(z) = math.Min(14, math.Max(Ini_SoilpH(z), SoilpH(z)))

         '14-Transform variables to publishable units
         nh3(z) = nh3ppm(z) * sw(z) / 1000                     'mg/cm3_soil = g/L_soil
         nh3(z) = nh3(z) * dlayer(z) * 10000                   'g/ha_soil
         nh3(z) = nh3(z) / 1000                                'kg/ha

         nh3_gas(z) = nh3_gas(z) * (sat(z) - sw(z)) / 1000     'mg/cm3_soil = g/L_soil
         nh3_gas(z) = nh3_gas(z) * dlayer(z) * 10000           'g/ha_soil

         nh4_sol(z) = conc_water_nh4(z) * sw(z) / 1000         'mg/cm3_soil = g/L_soil
         nh4_sol(z) = nh4_sol(z) * dlayer(z) * 10000           'g/ha_soil
         nh4_sol(z) = nh4_sol(z) / 1000                        'kg/ha

         'Compute the delta in nh4 amount
         delta_nh4(z) = -emission_nh3(z)
      Next
      
      'send the delta nh4 to soil
      Dim NitrogenChanges As NitrogenChangedType = New NitrogenChangedType
      NitrogenChanges.DeltaNH4 = delta_nh4
      NitrogenChanges.DeltaNO3 = New Double() {}
      RaiseEvent NitrogenChanged(NitrogenChanges)     

   End Sub
     
   Function makeArray(ByVal ArrayString As String) As Single()
      
      'Get the string with values from the user interface and put the values in an numeric array
      
      Dim MyArray_string As String()
      Dim MyArray_single As Single()
      Dim Separator As Char() = " "
      
      '1-Split string into array
      MyArray_string = ArrayString.Split(Separator, StringSplitOptions.RemoveEmptyEntries)
      
      '2-convert array into type single
      ReDim MyArray_single(MyArray_string.Length - 1)      
      For i As Integer = 0 To MyArray_single.length - 1
         MyArray_single(i) = MyArray_string(i)
      Next
      Return MyArray_single
      
   End Function
   
   Function pK(ByVal N_species As String, ByVal Temp As Single) As Single
      
      'Calculates the equilibrium constants, 
      '  if 'aq' then nh4-nh3 equilibrium in water
      '  if 'gs' then gas-liquid equilibrium for nh3
      
      Dim a_pK As Single() = {0.09018, -1.69}
      Dim b_pK As Single() = {2729.92, 1477.7}
      Dim sp As Integer
      
      If n_species = "aq" Then
         sp = 0
      ElseIf n_species = "gs"
         sp = 1
      End If
      pK = a_pK(sp) + b_pK(sp) / Temp
         
   End Function
   
End Class
```
      micromet
        soilalbedo = 0.23
        a_interception = 0
        b_interception = 0
        c_interception = 0
        d_interception = 0
      fertiliser
      irrigation
        automatic_irrigation = off
        asw_depth = 600  # Depth to which ASW is calculated. (mm)
        crit_fr_asw = 0.5  # Fraction of ASW below which irrigation is applied (0-1.0)
        irrigation_efficiency = 1  # Efficiency of the irrigation. (0-1.0)
        irrigation_allocation = off  # Allocation limits
        allocation = 0  # Allocation in mm
        default_no3_conc = 0.0  # Nitrate concentration (ppm N)
        default_nh4_conc = 0.0  # Ammonium concentration (ppm N)
        default_cl_conc = 0.0  # Chloride concentration (ppm Cl)
      surfaceom SurfaceOrganicMatter
        PoolName = grass  # Organic Matter pool name
        type = grass  # Organic Matter type
        mass = 500  # Initial surface residue (kg/ha)
        cnr = 40  # C:N ratio of initial residue
        standing_fraction = 0  # Fraction of residue standing
      Soil Flaxton_IT Block1: SoilType=NZ_sedementary; Region=Plains; State=Canterbury; Country=New Zealand; Latitude=0; Longitude=0; YearOfSampling=0
        DataSource=Generic profile descriptions provided by Trevor Webb and data for functional horizions based on SWAMP project results
        Comments=Bulk density values were measured on the fine earth fraction so values entered into apsim soil are adjusted down to account for stone content (assuming stones are inert from all soil process so their mass and volume is removed from model paramaters).  SAT, DUL, LL15 and Air dry have been adjusted down to account for stone content.  OC has not been adjusted so the model will get the correct carbon and N amounts using the adjusted BD.
        LayerStructure
          Thickness=[5, 10, 10, 15, 20, 20, 20, 25, 25, 30, 35, 35, 40, 45, 50, 55, 60, 50, 50, 50, 50, 100, 100, 100, 100, 100, 100, 100, 50, 50]
        Analysis: PHUnits=Water; BoronUnits=HotWater
          Thickness  Rocks  PH   CEC  ParticleSizeSand  ParticleSizeSilt  ParticleSizeClay
          75         0      6.4  17   5                 65                30
          75         0      6    16   5                 65                30
          100        0      6    15   5                 65                30
          150        0      6    14   0                 66                34
          200        0      6    12   5                 58                37
          200        0      6    11   20                60                20
          200        0      6    9    20                60                20
          200        0      6    9    70                22                8
          300        0      6    9    50                38                12
          Rocks, PH, CEC, ParticleSizeSand, ParticleSizeSilt, ParticleSizeClay source: Estimated based on local knowledge (layer 1, 2, 3, 4, 5)
        Water
          Thickness  BD    AirDry   LL15   DUL    SAT    KS
          75         1.05  0.07675  0.16   0.356  0.38   999
          75         1.24  0.077    0.16   0.356  0.38   999
          100        1.46  0.12     0.17   0.32   0.346  389
          150        1.34  0.187    0.187  0.284  0.311  320
          200        1.67  0.182    0.182  0.28   0.3    19
          200        1.67  0.22     0.22   0.297  0.325  24
          200        1.59  0.24     0.24   0.297  0.325  24
          200        1.59  0.24     0.24   0.297  0.325  98
          300        1.59  0.24     0.24   0.297  0.325  98
          BD, AirDry, LL15, DUL, SAT source: Estimated based on local knowledge (layer 1, 2, 3, 4, 5)
          SoilCrop Canola: LL=[0.16, 0.16, 0.17, 0.187, 0.182, 0.22, 0.24, 0.24, 0.24]; KL=[0.21, 0.21, 0.1, 0.1, 0.05, 0.02, 0.01, 0.01, 0]; XF=[1, 1, 0.6, 0.6, 0.3, 0.4, 0.2, 0.1, 0]
            LL source: Estimated based on local knowledge (layer 1, 2, 3, 4, 5)
          SoilCrop Wheat: LL=[0.16, 0.16, 0.17, 0.187, 0.182, 0.22, 0.24, 0.24, 0.24]; KL=[0.211118, 0.21, 0.1, 0.1, 0.05, 0.02, 0.01, 0.01, 0]; XF=[1, 1, 0.6, 0.6, 0.3, 0.4, 0.2, 0.1, 0]
            LL source: Estimated based on local knowledge (layer 1, 2, 3, 4, 5)
          SoilCrop Grassseed: same as BaseSimulation.paddock.Flaxton_IT Block1.Water.Canola
          SoilCrop AgPasture: LL=[0.16, 0.16, 0.17, 0.187, 0.172, 0.22, 0.24, 0.24, 0.24]; KL=[0.08, 0.08, 0.08, 0.08, 0.06, 0.04, 0.03, 0.02, 0.01]; XF=[1, 1, 1, 1, 1, 0.5, 0, 0, 0]
          SoilCrop ryegrass
            LL=[0.1535, 0.201, 0.201, 0.162, 0.162, -, -, -, -]
            KL=[0.180617, 0.0399652, 0.00491317, 0.00164793, 0.000275799, -, -, -, -]
            XF=[1, 0.825307, 0.120996, 0.510686, 0.510686, -, -, -, -]
            LL source: Estimated based on local knowledge (layer 1, 2, 3, 4, 5)
          SoilCrop ItallianRyegrass
            LL=[0.1535, 0.201, 0.201, 0.162, 0.162, -, -, -, -]
            KL=[0.211118, 0.154367, 0.0229429, 0.0157259, 0.00528755, -, -, -, -]
            XF=[1, 0.825307, 0.120996, 0.510686, 0.510686, -, -, -, -]
            LL source: Estimated based on local knowledge (layer 1, 2, 3, 4, 5)
        Swim: Salb=0.2; CN2Bare=0; CNRed=20; CNCov=0.8; KDul=0.25; PSIDul=-100; VC=true; DTmin=0; DTmax=1440; MaxWaterIncrement=0.1; SpaceWeightingFactor=0; SoluteSpaceWeightingFactor=0; Diagnostics=false
          SwimSoluteParameters: Dis=6; Disp=10; DTHP=1
            zero: A, DTHC, WaterTableCl, WaterTableNO3, WaterTableNH4, WaterTableUrea, WaterTableTracer, WaterTableMineralisationInhibitor, WaterTableUreaseInhibitor, WaterTableNitrificationInhibitor, WaterTableDenitrificationInhibitor
            Thickness  NO3Exco  NO3FIP  NH4Exco  NH4FIP  UreaExco  UreaFIP
            120        0        1       73.4     0.45    0         1
            50         0        1       76.5     0.41    0         1
            230        0        1       79.5     0.37    0         1
            50         0        1       93.8     0.25    0         1
            200        0        1       108.1    0.14    0         1
            50         0        1       107.9    0.15    0         1
            150        0        1       107.8    0.16    0         1
            50         0        1       105      0.19    0         1
            100        0        1       102.3    0.21    0         1
        SoilOrganicMatter: RootCN=40; RootWt=1000; SoilCN=10.8; EnrACoeff=7.4; EnrBCoeff=0.2; OCUnits=Total
          Thickness  OC    FBiom  FInert
          75         6.04  0.09   0.7
          75         5.46  0.09   0.7
          100        3.22  0.09   0.7
          150        1.4   0.025  0.924
          200        0.56  0.01   0.971
          200        0.38  0.01   0.985
          200        0.32  0.01   0.985
          200        0.26  0.01   0.985
          300        0.26  0.01   0.985
          OC source: Estimated based on local knowledge (layer 1, 2, 3, 4, 5)
        SoilTemperature2
          MaxTTimeDefault = 14
          BoundaryLayerConductanceSource = calc
          BoundaryLayerConductance = 20
          BoundaryLayerConductanceIterations = 1
          NetRadiationSource = calc
          DefaultWindSpeed = 3
          DefaultAltitude = 18
          DefaultInstrumentHeight = 1.2
          BareSoilHeight = 57
        InitialWater Initial water: FractionFull=0.88; PercentMethod=EvenlyDistributed; RelativeTo=ll15
        Sample Initial nitrogen: Date=16/03/2012; NO3Units=ppm; NH4Units=ppm; SWUnits=Volumetric; OCUnits=Total; PHUnits=Water
          Thickness  NO3   NH4
          75         43.7  7.76
          75         33.2  0.92
          100        15    1.48
          150        7.2   0.59
          200        3.75  0.6
          200        2.3   0.32
          200        1.5   0.59
          200        0     0
          300        0     0
        ini: filename=Soil (WFT).xml
      canola
        ini: filename=Canola (WFT).xml
      wheat
        ModifyKL = yes  # Modify KL using CL, EC or ESP if found?
        ini: filename=Wheat (WFT).xml
      outputfile Results: filename=BaseSimulation Results.out; title=BaseSimulation Results
        variables
          variable:
            dd/mm/yyyy as Date
            biomass
            rain as Rain
            es as Evaporation
            sw_uptake() as WaterUptake
            drain as Drainage
            sw_dep() as SoilWaterAmount
            Fertiliser as FertiliserN
            emission_nh3() as VolatilisedN format 3
            dnit() as DenitrifiedN format 3
            n2o_atm() as N2Oemission format 3
            leach_no3 as NO3Leached format 3
            canola.n_uptake as NUptakeRape
            wheat.n_uptake as NUptakeGrass
            urea() as UreaAmount
            nh4() as NH4Amount
            no3() as NO3Amount
            hum_n() as SoilHumusN
            biom_n() as SoilBiomassN
            fom_n() as SoilFOMN
            surfaceom_n as SurfaceOMN
            canola.TotalWt as RapeDM
            wheat.TotalWt as GrassDM
            canola.TotalN as RapeTotalN
            wheat.TotalN as GrassTotalN
            canola.TopsTotalN as RapeTopsN
            wheat.TopsTotalN as GrassTopsN
            canola.RootTotalN as RapeRootN
            wheat.RootTotalN as GrassRootN
            canola.LAI as RapeLAI
            wheat.LAI as GrassLAI
            canola.root_depth as RapeRootDepth
            wheat.root_depth as GrassRootDepth
            StageName
            pond
            runoff
            drain
            sw() as SoilWaterContent
        events Reporting Frequency: event=end_day
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