folder Simulations: version=36; creator=Apsim 7.7-r3835
  memo
    -------------------------------------------------------------------------------------------------------------------------------------------------------------------------------------------------------------------------------------------------------------------------------------------------------------------------------------------------------------
     + General Notes:
    -------------------------------------------------------------------------------------------------------------------------------------------------------------------------------------------------------------------------------------------------------------------------------------------------------------------------------------------------------------
     The observed data and management is derived from a larger experiment called "Winterf Forage Trial", lead by Dr. Steve Thomas and Dr. Mike Beare of Plant & Food Research, in Lincoln, Canterbury, New Zealand.
     The experiment run during 2012 and early 2013 on a poorly drained Flaxton Deep Silty Loam soil (Wakanui family).  For the forage rape / ryegrass rotation there were four treatment combining two tillage systems and
       the application or not of cow urine.  The tillage treatments consisted of intensive tillage (IT, mouldboard plough and power harrow), prior to sowing or direct drill (DD) sowing (both rape and grass). Simulated grazing
       of the winter forage was performed by cutting and removing the rape on 2-Jul, following by treading with artificial cow-hoof machine and to half of the plots the application of 600kgN/ha of cow urine.  After a fallow
       period of almost 3 months ryegrass was sown. Measurements continued untill the end of January 2013.
     There was two application of fertiliser on the forage rape and few irrigation events, the dates and amounts for these, plus the dates of sowing and harvesting are given on the simulation maneger scripts followinf the
       experimental schedulle.  Weather data comes from nearby Broadfields weather station (Cliflo) and basic soil parameters were  measures in situ. The later were modified to better represent the macroscale behaviour
       of the 20-40cm layer, which has large blocky structure (quite massive with well draining 'cracks' on the borders), difficult to represent with typical sampling techniques.
     No significant differences between tillage systems were verified for plant growth or N leavhing, therefore these were not simulated here. Compaction was simulated by reducing the bulk density and the total porosity,
       without changing the field capacity (thus only reducing the macroporosity). Changes in soil parameters followed functions derived from results of Drewry et al (2001) and linked to measurements in this experiment.
     The Canola module (using the 'eraly' cultivar) was slightly modified to simulate forage rape.

      -------------------------------------------------------------------------------------------------------------------------------------------------------------------------------------------------------------------------------------------------------------------------------------------------------------------------------------------------------------
     + Changes in soil parameters
    -------------------------------------------------------------------------------------------------------------------------------------------------------------------------------------------------------------------------------------------------------------------------------------------------------------------------------------------------------------
      - Nitrification potential: from 40 to 90 ugN/g soil/day
      - NH4 at half poential nitrification: from 90 to 30 ugN/g soil
       » This follows approximately the results from Monaghan and Barraclough (1992) and conforms with the methodology of Snow et all (2011)
       - Optimum temperature for mineralisation/nitrification: from 32oC to 25oC
       » This follows measurements done in New Zealand by
     - N2O fraction durin nitrification: from 0.0 to 0.002
       » After Thorburn (2010), also used by other authors (Vogeler et al, 2013)

    -------------------------------------------------------------------------------------------------------------------------------------------------------------------------------------------------------------------------------------------------------------------------------------------------------------------------------------------------------------
     + Changes in Canola
    -------------------------------------------------------------------------------------------------------------------------------------------------------------------------------------------------------------------------------------------------------------------------------------------------------------------------------------------------------------
      - y_node_app_rate: from [75  75  20  20] to [43  73  20  20]
     - y_rue: from [0.0  0.0  1.35  1.35  1.35  1.35  1.35  1.35  0.0  0.0  0.0] to [0.0  0.0  1.76  1.76  1.76   1.76  1.76  1.76  0.0  0.0  0.0] g/MJ
     - y_leaf_size: from [1000  2000  14000  15000] to [1500  5000  21000  22500] mm2
       » This follows the results from Fletcher et al (2013), Chakwizira and Fletcher (2012), and leaf sizes are conservative values from Chakwizira (pers. comm.).

    -------------------------------------------------------------------------------------------------------------------------------------------------------------------------------------------------------------------------------------------------------------------------------------------------------------------------------------------------------------

     REFERENCES:
      Drewry JJ, Cameron KC, Buchan GD 2001. Effect of simulated dairy cow treading on soil physical properties and ryegrass pasture yield. New Zealand Journal of Agricultural Research 44(2-3): 181-190
      Monaghan RM, Barraclough D 1992. Some chemical and physical factors affecting the rate and dynamics of nitrification in urine-affected soil. Plant and Soil 143(1): 11-18.
      Snow VO, Shepherd M, Cichota R, Vogeler I 2011. Urine timing: are the 2009 waikato results relevant to other years, soils and regions? In: Currie LD, Christensen CL ed. Adding to the knowledge base for the nutrient
          manager - Occasional Report No.24. Palmerston North, New Zealand, Fertilizer and Lime Research Centre, Massey University. Pp. 14.
      Thorburn PJ, Biggs JS, Collins K, Probert ME 2010. Using the APSIM model to estimate nitrous oxide emissions from diverse Australian sugarcane production systems. Agriculture, Ecosystems & Environment 136(3-4): 343-350.
      Vogeler I, Giltrap D, Cichota R 2013. Comparison of APSIM and DNDC simulations of nitrogen transformations and N2O emissions. Science of the Total Environment 465: 147-155.
  simulation RapeGrassSimulation
    clock
      start_date = 10/03/2012  # Select the start date of the simulation
      end_date = 31/01/2013  # Select the end date of the simulation
    metfile met
      filename=%apsim%\Tests\UserRuns\WinteringSystems\WeatherData(WFT).met
    summaryfile
    area Pdk1-NoUrine
      folder Manager folder
        operations Operations Fert
          14/03/2012  SurfaceOrganicMatter tillage type = disc
          20/03/2012  Fertiliser apply amount = 50 (kg/ha), depth = 0 (mm), type = NH4_N ()
          30/04/2012  Fertiliser apply amount = 50 (kg/ha), depth = 0 (mm), type = urea_N ()
        operations Operations Irrig
          13/01/2012  Irrigation apply amount = 24 (mm)
          16/01/2012  Irrigation apply amount = 26 (mm)
          18/01/2012  Irrigation apply amount = 25 (mm)
          13/02/2012  Irrigation apply amount = 19 (mm)
          14/02/2012  Irrigation apply amount = 3.2 (mm)
          15/05/2012  Irrigation apply amount = 46.17 (mm)
          21/05/2012  Irrigation apply amount = 33.7 (mm)
          10/07/2012  Irrigation apply amount = 8.7 (mm)
          16/07/2012  Irrigation apply amount = 8.7 (mm)
          20/11/2012  Irrigation apply amount = 2.9 (mm)
          26/11/2012  Irrigation apply amount = 38 (mm)
          03/12/2012  Irrigation apply amount = 17.4 (mm)
        manager2 SowRape
          # Sowing criteria
          SowDate = 14/03/2012  # Enter sowing date (dd-mmm)
          # Sowing parameters
          Crop = CanolaSWIM  # Select the crop to sow
          SowCultivar = early  # Select the cultivar
          SowClass = plant  # Select crop growth class
          SowDensity = 129  # Enter sowing density (plants/m2)
          SowDepth = 10  # Enter sowing depth (mm)
          SowRowSpace = 150  # Enter row spacing (mm)
```csharp
   using System;
   using ModelFramework;

public class Script 
{
   [Param()] private DateTime SowDate;
   [Param()] private string Crop;
   [Param()] private string SowCultivar;
   [Param()] private  string SowClass;
   [Param()] private double SowDensity;
   [Param()] private double SowDepth;
   [Param()] private double SowRowSpace;
   
   [Link()]
   public Paddock MyPaddock;
   [Input()] private DateTime Today;

   [EventHandler] public void OnInitialised()
   {
      //DefoliationDate = DateTime.ParseExact(DefoliationDateString, "d/M/yyyy", null);
      Console.WriteLine("   Sowing " + Crop + " Initialised");
   }

   [EventHandler] public void OnPrepare()
   {
      if (Today.DayOfYear == SowDate.DayOfYear)
      {
         SowType sowData = new SowType();
         sowData.Cultivar = SowCultivar;
         sowData.crop_class = SowClass;
         sowData.plants = SowDensity;
         sowData.sowing_depth = SowDepth;
         sowData.row_spacing = SowRowSpace;

         MyPaddock.Publish(Crop + ".sow", sowData);

         Console.WriteLine(Today.ToShortDateString() + " - " + "Plant1 sow rule invoked");
         Console.WriteLine("          - " + Crop + " has been sowed");
         Console.WriteLine(" ");
      }
   }
}
```
        manager2 CutRape
          # Cut a crop on fixed dates
          CutDateString = 03/07/2012  # Dates for harvest
          Crop2Cut = CanolaSWIM  # Name of crop to cut (must be a Plant1 crop)
          ResidualHeigth = 150  # Height of harvest (mm)
          RemovedFraction = 1.0  # Fraction of harvested material to remove (0-1)
```csharp
using System;
using ModelFramework;

public class Script
{
   [Param()] private string[] CutDateString;
   [Param()] private string Crop2Cut;
   [Param()] private double ResidualHeigth;
   [Param()] private double RemovedFraction;

   [Link()] public Paddock MyPaddock;

   [Input()] private DateTime Today;
   
   [Output()] private double DMHarvested = 0.0;
   [Output()] private double DMRemoved = 0.0;
   [Output()] private double DMReturned = 0.0;
   
   private double iniDM = 0.0;
   private double endDM = 0.0;
   private bool canCut = true;
   private int idd = 0;
   private DateTime[] CutDate;
   
   [EventHandler]
   public void OnInitialised()
   {
      CutDate = new DateTime[CutDateString.Length];
      for (int i = 0; i < CutDateString.Length; i++)
         CutDate[i] = DateTime.Parse(CutDateString[i]);

      Console.WriteLine("   The " + Crop2Cut + " crop will be cut on given dates");
   }

   [EventHandler] public void OnPrepare()
   {
      if ((Today.Date == CutDate[idd].Date) && (canCut))
      {
         Component Crop = MyPaddock.LinkByName(Crop2Cut) as Component;
         HarvestType harvestData = new HarvestType();

         iniDM = Crop.Variable("biomass").ToDouble();
         harvestData.Height = ResidualHeigth;
         harvestData.Remove = RemovedFraction;
         Crop.Publish("harvest", harvestData);
         endDM = Crop.Variable("biomass").ToDouble();
         
         idd += 1;
         DMHarvested = endDM - iniDM;
         DMRemoved = DMHarvested * RemovedFraction;
         DMReturned = DMHarvested - DMRemoved;
         
         if (idd >= CutDate.Length)
         {
            idd -= 1;
            canCut = false;
         }
      }
      else
      {
         DMHarvested = 0.0;
         DMRemoved = 0.0;
         DMReturned = 0.0;
      }
   }
}
```
        manager2 EndCropRape
          DateToEnd = 29/08/2012  # Date to end crop
          CropToEnd = CanolaSWIM  # Name of crop to terminate
```csharp
   using System;
   using ModelFramework;

public class Script 
{
   [Param()] private DateTime DateToEnd;
   [Param()] private string CropToEnd;

   [Link()]
   public Paddock MyPaddock;
   [Input()] private DateTime Today;

   [EventHandler] public void OnInitialised()
   {
      Console.WriteLine("   Termination of " + CropToEnd + " initialised");
   }

   [EventHandler] public void OnPrepare()
   {
      if (Today.DayOfYear == DateToEnd.DayOfYear)
      {
         MyPaddock.Publish(CropToEnd + ".end_crop");

         Console.WriteLine(Today.ToShortDateString() + " - " + "Plant1 EndCrop rule invoked");
         Console.WriteLine("          - " + CropToEnd + " has been terminated");
         Console.WriteLine(" ");
      }
   }
}
```
        manager2 SowGrass
          # Sowing criteria
          SowDate = 25/09/2012  # Enter sowing date (dd-mmm)
          # Sowing parameters
          Crop = AgPasture  # Select the crop to sow
          InitialRootingDepth = 500  # Rooting depth at germination (mm)
          MatureRootWt = 150  # Root weight for maximum rooting depth (kgDM/ha)
```csharp
   using System;
   using ModelFramework;

public class Script 
{
   [Param()] private DateTime SowDate;
   [Param()] private string Crop;
   [Param()] private double MatureRootWt;
   [Param()] private double InitialRootingDepth;
   
   [Link()] public Paddock MyPaddock;
   [Link()] public AgPasture MyPasture;

   [Input()] private DateTime Today;
   [Input()] private bool is_start_simulation;

   private double MatureRootingDepth;
   private double CurrentRootingDepth;
   private SetSpeciesStateType RootData;
   private bool allowRootGrowth;
   
   [EventHandler] public void OnInitialised()
   {
      MatureRootingDepth = MyPasture.RootDepth;

      // initially remove the crop
      KillCropType KillData = new KillCropType();
      KillData.KillFraction = 1.0F;
      MyPasture.KillCrop(KillData);

      RootData = new SetSpeciesStateType();
      RootData.speciesID = new int[1];
      RootData.rootDepth = new double[1];
      RootData.dmFractions = new PlantPoolsType[0];
      RootData.nConcentrations = new PlantPoolsType[0];
      MyPasture.SetSpeciesState(RootData);
      allowRootGrowth = false;
      
      Console.WriteLine("   Sowing " + Crop + " Initialised");
   }

   [EventHandler] public void OnPrepare()
   {      
      if (Today.Date == SowDate.Date)
      {
         SowType sowData = new SowType();

         MyPaddock.Publish(Crop + ".sow", sowData);

         RootData.rootDepth[0] = InitialRootingDepth;
         MyPasture.SetSpeciesState(RootData);
         allowRootGrowth = true;

         Console.WriteLine(Today.ToShortDateString() + " - " + "Sow rule invoked");
         Console.WriteLine("          - " + Crop + " has been sowed");
         Console.WriteLine(" ");
      }
      
      // Mimic root (depth) growth
      if (MyPasture.Stage > 0 && allowRootGrowth)
      {
         CurrentRootingDepth = MatureRootingDepth * (MyPasture.RootWt / MatureRootWt);
         CurrentRootingDepth = Math.Min(Math.Max(CurrentRootingDepth, InitialRootingDepth), MatureRootingDepth);
         RootData.rootDepth[0] = CurrentRootingDepth;
         MyPasture.SetSpeciesState(RootData);
         if (CurrentRootingDepth >= MatureRootingDepth)
            allowRootGrowth = false;
      }
   }
}
```
        manager2 CutGrass1
          # Harvesting AgPasture on given dates
          CutPasture_Dates = 11/12/2012  # Enter the dates for each harvest (dd/mm/yyyy or dd-mmm)
          RemoveAmountType = Setting residual DM amount  # Choose what amount is being defined
          HerbageAmount = 1600  # Enter the herbage amount (kgDM/ha)
```csharp
using System;
using ModelFramework;

//This manager sets up a cut/grazing rotation for AgPasture. All harvested material is carried away.
// Harvest is done on above ground standing DM, i.e. leaves plus stem/sheath (dead and green).
// Harvest is allowed only at given dates, but only happens if there is enough biomass
// The amount to remove is defined by either the residualDM (all above it is harvested) or a given amount is removed
//
//-->  Last uptaded in: 05/Oct/2015 ..................

public class Script
{
   //Parameter variables:
   [Param] private string[] CutPasture_Dates;      //Dates to harvest
   [Param] private string RemoveAmountType;        //The type of amount being defined (Setting DM amount to remove,Setting residual DM amount)
   [Param] private double HerbageAmount ;          //The DM amount (kg/ha, DM above ground)

   //Links and events:
   [Link] private Component MySelf;
   [Link] private AgPasture MyAgPasture;

   //Variables read from other modules
   [Input] private DateTime Today;     //Today's date

   //Outputs
   [Output][Units("")] public string Can_Cut;                  //Whether today is a harvesting day
   [Output][Units("")] public string Has_Cut;                  //Whether today's harvest was done
   [Output][Units("kg/ha")] public double harvested_dm;        //Pasture DM harvested today (kg/ha)
   [Output][Units("kgN/ha")] public double harvested_n;        //N harvested today
   [Output][Units("kg/ha")] public double removed_dm;          //DM removed from the paddock
   [Output][Units("kgN/ha")] public double removed_n;          //N removed from the paddock
   [Output][Units("kgN/ha")] public double returned_dm;        //DM returned to the paddock
   [Output][Units("kgN/ha")] public double returned_n;         //N returned to the paddock
   [Output][Units("kg/ha/day")] public double GrowthRateCalc;  //Average growth rate for this cut
   [Output][Units("days")] public int DaysAfterCut;            //Number of days after last harvest
   [Output][Units("kg/ha")] public double PreHarvestDM;        //Total standing DM (Leaf + Stem/Sheath) before cut
   [Output][Units("kg/ha")] public double PostHarvestDM;       //Total standing DM (Leaf + Stem/Sheath) after cut

   //Internal variables
   private double FracDM2Remove;       //The fraction of DM to be removed from the simulation (0-1)
   private bool CutIsAllowed;          //Whether cutting are allowed
   private int NumCuts;                //The number of cuttings to be performed
   private int nCut;                   //Counter for the number of cuttings
   private DateTime[] GivenDates;      //Dates given for each cut
   private double LowerThreshold;      //Minimum residual DM
   private double MinimumFraction;     //Minimum fraction of given amount that still triggers a harvest
   private double ResidualDM;
   private double AmountWanted;

   [EventHandler()]
   public void OnInitialised()
   {
      //set up the array with dates
      NumCuts = CutPasture_Dates.Length;
      GivenDates = new DateTime[NumCuts];
      for (int i = 0;i < NumCuts;i++)
      {
         GivenDates[i] = DateTime.Parse(CutPasture_Dates[i]);
      }

      //Reset variables
      DaysAfterCut = -1;
      CutIsAllowed = false;
      Can_Cut = "no";
      Has_Cut = "no";
      nCut = 0;
      LowerThreshold = 500;   // assume a minimum of 500kgDM/ha
      MinimumFraction = 0.5;  // assume that at least 50% of required amount should be available to trigger a harvest

      //write messages on summary file
      string myMessage1 = "harvest triggered on given dates";
      string myMessage2 = "     remove ";
      if (RemoveAmountType.Contains("residual"))
      {
         ResidualDM = HerbageAmount;
         AmountWanted = 0.0;
         myMessage2 += "all biomass down to residual DM (" + ResidualDM.ToString("#0") + " kgDM/ha)";
      }
      else if (RemoveAmountType.Contains("remove"))
      {
         ResidualDM = LowerThreshold;
         AmountWanted = HerbageAmount;
         myMessage2 += "a given amount (" + AmountWanted.ToString("#0") + " kgDM/ha)";
      }
      Console.WriteLine("");
      Console.WriteLine("   Harvest rotation for AgPasture initialised");
      Console.WriteLine("     rotation rule valid between " + CutPasture_Dates[0] + " and " + CutPasture_Dates[NumCuts - 1]);
      Console.WriteLine("     rotation type: " + myMessage1);
      Console.WriteLine(myMessage2);
      Console.WriteLine("");
   }

   [EventHandler()]
   public void OnPrepare()
   {
      double Amount2Harvest = 0.0;
      double AmountHarvestable = 0.0;

      //Reset variables:
      Has_Cut = "no";
      harvested_dm = 0.0;
      harvested_n = 0.0;
      removed_dm = 0.0;
      removed_n = 0.0;
      returned_dm = 0.0;
      returned_n = 0.0;
      GrowthRateCalc = 0.0;
      DaysAfterCut = DaysAfterCut + 1;
      PreHarvestDM = MyAgPasture.StandingHerbageWt;
      if (RemoveAmountType.Contains("residual"))
      {
         ResidualDM = HerbageAmount;
         AmountWanted = Math.Max(0.0, PreHarvestDM - ResidualDM);
      }
      else if (RemoveAmountType.Contains("remove"))
      {
         ResidualDM = LowerThreshold;
         AmountWanted = HerbageAmount;
      }

      //Decide whether cut is allowed:
      if (nCut < NumCuts)
      {
         if (Today.Date == GivenDates[nCut].Date)
         {
            CutIsAllowed = true;
            Can_Cut = "yes";
         }

         //Decide how much to cut:
         if (CutIsAllowed)
         {
            AmountHarvestable = Math.Max(0.0, PreHarvestDM - ResidualDM);
            if (AmountHarvestable >= AmountWanted * MinimumFraction)
               Amount2Harvest = Math.Min(AmountWanted, AmountHarvestable);
            else
               Amount2Harvest = AmountWanted;

            //Decide whether cut actually happens:
            if ((AmountHarvestable >= Amount2Harvest))
            {
               CutPasture(Amount2Harvest);
               //reset cut variables
               DaysAfterCut = 0;
               Has_Cut = "yes";
               GrowthRateCalc = harvested_dm / DaysAfterCut;
               PostHarvestDM = MyAgPasture.StandingHerbageWt;
               CutIsAllowed = false;
               Can_Cut = "no";
               nCut += 1;
            }
         }
         else
         {
            Amount2Harvest = 0;
            AmountHarvestable = 0;
         }
      }
   }


   private void CutPasture(double Amount2Harvest)
   {
      // -- Cutting pasture ----------------------------------------------------------------------------

      GrazeType CutData = new GrazeType();
      CutData.sender = MySelf.Name;
      CutData.amount = (float) Amount2Harvest;
      CutData.type = "SetRemoveAmount";
      MyAgPasture.Graze(CutData);
      harvested_dm = MyAgPasture.HarvestedWt;
      harvested_n = MyAgPasture.HarvestedN;

      //Let user know (via summary) that a cut was made
      Console.WriteLine(Today.ToString("dd MMMM yyyy") + " (Day of year=" + Today.DayOfYear.ToString() + "), " + MySelf.Name + ":");
      Console.WriteLine("     Removing " + harvested_dm.ToString("#0") + "kg DM/ha, with " + harvested_n.ToString("#0.0") + "kg N/ha");
   }
}
```
        manager2 CutGrass2
          # Harvesting AgPasture on given dates
          CutPasture_Dates = 23/01/2013  # Enter the dates for each harvest (dd/mm/yyyy or dd-mmm)
          RemoveAmountType = Setting residual DM amount  # Choose what amount is being defined
          HerbageAmount = 120  # Enter the herbage amount (kgDM/ha)
          script: same as in RapeGrassSimulation.Pdk1-NoUrine.Manager folder.CutGrass1
        manager2 nh3_volatilisation
          # NH3 volatilisation parameters
          Depth_for_NH3 = 50  # Depth to which NH3 volatilisation is considered (mm)
          # Base soil and pH change parameters
          Soil_pH_base = 6.0   6.0   6.0   6.0   6.0   6.0   6.0   6.0   6.0   6.0   6.0   6.0   6.0   6.0   6.0   6.0   6.0   6.0   6.0   6.0   6.0   6.0   6.0   6.0   6.0   6.0   6.0   6.0   6.0   6.0  # The base soil pH for each soil layer
          Soil_CEC_strng = 16.0  16.0  16.0  16.0  16.0  16.0  16.0  15.5  15.5  15.5  15.5  14.0  14.0  14.0  14.0  12.0  12.0  12.0  12.0  11.5  11.0  11.0  10.0  9.0   9.0   9.0   9.0   9.0   9.0   9.0  # The CEC for each soil layer (meq/100g)
          k_BC = 0.03  # Soil buffer capacity factor
          k_pH_hyd = 1  # Factor to convert dlt_urea_hydrol into pH changes
          k_pH_nit = 1  # Factor to convert dlt_nh4_nitrif into pH changes
          k_pH_x = 0.1  # Minimum pH fraction decaying per day (0-1)
          # Gas exchange parameters
          k_AFPV = 75  # Factor for soil/atmosphere gas exchange (AFPV/mm)
          f_NV_strng = 1.0  0.8  0.5 0.1  0.0  0.0  0.0  0.0  # Fractor for volatilisable NH3, per soil layer (0-1)
          # Additional limits for volatilisation
          f_AV = 0.5  # Fraction of total soil NH4 that can be volatilised per day
          CritRain1 = 25  # Rain+irrigation below which volatilisation is not limited (mm)
          CritRain2 = 25  # Rain+irrigation above which no volatilisation occur (mm)
```vb
Imports System
Imports ModelFramework

'This module estimate the amount of NH3 in the soil and its volatilisation

'-->  Last uptaded in: 22/Dec/2015 ..................


Public Class Script
   
   'Parameter variables:
   <param> Private Depth_for_NH3 As Single            'The depth to which volatilisation is considered (mm)
   <param> Private Soil_pH_base As String             'The base soil pH, apsim will try to keep to this value, same for all layers
   <param> Private Soil_CEC_strng As String           'The CEC for each layer (meq/100g)
   <param> Private k_BC As Single                     'Soil buffer capacity factor ()
   <param> Private k_pH_hyd As Single                 'Factor to convert urea hydrolysed into H+ changes ()
   <param> Private k_pH_nit As Single                 'Factor to convert NH4 nitrified into H+ changes ()
   <param> Private k_pH_x As Single                   'Minimum decrease for pH (fraction/day)
   <param> Private k_AFPV As Single                   'Factor to transform potential evaporation in air filled pore volumes that are potential exchanged with to atmosphere
   <param> Private f_NV_strng As String               'The fraction of potential NH3 volatilisation for each layer that is transpoted to the soil surface ()
   <param> Private f_AV As Single                     'Fraction of total soil NH4 that can be volatilised per day, limits volatilisation and ensure mass balance ()
   <param> Private CritRain1 As Single                'Critial rainfall. Below this volatilisation is not limited by rainfall or irrigation
   <param> Private CritRain2 As Single                'Critial rainfall. Above this no volatilisation occurs
    
   'Events to be raised:
   <[Event]()> Public Event NitrogenChanged As NitrogenChangedDelegate

   'Variables read from other modules
   <Input> Private rain As Single                     'Rainfall (mm)
   <Input> Private eo As Single                       'Potential evapotranspiration (mm)
   <Input(IsOptional:=True)> Private irrigation As Single               'Irrigation amount today (mm)
   <Input> Private dlayer As Single()                 'Soil layers thickness
   <Input> Private bd As Single()                     'Soil bulk density (g/cm3 = kg/L)
   <Input> Private sw As Single()                     'Soil water content (cm3/cm3)
   <Input> Private sat As Single()                    'Soil water content at saturarion, porosity (cm3/cm3)
   <Input(IsOptional:=True)> Private ave_soil_temp As Single()    'Soil temperature from SoilTemp - for each layer (oC)
   <Input(IsOptional:=True)> Private st As Single()               'Soil temperature from SoilN - for each layer (oC)
   <Input> Private nh4 As Single()                    'Amount of NH4 in the soil (kg/ha)
   <Input> Private nh4ppm As Single()                 'Amount of NH4 in the soil (ppm)
   <Input> Private conc_water_nh4 As Single()         'Amount of NH4 not adsorbed (ppm)
   <Input(IsOptional:=True)> Private dlt_rntrf As Single()        'Amount of N nitrified (kg/ha) - SoilN
   <Input(IsOptional:=True)> Private nitrification As Single()    'Amount of N nitrified (kg/ha) - SoilNitrogen
   <Input> Private dlt_urea_hydrol As Single()        'Amount of urea N hydrolised (kg/ha)
   
   'Output variables
   <Output><Units("ppm")> Public nh3ppm As Single()               'The estimated amount of NH3 in the soil (ppm)
   <Output><Units("kgN/ha")> Public nh3 As Single()               'The estimated amount of NH3 in the soil (kg/ha)
   <Output><Units("g/ha")> Public nh3_gas As Single()             'The estimated amount of NH3 in the soil in gaseous form (g/ha)
   <Output><Units("kgN/ha")> Public emission_nh3 As Single()      'The estimated amount of NH3 volatilised (kg/ha/day)
   <Output><Units("")> Public SoilpH  As Single()                 'dummy soil pH
   <Output><Units("kgN/ha")> Public nh4_sol As Single()           'The amount of NH4 in the soil solution (kg/ha)   
   <Output><Units("oC")> Public SoilTemp As Single()              'The soil temperature (oC)

   <Output><Units("AFPV/day")> Public PotGasExchangeNH As Single  'The potential soil-atmosphere gas exchange (Air-filled-pore-spaces/day)
   <Output><Units("L/m2/day")> Public GasExchangeNH As Single()   'The volume of gas exchanged (L/m2/day)
   <Output><Units("L/m2")> Public AirFilledPoreVolume As Single() 'The volume of air filled pore space in each soil layer (L_air/m2)
   <Output><Units("")> Public NH3toNHx_ratio As Single()          'The ratio between NH3 and NHx in the soil solution
   <Output><Units("x1000")> Public NH3GtoNH3A_ratio As Single()   'The ratio between NH3 liquide and gas in the soil, times 1000
   <Output><Units("")> Public pK_NHx As Single()                  'The equilibrium constant for NH4-NH3
   <Output><Units("")> Public pG_NH3 As Single()                  'The equilibrium constant for NH3A-NH3G

   'Internal variables
   Private NH3_z As Integer                           'The layer to consider NH3 volatilization
   Private f_NV As Single()                           'The fraction of NH3 transport from each layer
   Private Ini_SoilpH As Single()                     'The initial, or base, soil pH
   Private SoilCEC As Single()                        'The CEC (mol/kg)
   Private dltNitrification As Single()               'The amount of N nitrified (kg/ha)
   
   <EventHandler()> Public Sub OnInit2()

      ReDim SoilpH(dlayer.length - 1)
      ReDim Ini_SoilpH(dlayer.length - 1)

      Irrigation = 0
      
      'Split the read values of f_NV into an array
      f_NV = makeArray(f_NV_strng)
      'Split the read values of pH into an array
      Ini_SoilpH = makeArray(Soil_pH_base)
      'Split the read values of CEC into an array
      SoilCEC = makeArray(Soil_CEC_strng)
      ReDim Preserve Ini_SoilpH(dlayer.length - 1)
      ReDim Preserve SoilCEC(dlayer.length - 1)
      'Assign initial pH values and convert CEC from meq to mol
      For z As Integer = 0 To dlayer.length - 1
         Ini_SoilpH(z) = math.Max(0, Ini_SoilpH(z))
         SoilpH(z) = Ini_SoilpH(z)
         SoilCEC(z) = 0.01 * math.Max(0.1, SoilCEC(z))     'mol/kg
      Next

      'Identify the layer down to which volatilization is considered
      Dim Depth_from_surface As Single = 0
      For z As Integer = 0 To dlayer.length - 1
         Depth_from_surface = Depth_from_surface + dlayer(z)
         If Depth_from_surface <= Depth_for_NH3 Then
            NH3_z = z
         Else
            z = dlayer.length
         End If
      Next

      'verify the bounds of the pH converting factor
      k_pH_hyd = math.Min(1, math.Max(0, k_pH_hyd))
      k_pH_nit = math.Min(1, math.Max(0, k_pH_nit))
      k_pH_x = math.Min(1, math.Max(0, k_pH_x))
      k_BC = math.Max(0, k_BC)
      ReDim Preserve f_NV(dlayer.length - 1)
      For z As Integer = 0 To dlayer.length - 1
         f_NV(z) = math.Min(1, math.Max(0, f_NV(z)))
      Next

      '----------- NH3 volatilization ---------------------------------------------------
      Console.WriteLine("")
      Console.WriteLine("Volatilization will be calculated by manager")
      Console.WriteLine("   Top " & Depth_for_NH3.ToString & "mm are considered,")
      Console.WriteLine("   pH variation is mimicked by dlt_urea_hydrol + dlt_nh4_nitrif")
      Console.WriteLine("")

   End Sub

   
   <EventHandler()> Public Sub OnPrepare()
            
      Dim urea_hydrol As Single                    'The amount of urea hydrolised (mol/L)
      Dim nh4_nitrif As Single                     'The amount of NH4 nitrified (mol/L)
      Dim dlt_H As Single                          'Estimated variation of H+ in the soil (mol/L)
      Dim delta_pH_Hyd As Single = 0               'Variation in soil pH due to urea hydrolysis
      Dim delta_pH_Nit As Single = 0               'Variation in soil pH due to NH4 nitrification
      Dim delta_pH_X As Single = 0                 'Minimum decrease in soil pH, to ensure pH returns to base after urea deposition
      Dim delta_pH_Vol As Single = 0               'Variatin in pH due to volatilisation
      Dim Beta As Single = 1                       'The soil buffer capacity ()
      Dim delta_nh4(dlayer.length - 1) As Double   'The variation in NH4 content due to volatilisation (kg/ha)
      Dim RainFactor As Single = 1.0               'The rain factor

      Try  'to get the soil temperature from SoilTemp, otherwise use SoilN's:
         SoilTemp = ave_soil_temp
      Catch
         SoilTemp = st
      End Try
      
      Try  'to get the nitrification rate from SoilN, otherwise use SoilN's:
         dltNitrification = nitrification
      Catch
         dltNitrification = dlt_rntrf
      End Try

      ReDim nh3ppm(dlayer.length - 1)
      ReDim nh4_sol(dlayer.length - 1)
      ReDim nh3(dlayer.length - 1)
      ReDim nh3_gas(dlayer.length - 1)
      ReDim emission_nh3(dlayer.length - 1)
      ReDim GasExchangeNH(dlayer.length - 1)
      ReDim AirFilledPoreVolume(dlayer.length - 1)
      ReDim NH3toNHx_ratio(dlayer.length - 1)
      ReDim NH3GtoNH3A_ratio(dlayer.length - 1)
      ReDim pK_NHx(dlayer.length - 1)
      ReDim pG_NH3(dlayer.length - 1)

      'Calc the irrigation factor
      If Rain + Irrigation < CritRain1 Then
         RainFactor = 1.0
      ElseIf Rain + Irrigation > CritRain2 Then
         RainFactor = 0.0
      Else
         RainFactor = (Rain + Irrigation - CritRain1) / (CritRain2 - CritRain1) 
      End If
      
      '+++++++++++++++++++++++++++++++++++++++++++++++++++++++++++++++++++++++++++++++++++++++++++++++++++++++++++++++++++++++++++
      '  NOTES:
      '     The RainFactor accounts for the downwards transport of NH3 gas when water from rain or irrigation is being drained throught the soil.
      '        Below RainCrit1, precipitation has no effect, above RainCrit2 volatilisation is zero.  A linear relationship is used between
      '        these two limits:
      '
      '                              |
      '                         F   1+                /-----------
      '                       R a    |               /:
      '                       a c    |              / :
      '                       i t    |             /  :
      '                       n o    |            /   :
      '                         r    |           /    :
      '                              |          /     :
      '                              |         /      :
      '                             0+========+-------+--------------> Rain + Irrigation
      '                              |      Rain    Rain
      '                                     Crit1   Crit2
      '+++++++++++++++++++++++++++++++++++++++++++++++++++++++++++++++++++++++++++++++++++++++++++++++++++++++++++++++++++++++++++


      For z As Integer = 0 To dlayer.length - 1
         
         '0-Compute the value of Beta
         Beta = k_BC * bd(z) * SoilCEC(z) / sw(z)

         '1-Compute the consumption of H+ by urea hydrolysis
         urea_hydrol = dlt_urea_hydrol(z) / (dlayer(z) * 10000)   'kg_urea_N/L_soil
         urea_hydrol = urea_hydrol * 1000 / sw(z)                 'g_urea_N/L_water
         urea_hydrol = urea_hydrol / 14.00674                     'mol_urea_N/L_water  - All N pools as expresseed in kg_N, so molecular mass is 14
         dlt_H = -2 * urea_hydrol * k_pH_hyd                      'mol/L

         '2-Compute changes in soil pH due to urea hydrolysis
         If dlt_H < 0 Then
            delta_pH_Hyd = (14 / (1 + ((14 - soilpH(z)) / SoilpH(z)) * 10 ^ (dlt_H / Beta))) - SoilpH(z)
         Else
            delta_pH_Hyd = 0
         End If
         SoilpH(z) = SoilpH(z) + delta_pH_Hyd

         '3-Compute the production of H+ by nitrification and its effect on soil pH
         nh4_nitrif = dltNitrification(z) / (dlayer(z) * 10000)   'kg_nh4_N/L_soil
         nh4_nitrif = nh4_nitrif * 1000 / sw(z)                   'g_nh4_N/L_water
         nh4_nitrif = nh4_nitrif / 14.0067                        'mol_nh4_N/L_water  - All N pools as expresseed in kg_N, so molecular mass is 14
         dlt_H = 2 * nh4_nitrif * k_pH_nit                        'mol/L
         If dlt_H > 0 Then
            delta_pH_Nit = (14 / (1 + ((14 - soilpH(z)) / SoilpH(z)) * 10 ^ (dlt_H / Beta))) - SoilpH(z)
         Else
            delta_pH_Nit = 0
         End If
         
         '4-Compute soil forced pH change - this is to ensure pH will decline to its base value
         If SoilpH(z) > Ini_SoilpH(z) Then
            delta_pH_x = -(SoilpH(z) - Ini_SoilpH(z)) * k_pH_x
         Else
            delta_pH_x = 0
         End If
         SoilpH(z) = SoilpH(z) + math.Min(delta_pH_Nit, delta_pH_X)

         '5-bound pH between base and 14
         SoilpH(z) = math.Min(14, math.Max(Ini_SoilpH(z), SoilpH(z)))

         
         '+++++++++++++++++++++++++++++++++++++++++++++++++++++++++++++++++++++++++++++++++++++++++++++++++++++++++++++++++++++++++++
         '  NOTES:
         '     The changes in pH are due to the consumption of H+ as urea is hydrolysed or the production of H+ by nitrification,
         '        in theory for each mol of N hydrolised two mols of H+ are consumed, while two mols are produced by nitrification;
         '     The k_pH_nit ad k_pH_hyd factors allow to control the extent that H+ is affected by hydrolysis and nitrification,
         '        when set to zero there's no effect, while setting it to one causes full theoretical effect
         '     The parameter Beta describes the soil buffer capacity, which is a function of CEC, k_BC is used for adjusting the relationship.
         '     k_pH_x stablish a minimum rate for pH decay, it mimicks soil buffering and other reactions that bring pH down
         '        after urea/urine deposition. Used when nitrification is not enough to bring the pH down.
         '+++++++++++++++++++++++++++++++++++++++++++++++++++++++++++++++++++++++++++++++++++++++++++++++++++++++++++++++++++++++++++


         '6-compute the NH3 equilibrium factors
         pK_NHx(z) = pK("aq", soilTemp(z) + 273.15)      'Aqueous equilibrium [NH4 <--> NH3]
         pG_NH3(z) = pK("gs", soilTemp(z) + 273.15)      'Gaseous equilibrium [NH3_liquid <--> NH3_gas]
         
         '7-Calc the proportion of total NHx that is in the form of NH3
         Dim NH3toNHx As Single = 1 / (1 + 10 ^ (pK_NHx(z) - SoilpH(z)))
         NH3toNHx_ratio(z) = NH3toNHx
         
         '8-Calc the amount of NH3 in aqueous solution (original equation uses mol/L, thus the ratio of molecular mass is needed)
         nh3ppm(z) = conc_water_nh4(z) * NH3toNHx * (17.03 / 18.04 )      'ppm (ug/cm3_water)
         
         '9-Calc the proportion of total NH3 that is in the gaseous form
         Dim NH3GtoNH3A As Single = 1 / (1 + 10 ^ (pG_NH3(z)))
         NH3GtoNH3A_ratio(z) = NH3GtoNH3A * 1000
         
         '10-Calc the amount of NH3 in gaseous form
         nh3_gas(z) = nh3ppm(z) * NH3GtoNH3A                   'ppm (ug/cm3_air in soil = mg/L)

         '11-Calc the amount of NH3 in gaseous form and the amount effectivelly lost by volatilization
         PotGasExchangeNH = eo * k_AFPV   'air filled pore volumes/day
         AirFilledPoreVolume(z) = (sat(z) - sw(z)) * dlayer(z)    'L_air/m2
         If z <= NH3_z Then
            GasExchangeNH(z) = PotGasExchangeNH * AirFilledPoreVolume(z)      'L_air/m2/day
            GasExchangeNH(z) = GasExchangeNH(z) * RainFactor
            If GasExchangeNH(z) > 0 Then
               emission_nh3(z) = nh3_gas(z) * GasExchangeNH(z) * f_NV(z)      'mg/m2
               emission_nh3(z) = emission_nh3(z) * 10E+4                      'mg/ha
               emission_nh3(z) = emission_nh3(z) * 10E-6                      'kg/ha
            Else
               emission_nh3(z) = 0
            End If
            'Limit volatilisation to a fraction of NH4 for each layer
            emission_nh3(z) = Math.Min(emission_nh3(z), f_AV * nh4(z))
         Else
            GasExchangeNH(z) = 0
            emission_nh3(z) = 0
         End If
         
         
         '+++++++++++++++++++++++++++++++++++++++++++++++++++++++++++++++++++++++++++++++++++++++++++++++++++++++++++++++++++++++++++
         '  NOTES:
         '     To estimate the amount of NH3 volatilised during the day, it is assumed that the amount of NH3 in gaseous form in the
         '        beginning of the day represents well the proportion of NHx 'volatilisable'. It is assumed also that the potential evaporation
         '        is a good estimator for the gas exchange between soil and atmosphere (this makes volatilisation sensible to temperature and
         '        wind).  By scaling the gas exchange to the air filled pore space in the soil, we get volatilisation also sensible to water
         '        content, which mimicks the decrease in gas transport when the soil is wet.  Finally a factor (f_NV) is used to limit the
         '        contribution of each soil layer to the overall volatilisation (deep layers would volatilise less because NH3 needs to move
         '        transport to the surface.
         '+++++++++++++++++++++++++++++++++++++++++++++++++++++++++++++++++++++++++++++++++++++++++++++++++++++++++++++++++++++++++++

         
         '12-Compute soil pH change due to volatilisation
         Dim emission_nh3ised As Single = emission_nh3(z) / (dlayer(z) * 10000)  'kg_nh3_N/L_soil
         emission_nh3ised = emission_nh3ised * 1000 / sw(z)                      'g_nh3_N/L_water
         emission_nh3ised = emission_nh3ised / 14.0067                           'mol_nh3_N/L_water  - All N pools as expresseed in kg_N, so molecular mass is 14
         dlt_H = emission_nh3ised                                                'mol/L
         If dlt_H > 0 Then
            delta_pH_vol = (14 / (1 + ((14 - soilpH(z)) / SoilpH(z)) * 10 ^ (dlt_H / Beta))) - SoilpH(z)
         Else
            delta_pH_vol = 0
         End If

         '13- Calc new pH and bound it between base and 14
         SoilpH(z) = SoilpH(z) + delta_pH_vol
         SoilpH(z) = math.Min(14, math.Max(Ini_SoilpH(z), SoilpH(z)))

         '14-Transform variables to publishable units
         nh3(z) = nh3ppm(z) * sw(z) / 1000                     'mg/cm3_soil = g/L_soil
         nh3(z) = nh3(z) * dlayer(z) * 10000                   'g/ha_soil
         nh3(z) = nh3(z) / 1000                                'kg/ha

         nh3_gas(z) = nh3_gas(z) * (sat(z) - sw(z)) / 1000     'mg/cm3_soil = g/L_soil
         nh3_gas(z) = nh3_gas(z) * dlayer(z) * 10000           'g/ha_soil

         nh4_sol(z) = conc_water_nh4(z) * sw(z) / 1000         'mg/cm3_soil = g/L_soil
         nh4_sol(z) = nh4_sol(z) * dlayer(z) * 10000           'g/ha_soil
         nh4_sol(z) = nh4_sol(z) / 1000                        'kg/ha

         'Compute the delta in nh4 amount
         delta_nh4(z) = -emission_nh3(z)
      Next
      
      'send the delta nh4 to soil
      Dim NitrogenChanges As NitrogenChangedType = New NitrogenChangedType
      NitrogenChanges.DeltaNH4 = delta_nh4
      NitrogenChanges.DeltaNO3 = New Double() {}
      RaiseEvent NitrogenChanged(NitrogenChanges)     

   End Sub
     
   Function makeArray(ByVal ArrayString As String) As Single()
      
      'Get the string with values from the user interface and put the values in an numeric array
      
      Dim MyArray_string As String()
      Dim MyArray_single As Single()
      Dim Separator As Char() = " "
      
      '1-Split string into array
      MyArray_string = ArrayString.Split(Separator, StringSplitOptions.RemoveEmptyEntries)
      
      '2-convert array into type single
      ReDim MyArray_single(MyArray_string.Length - 1)      
      For i As Integer = 0 To MyArray_single.length - 1
         MyArray_single(i) = MyArray_string(i)
      Next
      Return MyArray_single
      
   End Function
   
   Function pK(ByVal N_species As String, ByVal Temp As Single) As Single
      
      'Calculates the equilibrium constants, 
      '  if 'aq' then nh4-nh3 equilibrium in water
      '  if 'gs' then gas-liquid equilibrium for nh3
      
      Dim a_pK As Single() = {0.09018, -1.69}
      Dim b_pK As Single() = {2729.92, 1477.7}
      Dim sp As Integer
      
      If n_species = "aq" Then
         sp = 0
      ElseIf n_species = "gs"
         sp = 1
      End If
      pK = a_pK(sp) + b_pK(sp) / Temp
         
   End Function
   
End Class
```
        manager AuxSummary
          measuredLayer = 24  # Type the layer index where leachate was measured
          on init:
```
! for calculating DM removed
RapeDMremoved = 0.0
GrassDMremoved = 0.0
RapeDM_end = canolaswim.biomass
GrassDM_end = AgPasture.biomass


! for calculating leachate concentration
NO3ConcMlayer = 0.0   ! the concentration in the soil solution at measured layer
NO3ConcFlow = 0.0     ! the concentration of leachate (soil solution) at measured layer
NO3ConcDrain = 0.0    ! the concentration of leachate at bottom of soil


! for computing average contents in layers corresponding to measurements
! index for bottom layer
swLayer1 = 6          ! 0-7.5 cm
swLayer2 = 9          ! 7.5-15 cm
swLayer3 = 13         ! 15-25 cm
swLayer4 = 16         ! 25-40 cm
swLayer5 = 20         ! 40-60 cm
swLayer6 = 23         ! 60-80 cm
swLayer7 = 24         ! 80-100 cm
swLayer8 = 26         ! 100-120 cm
swLayer9 = 30         ! 120-150 cm

! layer thickness
thickL1 = 75
thickL2 = 75
thickL3 = 100
thickL4 = 150
thickL5 = 200
thickL6 = 200
thickL7 = 200
thickL8 = 200
thickL9 = 300


! for computing average water content
SWCSurface = 0.0      ! 0-15 cm
SWCSubSurf = 0.0      ! 20-40 cm
SWCL1 = 0.0
SWCL2 = 0.0
SWCL3 = 0.0
SWCL4 = 0.0
SWCL5 = 0.0
SWCL6 = 0.0
SWCL7 = 0.0
SWCL8 = 0.0
SWCL9 = 0.0


! for computing average N contents
! amounts of NH4
NH4L1 = 0.0
NH4L2 = 0.0
NH4L3 = 0.0
NH4L4 = 0.0
NH4L5 = 0.0
NH4L6 = 0.0
NH4L7 = 0.0
NH4L8 = 0.0
NH4L9 = 0.0

! amounts of NO3
NO3L1 = 0.0
NO3L2 = 0.0
NO3L3 = 0.0
NO3L4 = 0.0
NO3L5 = 0.0
NO3L6 = 0.0
NO3L7 = 0.0
NO3L8 = 0.0
NO3L9 = 0.0


! Water thresholds
SatL1 = 0.0
SatL2 = 0.0
SatL3 = 0.0
SatL4 = 0.0
SatL5 = 0.0
SatL6 = 0.0
SatL7 = 0.0
SatL8 = 0.0
SatL9 = 0.0

DulL1 = 0.0
DulL2 = 0.0
DulL3 = 0.0
DulL4 = 0.0
DulL5 = 0.0
DulL6 = 0.0
DulL7 = 0.0
DulL8 = 0.0
DulL9 = 0.0

LL15L1 = 0.0
LL15L2 = 0.0
LL15L3 = 0.0
LL15L4 = 0.0
LL15L5 = 0.0
LL15L6 = 0.0
LL15L7 = 0.0
LL15L8 = 0.0
LL15L9 = 0.0
```
          on start_of_day:
```
RapeDM_ini = canolaswim.biomass
GrassDM_ini = AgPasture.biomass
```
          on end_of_day:
```
RapeDM_end = canolaswim.biomass
GrassDM_end = AgPasture.biomass
if (RapeDM_end - RapeDM_ini) < 0 then
   RapeDMremoved = RapeDM_ini - RapeDM_end
else
   RapeDMremoved = 0.0
endif

if (GrassDM_end - GrassDM_ini) < 0 then
   GrassDMremoved  = GrassDM_ini - GrassDM_end
else
   GrassDMremoved  = 0.0
endif

if canolaswim.yield > 0) then
   RapeDMremoved = canolaswim.yield
endif
RapeNUptake = canolaSWIM.n_uptake/10


NO3LeachMlayer = flow_no3([measuredLayer]) * 100    ! converted from kg/ha to mg/m2
if (flow_water([measuredLayer]) <= 0.1) then
   NO3ConcFlow = 0.0
else
   NO3ConcFlow = NO3LeachMlayer / flow_water([measuredLayer])  ! in mg/L
endif
if (drain = 0.0) then
   NO3ConcDrain = 0.0
else
   NO3ConcDrain = (leach_no3 * 100) / drain
endif
NO3LeachMlayer = NO3LeachMlayer  / 100       ! back to kg/ha
NO3ConcMlayer = no3([measuredLayer]) * 100 / sw_dep([measuredLayer]) ! in mg/L or ppm


! amounts of water
SWCL1 = sw_dep(1) + sw_dep(2) + sw_dep(3) + sw_dep(4) + sw_dep(5) + 0.75*sw_dep(6)
SWCL2 = 0.25*sw_dep(6) + sw_dep(7) + sw_dep(8) + sw_dep(9)
SWCL3 = sw_dep(10) + sw_dep(11) + sw_dep(12) + 0.667*sw_dep(13)
SWCL4 = 0.333*sw_dep(13) + sw_dep(14) + sw_dep(15) + sw_dep(16)
SWCL5 = sw_dep(17) + sw_dep(18) + sw_dep(19) + 0.571*sw_dep(20)
SWCL6 = 0.429*sw_dep(20) + sw_dep(21) + sw_dep(22) + 0.100*sw_dep(23)
SWCL7 = 0.900*sw_dep(23) + sw_dep(24)
SWCL8 = sw_dep(25) + 0.900*sw_dep(26)
SWCL9 = 0.100*sw_dep(26) + sw_dep(27) + sw_dep(28) + sw_dep(29) + sw_dep(30)
SWCSurface = SWCL1 + SWCL2
SWCSubSurf = 0.5*SWCL3 + SWCL4

SWCL1 = SWCL1 / thickL1
SWCL2 = SWCL2 / thickL2
SWCL3 = SWCL3 / thickL3
SWCL4 = SWCL4 / thickL4
SWCL5 = SWCL5 / thickL5
SWCL6 = SWCL6 / thickL6
SWCL7 = SWCL7 / thickL7
SWCL8 = SWCL8 / thickL8
SWCL9 = SWCL9 / thickL9
SWCSurface = SWCSurface/ (thickL1 + thickL2)
SWCSubSurf = SWCSubSurf/ (0.5*thickL3 + thickL4)

! amounts of NH4
NH4L1 = nh4(1) + nh4(2) + nh4(3) + nh4(4) + nh4(5) + 0.75*nh4(6)
NH4L2 = 0.25*nh4(6) + nh4(7) + nh4(8) + nh4(9)
NH4L3 = nh4(10) + nh4(11) + nh4(12) + 0.667*nh4(13)
NH4L4 = 0.333*nh4(13) + nh4(14) + nh4(15) + nh4(16)
NH4L5 = nh4(17) + nh4(18) + nh4(19) + 0.571*nh4(20)
NH4L6 = 0.429*nh4(20) + nh4(21) + nh4(22) + 0.100*nh4(23)
NH4L7 = 0.900*nh4(23) + nh4(24)
NH4L8 = nh4(25) + 0.900*nh4(26)
NH4L9 = 0.100*nh4(26) + nh4(27) + nh4(28) + nh4(29) + nh4(30)

! amounts of NO3
NO3L1 = no3(1) + no3(2) + no3(3) + no3(4) + no3(5) + 0.75*no3(6)
NO3L2 = 0.25*no3(6) + no3(7) + no3(8) + no3(9)
NO3L3 = no3(10) + no3(11) + no3(12) + 0.667*no3(13)
NO3L4 = 0.333*no3(13) + no3(14) + no3(15) + no3(16)
NO3L5 = no3(17) + no3(18) + no3(19) + 0.571*no3(20)
NO3L6 = 0.429*no3(20) + no3(21) + no3(22) + 0.100*no3(23)
NO3L7 = 0.900*no3(23) + no3(24)
NO3L8 = no3(25) + 0.900*no3(26)
NO3L9 = 0.100*no3(26) + no3(27) + no3(28) + no3(29) + no3(30)


! Water thresholds
SatL1 = (Sat_dep(1) + Sat_dep(2) + Sat_dep(3) + Sat_dep(4) + Sat_dep(5) + 0.75*Sat_dep(6)) / thickL1
SatL2 = (0.25*Sat_dep(6) + Sat_dep(7) + Sat_dep(8) + Sat_dep(9)) / thickL2
SatL3 = (Sat_dep(10) + Sat_dep(11) + Sat_dep(12) + 0.667*Sat_dep(13)) / thickL3
SatL4 = (0.333*Sat_dep(13) + Sat_dep(14) + Sat_dep(15) + Sat_dep(16)) / thickL4
SatL5 = (Sat_dep(17) + Sat_dep(18) + Sat_dep(19) + 0.571*Sat_dep(20)) / thickL5
SatL6 = (0.429*Sat_dep(20) + Sat_dep(21) + Sat_dep(22) + 0.100*Sat_dep(23)) / thickL6
SatL7 = (0.900*Sat_dep(23) + Sat_dep(24)) / thickL7
SatL8 = (Sat_dep(25) + 0.900*Sat_dep(26)) / thickL8
SatL9 = (0.100*Sat_dep(26) + Sat_dep(27) + Sat_dep(28) + Sat_dep(29) + Sat_dep(30)) / thickL9

DulL1 = (Dul_dep(1) + Dul_dep(2) + Dul_dep(3) + Dul_dep(4) + Dul_dep(5) + 0.75*Dul_dep(6)) / thickL1
DulL2 = (0.25*Dul_dep(6) + Dul_dep(7) + Dul_dep(8) + Dul_dep(9)) / thickL2
DulL3 = (Dul_dep(10) + Dul_dep(11) + Dul_dep(12) + 0.667*Dul_dep(13)) / thickL3
DulL4 = (0.333*Dul_dep(13) + Dul_dep(14) + Dul_dep(15) + Dul_dep(16)) / thickL4
DulL5 = (Dul_dep(17) + Dul_dep(18) + Dul_dep(19) + 0.571*Dul_dep(20)) / thickL5
DulL6 = (0.429*Dul_dep(20) + Dul_dep(21) + Dul_dep(22) + 0.100*Dul_dep(23)) / thickL6
DulL7 = (0.900*Dul_dep(23) + Dul_dep(24)) / thickL7
DulL8 = (Dul_dep(25) + 0.900*Dul_dep(26)) / thickL8
DulL9 = (0.100*Dul_dep(26) + Dul_dep(27) + Dul_dep(28) + Dul_dep(29) + Dul_dep(30)) / thickL9

LL15L1 = (ll15_dep(1) + ll15_dep(2) + ll15_dep(3) + ll15_dep(4) + ll15_dep(5) + 0.75*ll15_dep(6)) / thickL1
LL15L2 = (0.25*ll15_dep(6) + ll15_dep(7) + ll15_dep(8) + ll15_dep(9)) / thickL2
LL15L3 = (ll15_dep(10) + ll15_dep(11) + ll15_dep(12) + 0.667*ll15_dep(13)) / thickL3
LL15L4 = (0.333*ll15_dep(13) + ll15_dep(14) + ll15_dep(15) + ll15_dep(16)) / thickL4
LL15L5 = (ll15_dep(17) + ll15_dep(18) + ll15_dep(19) + 0.571*ll15_dep(20)) / thickL5
LL15L6 = (0.429*ll15_dep(20) + ll15_dep(21) + ll15_dep(22) + 0.100*ll15_dep(23)) / thickL6
LL15L7 = (0.900*ll15_dep(23) + ll15_dep(24)) / thickL7
LL15L8 = (ll15_dep(25) + 0.900*ll15_dep(26)) / thickL8
LL15L9 = (0.100*ll15_dep(26) + ll15_dep(27) + ll15_dep(28) + ll15_dep(29) + ll15_dep(30)) / thickL9
```
        manager2 Marker
          aMarker = Updated  # Type a marker to publish
          bMarker = SWIM2  # Type another marker to publish
```csharp
using System;
using ModelFramework;

public class Script 
{      
   [Param] string aMarker;
   [Param] string bMarker;

   [Link] Simulation MySim;
   [Link] Paddock MyPaddock;
   [Input] DateTime Today;
   
   [Output][Units("")] string SimType;
   [Output][Units("")] string SoilType;
   [Output][Units("")] string UrineType;

   [EventHandler] public void OnInitialised()
   {
      SimType = aMarker;
      SoilType = bMarker;  //MyPaddock.Parent.Name.Split('-')[1]
      UrineType = MyPaddock.Name.Split('-')[1];
   }
}
```
        manager2 SetSoilParameters-SWIM2
          # Setup soil properties within a ginve period
          date1 = 01/01/1900  # Enter the date for setting the new properties
          # Soil properties to change
          ExcoValues = 36.91  36.91  36.91  36.91  36.91  36.91  34.39  32.45  31.18  30.23  28.97  27.29  25.78  24.26  22.74  21.61  20.07  18.52  16.98  15.44  13.03  11.75  10.46  10.46  9.35  8.23  8.23  8.23  8.23  8.23  # Enter new values for exchange coefficient of NH4 (exco)
          FipValues = 0.500  0.500  0.500  0.500  0.500  0.500  0.500  0.500  0.500  0.500  0.500  0.500  0.500  0.500  0.500  0.500  0.500  0.500  0.500  0.500  0.500  0.500  0.500  0.500  0.500  0.500  0.500  0.500  0.500  0.500  # Enter new values for exponent coefficient of NH4 (fip)
```csharp
using System;
using ModelFramework;

public class Script 
{
   [Param] DateTime date1;
   [Param] double[] ExcoValues;
   [Param] double[] FipValues;
   
   [Link] Paddock MyPaddock;
   
   [Input] DateTime Today;
   
   private SWIM2 mySoil;
   private bool hasChanged;
   private double[] NewExco;
   private double[] NewFip;
   
   [EventHandler] public void OnInitialised()
   {
      mySoil = (SWIM2) MyPaddock.LinkByName("SWIM2gui");
      int nLayers = mySoil.dlayer.Length;
      mySoil.Get("exco_nh4", out NewExco);
      mySoil.Get("fip_nh4", out NewFip);

      int nLayersChangingEx = NewExco.Length;
      int nLayersChangingFi = NewFip.Length;
      for (int z = 0; z < nLayers; z++)
      {
         if (z < nLayersChangingEx)
            NewExco[z] = ExcoValues[z];
         
         if (z < nLayersChangingFi)
            NewFip[z] = FipValues[z];
      }
      
      hasChanged = false;
   }

   [EventHandler] public void OnPrepare()
   {
      if(!hasChanged)
      {
         if(Today.Date >= date1.Date)
         {
            mySoil.Variable("exco_nh4").Set(NewExco);
            mySoil.Variable("fip_nh4").Set(FipValues);
            hasChanged = true;
         }
      }
   }
}
```
        manager2 ChangeSoilParameters-SWIM2
          # Setup soil properties within a ginve period
          date1 = 18/07/2012  # Enter the first date for new properties
          date2 = 01/12/2012  # Enter the last date for new properties
          # Soil properties to change
          SoilTypeValues = H1_FlxtT3   H1_FlxtT3   H1_FlxtT3   H1_FlxtT3   H1_FlxtT3   H1_FlxtT3   H1_FlxtT3   H2_FlxtT3   H2_FlxtT3   H2_FlxtT3   H2_FlxtT3  # Enter new values for soil type descriptor
```csharp
using System;
using ModelFramework;

public class Script 
{
   [Param] DateTime date1;
   [Param] DateTime date2;
   [Param] string[] SoilTypeValues;
   
   [Link] Paddock MyPaddock;
   
   [Input] DateTime Today;
   
   private SWIM2 mySoil;
   private string[] Old_SoilType;
   private string[] New_SoilType;
   
   [EventHandler] public void OnInitialised()
   {
      mySoil = (SWIM2) MyPaddock.LinkByName("SWIM2gui");
      int nLayers = mySoil.dlayer.Length;
      New_SoilType = new string[nLayers];
      mySoil.Get("soil_type", out Old_SoilType);

      int nLayersChanging = SoilTypeValues.Length;
      for (int z = 0; z < nLayers; z++)
      {
         if (z < nLayersChanging)
         {
            New_SoilType[z] = SoilTypeValues[z];
         }
         else
         {
            New_SoilType[z] = Old_SoilType[z];
         }
      }
      
      
   }

   [EventHandler] public void OnPrepare()
   {
      if(Today.Date == date1.Date)
      {
         mySoil.Variable("soil_type").Set(New_SoilType);
      }
      else if(Today.Date == date2.Date)
      {
         mySoil.Variable("soil_type").Set(Old_SoilType);
      }
   }
}
```
      micromet
        soilalbedo = 0.23
        a_interception = 0
        b_interception = 0
        c_interception = 0
        d_interception = 0
      fertiliser
      irrigation
        automatic_irrigation = off
        asw_depth = 600  # Depth to which ASW is calculated. (mm)
        crit_fr_asw = 0.5  # Fraction of ASW below which irrigation is applied (0-1.0)
        irrigation_efficiency = 1  # Efficiency of the irrigation. (0-1.0)
        irrigation_allocation = off  # Allocation limits
        allocation = 0  # Allocation in mm
        default_no3_conc = 0.0  # Nitrate concentration (ppm N)
        default_nh4_conc = 0.0  # Ammonium concentration (ppm N)
        default_cl_conc = 0.0  # Chloride concentration (ppm Cl)
      surfaceom SurfaceOrganicMatter
        PoolName = grass  # Organic Matter pool name
        type = grass  # Organic Matter type
        mass = 1500  # Initial surface residue (kg/ha)
        cnr = 20  # C:N ratio of initial residue
        standing_fraction = 0  # Fraction of residue standing
      SWIM2gui
        # SWIM boundary conditions
        top_boundary_condition = 0  # Top boundary condition (0=infinite conduct; 1=const potential; 2=limited conductance)
        runoff = 2  # How runoff/ponding will be computed (0=all runoff; 1=all pond; 2=calculate runoff)
        bottom_boundary_condition = 0  # Bottom boundary condition (0=set pot grad; 1=set potential; 2=impermeable; 3=seepage)
        run_solutes = urea  nh4  no3  # List of solutes that SWIM should move
        # SWIM parameters for numerical solution
        max_water_increment = 1.0  # Base water increment value
        # Description of the soil profile
        x = 0         10        20        30        50        70        90        110       140       160       190       210       250       270       330       370       430       470       530       590       670       730       850       930       1070      1150      1270      1350      1450      1500  # List of nodes defining the swim soil layers (mm)
        soil_type = H1_Flxt  H1_Flxt  H1_Flxt  H1_Flxt  H1_Flxt  H1_Flxt  H1_Flxt  H2_Flxt  H2_Flxt  H2_Flxt  -         H3_Flxt  H3_Flxt  H3_Flxt  H3_Flxt  H4_Flxt  H4_Flxt  H4_Flxt  H4_Flxt  -         H5_Flxt  H5_Flxt  -         H6_Flxt  -         H7_Flxt  H7_Flxt  H7_Flxt  H7_Flxt  H7_Flxt  # Tags defining the soil type (horizon) for each layer
        psi = -165     -160     -155     -150     -144     -138     -133     -127     -123     -120     -117     -112     -108     -104     -100     -100     -115     -135     -150     -160     -160     -150     -125     -110     -100     -100     -100     -100     -100     -100  # Initial values of the soil matric potential for each layer (cm)
        salb = 0.32  # Albedo of bare soil
        # Infiltration/runoff parameters
        surface_conductance = 0.005  # Surface water conductance (1/cm)
        surface_storage = 1.00  # Water storage capacity of the soil surface (surface roughness - mm)
        runoff_rate_factor = 7.0
        # Bottom boundary condition parameters
        bottom_constant_gradient = 0.0  # Constant matric potential gradient at the bottom of the soil (used if bottom boundary condition = 0)
        bottom_constant_potential = 0.0  # Constant soil matric potential at the bottom of the soil (used if bottom boundary condition = 1 or 3)
        # Subsurface drainage settings
        subsurface_drain = off  # Select whether subsurface drainage is on or off
        drain_depth = 600  # Depth of the drainage system (mm)
        drain_spacing = 1000  # Space between mole/tile drains (mm)
        drain_radius = 40  # Radius of the mole/tile drains (mm)
        drain_klat = 5000  # Hydraulic conductivity of mole/tile drains (mm/day)
        drain_impdepth = 700  # Depth of the impermeable layer (mm)
        # Bypass flow parameters
        bypass_flow = off  # Select whether calculation for bypass flow is on or off
        bypass_depth = 11  # Bypass flow depth (mm)
        bypass_conductance = 0.1  # Conductance of macropores during bypass flow (1/cm)
        bypass_storage = 0.1  # Bypass flow storage
        # If running a new (unparameterised) crop or solute
        newcrop1 = canola  # Name of new crop
        newsolute1 = dcd  # Name of new solute
        ini XML(DoNotChange): filename=%apsim%\Model\SWIM2gui.xml
        ini SWIM2Parameters: filename=Flaxton(SWIM2GuiParameters).xml
      SoilNitrogen
        # Parameters for initialising soil organic matter
        InitialFOMAmount = 1500  # Initial FOM amount in the soil (kgDM/ha)
        InitialFOMDepth = 1000  # Depth to distributed initial FOM (mm)
        InitialCNrFOM = 30  # C:N ratio of initial FOM
        HumusCNr = 11  # C:N ratio of soil humus
        # Initial soil status (values for each layer)
        ph = 6.00   6.00   6.00   6.00   6.00   6.00   6.00   6.00   6.00   6.00   6.00   6.00   6.00   6.00   6.00   6.00   6.00   6.00   6.00   6.00   6.00   6.00   6.00   6.00   6.00   6.00   6.00   6.00   6.00   6.00  # Initial soil pH
        oc = 4.606  4.585  4.558  4.524  4.476  4.422  4.228  3.783  3.346  2.961  2.623  2.297  1.991  1.688  1.371  1.095  0.881  0.716  0.577  0.456  0.363  0.292  0.237  0.201  0.179  0.167  0.160  0.156  0.154  0.153  # Initial soil organic carbon content (%)
        finert = 0.415  0.420  0.427  0.435  0.446  0.457  0.512  0.567  0.622  0.668  0.708  0.746  0.780  0.813  0.847  0.876  0.898  0.916  0.931  0.944  0.953  0.961  0.969  0.973  0.976  0.979  0.981  0.982  0.983  0.983  # Inert C fraction, of soil humus (0-1)
        fbiom = 0.080  0.080  0.080  0.080  0.080  0.079  0.077  0.073  0.065  0.056  0.045  0.034  0.025  0.017  0.010  0.008  0.008  0.008  0.008  0.008  0.008  0.008  0.008  0.008  0.008  0.008  0.008  0.008  0.008  0.008  # Microbial biomass fraction, of total OC (0-1)
        no3ppm = 40.00  40.00  40.00  40.00  40.00  40.00  40.00  25.00  25.00  25.00  10.00  10.00  10.00  10.00  5.00   5.00   5.00   5.00   5.00   5.00   5.00   4.00   1.00   0.10   0.10   0.10   0.10   0.10   0.10   0.10  # Initial concentration of NO3 in the soil (ppm)
        nh4ppm = 6.00   6.00   6.00   6.00   6.00   6.00   6.00   1.00   1.00   1.00   0.50   0.50   0.50   0.50   0.30   0.30   0.30   0.30   0.30   0.30   0.30   0.25   0.08   0.05   0.05   0.05   0.05   0.05   0.05   0.05  # Initial concentration of NH4 in the soil (ppm)
        ureappm = 0.00   0.00   0.00   0.00   0.00   0.00   0.00   0.00   0.00   0.00   0.00   0.00   0.00   0.00   0.00   0.00   0.00   0.00   0.00   0.00   0.00   0.00   0.00   0.00   0.00   0.00   0.00   0.00   0.00   0.00  # Initial concentration of urea in the soil (ppm)
        # Parameters for computing Nitrification
        Nitrification_pot = 90  # Potential nitrification rate (mg NH4/kg soil/day)
        nh4_at_half_pot = 30  # NH4 concentration at half of nitrification rate (ppm)
        stf_Nitrif_Topt = 25  # Optimal temperature for nitrification, at aerobic and anaerobic conditions (oC)
        n2oLossFactor = 0.002  # Fraction of nitrification lost as denitrification (0-1)
      SoilTemperature2 SoilTemperature
        # Basic parameters for SoilTemperature
        MaxTTimeDefault = 14  # Time of the day for maximum temperature (24 hours clock)
        BoundaryLayerConductanceSource = calc  # How the BoundaryLayerCounductance will be defined
        BoundaryLayerConductance = 20  # Value to use if BoundaryLayerConductance is constant (W/m2/K)
        BoundaryLayerConductanceIterations = 1  # Number of iterations to calculate BoundaryLayerConductance (0-10)
        NetRadiationSource = calc  # Source for net radiation values
        DefaultWindSpeed = 3.0  # Default value for wind speed (m/s)
        DefaultAltitude = 50  # Local altitude (m)
        DefaultInstrumentHeight = 1.2  # Height of measured wind and temperature (m)
        BareSoilHeight = 57  # Average height of the bare soil roughness (mm)
        # Parameters needed when using SWIM2
        Clay = 31.5  31.5  31.5  31.5  31.5  31.5  31.5  31.5  31.5  31.5  31.5  33.5  33.5  33.5  33.5  35.0  35.0  35.0  35.0  25.5  16.0  16.0  14.0  12.0  12.0  12.0  12.0  12.0  12.0  12.0  # Clay content for each soil layer (%)
      CanolaSWIM
        MaxRootDepth = 750  # Maximum rooting depth (mm) 0=no restriction
        LL = 0.189  0.189  0.189  0.189  0.189  0.189  0.189  0.200  0.200  0.200  0.195  0.192  0.192  0.192  0.192  0.162  0.162  0.162  0.162  0.163  0.164  0.164  0.173  0.179  0.194  0.202  0.202  0.202  0.202  0.202  # LL values
        KL = 0.15   0.15   0.15   0.15   0.15   0.15   0.15   0.14   0.13   0.13   0.13   0.12   0.10   0.08   0.05   0.05   0.08   0.08   0.08   0.06   0.00   0.00   0.00   0.00   0.00   0.00   0.00   0.00   0.00   0.00  # KL values
        XF = 1.00   1.00   1.00   1.00   1.00   1.00   1.00   0.90   0.90   0.90   0.75   0.10   0.10   0.10   0.10   0.25   0.50   0.50   0.50   0.25   0.00   0.00   0.00   0.00   0.00   0.00   0.00   0.00   0.00   0.00  # XF values
        Wsource = apsim  # water source
        ini: filename=CanolaSWIM(WFT).xml
      AgPasture
        # Initial values for each species to be simulated
        SpeciesToSimulate = Ryegrass  # Name of the species to be simulated
        InitialShootDM = 0.01  # Initial above ground dry matter weight (kgDM/ha)
        InitialRootDM = 0.01  # Initial root dry matter weight (kgDM/ha)
        InitialRootDepth = 1000  # Initial rooting depth (mm)
        WaterUptakeSource = apsim  # Water uptake done by AgPasture (calc) or by apsim?
        # Additional parameters
        MinimumWaterFreePorosity = 0.15  # Minimum macroporosity for optimum plant growth (0-1, use DUL if negative)
        SoilSaturationEffectMax = 0.25  # Coefficient for growth limitations due to soil moisture saturation (0-1)
        SpecificLeafArea = 24  # Specific leaf area, per dry matter weight (m2/kgDM)
        UseRootBySpecies = yes  # Root distribution is determined for each species (yes/no)
        SpecificRootLength = 120  # Specific root length (m/gDM)
        # - N uptake parameters
        UseNAvailableBySpecies = yes  # Compute available N for each species separated?
        UseAlternativeNUptake = yes  # Compute N uptake for each species separated?
        NAvailabilityMethod = 3  # Choose the method for determining plant available N
        MaximumUptakeRateNH4 = 1.00  # Maximum NH4 uptake rate for each species (ppm/day)
        MaximumUptakeRateNO3 = 1.00  # Maximum NO3 uptake rate for each species (ppm/day)
        kNH4 = 1.0  # Coefficient for NH4 availability for each layer (0-1)
        kNO3 = 2.0  # Coefficient for NO3 availability for each layer (0-1)
      outputfile Results1: filename=RapeGrassSimulation Pdk1-NoUrine Results1.out; title=RapeGrassSimulation Pdk1-NoUrine Results1
        variables
          variable:
            dd/mm/yyyy as Date
            rain as Rain
            Irrigation
            es as Evaporation
            sw_uptake() as RapeWaterUptake
            agpasture.WaterUptake as GrassWaterUptake
            pond as PondedWater
            runoff as Runoff
            drain as Drainage
            sw_dep() as SoilWaterAmount
            Fertiliser as FertiliserN
            emission_nh3() as VolatilisedN format 3
            dnit() as DenitrifiedN format 3
            n2o_atm() as N2Oemission format 3
            NO3ConcFlow as LeachateNO3(120cm)
            NO3ConcMlayer
            leach_no3 as NO3Leached format 3
            canolaSWIM.n_uptake as NUptakeRape1
            RapeNUptake as NUptakeRape
            agpasture.SoilUptakeN as NUptakeGrass
            urea() as UreaAmount
            nh4() as NH4Amount
            no3() as NO3Amount
            hum_n() as SoilHumusN
            biom_n() as SoilBiomassN
            fom_n() as SoilFOMN
            surfaceom_n as SurfaceOMN
            dlt_n_min() as NetSoilMineralisation format 3
            dlt_n_min_res() as NetResidueMineralisation format 3
            canolaSWIM.TotalWt as RapeDM
            agpasture.TotalWt as GrassDM
            CanolaSWIM.TopsTotalWt as RapeAboveGroundDM
            AgPasture.AboveGroundWt as GrassAboveGroundDM
            CanolaSWIM.RootTotalWt as RapeBelowGroundDM
            AgPasture.RootWt as GrassBelowGroundDM
            canolaSWIM.TotalN as RapeTotalN
            agpasture.TotalN as GrassTotalN
            canolaSWIM.TopsTotalN as RapeTopsN
            agpasture.abovegroundN as GrassTopsN
            canolaSWIM.RootTotalN as RapeRootN
            agpasture.RootN as GrassRootN
            canolaSWIM.TopsTotalnconc as RapeNconcTops
            agpasture.AboveGroundNConc as GrassNconcTops
            canolaSWIM.LAI as RapeLAI
            agpasture.LAITotal as GrassLAI
            canolaSWIM.root_depth as RapeRootDepth
            agpasture.rootdepth as GrassRootDepth
            RapeDMremoved
            GrassDMremoved
            StageName
            SWCSurface
            SWCSubSurf
            SWCL1
            SWCL2
            SWCL3
            SWCL4
            SWCL5
            SWCL6
            SWCL7
            SWCL8
            NH4L1
            NH4L2
            NH4L3
            NO3L1
            NO3L2
            NO3L3
            sat_dep() as SAT
            dul_dep() as DUL
            ll15_dep() as LL15
        events Reporting Frequency: event=end_day
      outputfile Results2: filename=RapeGrassSimulation Pdk1-NoUrine Results2.out; title=RapeGrassSimulation Pdk1-NoUrine Results2
        variables
          variables: dd/mm/yyyy as Date, dlayer, sw, nh4ppm, no3ppm, sat, dul, ll15, dnit format 5
        events Reporting Frequency: event=end_day
    area Pdk2-WithUrine -> /Simulations/RapeGrassSimulation/Pdk1-NoUrine
      folder Manager folder -> /Simulations/RapeGrassSimulation/Pdk1-NoUrine/Manager folder
        operations Operations Urine
          18/07/2012  Fertiliser apply amount = 475 (kg/ha), depth = 2.5 (mm), type = urea_N ()
          18/07/2012  Fertiliser apply amount = 100 (kg/ha), depth = 10.0 (mm), type = urea_N ()
          18/07/2012  Fertiliser apply amount = 12 (kg/ha), depth = 20.0 (mm), type = urea_N ()
          18/07/2012  Fertiliser apply amount = 7 (kg/ha), depth = 32.5 (mm), type = urea_N ()
          18/07/2012  Fertiliser apply amount = 4 (kg/ha), depth = 50.0 (mm), type = urea_N ()
          18/07/2012  Fertiliser apply amount = 1.8 (kg/ha), depth = 70.0 (mm), type = urea_N ()
          18/07/2012  Fertiliser apply amount = 0.2 (kg/ha), depth = 90.0 (mm), type = urea_N ()
          18/07/2012  Irrigation apply amount = 10 (mm)
      outputfile Results1 -> /Simulations/RapeGrassSimulation/Pdk1-NoUrine/Results1: filename=RapeGrassSimulation Pdk2-WithUrine Results1.out; title=RapeGrassSimulation Pdk2-WithUrine Results1
        variables -> /Simulations/RapeGrassSimulation/Pdk1-NoUrine/Results1/Variables
        events Reporting Frequency -> /Simulations/RapeGrassSimulation/Pdk1-NoUrine/Results1/Reporting Frequency
      outputfile Results2 -> /Simulations/RapeGrassSimulation/Pdk1-NoUrine/Results2: filename=RapeGrassSimulation Pdk2-WithUrine Results2.out; title=RapeGrassSimulation Pdk2-WithUrine Results2
        variables -> /Simulations/RapeGrassSimulation/Pdk1-NoUrine/Results2/Variables
        events Reporting Frequency -> /Simulations/RapeGrassSimulation/Pdk1-NoUrine/Results2/Reporting Frequency
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