folder Simulations: version=36; creator=Apsim 7.6-r3557
  simulation No2DairyNZ8292
    clock
      start_date = 30/06/1982  # Enter the start date of the simulation
      end_date = 30/06/1992  # Enter the end date of the simulation
    metfile met: filename=Ruakura.met
    summaryfile
    area No2DairyNZ
      AgPasture ryegrass_clover_paspalum
        thisCropName = ryegrass_clover_paspalum  # Crop name shown as on the simulation tree
        speciesToSimulate = ryegrass whiteclover paspalum  # Name of species to simulate
        speciesName = ryegrass whiteclover paspalum  # Species names
        micrometType = grass grass grass  # crop type for MicroMet
        isLegume = 0 1 0  # Legume species? no=0, yes=1
        photoPath = 3 3 4  # C3 or C4 species? C3=3, C4=4
        rootDepth = 900  300 900
        tempMinGrowth = 2 4 10  # Minimum temperature for growth
        growthTmax = 32 32 40  # Maximum temperature for growth
        tempOptGrowth = 20 22 20  # Optimum temperature for growth
        exponentTempGrowth = 2 2 1.2  # Curvture of growth response to temperature
        tempMinTissueTurnover = 2 2 5  # Minimum temperature for mass flux
        tempMaxTissueTurnover = 20 20 20  # Optimum temperature for mass flux
        referenceGLFWTissueTurnover = 2 2 2  # Scale factor for response of mass flux to soil moisture
        referenceGLFWTissueTurnover = 0.5 0.5 0.5  # Optimum soil moisture for mass flux
        useHeatStress = yes  yes  yes  # Consider effects of high temperatures on photosynthesis? (yes/no)
        tempOnsetHeatStress = 28 28 35  # Heat effects- Onset temperature
        tempFullHeatStress = 35 35 40  # Heat effects- Full temperature
        sumTempHeatStress = 50 50 50  # Heat effects- Temperature sum for recovery
        useColdStress = yes  yes  yes  # Consider effects of low temperatures on photosynthesis? (yes/no)
        tempOnsetColdStress = 0 0 8  # Cold effects- Onset temperature
        tempFullColdStress = -3 -3 3  # Cold effects- Full temperature
        sumTempColdStress = 20 20 50  # Cold effects- Temperature sum for recovery
        Pm = 1 1 1.2  # Reference CO2 assimilation rate (mg CO2/m2.s)
        maintRespiration = 3 3 3  # Maintenance respiration coefficient (%)
        growthEfficiency = 0.75 0.75 0.75
        SpecificLeafArea = 20 20 20
        lightExtCoeff = 0.5 0.8 0.6  # Light extinction coefficient
        stockParameter = 0.05 0.05 0.05  # Stock influence parameter
        maxRootFraction = 0.25 0.25 0.25  # Maximum biomass fraction allocated to root
        leafRate = 3 3 3.5  # Reference leaf appearance rate without stress
        fLeaf = 0.7 0.56 0.7  # Reference growth partition to leaves
        fStolon = 0 0.2 0  # Reference growth partition to stolon
        digestLive = 0.6 0.6 0.6  # Digestibility of live plant material
        digestDead = 0.2 0.2 0.2  # Digestibility of dead plant material
        dmshoot = 1500 350 100  # Initial shoot dry matter (kg/ha)
        dmgreenmin = 500 50 20  # Minimum green dry matter (kg/ha)
        NconcOptimum_leaves = 4 4.5 3  # N concentration - leaf optimum
        NconcMaximum_leaves = 5 5.5 3.5  # N concentration - leaf luxary
        NconcMinimum_leaves = 1.2 2.0 0.5  # N concentration - leaf scenescent
        RelativeNconc_Stems = 0.5 0.5 0.5  # Stem N concentration as fraction of leaf N concentration
        RelativeNconc_Stolons = 0  0.5 0  # Stolon N concentration as fraction of leaf N concentration
        RelativeNconc_Roots = 0.5 0.5 0.5  # Root N concentration as fraction of leaf N concentration
        NMinFix = 0 0.2 0  # Minimum N fixation (when soil N is sufficient)
        NMaxFix = 0 0.6 0  # Maximum N fixation (when soil N is unavailable)
        CO2PmaxScale = 700 700 150  # CO2 - Scale factor for CO2 effect on photosynthesis
        CO2NScale = 600 600 600  # CO2 - Scale factor for CO2 effects on plant N concentration
        CO2NMin = 0.7 0.7 0.7  # CO2 - Minimum fraction that plant N concentration may reduce to uder elevated CO2
        CO2NCurvature = 2 2 2  # CO2 - Curvature factor of CO2 effect on plant N concentration
        Frgr = 1 1 1  # Relative growth factor
        rlvp = 1.0 1.0 1.0  # Root distribution of swards (relative to each soil layer)
      micromet
        soilalbedo = 0.23
        a_interception = 0
        b_interception = 0
        c_interception = 0
        d_interception = 0
      Soil SoilNo2Dairy: Site=Dalby; Region=Darling Downs; State=Queensland; Longitude=151.305
        Comment = Soil naming structure: \State\Region\Classification-Local Name (Site/district and locator number)  # Comments
        SoilType = Black Vertosol  # Soil description
        NearestTown = Dalby, Q 4405
        ApsoilNumber = 27
        Latitude = -27.12  # Latitude (WGS84)
        LocationAccuracy = +/-20m
        DataSource = CSIRO Sustainable Ecosystems, Toowoomba
        InitialWater Initial water: RelativeTo=ll15; FractionFull=0.93; PercentMethod=FilledFromTop
        Water
          Thickness  BD    AirDry  LL15  DUL   SAT
          100        1.25  0.1     0.14  0.35  0.48
          200        1.31  0.1     0.14  0.35  0.48
          300        1.23  0.1     0.14  0.32  0.48
          300        1.24  0.1     0.14  0.32  0.48
          300        1.25  0.1     0.14  0.2   0.45
          300        1.26  0.1     0.14  0.2   0.45
          300        1.29  0.1     0.14  0.2   0.45
          SoilCrop agpasture: LL=[0.14, 0.14, 0.14, 0.14, 0.14, 0.14, 0.14]; KL=[0.1, 0.1, 0.1, 0.02, 0.02, 0, 0]; XF=[1, 1, 1, 1, 1, 0, 0]
          SoilCrop ryegrass_clover: LL=[0.14, 0.14, 0.14, 0.14, 0.14, 0.14, 0.14]; KL=[0.1, 0.1, 0.1, 0.05, 0.02, 0, 0]; XF=[1, 1, 1, 1, 1, 0, 0]
          SoilCrop ryegrass_clover_paspalum: LL=[0.14, 0.14, 0.14, 0.14, 0.14, 0.14, 0.14]; KL=[0.1, 0.1, 0.1, 0.05, 0.02, 0, 0]; XF=[1, 1, 1, 1, 1, 0, 0]
          SoilCrop ryegrass: LL=[0.14, 0.14, 0.14, 0.14, 0.14, 0.14, 0.14]; KL=[0.1, 0.1, 0.1, 0.02, 0.02, 0, 0]; XF=[1, 1, 1, 1, 1, 0, 0]
          SoilCrop clover: LL=[0.14, 0.14, 0.14, 0.14, 0.14, 0.14, 0.14]; KL=[0.1, 0.1, 0.1, 0.02, 0.02, 0, 0]; XF=[1, 1, 1, 1, 1, 0, 0]
          SoilCrop maize: LL=[0.14, 0.14, 0.03, 0.02, 0.02, 0.02, 0.02]; KL=[0.06, 0.06, 0.06, 0.06, 0.06, 0.06, 0.06]; XF=[1, 1, 1, 1, 1, 1, 1]
          SoilCrop cotton: LL=[0.14, 0.14, 0.03, 0.02, 0.02, 0.02, 0.02]; KL=[0.1, 0.1, 0.1, 0.1, 0.09, 0.07, 0.05]; XF=[1, 1, 1, 1, 1, 1, 1]
          SoilCrop sorghum: LL=[0.14, 0.14, 0.03, 0.02, 0.02, 0.02, 0.02]; KL=[0.07, 0.07, 0.07, 0.05, 0.05, 0.04, 0.03]; XF=[1, 1, 1, 1, 1, 1, 0.9]
          SoilCrop slurp: LL=[0.14, 0.14, 0.03, 0.02, 0.02, 0.02, 0.02]; KL=[0.06, 0.06, 0.06, 0.06, 0.06, 0.06, 0.06]; XF=[1, 1, 1, 1, 1, 1, 1]
        SoilWater: SummerCona=3.5; SummerU=6; SummerDate=1-Nov; WinterCona=2; WinterU=2; WinterDate=1-apr; DiffusConst=88; DiffusSlope=35; Salb=0.13; CN2Bare=73; CNRed=20; CNCov=0.8; Thickness=[100, 200, 300, 300, 300, 300, 300]; SWCON=[0.3, 0.4, 0.4, 0.4, 0.4, 0.4, 0.4]
        SoilOrganicMatter: RootCN=40; RootWt=1000; SoilCN=12; EnrACoeff=7.4; EnrBCoeff=0.2
          Thickness  OC   FBiom  FInert
          100        2.5  0.05   0
          200        1.5  0.05   0
          300        0.5  0.02   0
          300        0    0.02   0
          300        0    0.01   0
          300        0    0.01   0
          300        0    0.01   0
        Analysis: Thickness=[100, 200, 300, 300, 300, 300, 300]; PH=[6, 6, 6, 6, 6, 6, 6]
        Sample Initial nitrogen
          Thickness  NO3      NH4
          150        7.61905  0.13245
          150        7.27008  0.13245
          300        3.87147  0.13245
          300        3.84025  0.13245
          300        3.80952  0.13245
          300        3.77929  0.13245
          300        3.6914   0.13245
      fertiliser
      surfaceom Surface Organic Matter
        PoolName = AgPasture  # Organic Matter pool name
        type = grass  # Organic Matter type
        mass = 1000  # Initial surface residue (kg/ha)
        cnr = 15  # C:N ratio of initial residue
        standing_fraction = 0  # Fraction of residue standing
      manager Harvest specified dates28 at No2Dairy3
        # Regular harvest or grazing
        AgPasture = ryegrass_clover_paspalum  # Enter pasture type
        date1 = 1/7/1900  # Enter the first harvest or grazing date
        amount_type = SetResidueAmount  # Select the amount type
        amount = 1000  # Enter herbage amount
        interval = 0  # Enter harvest interval (not needed in this case)
        # Material returns
        dm_frac = 0.75  # Fraction of herbage returned as excreta
        urine_n_frac = 0.6  # Fraction of nitrogen returned as urine
        urine_depth = 150  # Urine deposit depth (mm)
        on end_of_day:
```
account = account + 1
dm_som = 0
dm_removed = 0
n_returned =0
n_removed =0
n_som = 0
n_urine = 0
n_urine1 = 0
n_urine2 = 0
if (year = 1981) then
   if (today = date('20/07/1981')) or
 (today = date('15/09/1981')) or
 (today = date('30/09/1981')) or
 (today = date('28/10/1981')) or
 (today = date('24/11/1981')) or
 (today = date('15/12/1981')) then
               '[AgPasture]' graze type = '[amount_type]', amount = [amount] (kg/ha)
              digest = DefoliatedDigestibility
              dm_som = HarvestWt * (1-digest)
                
              n_removed  = HarvestN *(1.0-[dm_frac])
              n_returned = HarvestN * [dm_frac]
              n_som      = n_returned * ( 1.0 - [urine_n_frac] )
              n_urine    = n_returned *  [urine_n_frac]  
              n_urine1 = 0.6 * n_urine
              n_urine2 = 0.4 * n_urine
              'Surface Organic Matter' add_surfaceom name = '[AgPasture]' , type =  grass, mass = dm_som (kg/ha), n = n_som (kg/ha)
              'fertiliser' apply amount =  n_urine1  (kg/ha), depth = 50  (mm), type = urea_n ()
              'fertiliser' apply amount =  n_urine2  (kg/ha), depth = 150 (mm), type = urea_n ()
  endif             
elseif (year = 1982) then
 if (today = date('18/05/1982')) or
 (today = date('17/06/1982')) or
 (today = date('15/07/1982')) or
 (today = date('12/08/1982')) or
 (today = date('9/09/1982')) or
 (today = date('7/10/1982')) or
 (today = date('4/11/1982')) or
 (today = date('2/12/1982')) or
 (today = date('30/12/1982')) then
              '[AgPasture]' graze type = '[amount_type]', amount = [amount] (kg/ha)
              digest = DefoliatedDigestibility     
              dm_som = HarvestWt * (1-digest)
               
              n_removed  = HarvestN *(1.0-[dm_frac])
              n_returned = HarvestN * [dm_frac]
              n_som      = n_returned * ( 1.0 - [urine_n_frac] )
              n_urine    = n_returned *  [urine_n_frac]  
              n_urine1 = 0.6 * n_urine
              n_urine2 = 0.4 * n_urine
              'Surface Organic Matter' add_surfaceom name = '[AgPasture]' , type =  grass, mass = dm_som (kg/ha), n = n_som (kg/ha)
              'fertiliser' apply amount =  n_urine1  (kg/ha), depth = 50  (mm), type = urea_n ()
              'fertiliser' apply amount =  n_urine2  (kg/ha), depth = 150 (mm), type = urea_n () 
  endif            
elseif (year = 1983) or (year = 1984) then
 if (today = date('27/01/1983')) or
 (today = date('24/02/1983')) or
 (today = date('24/03/1983')) or
 (today = date('21/04/1983')) or
 (today = date('19/05/1983')) or
 (today = date('16/06/1983')) or
 (today = date('14/07/1983')) or
 (today = date('11/08/1983')) or
 (today = date('8/09/1983')) or
 (today = date('6/10/1983')) or
 (today = date('3/11/1983')) or
 (today = date('30/11/1983')) or
 (today = date('29/12/1983')) or
 (today = date('26/01/1984')) or
 (today = date('23/02/1984')) or
 (today = date('22/03/1984')) or
 (today = date('19/04/1984')) or
 (today = date('17/05/1984')) or
 (today = date('14/06/1984')) or
 (today = date('12/07/1984')) or
 (today = date('9/08/1984')) or
 (today = date('6/09/1984')) or
 (today = date('4/10/1984')) or
 (today = date('1/11/1984')) or
 (today = date('29/11/1984')) or
 (today = date('28/12/1984')) then
              '[AgPasture]' graze type = '[amount_type]', amount = [amount] (kg/ha)
              digest = DefoliatedDigestibility            
              dm_som = HarvestWt * (1-digest)
                                
              n_removed  = HarvestN *(1.0-[dm_frac])
              n_returned = HarvestN * [dm_frac]
              n_som      = n_returned * ( 1.0 - [urine_n_frac] )
              n_urine    = n_returned *  [urine_n_frac]  
              n_urine1 = 0.6 * n_urine
              n_urine2 = 0.4 * n_urine
              'Surface Organic Matter' add_surfaceom name = '[AgPasture]' , type =  grass, mass = dm_som (kg/ha), n = n_som (kg/ha)
              'fertiliser' apply amount =  n_urine1  (kg/ha), depth = 50  (mm), type = urea_n ()
              'fertiliser' apply amount =  n_urine2  (kg/ha), depth = 150 (mm), type = urea_n () 
  endif              
elseif (year = 1985) or (year = 1986) then
 if (today = date('24/01/1985')) or
 (today = date('20/02/1985')) or
 (today = date('21/03/1985')) or
 (today = date('18/04/1985')) or
 (today = date('16/05/1985')) or
 (today = date('13/06/1985')) or
 (today = date('11/07/1985')) or
 (today = date('7/08/1985')) or
 (today = date('5/09/1985')) or
 (today = date('3/10/1985')) or
 (today = date('31/10/1985')) or
 (today = date('28/11/1985')) or
 (today = date('27/12/1985')) or
 (today = date('23/01/1986')) or
 (today = date('20/02/1986')) or
 (today = date('20/03/1986')) or
 (today = date('17/04/1986')) or
 (today = date('15/05/1986')) or
 (today = date('12/06/1986')) or
 (today = date('10/07/1986')) or
 (today = date('8/08/1986')) or
 (today = date('4/09/1986')) or
 (today = date('2/10/1986')) or
 (today = date('30/10/1986')) or
 (today = date('27/11/1986')) or
 (today = date('24/12/1986')) then
              '[AgPasture]' graze type = '[amount_type]', amount = [amount] (kg/ha)
              digest = DefoliatedDigestibility             
              dm_som = HarvestWt * (1-digest)
               
              n_removed  = HarvestN *(1.0-[dm_frac])
              n_returned = HarvestN * [dm_frac]
              n_som      = n_returned * ( 1.0 - [urine_n_frac] )
              n_urine    = n_returned *  [urine_n_frac]  
              n_urine1 = 0.6 * n_urine
              n_urine2 = 0.4 * n_urine
              'Surface Organic Matter' add_surfaceom name = '[AgPasture]' , type =  grass, mass = dm_som (kg/ha), n = n_som (kg/ha)
              'fertiliser' apply amount =  n_urine1  (kg/ha), depth = 50  (mm), type = urea_n ()
              'fertiliser' apply amount =  n_urine2  (kg/ha), depth = 150 (mm), type = urea_n ()
  endif             
elseif (year = 1987) or (year = 1988) then
 if (today = date('23/01/1987')) or
 (today = date('20/02/1987')) or
 (today = date('19/03/1987')) or
 (today = date('16/04/1987')) or
 (today = date('14/05/1987')) or
 (today = date('11/06/1987')) or
 (today = date('9/07/1987')) or
 (today = date('5/08/1987')) or
 (today = date('4/09/1987')) or
 (today = date('1/10/1987')) or
 (today = date('29/10/1987')) or
 (today = date('26/11/1987')) or
 (today = date('23/12/1987')) or
 (today = date('21/01/1988')) or
 (today = date('18/02/1988')) or
 (today = date('17/03/1988')) or
 (today = date('14/04/1988')) or
 (today = date('12/05/1988')) or
 (today = date('9/06/1988')) or
 (today = date('7/07/1988')) or
 (today = date('4/08/1988')) or
 (today = date('31/08/1988')) or
 (today = date('29/09/1988')) or
 (today = date('27/10/1988')) or
 (today = date('24/11/1988')) or
 (today = date('22/12/1988')) then
              '[AgPasture]' graze type = '[amount_type]', amount = [amount] (kg/ha)
              digest = DefoliatedDigestibility
              dm_som = HarvestWt * (1-digest)
                             
              n_removed  = HarvestN *(1.0-[dm_frac])
              n_returned = HarvestN * [dm_frac]
              n_som      = n_returned * ( 1.0 - [urine_n_frac] )
              n_urine    = n_returned *  [urine_n_frac]  
              n_urine1 = 0.6 * n_urine
              n_urine2 = 0.4 * n_urine
              'Surface Organic Matter' add_surfaceom name = '[AgPasture]' , type =  grass, mass = dm_som (kg/ha), n = n_som (kg/ha)
              'fertiliser' apply amount =  n_urine1  (kg/ha), depth = 50  (mm), type = urea_n ()
              'fertiliser' apply amount =  n_urine2  (kg/ha), depth = 150 (mm), type = urea_n ()
  endif                
elseif (year = 1989) or (year = 1990) then
 if (today = date('19/01/1989')) or
 (today = date('16/02/1989')) or
 (today = date('16/03/1989')) or
 (today = date('13/04/1989')) or
 (today = date('11/05/1989')) or
 (today = date('8/06/1989')) or
 (today = date('6/07/1989')) or
 (today = date('3/08/1989')) or
 (today = date('31/08/1989')) or
 (today = date('28/09/1989')) or
 (today = date('26/10/1989')) or
 (today = date('23/11/1989')) or
 (today = date('21/12/1989')) or
 (today = date('18/01/1990')) or
 (today = date('15/02/1990')) or
 (today = date('19/03/1990')) or
 (today = date('12/04/1990')) or
 (today = date('9/05/1990')) or
 (today = date('7/06/1990')) or
 (today = date('5/07/1990')) or
 (today = date('2/08/1990')) or
 (today = date('30/08/1990')) or
 (today = date('27/09/1990')) or
 (today = date('25/10/1990')) or
 (today = date('22/11/1990')) or
 (today = date('20/12/1990')) then
              '[AgPasture]' graze type = '[amount_type]', amount = [amount] (kg/ha)
              digest = DefoliatedDigestibility      
              dm_som = HarvestWt * (1-digest)
                
              n_removed  = HarvestN *(1.0-[dm_frac])
              n_returned = HarvestN * [dm_frac]
              n_som      = n_returned * ( 1.0 - [urine_n_frac] )
              n_urine    = n_returned *  [urine_n_frac]  
              n_urine1 = 0.6 * n_urine
              n_urine2 = 0.4 * n_urine
              'Surface Organic Matter' add_surfaceom name = '[AgPasture]' , type =  grass, mass = dm_som (kg/ha), n = n_som (kg/ha)
              'fertiliser' apply amount =  n_urine1  (kg/ha), depth = 50  (mm), type = urea_n ()
              'fertiliser' apply amount =  n_urine2  (kg/ha), depth = 150 (mm), type = urea_n ()
  endif                
elseif (year = 1991) or (year = 1992) or (year = 1993) then
 if (today = date('17/01/1991')) or
 (today = date('14/02/1991')) or
 (today = date('13/03/1991')) or
 (today = date('11/04/1991')) or
 (today = date('9/05/1991')) or
 (today = date('6/06/1991')) or
 (today = date('4/07/1991')) or
 (today = date('1/08/1991')) or
 (today = date('29/08/1991')) or
 (today = date('26/09/1991')) or
 (today = date('24/10/1991')) or
 (today = date('21/11/1991')) or
 (today = date('19/12/1991')) or
 (today = date('16/01/1992')) or
 (today = date('13/02/1992')) or
 (today = date('12/03/1992')) or
 (today = date('9/04/1992')) or
 (today = date('7/05/1992')) or
 (today = date('4/06/1992')) or
 (today = date('3/07/1992')) or
 (today = date('30/07/1992')) or
 (today = date('31/08/1992')) or
 (today = date('25/09/1992')) or
 (today = date('28/10/1992')) or
 (today = date('26/11/1992')) or
 (today = date('23/12/1992')) or
 (today = date('21/01/1993')) or
 (today = date('19/02/1993')) or
 (today = date('18/03/1993')) or
 (today = date('22/04/1993')) or
 (today = date('28/05/1993')) or
 (today = date('9/07/1993')) or
 (today = date('2/09/1993')) or
 (today = date('1/10/1993')) or
 (today = date('29/10/1993')) then
             '[AgPasture]' graze type = '[amount_type]', amount = [amount] (kg/ha)
              digest = DefoliatedDigestibility             
              dm_som = HarvestWt * (1-digest)
                  
              n_removed  = HarvestN *(1.0-[dm_frac])
              n_returned = HarvestN * [dm_frac]
              n_som      = n_returned * ( 1.0 - [urine_n_frac] )
              n_urine    = n_returned *  [urine_n_frac]  
              n_urine1 = 0.6 * n_urine
              n_urine2 = 0.4 * n_urine
              'Surface Organic Matter' add_surfaceom name = '[AgPasture]' , type =  grass, mass = dm_som (kg/ha), n = n_som (kg/ha)
              'fertiliser' apply amount =  n_urine1  (kg/ha), depth = 50  (mm), type = urea_n ()
              'fertiliser' apply amount =  n_urine2  (kg/ha), depth = 150 (mm), type = urea_n ()
  endif              
endif
```
        on init:
```
account = 0
```
      manager trace
        on init:
```
treat = 4
```
      outputfile: filename=No2DairyNZ8292 No2DairyNZ.out; title=No2DairyNZ8292 No2DairyNZ
        variables
          variable:
            dd/mmm/yyyy as Date
            year
            month
            day_of_month
            trace.treat
            AboveGroundDeadN
            AboveGroundDeadWt
            AboveGroundLiveN
            AboveGroundLiveWt
            AboveGroundN
            AboveGroundNPct
            AboveGroundWt
            BelowGroundN
            BelowGroundWt
            Biomass
            Cover_dead
            Cover_green
            Cover_tot
            Crop_Type
            GLFn
            GLFnConcentration
            GLFrgr
            GLFtemp
            GLFwater
            HarvestN
            HarvestWt
            Height
            HerbageDigestibility
            HerbageME
            radn
            IntRadn
            LAI_dead
            LAI_green
            LAI_total
            LeafDeadWt
            LeafLiveWt
            LeafN
            LeafWt
            LitterDepositionN
            LitterDepositionWt
            HerbageGrowthWt
            NitrogenDemand
            NitrogenSupply
            NitrogenSupplyLayers
            NitrogenUptake
            NitrogenUptakeLayers
            PlantFixedN
            PlantPotentialGrowthWt
            PlantRemobilisedN
            plant_status
            RootSenescenceN
            RootSenescenceWt
            SpeciesHarvestPct
            SpeciesStandingLiveWt
            SpeciesTotalLAI
            SpeciesAboveGroundWt as SpeciesTotalWt
            StemDeadWt
            StemLiveWt
            StemN
            StemWt
            StolonN
            StolonWt
            TotalPlantN
            TotalPlantWt
            WaterDemand
            WaterSupply
            WaterSupplyLayers
            WaterUptake
            WaterUptakeLayers
            rain
            eo
            eos
            es
            runoff
            drain
            irrigation
            sw()
            sw(1)
            biom_n()
            hum_n()
            fom_n()
            dnit()
            nh4()
            no3()
            urea()
            surfaceom_n
            surfaceom_wt
            leach_no3
            leach_nh4
            leach_urea
            n_removed
            n_returned
            n_som
            n_urine
        events Reporting Frequency: event=end_day
  simulation Winchmore1966 Dryland
    clock
      start_date = 01/07/1966  # Enter the start date of the simulation
      end_date = 30/06/2004  # Enter the end date of the simulation
    metfile met: filename=Winchmore.met
    summaryfile
    area PadDryland
      AgPasture ryegrass_clover
        thisCropName = ryegrass_clover  # Crop name shown as on the simulation tree
        speciesToSimulate = ryegrass whiteclover  # Name of species to simulate
        speciesName = ryegrass whiteclover  # Species names
        micrometType = grass grass  # crop type for MicroMet
        isLegume = 0 1  # Legume species? no=0, yes=1
        photoPath = 3 3  # C3 or C4 species? C3=3, C4=4
        rootDepth = 900  300
        tempMinGrowth = 2 4  # Minimum temperature for growth
        growthTmax = 32 32  # Maximum temperature for growth
        tempOptGrowth = 20 22  # Optimum temperature for growth
        exponentTempGrowth = 2 2  # Curvture of growth response to temperature
        tempMinTissueTurnover = 2 2  # Minimum temperature for mass flux
        tempMaxTissueTurnover = 20 20  # Optimum temperature for mass flux
        scaleFactorGLFWTissueTurnover = 2 2  # Scale factor for response of mass flux to soil moisture
        referenceGLFWTissueTurnover = 0.5 0.5  # Optimum soil moisture for mass flux
        useHeatStress = yes  yes  # Consider effects of high temperatures on photosynthesis? (yes/no)
        tempOnsetHeatStress = 25 28  # Heat effects- Onset temperature
        tempFullHeatStress = 31 35  # Heat effects- Full temperature
        sumTempHeatStress = 30 30  # Heat effects- Temperature sum for recovery
        useColdStress = yes  yes  # Consider effects of low temperatures on photosynthesis? (yes/no)
        tempOnsetColdStress = 0 0  # Cold effects- Onset temperature
        tempFullColdStress = -3 -3  # Cold effects- Full temperature
        sumTempColdStress = 30 30  # Cold effects- Temperature sum for recovery
        Pm = 1 1  # Reference CO2 assimilation rate (mg CO2/m2.s)
        maintRespiration = 3 3  # Maintenance respiration coefficient (%)
        growthEfficiency = 0.75 0.75
        SLA = 20 20  # Specific leaf area
        lightExtCoeff = 0.5 0.8  # Light extinction coefficient
        stockParameter = 0.05 0.05  # Stock influence parameter
        maxRootFraction = 0.25 0.25  # Maximum biomass fraction allocated to root
        leafRate = 3 3  # Reference leaf appearance rate without stress
        fLeaf = 0.7 0.56  # Reference growth partition to leaves
        fStolon = 0 0.2  # Reference growth partition to stolon
        digestLive = 0.6 0.6  # Digestibility of live plant material
        digestDead = 0.2 0.2  # Digestibility of dead plant material
        dmshoot = 1500 350  # Initial shoot dry matter (kg/ha)
        dmgreenmin = 500 50  # Minimum green dry matter (kg/ha)
        NconcOptimum_leaves = 4 4.5  # N concentration - leaf optimum
        NconcMaximum_leaves = 5 5.5  # N concentration - leaf luxary
        NconcMinimum_leaves = 1.2 2.0  # N concentration - leaf scenescent
        RelativeNconc_Stems = 0.5 0.5  # Stem N concentration as fraction of leaf N concentration
        RelativeNconc_Stolons = 0 0.5  # Stolon N concentration as fraction of leaf N concentration
        RelativeNconc_Roots = 0.5 0.5  # Root N concentration as fraction of leaf N concentration
        NMinFix = 0 0.2  # Minimum N fixation (when soil N is sufficient)
        NMaxFix = 0 0.6  # Maximum N fixation (when soil N is unavailable)
        CO2PmaxScale = 700 700  # CO2 - Scale factor for CO2 effect on photosynthesis
        CO2NScale = 600 600  # CO2 - Scale factor for CO2 effects on plant N concentration
        CO2NMin = 0.7 0.7  # CO2 - Minimum fraction that plant N concentration may reduce to uder elevated CO2
        CO2NCurvature = 2 2  # CO2 - Curvature factor of CO2 effect on plant N concentration
        Frgr = 1 1  # Relative growth factor
        rlvp = 1.0 1.0  # Root distribution of swards (relative to each soil layer)
      micromet
        soilalbedo = 0.23
        a_interception = 0
        b_interception = 0
        c_interception = 0
        d_interception = 0
      Soil SoilLismoreDry: Site=Dalby; Region=Darling Downs; State=Queensland; Longitude=151.305
        Comment = Soil naming structure: \State\Region\Classification-Local Name (Site/district and locator number)  # Comments
        SoilType = Black Vertosol  # Soil description
        NearestTown = Dalby, Q 4405
        ApsoilNumber = 27
        Latitude = -27.12  # Latitude (WGS84)
        LocationAccuracy = +/-20m
        DataSource = CSIRO Sustainable Ecosystems, Toowoomba
        InitialWater Initial water: FractionFull=0.99; PercentMethod=FilledFromTop
        Water
          Thickness  BD    AirDry  LL15  DUL   SAT
          100        1.25  0.06    0.14  0.32  0.45
          200        1.31  0.06    0.14  0.32  0.45
          300        1.23  0.03    0.03  0.07  0.15
          300        1.24  0.03    0.03  0.05  0.08
          300        1.25  0.03    0.03  0.05  0.08
          300        1.26  0.03    0.03  0.05  0.08
          300        1.29  0.03    0.03  0.05  0.08
          SoilCrop ryegrass_clover: LL=[0.14, 0.14, 0.03, 0.03, 0.03, 0.03, 0.03]; KL=[0.1, 0.1, 0.1, 0.02, 0, 0, 0]; XF=[1, 1, 1, 1, 0, 0, 0]
          SoilCrop agpasture: LL=[0.14, 0.14, 0.03, 0.03, 0.03, 0.03, 0.03]; KL=[0.1, 0.1, 0.1, 0.02, 0, 0, 0]; XF=[1, 1, 1, 1, 0, 0, 0]
          SoilCrop ryegrass: LL=[0.14, 0.14, 0.03, 0.03, 0.03, 0.03, 0.03]; KL=[0.1, 0.1, 0.1, 0.02, 0, 0, 0]; XF=[1, 1, 1, 1, 0, 0, 0]
          SoilCrop clover: LL=[0.14, 0.14, 0.03, 0.03, 0.03, 0.03, 0.03]; KL=[0.1, 0.1, 0.1, 0.02, 0, 0, 0]; XF=[1, 1, 1, 1, 0, 0, 0]
          SoilCrop maize: LL=[0.14, 0.14, 0.03, 0.02, 0.02, 0.02, 0.02]; KL=[0.06, 0.06, 0.06, 0.06, 0.06, 0.06, 0.06]; XF=[1, 1, 1, 1, 1, 1, 1]
          SoilCrop cotton: LL=[0.14, 0.14, 0.03, 0.02, 0.02, 0.02, 0.02]; KL=[0.1, 0.1, 0.1, 0.1, 0.09, 0.07, 0.05]; XF=[1, 1, 1, 1, 1, 1, 1]
          SoilCrop sorghum: LL=[0.14, 0.14, 0.03, 0.02, 0.02, 0.02, 0.02]; KL=[0.07, 0.07, 0.07, 0.05, 0.05, 0.04, 0.03]; XF=[1, 1, 1, 1, 1, 1, 0.9]
          SoilCrop slurp: LL=[0.14, 0.14, 0.03, 0.02, 0.02, 0.02, 0.02]; KL=[0.06, 0.06, 0.06, 0.06, 0.06, 0.06, 0.06]; XF=[1, 1, 1, 1, 1, 1, 1]
        SoilWater: SummerCona=3.5; SummerU=6; SummerDate=1-Nov; WinterCona=2; WinterU=2; WinterDate=1-apr; DiffusConst=88; DiffusSlope=35; Salb=0.13; CN2Bare=73; CNRed=20; CNCov=0.8; Thickness=[100, 200, 300, 300, 300, 300, 300]; SWCON=[0.4, 0.5, 0.6, 0.6, 0.8, 0.8, 0.8]
        SoilOrganicMatter: RootCN=40; RootWt=800; SoilCN=11.3; EnrACoeff=7.4; EnrBCoeff=0.2
          Thickness  OC   FBiom  FInert
          100        4    0.04   0.3
          200        2.5  0.02   0.5
          300        0.5  0.02   0.6
          300        0.1  0.01   0.8
          300        0.1  0.01   1
          300        0    0      1
          300        0    0      1
        Analysis: Thickness=[100, 200, 300, 300, 300, 300, 300]; PH=[5.9, 5.9, 5.9, 5.9, 5.9, 5.9, 5.9]
        Sample Initial nitrogen
          Thickness  NO3      NH4
          100        7.61905  0.132451
          200        7.27008  0.132451
          300        3.87147  0.132451
          300        3.84025  0.132451
          300        3.80952  0.132451
          300        3.77929  0.132451
          300        3.6914   0.132451
      fertiliser
      surfaceom Surface Organic Matter
        PoolName = AgPasture  # Organic Matter pool name
        type = grass  # Organic Matter type
        mass = 1000  # Initial surface residue (kg/ha)
        cnr = 15  # C:N ratio of initial residue
        standing_fraction = 0  # Fraction of residue standing
      manager Harvest specified dates at Winchmore_1966L2
        # Regular harvest or grazing
        AgPasture = ryegrass_clover  # Enter pasture type
        date1 = 1/7/1900  # Enter the first harvest or grazing date
        amount_type = SetResidueAmount  # Select the amount type
        amount = 1000  # Enter herbage amount
        interval = 0  # Enter harvest interval (not needed in this case)
        # Material returns
        dm_frac = 0.85  # Fraction of herbage returned as excreta
        urine_n_frac = 0.6  # Fraction of nitrogen returned as urine
        urine_depth = 150  # Urine deposit depth (mm)
        on end_of_day:
```
account = account + 1
dm_som = 0
dm_removed = 0
n_returned =0
n_removed =0
n_som = 0
n_urine = 0
n_urine1 = 0
n_urine2 = 0
if (year = 1966) or (year = 1967) then
  if (today = date('12/01/1966')) or
  (today = date('10/02/1966')) or
  (today = date('10/03/1966')) or
  (today = date('12/04/1966')) or
  (today = date('10/06/1966')) or
  (today = date('2/09/1966')) or
  (today = date('28/09/1966')) or
  (today = date('21/10/1966')) or
  (today = date('17/11/1966')) or
  (today = date('15/12/1966')) or
  (today = date('13/01/1967')) or
  (today = date('10/02/1967')) or
  (today = date('10/03/1967')) or
  (today = date('11/04/1967')) or
  (today = date('2/06/1967')) or
  (today = date('13/09/1967')) or
  (today = date('10/10/1967')) or
  (today = date('7/11/1967')) or
  (today = date('5/12/1967')) then
             '[AgPasture]' graze type = '[amount_type]', amount = [amount] (kg/ha)
              digest = DefoliatedDigestibility                 
              dm_som = HarvestWt * (1-digest)
                        
              n_removed  = HarvestN *(1.0-[dm_frac])
              n_returned = HarvestN * [dm_frac]
              n_som      = n_returned * ( 1.0 - [urine_n_frac] )
              n_urine    = n_returned *  [urine_n_frac]  
              n_urine1 = 0.6 * n_urine
              n_urine2 = 0.4 * n_urine
               'Surface Organic Matter' add_surfaceom name = '[AgPasture]' , type =  grass, mass = dm_som (kg/ha), n = n_som (kg/ha)
              'fertiliser' apply amount =  n_urine1  (kg/ha), depth = 50  (mm), type = urea_n ()
              'fertiliser' apply amount =  n_urine2  (kg/ha), depth = 150 (mm), type = urea_n ()
  endif
elseif (year = 1968) or (year = 1969) then
  if (today = date('5/01/1968')) or
  (today = date('31/01/1968')) or
  (today = date('6/03/1968')) or
  (today = date('8/04/1968')) or
  (today = date('5/06/1968')) or
  (today = date('5/09/1968')) or
  (today = date('10/10/1968')) or
  (today = date('8/11/1968')) or
  (today = date('3/12/1968')) or
  (today = date('6/01/1969')) or
  (today = date('4/02/1969')) or
  (today = date('10/03/1969')) or
  (today = date('15/04/1969')) or
  (today = date('22/05/1969')) or
  (today = date('16/09/1969')) or
  (today = date('14/10/1969')) or
  (today = date('19/11/1969')) or
  (today = date('19/12/1969')) then
             '[AgPasture]' graze type = '[amount_type]', amount = [amount] (kg/ha)
              digest = DefoliatedDigestibility
              dm_som = HarvestWt * (1-digest)
                                 
              n_removed  = HarvestN *(1.0-[dm_frac])
              n_returned = HarvestN * [dm_frac]
              n_som      = n_returned * ( 1.0 - [urine_n_frac] )
              n_urine    = n_returned *  [urine_n_frac]  
              n_urine1 = 0.6 * n_urine
              n_urine2 = 0.4 * n_urine
               'Surface Organic Matter' add_surfaceom name = '[AgPasture]' , type =  grass, mass = dm_som (kg/ha), n = n_som (kg/ha)
              'fertiliser' apply amount =  n_urine1  (kg/ha), depth = 50  (mm), type = urea_n ()
              'fertiliser' apply amount =  n_urine2  (kg/ha), depth = 150 (mm), type = urea_n ()
  endif
elseif (year = 1970) or (year = 1971) then
  if (today = date('20/01/1970')) or
  (today = date('17/02/1970')) or
  (today = date('24/03/1970')) or
  (today = date('5/05/1970')) or
  (today = date('9/06/1970')) or
  (today = date('18/09/1970')) or
  (today = date('14/10/1970')) or
  (today = date('11/11/1970')) or
  (today = date('10/12/1970')) or
  (today = date('14/01/1971')) or
  (today = date('9/02/1971')) or
  (today = date('12/03/1971')) or
  (today = date('23/04/1971')) or
  (today = date('16/06/1971')) or
  (today = date('10/09/1971')) or
  (today = date('12/10/1971')) or
  (today = date('9/11/1971')) or
  (today = date('8/12/1971')) then
             '[AgPasture]' graze type = '[amount_type]', amount = [amount] (kg/ha)
              digest = DefoliatedDigestibility
              dm_som = HarvestWt * (1-digest)
              
              n_removed  = HarvestN *(1.0-[dm_frac])
              n_returned = HarvestN * [dm_frac]
              n_som      = n_returned * ( 1.0 - [urine_n_frac] )
              n_urine    = n_returned *  [urine_n_frac]  
              n_urine1 = 0.6 * n_urine
              n_urine2 = 0.4 * n_urine
               'Surface Organic Matter' add_surfaceom name = '[AgPasture]' , type =  grass, mass = dm_som (kg/ha), n = n_som (kg/ha)
              'fertiliser' apply amount =  n_urine1  (kg/ha), depth = 50  (mm), type = urea_n ()
              'fertiliser' apply amount =  n_urine2  (kg/ha), depth = 150 (mm), type = urea_n ()
  endif
elseif (year = 1972) or (year = 1973) then
  if (today = date('10/01/1972')) or
  (today = date('14/02/1972')) or
  (today = date('15/03/1972')) or
  (today = date('20/04/1972')) or
  (today = date('21/06/1972')) or
  (today = date('19/09/1972')) or
  (today = date('25/10/1972')) or
  (today = date('23/11/1972')) or
  (today = date('14/12/1972')) or
  (today = date('18/01/1973')) or
  (today = date('16/02/1973')) or
  (today = date('20/03/1973')) or
  (today = date('2/05/1973')) or
  (today = date('20/06/1973')) or
  (today = date('4/09/1973')) or
  (today = date('11/10/1973')) or
  (today = date('12/11/1973')) or
  (today = date('10/12/1973')) then
             '[AgPasture]' graze type = '[amount_type]', amount = [amount] (kg/ha)
              digest = DefoliatedDigestibility
              dm_som = HarvestWt * (1-digest)
                              
              n_removed  = HarvestN *(1.0-[dm_frac])
              n_returned = HarvestN * [dm_frac]
              n_som      = n_returned * ( 1.0 - [urine_n_frac] )
              n_urine    = n_returned *  [urine_n_frac]  
              n_urine1 = 0.6 * n_urine
              n_urine2 = 0.4 * n_urine
              'Surface Organic Matter' add_surfaceom name = '[AgPasture]' , type =  grass, mass = dm_som (kg/ha), n = n_som (kg/ha)
              'fertiliser' apply amount =  n_urine1  (kg/ha), depth = 50  (mm), type = urea_n ()
              'fertiliser' apply amount =  n_urine2  (kg/ha), depth = 150 (mm), type = urea_n ()
  endif
elseif (year = 1974) or (year = 1975) then
  if (today = date('18/01/1974')) or
  (today = date('14/02/1974')) or
  (today = date('21/03/1974')) or
  (today = date('2/05/1974')) or
  (today = date('12/09/1974')) or
  (today = date('7/10/1974')) or
  (today = date('31/10/1974')) or
  (today = date('27/11/1974')) or
  (today = date('19/12/1974')) or
  (today = date('13/01/1975')) or
  (today = date('11/02/1975')) or
  (today = date('7/03/1975')) or
  (today = date('4/04/1975')) or
  (today = date('29/05/1975')) or
  (today = date('16/09/1975')) or
  (today = date('9/10/1975')) or
  (today = date('5/11/1975')) or
  (today = date('1/12/1975')) then
             '[AgPasture]' graze type = '[amount_type]', amount = [amount] (kg/ha)
              digest = DefoliatedDigestibility    
              dm_som = HarvestWt * (1-digest)
               
              n_removed  = HarvestN *(1.0-[dm_frac])
              n_returned = HarvestN * [dm_frac]
              n_som      = n_returned * ( 1.0 - [urine_n_frac] )
              n_urine    = n_returned *  [urine_n_frac]  
              n_urine1 = 0.6 * n_urine
              n_urine2 = 0.4 * n_urine
              'Surface Organic Matter' add_surfaceom name = '[AgPasture]' , type =  grass, mass = dm_som (kg/ha), n = n_som (kg/ha)
              'fertiliser' apply amount =  n_urine1  (kg/ha), depth = 50  (mm), type = urea_n ()
              'fertiliser' apply amount =  n_urine2  (kg/ha), depth = 150 (mm), type = urea_n ()
  endif
elseif (year = 1976) or (year = 1977) then
  if (today = date('7/01/1976')) or
  (today = date('12/02/1976')) or
  (today = date('18/03/1976')) or
  (today = date('27/04/1976')) or
  (today = date('2/09/1976')) or
  (today = date('4/10/1976')) or
  (today = date('4/11/1976')) or
  (today = date('29/11/1976')) or
  (today = date('4/01/1977')) or
  (today = date('31/01/1977')) or
  (today = date('3/03/1977')) or
  (today = date('6/04/1977')) or
  (today = date('3/06/1977')) or
  (today = date('20/09/1977')) or
  (today = date('18/10/1977')) or
  (today = date('17/11/1977')) or
  (today = date('16/12/1977')) then
             '[AgPasture]' graze type = '[amount_type]', amount = [amount] (kg/ha)
              digest = DefoliatedDigestibility    
              dm_som = HarvestWt * (1-digest)
               
              n_removed  = HarvestN *(1.0-[dm_frac])
              n_returned = HarvestN * [dm_frac]
              n_som      = n_returned * ( 1.0 - [urine_n_frac] )
              n_urine    = n_returned *  [urine_n_frac]  
              n_urine1 = 0.6 * n_urine
              n_urine2 = 0.4 * n_urine
              'Surface Organic Matter' add_surfaceom name = '[AgPasture]' , type =  grass, mass = dm_som (kg/ha), n = n_som (kg/ha)
              'fertiliser' apply amount =  n_urine1  (kg/ha), depth = 50  (mm), type = urea_n ()
              'fertiliser' apply amount =  n_urine2  (kg/ha), depth = 150 (mm), type = urea_n ()
  endif
elseif  (year = 1978) or (year = 1979) then
  if (today = date('13/01/1978')) or
  (today = date('13/02/1978')) or
  (today = date('23/03/1978')) or
  (today = date('30/05/1978')) or
  (today = date('8/09/1978')) or
  (today = date('9/10/1978')) or
  (today = date('13/11/1978')) or
  (today = date('20/12/1978')) or
  (today = date('29/01/1979')) or
  (today = date('13/03/1979')) or
  (today = date('26/04/1979')) or
  (today = date('11/06/1979')) or
  (today = date('5/09/1979')) or
  (today = date('16/10/1979')) or
  (today = date('23/11/1979')) then
             '[AgPasture]' graze type = '[amount_type]', amount = [amount] (kg/ha)
              digest = DefoliatedDigestibility
              dm_som = HarvestWt * (1-digest)
                
              n_removed  = HarvestN *(1.0-[dm_frac])
              n_returned = HarvestN * [dm_frac]
              n_som      = n_returned * ( 1.0 - [urine_n_frac] )
              n_urine    = n_returned *  [urine_n_frac]  
              n_urine1 = 0.6 * n_urine
              n_urine2 = 0.4 * n_urine
               'Surface Organic Matter' add_surfaceom name = '[AgPasture]' , type =  grass, mass = dm_som (kg/ha), n = n_som (kg/ha)
              'fertiliser' apply amount =  n_urine1  (kg/ha), depth = 50  (mm), type = urea_n ()
              'fertiliser' apply amount =  n_urine2  (kg/ha), depth = 150 (mm), type = urea_n ()
  endif
elseif (year = 1980) or (year = 1981) then
  if (today = date('8/01/1980')) or
  (today = date('7/02/1980')) or
  (today = date('13/03/1980')) or
  (today = date('1/05/1980')) or
  (today = date('10/06/1980')) or
  (today = date('3/09/1980')) or
  (today = date('13/10/1980')) or
  (today = date('26/11/1980')) or
  (today = date('15/12/1980')) or
  (today = date('15/01/1981')) or
  (today = date('23/02/1981')) or
  (today = date('27/03/1981')) or
  (today = date('26/05/1981')) or
  (today = date('31/08/1981')) or
  (today = date('29/09/1981')) or
  (today = date('30/10/1981')) or
  (today = date('27/11/1981')) then
             '[AgPasture]' graze type = '[amount_type]', amount = [amount] (kg/ha)
              digest = DefoliatedDigestibility    
              dm_som = HarvestWt * (1-digest)
                
              n_removed  = HarvestN *(1.0-[dm_frac])
              n_returned = HarvestN * [dm_frac]
              n_som      = n_returned * ( 1.0 - [urine_n_frac] )
              n_urine    = n_returned *  [urine_n_frac]  
              n_urine1 = 0.6 * n_urine
              n_urine2 = 0.4 * n_urine
               'Surface Organic Matter' add_surfaceom name = '[AgPasture]' , type =  grass, mass = dm_som (kg/ha), n = n_som (kg/ha)
              'fertiliser' apply amount =  n_urine1  (kg/ha), depth = 50  (mm), type = urea_n ()
              'fertiliser' apply amount =  n_urine2  (kg/ha), depth = 150 (mm), type = urea_n ()
  endif
elseif (year = 1982) or (year = 1983) or (year = 1984) then
  if (today = date('13/01/1982')) or
  (today = date('15/02/1982')) or
  (today = date('24/03/1982')) or
  (today = date('27/04/1982')) or
  (today = date('26/05/1982')) or
  (today = date('5/09/1983')) or
  (today = date('6/10/1983')) or
  (today = date('9/11/1983')) or
  (today = date('15/12/1983')) or
  (today = date('26/01/1984')) or
  (today = date('1/03/1984')) or
  (today = date('4/09/1984')) or
  (today = date('8/10/1984')) or
  (today = date('20/11/1984')) or
  (today = date('20/12/1984')) then
             '[AgPasture]' graze type = '[amount_type]', amount = [amount] (kg/ha)
              digest = DefoliatedDigestibility    
              dm_som = HarvestWt * (1-digest)
                               
              n_removed  = HarvestN *(1.0-[dm_frac])
              n_returned = HarvestN * [dm_frac]
              n_som      = n_returned * ( 1.0 - [urine_n_frac] )
              n_urine    = n_returned *  [urine_n_frac]  
              n_urine1 = 0.6 * n_urine
              n_urine2 = 0.4 * n_urine
               'Surface Organic Matter' add_surfaceom name = '[AgPasture]' , type =  grass, mass = dm_som (kg/ha), n = n_som (kg/ha)
              'fertiliser' apply amount =  n_urine1  (kg/ha), depth = 50  (mm), type = urea_n ()
              'fertiliser' apply amount =  n_urine2  (kg/ha), depth = 150 (mm), type = urea_n ()
  endif
elseif (year = 1985) or (year = 1986) then
  if (today = date('24/01/1985')) or
  (today = date('27/02/1985')) or
  (today = date('29/03/1985')) or
  (today = date('29/05/1985')) or
  (today = date('9/09/1985')) or
  (today = date('8/10/1985')) or
  (today = date('12/11/1985')) or
  (today = date('9/12/1985')) or
  (today = date('10/01/1986')) or
  (today = date('10/02/1986')) or
  (today = date('10/03/1986')) or
  (today = date('10/04/1986')) or
  (today = date('26/05/1986')) or
  (today = date('2/09/1986')) or
  (today = date('1/10/1986')) or
  (today = date('3/11/1986')) or
  (today = date('8/12/1986')) then
             '[AgPasture]' graze type = '[amount_type]', amount = [amount] (kg/ha)
              digest = DefoliatedDigestibility      
              dm_som = HarvestWt * (1-digest)
                                  
              n_removed  = HarvestN *(1.0-[dm_frac])
              n_returned = HarvestN * [dm_frac]
              n_som      = n_returned * ( 1.0 - [urine_n_frac] )
              n_urine    = n_returned *  [urine_n_frac]  
              n_urine1 = 0.6 * n_urine
              n_urine2 = 0.4 * n_urine
               'Surface Organic Matter' add_surfaceom name = '[AgPasture]' , type =  grass, mass = dm_som (kg/ha), n = n_som (kg/ha)
              'fertiliser' apply amount =  n_urine1  (kg/ha), depth = 50  (mm), type = urea_n ()
              'fertiliser' apply amount =  n_urine2  (kg/ha), depth = 150 (mm), type = urea_n ()
  endif
elseif (year >= 1987) and (year <= 1991) then
  if (today = date('8/01/1987')) or
  (today = date('23/02/1987')) or
  (today = date('31/03/1987')) or
  (today = date('3/06/1987')) or
  (today = date('2/09/1987')) or
  (today = date('6/10/1987')) or
  (today = date('5/11/1987')) or
  (today = date('7/12/1987')) or
  (today = date('6/01/1988')) or
  (today = date('22/02/1988')) or
  (today = date('24/03/1988')) or
  (today = date('7/06/1988')) or
  (today = date('9/09/1988')) or
  (today = date('17/10/1988')) or
  (today = date('24/11/1988')) or
  (today = date('5/01/1989')) or
  (today = date('14/02/1989')) or
  (today = date('6/06/1989')) or
  (today = date('10/10/1989')) or
  (today = date('6/11/1989')) or
  (today = date('11/12/1989')) or
  (today = date('26/01/1990')) or
  (today = date('26/03/1990')) or
  (today = date('24/05/1990')) or
  (today = date('26/09/1990')) or
  (today = date('7/11/1990')) or
  (today = date('17/12/1990')) or
  (today = date('23/01/1991')) or
  (today = date('4/03/1991')) or
  (today = date('16/04/1991')) or
  (today = date('14/06/1991')) or
  (today = date('6/09/1991')) or
  (today = date('22/10/1991')) or
  (today = date('25/11/1991')) or
  (today = date('20/12/1991')) then
             '[AgPasture]' graze type = '[amount_type]', amount = [amount] (kg/ha)
              digest = DefoliatedDigestibility    
              dm_som = HarvestWt * (1-digest)
                               
              n_removed  = HarvestN *(1.0-[dm_frac])
              n_returned = HarvestN * [dm_frac]
              n_som      = n_returned * ( 1.0 - [urine_n_frac] )
              n_urine    = n_returned *  [urine_n_frac]  
              n_urine1 = 0.6 * n_urine
              n_urine2 = 0.4 * n_urine
               'Surface Organic Matter' add_surfaceom name = '[AgPasture]' , type =  grass, mass = dm_som (kg/ha), n = n_som (kg/ha)
              'fertiliser' apply amount =  n_urine1  (kg/ha), depth = 50  (mm), type = urea_n ()
              'fertiliser' apply amount =  n_urine2  (kg/ha), depth = 150 (mm), type = urea_n ()             
  endif
elseif (year = 1992) or (year = 1993) then
  if (today = date('22/01/1992')) or
  (today = date('5/03/1992')) or
  (today = date('3/07/1992')) or
  (today = date('22/09/1992')) or
  (today = date('2/11/1992')) or
  (today = date('15/12/1992')) or
  (today = date('29/01/1993')) or
  (today = date('3/03/1993')) or
  (today = date('3/05/1993')) or
  (today = date('22/06/1993')) or
  (today = date('2/09/1993')) or
  (today = date('13/10/1993')) or
  (today = date('16/11/1993')) or
  (today = date('15/12/1993')) then
   '[AgPasture]' graze type = '[amount_type]', amount = [amount] (kg/ha)
              digest = DefoliatedDigestibility             
              dm_som = HarvestWt * (1-digest)
                            
              n_removed  = HarvestN *(1.0-[dm_frac])
              n_returned = HarvestN * [dm_frac]
              n_som      = n_returned * ( 1.0 - [urine_n_frac] )
              n_urine    = n_returned *  [urine_n_frac]  
              n_urine1 = 0.6 * n_urine
              n_urine2 = 0.4 * n_urine
               'Surface Organic Matter' add_surfaceom name = '[AgPasture]' , type =  grass, mass = dm_som (kg/ha), n = n_som (kg/ha)
              'fertiliser' apply amount =  n_urine1  (kg/ha), depth = 50  (mm), type = urea_n ()
              'fertiliser' apply amount =  n_urine2  (kg/ha), depth = 150 (mm), type = urea_n ()
  endif
elseif (year = 1994) or (year = 1995) then
  if (today = date('1/02/1994')) or
  (today = date('6/04/1994')) or
  (today = date('11/10/1994')) or
  (today = date('14/11/1994')) or
  (today = date('7/12/1994')) or
  (today = date('31/01/1995')) or
  (today = date('23/03/1995')) or
  (today = date('25/05/1995')) or
  (today = date('20/09/1995')) or
  (today = date('16/10/1995')) or
  (today = date('6/11/1995')) or
  (today = date('8/12/1995')) then
             '[AgPasture]' graze type = '[amount_type]', amount = [amount] (kg/ha)
              digest = DefoliatedDigestibility
              dm_som = HarvestWt * (1-digest)
                
              n_removed  = HarvestN *(1.0-[dm_frac])
              n_returned = HarvestN * [dm_frac]
              n_som      = n_returned * ( 1.0 - [urine_n_frac] )
              n_urine    = n_returned *  [urine_n_frac]  
              n_urine1 = 0.6 * n_urine
              n_urine2 = 0.4 * n_urine
               'Surface Organic Matter' add_surfaceom name = '[AgPasture]' , type =  grass, mass = dm_som (kg/ha), n = n_som (kg/ha)
              'fertiliser' apply amount =  n_urine1  (kg/ha), depth = 50  (mm), type = urea_n ()
              'fertiliser' apply amount =  n_urine2  (kg/ha), depth = 150 (mm), type = urea_n ()
  endif
elseif (year = 1996) or (year = 1997) then
  if (today = date('16/01/1996')) or
  (today = date('1/03/1996')) or
  (today = date('10/04/1996')) or
  (today = date('19/06/1996')) or
  (today = date('27/08/1996')) or
  (today = date('24/09/1996')) or
  (today = date('24/10/1996')) or
  (today = date('21/11/1996')) or
  (today = date('18/12/1996')) or
  (today = date('24/01/1997')) or
  (today = date('10/03/1997')) or
  (today = date('8/05/1997')) or
  (today = date('4/09/1997')) or
  (today = date('8/10/1997')) or
  (today = date('5/11/1997')) or
  (today = date('11/12/1997')) then  
              '[AgPasture]' graze type = '[amount_type]', amount = [amount] (kg/ha)
              digest = DefoliatedDigestibility
              dm_som = HarvestWt * (1-digest)
              
              n_removed  = HarvestN *(1.0-[dm_frac])
              n_returned = HarvestN * [dm_frac]
              n_som      = n_returned * ( 1.0 - [urine_n_frac] )
              n_urine    = n_returned *  [urine_n_frac]  
              n_urine1 = 0.6 * n_urine
              n_urine2 = 0.4 * n_urine
               'Surface Organic Matter' add_surfaceom name = '[AgPasture]' , type =  grass, mass = dm_som (kg/ha), n = n_som (kg/ha)
              'fertiliser' apply amount =  n_urine1  (kg/ha), depth = 50  (mm), type = urea_n ()
              'fertiliser' apply amount =  n_urine2  (kg/ha), depth = 150 (mm), type = urea_n ()
  endif
 elseif (year >= 1998) and (year <= 2000) then
  if (today = date('22/01/1998')) or
  (today = date('10/03/1998')) or
  (today = date('19/08/1998')) or
  (today = date('15/10/1998')) or
  (today = date('1/12/1998')) or
  (today = date('11/01/1999')) or
  (today = date('22/02/1999')) or
  (today = date('14/04/1999')) or
  (today = date('28/06/1999')) or
  (today = date('9/09/1999')) or
  (today = date('15/10/1999')) or
  (today = date('22/11/1999')) or
  (today = date('17/12/1999')) or
  (today = date('19/01/2000')) or
  (today = date('24/02/2000')) or
  (today = date('13/04/2000')) or
  (today = date('15/06/2000')) or
  (today = date('22/09/2000')) or
  (today = date('19/10/2000')) or
  (today = date('14/11/2000')) or
  (today = date('15/12/2000')) then 
             '[AgPasture]' graze type = '[amount_type]', amount = [amount] (kg/ha)
              digest = DefoliatedDigestibility              
              dm_som = HarvestWt * (1-digest)
                 
              n_removed  = HarvestN *(1.0-[dm_frac])
              n_returned = HarvestN * [dm_frac]
              n_som      = n_returned * ( 1.0 - [urine_n_frac] )
              n_urine    = n_returned *  [urine_n_frac]  
              n_urine1 = 0.6 * n_urine
              n_urine2 = 0.4 * n_urine
               'Surface Organic Matter' add_surfaceom name = '[AgPasture]' , type =  grass, mass = dm_som (kg/ha), n = n_som (kg/ha)
              'fertiliser' apply amount =  n_urine1  (kg/ha), depth = 50  (mm), type = urea_n ()
              'fertiliser' apply amount =  n_urine2  (kg/ha), depth = 150 (mm), type = urea_n ()
  endif
elseif (year >= 2001) and (year <= 2004) then
  if (today = date('24/01/2001')) or
  (today = date('27/02/2001')) or
  (today = date('17/05/2001')) or
  (today = date('13/09/2001')) or
  (today = date('15/10/2001')) or
  (today = date('28/11/2001')) or
  (today = date('20/12/2001')) or
  (today = date('24/01/2002')) or
  (today = date('12/03/2002')) or
  (today = date('20/05/2002')) or
  (today = date('11/09/2002')) or
  (today = date('22/10/2002')) or
  (today = date('2/12/2002')) or
  (today = date('8/01/2003')) or
  (today = date('7/02/2003')) or
  (today = date('2/04/2003')) or
  (today = date('5/09/2003')) or
  (today = date('31/10/2003')) or
  (today = date('8/12/2003')) or
  (today = date('19/1/2004')) or
  (today = date('18/2/2004')) or
  (today = date('21/4/2004')) then 
             '[AgPasture]' graze type = '[amount_type]', amount = [amount] (kg/ha)
              digest = DefoliatedDigestibility             
              dm_som = HarvestWt * (1-digest)
                 
              n_removed  = HarvestN *(1.0-[dm_frac])
              n_returned = HarvestN * [dm_frac]
              n_som      = n_returned * ( 1.0 - [urine_n_frac] )
              n_urine    = n_returned *  [urine_n_frac]  
              n_urine1 = 0.6 * n_urine
              n_urine2 = 0.4 * n_urine
               'Surface Organic Matter' add_surfaceom name = '[AgPasture]' , type =  grass, mass = dm_som (kg/ha), n = n_som (kg/ha)
              'fertiliser' apply amount =  n_urine1  (kg/ha), depth = 50  (mm), type = urea_n ()
              'fertiliser' apply amount =  n_urine2  (kg/ha), depth = 150 (mm), type = urea_n ()
  endif
 endif
```
        on init:
```
account = 0
```
      outputfile: filename=Winchmore1966 Dryland PadDryland.out; title=Winchmore1966 Dryland PadDryland
        variables
          variable:
            dd/mmm/yyyy as Date  # Date (dd/mmm/yyyy)
            year
            month
            day_of_month
            trace.treat
            AboveGroundDeadN  # Nitrogen in plant standing dead (shoots)
            AboveGroundDeadWt  # Plant aboveground dead dry matter
            AboveGroundLiveN  # Nitrogen in plant live shoots
            AboveGroundLiveWt  # Plant aboveground live dry matter
            AboveGroundN  # Nitrogen in plant aboveground mass (shoots)
            AboveGroundNPct  # Plant shoot N concentration
            AboveGroundWt  # Plant aboveground dry matter
            BelowGroundN  # Nitrogen in plant roots
            BelowGroundWt  # Plant below ground dry matter
            Biomass  # Plant aboveground dry matter (=AboveGroundWt)
            Cover_dead  # cover of dead leaf area
            Cover_green  # cover of green leaf area
            Cover_tot  # cover of total leaf area
            Crop_Type  # Crop type
            GLFn  # Plant growth limiting factor due to nitrogen stress
            GLFnConcentration  # Plant growth redcution factor due to low N concnetration
            GLFrgr  # Plant growth limiting factor due to other facotrs
            GLFtemp  # Plant growth limiting factor due to temperature
            GLFwater  # Plant growth limiting factor due to water deficit
            HarvestN  # Daily plant nitrogen harvest
            HarvestWt  # Daily herbage harvest
            Height  # Pasture height
            HerbageDigestibility  # Digestibility of standing herbage
            HerbageME  # Metabolic energy of standing herbage
            radn  # Solar radiation
            InterceptedRadiation  # Intercepted solar radiation
            LAI_dead  # Dead leaf area index
            LAI_green  # Green leaf area index
            LAI_total  # Total leaf area index
            LeafDeadWt  # Plant dead leaf dry matter
            LeafLiveWt  # Plant green leaf dry matter
            LeafN  # Nitrogen in plant leaves
            LeafWt  # Plant aboveground leaf dry matter
            LitterDepositionN  # Daily plant shoot nitrogen deposition (in litter)
            LitterDepositionWt  # Daily litter deposition
            HerbageGrowthWt  # Daily net herbage accumulation
            NitrogenDemand  # Plant nitrogen demand
            NitrogenSupply  # Plant available nitrogen in soil
            NitrogenSupplyLayers  # Plant available nitrogen in soil layers
            NitrogenUptake  # Plant nitrogen uptake
            NitrogenUptakeLayers  # Plant nitrogen uptake from soil layers
            PlantFixedN  # Daily plant nitrogen fixation
            PlantPotentialGrowthWt  # Daily plant potential growth
            PlantRemobiliedN  # Plant N remobilisation
            plant_status  # Plant status - alive or dead
            RootSenescenceN  # Daily plant root nitrogen deposition in senescent roots
            RootSenescenceWt  # Daily root senescence
            SpeciesHarvestPct  # Species - percentage in harvested plant material (%)
            SpeciesStandingLiveWt  # Species - total aboveground live dry matter (kg/ha)
            SpeciesTotalLAI  # Species - total leaf area index (m2/m2)
            SpeciesAboveGroundWt as SpeciesTotalWt  # Species - total aboveground dry matter (kg/ha)
            StemDeadWt  # Plant dead stem dry matter
            StemLiveWt  # Plant live stem dry matter
            StemN  # Nitrogen in plant stems
            StemWt  # Plant aboveground stem dry matter
            StolonN  # Nitrogen in plant stolons
            StolonWt  # Plant stolon dry matter
            TotalPlantN  # Plant total nitrogen
            TotalPlantWt  # Plant total dry matter
            WaterDemand  # Plant water demand
            WaterSupply  # Plant extractable soil water
            WaterSupplyLayers  # Plant extractable water in soil layers
            WaterUptake  # Plant water uptake
            WaterUptakeLayers  # Plant water uptake from soil layers
            rain  # Rainfall
            eo
            eos
            es
            runoff
            drain
            irrigation
            sw()
            sw(1)
            biom_n()
            hum_n()
            fom_n()
            dnit()
            nh4()
            no3()
            urea()
            surfaceom_n  # Total mass of all surface organic nitrogen
            surfaceom_wt  # Total mass of all surface organic materials
            leach_no3
            leach_nh4
            leach_urea
            n_removed
            n_returned
            n_som
            n_urine
        events Reporting Frequency: event=end_day  # End of day
        memo
          	Note: If you have Observered data for some samplings but not others, then in the .out file (for the observations) you can use * or ?  for those missing values instead of using 0

          	This allows you to tell the difference between data you did not collect, and data that actually had a value of 0

          	Data with a * or ? is not plotted on the graph (hence neither is its predicted value) whereas data with 0 is.
      manager trace
        on init:
```
treat = 0
```
  simulation Winchmore1966 Irrig
    clock
      start_date = 01/07/1966  # Enter the start date of the simulation
      end_date = 30/06/2004  # Enter the end date of the simulation
    metfile met: filename=Winchmore.met
    summaryfile
    area PadIrrigated
      AgPasture ryegrass_clover
        thisCropName = ryegrass_clover  # Crop name shown as on the simulation tree
        speciesToSimulate = ryegrass whiteclover  # Name of species to simulate
        speciesName = ryegrass whiteclover  # Species names
        micrometType = grass grass  # crop type for MicroMet
        isLegume = 0 1  # Legume species? no=0, yes=1
        photoPath = 3 3  # C3 or C4 species? C3=3, C4=4
        rootDepth = 900  300
        tempMinGrowth = 2 4  # Minimum temperature for growth
        growthTmax = 32 32  # Maximum temperature for growth
        tempOptGrowth = 20 22  # Optimum temperature for growth
        exponentTempGrowth = 2 2  # Curvture of growth response to temperature
        tempMinTissueTurnover = 2 2  # Minimum temperature for mass flux
        tempMaxTissueTurnover = 20 20  # Optimum temperature for mass flux
        scaleFactorGLFWTissueTurnover = 2 2  # Scale factor for response of mass flux to soil moisture
        referenceGLFWTissueTurnover = 0.5 0.5  # Optimum soil moisture for mass flux
        useHeatStress = yes  yes  # Consider effects of high temperatures on photosynthesis? (yes/no)
        tempOnsetHeatStress = 25 28  # Heat effects- Onset temperature
        tempFullHeatStress = 31 35  # Heat effects- Full temperature
        sumTempHeatStress = 30 30  # Heat effects- Temperature sum for recovery
        useColdStress = yes  yes  # Consider effects of low temperatures on photosynthesis? (yes/no)
        tempOnsetColdStress = 0 0  # Cold effects- Onset temperature
        tempFullColdStress = -3 -3  # Cold effects- Full temperature
        sumTempColdStress = 30 30  # Cold effects- Temperature sum for recovery
        Pm = 1 1  # Reference CO2 assimilation rate (mg CO2/m2.s)
        maintRespiration = 3 3  # Maintenance respiration coefficient (%)
        growthEfficiency = 0.75 0.75
        SpecificLeafArea = 20 20
        lightExtCoeff = 0.5 0.8  # Light extinction coefficient
        stockParameter = 0.05 0.05  # Stock influence parameter
        maxRootFraction = 0.25 0.25  # Maximum biomass fraction allocated to root
        leafRate = 3 3  # Reference leaf appearance rate without stress
        fLeaf = 0.7 0.56  # Reference growth partition to leaves
        fStolon = 0 0.2  # Reference growth partition to stolon
        digestLive = 0.6 0.6  # Digestibility of live plant material
        digestDead = 0.2 0.2  # Digestibility of dead plant material
        dmshoot = 1500 350  # Initial shoot dry matter (kg/ha)
        dmgreenmin = 500 50  # Minimum green dry matter (kg/ha)
        NconcOptimum_leaves = 4 4.5  # N concentration - leaf optimum
        NconcMaximum_leaves = 5 5.5  # N concentration - leaf luxary
        NconcMinimum_leaves = 1.2 2.0  # N concentration - leaf scenescent
        RelativeNconc_Stems = 0.5 0.5  # Stem N concentration as fraction of leaf N concentration
        RelativeNconc_Stolons = 0 0.5  # Stolon N concentration as fraction of leaf N concentration
        RelativeNconc_Roots = 0.5 0.5  # Root N concentration as fraction of leaf N concentration
        NMinFix = 0 0.2  # Minimum N fixation (when soil N is sufficient)
        NMaxFix = 0 0.6  # Maximum N fixation (when soil N is unavailable)
        CO2PmaxScale = 700 700  # CO2 - Scale factor for CO2 effect on photosynthesis
        CO2NScale = 600 600  # CO2 - Scale factor for CO2 effects on plant N concentration
        CO2NMin = 0.7 0.7  # CO2 - Minimum fraction that plant N concentration may reduce to uder elevated CO2
        CO2NCurvature = 2 2  # CO2 - Curvature factor of CO2 effect on plant N concentration
        Frgr = 1 1  # Relative growth factor
        rlvp = 1.0 1.0  # Root distribution of swards (relative to each soil layer)
      Soil SoilLismoreIrrig: Site=Winchmore Research Station; Region=Canterbury; State=New Zealand; Longitude=170
        Comment = Soil naming structure: \State\Region\Classification-Local Name (Site/district and locator number)  # Comments
        SoilType = Lismore  # Soil description
        NearestTown = Winchmore
        ApsoilNumber = 0
        Latitude = -42  # Latitude (WGS84)
        LocationAccuracy = +/-20m
        DataSource = Based on measurements
        InitialWater Initial water: FractionFull=1.00; PercentMethod=FilledFromTop
        Water
          Thickness  BD    AirDry  LL15  DUL   SAT
          100        1.25  0.06    0.14  0.32  0.45
          200        1.31  0.06    0.14  0.32  0.45
          300        1.23  0.03    0.03  0.07  0.15
          300        1.24  0.03    0.03  0.05  0.08
          300        1.25  0.03    0.03  0.05  0.08
          300        1.26  0.03    0.03  0.05  0.08
          300        1.29  0.03    0.03  0.05  0.08
          SoilCrop ryegrass_clover: LL=[0.14, 0.14, 0.03, 0.03, 0.03, 0.03, 0.03]; KL=[0.1, 0.1, 0.1, 0.02, 0, 0, 0]; XF=[1, 1, 1, 1, 0, 0, 0]
          SoilCrop agpasture: LL=[0.14, 0.14, 0.03, 0.03, 0.03, 0.03, 0.03]; KL=[0.1, 0.1, 0.1, 0.02, 0, 0, 0]; XF=[1, 1, 1, 1, 0, 0, 0]
          SoilCrop ryegrass: LL=[0.14, 0.14, 0.03, 0.02, 0.02, 0.02, 0.02]; KL=[0.1, 0.1, 0.1, 0.02, 0, 0, 0]; XF=[1, 1, 1, 1, 0, 0, 0]
          SoilCrop clover: LL=[0.14, 0.14, 0.03, 0.02, 0.02, 0.02, 0.02]; KL=[0.1, 0.1, 0.1, 0.02, 0, 0, 0]; XF=[1, 1, 1, 1, 0, 0, 0]
          SoilCrop maize: LL=[0.14, 0.14, 0.03, 0.02, 0.02, 0.02, 0.02]; KL=[0.06, 0.06, 0.06, 0.06, 0.06, 0.06, 0.06]; XF=[1, 1, 1, 1, 1, 1, 1]
        SoilWater: same as Winchmore1966 Dryland.PadDryland.SoilLismoreDry.SoilWater
        SoilOrganicMatter: RootCN=40; RootWt=800; SoilCN=10.5; EnrACoeff=7.4; EnrBCoeff=0.2
          Thickness  OC   FBiom  FInert
          100        3.5  0.04   0.3
          200        2    0.02   0.5
          300        0.2  0.02   0.6
          300        0.1  0.01   0.8
          300        0.1  0.01   1
          300        0    0      1
          300        0    0      1
        Analysis: Thickness=[100, 200, 300, 300, 300, 300, 300]; PH=[5.9, 5.9, 5.9, 5.9, 5.9, 5.9, 5.9]
        Sample Initial nitrogen: same as Winchmore1966 Dryland.PadDryland.SoilLismoreDry.Initial nitrogen
      micromet
        soilalbedo = 0.23
        a_interception = 0
        b_interception = 0
        c_interception = 0
        d_interception = 0
      fertiliser
      surfaceom Surface Organic Matter
        PoolName = AgPasture  # Organic Matter pool name
        type = grass  # Organic Matter type
        mass = 1000  # Initial surface residue (kg/ha)
        cnr = 15  # C:N ratio of initial residue
        standing_fraction = 0  # Fraction of residue standing
      irrigation
        automatic_irrigation = on
        asw_depth = 900  # Depth to which ASW is calculated. (mm)
        crit_fr_asw = 0  # Fraction of ASW below which irrigation is applied (0-1.0)
        irrigation_efficiency = 0.75  # Efficiency of the irrigation. (0-1.0)
        irrigation_allocation = off  # Allocation limits
        allocation = 0  # Allocation in ML
        default_no3_conc = 0  # Nitrate concentration (ppm N)
        default_nh4_conc = 0  # Ammonium concentration (ppm N)
        default_cl_conc = 0  # Chloride concentration (ppm Cl)
        default_no3_conc = 0  # Nitrate concentration (ppm N)
        default_nh4_conc = 0  # Ammonium concentration (ppm N)
        default_cl_conc = 0  # Chloride concentration (ppm Cl)
      manager trace
        on init:
```
treat = 3
```
      manager Harvest specified dates at Winchmore_1966L2: same as Winchmore1966 Dryland.PadDryland.Harvest specified dates at Winchmore_1966L2
      operations operations irrigation at Winchmore_1966
        1/07/1966  'Irrigation' set irrigation_efficiency = 0.70
        18/09/1958  'Irrigation' apply amount = 100 (mm)
        8/10/1958  'Irrigation' apply amount = 100 (mm)
        4/11/1958  'Irrigation' apply amount = 100 (mm)
        14/11/1958  'Irrigation' apply amount = 100 (mm)
        23/12/1958  'Irrigation' apply amount = 100 (mm)
        30/12/1958  'Irrigation' apply amount = 100 (mm)
        9/01/1959  'Irrigation' apply amount = 100 (mm)
        20/01/1959  'Irrigation' apply amount = 100 (mm)
        28/01/1959  'Irrigation' apply amount = 100 (mm)
        12/02/1959  'Irrigation' apply amount = 100 (mm)
        20/02/1959  'Irrigation' apply amount = 100 (mm)
        10/03/1959  'Irrigation' apply amount = 100 (mm)
        18/09/1959  'Irrigation' apply amount = 100 (mm)
        8/10/1959  'Irrigation' apply amount = 100 (mm)
        4/11/1959  'Irrigation' apply amount = 100 (mm)
        23/11/1959  'Irrigation' apply amount = 100 (mm)
        29/12/1959  'Irrigation' apply amount = 100 (mm)
        15/01/1960  'Irrigation' apply amount = 100 (mm)
        25/01/1960  'Irrigation' apply amount = 100 (mm)
        3/02/1960  'Irrigation' apply amount = 100 (mm)
        18/02/1960  'Irrigation' apply amount = 100 (mm)
        7/03/1960  'Irrigation' apply amount = 100 (mm)
        27/10/1960  'Irrigation' apply amount = 100 (mm)
        25/11/1960  'Irrigation' apply amount = 100 (mm)
        23/12/1960  'Irrigation' apply amount = 100 (mm)
        5/01/1961  'Irrigation' apply amount = 100 (mm)
        7/04/1961  'Irrigation' apply amount = 100 (mm)
        17/10/1961  'Irrigation' apply amount = 100 (mm)
        31/10/1961  'Irrigation' apply amount = 100 (mm)
        11/11/1961  'Irrigation' apply amount = 100 (mm)
        22/11/1961  'Irrigation' apply amount = 100 (mm)
        12/12/1961  'Irrigation' apply amount = 100 (mm)
        23/12/1961  'Irrigation' apply amount = 100 (mm)
        13/01/1962  'Irrigation' apply amount = 100 (mm)
        22/01/1962  'Irrigation' apply amount = 100 (mm)
        31/01/1962  'Irrigation' apply amount = 100 (mm)
        16/10/1962  'Irrigation' apply amount = 100 (mm)
        23/11/1962  'Irrigation' apply amount = 100 (mm)
        14/12/1962  'Irrigation' apply amount = 100 (mm)
        24/12/1962  'Irrigation' apply amount = 100 (mm)
        4/01/1963  'Irrigation' apply amount = 100 (mm)
        19/01/1963  'Irrigation' apply amount = 100 (mm)
        1/02/1963  'Irrigation' apply amount = 100 (mm)
        9/04/1963  'Irrigation' apply amount = 100 (mm)
        19/10/1963  'Irrigation' apply amount = 100 (mm)
        26/11/1963  'Irrigation' apply amount = 100 (mm)
        13/12/1963  'Irrigation' apply amount = 100 (mm)
        3/01/1964  'Irrigation' apply amount = 100 (mm)
        21/01/1964  'Irrigation' apply amount = 100 (mm)
        29/01/1964  'Irrigation' apply amount = 100 (mm)
        11/02/1964  'Irrigation' apply amount = 100 (mm)
        24/02/1964  'Irrigation' apply amount = 100 (mm)
        28/03/1964  'Irrigation' apply amount = 100 (mm)
        5/10/1964  'Irrigation' apply amount = 100 (mm)
        30/10/1964  'Irrigation' apply amount = 100 (mm)
        20/11/1964  'Irrigation' apply amount = 100 (mm)
        5/12/1964  'Irrigation' apply amount = 100 (mm)
        18/12/1964  'Irrigation' apply amount = 100 (mm)
        30/12/1964  'Irrigation' apply amount = 100 (mm)
        9/01/1965  'Irrigation' apply amount = 100 (mm)
        21/01/1965  'Irrigation' apply amount = 100 (mm)
        24/02/1965  'Irrigation' apply amount = 100 (mm)
        11/10/1965  'Irrigation' apply amount = 100 (mm)
        4/12/1965  'Irrigation' apply amount = 100 (mm)
        16/12/1965  'Irrigation' apply amount = 100 (mm)
        15/01/1966  'Irrigation' apply amount = 100 (mm)
        4/02/1966  'Irrigation' apply amount = 100 (mm)
        15/02/1966  'Irrigation' apply amount = 100 (mm)
        25/03/1966  'Irrigation' apply amount = 100 (mm)
        5/10/1966  'Irrigation' apply amount = 100 (mm)
        29/10/1966  'Irrigation' apply amount = 100 (mm)
        5/12/1966  'Irrigation' apply amount = 100 (mm)
        21/12/1966  'Irrigation' apply amount = 100 (mm)
        20/01/1967  'Irrigation' apply amount = 100 (mm)
        1/02/1967  'Irrigation' apply amount = 100 (mm)
        15/02/1967  'Irrigation' apply amount = 100 (mm)
        27/02/1967  'Irrigation' apply amount = 100 (mm)
        18/10/1967  'Irrigation' apply amount = 100 (mm)
        8/12/1967  'Irrigation' apply amount = 100 (mm)
        20/12/1967  'Irrigation' apply amount = 100 (mm)
        3/01/1968  'Irrigation' apply amount = 100 (mm)
        12/01/1968  'Irrigation' apply amount = 100 (mm)
        13/02/1968  'Irrigation' apply amount = 100 (mm)
        26/02/1968  'Irrigation' apply amount = 100 (mm)
        20/09/1968  'Irrigation' apply amount = 100 (mm)
        30/10/1968  'Irrigation' apply amount = 100 (mm)
        29/11/1968  'Irrigation' apply amount = 100 (mm)
        19/12/1968  'Irrigation' apply amount = 100 (mm)
        6/01/1969  'Irrigation' apply amount = 100 (mm)
        21/01/1969  'Irrigation' apply amount = 100 (mm)
        26/02/1969  'Irrigation' apply amount = 100 (mm)
        18/03/1969  'Irrigation' apply amount = 100 (mm)
        14/04/1969  'Irrigation' apply amount = 100 (mm)
        22/10/1969  'Irrigation' apply amount = 100 (mm)
        7/11/1969  'Irrigation' apply amount = 100 (mm)
        21/11/1969  'Irrigation' apply amount = 100 (mm)
        8/12/1969  'Irrigation' apply amount = 100 (mm)
        3/01/1970  'Irrigation' apply amount = 100 (mm)
        17/02/1970  'Irrigation' apply amount = 100 (mm)
        27/02/1970  'Irrigation' apply amount = 100 (mm)
        22/04/1970  'Irrigation' apply amount = 100 (mm)
        18/11/1970  'Irrigation' apply amount = 100 (mm)
        2/12/1970  'Irrigation' apply amount = 100 (mm)
        28/12/1970  'Irrigation' apply amount = 100 (mm)
        20/01/1971  'Irrigation' apply amount = 100 (mm)
        8/02/1971  'Irrigation' apply amount = 100 (mm)
        18/02/1971  'Irrigation' apply amount = 100 (mm)
        16/03/1971  'Irrigation' apply amount = 100 (mm)
        8/04/1971  'Irrigation' apply amount = 100 (mm)
        13/10/1971  'Irrigation' apply amount = 100 (mm)
        11/11/1971  'Irrigation' apply amount = 100 (mm)
        1/12/1971  'Irrigation' apply amount = 100 (mm)
        15/12/1971  'Irrigation' apply amount = 100 (mm)
        31/12/1971  'Irrigation' apply amount = 100 (mm)
        19/01/1972  'Irrigation' apply amount = 100 (mm)
        28/01/1972  'Irrigation' apply amount = 100 (mm)
        21/02/1972  'Irrigation' apply amount = 100 (mm)
        9/03/1972  'Irrigation' apply amount = 100 (mm)
        20/03/1972  'Irrigation' apply amount = 100 (mm)
        26/09/1972  'Irrigation' apply amount = 100 (mm)
        7/11/1972  'Irrigation' apply amount = 100 (mm)
        20/11/1972  'Irrigation' apply amount = 100 (mm)
        29/12/1972  'Irrigation' apply amount = 100 (mm)
        9/01/1973  'Irrigation' apply amount = 100 (mm)
        19/01/1973  'Irrigation' apply amount = 100 (mm)
        2/02/1973  'Irrigation' apply amount = 100 (mm)
        19/02/1973  'Irrigation' apply amount = 100 (mm)
        16/03/1973  'Irrigation' apply amount = 100 (mm)
        10/10/1973  'Irrigation' apply amount = 100 (mm)
        2/11/1973  'Irrigation' apply amount = 100 (mm)
        23/11/1973  'Irrigation' apply amount = 100 (mm)
        7/12/1973  'Irrigation' apply amount = 100 (mm)
        7/01/1974  'Irrigation' apply amount = 100 (mm)
        30/01/1974  'Irrigation' apply amount = 100 (mm)
        20/11/1974  'Irrigation' apply amount = 100 (mm)
        3/12/1974  'Irrigation' apply amount = 100 (mm)
        24/12/1974  'Irrigation' apply amount = 100 (mm)
        3/01/1975  'Irrigation' apply amount = 100 (mm)
        13/01/1975  'Irrigation' apply amount = 100 (mm)
        10/02/1975  'Irrigation' apply amount = 100 (mm)
        1/12/1975  'Irrigation' apply amount = 100 (mm)
        12/12/1975  'Irrigation' apply amount = 100 (mm)
        22/12/1975  'Irrigation' apply amount = 100 (mm)
        9/01/1976  'Irrigation' apply amount = 100 (mm)
        5/02/1976  'Irrigation' apply amount = 100 (mm)
        2/03/1976  'Irrigation' apply amount = 100 (mm)
        18/03/1976  'Irrigation' apply amount = 100 (mm)
        29/04/1976  'Irrigation' apply amount = 100 (mm)
        1/02/1977  'Irrigation' apply amount = 100 (mm)
        21/02/1977  'Irrigation' apply amount = 100 (mm)
        11/03/1977  'Irrigation' apply amount = 100 (mm)
        30/03/1977  'Irrigation' apply amount = 100 (mm)
        28/10/1977  'Irrigation' apply amount = 100 (mm)
        18/11/1977  'Irrigation' apply amount = 100 (mm)
        29/11/1977  'Irrigation' apply amount = 100 (mm)
        8/12/1977  'Irrigation' apply amount = 100 (mm)
        10/01/1978  'Irrigation' apply amount = 100 (mm)
        2/02/1978  'Irrigation' apply amount = 100 (mm)
        13/02/1978  'Irrigation' apply amount = 100 (mm)
        2/03/1978  'Irrigation' apply amount = 100 (mm)
        14/03/1978  'Irrigation' apply amount = 100 (mm)
        24/11/1978  'Irrigation' apply amount = 100 (mm)
        3/01/1979  'Irrigation' apply amount = 100 (mm)
        19/01/1979  'Irrigation' apply amount = 100 (mm)
        31/01/1979  'Irrigation' apply amount = 100 (mm)
        16/02/1979  'Irrigation' apply amount = 100 (mm)
        15/12/1979  'Irrigation' apply amount = 100 (mm)
        22/12/1979  'Irrigation' apply amount = 100 (mm)
        30/01/1980  'Irrigation' apply amount = 100 (mm)
        25/09/1980  'Irrigation' apply amount = 100 (mm)
        28/10/1980  'Irrigation' apply amount = 100 (mm)
        29/12/1980  'Irrigation' apply amount = 100 (mm)
        7/01/1981  'Irrigation' apply amount = 100 (mm)
        26/01/1981  'Irrigation' apply amount = 100 (mm)
        10/02/1981  'Irrigation' apply amount = 100 (mm)
        7/03/1981  'Irrigation' apply amount = 100 (mm)
        12/11/1981  'Irrigation' apply amount = 100 (mm)
        2/12/1981  'Irrigation' apply amount = 100 (mm)
        14/12/1981  'Irrigation' apply amount = 100 (mm)
        12/01/1982  'Irrigation' apply amount = 100 (mm)
        22/01/1982  'Irrigation' apply amount = 100 (mm)
        1/02/1982  'Irrigation' apply amount = 100 (mm)
        15/02/1982  'Irrigation' apply amount = 100 (mm)
        8/03/1982  'Irrigation' apply amount = 100 (mm)
        19/03/1982  'Irrigation' apply amount = 100 (mm)
        10/11/1982  'Irrigation' apply amount = 100 (mm)
        24/11/1982  'Irrigation' apply amount = 100 (mm)
        24/12/1982  'Irrigation' apply amount = 100 (mm)
        11/01/1983  'Irrigation' apply amount = 100 (mm)
        1/02/1983  'Irrigation' apply amount = 100 (mm)
        18/02/1983  'Irrigation' apply amount = 100 (mm)
        5/04/1983  'Irrigation' apply amount = 100 (mm)
        21/11/1983  'Irrigation' apply amount = 100 (mm)
        29/12/1983  'Irrigation' apply amount = 100 (mm)
        27/01/1984  'Irrigation' apply amount = 100 (mm)
        29/02/1984  'Irrigation' apply amount = 100 (mm)
        20/04/1984  'Irrigation' apply amount = 100 (mm)
        15/10/1984  'Irrigation' apply amount = 100 (mm)
        5/11/1984  'Irrigation' apply amount = 100 (mm)
        4/12/1984  'Irrigation' apply amount = 100 (mm)
        21/12/1984  'Irrigation' apply amount = 100 (mm)
        3/01/1985  'Irrigation' apply amount = 100 (mm)
        10/01/1985  'Irrigation' apply amount = 100 (mm)
        21/01/1985  'Irrigation' apply amount = 100 (mm)
        30/01/1985  'Irrigation' apply amount = 100 (mm)
        8/02/1985  'Irrigation' apply amount = 100 (mm)
        6/03/1985  'Irrigation' apply amount = 100 (mm)
        7/10/1985  'Irrigation' apply amount = 100 (mm)
        6/01/1986  'Irrigation' apply amount = 100 (mm)
        22/01/1986  'Irrigation' apply amount = 100 (mm)
        7/02/1986  'Irrigation' apply amount = 100 (mm)
        17/11/1986  'Irrigation' apply amount = 100 (mm)
        15/12/1986  'Irrigation' apply amount = 100 (mm)
        15/01/1987  'Irrigation' apply amount = 100 (mm)
        28/01/1987  'Irrigation' apply amount = 100 (mm)
        4/02/1987  'Irrigation' apply amount = 100 (mm)
        8/04/1987  'Irrigation' apply amount = 100 (mm)
        7/11/1987  'Irrigation' apply amount = 100 (mm)
        30/12/1987  'Irrigation' apply amount = 100 (mm)
        8/01/1988  'Irrigation' apply amount = 100 (mm)
        18/01/1988  'Irrigation' apply amount = 100 (mm)
        28/01/1988  'Irrigation' apply amount = 100 (mm)
        9/02/1988  'Irrigation' apply amount = 100 (mm)
        3/03/1988  'Irrigation' apply amount = 100 (mm)
        21/03/1988  'Irrigation' apply amount = 100 (mm)
        26/09/1988  'Irrigation' apply amount = 100 (mm)
        17/10/1988  'Irrigation' apply amount = 100 (mm)
        15/11/1988  'Irrigation' apply amount = 100 (mm)
        12/12/1988  'Irrigation' apply amount = 100 (mm)
        26/12/1988  'Irrigation' apply amount = 100 (mm)
        17/01/1989  'Irrigation' apply amount = 100 (mm)
        17/02/1989  'Irrigation' apply amount = 100 (mm)
        28/02/1989  'Irrigation' apply amount = 100 (mm)
        22/03/1989  'Irrigation' apply amount = 100 (mm)
        9/11/1989  'Irrigation' apply amount = 100 (mm)
        14/12/1989  'Irrigation' apply amount = 100 (mm)
        8/01/1990  'Irrigation' apply amount = 100 (mm)
        22/01/1990  'Irrigation' apply amount = 100 (mm)
        1/02/1990  'Irrigation' apply amount = 100 (mm)
        22/02/1990  'Irrigation' apply amount = 100 (mm)
        10/04/1990  'Irrigation' apply amount = 100 (mm)
        12/11/1990  'Irrigation' apply amount = 100 (mm)
        14/12/1990  'Irrigation' apply amount = 100 (mm)
        8/01/1991  'Irrigation' apply amount = 100 (mm)
        4/02/1991  'Irrigation' apply amount = 100 (mm)
        11/03/1991  'Irrigation' apply amount = 100 (mm)
        22/11/1991  'Irrigation' apply amount = 100 (mm)
        15/01/1992  'Irrigation' apply amount = 100 (mm)
        5/02/1992  'Irrigation' apply amount = 100 (mm)
        27/02/1992  'Irrigation' apply amount = 100 (mm)
        18/03/1992  'Irrigation' apply amount = 100 (mm)
        7/04/1992  'Irrigation' apply amount = 100 (mm)
        13/01/1993  'Irrigation' apply amount = 100 (mm)
        26/01/1993  'Irrigation' apply amount = 100 (mm)
        4/03/1993  'Irrigation' apply amount = 100 (mm)
        22/10/1993  'Irrigation' apply amount = 100 (mm)
        2/02/1994  'Irrigation' apply amount = 100 (mm)
        4/11/1994  'Irrigation' apply amount = 100 (mm)
        28/11/1994  'Irrigation' apply amount = 100 (mm)
        20/12/1994  'Irrigation' apply amount = 100 (mm)
        16/01/1995  'Irrigation' apply amount = 100 (mm)
        15/02/1995  'Irrigation' apply amount = 100 (mm)
        28/02/1995  'Irrigation' apply amount = 100 (mm)
        7/12/1996  'Irrigation' apply amount = 100 (mm)
        1/01/1996  'Irrigation' apply amount = 100 (mm)
        22/01/1996  'Irrigation' apply amount = 100 (mm)
        6/02/1996  'Irrigation' apply amount = 100 (mm)
        23/10/1996  'Irrigation' apply amount = 100 (mm)
        25/11/1996  'Irrigation' apply amount = 100 (mm)
        20/12/1996  'Irrigation' apply amount = 100 (mm)
        4/02/1997  'Irrigation' apply amount = 100 (mm)
        4/03/1997  'Irrigation' apply amount = 100 (mm)
        7/11/1997  'Irrigation' apply amount = 100 (mm)
        18/11/1997  'Irrigation' apply amount = 100 (mm)
        3/12/1997  'Irrigation' apply amount = 100 (mm)
        29/12/1997  'Irrigation' apply amount = 100 (mm)
        15/01/1998  'Irrigation' apply amount = 100 (mm)
        29/01/1998  'Irrigation' apply amount = 100 (mm)
        9/02/1998  'Irrigation' apply amount = 100 (mm)
        19/02/1998  'Irrigation' apply amount = 100 (mm)
        30/03/1998  'Irrigation' apply amount = 100 (mm)
        2/10/1998  'Irrigation' apply amount = 100 (mm)
        10/11/1998  'Irrigation' apply amount = 100 (mm)
        8/12/1998  'Irrigation' apply amount = 100 (mm)
        18/12/1998  'Irrigation' apply amount = 100 (mm)
        28/12/1998  'Irrigation' apply amount = 100 (mm)
        6/01/1999  'Irrigation' apply amount = 100 (mm)
        26/01/1999  'Irrigation' apply amount = 100 (mm)
        10/02/1999  'Irrigation' apply amount = 100 (mm)
        9/02/2000  'Irrigation' apply amount = 100 (mm)
        3/03/2000  'Irrigation' apply amount = 100 (mm)
        31/10/2000  'Irrigation' apply amount = 100 (mm)
        13/12/2000  'Irrigation' apply amount = 100 (mm)
        28/12/2000  'Irrigation' apply amount = 100 (mm)
        22/01/2001  'Irrigation' apply amount = 100 (mm)
        13/02/2001  'Irrigation' apply amount = 100 (mm)
        8/03/2001  'Irrigation' apply amount = 100 (mm)
        28/03/2001  'Irrigation' apply amount = 100 (mm)
        18/04/2001  'Irrigation' apply amount = 100 (mm)
        18/11/2001  'Irrigation' apply amount = 100 (mm)
        17/12/2001  'Irrigation' apply amount = 100 (mm)
        27/02/2002  'Irrigation' apply amount = 100 (mm)
        18/03/2002  'Irrigation' apply amount = 100 (mm)
        29/10/2002  'Irrigation' apply amount = 100 (mm)
        23/12/2002  'Irrigation' apply amount = 100 (mm)
        6/01/2003  'Irrigation' apply amount = 100 (mm)
        29/10/2003  'Irrigation' apply amount = 100 (mm)
        23/12/2003  'Irrigation' apply amount = 100 (mm)
        6/01/2003  'Irrigation' apply amount = 100 (mm)
        11/02/2003  'Irrigation' apply amount = 100 (mm)
        10/03/2003  'Irrigation' apply amount = 100 (mm)
        1/10/2003  'Irrigation' apply amount = 100 (mm)
        15/11/2003  'Irrigation' apply amount = 100 (mm)
      outputfile: filename=Winchmore1966 Irrig PadIrrigated.out; title=Winchmore1966 Irrig PadIrrigated
        variables: same as Winchmore1966 Dryland.PadDryland.outputfile.Variables
        events Reporting Frequency: event=end_day  # End of day
        memo: same as Winchmore1966 Dryland.PadDryland.outputfile.memo
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