folder untitled: version=32
  folder Lawes2006
    simulation Lawes06P1Wet
      clock
        start_date = 29/03/2006  # Select the start date of the simulation
        end_date = 3/07/2006  # Select the end date of the simulation
      log
      summaryfile
      metfile met: filename=DPI2006b.met
      area Paddock
        micromet
          soilalbedo = 0.23
          a_interception = 0
          b_interception = 0
          c_interception = 0.1
          d_interception = 0
        folder Manager folder
          manager Sow on a fixed date
            # Sowing criteria
            date = 4-Apr-2006  # Enter sowing date (dd-mmm)
            # Sowing parameters
            crop = broccoli  # Enter name of crop to sow
            density = 4  # Enter sowing density (plants/m2)
            depth = 50  # Enter sowing depth (mm)
            cultivar = greenbelt  # Enter cultivar
            row_spacing = 600  # Enter row spacing (mm)
            class = transplant  # Enter Crop Class
            on start_of_day:
```
      if (today = date('[date]') then
                    [crop] sow population =[density], depth = [depth], cultivar = [cultivar], MaxCover = 1.0, BudNumber = 1, row_spacing = [row_spacing], crop_class = [class]
        endif
```
          operations LeafHarvests
            24-Apr-2006  LeafOutput do_output
            10-May-2006  LeafOutput do_output
            23-May-2006  LeafOutput do_output
            22-Jun-2006  LeafOutput do_output
          operations
            5/04/2006  irrigation apply amount = 45
            6/04/2006  irrigation apply amount = 0
            7/04/2006  irrigation apply amount = 0
            8/04/2006  irrigation apply amount = 31
            9/04/2006  irrigation apply amount = 0
            10/04/2006  irrigation apply amount = 0
            11/04/2006  irrigation apply amount = 8.03775459513155
            12/04/2006  irrigation apply amount = 0
            13/04/2006  irrigation apply amount = 0
            14/04/2006  irrigation apply amount = 0
            15/04/2006  irrigation apply amount = 5.06706408345752
            16/04/2006  irrigation apply amount = 0
            17/04/2006  irrigation apply amount = 0
            18/04/2006  irrigation apply amount = 7.38201689021368
            19/04/2006  irrigation apply amount = 0
            20/04/2006  irrigation apply amount = 0
            21/04/2006  irrigation apply amount = 0
            22/04/2006  irrigation apply amount = 7.83904619970193
            23/04/2006  irrigation apply amount = 0
            24/04/2006  irrigation apply amount = 0
            25/04/2006  irrigation apply amount = 6.29316420014084
            26/04/2006  irrigation apply amount = 0
            27/04/2006  irrigation apply amount = 0
            28/04/2006  irrigation apply amount = 0
            29/04/2006  irrigation apply amount = 4.03100775193798
            30/04/2006  irrigation apply amount = 0
            1/05/2006  irrigation apply amount = 0
            2/05/2006  irrigation apply amount = 6.26924987580732
            3/05/2006  irrigation apply amount = 0
            4/05/2006  irrigation apply amount = 2.81888653981678
            5/05/2006  irrigation apply amount = 0
            6/05/2006  irrigation apply amount = 6.28611698379147
            7/05/2006  irrigation apply amount = 0
            8/05/2006  irrigation apply amount = 0
            9/05/2006  irrigation apply amount = 6.2649753347427
            10/05/2006  irrigation apply amount = 0
            11/05/2006  irrigation apply amount = 6.35658914728682
            12/05/2006  irrigation apply amount = 0
            13/05/2006  irrigation apply amount = 8.21095571095574
            14/05/2006  irrigation apply amount = 0
            15/05/2006  irrigation apply amount = 0
            16/05/2006  irrigation apply amount = 6.04073522106314
            17/05/2006  irrigation apply amount = 0
            18/05/2006  irrigation apply amount = 0
            19/05/2006  irrigation apply amount = 0
            20/05/2006  irrigation apply amount = 6.42191142191142
            21/05/2006  irrigation apply amount = 0
            22/05/2006  irrigation apply amount = 0
            23/05/2006  irrigation apply amount = 8.29607550919024
            24/05/2006  irrigation apply amount = 0
            25/05/2006  irrigation apply amount = 0
            26/05/2006  irrigation apply amount = 0
            27/05/2006  irrigation apply amount = 8.11227024341781
            28/05/2006  irrigation apply amount = 0
            29/05/2006  irrigation apply amount = 0
            30/05/2006  irrigation apply amount = 6.4977645305515
            31/05/2006  irrigation apply amount = 0
            1/06/2006  irrigation apply amount = 0
            2/06/2006  irrigation apply amount = 0
            3/06/2006  irrigation apply amount = 0
            4/06/2006  irrigation apply amount = 9.72180824639839
            5/06/2006  irrigation apply amount = 0
            6/06/2006  irrigation apply amount = 3.12468951813224
            7/06/2006  irrigation apply amount = 0
            8/06/2006  irrigation apply amount = 6.45802285146548
            9/06/2006  irrigation apply amount = 0
            10/06/2006  irrigation apply amount = 6.60705414803763
            11/06/2006  irrigation apply amount = 0
            12/06/2006  irrigation apply amount = 0
            13/06/2006  irrigation apply amount = 6.63189269746643
            14/06/2006  irrigation apply amount = 0
            15/06/2006  irrigation apply amount = 0
            16/06/2006  irrigation apply amount = 0
            17/06/2006  irrigation apply amount = 8.37059115747631
            18/06/2006  irrigation apply amount = 0
            19/06/2006  irrigation apply amount = 0
            20/06/2006  irrigation apply amount = 0
            21/06/2006  irrigation apply amount = 0
            22/06/2006  irrigation apply amount = 3.38301043219085
            22/06/2006  broccoli harvest
            22/06/2006  broccoli EndCrop
            24/06/2006  irrigation apply amount = 6.78589170392443
          manager Calculations
            on init:
```
TotalET = 0.0
DAS = 0
SW60 = 0
```
            on end_of_day:
```
TotalET = es
if broccoli.plant_status <> 'out' then
TotalET = TotalET + broccoli.LeafTranspiration

if broccoli.LeafLAI > 0 then
  DAS = DAS + 1
endif
endif

SW60 = sw_dep(1) + sw_dep(2) + sw_dep(3)
```
        fertiliser
        surfaceom surface organic matter
          PoolName = wheat  # Organic Matter pool name
          type = wheat  # Organic Matter type
          mass = 1000  # Initial surface residue (kg/ha)
          cnr = 80  # C:N ration of initial residue
          standing_fraction = 0  # Fraction of residue standing
        outputfile: filename=Lawes06P1Wet.out; title=Lawes06P1Wet
          variables My Variables
            variable:
              dd/mm/yyyy as Date
              day
              DAS
              PhenologyCurrentPhaseName
              PhenologyThermalTimeValue
              broccoli.AboveGroundWt as Biomass
              broccoli.LeafAppearedCohortNo
              LeafLAI as LAI
              LeafTranspiration
              LeafWaterDemand
              RootWaterSupply
              eo
              es
              TotalET
              evap
              WaterSupplyDemandRatio
              broccoli.PhenologyThermalTimeValue
              broccoli.LeafPhotosynthesisFtValue
              LeafPhotosynthesisFvpdValue
              Irrigation.irrigation
              LeafFinalNodeNo
              broccoli.LeafDeadCohortNo
              broccoli.LeafExpandedCohortNo
              sw_dep()
              SW60
              broccoli.LeafLiveWt
              broccoli.StemLiveWt
              sw
              no3
              RootDepth
              StageCodeValue
              PhenologyVernalisationCumulativeVD
              PhenologyJuvenileTTinPhase
              StageCodeValue
              LeafDMSupplyPhotosynthesis
              FloretLiveWt
              Height
              LeafExpansionStressValue
              LeafFw
              LeafSpecificArea
              Interception
              peta
              petr
              broccoli.FloretLiveWt
              broccoli.LeafFn
              NO3()
              broccoli.TotalN
              broccoli.StructurePlantMainStemNodeNo
          events My Variables Events: event=Daily  # End of day
        broccoli
        outputfile Final: filename=Lawes06P1Wet Final.out; title=Lawes06P1Wet Final
          variables FinalVariables
            variable:
              broccoli.sowing_date  # sowing date
              dd/mm/yyyy  # Date (dd/mm/yyyy)
              broccoli.floral_initiation_das  # Days from sowing to floral initiation
              broccoli.maturity_das  # Days from sowing to maturity
              broccoli.green_biomass_wt  # Green Biomass weight
              broccoli.FloretGreenWt  # Weight of pods
              broccoli.leaf_area_max  # leaf areas
              broccoli.stage
              broccoli.cumvd
              broccoli.TTAfterSowing
              broccoli.swdef_photo  # Plant stage
              broccoli.nfact_photo  # Cumulative vernalisation
              broccoli.temp_stress_photo  # Thermal time spent in each crop stage
              Irrigation.irrigation  # Soil water deficit in photosynthesis
              broccoli.dlt_leaf_no  # N factor for photosynthesis
              broccoli.dlt_node_no  # Temperature Stress in photosynthesis
              broccoli.final_leaf_no  # Irrigation entering the profile (mm)
              broccoli.emergence_das  # Change in number of leaves
              broccoli.node_no_sen  # Change in number of nodes
              broccoli.node_no_fx  # Final number of leaves on main stem
              sw_dep()  # Days from sowing to emergence
          events FinalVariables Events: event=broccoli.harvesting
        Soil DPIGatton: irrigation_layer=2; Site=UQ, Lawes; Region=Lockyer
          Comment = oc and ph estimated  # Comments
          SoilType = Prarie  # Soil description
          NearestTown = Gatton, Q 4343
          NaturalVegetation = Blue Gum, Moreton Bay Ash, Tea Tree
          Water
            Layer:
              Thickness (mm)  BD (g/cc)  AirDry (mm/mm)  LL15 (mm/mm)  DUL (mm/mm)  SAT (mm/mm)
              150             1.26       0.14            0.2           0.35         0.38
              150             1.45       0.2             0.21          0.38         0.41
              300             1.27       0.2             0.21          0.38         0.41
              300             1.33       0.2             0.21          0.44         0.47
              300             1.41       0.2             0.21          0.4          0.43
            SoilCrop SweetCorn
              Layer:
                Thickness (mm)  LL (mm/mm)  KL (/day)  XF (0-1)
                150             0.140       0.200      1.000
                150             0.210       0.080      0.300
                300             0.300       0.080      1.000
                300             0.310       0.040      1.000
                300             0.270       0.040      1.000
            SoilCrop Broccoli
              Layer:
                Thickness (mm)  LL (mm/mm)  KL (/day)  XF (0-1)
                150             0.2         0.12       1
                150             0.21        0.08       1
                300             0.25        0.06       1
                300             0.26        0.02       1
                300             0.26        0.02       0
          SoilWat: SummerCona=5; SummerU=5; SummerDate=1-sep; WinterCona=2; WinterU=4; WinterDate=1-may; DiffusConst=40; DiffusSlope=16; Salb=0.13; CN2Bare=95; CNRed=20; CNCov=0.8
            Layer:
              Thickness (mm)  SWCON (0-1)
              150             0.6
              150             0.6
              300             0.6
              300             0.6
              300             0.6
          SoilOrganicMatter: RootCN=40; RootWT=200; SoilCN=12.5; EnrACoeff=7.4; EnrBCoeff=0.2
            Layer:
              Thickness (mm)  OC (Total %)  FBiom (0-1)  FInert (0-1)
              150             1.250         0.030        0.400
              150             1.060         0.020        0.600
              300             0.810         0.010        0.800
              300             0.700         0.010        0.900
              300             0.700         0.010        0.950
          Analysis
            Layer:
              Thickness (mm)  PH (1:5 water)
              150             7
              150             7
              300             7
              300             7
              300             7
          Sample Initial nitrogen
            Layer:
              Thickness (mm)  NO3 (ppm)  NH4 (ppm)
              150             52.9101    52.9102
              150             9.2        0.10002
              300             11.8       0.10002
              300             11.2       0.10002
              300             10.3       0.10002
          Sample Initial water
            Layer:
              Thickness (mm)  SW (mm/mm)
              150             0.264
              150             0.344
              300             0.362
              300             0.42
              300             0.37
        irrigation
          automatic_irrigation = off  # switch
          asw_depth = 600  # Depth to which ASW is calculated. (mm)
          crit_fr_asw = 0.5  # Fraction of ASW below which irrigation is applied (0-1.0)
          irrigation_efficiency = 1  # Efficiency of the irrigation. (0-1.0)
          default_no3_conc = 100  # Nitrate concentration (ppm N)
          default_nh4_conc = 0  # Ammonium concentration (ppm N)
          default_cl_conc = 0  # Chloride concentration (ppm Cl)
        outputfile LeafOutput: filename=Lawes06P1Wet LeafOutput.out; title=Lawes06P1Wet LeafOutput; events=My Variables Events
          variables My Variables
            variables: dd/mm/yyyy as Date, LeafCohortMaxSize
    simulation Lawes06P1Mild -> /untitled/Lawes2006/Lawes06P1Wet
      area Paddock -> /untitled/Lawes2006/Lawes06P1Wet/Paddock
        folder Manager folder -> /untitled/Lawes2006/Lawes06P1Wet/Paddock/Manager folder
          operations
            5/04/2006  irrigation apply amount = 45
            6/04/2006  irrigation apply amount = 0
            7/04/2006  irrigation apply amount = 0
            8/04/2006  irrigation apply amount = 31
            9/04/2006  irrigation apply amount = 0
            10/04/2006  irrigation apply amount = 0
            11/04/2006  irrigation apply amount = 8.03775459513155
            12/04/2006  irrigation apply amount = 0
            13/04/2006  irrigation apply amount = 0
            14/04/2006  irrigation apply amount = 0
            15/04/2006  irrigation apply amount = 5.06706408345752
            16/04/2006  irrigation apply amount = 0
            17/04/2006  irrigation apply amount = 0
            18/04/2006  irrigation apply amount = 7.38201689021368
            19/04/2006  irrigation apply amount = 0
            20/04/2006  irrigation apply amount = 0
            21/04/2006  irrigation apply amount = 0
            22/04/2006  irrigation apply amount = 7.83904619970193
            23/04/2006  irrigation apply amount = 0
            24/04/2006  irrigation apply amount = 0
            25/04/2006  irrigation apply amount = 0
            26/04/2006  irrigation apply amount = 0
            27/04/2006  irrigation apply amount = 0
            28/04/2006  irrigation apply amount = 0
            29/04/2006  irrigation apply amount = 0
            30/04/2006  irrigation apply amount = 0
            1/05/2006  irrigation apply amount = 0
            2/05/2006  irrigation apply amount = 6.26924987580732
            3/05/2006  irrigation apply amount = 0
            4/05/2006  irrigation apply amount = 0
            5/05/2006  irrigation apply amount = 0
            6/05/2006  irrigation apply amount = 0
            7/05/2006  irrigation apply amount = 0
            8/05/2006  irrigation apply amount = 0
            9/05/2006  irrigation apply amount = 0
            10/05/2006  irrigation apply amount = 0
            11/05/2006  irrigation apply amount = 0
            12/05/2006  irrigation apply amount = 0
            13/05/2006  irrigation apply amount = 8.21095571095574
            14/05/2006  irrigation apply amount = 0
            15/05/2006  irrigation apply amount = 0
            16/05/2006  irrigation apply amount = 6.04073522106314
            17/05/2006  irrigation apply amount = 0
            18/05/2006  irrigation apply amount = 0
            19/05/2006  irrigation apply amount = 0
            20/05/2006  irrigation apply amount = 6.42191142191142
            21/05/2006  irrigation apply amount = 0
            22/05/2006  irrigation apply amount = 0
            23/05/2006  irrigation apply amount = 8.29607550919024
            24/05/2006  irrigation apply amount = 0
            25/05/2006  irrigation apply amount = 0
            26/05/2006  irrigation apply amount = 0
            27/05/2006  irrigation apply amount = 8.11227024341781
            28/05/2006  irrigation apply amount = 0
            29/05/2006  irrigation apply amount = 0
            30/05/2006  irrigation apply amount = 6.4977645305515
            31/05/2006  irrigation apply amount = 0
            1/06/2006  irrigation apply amount = 0
            2/06/2006  irrigation apply amount = 0
            3/06/2006  irrigation apply amount = 0
            4/06/2006  irrigation apply amount = 9.72180824639839
            5/06/2006  irrigation apply amount = 0
            6/06/2006  irrigation apply amount = 3.12468951813224
            7/06/2006  irrigation apply amount = 0
            8/06/2006  irrigation apply amount = 6.45802285146548
            9/06/2006  irrigation apply amount = 0
            10/06/2006  irrigation apply amount = 6.60705414803763
            11/06/2006  irrigation apply amount = 0
            12/06/2006  irrigation apply amount = 0
            13/06/2006  irrigation apply amount = 6.63189269746643
            14/06/2006  irrigation apply amount = 0
            15/06/2006  irrigation apply amount = 0
            16/06/2006  irrigation apply amount = 0
            17/06/2006  irrigation apply amount = 8.37059115747631
            18/06/2006  irrigation apply amount = 0
            19/06/2006  irrigation apply amount = 0
            20/06/2006  irrigation apply amount = 0
            21/06/2006  irrigation apply amount = 0
            22/06/2006  irrigation apply amount = 3.38301043219085
            23/06/2006  irrigation apply amount = 0
            24/06/2006  irrigation apply amount = 6.78589170392443
            27/06/2006  broccoli harvest
            27/06/2006  broccoli EndCrop
        outputfile: filename=Lawes06P1Mild.out; title=Lawes06P1Mild
          variables My Variables -> /untitled/Lawes2006/Lawes06P1Wet/Paddock/outputfile/My Variables
          events My Variables Events -> /untitled/Lawes2006/Lawes06P1Wet/Paddock/outputfile/My Variables Events
        outputfile Final: filename=Lawes06P1Mild Final.out; title=Lawes06P1Mild Final
          variables FinalVariables -> /untitled/Lawes2006/Lawes06P1Wet/Paddock/Final/FinalVariables
          events FinalVariables Events -> /untitled/Lawes2006/Lawes06P1Wet/Paddock/Final/FinalVariables Events
        outputfile LeafOutput: filename=Lawes06P1Mild LeafOutput.out; title=Lawes06P1Mild LeafOutput
          variables My Variables -> /untitled/Lawes2006/Lawes06P1Wet/Paddock/LeafOutput/My Variables
          events My Variables Events -> /untitled/Lawes2006/Lawes06P1Wet/Paddock/LeafOutput/My Variables Events
    simulation Lawes06P1Severe -> /untitled/Lawes2006/Lawes06P1Wet
      area Paddock -> /untitled/Lawes2006/Lawes06P1Wet/Paddock
        folder Manager folder -> /untitled/Lawes2006/Lawes06P1Wet/Paddock/Manager folder
          operations
            5/04/2006  irrigation apply amount = 45
            6/04/2006  irrigation apply amount = 0
            7/04/2006  irrigation apply amount = 0
            8/04/2006  irrigation apply amount = 31
            9/04/2006  irrigation apply amount = 0
            10/04/2006  irrigation apply amount = 0
            11/04/2006  irrigation apply amount = 8.03775459513155
            12/04/2006  irrigation apply amount = 0
            13/04/2006  irrigation apply amount = 0
            14/04/2006  irrigation apply amount = 0
            15/04/2006  irrigation apply amount = 5.06706408345752
            16/04/2006  irrigation apply amount = 0
            17/04/2006  irrigation apply amount = 0
            18/04/2006  irrigation apply amount = 7.38201689021368
            19/04/2006  irrigation apply amount = 0
            20/04/2006  irrigation apply amount = 0
            21/04/2006  irrigation apply amount = 0
            22/04/2006  irrigation apply amount = 7.83904619970193
            23/04/2006  irrigation apply amount = 0
            24/04/2006  irrigation apply amount = 0
            25/04/2006  irrigation apply amount = 0
            26/04/2006  irrigation apply amount = 0
            27/04/2006  irrigation apply amount = 0
            28/04/2006  irrigation apply amount = 0
            29/04/2006  irrigation apply amount = 0
            30/04/2006  irrigation apply amount = 0
            1/05/2006  irrigation apply amount = 0
            2/05/2006  irrigation apply amount = 6.26924987580732
            3/05/2006  irrigation apply amount = 0
            4/05/2006  irrigation apply amount = 0
            5/05/2006  irrigation apply amount = 0
            6/05/2006  irrigation apply amount = 0
            7/05/2006  irrigation apply amount = 0
            8/05/2006  irrigation apply amount = 0
            9/05/2006  irrigation apply amount = 0
            10/05/2006  irrigation apply amount = 0
            11/05/2006  irrigation apply amount = 0
            12/05/2006  irrigation apply amount = 0
            13/05/2006  irrigation apply amount = 0
            14/05/2006  irrigation apply amount = 0
            15/05/2006  irrigation apply amount = 0
            16/05/2006  irrigation apply amount = 6.04073522106314
            17/05/2006  irrigation apply amount = 0
            18/05/2006  irrigation apply amount = 0
            19/05/2006  irrigation apply amount = 0
            20/05/2006  irrigation apply amount = 0
            21/05/2006  irrigation apply amount = 0
            22/05/2006  irrigation apply amount = 0
            23/05/2006  irrigation apply amount = 8.29607550919024
            24/05/2006  irrigation apply amount = 0
            25/05/2006  irrigation apply amount = 0
            26/05/2006  irrigation apply amount = 0
            27/05/2006  irrigation apply amount = 8.11227024341781
            28/05/2006  irrigation apply amount = 0
            29/05/2006  irrigation apply amount = 0
            30/05/2006  irrigation apply amount = 6.4977645305515
            31/05/2006  irrigation apply amount = 0
            1/06/2006  irrigation apply amount = 0
            2/06/2006  irrigation apply amount = 0
            3/06/2006  irrigation apply amount = 0
            4/06/2006  irrigation apply amount = 9.72180824639839
            5/06/2006  irrigation apply amount = 0
            6/06/2006  irrigation apply amount = 3.12468951813224
            7/06/2006  irrigation apply amount = 0
            8/06/2006  irrigation apply amount = 6.45802285146548
            9/06/2006  irrigation apply amount = 0
            10/06/2006  irrigation apply amount = 6.60705414803763
            11/06/2006  irrigation apply amount = 0
            12/06/2006  irrigation apply amount = 0
            13/06/2006  irrigation apply amount = 6.63189269746643
            14/06/2006  irrigation apply amount = 0
            15/06/2006  irrigation apply amount = 0
            16/06/2006  irrigation apply amount = 0
            17/06/2006  irrigation apply amount = 8.37059115747631
            18/06/2006  irrigation apply amount = 0
            19/06/2006  irrigation apply amount = 0
            20/06/2006  irrigation apply amount = 0
            21/06/2006  irrigation apply amount = 0
            22/06/2006  irrigation apply amount = 3.38301043219085
            23/06/2006  irrigation apply amount = 0
            24/06/2006  irrigation apply amount = 6.78589170392443
            27/06/2006  broccoli harvest
            27/06/2006  broccoli EndCrop
        outputfile: filename=Lawes06P1Severe.out; title=Lawes06P1Severe
          variables My Variables -> /untitled/Lawes2006/Lawes06P1Wet/Paddock/outputfile/My Variables
          events My Variables Events -> /untitled/Lawes2006/Lawes06P1Wet/Paddock/outputfile/My Variables Events
        outputfile Final: filename=Lawes06P1Severe Final.out; title=Lawes06P1Severe Final
          variables FinalVariables -> /untitled/Lawes2006/Lawes06P1Wet/Paddock/Final/FinalVariables
          events FinalVariables Events -> /untitled/Lawes2006/Lawes06P1Wet/Paddock/Final/FinalVariables Events
        outputfile LeafOutput: filename=Lawes06P1Severe LeafOutput.out; title=Lawes06P1Severe LeafOutput
          variables My Variables -> /untitled/Lawes2006/Lawes06P1Wet/Paddock/LeafOutput/My Variables
          events My Variables Events -> /untitled/Lawes2006/Lawes06P1Wet/Paddock/LeafOutput/My Variables Events
    simulation Lawes06P2Wet -> /untitled/Lawes2006/Lawes06P1Wet
      clock
        start_date = 21/06/2006  # Select the start date of the simulation
        end_date = 4/10/2006  # Select the end date of the simulation
      area Paddock -> /untitled/Lawes2006/Lawes06P1Wet/Paddock
        folder Manager folder -> /untitled/Lawes2006/Lawes06P1Wet/Paddock/Manager folder
          manager Sow on a fixed date
            # Sowing criteria
            date = 29-Jun-2006  # Enter sowing date (dd-mmm)
            # Sowing parameters
            crop = broccoli  # Enter name of crop to sow
            density = 4  # Enter sowing density (plants/m2)
            depth = 50  # Enter sowing depth (mm)
            cultivar = greenbelt  # Enter cultivar
            row_spacing = 600  # Enter row spacing (mm)
            class = transplant  # Enter Crop Class
            on start_of_day:
            script: same as in Lawes2006.Lawes06P1Wet.Paddock.Manager folder.Sow on a fixed date
          operations LeafHarvests
            19-Jul-2006  LeafOutput do_output
            27-Jul-2006  LeafOutput do_output
            14-Aug-2006  LeafOutput do_output
            15-Sep-2006  LeafOutput do_output
          operations
            30/06/2006  irrigation apply amount = 39
            1/07/2006  irrigation apply amount = 0
            2/07/2006  irrigation apply amount = 0
            3/07/2006  irrigation apply amount = 0
            4/07/2006  irrigation apply amount = 0
            5/07/2006  irrigation apply amount = 0
            6/07/2006  irrigation apply amount = 0
            7/07/2006  irrigation apply amount = 0
            8/07/2006  irrigation apply amount = 6.35780470420528
            9/07/2006  irrigation apply amount = 0
            10/07/2006  irrigation apply amount = 0
            11/07/2006  irrigation apply amount = 6.37205987170338
            12/07/2006  irrigation apply amount = 0
            13/07/2006  irrigation apply amount = 2.94606794963174
            14/07/2006  irrigation apply amount = 0
            15/07/2006  irrigation apply amount = 6.16298408172971
            16/07/2006  irrigation apply amount = 0
            17/07/2006  irrigation apply amount = 0
            18/07/2006  irrigation apply amount = 6.00142551674983
            19/07/2006  irrigation apply amount = 0
            20/07/2006  irrigation apply amount = 2.0527441197434
            21/07/2006  irrigation apply amount = 0
            22/07/2006  irrigation apply amount = 5.25540508434305
            23/07/2006  irrigation apply amount = 0
            24/07/2006  irrigation apply amount = 0
            25/07/2006  irrigation apply amount = 3.02684723212168
            26/07/2006  irrigation apply amount = 0
            27/07/2006  irrigation apply amount = 0
            28/07/2006  irrigation apply amount = 0
            29/07/2006  irrigation apply amount = 0
            30/07/2006  irrigation apply amount = 0
            31/07/2006  irrigation apply amount = 0
            1/08/2006  irrigation apply amount = 4.80399144689952
            2/08/2006  irrigation apply amount = 0
            3/08/2006  irrigation apply amount = 0
            4/08/2006  irrigation apply amount = 0
            5/08/2006  irrigation apply amount = 5.49376474553421
            6/08/2006  irrigation apply amount = 0
            7/08/2006  irrigation apply amount = 0
            8/08/2006  irrigation apply amount = 6.0128075497135
            9/08/2006  irrigation apply amount = 0
            10/08/2006  irrigation apply amount = 2.93899561846974
            11/08/2006  irrigation apply amount = 0
            12/08/2006  irrigation apply amount = 6.07347489046183
            13/08/2006  irrigation apply amount = 0
            14/08/2006  irrigation apply amount = 0
            15/08/2006  irrigation apply amount = 5.56901876930373
            16/08/2006  irrigation apply amount = 0
            17/08/2006  irrigation apply amount = 4.45567913717556
            18/08/2006  irrigation apply amount = 0
            19/08/2006  irrigation apply amount = 8.17660936973381
            20/08/2006  irrigation apply amount = 0
            21/08/2006  irrigation apply amount = 0
            22/08/2006  irrigation apply amount = 7.52229654403571
            23/08/2006  irrigation apply amount = 0
            24/08/2006  irrigation apply amount = 6.33221850613157
            25/08/2006  irrigation apply amount = 0
            26/08/2006  irrigation apply amount = 9.43143812709039
            27/08/2006  irrigation apply amount = 0
            28/08/2006  irrigation apply amount = 0
            29/08/2006  irrigation apply amount = 4.45930880713484
            30/08/2006  irrigation apply amount = 2.98216276477151
            31/08/2006  irrigation apply amount = 0
            1/09/2006  irrigation apply amount = 0
            2/09/2006  irrigation apply amount = 0
            3/09/2006  irrigation apply amount = 0
            4/09/2006  irrigation apply amount = 0
            5/09/2006  irrigation apply amount = 0
            6/09/2006  irrigation apply amount = 0
            7/09/2006  irrigation apply amount = 0
            8/09/2006  irrigation apply amount = 0
            9/09/2006  irrigation apply amount = 11.2473271560942
            10/09/2006  irrigation apply amount = 0
            11/09/2006  irrigation apply amount = 0
            12/09/2006  irrigation apply amount = 0
            13/09/2006  irrigation apply amount = 0
            14/09/2006  irrigation apply amount = 0
            15/09/2006  broccoli harvest
            15/09/2006  broccoli EndCrop
            16/09/2006  irrigation apply amount = 5.87788073176517
        outputfile: filename=Lawes06P2Wet.out; title=Lawes06P2Wet
          variables My Variables -> /untitled/Lawes2006/Lawes06P1Wet/Paddock/outputfile/My Variables
          events My Variables Events -> /untitled/Lawes2006/Lawes06P1Wet/Paddock/outputfile/My Variables Events
        outputfile Final: filename=Lawes06P2Wet Final.out; title=Lawes06P2Wet Final
          variables FinalVariables -> /untitled/Lawes2006/Lawes06P1Wet/Paddock/Final/FinalVariables
          events FinalVariables Events -> /untitled/Lawes2006/Lawes06P1Wet/Paddock/Final/FinalVariables Events
        Soil DPIGatton -> /untitled/Lawes2006/Lawes06P1Wet/Paddock/DPIGatton
          Sample Initial water
            Layer:
              Thickness (mm)  SW (mm/mm)
              150             0.18
              150             0.25
              300             0.23
              300             0.28
              300             0.34
        outputfile LeafOutput: filename=Lawes06P2Wet LeafOutput.out; title=Lawes06P2Wet LeafOutput
          variables My Variables -> /untitled/Lawes2006/Lawes06P1Wet/Paddock/LeafOutput/My Variables
          events My Variables Events -> /untitled/Lawes2006/Lawes06P1Wet/Paddock/LeafOutput/My Variables Events
    simulation Lawes06P2Mild -> /untitled/Lawes2006/Lawes06P2Wet
      area Paddock -> /untitled/Lawes2006/Lawes06P2Wet/Paddock
        folder Manager folder -> /untitled/Lawes2006/Lawes06P2Wet/Paddock/Manager folder
          operations
            30/06/2006  irrigation apply amount = 39
            1/07/2006  irrigation apply amount = 0
            2/07/2006  irrigation apply amount = 0
            3/07/2006  irrigation apply amount = 0
            4/07/2006  irrigation apply amount = 0
            5/07/2006  irrigation apply amount = 0
            6/07/2006  irrigation apply amount = 0
            7/07/2006  irrigation apply amount = 0
            8/07/2006  irrigation apply amount = 6.35780470420528
            9/07/2006  irrigation apply amount = 0
            10/07/2006  irrigation apply amount = 0
            11/07/2006  irrigation apply amount = 6.37205987170338
            12/07/2006  irrigation apply amount = 0
            13/07/2006  irrigation apply amount = 2.94606794963174
            14/07/2006  irrigation apply amount = 0
            15/07/2006  irrigation apply amount = 6.16298408172971
            16/07/2006  irrigation apply amount = 0
            17/07/2006  irrigation apply amount = 0
            18/07/2006  irrigation apply amount = 6.00142551674983
            19/07/2006  irrigation apply amount = 0
            20/07/2006  irrigation apply amount = 2.0527441197434
            21/07/2006  irrigation apply amount = 0
            22/07/2006  irrigation apply amount = 5.25540508434305
            23/07/2006  irrigation apply amount = 0
            24/07/2006  irrigation apply amount = 0
            25/07/2006  irrigation apply amount = 3.02684723212168
            26/07/2006  irrigation apply amount = 0
            27/07/2006  irrigation apply amount = 0
            28/07/2006  irrigation apply amount = 0
            29/07/2006  irrigation apply amount = 0
            30/07/2006  irrigation apply amount = 0
            31/07/2006  irrigation apply amount = 0
            1/08/2006  irrigation apply amount = 4.80399144689952
            2/08/2006  irrigation apply amount = 0
            3/08/2006  irrigation apply amount = 0
            4/08/2006  irrigation apply amount = 0
            5/08/2006  irrigation apply amount = 0
            6/08/2006  irrigation apply amount = 0
            7/08/2006  irrigation apply amount = 0
            8/08/2006  irrigation apply amount = 0
            9/08/2006  irrigation apply amount = 0
            10/08/2006  irrigation apply amount = 0
            11/08/2006  irrigation apply amount = 0
            12/08/2006  irrigation apply amount = 0
            13/08/2006  irrigation apply amount = 0
            14/08/2006  irrigation apply amount = 0
            15/08/2006  irrigation apply amount = 5.56901876930373
            16/08/2006  irrigation apply amount = 0
            17/08/2006  irrigation apply amount = 0
            18/08/2006  irrigation apply amount = 0
            19/08/2006  irrigation apply amount = 0
            20/08/2006  irrigation apply amount = 0
            21/08/2006  irrigation apply amount = 0
            22/08/2006  irrigation apply amount = 7.52229654403571
            23/08/2006  irrigation apply amount = 0
            24/08/2006  irrigation apply amount = 6.33221850613157
            25/08/2006  irrigation apply amount = 0
            26/08/2006  irrigation apply amount = 9.43143812709039
            27/08/2006  irrigation apply amount = 0
            28/08/2006  irrigation apply amount = 0
            29/08/2006  irrigation apply amount = 4.45930880713484
            30/08/2006  irrigation apply amount = 2.98216276477151
            31/08/2006  irrigation apply amount = 0
            1/09/2006  irrigation apply amount = 0
            2/09/2006  irrigation apply amount = 0
            3/09/2006  irrigation apply amount = 0
            4/09/2006  irrigation apply amount = 0
            5/09/2006  irrigation apply amount = 0
            6/09/2006  irrigation apply amount = 0
            7/09/2006  irrigation apply amount = 0
            8/09/2006  irrigation apply amount = 0
            9/09/2006  irrigation apply amount = 11.2473271560942
            10/09/2006  irrigation apply amount = 0
            11/09/2006  irrigation apply amount = 0
            12/09/2006  irrigation apply amount = 0
            13/09/2006  irrigation apply amount = 0
            14/09/2006  irrigation apply amount = 0
            15/09/2006  irrigation apply amount = 0
            15/09/2006  broccoli harvest
            15/09/2006  broccoli EndCrop
            16/09/2006  irrigation apply amount = 5.87788073176517
        outputfile: filename=Lawes06P2Mild.out; title=Lawes06P2Mild
          variables My Variables -> /untitled/Lawes2006/Lawes06P2Wet/Paddock/outputfile/My Variables
          events My Variables Events -> /untitled/Lawes2006/Lawes06P2Wet/Paddock/outputfile/My Variables Events
        outputfile Final: filename=Lawes06P2Mild Final.out; title=Lawes06P2Mild Final
          variables FinalVariables -> /untitled/Lawes2006/Lawes06P2Wet/Paddock/Final/FinalVariables
          events FinalVariables Events -> /untitled/Lawes2006/Lawes06P2Wet/Paddock/Final/FinalVariables Events
        outputfile LeafOutput: filename=Lawes06P2Mild LeafOutput.out; title=Lawes06P2Mild LeafOutput
          variables My Variables -> /untitled/Lawes2006/Lawes06P2Wet/Paddock/LeafOutput/My Variables
          events My Variables Events -> /untitled/Lawes2006/Lawes06P2Wet/Paddock/LeafOutput/My Variables Events
    simulation Lawes06P2Severe -> /untitled/Lawes2006/Lawes06P2Wet
      area Paddock -> /untitled/Lawes2006/Lawes06P2Wet/Paddock
        folder Manager folder -> /untitled/Lawes2006/Lawes06P2Wet/Paddock/Manager folder
          operations
            30/06/2006  irrigation apply amount = 39
            1/07/2006  irrigation apply amount = 0
            2/07/2006  irrigation apply amount = 0
            3/07/2006  irrigation apply amount = 0
            4/07/2006  irrigation apply amount = 0
            5/07/2006  irrigation apply amount = 0
            6/07/2006  irrigation apply amount = 0
            7/07/2006  irrigation apply amount = 0
            8/07/2006  irrigation apply amount = 6.35780470420528
            9/07/2006  irrigation apply amount = 0
            10/07/2006  irrigation apply amount = 0
            11/07/2006  irrigation apply amount = 6.37205987170338
            12/07/2006  irrigation apply amount = 0
            13/07/2006  irrigation apply amount = 2.94606794963174
            14/07/2006  irrigation apply amount = 0
            15/07/2006  irrigation apply amount = 6.16298408172971
            16/07/2006  irrigation apply amount = 0
            17/07/2006  irrigation apply amount = 0
            18/07/2006  irrigation apply amount = 6.00142551674983
            19/07/2006  irrigation apply amount = 0
            20/07/2006  irrigation apply amount = 2.0527441197434
            21/07/2006  irrigation apply amount = 0
            22/07/2006  irrigation apply amount = 5.25540508434305
            23/07/2006  irrigation apply amount = 0
            24/07/2006  irrigation apply amount = 0
            25/07/2006  irrigation apply amount = 3.02684723212168
            26/07/2006  irrigation apply amount = 0
            27/07/2006  irrigation apply amount = 0
            28/07/2006  irrigation apply amount = 0
            29/07/2006  irrigation apply amount = 0
            30/07/2006  irrigation apply amount = 0
            31/07/2006  irrigation apply amount = 0
            1/08/2006  irrigation apply amount = 4.80399144689952
            2/08/2006  irrigation apply amount = 0
            3/08/2006  irrigation apply amount = 0
            4/08/2006  irrigation apply amount = 0
            5/08/2006  irrigation apply amount = 0
            6/08/2006  irrigation apply amount = 0
            7/08/2006  irrigation apply amount = 0
            8/08/2006  irrigation apply amount = 0
            9/08/2006  irrigation apply amount = 0
            10/08/2006  irrigation apply amount = 0
            11/08/2006  irrigation apply amount = 0
            12/08/2006  irrigation apply amount = 0
            13/08/2006  irrigation apply amount = 0
            14/08/2006  irrigation apply amount = 0
            15/08/2006  irrigation apply amount = 5.56901876930373
            16/08/2006  irrigation apply amount = 0
            17/08/2006  irrigation apply amount = 0
            18/08/2006  irrigation apply amount = 0
            19/08/2006  irrigation apply amount = 0
            20/08/2006  irrigation apply amount = 0
            21/08/2006  irrigation apply amount = 0
            22/08/2006  irrigation apply amount = 0
            23/08/2006  irrigation apply amount = 0
            24/08/2006  irrigation apply amount = 0
            25/08/2006  irrigation apply amount = 0
            26/08/2006  irrigation apply amount = 0
            27/08/2006  irrigation apply amount = 0
            28/08/2006  irrigation apply amount = 0
            29/08/2006  irrigation apply amount = 0
            30/08/2006  irrigation apply amount = 0
            31/08/2006  irrigation apply amount = 0
            1/09/2006  irrigation apply amount = 0
            2/09/2006  irrigation apply amount = 0
            3/09/2006  irrigation apply amount = 0
            4/09/2006  irrigation apply amount = 0
            5/09/2006  irrigation apply amount = 0
            6/09/2006  irrigation apply amount = 0
            7/09/2006  irrigation apply amount = 0
            8/09/2006  irrigation apply amount = 0
            9/09/2006  irrigation apply amount = 11.2473271560942
            10/09/2006  irrigation apply amount = 0
            11/09/2006  irrigation apply amount = 0
            12/09/2006  irrigation apply amount = 0
            13/09/2006  irrigation apply amount = 0
            14/09/2006  irrigation apply amount = 0
            15/09/2006  irrigation apply amount = 0
            15/09/2006  broccoli harvest
            15/09/2006  broccoli EndCrop
            16/09/2006  irrigation apply amount = 5.87788073176517
        outputfile: filename=Lawes06P2Severe.out; title=Lawes06P2Severe
          variables My Variables -> /untitled/Lawes2006/Lawes06P2Wet/Paddock/outputfile/My Variables
          events My Variables Events -> /untitled/Lawes2006/Lawes06P2Wet/Paddock/outputfile/My Variables Events
        outputfile Final: filename=Lawes06P2Severe Final.out; title=Lawes06P2Severe Final
          variables FinalVariables -> /untitled/Lawes2006/Lawes06P2Wet/Paddock/Final/FinalVariables
          events FinalVariables Events -> /untitled/Lawes2006/Lawes06P2Wet/Paddock/Final/FinalVariables Events
        outputfile LeafOutput: filename=Lawes06P2Severe LeafOutput.out; title=Lawes06P2Severe LeafOutput
          variables My Variables -> /untitled/Lawes2006/Lawes06P2Wet/Paddock/LeafOutput/My Variables
          events My Variables Events -> /untitled/Lawes2006/Lawes06P2Wet/Paddock/LeafOutput/My Variables Events
    memo
      	Note: If you have Observered data for some samplings but not others, then in the .out file (for the observations) you can use * or ?  for those missing values instead of using 0

      	This allows you to tell the difference between data you did not collect, and data that actually had a value of 0

      	Data with a * or ? is not plotted on the graph (hence neither is its predicted value) whereas data with 0 is.
    memo: same as Lawes2006.memo
  folder Lawes2009
    simulation Lawes2009
      memo
        This crop was grown in the lysimeter farm at the Gatton Research Farm.  Head quality was severely affected by high temperatures during August.  There was also a large amount of shooting from the base of the plant.  LAI measurements do not include this significant amount of leaf area and so late in the season will be an underestimate.
      metfile met: filename=Gatton2009.met
      clock
        start_date = 20/7/2009  # Enter the start date of the simulation
        end_date = 5/10/2009  # Enter the end date of the simulation
      summaryfile
      area paddock
        surfaceom surface organic matter
          PoolName = wheat  # Organic Matter pool name
          type = wheat  # Organic Matter type
          mass = 1000  # Initial surface residue (kg/ha)
          cnr = 80  # C:N ratio of initial residue
          standing_fraction = 0  # Fraction of residue standing
        fertiliser
        outputfile: filename=Lawes2009.out; title=Lawes2009
          variables
            variable:
              dd/mm/yyyy as Date  # Date (dd/mm/yyyy)
              biomass  # Biomass
              LeafLAI  # Yield
              AboveGroundWt
              LeafWaterDemand
              LeafTranspiration
              LeafFW
              LeafPhotosynthesisFtValue
              LeafLiveWt
              FloretLiveWt
              StemLiveWt
              cover_green
              RootDepth
              dul_dep()
              ll15_dep()
              sw_dep()
              sw
              dlayer
              TotalET
              FAO56
          events Reporting Frequency: event=daily
        broccoli
        micromet
          soilalbedo = 0.23
          a_interception = 0
          b_interception = 0
          c_interception = 0
          d_interception = 0
        Soil DPIGatton: irrigation_layer=2; Site=UQ, Lawes; Region=Lockyer
          Comment = oc and ph estimated  # Comments
          SoilType = Prarie  # Soil description
          NearestTown = Gatton, Q 4343
          NaturalVegetation = Blue Gum, Moreton Bay Ash, Tea Tree
          Water: same as Lawes2006.Lawes06P1Wet.Paddock.DPIGatton.Water
          SoilWat: same as Lawes2006.Lawes06P1Wet.Paddock.DPIGatton.SoilWat
          SoilOrganicMatter: same as Lawes2006.Lawes06P1Wet.Paddock.DPIGatton.SoilOrganicMatter
          Analysis: same as Lawes2006.Lawes06P1Wet.Paddock.DPIGatton.Analysis
          Sample Initial nitrogen: same as Lawes2006.Lawes06P1Wet.Paddock.DPIGatton.Initial nitrogen
          Sample Initial water
            Layer:
              Thickness (mm)  SW (mm/mm)
              150             0.22
              150             0.22
              300             0.3
              300             0.33
              300             0.35
        folder Manager folder
          manager Sow on a fixed date
            # Sowing criteria
            date = 20-jul  # Enter sowing date (dd-mmm)
            # Sowing parameters
            crop = broccoli  # Enter name of crop to sow
            density = 4.4  # Enter sowing density (plants/m2)
            depth = 50  # Enter sowing depth (mm)
            cultivar = Aurora  # Enter cultivar
            row_spacing = 750  # Enter row spacing (mm)
            class = transplant  # Enter Crop Class
            on start_of_day:
            script: same as in Lawes2006.Lawes06P1Wet.Paddock.Manager folder.Sow on a fixed date
          operations
            21/07/2009  irrigation apply amount = 27
            23/07/2009  irrigation apply amount = 30
            31/07/2009  irrigation apply amount = 23.5
            7/08/2009  irrigation apply amount = 24.3
            14/08/2009  irrigation apply amount = 21.6
            22/08/2009  irrigation apply amount = 30
            28/08/2009  irrigation apply amount = 24.3
            4/09/2009  irrigation apply amount = 25.1
            16/09/2009  irrigation apply amount = 29
            23/09/2009  irrigation apply amount = 40.6
            2/10/2009  irrigation apply amount = 42
            5/10/2009  broccoli harvest
            5/10/2009  broccoli EndCrop
          manager Calculations
            on init:
```
TotalET = 0.0
DAS = 0
SW60 = 0
```
            on end_of_day:
```
TotalET = es
if broccoli.plant_status <> 'out' then
TotalET = TotalET + broccoli.LeafTranspiration

if broccoli.LeafLAI > 0 then
  DAS = DAS + 1
endif
Endif

SW60 = sw_dep(1) + sw_dep(2) + sw_dep(3)
```
        irrigation
          automatic_irrigation = on
          asw_depth = 600  # Depth to which ASW is calculated. (mm)
          crit_fr_asw = 0.5  # Fraction of ASW below which irrigation is applied (0-1.0)
          irrigation_efficiency = 1  # Efficiency of the irrigation. (0-1.0)
          irrigation_allocation = off  # Allocation limits
          allocation = 0  # Allocation in mm
          default_no3_conc = 0  # Nitrate concentration (ppm N)
          default_nh4_conc = 0  # Ammonium concentration (ppm N)
          default_cl_conc = 0  # Chloride concentration (ppm Cl)
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