folder Simulations: version=32
  simulation Usapinonot_Clitoria_14_Feb
    metfile met: filename=Usapinonot.met
    climatechange
      maxtmodifier = 0  # Change in maximum temperature in degrees celsius
      mintmodifier = 0  # Change in minimum temperature in degrees celsius
      rainmodifier = 1  # Relative change in rainfall
      radiationmodifier = 1.3  # Relative change in radiation
      co2 = 350  # Atmospheric C02 concentration (ppm)
    clock
      start_date = 16/12/2006  # Select the start date of the simulation
      end_date = 25/02/2008  # Select the end date of the simulation
    summaryfile
    area paddock
      folder Manager folder
        manager Sowing rule
          # Sowing criteria
          date1 = 14-Feb-2007  # Enter sowing window START date (dd-mmm)
          date2 = 14-Feb-2007  # Enter sowing window END date (dd-mmm)
          must_sow = yes  # Must sow?
          raincrit = 0  # Amount of rainfall
          rainnumdays = 3  # Number of days of rainfall
          esw_amount = 200  # Enter minimum allowable available soil water (mm)
          # Sowing parameters
          crop = butterflypea  # Enter name of crop to sow
          density = 2  # Enter sowing density (plants/m2)
          depth = 50  # Enter sowing depth (mm)
          cultivar = timor  # Enter cultivar
          class = plant  # Enter crop growth class
          row_spacing = 200  # Enter row spacing (mm)
          on start_of_day:
```
      if (paddock_is_fallow() = 1 and FallowIn <> 'yes' and (NextCrop = 0 or NextCrop = '[crop]')) then
         if (date_within('[date1], [date2]') = 1) then
            if (rain[[rainnumdays]] >= [raincrit] AND esw >= [esw_amount]) OR
                ('[must_sow]' = 'yes' AND today = date('[date2]'))) THEN
               ChooseNextCrop = 'yes'   ! for rotations
               [crop] sow plants =[density], sowing_depth = [depth], cultivar = [cultivar], row_spacing = [row_spacing], crop_class = [class]
            endif
            if today = date('[date2]') then
               ChooseNextCrop = 'yes'
            endif
         endif
      endif
```
        manager Harvesting rule
          # Harvesting criteria
          crop = butterflypea  # Enter name of crop to harvest when ripe
          on end_of_day:
```
           if [crop].StageName = 'harvest_ripe' or [crop].plant_status = 'dead' then
              [crop]  harvest
              [crop]  end_crop
           endif
```
        manager Sowing fertiliser
          # When should fertiliser be applied
          modulename = Butterflypea  # On which module should the event come from
          eventname = sowing  # On which event should fertiliser be applied
          # Fertiliser application details
          fertmodule = fertiliser  # Module used to apply the fertiliser
          fert_amount_sow = 0  # Amount of starter fertiliser at sowing (kg/ha)
          fert_type_sow = urea_N  # Sowing fertiliser type
          on [modulename].[eventname]:
```
        [fertmodule] apply amount = [fert_amount_sow] (kg/ha), depth = 50 (mm), type = [fert_type_sow]
```
        manager
          on init:
```
cuts = 0
 total_minN = 0
biom = 0
```
          on start_of_day:
```
 biom = leafgreenwt + stemgreenwt
```
          on end_of_day:
```
  total_minN = total_minN + dlt_n_min_tot()
```
        manager Reset on fixed date
          # When should a reset be done
          reset_date = 18-Jan-2007  # Enter date of reset (dd-mmm)
          # Reset details
          soilmodule = Grey Vertisol (Usapinonot No678)  # Name of your soil module
          surfaceommodule = surface organic matter  # Name of your surface organic matter module
          resetWater = yes  # Reset soil water?
          resetNitrogen = yes  # Reset soil nitrogen?
          resetSurfaceOM = yes  # Reset surface organic matter?
          on start_of_day:
```
         if (today = date('[reset_date]')) then
            resetWater = '[resetWater]'
            resetNitrogen  = '[resetNitrogen]'
            resetSurfaceOM = '[resetSurfaceOM]'
            if (resetWater = 'yes') then
                '[soilmodule] Water' reset
            endif
            if (resetNitrogen = 'yes') then
                '[soilmodule] Nitrogen' reset
            endif
            if (resetSurfaceOM = 'yes') then
                '[surfaceommodule]' reset
            endif
            act_mods reseting
         endif
```
      fertiliser
      surfaceom surface organic matter
        PoolName = centro  # Organic Matter pool name
        type = centro  # Organic Matter type
        mass = 500  # Initial surface residue (kg/ha)
        cnr = 40  # C:N ratio of initial residue
        standing_fraction = 0  # Fraction of residue standing
      butterflypea
      outputfile: filename=Usapinonot_Clitoria_14_Feb.out; title=Usapinonot_Clitoria_14_Feb
        variables
          variable:
            dd/mm/yyyy as Date  # Date (dd/mm/yyyy)
            year  # Year
            day  # Day
            DaysAfterSowing  # Days after Sowing
            flowering_das  # Days from sowing to flowering
            flowering_date  # Day number of flowering
            StageName  # Plant stage name
            yield  # Yield
            biomass_wt  # Biomass weight
            LeafTotalWt  # Total Leaf dry matter
            StemTotalWt  # Total Stem dry matter
            podTotalWt  # Total pod dry matter
            LeafSenescedWt  # Senesced Leaf dry matter
            biom as green_biomass  # Green Biomass weight
            LeafGreenWt  # Green Leaf dry matter
            StemGreenWt  # Green Stem dry matter
            leaf_no  # Number of leaves per plant
            leaf_no_sen  # Number of senesced leaves per square meter
            leaf_area()  # Leaf area for each node
            node_no  # Number of mainstem nodes per plant
            lai  # Leaf area index
            stover_wt  # Stover Biomass weight
            ep  # Plant water uptake
            esw_layr()  # Extractable soil water
            root_depth  # depth of roots
            no3()
            manager.total_minN
            height
            dlt_dm_green_grain
            dlt_dm_green_leaf
            dlt_dm_green_meal
            dlt_dm_green_pod
            dlt_dm_green_root
            dlt_dm_green_stem
            sw
            rain
            stagename
        events Reporting Frequency: event=Daily  # End of day
      soil Grey Vertisol (Usapinonot No678): Site=Usapinonot; Region=TTU Regency; State=NTT; Longitude=124.558
        Comment = verano_stylo=Stylosanthes hamata; lablab=lablab purpureus; cavalcade_centro=centrosema pascuorum; desmanthus_virgatus; butterfly_pea=clitoria ternatea; burgundy_bean=macroptilium bracteatum (CLL based on Ss); caatinga_stylo=stylosanthes seabrana; brazilian_stylo=stylosanthes guianensis; desmanthus_pernambucanus; arachis_pintoi; Macroptilium gracile; stylo184; maize CLL estimated  # Comments
        SoilType = Grey Vertisol  # Soil description
        NearestTown = Kefamenanu
        ApsoilNumber = 678
        Latitude = -9.489  # Latitude (WGS84)
        LocationAccuracy = +/-50m
        DataSource = Collected by BPTP and CSIRO as part of ACIAR Project LPS/2006/003 'Integrating forage legumes into the maize cropping systems of West Timor'
        Water
          Layer:
            Thickness (mm)  BD (g/cc)  AirDry (mm/mm)  LL15 (mm/mm)  DUL (mm/mm)  SAT (mm/mm)
            150             1.061      0.155           0.31          0.429        0.57
            150             1.058      0.248           0.31          0.419        0.571
            300             1.177      0.295           0.295         0.464        0.526
            300             1.197      0.295           0.295         0.468        0.518
            300             1.243      0.305           0.305         0.455        0.501
            300             1.311      0.305           0.305         0.455        0.505
            300             1.195      0.305           0.305         0.46         0.519
          SoilCrop maize
            Layer:
              Thickness (mm)  LL (mm/mm)  KL (/day)  XF (0-1)
              150             0.287       0.06       1
              150             0.29        0.06       1
              300             0.316       0.06       1
              300             0.322       0.04       1
              300             0.343       0.04       1
              300             0.37        0.02       1
              300             0.428       0.01       1
          SoilCrop lablab
            Layer:
              Thickness (mm)  LL (mm/mm)  KL (/day)  XF (0-1)
              150             0.31        0.08       1
              150             0.31        0.08       1
              300             0.32        0.08       1
              300             0.31        0.08       1
              300             0.32        0.07       1
              300             0.35        0.07       1
              300             0.39        0.07       1
          SoilCrop cavalcade
            Layer:
              Thickness (mm)  LL (mm/mm)  KL (/day)  XF (0-1)
              150             0.31        0.08       1
              150             0.31        0.08       1
              300             0.32        0.08       1
              300             0.32        0.08       1
              300             0.339       0.07       1
              300             0.379       0.07       1
              300             0.44        0.07       1
          SoilCrop desmanthusv
            Layer:
              Thickness (mm)  LL (mm/mm)  KL (/day)  XF (0-1)
              150             0.287       0.08       1
              150             0.29        0.08       1
              300             0.295       0.08       1
              300             0.31        0.08       1
              300             0.305       0.07       1
              300             0.333       0.07       1
              300             0.333       0.07       1
          SoilCrop butterflypea
            Layer:
              Thickness (mm)  LL (mm/mm)  KL (/day)  XF (0-1)
              150             0.287       0.06       1
              150             0.29        0.06       1
              300             0.297       0.04       1
              300             0.32        0.04       1
              300             0.33        0.02       1
              300             0.345       0.01       1
              300             0.38        0.01       0
          SoilCrop burgundybean
            Layer:
              Thickness (mm)  LL (mm/mm)  KL (/day)  XF (0-1)
              150             0.287       0.06       1
              150             0.29        0.06       1
              300             0.325       0.06       1
              300             0.35        0.04       1
              300             0.351       0.04       1
              300             0.363       0.04       1
              300             0.363       0.03       1
          SoilCrop Stylos
            Layer:
              Thickness (mm)  LL (mm/mm)  KL (/day)  XF (0-1)
              150             0.287       0.08       1
              150             0.29        0.08       1
              300             0.325       0.08       1
              300             0.35        0.08       1
              300             0.351       0.07       1
              300             0.363       0.07       1
              300             0.363       0.07       1
          SoilCrop stylog
            Layer:
              Thickness (mm)  LL (mm/mm)  KL (/day)  XF (0-1)
              150             0.287       0.08       1
              150             0.29        0.08       1
              300             0.32        0.08       1
              300             0.33        0.08       1
              300             0.347       0.07       1
              300             0.341       0.07       1
              300             0.341       0.07       1
          SoilCrop desmanthusp
            Layer:
              Thickness (mm)  LL (mm/mm)  KL (/day)  XF (0-1)
              150             0.287       0.08       1
              150             0.29        0.08       1
              300             0.32        0.08       1
              300             0.321       0.08       1
              300             0.351       0.07       1
              300             0.363       0.07       1
              300             0.363       0.07       1
        SoilWat: SummerCona=3.5; SummerU=6; SummerDate=1-Nov; WinterCona=3.5; WinterU=6; WinterDate=1-May; DiffusConst=40; DiffusSlope=16; Salb=0.12; CN2Bare=73; CNRed=20; CNCov=0.8
          Layer:
            Thickness (mm)  SWCON (0-1)
            150             0.3
            150             0.3
            300             0.3
            300             0.3
            300             0.3
            300             0.3
            300             0.3
        SoilOrganicMatter: RootCN=40; RootWT=1000; SoilCN=12; EnrACoeff=7.4; EnrBCoeff=0.2
          Layer:
            Thickness (mm)  OC (Total %)  FBiom (0-1)  FInert (0-1)
            150             1.3           0.04         0.4
            150             0.8           0.02         0.6
            300             0.3           0.02         0.8
            300             0.15          0.02         1
            300             0.1           0.01         1
            300             0.1           0.01         1
            300             0.05          0.01         1
        Analysis
          Layer:
            Thickness (mm)  PH (1:5 water)
            150             7.5
            150             7.5
            300             7.5
            300             7.5
            300             7.5
            300             7.5
            300             7.5
        Sample Initial nitrogen
          Layer:
            Thickness (mm)  NO3 (ppm)  NH4 (ppm)
            150             0.928182   0.100012
            150             0.928182   0.100012
            300             0.928182   0.100012
            300             0.928182   0.100012
            300             0.928182   0.100012
            300             0.928182   0.100012
            300             0.928182   0.100012
        Sample Initial water
          Layer:
            Thickness (mm)  SW (mm/mm)
            150             0.399
            150             0.395
            300             0.395
            300             0.384
            300             0.376
            300             0.4343
            300             0.4343
  simulation Gatton_Clitoria_17Dec
    metfile met: filename=Gatton.met
    clock
      start_date = 16/12/2007  # Select the start date of the simulation
      end_date = 1/06/2008  # Select the end date of the simulation
    summaryfile
    area paddock
      folder Manager folder
        manager Sowing rule
          # Sowing criteria
          date1 = 17-Dec  # Enter sowing window START date (dd-mmm)
          date2 = 17-Dec  # Enter sowing window END date (dd-mmm)
          must_sow = yes  # Must sow?
          raincrit = 30  # Amount of rainfall
          rainnumdays = 3  # Number of days of rainfall
          esw_amount = 200  # Enter minimum allowable available soil water (mm)
          # Sowing parameters
          crop = butterflypea  # Enter name of crop to sow
          density = 12  # Enter sowing density (plants/m2)
          depth = 30  # Enter sowing depth (mm)
          cultivar = gatton  # Enter cultivar
          class = plant  # Enter crop growth class
          row_spacing = 200  # Enter row spacing (mm)
          on start_of_day:
          script: same as in Usapinonot_Clitoria_14_Feb.paddock.Manager folder.Sowing rule
        manager Harvesting rule
          # Harvesting criteria
          crop = butterflypea  # Enter name of crop to harvest when ripe
          on end_of_day:
```
           if [crop].StageName = 'harvest_ripe' or [crop].plant_status = 'dead' then
       !       [crop]  harvest
       !       [crop]  end_crop
           endif
```
        manager Sowing fertiliser: same as Usapinonot_Clitoria_14_Feb.paddock.Manager folder.Sowing fertiliser
        manager
          on init:
```
cuts = 0
 total_minN = 0
biom = 0
```
          on start_of_day:
```
biom = leafgreenwt + stemgreenwt

  if day = 358 then        
      irrigation apply amount = 10
  endif

  if day = 362 then        
      irrigation apply amount = 38
  endif
```
          on end_of_day:
```
  total_minN = total_minN + dlt_n_min_tot()
```
      fertiliser
      surfaceom surface organic matter
        PoolName = centro  # Organic Matter pool name
        type = centro  # Organic Matter type
        mass = 500  # Initial surface residue (kg/ha)
        cnr = 40  # C:N ratio of initial residue
        standing_fraction = 0  # Fraction of residue standing
      butterflypea
      soil Prarie-Lockyer: Site=Lawes; Region=Lockyer; State=Queensland; Longitude=152.338
        Comment = Soil naming structure: \State\Region\Classification-Local Name (Site/district and locator number); oc and ph estimated  # Comments
        SoilType = Prarie  # Soil description
        NearestTown = Lawes, Q 4350
        NaturalVegetation = Blue Gum, Moreton Bay Ash, Tea Tree
        Latitude = -27.5339  # Latitude (WGS84)
        LocationAccuracy = +-20m
        DataSource = CSIRO Sustainable Ecosystems, Toowoomba
        InitWater Initial water: RelativeTo=butterflypea
          PercentMethod: Percent=1.00; Distributed=Evenly distributed
        Water
          Layer:
            Thickness (mm)  BD (g/cc)  AirDry (mm/mm)  LL15 (mm/mm)  DUL (mm/mm)  SAT (mm/mm)
            150             1.38       0.1             0.2           0.38         0.45
            150             1.38       0.168           0.21          0.38         0.45
            300             1.28       0.18            0.2           0.39         0.45
            300             1.38       0.2             0.22          0.4          0.45
            300             1.4        0.22            0.24          0.39         0.44
            300             1.46       0.27            0.28          0.37         0.42
            300             1.47       0.29            0.3           0.34         0.42
            300             1.47       0.29            0.3           0.34         0.42
          SoilCrop chickpea
            Layer:
              Thickness (mm)  LL (mm/mm)  KL (/day)  XF (0-1)
              150             0.2         0.06       1
              150             0.21        0.06       1
              300             0.2         0.06       1
              300             0.22        0.06       1
              300             0.22        0.06       1
              300             0.34        0.06       1
              300             0.3         0.06       1
              300             0.3         0.06       1
          SoilCrop butterflypea
            Layer:
              Thickness (mm)  LL (mm/mm)  KL (/day)  XF (0-1)
              150             0.2         0.06       1
              150             0.21        0.06       1
              300             0.2         0.06       1
              300             0.22        0.06       1
              300             0.24        0.06       1
              300             0.28        0.06       1
              300             0.3         0.06       1
              300             0.3         0.06       1
        SoilWat: SummerCona=3.5; SummerU=6; SummerDate=1-Nov; WinterCona=2.5; WinterU=4; WinterDate=1-apr; DiffusConst=40; DiffusSlope=16; Salb=0.12; CN2Bare=73; CNRed=20; CNCov=0.8
          Layer:
            Thickness (mm)  SWCON (0-1)
            150             0.3
            150             0.3
            300             0.3
            300             0.3
            300             0.3
            300             0.3
            300             0.3
            300             0.3
        SoilOrganicMatter: RootCN=40; RootWT=1000; SoilCN=12; EnrACoeff=7.4; EnrBCoeff=0.2
          Layer:
            Thickness (mm)  OC (Total %)  FBiom (0-1)  FInert (0-1)
            150             1.2           0.04         0.4
            150             1.2           0.02         0.6
            300             1.2           0.02         0.8
            300             1.1           0.02         1
            300             0.7           0.01         1
            300             0.3           0.01         1
            300             0.3           0.01         1
            300             0.3           0.01         1
        Analysis
          Layer:
            Thickness (mm)  PH (1:5 water)
            150             7
            150             7
            300             7
            300             7
            300             7
            300             7
            300             7
            300             7
        Sample Initial nitrogen
          Layer:
            Thickness (mm)  NO3 (ppm)  NH4 (ppm)
            150             5          0.1
            150             4          0.1
            300             3          0.1
            300             2          0.1
            300             1          0.1
            300             0.6        0.1
            300             0.5        0.1
            300             0.1        0.1
      outputfile: filename=Gatton_Clitoria_17Dec.out; title=Gatton_Clitoria_17Dec
        variables
          variable:
            dd/mm/yyyy as Date  # Date (dd/mm/yyyy)
            year  # Year
            day  # Day
            DaysAfterSowing  # Days after Sowing
            flowering_das  # Days from sowing to flowering
            flowering_date  # Day number of flowering
            StageName  # Plant stage name
            yield  # Yield
            biomass_wt  # Biomass weight
            LeafTotalWt  # Total Leaf dry matter
            StemTotalWt  # Total Stem dry matter
            podTotalWt  # Total pod dry matter
            LeafSenescedWt  # Senesced Leaf dry matter
            biom as green_biomass  # Green Biomass weight
            LeafGreenWt  # Green Leaf dry matter
            StemGreenWt  # Green Stem dry matter
            leaf_no  # Number of leaves per plant
            leaf_no_sen  # Number of senesced leaves per square meter
            leaf_area()  # Leaf area for each node
            node_no  # Number of mainstem nodes per plant
            lai  # Leaf area index
            stover_wt  # Stover Biomass weight
            ep  # Plant water uptake
            esw_layr()  # Extractable soil water
            root_depth  # depth of roots
            no3()
            manager.total_minN
            height
            dlt_dm_green_grain
            leafgrowthwt  # Change in Growth leaf dry matter
            dlt_dm_green_meal
            podgrowthwt
            dlt_dm_green_root
            stemgrowthwt
            leaves_per_node
            lai_sum
            mint  # Minimum temperature (oC)
            stagename
        events Reporting Frequency: event=Daily  # End of day
      irrigation
        automatic_irrigation = off
        asw_depth = 600  # Depth to which ASW is calculated. (mm)
        crit_fr_asw = 0.5  # Fraction of ASW below which irrigation is applied (0-1.0)
        irrigation_efficiency = 1  # Efficiency of the irrigation. (0-1.0)
        default_no3_conc = 0  # Nitrate concentration (ppm N)
        default_nh4_conc = 0  # Ammonium concentration (ppm N)
        default_cl_conc = 0  # Chloride concentration (ppm Cl)
  simulation Emerald_BFP
    memo Jo notes for bfp
      This is the butterflypea validation at Emerald Research Station
      (JO and MQ)
    metfile met: filename=Emerald0809.met
    clock
      start_date = 1/01/2008  # Select the start date of the simulation
      end_date = 31/12/2008  # Select the end date of the simulation
    summaryfile
    area Dryland
      folder Manager folder
        manager Sowing rule
          # Sowing criteria
          date1 = 22-feb  # Enter sowing window START date (dd-mmm)
          date2 = 22-feb  # Enter sowing window END date (dd-mmm)
          must_sow = yes  # Must sow?
          raincrit = 30  # Amount of rainfall
          rainnumdays = 3  # Number of days of rainfall
          esw_amount = 200  # Enter minimum allowable available soil water (mm)
          # Sowing parameters
          crop = butterflypea  # Enter name of crop to sow
          density = 15  # Enter sowing density (plants/m2)
          depth = 20  # Enter sowing depth (mm)
          cultivar = milgarra  # Enter cultivar
          class = plant  # Enter crop growth class
          row_spacing = 200  # Enter row spacing (mm)
          on start_of_day:
          script: same as in Usapinonot_Clitoria_14_Feb.paddock.Manager folder.Sowing rule
        manager Harvesting rule
          # Harvesting criteria
          crop = butterflypea  # Enter name of crop to harvest when ripe
          on end_of_day:
          script: same as in Usapinonot_Clitoria_14_Feb.paddock.Manager folder.Harvesting rule
        manager Sowing fertiliser
          # When should fertiliser be applied
          modulename = butterflypea  # On which module should the event come from
          eventname = sowing  # On which event should fertiliser be applied
          # Fertiliser application details
          fertmodule = fertiliser  # Module used to apply the fertiliser
          fert_amount_sow = 0  # Amount of starter fertiliser at sowing (kg/ha)
          fert_type_sow = urea_N  # Sowing fertiliser type
          on [modulename].[eventname]:
          script: same as in Usapinonot_Clitoria_14_Feb.paddock.Manager folder.Sowing fertiliser
        manager
          on init:
```
cuts = 0
 total_minN = 0
biom = 0
```
          on start_of_day:
          script: same as in Gatton_Clitoria_17Dec.paddock.Manager folder.Manager
          on end_of_day:
```
  total_minN = total_minN + dlt_n_min_tot()
```
      butterflypea
      fertiliser
      surfaceom surface organic matter
        PoolName = residue  # Organic Matter pool name
        type = wheat  # Organic Matter type
        mass = 1000  # Initial surface residue (kg/ha)
        cnr = 80  # C:N ratio of initial residue
        standing_fraction = 0  # Fraction of residue standing
      outputfile: filename=Emerald_BFP Dryland.out; Title=Emerald_BFP Dryland
        variables
          variable:
            dd/mm/yyyy as Date  # Date (dd/mm/yyyy)
            year  # Year
            day  # Day
            DaysAfterSowing  # Days after Sowing
            flowering_das  # Days from sowing to flowering
            flowering_date  # Day number of flowering
            StageName  # Plant stage name
            yield  # Yield
            biomass_wt  # Biomass weight
            LeafTotalWt  # Total Leaf dry matter
            StemTotalWt  # Total Stem dry matter
            podTotalWt  # Total pod dry matter
            LeafSenescedWt  # Senesced Leaf dry matter
            biom as green_biomass  # Green Biomass weight
            LeafGreenWt  # Green Leaf dry matter
            StemGreenWt  # Green Stem dry matter
            leaf_no  # Number of leaves per plant
            leaf_no_sen  # Number of senesced leaves per square meter
            leaf_area()  # Leaf area for each node
            node_no  # Number of mainstem nodes per plant
            lai  # Leaf area index
            stover_wt  # Stover Biomass weight
            ep  # Plant water uptake
            esw_layr()  # Extractable soil water
            root_depth  # depth of roots
            no3()
            manager.total_minN
            height
            dlt_dm_green_grain
            leafgrowthwt
            dlt_dm_green_meal
            podgrowthwt
            dlt_dm_green_root
            stemgrowthwt
            leaves_per_node
            swdef_pheno
            swdef_photo
            swdef_expan
            swdef_fixation
            lai_sum  # LAI of all leaf components
            green_leaves
            tt_
            acc_TT
            biomass  # Biomass
            green_biomass  # Green Biomass weight
            rain
            n_fixed_tops  # N fixation
            n_supply_soil  # N supply
            n_uptake  # N uptake
            stagename
        events Reporting Frequency: event=Daily  # End of day
      irrigation
        automatic_irrigation = off
        asw_depth = 600  # Depth to which ASW is calculated. (mm)
        crit_fr_asw = 0.5  # Fraction of ASW below which irrigation is applied (0-1.0)
        irrigation_efficiency = 0.8  # Efficiency of the irrigation. (0-1.0)
        default_no3_conc = 0  # Nitrate concentration (ppm N)
        default_nh4_conc = 0  # Ammonium concentration (ppm N)
        default_cl_conc = 0  # Chloride concentration (ppm Cl)
      soil Black_Vertosol_ERS: Site=Emerald research Station; Region=Central Highlands; State=Queensland; Longitude=148.15
        Comment = Soil naming structure: \State\Region\Classification-Local Name (Site/district and locator number); oc and ph estimated  # Comments
        SoilType = Black Vertosol  # Soil description
        NearestTown = Emerald
        NaturalVegetation = Open Downs
        ApsoilNumber = xxx
        Latitude = -23.48  # Latitude (WGS84)
        LocationAccuracy = +-20m
        DataSource = Typed by JO (from Hill et al 2006) - from Merv mungbean
        Water
          Layer:
            Thickness (mm)  BD (g/cc)  AirDry (mm/mm)  LL15 (mm/mm)  DUL (mm/mm)  SAT (mm/mm)
            100             1.193      0.12            0.25          0.5          0.55
            100             1.193      0.2             0.25          0.5          0.55
            100             1.193      0.255           0.255         0.5          0.55
            300             1.219      0.28            0.28          0.49         0.54
            300             1.246      0.305           0.305         0.48         0.53
            200             1.299      0.31            0.31          0.465        0.51
          SoilCrop butterflypea
            Layer:
              Thickness (mm)  LL (mm/mm)  KL (/day)  XF (0-1)
              100             0.27        0.04       1
              100             0.3         0.04       1
              100             0.32        0.03       1
              300             0.35        0.04       1
              300             0.36        0.02       1
              200             0.35        0.01       1
          SoilCrop lablab
            Layer:
              Thickness (mm)  LL (mm/mm)  KL (/day)  XF (0-1)
              100             0.27        0.07       1
              100             0.3         0.07       1
              100             0.32        0.07       1
              300             0.35        0.05       1
              300             0.36        0.01       1
              200             0.35        0.01       1
          SoilCrop SweetSorghum: same as Emerald_BFP.Dryland.Black_Vertosol_ERS.Water.lablab
          SoilCrop wheat
            Layer:
              Thickness (mm)  LL (mm/mm)  KL (/day)  XF (0-1)
              100             0.27        0.06       1
              100             0.3         0.06       1
              100             0.32        0.06       1
              300             0.35        0.04       1
              300             0.36        0.04       1
              200             0.35        0.02       1
        SoilWat: SummerCona=3.5; SummerU=6; SummerDate=1-Nov; WinterCona=3.5; WinterU=6; WinterDate=1-Apr; DiffusConst=40; DiffusSlope=16; Salb=0.12; CN2Bare=73; CNRed=20; CNCov=0.8
          Layer:
            Thickness (mm)  SWCON (0-1)
            100             0.2
            100             0.2
            100             0.2
            300             0.2
            300             0.2
            200             0.2
        SoilOrganicMatter: RootCN=40; RootWT=1000; SoilCN=12; EnrACoeff=7.4; EnrBCoeff=0.2
          Layer:
            Thickness (mm)  OC (Total %)  FBiom (0-1)  FInert (0-1)
            100             0.76          0.035        0.2
            100             0.66          0.02         0.5
            100             0.61          0.015        0.7
            300             0.59          0.01         0.8
            300             0.57          0.01         0.95
            200             0.52          0.01         0.99
        Analysis
          Layer:
            Thickness (mm)  PH (1:5 water)
            100             8.05
            100             7.9
            100             8.25
            300             8.2
            300             8.2
            200             8.2
        Sample Initial nitrogen
          Layer:
            Thickness (mm)  NO3 (ppm)  NH4 (ppm)
            100             4.00034    0.0999853
            100             3.70014    0.0999853
            100             4.40008    0.0999853
            300             2.90004    0.0999853
            300             1.2        0.0999853
            200             0.499997   0.0999853
        Sample Initial water
          Layer:
            Thickness (mm)  SW (mm/mm)
            100             0.4
            100             0.5
            100             0.5
            300             0.49
            300             0.48
            200             0.465
    area Irrigated
      folder Manager folder
        manager Sowing rule
          # Sowing criteria
          date1 = 22-feb  # Enter sowing window START date (dd-mmm)
          date2 = 22-feb  # Enter sowing window END date (dd-mmm)
          must_sow = yes  # Must sow?
          raincrit = 30  # Amount of rainfall
          rainnumdays = 3  # Number of days of rainfall
          esw_amount = 200  # Enter minimum allowable available soil water (mm)
          # Sowing parameters
          crop = butterflypea  # Enter name of crop to sow
          density = 15  # Enter sowing density (plants/m2)
          depth = 30  # Enter sowing depth (mm)
          cultivar = milgarra  # Enter cultivar
          class = plant  # Enter crop growth class
          row_spacing = 200  # Enter row spacing (mm)
          on start_of_day:
          script: same as in Usapinonot_Clitoria_14_Feb.paddock.Manager folder.Sowing rule
        manager Harvesting rule
          # Harvesting criteria
          crop = butterflypea  # Enter name of crop to harvest when ripe
          on end_of_day:
          script: same as in Usapinonot_Clitoria_14_Feb.paddock.Manager folder.Harvesting rule
        manager Sowing fertiliser: same as Emerald_BFP.Dryland.Manager folder.Sowing fertiliser
        manager
          on init:
```
cuts = 0
 total_minN = 0
biom = 0
```
          on start_of_day:
```
biom = leafgreenwt + stemgreenwt

  if day = 80 then                                        !21st March
      irrigation apply amount = 50
  endif

  if day = 133 then                                      !13th may
      irrigation apply amount = 50
  endif

 
  if day = 100 then                                      !EXTRA
  !    irrigation apply amount = 50
  endif

if butterflypea.stagename = 'end_grain_fill' then
 !  butterflypea flush
endif
```
          on end_of_day:
```
  total_minN = total_minN + dlt_n_min_tot()
```
      butterflypea
      fertiliser
      surfaceom surface organic matter
        PoolName = residue  # Organic Matter pool name
        type = wheat  # Organic Matter type
        mass = 1000  # Initial surface residue (kg/ha)
        cnr = 80  # C:N ratio of initial residue
        standing_fraction = 0  # Fraction of residue standing
      outputfile: filename=Emerald_BFP Irrigated.out; Title=Emerald_BFP Irrigated
        variables: same as Emerald_BFP.Dryland.outputfile.Variables
        events Reporting Frequency: event=Daily  # End of day
      irrigation: same as Emerald_BFP.Dryland.Irrigation
      soil Black_Vertosol_ERS: Site=Emerald research Station; Region=Central Highlands; State=Queensland; Longitude=148.15
        Comment = Soil naming structure: \State\Region\Classification-Local Name (Site/district and locator number); oc and ph estimated  # Comments
        SoilType = Black Vertosol  # Soil description
        NearestTown = Emerald
        NaturalVegetation = Open Downs
        ApsoilNumber = xxx
        Latitude = -23.48  # Latitude (WGS84)
        LocationAccuracy = +-20m
        DataSource = Typed by JO (from Hill et al 2006) - from Merv mungbean
        Water
          Layer:
            Thickness (mm)  BD (g/cc)  AirDry (mm/mm)  LL15 (mm/mm)  DUL (mm/mm)  SAT (mm/mm)
            100             1.193      0.12            0.25          0.5          0.55
            100             1.193      0.2             0.25          0.5          0.55
            100             1.193      0.255           0.255         0.5          0.55
            300             1.219      0.28            0.28          0.49         0.54
            300             1.246      0.305           0.305         0.48         0.53
            200             1.299      0.31            0.31          0.465        0.51
          SoilCrop butterflypea
            Layer:
              Thickness (mm)  LL (mm/mm)  KL (/day)  XF (0-1)
              100             0.27        0.06       1
              100             0.3         0.06       1
              100             0.32        0.04       1
              300             0.35        0.04       1
              300             0.36        0.02       1
              200             0.35        0.01       1
          SoilCrop lablab: same as Emerald_BFP.Dryland.Black_Vertosol_ERS.Water.lablab
          SoilCrop SweetSorghum: same as Emerald_BFP.Dryland.Black_Vertosol_ERS.Water.lablab
          SoilCrop wheat: same as Emerald_BFP.Dryland.Black_Vertosol_ERS.Water.wheat
        SoilWat: SummerCona=3.5; SummerU=6; SummerDate=1-nov; WinterCona=2.4; WinterU=4; WinterDate=1-apr; DiffusConst=40; DiffusSlope=16; Salb=0.12; CN2Bare=73; CNRed=20; CNCov=0.8
          Layer:
            Thickness (mm)  SWCON (0-1)
            100             0.2
            100             0.2
            100             0.2
            300             0.2
            300             0.2
            200             0.2
        SoilOrganicMatter: same as Emerald_BFP.Dryland.Black_Vertosol_ERS.SoilOrganicMatter
        Analysis: same as Emerald_BFP.Dryland.Black_Vertosol_ERS.Analysis
        Sample Initial nitrogen: same as Emerald_BFP.Dryland.Black_Vertosol_ERS.Initial nitrogen
        Sample Initial water
          Layer:
            Thickness (mm)  SW (mm/mm)
            100             0.48
            100             0.5
            100             0.5
            300             0.49
            300             0.48
            200             0.465
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