folder Simulations: version=36; creator=Apsim 7.5-r3275
  simulation Carrot_11_11_97
    metfile met: filename=%apsim%\Tests\Validation\Carrots\Observed\LawnRoad.met
    clock
      start_date = 10/11/1997  # Enter the start date of the simulation
      end_date = 30/04/1998  # Enter the end date of the simulation
    summaryfile
    area paddock
      Carrots4
      folder Manager folder
        manager Sow on a fixed date
          # Sowing criteria
          date = 11-nov  # Enter sowing date (dd-mmm)
          # Sowing parameters
          crop = Carrots4  # Enter name of crop to sow
          density = 70  # Enter sowing density (plants/m2)
          depth = 50  # Enter sowing depth (mm)
          cultivar = CRC  # Enter cultivar
          class =  # Enter crop growth class
          row_spacing = 150  # Enter row spacing (mm)
          on start_of_day:
```
        if (today = date('[date]') then
              [crop] sow population =[density], depth = [depth], cultivar = [cultivar], MaxCover = 1.0, BudNumber = 1, row_spacing = [row_spacing], crop_class = [class]
         endif
```
        operations
          13/11/1997  irrigation apply amount =25(mm)
          5/12/1997  irrigation apply amount =50(mm)
          3/01/1998  irrigation apply amount =50(mm)
          15/01/1998  irrigation apply amount =25(mm)
          20/03/1998  irrigation apply amount =25(mm)
          24/10/1997  fertiliser apply amount=100(kg/ha), type=urea_N (), depth=0 (mm)
          30/11/1997  fertiliser apply amount=200(kg/ha), type=urea_N (), depth=0 (mm)
          29/12/1997  fertiliser apply amount=200(kg/ha), type=urea_N (), depth=0 (mm)
        irrigation
          automatic_irrigation = off
          asw_depth = 600  # Depth to which ASW is calculated. (mm)
          crit_fr_asw = 0.5  # Fraction of ASW below which irrigation is applied (0-1.0)
          irrigation_efficiency = 1  # Efficiency of the irrigation. (0-1.0)
          irrigation_allocation = off  # Allocation limits
          allocation = 0  # Allocation in ML
          default_no3_conc = 0  # Nitrate concentration (ppm N)
          default_nh4_conc = 0  # Ammonium concentration (ppm N)
          default_cl_conc = 0  # Chloride concentration (ppm Cl)
          default_no3_conc = 0  # Nitrate concentration (ppm N)
          default_nh4_conc = 0  # Ammonium concentration (ppm N)
          default_cl_conc = 0  # Chloride concentration (ppm Cl)
        manager Empty manager
          on end_of_day:
```
micromet lai_table
!TotalTops = StemLivewt + LeafLivewt
```
        manager End crop on a fixed date
          #
          crop = Carrots4  # Enter name of crop to harvest when ripe
          date = 15-Apr-1998  # Enter ending date (dd-mmm)
          on end_of_day:
```
        if (today = date('[date]') then
              [crop]  end_crop
        endif
```
      fertiliser
      surfaceom surface organic matter
        PoolName = wheat  # Organic Matter pool name
        type = wheat  # Organic Matter type
        mass = 1000  # Initial surface residue (kg/ha)
        cnr = 80  # C:N ratio of initial residue
        standing_fraction = 0  # Fraction of residue standing
      outputfile: filename=Carrot_11_11_97.out; title=Carrot_11_11_97
        variables
          variables: dd/mmm/yyyy, AboveGroundLiveWt, LeafLAI, LeafNodeNo, PhenologyThermalTimeValue, PhenologyCurrentPhaseName, PhenologyCurrentStageName, LeafLiveWt, StemLiveWt, TotalTops, StemDeadWt, StemLiveN, StemDeadN, LeafDeadN, LeafLiveN, StemN, LeafN, TotalTopsN, RootLiveWt, AboveGroundDeadWt, LeafDeadWt, Biomass, LeafDMSupplyPhotosynthesis, TotalSupply
        events Reporting Frequency: event=Daily
      Soil Templeton_ABlock: Latitude=0; Longitude=0
        InitialWater Initial water: FractionFull=1; PercentMethod=EvenlyDistributed
        Water
          Thickness  BD   AirDry  LL15  DUL   SAT
          100        1.3  0.05    0.08  0.31  0.44
          150        1.3  0.05    0.07  0.3   0.44
          300        1.3  0.05    0.07  0.28  0.44
          300        1.3  0.05    0.09  0.31  0.44
          300        1.3  0.05    0.11  0.3   0.44
          300        1.3  0.05    0.16  0.28  0.44
          50         1.3  0.05    0.08  0.31  0.44
          SoilCrop wheat: LL=[0.08, 0.07, 0.07, 0.09, 0.11, 0.16, 0.08]; KL=[0.06, 0.06, 0.06, 0.04, 0.03, 0.02, 0.08]; XF=[1, 1, 1, 1, 0.6, 0.4, 1]
          SoilCrop canola: LL=[0.1, 0.09, 0.09, 0.11, 0.18, 0.19, 0.08]; KL=[0.06, 0.06, 0.06, 0.06, 0.06, 0.06, 0.06]; XF=[1, 1, 1, 1, 1, 1, 1]
          SoilCrop ForageBrassica: LL=[0.08, 0.07, 0.07, 0.09, 0.11, 0.16, 0.08]; KL=[0.06, 0.06, 0.06, 0.06, 0.06, 0.06, 0.06]; XF=[1, 1, 1, 1, 1, 1, 1]
          SoilCrop Kale: LL=[0.08, 0.07, 0.07, 0.09, 0.11, 0.16, 0.08]; KL=[0.06, 0.06, 0.06, 0.06, 0.06, 0.06, 0.06]; XF=[1, 1, 1, 1, 1, 1, 1]
          SoilCrop Kale2: LL=[0.08, 0.07, 0.07, 0.09, 0.11, 0.16, 0.08]; KL=[0.06, 0.06, 0.06, 0.06, 0.06, 0.06, 0.06]; XF=[1, 1, 1, 1, 1, 1, 1]
          SoilCrop Carrots4: LL=[0.08, 0.07, 0.07, 0.09, 0.11, 0.16, 0.08]; KL=[0.06, 0.06, 0.06, 0.06, 0.06, 0.06, 0.06]; XF=[1, 1, 1, 1, 1, 1, 1]
        SoilWater: SummerCona=4.4; SummerU=9; SummerDate=1-Nov; WinterCona=4.4; WinterU=9; WinterDate=1-Apr; DiffusConst=88; DiffusSlope=35.4; Salb=0.18; CN2Bare=68; CNRed=20; CNCov=0.8; Thickness=[100, 150, 300, 300, 300, 300, 50]; SWCON=[0.55, 0.55, 0.55, 0.55, 0.55, 0.55, 0.55]
        SoilOrganicMatter: RootCN=30; RootWt=3000; SoilCN=11.5; EnrACoeff=7.4; EnrBCoeff=0.2; OCUnits=Total
          Thickness  OC    FBiom  FInert
          100        1.82  0.025  0.3
          150        1.47  0.025  0.4
          300        1.2   0.015  0.75
          300        1.03  0.01   0.9
          300        0.47  0.01   0.96
          300        0.47  0.01   0.96
          50         0.47  0.01   0.96
        Analysis: Thickness=[100, 150, 300, 300, 300, 300, 50]; PH=[6.6, 6.2, 5.7, 5.5, 5.5, 5.5, 5.5]; PHUnits=Water; BoronUnits=HotWater
        Sample Initial nitrogen: NO3Units=ppm; NH4Units=ppm; SWUnits=Volumetric; OCUnits=Total; PHUnits=Water
          Thickness  NO3       NH4
          150        34.8718   0.1
          150        37.9487   0.1
          300        6.66667   0.1
          300        1.28205   0.1
          300        0.769231  0.1
          300        0.51282   0.1
      micromet
        soilalbedo = 0.23
        a_interception = 0
        b_interception = 0
        c_interception = 0
        d_interception = 0
      manager ModValues
        on init:
```
TotalTops = 0
TotalTopsN = 0
TotalSupply = 0
```
        on end_of_day:
```
TotalSupply = TotalSupply + Carrots4.Leaf.DM.Supply.Photosynthesis
```
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