folder Simulations: version=32
  folder NTT
    soil Vertic Inceptisol (Naibonat No675): Site=BPTP-Naibonat-Transad site; Region=Kupang Regency; State=NTT; Longitude=123.863
      Comment = verano_stylo=Stylosanthes hamata; lablab=lablab purpureus; cavalcade_centro=centrosema pascuorum; desmanthus_virgatus; butterfly_pea=clitoria ternatea; burgundy_bean=macroptilium bracteatum; caatinga_stylo=stylosanthes seabrana; brazilian_stylo=stylosanthes guianensis; desmanthus_pernambucanus; arachis_pintoi; Macroptilium gracile; stylo184  # Comments
      SoilType = Vertic Inceptisol  # Soil description
      NearestTown = Kupang
      ApsoilNumber = 675
      Latitude = -10.079  # Latitude (WGS84)
      LocationAccuracy = +/-1000m
      DataSource = Collected by BPTP and CSIRO as part of ACIAR Project LPS/2006/003 'Integrating forage legumes into the maize cropping systems of West Timor'
      Water
        Layer:
          Thickness (mm)  BD (g/cc)  AirDry (mm/mm)  LL15 (mm/mm)  DUL (mm/mm)  SAT (mm/mm)
          150             1.118      0.099           0.197         0.394        0.548
          150             1.208      0.155           0.194         0.388        0.514
          300             1.224      0.212           0.212         0.354        0.508
          300             1.202      0.212           0.212         0.356        0.516
          300             1.328      0.212           0.212         0.383        0.469
          300             1.247      0.212           0.212         0.329        0.499
          300             1.27       0.212           0.212         0.38         0.491
        SoilCrop centro
          Layer:
            Thickness (mm)  LL (mm/mm)  KL (/day)  XF (0-1)
            150             0.197       0.08       1
            150             0.194       0.08       1
            300             0.212       0.08       1
            300             0.231       0.08       1
            300             0.268       0.07       1
            300             0.264       0.07       1
            300             0.323       0.07       1
      SoilWat: SummerCona=3.5; SummerU=6; SummerDate=1-Nov; WinterCona=3.5; WinterU=6; WinterDate=1-May; DiffusConst=40; DiffusSlope=16; Salb=0.12; CN2Bare=73; CNRed=20; CNCov=0.8
        Layer:
          Thickness (mm)  SWCON (0-1)
          150             0.3
          150             0.3
          300             0.3
          300             0.3
          300             0.3
          300             0.3
          300             0.3
      SoilOrganicMatter: RootCN=40; RootWT=1000; SoilCN=12; EnrACoeff=7.4; EnrBCoeff=0.2
        Layer:
          Thickness (mm)  OC (Total %)  FBiom (0-1)  FInert (0-1)
          150             1.3           0.04         0.4
          150             0.8           0.02         0.6
          300             0.3           0.02         0.8
          300             0.15          0.02         1
          300             0.1           0.01         1
          300             0.1           0.01         1
          300             0.05          0.01         1
      Analysis
        Layer:
          Thickness (mm)  PH (1:5 water)
          150             7.5
          150             7.5
          300             7.5
          300             7.5
          300             7.5
          300             7.5
          300             7.5
      Sample Initial nitrogen
        Layer:
          Thickness (mm)  NO3 (ppm)  NH4 (ppm)
          150             9.99991    0.099991
          150             9.00001    0.099991
          300             8.00001    0.099991
          300             5.00001    0.099991
          300             3.00002    0.099991
          300             2          0.099991
          300             0.0999902  0.099991
      Sample Initial water
        Layer:
          Thickness (mm)  SW (mm/mm)
          150             0.35
          150             0.3
          300             0.264
          300             0.25
          300             0.266
          300             0.242
          300             0.323
    soil Grey Vertisol (Biloto No676): Site=Biloto; Region=TTS Regency; State=NTT; Longitude=124.226
      Comment = verano_stylo=Stylosanthes hamata; lablab=lablab purpureus (CLL based on Cp) ; cavalcade_centro=centrosema pascuorum; desmanthus_virgatus(CLL based on Cp); butterfly_pea=clitoria ternatea; burgundy_bean=macroptilium bracteatum (CLL based on Cp); caatinga_stylo=stylosanthes seabrana; brazilian_stylo=stylosanthes guianensis; desmanthus_pernambucanus (CLL based on Cp); arachis_pintoi; Macroptilium gracile; stylo184; maize CLL estimated  # Comments
      SoilType = Grey Vertisol  # Soil description
      NearestTown = Soe
      ApsoilNumber = 676
      Latitude = -9.88  # Latitude (WGS84)
      LocationAccuracy = +/-50m
      DataSource = Collected by BPTP and CSIRO as part of ACIAR Project LPS/2006/003 'Integrating forage legumes into the maize cropping systems of West Timor'
      Water
        Layer:
          Thickness (mm)  BD (g/cc)  AirDry (mm/mm)  LL15 (mm/mm)  DUL (mm/mm)  SAT (mm/mm)
          150             1.119      0.23            0.26          0.426        0.548
          150             1.192      0.24            0.267         0.403        0.52
          300             1.329      0.282           0.282         0.418        0.468
          300             1.359      0.289           0.289         0.407        0.457
          300             1.395      0.29            0.29          0.394        0.444
          300             1.334      0.29            0.29          0.417        0.467
          300             1.325      0.29            0.29          0.415        0.47
        SoilCrop centro
          Layer:
            Thickness (mm)  LL (mm/mm)  KL (/day)  XF (0-1)
            150             0.26        0.08       1
            150             0.3         0.08       1
            300             0.319       0.08       1
            300             0.329       0.08       1
            300             0.33        0.07       1
            300             0.336       0.07       1
            300             0.336       0.07       1
      SoilWat: same as NTT.Vertic Inceptisol (Naibonat No675).SoilWat
      SoilOrganicMatter: RootCN=40; RootWT=1000; SoilCN=12; EnrACoeff=7.4; EnrBCoeff=0.2
        Layer:
          Thickness (mm)  OC (Total %)  FBiom (0-1)  FInert (0-1)
          150             1.3           0.04         0.4
          150             0.8           0.025        0.6
          300             0.3           0.02         0.8
          300             0.15          0.02         1
          300             0.1           0.01         1
          300             0.1           0.01         1
          300             0.05          0.01         1
      Analysis: same as NTT.Vertic Inceptisol (Naibonat No675).Analysis
      Sample Initial nitrogen
        Layer:
          Thickness (mm)  NO3 (ppm)  NH4 (ppm)
          150             0.953227   0.0999894
          150             2.68456    0.0999894
          300             0.978182   0.0999894
          300             0.99829    0.0999894
          300             0.998818   0.0999894
          300             0.999488   0.0999894
          300             0.251567   0.0999894
      Sample Initial water
        Layer:
          Thickness (mm)  SW (mm/mm)
          150             0.403
          150             0.433
          300             0.417
          300             0.406
          300             0.415
          300             0.416
          300             0.416
    soil Alfisol (Sillu No677): Site=Sillu; Region=Kupang Regency; State=NTT; Longitude=123.962
      Comment = verano_stylo=Stylosanthes hamata; lablab=lablab purpureus (CLL based on Ss); cavalcade_centro=centrosema pascuorum; desmanthus_virgatus (CLL based on Ss); butterfly_pea=clitoria ternatea; burgundy_bean=macroptilium bracteatum (CLL based on Ss); caatinga_stylo=stylosanthes seabrana; brazilian_stylo=stylosanthes guianensis; desmanthus_pernambucanus (CLL based on Sg); arachis_pintoi (CLL based on Ss); Macroptilium gracile (CLL based on Ss); stylo184; maize CLL estimated  # Comments
      SoilType = Alfisol  # Soil description
      NearestTown = Camplong
      ApsoilNumber = 677
      Latitude = -10.034  # Latitude (WGS84)
      LocationAccuracy = +/-50m
      DataSource = Collected by BPTP and CSIRO as part of ACIAR Project LPS/2006/003 'Integrating forage legumes into the maize cropping systems of West Timor'
      Water
        Layer:
          Thickness (mm)  BD (g/cc)  AirDry (mm/mm)  LL15 (mm/mm)  DUL (mm/mm)  SAT (mm/mm)
          150             0.99       0.088           0.175         0.28         0.596
          150             0.907      0.14            0.175         0.277        0.628
          300             0.963      0.201           0.201         0.297        0.607
          300             0.925      0.21            0.21          0.299        0.621
          300             0.965      0.215           0.215         0.323        0.606
          300             0.886      0.204           0.204         0.301        0.636
          300             0.861      0.204           0.204         0.309        0.645
        SoilCrop centro
          Layer:
            Thickness (mm)  LL (mm/mm)  KL (/day)  XF (0-1)
            150             0.175       0.08       1
            150             0.175       0.08       1
            300             0.206       0.08       1
            300             0.22        0.08       1
            300             0.25        0.07       1
            300             0.23        0.07       1
            300             0.23        0.07       1
      SoilWat: SummerCona=3.5; SummerU=6; SummerDate=1-Nov; WinterCona=3.5; WinterU=6; WinterDate=1-May; DiffusConst=88; DiffusSlope=20; Salb=0.13; CN2Bare=73; CNRed=20; CNCov=0.8
        Layer:
          Thickness (mm)  SWCON (0-1)
          150             0.5
          150             0.5
          300             0.5
          300             0.5
          300             0.5
          300             0.5
          300             0.5
      SoilOrganicMatter: same as NTT.Vertic Inceptisol (Naibonat No675).SoilOrganicMatter
      Analysis: same as NTT.Vertic Inceptisol (Naibonat No675).Analysis
      Sample Initial nitrogen
        Layer:
          Thickness (mm)  NO3 (ppm)  NH4 (ppm)
          150             0.100027   0.100027
          150             0.100027   0.100027
          300             0.100027   0.100027
          300             0.100027   0.100027
          300             0.100027   0.100027
          300             0.100027   0.100027
          300             0.100027   0.100027
      Sample Initial water
        Layer:
          Thickness (mm)  SW (mm/mm)
          150             0.3
          150             0.305
          300             0.336
          300             0.33
          300             0.352
          300             0.323
          300             0.323
    soil Grey Vertisol (Usapinonot No678): Site=Usapinonot; Region=TTU Regency; State=NTT; Longitude=124.558
      Comment = verano_stylo=Stylosanthes hamata; lablab=lablab purpureus; cavalcade_centro=centrosema pascuorum; desmanthus_virgatus; butterfly_pea=clitoria ternatea; burgundy_bean=macroptilium bracteatum (CLL based on Ss); caatinga_stylo=stylosanthes seabrana; brazilian_stylo=stylosanthes guianensis; desmanthus_pernambucanus; arachis_pintoi; Macroptilium gracile; stylo184; maize CLL estimated  # Comments
      SoilType = Grey Vertisol  # Soil description
      NearestTown = Kefamenanu
      ApsoilNumber = 678
      Latitude = -9.489  # Latitude (WGS84)
      LocationAccuracy = +/-50m
      DataSource = Collected by BPTP and CSIRO as part of ACIAR Project LPS/2006/003 'Integrating forage legumes into the maize cropping systems of West Timor'
      Water
        Layer:
          Thickness (mm)  BD (g/cc)  AirDry (mm/mm)  LL15 (mm/mm)  DUL (mm/mm)  SAT (mm/mm)
          150             1.061      0.155           0.31          0.429        0.57
          150             1.058      0.248           0.31          0.419        0.571
          300             1.177      0.295           0.295         0.464        0.526
          300             1.197      0.295           0.295         0.468        0.518
          300             1.243      0.305           0.305         0.455        0.501
          300             1.311      0.305           0.305         0.455        0.505
          300             1.195      0.305           0.305         0.46         0.519
        SoilCrop centro
          Layer:
            Thickness (mm)  LL (mm/mm)  KL (/day)  XF (0-1)
            150             0.31        0.08       1
            150             0.31        0.08       1
            300             0.295       0.08       1
            300             0.295       0.08       1
            300             0.305       0.07       1
            300             0.305       0.07       1
            300             0.305       0.07       1
      SoilWat: same as NTT.Vertic Inceptisol (Naibonat No675).SoilWat
      SoilOrganicMatter: same as NTT.Vertic Inceptisol (Naibonat No675).SoilOrganicMatter
      Analysis: same as NTT.Vertic Inceptisol (Naibonat No675).Analysis
      Sample Initial nitrogen
        Layer:
          Thickness (mm)  NO3 (ppm)  NH4 (ppm)
          150             0.928182   0.100012
          150             0.928182   0.100012
          300             0.928182   0.100012
          300             0.928182   0.100012
          300             0.928182   0.100012
          300             0.928182   0.100012
          300             0.928182   0.100012
      Sample Initial water
        Layer:
          Thickness (mm)  SW (mm/mm)
          150             0.399
          150             0.395
          300             0.395
          300             0.384
          300             0.376
          300             0.4343
          300             0.4343
    soil Vertic Inceptisol (Kakanuik No679): Site=Kakanuik; Region=Belu Regency; State=NTT; Longitude=124.845
      Comment = verano_stylo=Stylosanthes hamata; lablab=lablab purpureus; cavalcade_centro=centrosema pascuorum; desmanthus_virgatus; butterfly_pea=clitoria ternatea; burgundy_bean=macroptilium bracteatum; caatinga_stylo=stylosanthes seabrana; brazilian_stylo=stylosanthes guianensis; desmanthus_pernambucanus; arachis_pintoi; Macroptilium gracile; stylo184; maize CLL estimated  # Comments
      SoilType = Vertic Inceptisol  # Soil description
      NearestTown = Besikama
      ApsoilNumber = 679
      Latitude = -9.576  # Latitude (WGS84)
      LocationAccuracy = +/-50m
      DataSource = Collected by BPTP and CSIRO as part of ACIAR Project LPS/2006/003 'Integrating forage legumes into the maize cropping systems of West Timor'
      Water
        Layer:
          Thickness (mm)  BD (g/cc)  AirDry (mm/mm)  LL15 (mm/mm)  DUL (mm/mm)  SAT (mm/mm)
          150             1.2        0.09            0.18          0.357        0.517
          150             1.347      0.148           0.185         0.36         0.462
          300             1.494      0.2             0.2           0.356        0.406
          300             1.456      0.196           0.196         0.33         0.42
          300             1.542      0.196           0.196         0.331        0.388
          300             1.425      0.196           0.196         0.382        0.432
        SoilCrop centro
          Layer:
            Thickness (mm)  LL (mm/mm)  KL (/day)  XF (0-1)
            150             0.18        0.08       1
            150             0.185       0.08       1
            300             0.2         0.08       1
            300             0.224       0.08       1
            300             0.227       0.07       1
            300             0.25        0.07       1
      SoilWat: SummerCona=3.5; SummerU=6; SummerDate=1-Nov; WinterCona=3.5; WinterU=6; WinterDate=1-May; DiffusConst=40; DiffusSlope=16; Salb=0.12; CN2Bare=73; CNRed=20; CNCov=0.8
        Layer:
          Thickness (mm)  SWCON (0-1)
          150             0.3
          150             0.3
          300             0.3
          300             0.3
          300             0.3
          300             0.3
      SoilOrganicMatter: RootCN=40; RootWT=1000; SoilCN=12; EnrACoeff=7.4; EnrBCoeff=0.2
        Layer:
          Thickness (mm)  OC (Total %)  FBiom (0-1)  FInert (0-1)
          150             1.3           0.04         0.4
          150             0.8           0.02         0.6
          300             0.3           0.02         0.8
          300             0.15          0.02         1
          300             0.1           0.01         1
          300             0.1           0.01         1
      Analysis
        Layer:
          Thickness (mm)  PH (1:5 water)
          150             7.5
          150             7.5
          300             7.5
          300             7.5
          300             7.5
          300             7.5
      Sample Initial nitrogen
        Layer:
          Thickness (mm)  NO3 (ppm)  NH4 (ppm)
          150             3.99999    0.099993
          150             0.0999929  0.099993
          300             0.0999929  0.099993
          300             0.0999929  0.099993
          300             0.0999929  0.099993
          300             0.0999929  0.099993
      Sample Initial water
        Layer:
          Thickness (mm)  SW (mm/mm)
          150             0.27
          150             0.334
          300             0.355
          300             0.315
          300             0.375
          300             0.332
    soil Vertic Inceptisol (Kletek No753): Site=Kletek; Region=Belu Regency; State=NTT; Longitude=999999
      Comment = All data apart from CLL is from Kakaniuk (No 679); verano_stylo=Stylosanthes hamata; lablab=lablab purpureus; cavalcade_centro=centrosema pascuorum; desmanthus_virgatus; butterfly_pea=clitoria ternatea; burgundy_bean=macroptilium bracteatum; caatinga_stylo=stylosanthes seabrana; brazilian_stylo=stylosanthes guianensis; desmanthus_pernambucanus; arachis_pintoi; Macroptilium gracile; stylo184; maize CLL estimated  # Comments
      SoilType = Vertic Inceptisol  # Soil description
      NearestTown = Besikama
      ApsoilNumber = 753
      Latitude = 999999  # Latitude (WGS84)
      DataSource = Collected by BPTP and CSIRO as part of ACIAR Project LPS/2006/003 'Integrating forage legumes into the maize cropping systems of West Timor'
      Water
        Layer:
          Thickness (mm)  BD (g/cc)  AirDry (mm/mm)  LL15 (mm/mm)  DUL (mm/mm)  SAT (mm/mm)
          150             1.2        0.11            0.22          0.357        0.517
          150             1.347      0.182           0.227         0.36         0.462
          300             1.494      0.239           0.239         0.356        0.406
          300             1.456      0.23            0.23          0.33         0.42
          300             1.542      0.23            0.23          0.331        0.388
          300             1.425      0.23            0.23          0.382        0.432
        SoilCrop centro
          Layer:
            Thickness (mm)  LL (mm/mm)  KL (/day)  XF (0-1)
            150             0.22        0.08       1
            150             0.227       0.08       1
            300             0.245       0.08       1
            300             0.245       0.08       1
            300             0.277       0.07       1
            300             0.27        0.07       1
      SoilWat: same as NTT.Vertic Inceptisol (Kakanuik No679).SoilWat
      SoilOrganicMatter: same as NTT.Vertic Inceptisol (Kakanuik No679).SoilOrganicMatter
      Analysis: same as NTT.Vertic Inceptisol (Kakanuik No679).Analysis
      Sample Initial nitrogen
        Layer:
          Thickness (mm)  NO3 (ppm)  NH4 (ppm)
          150             1.00002    0.099993
          150             0.999746   0.099993
          300             0.535467   0.099993
          300             0.499072   0.099993
          300             0.497189   0.099993
          300             0.491246   0.099993
      Sample Initial water
        Layer:
          Thickness (mm)  SW (mm/mm)
          150             0.251
          150             0.343
          300             0.362
          300             0.342
          300             0.358
          300             0.338
  simulation Naibonat_Cavalcade_23Dec
    metfile met: filename=Naibonat.met
    clock
      start_date = 16/12/2006  # Select the start date of the simulation
      end_date = 10/07/2007  # Select the end date of the simulation
    summaryfile
    area paddock
      cavalcade
        ini: filename=cavalcade.ini
      folder Manager folder
        manager Sowing rule
          # Sowing criteria
          date1 = 23-Dec-2006  # Enter sowing window START date (dd-mmm)
          date2 = 23-Dec-2006  # Enter sowing window END date (dd-mmm)
          must_sow = yes  # Must sow?
          raincrit = 30  # Amount of rainfall
          rainnumdays = 3  # Number of days of rainfall
          esw_amount = 200  # Enter minimum allowable available soil water (mm)
          # Sowing parameters
          crop = centro  # Enter name of crop to sow
          density = 15  # Enter sowing density (plants/m2)
          depth = 30  # Enter sowing depth (mm)
          cultivar = cavalcade_timor  # Enter cultivar
          class = plant  # Enter crop growth class
          row_spacing = 200  # Enter row spacing (mm)
          on start_of_day:
```
      if (paddock_is_fallow() = 1 and FallowIn <> 'yes' and (NextCrop = 0 or NextCrop = '[crop]')) then
         if (date_within('[date1], [date2]') = 1) then
            if (rain[[rainnumdays]] >= [raincrit] AND esw >= [esw_amount]) OR
                ('[must_sow]' = 'yes' AND today = date('[date2]'))) THEN
               ChooseNextCrop = 'yes'   ! for rotations
               [crop] sow plants =[density], sowing_depth = [depth], cultivar = [cultivar], row_spacing = [row_spacing], crop_class = [class]
            endif
            if today = date('[date2]') then
               ChooseNextCrop = 'yes'
            endif
         endif
      endif
```
        manager Harvesting rule
          # Harvesting criteria
          crop = centro  # Enter name of crop to harvest when ripe
          on end_of_day:
```
           if [crop].StageName = 'harvest_ripe' or [crop].plant_status = 'dead' then
              [crop]  harvest
              [crop]  end_crop
           endif
```
        manager Sowing fertiliser
          # When should fertiliser be applied
          modulename = centro  # On which module should the event come from
          eventname = sowing  # On which event should fertiliser be applied
          # Fertiliser application details
          fertmodule = fertiliser  # Module used to apply the fertiliser
          fert_amount_sow = 0  # Amount of starter fertiliser at sowing (kg/ha)
          fert_type_sow = urea_N  # Sowing fertiliser type
          on [modulename].[eventname]:
```
        [fertmodule] apply amount = [fert_amount_sow] (kg/ha), depth = 50 (mm), type = [fert_type_sow]
```
        manager
          on init:
```
cuts = 0
 total_minN = 0
biom = 0
```
          on start_of_day:
```
 biom = leaf_wt + stem_wt
```
          on end_of_day:
```
  total_minN = total_minN + dlt_n_min_tot()
```
      fertiliser
      surfaceom surface organic matter
        PoolName = centro  # Organic Matter pool name
        type = centro  # Organic Matter type
        mass = 500  # Initial surface residue (kg/ha)
        cnr = 40  # C:N ratio of initial residue
        standing_fraction = 0  # Fraction of residue standing
      centro
      outputfile: filename=Naibonat_Cavalcade_23Dec.out; title=Naibonat_Cavalcade_23Dec
        variables
          variable:
            dd/mm/yyyy as Date  # Date (dd/mm/yyyy)
            year  # Year
            day  # Day
            DaysAfterSowing  # Days after Sowing
            flowering_das  # Days from sowing to flowering
            flowering_date  # Day number of flowering
            StageName  # Plant stage name
            yield  # Yield
            biomass_wt  # Biomass weight
            LeafTotalWt  # Total Leaf dry matter
            StemTotalWt  # Total Stem dry matter
            podTotalWt  # Total pod dry matter
            LeafSenescedWt  # Senesced Leaf dry matter
            green_biomass  # Green Biomass weight
            LeafGreenWt  # Green Leaf dry matter
            StemGreenWt  # Green Stem dry matter
            leaf_no  # Number of leaves per plant
            leaf_no_sen  # Number of senesced leaves per square meter
            leaf_area()  # Leaf area for each node
            node_no  # Number of mainstem nodes per plant
            lai  # Leaf area index
            stover_wt  # Stover Biomass weight
            ep  # Plant water uptake
            esw_layr()  # Extractable soil water
            root_depth  # depth of roots
            no3()
            manager.total_minN
            height
            dlt_dm_green_grain
            dlt_dm_green_leaf
            dlt_dm_green_meal
            dlt_dm_green_pod
            dlt_dm_green_root
            dlt_dm_green_stem
        events Reporting Frequency: event=Daily  # End of day
      soil Vertic Inceptisol (Naibonat No675) -> /Simulations/NTT/Vertic Inceptisol (Naibonat No675)
  simulation Naibonat_Cavalcade_23Jan
    metfile met: filename=Naibonat.met
    clock
      start_date = 16/12/2006  # Select the start date of the simulation
      end_date = 10/07/2007  # Select the end date of the simulation
    summaryfile
    area paddock
      cavalcade
        ini: filename=cavalcade.ini
      folder Manager folder
        manager Sowing rule
          # Sowing criteria
          date1 = 23-Jan-2007  # Enter sowing window START date (dd-mmm)
          date2 = 23-Jan-2007  # Enter sowing window END date (dd-mmm)
          must_sow = yes  # Must sow?
          raincrit = 30  # Amount of rainfall
          rainnumdays = 3  # Number of days of rainfall
          esw_amount = 200  # Enter minimum allowable available soil water (mm)
          # Sowing parameters
          crop = centro  # Enter name of crop to sow
          density = 15  # Enter sowing density (plants/m2)
          depth = 30  # Enter sowing depth (mm)
          cultivar = cavalcade_timor  # Enter cultivar
          class = plant  # Enter crop growth class
          row_spacing = 200  # Enter row spacing (mm)
          on start_of_day:
          script: same as in Naibonat_Cavalcade_23Dec.paddock.Manager folder.Sowing rule
        manager Harvesting rule
          # Harvesting criteria
          crop = centro  # Enter name of crop to harvest when ripe
          on end_of_day:
          script: same as in Naibonat_Cavalcade_23Dec.paddock.Manager folder.Harvesting rule
        manager Sowing fertiliser: same as Naibonat_Cavalcade_23Dec.paddock.Manager folder.Sowing fertiliser
        manager
          on init:
```
cuts = 0
 total_minN = 0
biom = 0
```
          on start_of_day:
```
 biom = leaf_wt + stem_wt
```
          on end_of_day:
```
  total_minN = total_minN + dlt_n_min_tot()
```
      fertiliser
      surfaceom surface organic matter
        PoolName = centro  # Organic Matter pool name
        type = centro  # Organic Matter type
        mass = 500  # Initial surface residue (kg/ha)
        cnr = 40  # C:N ratio of initial residue
        standing_fraction = 0  # Fraction of residue standing
      centro
      outputfile: filename=Naibonat_Cavalcade_23Jan.out; title=Naibonat_Cavalcade_23Jan
        variables: same as Naibonat_Cavalcade_23Dec.paddock.outputfile.Variables
        events Reporting Frequency: event=Daily  # End of day
      soil Vertic Inceptisol (Naibonat No675) -> /Simulations/Naibonat_Cavalcade_23Dec/paddock/Vertic Inceptisol (Naibonat No675)
  simulation Naibonat_Cavalcade_23Feb
    metfile met: filename=Naibonat.met
    clock
      start_date = 16/12/2006  # Select the start date of the simulation
      end_date = 10/07/2007  # Select the end date of the simulation
    summaryfile
    area paddock
      cavalcade
        ini: filename=cavalcade.ini
      folder Manager folder
        manager Sowing rule
          # Sowing criteria
          date1 = 23-Feb-2007  # Enter sowing window START date (dd-mmm)
          date2 = 23-Feb-2007  # Enter sowing window END date (dd-mmm)
          must_sow = yes  # Must sow?
          raincrit = 30  # Amount of rainfall
          rainnumdays = 3  # Number of days of rainfall
          esw_amount = 200  # Enter minimum allowable available soil water (mm)
          # Sowing parameters
          crop = centro  # Enter name of crop to sow
          density = 15  # Enter sowing density (plants/m2)
          depth = 30  # Enter sowing depth (mm)
          cultivar = cavalcade_timor  # Enter cultivar
          class = plant  # Enter crop growth class
          row_spacing = 200  # Enter row spacing (mm)
          on start_of_day:
          script: same as in Naibonat_Cavalcade_23Dec.paddock.Manager folder.Sowing rule
        manager Harvesting rule
          # Harvesting criteria
          crop = centro  # Enter name of crop to harvest when ripe
          on end_of_day:
          script: same as in Naibonat_Cavalcade_23Dec.paddock.Manager folder.Harvesting rule
        manager Sowing fertiliser: same as Naibonat_Cavalcade_23Dec.paddock.Manager folder.Sowing fertiliser
        manager
          on init:
```
cuts = 0
 total_minN = 0
biom = 0
```
          on start_of_day:
```
 biom = leaf_wt + stem_wt
```
          on end_of_day:
```
  total_minN = total_minN + dlt_n_min_tot()
```
      fertiliser
      surfaceom surface organic matter
        PoolName = centro  # Organic Matter pool name
        type = centro  # Organic Matter type
        mass = 500  # Initial surface residue (kg/ha)
        cnr = 40  # C:N ratio of initial residue
        standing_fraction = 0  # Fraction of residue standing
      centro
      outputfile: filename=Naibonat_Cavalcade_23Feb.out; title=Naibonat_Cavalcade_23Feb
        variables: same as Naibonat_Cavalcade_23Dec.paddock.outputfile.Variables
        events Reporting Frequency: event=Daily  # End of day
      soil Vertic Inceptisol (Naibonat No675) -> /Simulations/Naibonat_Cavalcade_23Dec/paddock/Vertic Inceptisol (Naibonat No675)
  simulation Usapinonot_Cavalcade_14_Feb
    metfile met: filename=Usapinonot.met
    climatechange
      maxtmodifier = 0  # Change in maximum temperature in degrees celsius
      mintmodifier = 0  # Change in minimum temperature in degrees celsius
      rainmodifier = 1  # Relative change in rainfall
      radiationmodifier = 1.3  # Relative change in radiation
      co2 = 350  # Atmospheric C02 concentration (ppm)
    clock
      start_date = 16/12/2006  # Select the start date of the simulation
      end_date = 25/02/2008  # Select the end date of the simulation
    summaryfile
    area paddock
      cavalcade
        ini: filename=cavalcade3.ini
      folder Manager folder
        manager Sowing rule
          # Sowing criteria
          date1 = 14-Feb-2007  # Enter sowing window START date (dd-mmm)
          date2 = 14-Feb-2007  # Enter sowing window END date (dd-mmm)
          must_sow = yes  # Must sow?
          raincrit = 30  # Amount of rainfall
          rainnumdays = 3  # Number of days of rainfall
          esw_amount = 200  # Enter minimum allowable available soil water (mm)
          # Sowing parameters
          crop = centro  # Enter name of crop to sow
          density = 15  # Enter sowing density (plants/m2)
          depth = 30  # Enter sowing depth (mm)
          cultivar = cavalcade_timor  # Enter cultivar
          class = plant  # Enter crop growth class
          row_spacing = 200  # Enter row spacing (mm)
          on start_of_day:
          script: same as in Naibonat_Cavalcade_23Dec.paddock.Manager folder.Sowing rule
        manager Harvesting rule
          # Harvesting criteria
          crop = centro  # Enter name of crop to harvest when ripe
          on end_of_day:
          script: same as in Naibonat_Cavalcade_23Dec.paddock.Manager folder.Harvesting rule
        manager Sowing fertiliser: same as Naibonat_Cavalcade_23Dec.paddock.Manager folder.Sowing fertiliser
        manager
          on init:
```
cuts = 0
 total_minN = 0
biom = 0
```
          on start_of_day:
```
  biom = leafgreenwt + stemgreenwt
```
          on end_of_day:
```
  total_minN = total_minN + dlt_n_min_tot()
```
        manager Reset on fixed date
          # When should a reset be done
          reset_date = 18-Jan-2007  # Enter date of reset (dd-mmm)
          # Reset details
          soilmodule = Grey Vertisol (Usapinonot No678)  # Name of your soil module
          surfaceommodule = surface organic matter  # Name of your surface organic matter module
          resetWater = yes  # Reset soil water?
          resetNitrogen = yes  # Reset soil nitrogen?
          resetSurfaceOM = yes  # Reset surface organic matter?
          on start_of_day:
```
         if (today = date('[reset_date]')) then
            resetWater = '[resetWater]'
            resetNitrogen  = '[resetNitrogen]'
            resetSurfaceOM = '[resetSurfaceOM]'
            if (resetWater = 'yes') then
                '[soilmodule] Water' reset
            endif
            if (resetNitrogen = 'yes') then
                '[soilmodule] Nitrogen' reset
            endif
            if (resetSurfaceOM = 'yes') then
                '[surfaceommodule]' reset
            endif
            act_mods reseting
         endif
```
      fertiliser
      surfaceom surface organic matter
        PoolName = centro  # Organic Matter pool name
        type = centro  # Organic Matter type
        mass = 500  # Initial surface residue (kg/ha)
        cnr = 40  # C:N ratio of initial residue
        standing_fraction = 0  # Fraction of residue standing
      centro
      outputfile: filename=Usapinonot_Cavalcade_14_Feb.out; title=Usapinonot_Cavalcade_14_Feb
        variables
          variable:
            dd/mm/yyyy as Date  # Date (dd/mm/yyyy)
            year  # Year
            day  # Day
            DaysAfterSowing  # Days after Sowing
            flowering_das  # Days from sowing to flowering
            flowering_date  # Day number of flowering
            StageName  # Plant stage name
            yield  # Yield
            biomass_wt  # Biomass weight
            LeafTotalWt  # Total Leaf dry matter
            StemTotalWt  # Total Stem dry matter
            podTotalWt  # Total pod dry matter
            LeafSenescedWt  # Senesced Leaf dry matter
            biom as green_biomass  # Green Biomass weight
            LeafGreenWt  # Green Leaf dry matter
            StemGreenWt  # Green Stem dry matter
            leaf_no  # Number of leaves per plant
            leaf_no_sen  # Number of senesced leaves per square meter
            leaf_area()  # Leaf area for each node
            node_no  # Number of mainstem nodes per plant
            lai  # Leaf area index
            stover_wt  # Stover Biomass weight
            ep  # Plant water uptake
            esw_layr()  # Extractable soil water
            root_depth  # depth of roots
            no3()
            manager.total_minN
            height
            sw
            no3
        events Reporting Frequency: event=Daily  # End of day
      soil Grey Vertisol (Usapinonot No678) -> /Simulations/NTT/Grey Vertisol (Usapinonot No678)
  simulation Silu_Cavalcade_16_Feb
    metfile met: filename=Sillu.met
    clock
      start_date = 16/12/2006  # Select the start date of the simulation
      end_date = 15/01/2008  # Select the end date of the simulation
    summaryfile
    area paddock
      cavalcade
        ini: filename=cavalcade3.ini
      folder Manager folder
        manager Sowing rule
          # Sowing criteria
          date1 = 16-Feb-2007  # Enter sowing window START date (dd-mmm)
          date2 = 16-Feb-2007  # Enter sowing window END date (dd-mmm)
          must_sow = yes  # Must sow?
          raincrit = 30  # Amount of rainfall
          rainnumdays = 3  # Number of days of rainfall
          esw_amount = 200  # Enter minimum allowable available soil water (mm)
          # Sowing parameters
          crop = centro  # Enter name of crop to sow
          density = 15  # Enter sowing density (plants/m2)
          depth = 20  # Enter sowing depth (mm)
          cultivar = cavalcade_timor  # Enter cultivar
          class = plant  # Enter crop growth class
          row_spacing = 200  # Enter row spacing (mm)
          on start_of_day:
          script: same as in Naibonat_Cavalcade_23Dec.paddock.Manager folder.Sowing rule
        manager Harvesting rule
          # Harvesting criteria
          crop = centro  # Enter name of crop to harvest when ripe
          on end_of_day:
          script: same as in Naibonat_Cavalcade_23Dec.paddock.Manager folder.Harvesting rule
        manager Sowing fertiliser: same as Naibonat_Cavalcade_23Dec.paddock.Manager folder.Sowing fertiliser
        manager
          on init:
```
cuts = 0
 total_minN = 0
biom = 0
```
          on start_of_day:
```
  biom = leafgreenwt + stemgreenwt
```
          on end_of_day:
```
  total_minN = total_minN + dlt_n_min_tot()
```
        manager Reset on fixed date
          # When should a reset be done
          reset_date = 18-Jan-2007  # Enter date of reset (dd-mmm)
          # Reset details
          soilmodule = Alfisol (Sillu No677)  # Name of your soil module
          surfaceommodule = surface organic matter  # Name of your surface organic matter module
          resetWater = yes  # Reset soil water?
          resetNitrogen = yes  # Reset soil nitrogen?
          resetSurfaceOM = yes  # Reset surface organic matter?
          on start_of_day:
          script: same as in Usapinonot_Cavalcade_14_Feb.paddock.Manager folder.Reset on fixed date
      fertiliser
      surfaceom surface organic matter
        PoolName = centro  # Organic Matter pool name
        type = centro  # Organic Matter type
        mass = 500  # Initial surface residue (kg/ha)
        cnr = 40  # C:N ratio of initial residue
        standing_fraction = 0  # Fraction of residue standing
      centro
      outputfile: filename=Silu_Cavalcade_16_Feb.out; title=Silu_Cavalcade_16_Feb
        variables: same as Usapinonot_Cavalcade_14_Feb.paddock.outputfile.Variables
        events Reporting Frequency: event=Daily  # End of day
      soil Alfisol (Sillu No677) -> /Simulations/NTT/Alfisol (Sillu No677)
  simulation Biloto_Cavalcade_17_Feb
    metfile met: filename=Biloto.met
    clock
      start_date = 16/12/2006  # Select the start date of the simulation
      end_date = 10/09/2008  # Select the end date of the simulation
    summaryfile
    area paddock
      cavalcade
        ini: filename=cavalcade3.ini
      folder Manager folder
        manager Sowing rule
          # Sowing criteria
          date1 = 17-Feb-2007  # Enter sowing window START date (dd-mmm)
          date2 = 17-Feb-2007  # Enter sowing window END date (dd-mmm)
          must_sow = yes  # Must sow?
          raincrit = 30  # Amount of rainfall
          rainnumdays = 3  # Number of days of rainfall
          esw_amount = 200  # Enter minimum allowable available soil water (mm)
          # Sowing parameters
          crop = centro  # Enter name of crop to sow
          density = 15  # Enter sowing density (plants/m2)
          depth = 35  # Enter sowing depth (mm)
          cultivar = cavalcade_timor  # Enter cultivar
          class = plant  # Enter crop growth class
          row_spacing = 200  # Enter row spacing (mm)
          on start_of_day:
          script: same as in Naibonat_Cavalcade_23Dec.paddock.Manager folder.Sowing rule
        manager Harvesting rule
          # Harvesting criteria
          crop = centro  # Enter name of crop to harvest when ripe
          on end_of_day:
          script: same as in Naibonat_Cavalcade_23Dec.paddock.Manager folder.Harvesting rule
        manager Sowing fertiliser: same as Naibonat_Cavalcade_23Dec.paddock.Manager folder.Sowing fertiliser
        manager
          on init:
```
cuts = 0
 total_minN = 0
biom = 0
```
          on start_of_day:
```
  biom = leafgreenwt + stemgreenwt
```
          on end_of_day:
```
  total_minN = total_minN + dlt_n_min_tot()
```
        manager Reset on fixed date
          # When should a reset be done
          reset_date = 18-Jan-2007  # Enter date of reset (dd-mmm)
          # Reset details
          soilmodule = Grey Vertisol (Biloto No676)  # Name of your soil module
          surfaceommodule = surface organic matter  # Name of your surface organic matter module
          resetWater = yes  # Reset soil water?
          resetNitrogen = yes  # Reset soil nitrogen?
          resetSurfaceOM = yes  # Reset surface organic matter?
          on start_of_day:
          script: same as in Usapinonot_Cavalcade_14_Feb.paddock.Manager folder.Reset on fixed date
      fertiliser
      surfaceom surface organic matter
        PoolName = centro  # Organic Matter pool name
        type = centro  # Organic Matter type
        mass = 500  # Initial surface residue (kg/ha)
        cnr = 40  # C:N ratio of initial residue
        standing_fraction = 0  # Fraction of residue standing
      centro
      outputfile: filename=Biloto_Cavalcade_17_Feb.out; title=Biloto_Cavalcade_17_Feb
        variables: same as Usapinonot_Cavalcade_14_Feb.paddock.outputfile.Variables
        events Reporting Frequency: event=Daily  # End of day
      soil Grey Vertisol (Biloto No676) -> /Simulations/NTT/Grey Vertisol (Biloto No676)
  simulation Kletek_Cavalcade_28_Mar
    metfile met: filename=Kakaniuk.met
    clock
      start_date = 16/12/2006  # Select the start date of the simulation
      end_date = 10/09/2008  # Select the end date of the simulation
    summaryfile
    area paddock
      cavalcade
        ini: filename=cavalcade3.ini
      folder Manager folder
        manager Sowing rule
          # Sowing criteria
          date1 = 28-Mar-2007  # Enter sowing window START date (dd-mmm)
          date2 = 28-Mar-2007  # Enter sowing window END date (dd-mmm)
          must_sow = yes  # Must sow?
          raincrit = 30  # Amount of rainfall
          rainnumdays = 3  # Number of days of rainfall
          esw_amount = 200  # Enter minimum allowable available soil water (mm)
          # Sowing parameters
          crop = centro  # Enter name of crop to sow
          density = 10  # Enter sowing density (plants/m2)
          depth = 50  # Enter sowing depth (mm)
          cultivar = cavalcade_timor  # Enter cultivar
          class = plant  # Enter crop growth class
          row_spacing = 200  # Enter row spacing (mm)
          on start_of_day:
          script: same as in Naibonat_Cavalcade_23Dec.paddock.Manager folder.Sowing rule
        manager Harvesting rule
          # Harvesting criteria
          crop = centro  # Enter name of crop to harvest when ripe
          on end_of_day:
          script: same as in Naibonat_Cavalcade_23Dec.paddock.Manager folder.Harvesting rule
        manager Sowing fertiliser: same as Naibonat_Cavalcade_23Dec.paddock.Manager folder.Sowing fertiliser
        manager
          on init:
```
cuts = 0
 total_minN = 0
biom = 0
```
          on start_of_day:
```
  biom = leafgreenwt + stemgreenwt
```
          on end_of_day:
```
  total_minN = total_minN + dlt_n_min_tot()
```
        manager Reset on fixed date
          # When should a reset be done
          reset_date = 18-Jan-2007  # Enter date of reset (dd-mmm)
          # Reset details
          soilmodule = Vertic Inceptisol (Kletek No753)  # Name of your soil module
          surfaceommodule = surface organic matter  # Name of your surface organic matter module
          resetWater = yes  # Reset soil water?
          resetNitrogen = yes  # Reset soil nitrogen?
          resetSurfaceOM = yes  # Reset surface organic matter?
          on start_of_day:
          script: same as in Usapinonot_Cavalcade_14_Feb.paddock.Manager folder.Reset on fixed date
      fertiliser
      surfaceom surface organic matter
        PoolName = centro  # Organic Matter pool name
        type = centro  # Organic Matter type
        mass = 500  # Initial surface residue (kg/ha)
        cnr = 40  # C:N ratio of initial residue
        standing_fraction = 0  # Fraction of residue standing
      centro
      outputfile: filename=Kletek_Cavalcade_28_Mar.out; title=Kletek_Cavalcade_28_Mar
        variables: same as Usapinonot_Cavalcade_14_Feb.paddock.outputfile.Variables
        events Reporting Frequency: event=Daily  # End of day
      soil Vertic Inceptisol (Kletek No753) -> /Simulations/NTT/Vertic Inceptisol (Kletek No753)
  simulation Kakaniuk_Cavalcade_11_Apr
    metfile met: filename=Kakaniuk.met
    climatechange
      maxtmodifier = 0  # Change in maximum temperature in degrees celsius
      mintmodifier = 0  # Change in minimum temperature in degrees celsius
      rainmodifier = 1  # Relative change in rainfall
      radiationmodifier = 1.3  # Relative change in radiation
      co2 = 350  # Atmospheric C02 concentration (ppm)
    clock
      start_date = 16/12/2006  # Select the start date of the simulation
      end_date = 10/09/2008  # Select the end date of the simulation
    summaryfile
    area paddock
      cavalcade
        ini: filename=cavalcade3.ini
      folder Manager folder
        manager Sowing rule
          # Sowing criteria
          date1 = 11-Apr-2007  # Enter sowing window START date (dd-mmm)
          date2 = 11-Apr-2007  # Enter sowing window END date (dd-mmm)
          must_sow = yes  # Must sow?
          raincrit = 30  # Amount of rainfall
          rainnumdays = 3  # Number of days of rainfall
          esw_amount = 200  # Enter minimum allowable available soil water (mm)
          # Sowing parameters
          crop = centro  # Enter name of crop to sow
          density = 5  # Enter sowing density (plants/m2)
          depth = 30  # Enter sowing depth (mm)
          cultivar = cavalcade_timor  # Enter cultivar
          class = plant  # Enter crop growth class
          row_spacing = 200  # Enter row spacing (mm)
          on start_of_day:
          script: same as in Naibonat_Cavalcade_23Dec.paddock.Manager folder.Sowing rule
        manager Harvesting rule
          # Harvesting criteria
          crop = centro  # Enter name of crop to harvest when ripe
          on end_of_day:
          script: same as in Naibonat_Cavalcade_23Dec.paddock.Manager folder.Harvesting rule
        manager Sowing fertiliser: same as Naibonat_Cavalcade_23Dec.paddock.Manager folder.Sowing fertiliser
        manager
          on init:
```
cuts = 0
 total_minN = 0
biom = 0
```
          on start_of_day:
```
biom = leafgreenwt + stemgreenwt 

if centro.biomass_wt > 450 then   
 !  centro harvest  height = 500, remove = 0.9 
endif
```
          on end_of_day:
```
  total_minN = total_minN + dlt_n_min_tot()
```
        manager Reset on fixed date
          # When should a reset be done
          reset_date = 18-Jan-2007  # Enter date of reset (dd-mmm)
          # Reset details
          soilmodule = Vertic Inceptisol (Kakanuik No679)  # Name of your soil module
          surfaceommodule = surface organic matter  # Name of your surface organic matter module
          resetWater = yes  # Reset soil water?
          resetNitrogen = yes  # Reset soil nitrogen?
          resetSurfaceOM = yes  # Reset surface organic matter?
          on start_of_day:
          script: same as in Usapinonot_Cavalcade_14_Feb.paddock.Manager folder.Reset on fixed date
      fertiliser
      surfaceom surface organic matter
        PoolName = centro  # Organic Matter pool name
        type = centro  # Organic Matter type
        mass = 500  # Initial surface residue (kg/ha)
        cnr = 40  # C:N ratio of initial residue
        standing_fraction = 0  # Fraction of residue standing
      centro
      outputfile: filename=Kakaniuk_Cavalcade_11_Apr.out; title=Kakaniuk_Cavalcade_11_Apr
        variables: same as Usapinonot_Cavalcade_14_Feb.paddock.outputfile.Variables
        events Reporting Frequency: event=Daily  # End of day
      soil Vertic Inceptisol (Kakanuik No679) -> /Simulations/NTT/Vertic Inceptisol (Kakanuik No679)
  simulation Gatton_Centrosema_17Dec
    metfile met: filename=Gatton.met
    clock
      start_date = 16/12/2007  # Select the start date of the simulation
      end_date = 1/06/2008  # Select the end date of the simulation
    summaryfile
    area paddock
      cavalcade
        ini: filename=C:\DATA\Temp\NPD\West_Timor\APSIMV6\cavalcade3.ini
      centro
      folder Manager folder
        manager Sowing rule
          # Sowing criteria
          date1 = 17-Dec  # Enter sowing window START date (dd-mmm)
          date2 = 17-Dec  # Enter sowing window END date (dd-mmm)
          must_sow = yes  # Must sow?
          raincrit = 30  # Amount of rainfall
          rainnumdays = 3  # Number of days of rainfall
          esw_amount = 200  # Enter minimum allowable available soil water (mm)
          # Sowing parameters
          crop = centro  # Enter name of crop to sow
          density = 30  # Enter sowing density (plants/m2)
          depth = 30  # Enter sowing depth (mm)
          cultivar = cavalcade  # Enter cultivar
          class = plant  # Enter crop growth class
          row_spacing = 200  # Enter row spacing (mm)
          on start_of_day:
          script: same as in Naibonat_Cavalcade_23Dec.paddock.Manager folder.Sowing rule
        manager Harvesting rule
          # Harvesting criteria
          crop = centro  # Enter name of crop to harvest when ripe
          on end_of_day:
```
           if [crop].StageName = 'harvest_ripe' or [crop].plant_status = 'dead' then
      !        [crop]  harvest
      !        [crop]  end_crop
           endif
```
        manager Sowing fertiliser: same as Naibonat_Cavalcade_23Dec.paddock.Manager folder.Sowing fertiliser
        manager
          on init:
```
cuts = 0
 total_minN = 0
biom = 0

green_leaves = 0
```
          on start_of_day:
```
 biom = leaf_wt + stem_wt
 if leaf_no >= 1 then
      green_leaves = leaf_no - leaf_no_sen 
 else
 endif

  if day = 358 and year = 2007 then        
      irrigation apply amount = 10
  endif

  if day = 362  and year = 2007 then        
      irrigation apply amount = 38
  endif

 
  if day = 97 and year = 2008 then        
      irrigation apply amount = 40
  endif

  if day = 9114 and year = 2008 then        
      irrigation apply amount = 50
  endif
```
          on end_of_day:
```
  total_minN = total_minN + dlt_n_min_tot()
```
      fertiliser
      surfaceom surface organic matter
        PoolName = centro  # Organic Matter pool name
        type = centro  # Organic Matter type
        mass = 500  # Initial surface residue (kg/ha)
        cnr = 40  # C:N ratio of initial residue
        standing_fraction = 0  # Fraction of residue standing
      irrigation
        automatic_irrigation = off
        asw_depth = 600  # Depth to which ASW is calculated. (mm)
        crit_fr_asw = 0.5  # Fraction of ASW below which irrigation is applied (0-1.0)
        irrigation_efficiency = 1  # Efficiency of the irrigation. (0-1.0)
        irrigation_allocation = off  # Allocation limits
        allocation = 0  # Allocation in ML
        default_no3_conc = 0  # Nitrate concentration (ppm N)
        default_nh4_conc = 0  # Ammonium concentration (ppm N)
        default_cl_conc = 0  # Chloride concentration (ppm Cl)
        default_no3_conc = 0  # Nitrate concentration (ppm N)
        default_nh4_conc = 0  # Ammonium concentration (ppm N)
        default_cl_conc = 0  # Chloride concentration (ppm Cl)
      soil Prarie-Lockyer: Site=Lawes; Region=Lockyer; State=Queensland; Longitude=152.338
        Comment = Soil naming structure: \State\Region\Classification-Local Name (Site/district and locator number); oc and ph estimated  # Comments
        SoilType = Prarie  # Soil description
        NearestTown = Lawes, Q 4350
        NaturalVegetation = Blue Gum, Moreton Bay Ash, Tea Tree
        Latitude = -27.5339  # Latitude (WGS84)
        LocationAccuracy = +-20m
        DataSource = CSIRO Sustainable Ecosystems, Toowoomba
        InitWater Initial water: RelativeTo=butterflypea
          PercentMethod: Percent=1.00; Distributed=Evenly distributed
        Water
          Layer:
            Thickness (mm)  BD (g/cc)  AirDry (mm/mm)  LL15 (mm/mm)  DUL (mm/mm)  SAT (mm/mm)
            150             1.38       0.1             0.19          0.38         0.45
            150             1.38       0.168           0.195         0.38         0.45
            300             1.28       0.2             0.2           0.39         0.45
            300             1.38       0.22            0.22          0.4          0.45
            300             1.4        0.23            0.23          0.39         0.44
            300             1.46       0.25            0.25          0.37         0.42
            300             1.47       0.26            0.26          0.34         0.42
            300             1.47       0.27            0.27          0.34         0.42
          SoilCrop chickpea
            Layer:
              Thickness (mm)  LL (mm/mm)  KL (/day)  XF (0-1)
              150             0.2         0.06       1
              150             0.21        0.06       1
              300             0.2         0.06       1
              300             0.22        0.06       1
              300             0.23        0.06       1
              300             0.3         0.06       1
              300             0.34        0.06       1
              300             0.34        0.06       1
          SoilCrop butterflypea
            Layer:
              Thickness (mm)  LL (mm/mm)  KL (/day)  XF (0-1)
              150             0.2         0.06       1
              150             0.21        0.06       1
              300             0.2         0.06       1
              300             0.22        0.06       1
              300             0.24        0.06       1
              300             0.28        0.06       1
              300             0.3         0.06       1
              300             0.3         0.06       1
          SoilCrop centro
            Layer:
              Thickness (mm)  LL (mm/mm)  KL (/day)  XF (0-1)
              150             0.19        0.06       1
              150             0.195       0.06       1
              300             0.2         0.06       1
              300             0.22        0.06       1
              300             0.23        0.06       1
              300             0.25        0.06       1
              300             0.26        0.06       1
              300             0.27        0.06       1
          SoilCrop cavalcade: same as Gatton_Centrosema_17Dec.paddock.Prarie-Lockyer.Water.centro
        SoilWat: SummerCona=3.5; SummerU=6; SummerDate=1-Nov; WinterCona=2.5; WinterU=4; WinterDate=1-apr; DiffusConst=40; DiffusSlope=16; Salb=0.12; CN2Bare=73; CNRed=20; CNCov=0.8
          Layer:
            Thickness (mm)  SWCON (0-1)
            150             0.3
            150             0.3
            300             0.3
            300             0.3
            300             0.3
            300             0.3
            300             0.3
            300             0.3
        SoilOrganicMatter: RootCN=40; RootWT=1000; SoilCN=12; EnrACoeff=7.4; EnrBCoeff=0.2
          Layer:
            Thickness (mm)  OC (Total %)  FBiom (0-1)  FInert (0-1)
            150             1.2           0.04         0.4
            150             1.2           0.02         0.6
            300             1.2           0.02         0.8
            300             1.1           0.02         1
            300             0.7           0.01         1
            300             0.3           0.01         1
            300             0.3           0.01         1
            300             0.3           0.01         1
        Analysis
          Layer:
            Thickness (mm)  PH (1:5 water)
            150             7
            150             7
            300             7
            300             7
            300             7
            300             7
            300             7
            300             7
        Sample Initial nitrogen
          Layer:
            Thickness (mm)  NO3 (ppm)  NH4 (ppm)
            150             2.71003    0.1
            150             2.71003    0.1
            300             2.71003    0.1
            300             2.71003    0.1
            300             2.71003    0.1
            300             2.71003    0.1
            300             2.71003    0.1
            300             2.71003    0.1
      outputfile: filename=Gatton_Centrosema_17Dec.out; title=Gatton_Centrosema_17Dec
        variables
          variable:
            dd/mm/yyyy as Date  # Date (dd/mm/yyyy)
            year  # Year
            day  # Day
            DaysAfterSowing  # Days after Sowing
            flowering_das  # Days from sowing to flowering
            flowering_date  # Day number of flowering
            StageName  # Plant stage name
            yield  # Yield
            biomass_wt  # Biomass weight
            LeafTotalWt  # Total Leaf dry matter
            StemTotalWt  # Total Stem dry matter
            podTotalWt  # Total pod dry matter
            LeafSenescedWt  # Senesced Leaf dry matter
            green_biomass_wt  # Green Biomass weight
            LeafGreenWt  # Green Leaf dry matter
            StemGreenWt  # Green Stem dry matter
            leaf_no  # Number of leaves per plant
            leaf_no_sen  # Number of senesced leaves per square meter
            leaf_area()  # Leaf area for each node
            node_no  # Number of mainstem nodes per plant
            lai  # Leaf area index
            lai_sum
            stover_wt  # Stover Biomass weight
            ep  # Plant water uptake
            esw_layr()  # Extractable soil water
            root_depth  # depth of roots
            no3()
            manager.total_minN
            height
            sw
            no3
        events Reporting Frequency: event=Daily  # End of day
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