folder FromConFile: version=32
  simulation APS2CPE
    clock
      start_date = 29/5/1991
      end_date = 26/12/1991
    summaryfile
    metfile met: filename=met\cooper.met
    area paddock
      micromet: soilalbedo=0.23; a_interception=0.0; b_interception=0.0; c_interception=0.0; d_interception=0.0
      outputfile: filename=APS2CPE.out; title=APS2CPE
        variables
          variables: day, Expcode as Title, Site, Season, Treatment, dd/mm/yyyy as Date, DaysAfterSowing, TTAfterSowing, sw_dep, AboveGroundWt, RootDepth, StageCodeValue, LeafPhotosynthesisFtValue, LeafPhotosynthesisFvpdValue, LeafFw, LeafLAI, swTotal, LeafLiveWt, StemLiveWt, PodLivewt, StructureMainStemNodeNo, LeafDeadCohortNo, PhenologyThermalTimeValue, LeafFinalNodeNo, GrainLiveWt
        events: event=end_day
      operations
        30/05/1991  chickpea2 sow population= 28, rowSpacing =350, Depth= 50, cultivar = amethyst, maxcover=1.0, budNumber=1
        31/05/1991  irrigation apply amount = 40.0
        20/06/1991  irrigation apply amount = 40.0
        10/07/1991  irrigation apply amount = 40.0
        30/07/1991  irrigation apply amount = 40.0
        19/08/1991  irrigation apply amount = 40.0
        8/09/1991  irrigation apply amount = 40.0
        28/09/1991  irrigation apply amount = 40.0
        18/10/1991  irrigation apply amount = 40.0
        7/11/1991  irrigation apply amount = 40.0
      fertiliser
      irrigation
      manager output titles
        ExpCode = APS2CPE  # Experimental code
        Site = CP91GAT  # experimental site name
        Season = -Y1991  # calander year or years data is from
        Treatment1 = Amethyst  # treatment type
        on start_of_day:
```
     Expcode='[ExpCode]'
     Site='[Site]'
     Season='[Season]'
     Treatment='[Treatment1]'
```
      soil
        Water
          Layer:
            Thickness (mm)  BD (g/cc)  AirDry (mm/mm)  LL15 (mm/mm)  DUL (mm/mm)  SAT (mm/mm)
            150.0           1.380      0.050           0.180         0.384        0.434
            150.0           1.380      0.190           0.190         0.381        0.431
            300.0           1.320      0.200           0.200         0.440        0.490
            300.0           1.460      0.220           0.220         0.424        0.448
            300.0           1.510      0.190           0.190         0.419        0.430
            300.0           1.490      0.170           0.170         0.376        0.426
            300.0           1.470      0.170           0.170         0.377        0.427
          SoilCrop chickpea2
            Layer:
              Thickness (mm)  LL (mm/mm)  KL (/day)  XF (0-1)
              150.0           0.250       0.06       1.00
              150.0           0.250       0.06       1.00
              300.0           0.230       0.06       1.00
              300.0           0.250       0.05       1.00
              300.0           0.200       0.04       1.00
              300.0           0.200       0.02       1.00
              300.0           0.200       0.02       1.00
          SoilCrop chickpea21: same as APS2CPE.paddock.soil.Water.chickpea2
        SoilWat: SummerCona=2.0; SummerU=6.0; SummerDate=1-Nov; WinterCona=2.0; WinterU=6.0; WinterDate=1-Apr; DiffusConst=40.0; DiffusSlope=16.0; Salb=0.13; Cn2Bare=72; CnRed=20.0; CnCov=0.8
          Layer:
            Thickness (mm)  SWCON (0-1)
            150.0           0.400
            150.0           0.400
            300.0           0.400
            300.0           0.400
            300.0           0.400
            300.0           0.400
            300.0           0.400
        SoilOrganicMatter: RootCn=80.0; RootWt=500.0; SoilCn=14.5; EnrACoeff=7.4; EnrBCoeff=0.2
          Layer:
            Thickness (mm)  OC (Total %)  FBiom (0-1)  FInert (0-1)
            150.0           1.2           0.02         0.36
            150.0           0.8           0.015        0.50
            300.0           0.5           0.01         0.59
            300.0           0.3           0.01         0.84
            300.0           0.2           0.01         0.80
            300.0           0.1           0.01         0.99
            300.0           0.10          0.01         0.99
        Analysis
          Layer:
            Thickness (mm)  PH (1:5 water)
            150.0           7.50
            150.0           8.00
            300.0           8.00
            300.0           8.00
            300.0           8.00
            300.0           8.00
            300.0           8.00
        Sample Initial nitrogen
          Layer:
            Thickness (mm)  NO3 (ppm)  NH4 (ppm)
            150             14.3       0
            150             5.9        0
            300             1.8        0
            300             0.9        0
            300             1          0
            300             0.2        0
            300             0.1        0
        Sample Initial water
          Layer:
            Thickness (mm)  SW (mm/mm)
            150.0           0.384
            150.0           0.381
            300.0           0.440
            300.0           0.424
            300.0           0.419
            300.0           0.376
            300.0           0.377
      surfaceom
        PoolName = unknown  # Organic Matter pool name
        type = wheat  # Organic Matter type
        mass = 0  # Initial surface residue (kg/ha)
        cnr = 0  # C:N ratio of initial residue
        standing_fraction = 0  # Fraction of residue standing
      manager Harvesting rule
        # Harvesting criteria
        crop = chickpea2  # Enter name of crop to harvest when ripe
        on end_of_day:
```
           if ([crop].PhenologyCurrentStageName = 'HarvestRipe' or [crop].plant_status = 'dead') then
              [crop]  harvest
              [crop]  end_crop
           endif
```
      chickpea2
      manager Harvesting rule1
        # Harvesting criteria
        crop = chickpea2  # Enter name of crop to harvest when ripe
        on end_of_day:
```
           if [crop].PhenologyCurrentPhaseName = 'ReadyForHarvesting'  then
              [crop]  Harvest
              [crop]  EndCrop
           endif
```
  simulation APS2CPL
    clock: start_date=29/5/1991; end_date=26/12/1991
    summaryfile
    metfile met: filename=met\Aps02.met
    area paddock: text=/>
      micromet: soilalbedo=0.23; a_interception=0.0; b_interception=0.0; c_interception=0.0; d_interception=0.0
      outputfile: filename=APS2CPL.out; title=APS2CPL
        variables: same as APS2CPE.paddock.outputfile.variables
        events: event=end_day
      operations
        09/08/1991  chickpea2 sow population = 28, RowSpacing =350, Depth= 50, cultivar = amethyst, maxcover=1.0, budNumber=1
        31/05/1991  irrigation apply amount = 40.0
        20/06/1991  irrigation apply amount = 40.0
        10/07/1991  irrigation apply amount = 40.0
        30/07/1991  irrigation apply amount = 40.0
        19/08/1991  irrigation apply amount = 40.0
        08/09/1991  irrigation apply amount = 40.0
        28/09/1991  irrigation apply amount = 40.0
        18/10/1991  irrigation apply amount = 40.0
        07/11/1991  irrigation apply amount = 40.0
      fertiliser
      irrigation
      manager output titles
        ExpCode = APS2CPl  # Experimental code
        Site = CP91GAT  # experimental site name
        Season = -Y1991  # calander year or years data is from
        Treatment1 = Amethyst  # treatment type
        on start_of_day:
```
Expcode='[ExpCode]'
     Site='[Site]'
     Season='[Season]'
     Treatment='[Treatment1]'
```
      soil
        Water
          Layer:
            Thickness (mm)  BD (g/cc)  AirDry (mm/mm)  LL15 (mm/mm)  DUL (mm/mm)  SAT (mm/mm)
            150.0           1.380      0.050           0.180         0.384        0.434
            150.0           1.380      0.190           0.190         0.381        0.431
            300.0           1.320      0.200           0.200         0.440        0.490
            300.0           1.460      0.220           0.220         0.424        0.448
            300.0           1.510      0.190           0.190         0.419        0.430
            300.0           1.490      0.170           0.170         0.376        0.426
            300.0           1.470      0.170           0.170         0.377        0.427
          SoilCrop chickpea2: same as APS2CPE.paddock.soil.Water.chickpea2
        SoilWat: same as APS2CPE.paddock.soil.SoilWat
        SoilOrganicMatter: same as APS2CPE.paddock.soil.SoilOrganicMatter
        Analysis: same as APS2CPE.paddock.soil.Analysis
        Sample Initial nitrogen
          Layer:
            Thickness (mm)  NO3 (ppm)  NH4 (ppm)
            150.0           14.30      0
            150.0           5.90       0
            300.0           1.80       0
            300.0           0.90       0
            300.0           1.00       0
            300.0           0.20       0
            300.0           0.10       0
        Sample Initial water: same as APS2CPE.paddock.soil.Initial water
      surfaceom
        PoolName = unknown  # Organic Matter pool name
        type = wheat  # Organic Matter type
        mass = 0.0  # Initial surface residue (kg/ha)
        cnr = 0.0  # C:N ratio of initial residue
        standing_fraction = 0.0  # Fraction of residue standing
      chickpea2
      manager Harvesting rule
        # Harvesting criteria
        crop = chickpea2  # Enter name of crop to harvest when ripe
        on end_of_day:
        script: same as in APS2CPE.paddock.Harvesting rule
  simulation APS27D
    clock
      start_date = 14/06/1995
      end_date = 26/11/1995
    summaryfile
    metfile met: filename=met\cooper.met
    area paddock
      micromet: soilalbedo=0.23; a_interception=0.0; b_interception=0.0; c_interception=0.0; d_interception=0.0
      outputfile: filename=APS27D.out; title=APS27D
        variables
          variables: day, Expcode as Title, Site, Season, Treatment, dd/mm/yyyy as Date, DaysAfterSowing, TTAfterSowing, sw_dep, AboveGroundWt, RootDepth, StageCodeValue, LeafPhotosynthesisFtValue, LeafPhotosynthesisFvpdValue, LeafFw, LeafLAI, swTotal, ll15_dep, GrainLiveWt
        events: event=end_day
      operations
        15/06/1995  chickpea2 sow population= 39.5, depth= 50, cultivar = amethyst, maxcover=1.0, budNumber=1
        22/6/1995  irrigation apply amount = 3
        22/06/1995  irrigation apply amount = 5.25
        23/6/1995  irrigation apply amount = 3
        5/7/1995  irrigation apply amount = 7
        13/7/1995  irrigation apply amount = 24
      fertiliser
      irrigation
      manager output titles
        ExpCode = APS27D  # Experimental code
        Site = APS27W  # experimental site name
        Season = -Y1995  # calander year or years data is from
        Treatment1 = Amethyst  # treatment type
        on start_of_day:
```
Expcode='[ExpCode]'
     Site='[Site]'
     Season='[Season]'
     Treatment='[Treatment1]'
```
        on end_of_day:
```
swTotal = sw_dep()-sw_dep(1)
```
      soil
        Water
          Layer:
            Thickness (mm)  BD (g/cc)  AirDry (mm/mm)  LL15 (mm/mm)  DUL (mm/mm)  SAT (mm/mm)
            150.0           1.380      0.050           0.25          0.35         0.434
            150.0           1.380      0.190           0.25          0.35         0.431
            300.0           1.320      0.200           0.2           0.31         0.49
            300.0           1.460      0.220           0.23          0.325        0.448
            300.0           1.510      0.190           0.21          0.3          0.43
            300.0           1.490      0.170           0.22          0.29         0.426
            300.0           1.470      0.170           0.22          0.28         0.427
          SoilCrop chickpea2
            Layer:
              Thickness (mm)  LL (mm/mm)  KL (/day)  XF (0-1)
              150             0.25        0.06       1
              150             0.25        0.06       1
              300             0.2         0.06       0.8
              300             0.23        0.06       0.8
              300             0.21        0.06       1
              300             0.22        0.06       1
              300             0.22        0.08       1
        SoilWat: same as APS2CPE.paddock.soil.SoilWat
        SoilOrganicMatter: same as APS2CPE.paddock.soil.SoilOrganicMatter
        Analysis: same as APS2CPE.paddock.soil.Analysis
        Sample Initial nitrogen
          Layer:
            Thickness (mm)  NO3 (ppm)  NH4 (ppm)
            150.0           60         0
            150.0           40         0
            300.0           40         0
            300.0           10         0
            300.0           1          0
            300.0           0.2        0
            300.0           0.1        0
        Sample Initial water
          Layer:
            Thickness (mm)  SW (mm/mm)
            150.0           0.34
            150.0           0.346
            300.0           0.309
            300.0           0.324
            300.0           0.302
            300.0           0.29
            300.0           0.278
      surfaceom
        PoolName = unknown  # Organic Matter pool name
        type = wheat  # Organic Matter type
        mass = 0.0  # Initial surface residue (kg/ha)
        cnr = 0.0  # C:N ratio of initial residue
        standing_fraction = 0.0  # Fraction of residue standing
      manager Harvesting rule
        # Harvesting criteria
        crop = chickpea2  # Enter name of crop to harvest when ripe
        on end_of_day:
        script: same as in APS2CPE.paddock.Harvesting rule
      chickpea2
  simulation APS27W
    clock
      start_date = 14/06/1995
      end_date = 26/11/1995
    summaryfile
    metfile met: filename=met\cooper.met
    area paddock: text=/>
      outputfile: filename=APS27W.out; title=APS27W
        variables
          variables: day, Expcode as Title, Site, Season, Treatment, dd/mm/yyyy as Date, DaysAfterSowing, TTAfterSowing, sw_dep, AboveGroundWt, RootDepth, StageCodeValue, LeafPhotosynthesisFtValue, LeafPhotosynthesisFvpdValue, LeafFw, LeafLAI, sw_dep(), grainlivewt
        events: event=end_day
      micromet: soilalbedo=0.23; a_interception=0.0; b_interception=0.0; c_interception=0.0; d_interception=0.0
      operations
        15/06/1995  'soil water' set sw = 0.320 0.340 0.380 0.310 0.360 0.330 0.280
        15/06/1995  chickpea2 sow population = 37.3, Depth= 50, cultivar = amethyst, maxcover=1.0, budNumber=1
        21/07/1995  irrigation apply amount = 13.5
        1/08/1995  irrigation apply amount = 28.0
        11/08/1995  irrigation apply amount = 32.0
        25/08/1995  irrigation apply amount = 15.0
        1/09/1995  irrigation apply amount = 14.0
        4/09/1995  irrigation apply amount = 15.0
        15/09/1995  irrigation apply amount = 25.0
        22/09/1995  irrigation apply amount = 20.0
        29/09/1995  irrigation apply amount = 9.0
        2/10/1995  irrigation apply amount = 11.0
      fertiliser
      irrigation
      manager output titles
        ExpCode = APS27W  # Experimental code
        Site = CP95gat  # experimental site name
        Season = -Y1995  # calander year or years data is from
        Treatment1 = Amethyst  # treatment type
        on start_of_day:
```
Expcode='[ExpCode]'
     Site='[Site]'
     Season='[Season]'
     Treatment='[Treatment1]'
```
      surfaceom
        PoolName = unknown  # Organic Matter pool name
        type = wheat  # Organic Matter type
        mass = 0.0  # Initial surface residue (kg/ha)
        cnr = 0.0  # C:N ratio of initial residue
        standing_fraction = 0.0  # Fraction of residue standing
      chickpea2
      manager Harvesting rule
        # Harvesting criteria
        crop = chickpea2  # Enter name of crop to harvest when ripe
        on end_of_day:
        script: same as in APS2CPE.paddock.Harvesting rule
      soil
        Water
          Layer:
            Thickness (mm)  BD (g/cc)  AirDry (mm/mm)  LL15 (mm/mm)  DUL (mm/mm)  SAT (mm/mm)
            150.0           1.380      0.050           0.25          0.37         0.434
            150.0           1.380      0.190           0.25          0.37         0.431
            300.0           1.320      0.200           0.2           0.38         0.49
            300.0           1.460      0.220           0.23          0.32         0.448
            300.0           1.510      0.190           0.21          0.36         0.43
            300.0           1.490      0.170           0.22          0.33         0.426
            300.0           1.470      0.170           0.22          0.28         0.427
          SoilCrop chickpea2
            Layer:
              Thickness (mm)  LL (mm/mm)  KL (/day)  XF (0-1)
              150             0.25        0.06       1
              150             0.25        0.06       1
              300             0.2         0.06       0.8
              300             0.23        0.06       0.8
              300             0.28        0.06       1
              300             0.22        0.06       1
              300             0.22        0.06       1
        SoilWat
          Layer:
            Thickness (mm)  SWCON (0-1)
            150.0           0.400
            150.0           0.400
            300.0           0.400
            300.0           0.400
            300.0           0.400
            300.0           0.400
            300.0           0.400
          SummerCona = 2.0
          SummerU = 6.0
          SummerDate = 1-Nov
          WinterCona = 3.5
          WinterU = 6.0
          WinterDate = 1-Apr
          DiffusConst = 40.0
          DiffusSlope = 16.0
          Salb = 0.13
          Cn2Bare = 72
          CnRed = 20.0
          CnCov = 0.8
        SoilOrganicMatter: same as APS2CPE.paddock.soil.SoilOrganicMatter
        Analysis: same as APS2CPE.paddock.soil.Analysis
        Sample Initial nitrogen: same as APS27D.paddock.soil.Initial nitrogen
        Sample Initial water: same as APS27D.paddock.soil.Initial water
  simulation A16P1T1A
    clock: start_date=24/5/1993; end_date=26/12/1993
    summaryfile
    metfile met: filename=%apsim%\Tests\Validation\Chickpea2\met\cooper.met
    area paddock: text=/>
      micromet: soilalbedo=0.23; a_interception=0.0; b_interception=0.0; c_interception=0.0; d_interception=0.0
      operations
        25/05/1993  'soil water' set sw = .413 .446 .408 .374 .327 .325 .371
        25/05/1993  chickpea2 sow population = 41, RowSpacing =700, Depth= 50, cultivar = amethyst, maxcover=1.0, budNumber=1
        05/07/1993  irrigation apply amount = 52.0
      manager Fertilise on fixed date
        #
        fert_date = 25-may  # Enter fertiliser date (dd-mmm)
        fert_criteria = 1000  # Don't add fertiliser if N in top 2 layers exceeds (kg/ha)
        #
        fertmodule = fertiliser  # Module used to apply the fertiliser
        fert_amount = 150  # Amount of fertiliser to apply (kg/ha)
        fert_type = urea_N  # Fertiliser type
        on start_of_day:
```
         if (today = date('[fert_date]') then
            N_topsoil = no3(1) + nh4(1) + no3(2) + nh4(2)
            if (N_topsoil < [fert_criteria]) then
               [fertmodule] apply amount = [fert_amount] (kg/ha), depth = 50 (mm), type = [fert_type] ()
            endif
         endif
```
      fertiliser
      irrigation
      manager output titles
        ExpCode = A16P1T1A  # Experimental code
        Site = CP93gat  # experimental site name
        Season = -Y1993  # calander year or years data is from
        Treatment1 = Amethyst  # treatment type
        on start_of_day:
```
Expcode='[ExpCode]'
     Site='[Site]'
     Season='[Season]'
     Treatment='[Treatment1]'
```
      soil
        Water: same as APS2CPL.paddock.soil.Water
        SoilWat: SummerCona=2; SummerU=6; SummerDate=1-Nov; WinterCona=2; WinterU=6; WinterDate=1-Apr; DiffusConst=40; DiffusSlope=16; Salb=0.13; Cn2Bare=72; CnRed=20; CnCov=0.8
          Layer:
            Thickness (mm)  SWCON (0-1)
            150.0           0.400
            150.0           0.400
            300.0           0.400
            300.0           0.400
            300.0           0.400
            300.0           0.400
            300.0           0.400
        SoilOrganicMatter: RootCn=80; RootWt=500; SoilCn=14.5; EnrACoeff=7.4; EnrBCoeff=0.2
          Layer:
            Thickness (mm)  OC (Total %)  FBiom (0-1)  FInert (0-1)
            150.0           1.2           0.02         0.36
            150.0           0.8           0.015        0.50
            300.0           0.5           0.01         0.59
            300.0           0.3           0.01         0.84
            300.0           0.2           0.01         0.80
            300.0           0.1           0.01         0.99
            300.0           0.10          0.01         0.99
        Analysis: same as APS2CPE.paddock.soil.Analysis
        Sample Initial nitrogen: same as APS2CPL.paddock.soil.Initial nitrogen
        Sample Initial water: same as APS2CPE.paddock.soil.Initial water
      surfaceom
        PoolName = unknown  # Organic Matter pool name
        type = wheat  # Organic Matter type
        mass = 0.0  # Initial surface residue (kg/ha)
        cnr = 0.0  # C:N ratio of initial residue
        standing_fraction = 0.0  # Fraction of residue standing
      chickpea2
      manager Harvesting rule
        # Harvesting criteria
        crop = chickpea2  # Enter name of crop to harvest when ripe
        on end_of_day:
        script: same as in APS2CPE.paddock.Harvesting rule
      outputfile: filename=A16P1T1A.out; title=A16P1T1A
        variables
          variables: day, Expcode as Title, Site, Season, Treatment, dd/mm/yyyy as Date, sw_dep, sw_dep(), ll15_dep, AboveGroundWt, GrainLiveWt, RootDepth, StageCodeValue, LeafPhotosynthesisFtValue, LeafPhotosynthesisFvpdValue, LeafFw, LeafLAI, StemLiveWt, LeafLiveWt, PodLiveWt
        events: event=end_day
  simulation A16P1T2A
    clock: start_date=24/5/1993; end_date=26/12/1993
    summaryfile
    metfile met: filename=%apsim%\Tests\Validation\Chickpea2\met\cooper.met
    area paddock: text=/>
      micromet: soilalbedo=0.23; a_interception=0.0; b_interception=0.0; c_interception=0.0; d_interception=0.0
      outputfile: filename=A16P1T2A.out; title=A16P1T2A
        variables
          variables: day, Expcode as Title, Site, Season, Treatment, dd/mm/yyyy as Date, sw_dep, sw_dep(), ll15_dep, AboveGroundWt, GrainLiveWt, RootDepth, StageCodeValue, LeafPhotosynthesisFtValue, LeafPhotosynthesisFvpdValue, LeafFw, LeafLAI, StemLiveWt, LeafLiveWt, PodLiveWt
        events: event=end_day
      operations
        25/05/1993  'soil water' set sw = .413 .456 .408 .374 .327 .325 .371
        25/05/1993  chickpea2 sow population = 35, RowSpacing =350, Depth= 50, cultivar = amethyst, maxcover=1.0, budNumber=1
        05/07/1993  irrigation apply amount = 52.0
      fertiliser
      irrigation
      manager output titles
        ExpCode = A16P1T2A  # Experimental code
        Site = CP93gat  # experimental site name
        Season = -Y1993  # calander year or years data is from
        Treatment1 = Amethyst  # treatment type
        on start_of_day:
```
Expcode='[ExpCode]'
     Site='[Site]'
     Season='[Season]'
     Treatment='[Treatment1]'
```
      soil: same as APS2CPL.paddock.soil
      surfaceom
        PoolName = unknown  # Organic Matter pool name
        type = wheat  # Organic Matter type
        mass = 0.0  # Initial surface residue (kg/ha)
        cnr = 0.0  # C:N ratio of initial residue
        standing_fraction = 0.0  # Fraction of residue standing
      chickpea2
      manager Harvesting rule
        # Harvesting criteria
        crop = chickpea2  # Enter name of crop to harvest when ripe
        on end_of_day:
        script: same as in APS2CPE.paddock.Harvesting rule
  simulation A16P1T3A
    clock: start_date=24/5/1993; end_date=26/12/1993
    summaryfile
    metfile met: filename=%apsim%\Tests\Validation\Chickpea2\met\cooper.met
    area paddock: text=/>
      micromet: soilalbedo=0.23; a_interception=0.0; b_interception=0.0; c_interception=0.0; d_interception=0.0
      outputfile: filename=A16P1T3A.out; title=A16P1T3A
        variables
          variables: day, Expcode as Title, Site, Season, Treatment, dd/mm/yyyy as Date, sw_dep, sw_dep(), ll15_dep, AboveGroundWt, GrainLiveWt, RootDepth, StageCodeValue, LeafPhotosynthesisFtValue, LeafPhotosynthesisFvpdValue, LeafFw, LeafLAI, StemLiveWt, LeafLiveWt, PodLiveWt
        events: event=end_day
      operations
        25/05/1993  'soil water' set sw = .413 .456 .408 .374 .327 .325 .371
        25/05/1993  chickpea2 sow population = 20, RowSpacing =170, Depth= 50, cultivar = amethyst, maxcover=1.0, budNumber=1
        5/07/1993  irrigation apply amount = 52.0
      fertiliser
      irrigation
      manager output titles
        ExpCode = A16P1T3A  # Experimental code
        Site = CP93gat  # experimental site name
        Season = -Y1993  # calander year or years data is from
        Treatment1 = Amethyst  # treatment type
        on start_of_day:
```
Expcode='[ExpCode]'
     Site='[Site]'
     Season='[Season]'
     Treatment='[Treatment1]'
```
      soil: same as APS2CPL.paddock.soil
      surfaceom
        PoolName = unknown  # Organic Matter pool name
        type = wheat  # Organic Matter type
        mass = 0.0  # Initial surface residue (kg/ha)
        cnr = 0.0  # C:N ratio of initial residue
        standing_fraction = 0.0  # Fraction of residue standing
      chickpea2
      manager Harvesting rule
        # Harvesting criteria
        crop = chickpea2  # Enter name of crop to harvest when ripe
        on end_of_day:
        script: same as in APS2CPE.paddock.Harvesting rule
  simulation A16P1T4A
    clock: start_date=24/5/1993; end_date=26/12/1993
    summaryfile
    metfile met: filename=%apsim%\Tests\Validation\Chickpea2\met\cooper.met
    area paddock: text=/>
      micromet: soilalbedo=0.23; a_interception=0.0; b_interception=0.0; c_interception=0.0; d_interception=0.0
      outputfile: filename=A16P1T4A.out; title=A16P1T4A
        variables
          variables: day, Expcode as Title, Site, Season, Treatment, dd/mm/yyyy as Date, sw_dep, sw_dep(), ll15_dep, AboveGroundWt, GrainLiveWt, RootDepth, StageCodeValue, LeafPhotosynthesisFtValue, LeafPhotosynthesisFvpdValue, LeafFw, LeafLAI, StemLiveWt, LeafLiveWt, PodLiveWt
        events: event=end_day
      operations
        25/05/1993  'soil water' set sw = .413 .456 .408 .374 .327 .325 .371
        25/05/1993  chickpea2 sow population = 18, RowSpacing =350, Depth= 50, cultivar = amethyst, maxcover=1.0, budNumber=1
        05/07/1993  irrigation apply amount = 52.0
      fertiliser
      irrigation
      manager output titles
        ExpCode = A16P1T4A  # Experimental code
        Site = CP93gat  # experimental site name
        Season = -Y1993  # calander year or years data is from
        Treatment1 = Amethyst  # treatment type
        on start_of_day:
```
Expcode='[ExpCode]'
     Site='[Site]'
     Season='[Season]'
     Treatment='[Treatment1]'
```
      soil: same as APS2CPL.paddock.soil
      surfaceom
        PoolName = unknown  # Organic Matter pool name
        type = wheat  # Organic Matter type
        mass = 0.0  # Initial surface residue (kg/ha)
        cnr = 0.0  # C:N ratio of initial residue
        standing_fraction = 0.0  # Fraction of residue standing
      chickpea2
      manager Harvesting rule
        # Harvesting criteria
        crop = chickpea2  # Enter name of crop to harvest when ripe
        on end_of_day:
        script: same as in APS2CPE.paddock.Harvesting rule
  simulation A16P1T5A
    clock: start_date=24/5/1993; end_date=26/12/1993
    summaryfile
    metfile met: filename=%apsim%\Tests\Validation\Chickpea2\met\cooper.met
    area paddock: text=/>
      micromet: soilalbedo=0.23; a_interception=0.0; b_interception=0.0; c_interception=0.0; d_interception=0.0
      outputfile: filename=A16P1T5A.out; title=A16P1T5A
        variables
          variables: day, Expcode as Title, Site, Season, Treatment, dd/mm/yyyy as Date, sw_dep, sw_dep(), ll15_dep, AboveGroundWt, GrainLiveWt, RootDepth, StageCodeValue, LeafPhotosynthesisFtValue, LeafPhotosynthesisFvpdValue, LeafFw, LeafLAI, StemLiveWt, LeafLiveWt, PodLiveWt
        events: event=end_day
      operations
        25/05/1993  'soil water' set sw = .413 .456 .408 .374 .327 .325 .371
        25/05/1993  chickpea2 sow population = 33, RowSpacing =170, Depth= 50, cultivar = amethyst, maxcover=1.0, budNumber=1
        05/07/1993  irrigation apply amount = 52.0
      fertiliser
      irrigation
      manager output titles
        ExpCode = A16P1T5A  # Experimental code
        Site = CP93gat  # experimental site name
        Season = -Y1993  # calander year or years data is from
        Treatment1 = Amethyst  # treatment type
        on start_of_day:
```
Expcode='[ExpCode]'
     Site='[Site]'
     Season='[Season]'
     Treatment='[Treatment1]'
```
      soil: same as APS2CPL.paddock.soil
      surfaceom
        PoolName = unknown  # Organic Matter pool name
        type = wheat  # Organic Matter type
        mass = 0.0  # Initial surface residue (kg/ha)
        cnr = 0.0  # C:N ratio of initial residue
        standing_fraction = 0.0  # Fraction of residue standing
      chickpea2
      manager Harvesting rule
        # Harvesting criteria
        crop = chickpea2  # Enter name of crop to harvest when ripe
        on end_of_day:
        script: same as in APS2CPE.paddock.Harvesting rule
  simulation A16P1T6A
    clock: start_date=24/5/1993; end_date=26/12/1993
    summaryfile
    metfile met: filename=%apsim%\Tests\Validation\Chickpea2\met\cooper.met
    area paddock: text=/>
      micromet: soilalbedo=0.23; a_interception=0.0; b_interception=0.0; c_interception=0.0; d_interception=0.0
      outputfile: filename=A16P1T6A.out; title=A16P1T6A
        variables
          variables: day, Expcode as Title, Site, Season, Treatment, dd/mm/yyyy as Date, sw_dep, sw_dep(), ll15_dep, AboveGroundWt, GrainLiveWt, RootDepth, StageCodeValue, LeafPhotosynthesisFtValue, LeafPhotosynthesisFvpdValue, LeafFw, LeafLAI, StemLiveWt, LeafLiveWt, PodLiveWt
        events: event=end_day
      operations
        25/05/1993  'soil water' set sw = .413 .456 .408 .374 .327 .325 .371
        25/05/1993  chickpea2 sow population = 79, RowSpacing =350, Depth= 50, cultivar = amethyst, maxcover=1.0, budNumber=1
        05/07/1993  irrigation apply amount = 52.0
      fertiliser
      irrigation
      manager output titles
        ExpCode = A16P1T6A  # Experimental code
        Site = CP93gat  # experimental site name
        Season = -Y1993  # calander year or years data is from
        Treatment1 = Amethyst  # treatment type
        on start_of_day:
```
Expcode='[ExpCode]'
     Site='[Site]'
     Season='[Season]'
     Treatment='[Treatment1]'
```
      soil: same as APS2CPL.paddock.soil
      surfaceom
        PoolName = unknown  # Organic Matter pool name
        type = wheat  # Organic Matter type
        mass = 0.0  # Initial surface residue (kg/ha)
        cnr = 0.0  # C:N ratio of initial residue
        standing_fraction = 0.0  # Fraction of residue standing
      chickpea2
      manager Harvesting rule
        # Harvesting criteria
        crop = chickpea2  # Enter name of crop to harvest when ripe
        on end_of_day:
        script: same as in APS2CPE.paddock.Harvesting rule
  simulation A16P1T7A
    clock: start_date=24/5/1993; end_date=26/12/1993
    summaryfile
    metfile met: filename=%apsim%\Tests\Validation\Chickpea2\met\cooper.met
    area paddock: text=/>
      micromet: soilalbedo=0.23; a_interception=0.0; b_interception=0.0; c_interception=0.0; d_interception=0.0
      outputfile: filename=A16P1T7A.out; title=A16P1T7A
        variables
          variables: day, Expcode as Title, Site, Season, Treatment, dd/mm/yyyy as Date, sw_dep, sw_dep(), ll15_dep, AboveGroundWt, GrainLiveWt, RootDepth, StageCodeValue, LeafPhotosynthesisFtValue, LeafPhotosynthesisFvpdValue, LeafFw, LeafLAI, StemLiveWt, LeafLiveWt, PodLiveWt
        events: event=end_day
      operations
        25/05/1993  'soil water' set sw = .413 .456 .408 .374 .327 .325 .371
        25/05/1993  chickpea2 sow population = 69, RowSpacing =700, Depth= 50, cultivar = amethyst, maxcover=1.0, budNumber=1
        05/07/1993  irrigation apply amount = 52.0
      fertiliser
      irrigation
      manager output titles
        ExpCode = A16P1T7A  # Experimental code
        Site = CP93gat  # experimental site name
        Season = -Y1993  # calander year or years data is from
        Treatment1 = Amethyst  # treatment type
        on start_of_day:
```
Expcode='[ExpCode]'
     Site='[Site]'
     Season='[Season]'
     Treatment='[Treatment1]'
```
      soil: same as APS2CPL.paddock.soil
      surfaceom
        PoolName = unknown  # Organic Matter pool name
        type = wheat  # Organic Matter type
        mass = 0.0  # Initial surface residue (kg/ha)
        cnr = 0.0  # C:N ratio of initial residue
        standing_fraction = 0.0  # Fraction of residue standing
      chickpea2
      manager Harvesting rule
        # Harvesting criteria
        crop = chickpea2  # Enter name of crop to harvest when ripe
        on end_of_day:
        script: same as in APS2CPE.paddock.Harvesting rule
  simulation A16P1T8A
    clock: start_date=24/5/1993; end_date=26/12/1993
    summaryfile
    metfile met: filename=%apsim%\Tests\Validation\Chickpea2\met\cooper.met
    area paddock: text=/>
      micromet: soilalbedo=0.23; a_interception=0.0; b_interception=0.0; c_interception=0.0; d_interception=0.0
      outputfile: filename=A16P1T8A.out; title=A16P1T8A
        variables
          variables: day, Expcode as Title, Site, Season, Treatment, dd/mm/yyyy as Date, sw_dep, sw_dep(), ll15_dep, AboveGroundWt, GrainLiveWt, RootDepth, StageCodeValue, LeafPhotosynthesisFtValue, LeafPhotosynthesisFvpdValue, LeafFw, LeafLAI, StemLiveWt, LeafLiveWt, PodLiveWt
        events: event=end_day
      operations
        25/05/1993  'soil water' set sw = .413 .456 .408 .374 .327 .325 .371
        25/05/1993  chickpea2 sow population = 17, RowSpacing =700, Depth= 50, cultivar = amethyst, maxcover=1.0, budNumber=1
        05/07/1993  irrigation apply amount = 52.0
      fertiliser
      irrigation
      manager output titles
        ExpCode = A16P1T8A  # Experimental code
        Site = CP93gat  # experimental site name
        Season = -Y1993  # calander year or years data is from
        Treatment1 = Amethyst  # treatment type
        on start_of_day:
```
Expcode='[ExpCode]'
     Site='[Site]'
     Season='[Season]'
     Treatment='[Treatment1]'
```
      soil: same as APS2CPL.paddock.soil
      surfaceom
        PoolName = unknown  # Organic Matter pool name
        type = wheat  # Organic Matter type
        mass = 0.0  # Initial surface residue (kg/ha)
        cnr = 0.0  # C:N ratio of initial residue
        standing_fraction = 0.0  # Fraction of residue standing
      chickpea2
      manager Harvesting rule
        # Harvesting criteria
        crop = chickpea2  # Enter name of crop to harvest when ripe
        on end_of_day:
        script: same as in APS2CPE.paddock.Harvesting rule
  simulation A16P2T1A
    clock: start_date=24/5/1993; end_date=26/12/1993
    summaryfile
    metfile met: filename=%apsim%\Tests\Validation\Chickpea2\met\cooper.met
    area paddock: text=/>
      micromet: soilalbedo=0.23; a_interception=0.0; b_interception=0.0; c_interception=0.0; d_interception=0.0
      outputfile: filename=A16P2T1A.out; title=A16P2T1A
        variables
          variables: day, Expcode as Title, Site, Season, Treatment, dd/mm/yyyy as Date, sw_dep, sw_dep(), ll15_dep, AboveGroundWt, GrainLiveWt, RootDepth, StageCodeValue, LeafPhotosynthesisFtValue, LeafPhotosynthesisFvpdValue, LeafFw, LeafLAI, StemLiveWt, LeafLiveWt, PodLiveWt
        events: event=end_day
      operations
        25/05/1993  'soil water' set sw = .413 .456 .408 .374 .327 .325 .371
        21/07/1993  chickpea2 sow population = 37, RowSpacing =700, Depth= 50, cultivar = amethyst, maxcover=1.0, budNumber=1
      fertiliser
      irrigation
      manager output titles
        ExpCode = A16P2T1A  # Experimental code
        Site = CP93gat  # experimental site name
        Season = -Y1993  # calander year or years data is from
        Treatment1 = Amethyst  # treatment type
        on start_of_day:
```
Expcode='[ExpCode]'
     Site='[Site]'
     Season='[Season]'
     Treatment='[Treatment1]'
```
      soil
        InitWater Initial water: RelativeTo=ll15
          PercentMethod: Percent=0.90; Distributed=Evenly distributed
        Water
          Layer:
            Thickness (mm)  BD (g/cc)  AirDry (mm/mm)  LL15 (mm/mm)  DUL (mm/mm)  SAT (mm/mm)
            150.0           1.32       0.1             0.31          0.413        0.453
            150.0           1.380      0.26            0.313         0.454        0.479
            300.0           1.330      0.32            0.376         0.495        0.498
            300.0           1.330      0.3             0.356         0.495        0.498
            300.0           1.420      0.27            0.3           0.418        0.464
            300.0           1.330      0.24            0.303         0.400        0.457
            300.0           1.350      0.31            0.31          0.370        0.435
          SoilCrop chickpea2
            Layer:
              Thickness (mm)  LL (mm/mm)  KL (/day)  XF (0-1)
              150.0           0.250       0.06       1.00
              150.0           0.25        0.06       1.00
              300.0           0.300       0.06       1.00
              300.0           0.300       0.05       1.00
              300.0           0.250       0.04       1.00
              300.0           0.303       0.02       1.00
              300.0           0.310       0.02       1.00
        SoilWat: SummerCona=2.0; SummerU=6.0; SummerDate=1-Nov; WinterCona=2.0; WinterU=6.0; WinterDate=1-Apr; DiffusConst=40.0; DiffusSlope=16.0; Salb=0.13; Cn2Bare=75; CnRed=20.0; CnCov=0.8
          Layer:
            Thickness (mm)  SWCON (0-1)
            150.0           0.300
            150.0           0.300
            300.0           0.300
            300.0           0.300
            300.0           0.300
            300.0           0.300
            300.0           0.300
        SoilOrganicMatter: RootCn=80.0; RootWt=500.0; SoilCn=14.5; EnrACoeff=7.4; EnrBCoeff=0.2
          Layer:
            Thickness (mm)  OC (Total %)  FBiom (0-1)  FInert (0-1)
            150.0           1.00          0.05         0.39
            150.0           0.64          0.02         0.47
            300.0           0.64          0.015        0.60
            300.0           0.47          0.01         0.83
            300.0           0.47          0.01         0.93
            300.0           0.35          0.01         0.93
            300.0           0.26          0.01         0.93
        Analysis
          Layer:
            Thickness (mm)  PH (1:5 water)
            150.0           6.50
            150.0           6.20
            300.0           6.20
            300.0           6.30
            300.0           6.30
            300.0           6.40
            300.0           6.50
        Sample Initial nitrogen
          Layer:
            Thickness (mm)  NO3 (ppm)  NH4 (ppm)
            150.0           14.4       0.60
            150.0           6.58       0.10
            300.0           2.45       0.10
            300.0           1.08       0.10
            300.0           0.15       0.10
            300.0           0.83       0.10
            300.0           2.30       0.10
      surfaceom
        PoolName = unknown  # Organic Matter pool name
        type = wheat  # Organic Matter type
        mass = 0.0  # Initial surface residue (kg/ha)
        cnr = 10.0  # C:N ratio of initial residue
        standing_fraction = 0.0  # Fraction of residue standing
      chickpea2
      manager Harvesting rule
        # Harvesting criteria
        crop = chickpea2  # Enter name of crop to harvest when ripe
        on end_of_day:
        script: same as in APS2CPE.paddock.Harvesting rule
  simulation A16P2T2A
    clock: start_date=24/5/1993; end_date=26/12/1993
    summaryfile
    metfile met: filename=%apsim%\Tests\Validation\Chickpea2\met\cooper.met
    area paddock: text=/>
      micromet: soilalbedo=0.23; a_interception=0.0; b_interception=0.0; c_interception=0.0; d_interception=0.0
      outputfile: filename=A16P2T2A.out; title=A16P2T2A
        variables
          variables: day, Expcode as Title, Site, Season, Treatment, dd/mm/yyyy as Date, sw_dep, sw_dep(), ll15_dep, AboveGroundWt, GrainLiveWt, RootDepth, StageCodeValue, LeafPhotosynthesisFtValue, LeafPhotosynthesisFvpdValue, LeafFw, LeafLAI, StemLiveWt, LeafLiveWt, PodLiveWt
        events: event=end_day
      operations
        25/05/1993  'soil water' set sw = .413 .456 .408 .374 .327 .325 .371
        21/07/1993  chickpea2 sow population = 41, RowSpacing =350, Depth= 50, cultivar = amethyst, maxcover=1.0, budNumber=1
      fertiliser
      irrigation
      manager output titles
        ExpCode = A16P2T2A  # Experimental code
        Site = CP93gat  # experimental site name
        Season = -Y1993  # calander year or years data is from
        Treatment1 = Amethyst  # treatment type
        on start_of_day:
```
Expcode='[ExpCode]'
     Site='[Site]'
     Season='[Season]'
     Treatment='[Treatment1]'
```
      soil
        InitWater Initial water
          PercentMethod: Percent=0.91; Distributed=Evenly distributed
        Water
          Layer:
            Thickness (mm)  BD (g/cc)  AirDry (mm/mm)  LL15 (mm/mm)  DUL (mm/mm)  SAT (mm/mm)
            150.0           1.32       0.100           0.310         0.413        0.453
            150.0           1.380      0.260           0.313         0.454        0.479
            300.0           1.330      0.320           0.376         0.495        0.498
            300.0           1.330      0.300           0.356         0.495        0.498
            300.0           1.420      0.270           0.300         0.418        0.464
            300.0           1.330      0.240           0.303         0.400        0.457
            300.0           1.350      0.310           0.310         0.370        0.435
          SoilCrop chickpea2: same as A16P2T1A.paddock.soil.Water.chickpea2
        SoilWat: same as A16P2T1A.paddock.soil.SoilWat
        SoilOrganicMatter: same as A16P2T1A.paddock.soil.SoilOrganicMatter
        Analysis: same as A16P2T1A.paddock.soil.Analysis
        Sample Initial nitrogen: same as A16P2T1A.paddock.soil.Initial nitrogen
      surfaceom
        PoolName = unknown  # Organic Matter pool name
        type = wheat  # Organic Matter type
        mass = 0.0  # Initial surface residue (kg/ha)
        cnr = 10.0  # C:N ratio of initial residue
        standing_fraction = 0.0  # Fraction of residue standing
      chickpea2
      manager Harvesting rule
        # Harvesting criteria
        crop = chickpea2  # Enter name of crop to harvest when ripe
        on end_of_day:
        script: same as in APS2CPE.paddock.Harvesting rule
  simulation A16P2T4A
    clock: start_date=24/5/1993; end_date=26/12/1993
    summaryfile
    metfile met: filename=%apsim%\Tests\Validation\Chickpea2\met\cooper.met
    area paddock: text=/>
      micromet: soilalbedo=0.23; a_interception=0.0; b_interception=0.0; c_interception=0.0; d_interception=0.0
      outputfile: filename=A16P2T4A.out; title=A16P2T4A
        variables
          variables: day, Expcode as Title, Site, Season, Treatment, dd/mm/yyyy as Date, sw_dep, sw_dep(), ll15_dep, AboveGroundWt, GrainLiveWt, RootDepth, StageCodeValue, LeafPhotosynthesisFtValue, LeafPhotosynthesisFvpdValue, LeafFw, LeafLAI, StemLiveWt, LeafLiveWt, PodLiveWt
        events: event=end_day
      operations
        25/05/1993  'soil water' set sw = .413 .456 .408 .374 .327 .325 .371
        21/07/1993  chickpea2 sow population = 18, RowSpacing =350, Depth= 50, cultivar = amethyst, maxcover=1.0, budNumber=1
      fertiliser
      irrigation
      manager output titles
        ExpCode = A16P2T4A  # Experimental code
        Site = CP93gat  # experimental site name
        Season = -Y1993  # calander year or years data is from
        Treatment1 = Amethyst  # treatment type
        on start_of_day:
```
Expcode='[ExpCode]'
     Site='[Site]'
     Season='[Season]'
     Treatment='[Treatment1]'
```
      soil
        InitWater Initial water
          PercentMethod: Percent=0.90; Distributed=Evenly distributed
        Water: same as A16P2T2A.paddock.soil.Water
        SoilWat: same as A16P2T1A.paddock.soil.SoilWat
        SoilOrganicMatter: same as A16P2T1A.paddock.soil.SoilOrganicMatter
        Analysis: same as A16P2T1A.paddock.soil.Analysis
        Sample Initial nitrogen: same as A16P2T1A.paddock.soil.Initial nitrogen
      surfaceom
        PoolName = unknown  # Organic Matter pool name
        type = wheat  # Organic Matter type
        mass = 0.0  # Initial surface residue (kg/ha)
        cnr = 10.0  # C:N ratio of initial residue
        standing_fraction = 0.0  # Fraction of residue standing
      chickpea2
      manager Harvesting rule
        # Harvesting criteria
        crop = chickpea2  # Enter name of crop to harvest when ripe
        on end_of_day:
        script: same as in APS2CPE.paddock.Harvesting rule
  simulation A16P2T5A
    clock: start_date=24/5/1993; end_date=26/12/1993
    summaryfile
    metfile met: filename=%apsim%\Tests\Validation\Chickpea2\met\cooper.met
    area paddock: text=/>
      micromet: soilalbedo=0.23; a_interception=0.0; b_interception=0.0; c_interception=0.0; d_interception=0.0
      outputfile: filename=A16P2T5A.out; title=A16P2T5A
        variables
          variables: day, Expcode as Title, Site, Season, Treatment, dd/mm/yyyy as Date, sw_dep, sw_dep(), ll15_dep, AboveGroundWt, GrainLiveWt, RootDepth, StageCodeValue, LeafPhotosynthesisFtValue, LeafPhotosynthesisFvpdValue, LeafFw, LeafLAI, StemLiveWt, LeafLiveWt, PodLiveWt
        events: event=end_day
      operations
        25/05/1993  'soil water' set sw = .413 .456 .408 .374 .327 .325 .371
        21/07/1993  chickpea2 sow population = 50, RowSpacing =170, Depth= 50, cultivar = amethyst, maxcover=1.0, budNumber=1
      fertiliser
      irrigation
      manager output titles
        ExpCode = A16P2T5A  # Experimental code
        Site = CP93gat  # experimental site name
        Season = -Y1993  # calander year or years data is from
        Treatment1 = Amethyst  # treatment type
        on start_of_day:
```
Expcode='[ExpCode]'
     Site='[Site]'
     Season='[Season]'
     Treatment='[Treatment1]'
```
      soil: same as A16P2T4A.paddock.soil
      surfaceom
        PoolName = unknown  # Organic Matter pool name
        type = wheat  # Organic Matter type
        mass = 0.0  # Initial surface residue (kg/ha)
        cnr = 10.0  # C:N ratio of initial residue
        standing_fraction = 0.0  # Fraction of residue standing
      chickpea2
      manager Harvesting rule
        # Harvesting criteria
        crop = chickpea2  # Enter name of crop to harvest when ripe
        on end_of_day:
        script: same as in APS2CPE.paddock.Harvesting rule
  simulation B90C3P1
    clock: start_date=1/3/1990; end_date=31/12/1990
    summaryfile
    metfile met: filename=%apsim%\Tests\Validation\Chickpea2\met\biloela.met
    area paddock: text=/>
      micromet: soilalbedo=0.23; a_interception=0.0; b_interception=0.0; c_interception=0.0; d_interception=0.0
      outputfile: filename=B90C3P1.out; title=B90C3P1
        variables
          variables: day, Expcode as Title, Site, Season, Treatment, dd/mm/yyyy as Date, sw_dep, sw_dep(), ll15_dep, AboveGroundWt, GrainLiveWt, RootDepth, StageCodeValue, LeafPhotosynthesisFtValue, LeafPhotosynthesisFvpdValue, LeafFw, LeafLAI, StemLiveWt, LeafLiveWt, PodLiveWt
        events: event=end_day
      operations
        07/03/1990  'soil water' set sw = 0.400 0.420 0.447 0.460
        13/03/1990  chickpea2 sow population = 24.79, Depth= 50,  cultivar = amethyst, maxcover=1.0, budNumber=1
        08/03/1990  irrigation apply amount = 100.0
      fertiliser
      irrigation
      manager output titles
        ExpCode = B90C3P1  # Experimental code
        Site = CP93gat  # experimental site name
        Season = -Y1993  # calander year or years data is from
        Treatment1 = Amethyst  # treatment type
        on start_of_day:
```
Expcode='[ExpCode]'
     Site='[Site]'
     Season='[Season]'
     Treatment='[Treatment1]'
```
      soil
        Water
          Layer:
            Thickness (mm)  BD (g/cc)  AirDry (mm/mm)  LL15 (mm/mm)  DUL (mm/mm)  SAT (mm/mm)
            150.0           1.090      0.100           0.167         0.400        0.410
            150.0           1.270      0.167           0.167         0.420        0.430
            300.0           1.300      0.213           0.213         0.447        0.455
            300.0           1.300      0.220           0.220         0.460        0.470
          SoilCrop chickpea2
            Layer:
              Thickness (mm)  LL (mm/mm)  KL (/day)  XF (0-1)
              150.0           0.167       0.080      1.0
              150.0           0.167       0.060      1.0
              300.0           0.250       0.040      1.0
              300.0           0.370       0.020      1.0
        SoilWat: SummerCona=2.0; SummerU=6.0; SummerDate=1-Nov; WinterCona=2.0; WinterU=6.0; WinterDate=1-Apr; DiffusConst=40.0; DiffusSlope=16.0; Salb=0.13; Cn2Bare=75; CnRed=20; CnCov=0.8
          Layer:
            Thickness (mm)  SWCON (0-1)
            150.0           0.1
            150.0           0.1
            300.0           0.1
            300.0           0.1
        SoilOrganicMatter: RootCn=80.0; RootWt=500.0; SoilCn=14.5; EnrACoeff=7.4; EnrBCoeff=0.2
          Layer:
            Thickness (mm)  OC (Total %)  FBiom (0-1)  FInert (0-1)
            150.0           0.80          0.05         0.39
            150.0           0.40          0.02         0.47
            300.0           0.20          0.015        0.52
            300.0           0.20          0.015        0.52
        Analysis
          Layer:
            Thickness (mm)  PH (1:5 water)
            150.0           7.50
            150.0           8.00
            300.0           8.00
            300.0           8.00
        Sample Initial nitrogen
          Layer:
            Thickness (mm)  NO3 (ppm)  NH4 (ppm)
            150.0           3.90       0.60
            150.0           1.30       0.10
            300.0           1.50       0.10
            300.0           1.50       0.10
        Sample Initial water
          Layer:
            Thickness (mm)  SW (mm/mm)
            150.0           0.400
            150.0           0.420
            300.0           0.447
            300.0           0.460
      surfaceom
        PoolName = unknown  # Organic Matter pool name
        type = wheat  # Organic Matter type
        mass = 0.0  # Initial surface residue (kg/ha)
        cnr = 10.0  # C:N ratio of initial residue
        standing_fraction = 0.0  # Fraction of residue standing
      chickpea2
      manager Harvesting rule
        # Harvesting criteria
        crop = chickpea2  # Enter name of crop to harvest when ripe
        on end_of_day:
        script: same as in APS2CPE.paddock.Harvesting rule
  simulation B90C3P2
    clock: start_date=1/3/1990; end_date=31/12/1990
    summaryfile
    metfile met: filename=%apsim%\Tests\Validation\Chickpea2\met\biloela.met
    area paddock: text=/>
      micromet: soilalbedo=0.23; a_interception=0.0; b_interception=0.0; c_interception=0.0; d_interception=0.0
      outputfile: filename=B90C3P2.out; title=B90C3P2
        variables
          variables: day, Expcode as Title, Site, Season, Treatment, dd/mm/yyyy as Date, sw_dep, sw_dep(), ll15_dep, AboveGroundWt, GrainLiveWt, RootDepth, StageCodeValue, LeafPhotosynthesisFtValue, LeafPhotosynthesisFvpdValue, LeafFw, LeafLAI, StemLiveWt, LeafLiveWt, PodLiveWt
        events: event=end_day
      operations
        08/03/1990  irrigation apply amount = 100.0
        07/03/1990  'soil water' set sw = 0.400 0.420 0.447 0.460
        27/04/1990  chickpea2 sow population = 21.35, Depth= 50, cultivar = amethyst, maxcover=1.0, budNumber=1
      fertiliser
      irrigation
      manager output titles
        ExpCode = A16P2T6A  # Experimental code
        Site = CP93gat  # experimental site name
        Season = -Y1993  # calander year or years data is from
        Treatment1 = Amethyst  # treatment type
        on start_of_day:
```
Expcode='[ExpCode]'
     Site='[Site]'
     Season='[Season]'
     Treatment='[Treatment1]'
```
      soil: same as B90C3P1.paddock.soil
      surfaceom
        PoolName = unknown  # Organic Matter pool name
        type = wheat  # Organic Matter type
        mass = 0.0  # Initial surface residue (kg/ha)
        cnr = 10.0  # C:N ratio of initial residue
        standing_fraction = 0.0  # Fraction of residue standing
      chickpea2
      manager Harvesting rule
        # Harvesting criteria
        crop = chickpea2  # Enter name of crop to harvest when ripe
        on end_of_day:
        script: same as in APS2CPE.paddock.Harvesting rule
  simulation B90C3P3
    clock: start_date=1/3/1990; end_date=31/12/1990
    summaryfile
    metfile met: filename=%apsim%\Tests\Validation\Chickpea2\met\biloela.met
    area paddock: text=/>
      micromet: soilalbedo=0.23; a_interception=0.0; b_interception=0.0; c_interception=0.0; d_interception=0.0
      outputfile: filename=B90C3P3.out; title=B90C3P3
        variables
          variables: day, Expcode as Title, Site, Season, Treatment, dd/mm/yyyy as Date, sw_dep, sw_dep(), ll15_dep, AboveGroundWt, GrainLiveWt, RootDepth, StageCodeValue, LeafPhotosynthesisFtValue, LeafPhotosynthesisFvpdValue, LeafFw, LeafLAI, StemLiveWt, LeafLiveWt, PodLiveWt
        events: event=end_day
      operations
        07/03/1990  'soil water' set sw = 0.400 0.420 0.447 0.460
        19/06/1990  chickpea2 sow population = 24.43, Depth= 50, cultivar = amethyst, maxcover=1.0, budNumber=1
        14/09/1990  irrigation apply amount = 100.0
      fertiliser
      irrigation
      manager output titles
        ExpCode = A16P2T7A  # Experimental code
        Site = CP93gat  # experimental site name
        Season = -Y1993  # calander year or years data is from
        Treatment1 = Amethyst  # treatment type
        on start_of_day:
```
Expcode='[ExpCode]'
     Site='[Site]'
     Season='[Season]'
     Treatment='[Treatment1]'
```
      soil: same as B90C3P1.paddock.soil
      surfaceom
        PoolName = unknown  # Organic Matter pool name
        type = wheat  # Organic Matter type
        mass = 0.0  # Initial surface residue (kg/ha)
        cnr = 10.0  # C:N ratio of initial residue
        standing_fraction = 0.0  # Fraction of residue standing
      chickpea2
      manager Harvesting rule
        # Harvesting criteria
        crop = chickpea2  # Enter name of crop to harvest when ripe
        on end_of_day:
        script: same as in APS2CPE.paddock.Harvesting rule
  simulation B90C3P4
    clock: start_date=1/3/1990; end_date=31/12/1990
    summaryfile
    metfile met: filename=%apsim%\Tests\Validation\Chickpea2\met\biloela.met
    area paddock: text=/>
      micromet: soilalbedo=0.23; a_interception=0.0; b_interception=0.0; c_interception=0.0; d_interception=0.0
      outputfile: filename=B90C3P4.out; title=B90C3P4
        variables
          variables: day, Expcode as Title, Site, Season, Treatment, dd/mm/yyyy as Date, sw_dep, sw_dep(), ll15_dep, AboveGroundWt, GrainLiveWt, RootDepth, StageCodeValue, LeafPhotosynthesisFtValue, LeafPhotosynthesisFvpdValue, LeafFw, LeafLAI, StemLiveWt, LeafLiveWt, PodLiveWt
        events: event=end_day
      operations
        07/03/1990  'soil water' set sw = 0.400 0.420 0.447 0.460
        17/07/1990  chickpea2 sow population = 19.18, Depth= 50, cultivar = amethyst, maxcover=1.0, budNumber=1
        14/09/1990  irrigation apply amount = 100.0
      fertiliser
      irrigation
      manager output titles
        ExpCode = A16P2T8A  # Experimental code
        Site = CP93gat  # experimental site name
        Season = -Y1993  # calander year or years data is from
        Treatment1 = Amethyst  # treatment type
        on start_of_day:
```
Expcode='[ExpCode]'
     Site='[Site]'
     Season='[Season]'
     Treatment='[Treatment1]'
```
      soil: same as B90C3P1.paddock.soil
      surfaceom
        PoolName = unknown  # Organic Matter pool name
        type = wheat  # Organic Matter type
        mass = 0.0  # Initial surface residue (kg/ha)
        cnr = 10.0  # C:N ratio of initial residue
        standing_fraction = 0.0  # Fraction of residue standing
      chickpea2
      manager Harvesting rule
        # Harvesting criteria
        crop = chickpea2  # Enter name of crop to harvest when ripe
        on end_of_day:
        script: same as in APS2CPE.paddock.Harvesting rule
  simulation E89C3P1
    clock: start_date=5/3/1989; end_date=31/12/1989
    summaryfile
    metfile met: filename=%apsim%\Tests\Validation\Chickpea2\met\biloela.met
    area paddock: text=/>
      micromet: soilalbedo=0.23; a_interception=0.0; b_interception=0.0; c_interception=0.0; d_interception=0.0
      outputfile: filename=E89C3P1.out; title=E89C3P1
        variables
          variables: day, Expcode as Title, Site, Season, Treatment, dd/mm/yyyy as Date, sw_dep, sw_dep(), ll15_dep, AboveGroundWt, GrainLiveWt, RootDepth, StageCodeValue, LeafPhotosynthesisFtValue, LeafPhotosynthesisFvpdValue, LeafFw, LeafLAI, StemLiveWt, LeafLiveWt, PodLiveWt
        events: event=end_day
      operations
        06/03/1989  chickpea2 sow population = 13.7, Depth= 50, cultivar = amethyst, maxcover=1.0, budNumber=1
        13/07/1989  irrigation apply amount = 50.0
        17/08/1989  irrigation apply amount = 100.0
        29/10/1989  irrigation apply amount = 100.0
      fertiliser
      irrigation
      manager output titles
        ExpCode = E89C3P1  # Experimental code
        Site = CP89emr  # experimental site name
        Season = -Y1989  # calander year or years data is from
        Treatment1 = amethyst  # treatment type
        on start_of_day:
```
Expcode='[ExpCode]'
     Site='[Site]'
     Season='[Season]'
     Treatment='[Treatment1]'
```
      soil
        Water
          Layer:
            Thickness (mm)  BD (g/cc)  AirDry (mm/mm)  LL15 (mm/mm)  DUL (mm/mm)  SAT (mm/mm)
            150             1.09       0.14            0.28          0.48         0.49
            150             1.27       0.14            0.28          0.467        0.47
            300             1.3        0.14            0.3           0.484        0.49
            300             1.3        0.14            0.3           0.48         0.49
          SoilCrop chickpea2
            Layer:
              Thickness (mm)  LL (mm/mm)  KL (/day)  XF (0-1)
              150             0.28        0.06       1
              150             0.28        0.06       1
              300             0.34        0.04       1
              300             0.34        0.2        1
        SoilWat: SummerCona=2.0; SummerU=6.0; SummerDate=1-Nov; WinterCona=2.0; WinterU=6.0; WinterDate=1-Apr; DiffusConst=40.0; DiffusSlope=16.0; Salb=0.13; Cn2Bare=75; CnRed=20; CnCov=0.8
          Layer:
            Thickness (mm)  SWCON (0-1)
            150             0.1
            150             0.1
            300             0.1
            300             0.1
        SoilOrganicMatter: RootCn=80.0; RootWt=500.0; SoilCn=14.5; EnrACoeff=7.4; EnrBCoeff=0.2
          Layer:
            Thickness (mm)  OC (Total %)  FBiom (0-1)  FInert (0-1)
            150             0.8           0.05         0.39
            150             0.4           0.02         0.47
            300             0.2           0.015        0.52
            300             0.2           0.015        0.52
        Analysis
          Layer:
            Thickness (mm)  PH (1:5 water)
            150             7.5
            150             8
            300             8
            300             8
        Sample Initial nitrogen
          Layer:
            Thickness (mm)  NO3 (ppm)  NH4 (ppm)
            150.0           3.900      0.600
            150.0           1.300      0.100
            300.0           1.500      0.100
            300.0           -          -
        Sample Initial water
          Layer:
            Thickness (mm)  SW (mm/mm)
            150.0           0.480
            150.0           0.460
            300.0           0.480
            300.0           0.480
      surfaceom
        PoolName = unknown  # Organic Matter pool name
        type = wheat  # Organic Matter type
        mass = 0.0  # Initial surface residue (kg/ha)
        cnr = 10.0  # C:N ratio of initial residue
        standing_fraction = 0.0  # Fraction of residue standing
      chickpea2
      manager Harvesting rule
        # Harvesting criteria
        crop = chickpea2  # Enter name of crop to harvest when ripe
        on end_of_day:
        script: same as in APS2CPE.paddock.Harvesting rule
  simulation E89C3P2
    clock: start_date=5/3/1989; end_date=31/12/1989
    summaryfile
    metfile met: filename=%apsim%\Tests\Validation\Chickpea2\met\Emer89.met
    area paddock: text=/>
      micromet: soilalbedo=0.23; a_interception=0.0; b_interception=0.0; c_interception=0.0; d_interception=0.0
      outputfile: filename=E89C3P2.out; title=E89C3P2
        variables
          variables: day, Expcode as Title, Site, Season, Treatment, dd/mm/yyyy as Date, sw_dep, sw_dep(), ll15_dep, AboveGroundWt, GrainLiveWt, RootDepth, StageCodeValue, LeafPhotosynthesisFtValue, LeafPhotosynthesisFvpdValue, LeafFw, LeafLAI, StemLiveWt, LeafLiveWt, PodLiveWt
        events: event=end_day
      operations
        14/04/1989  chickpea2 sow population = 18.6, Depth= 50, cultivar = amethyst, maxcover=1.0, budNumber=1
        13/07/1989  irrigation apply amount = 50.0
        17/08/1989  irrigation apply amount = 100.0
        29/10/1989  irrigation apply amount = 100.0
      fertiliser
      irrigation
      manager output titles
        ExpCode = E89C3P2  # Experimental code
        Site = CP89emr  # experimental site name
        Season = -Y1989  # calander year or years data is from
        Treatment1 = amethyst  # treatment type
        on start_of_day:
```
Expcode='[ExpCode]'
     Site='[Site]'
     Season='[Season]'
     Treatment='[Treatment1]'
```
      soil
        Water
          Layer:
            Thickness (mm)  BD (g/cc)  AirDry (mm/mm)  LL15 (mm/mm)  DUL (mm/mm)  SAT (mm/mm)
            150             1.09       0.14            0.28          0.48         0.49
            150             1.27       0.14            0.28          0.467        0.47
            300             1.3        0.14            0.3           0.484        0.49
            300             8          0.14            0.3           0.48         0.49
          SoilCrop chickpea2
            Layer:
              Thickness (mm)  LL (mm/mm)  KL (/day)  XF (0-1)
              150             0.28        0.06       1
              150             0.28        0.06       1
              300             0.34        0.04       1
              300             0.34        0.02       1
        SoilWat: same as E89C3P1.paddock.soil.SoilWat
        SoilOrganicMatter: same as E89C3P1.paddock.soil.SoilOrganicMatter
        Analysis: same as E89C3P1.paddock.soil.Analysis
        Sample Initial nitrogen: same as E89C3P1.paddock.soil.Initial nitrogen
        Sample Initial water
          Layer:
            Thickness (mm)  SW (mm/mm)
            150.0           0.480
            150.0           0.460
            300.0           0.480
            300.0           0.480
      surfaceom
        PoolName = unknown  # Organic Matter pool name
        type = wheat  # Organic Matter type
        mass = 0.0  # Initial surface residue (kg/ha)
        cnr = 10.0  # C:N ratio of initial residue
        standing_fraction = 0.0  # Fraction of residue standing
      chickpea2
      manager Harvesting rule
        # Harvesting criteria
        crop = chickpea2  # Enter name of crop to harvest when ripe
        on end_of_day:
        script: same as in APS2CPE.paddock.Harvesting rule
  simulation E89C3P3
    clock: start_date=5/3/1989; end_date=31/12/1989
    summaryfile
    metfile met: filename=%apsim%\Tests\Validation\Chickpea2\met\Emer89.met
    area paddock: text=/>
      micromet: soilalbedo=0.23; a_interception=0.0; b_interception=0.0; c_interception=0.0; d_interception=0.0
      outputfile: filename=E89C3P3.out; title=E89C3P3
        variables
          variables: day, Expcode as Title, Site, Season, Treatment, dd/mm/yyyy as Date, sw_dep, sw_dep(), ll15_dep, AboveGroundWt, GrainLiveWt, RootDepth, StageCodeValue, LeafPhotosynthesisFtValue, LeafPhotosynthesisFvpdValue, LeafFw, LeafLAI, StemLiveWt, LeafLiveWt, PodLiveWt
        events: event=end_day
      operations
        03/05/1989  chickpea2 sow population = 18.7, Depth= 50, cultivar = amethyst, maxcover=1.0, budNumber=1
        13/07/1989  irrigation apply amount = 50.0
        17/08/1989  irrigation apply amount = 100.0
        29/10/1989  irrigation apply amount = 100.0
      fertiliser
      irrigation
      manager output titles
        ExpCode = E89C3P3  # Experimental code
        Site = CP89emr  # experimental site name
        Season = -Y1989  # calander year or years data is from
        Treatment1 = amethyst  # treatment type
        on start_of_day:
```
Expcode='[ExpCode]'
     Site='[Site]'
     Season='[Season]'
     Treatment='[Treatment1]'
```
      surfaceom
        PoolName = unknown  # Organic Matter pool name
        type = wheat  # Organic Matter type
        mass = 0.0  # Initial surface residue (kg/ha)
        cnr = 10.0  # C:N ratio of initial residue
        standing_fraction = 0.0  # Fraction of residue standing
      chickpea2
      manager Harvesting rule
        # Harvesting criteria
        crop = chickpea2  # Enter name of crop to harvest when ripe
        on end_of_day:
        script: same as in APS2CPE.paddock.Harvesting rule
      soil: same as E89C3P2.paddock.soil
  simulation E89C3P4
    clock: start_date=5/3/1989; end_date=31/12/1989
    summaryfile
    metfile met: filename=%apsim%\Tests\Validation\Chickpea2\met\Emer89.met
    area paddock: text=/>
      micromet: soilalbedo=0.23; a_interception=0.0; b_interception=0.0; c_interception=0.0; d_interception=0.0
      outputfile: filename=E89C3P4.out; title=E89C3P4
        variables
          variables: day, Expcode as Title, Site, Season, Treatment, dd/mm/yyyy as Date, sw_dep, sw_dep(), ll15_dep, AboveGroundWt, GrainLiveWt, RootDepth, StageCodeValue, LeafPhotosynthesisFtValue, LeafPhotosynthesisFvpdValue, LeafFw, LeafLAI, StemLiveWt, LeafLiveWt, PodLiveWt
        events: event=end_day
      operations
        19/07/1989  chickpea2 sow population = 18.8, Depth= 50, cultivar = amethyst, maxcover=1.0, budNumber=1
        13/07/1989  irrigation apply amount = 50.0
        17/08/1989  irrigation apply amount = 100.0
        29/10/1989  irrigation apply amount = 100.0
      fertiliser
      irrigation
      manager output titles
        ExpCode = E89C3P4  # Experimental code
        Site = CP89emr  # experimental site name
        Season = -Y1989  # calander year or years data is from
        Treatment1 = amethyst  # treatment type
        on start_of_day:
```
Expcode='[ExpCode]'
     Site='[Site]'
     Season='[Season]'
     Treatment='[Treatment1]'
```
      surfaceom
        PoolName = unknown  # Organic Matter pool name
        type = wheat  # Organic Matter type
        mass = 0.0  # Initial surface residue (kg/ha)
        cnr = 10.0  # C:N ratio of initial residue
        standing_fraction = 0.0  # Fraction of residue standing
      chickpea2
      manager Harvesting rule
        # Harvesting criteria
        crop = chickpea2  # Enter name of crop to harvest when ripe
        on end_of_day:
        script: same as in APS2CPE.paddock.Harvesting rule
      soil: same as E89C3P2.paddock.soil
  simulation GE90C3
    clock: start_date=20/5/1990; end_date=31/12/1990
    summaryfile
    metfile met: filename=%apsim%\Tests\Validation\Chickpea2\met\cooper.met
    area paddock: text=/>
      micromet: soilalbedo=0.23; a_interception=0.0; b_interception=0.0; c_interception=0.0; d_interception=0.0
      outputfile: filename=GE90C3.out; title=GE90C3
        variables
          variables: day, Expcode as Title, Site, Season, Treatment, dd/mm/yyyy as Date, sw_dep, sw_dep(), ll15_dep, AboveGroundWt, GrainLiveWt, RootDepth, StageCodeValue, LeafPhotosynthesisFtValue, LeafPhotosynthesisFvpdValue, LeafFw, LeafLAI, StemLiveWt, LeafLiveWt, PodLiveWt
        events: event=end_day
      operations
        21/05/1990  'soil water' set sw = 0.413 0.454 0.495 0.495 0.418 0.406 0.385
        21/05/1990  chickpea2 sow population = 33.4, Depth= 50, cultivar = amethyst, maxcover=1.0, budNumber=1
        29/07/1990  irrigation apply amount = 100.0
        28/08/1990  irrigation apply amount = 100.0
        27/09/1990  irrigation apply amount = 100.0
      fertiliser
      irrigation
      manager output titles
        ExpCode = GE90C3  # Experimental code
        Site = CP90gat  # experimental site name
        Season = -Y1990  # calander year or years data is from
        Treatment1 = amethyst  # treatment type
        on start_of_day:
```
Expcode='[ExpCode]'
     Site='[Site]'
     Season='[Season]'
     Treatment='[Treatment1]'
```
      soil
        Water: same as A16P2T2A.paddock.soil.Water
        SoilWat: same as A16P2T1A.paddock.soil.SoilWat
        SoilOrganicMatter: same as A16P2T1A.paddock.soil.SoilOrganicMatter
        Analysis: same as A16P2T1A.paddock.soil.Analysis
        Sample Initial nitrogen: same as A16P2T1A.paddock.soil.Initial nitrogen
        Sample Initial water
          Layer:
            Thickness (mm)  SW (mm/mm)
            150.0           0.413
            150.0           0.456
            300.0           0.408
            300.0           0.374
            300.0           0.327
            300.0           0.325
            300.0           0.371
      surfaceom
        PoolName = unknown  # Organic Matter pool name
        type = wheat  # Organic Matter type
        mass = 0.0  # Initial surface residue (kg/ha)
        cnr = 10.0  # C:N ratio of initial residue
        standing_fraction = 0.0  # Fraction of residue standing
      chickpea2
      manager Harvesting rule
        # Harvesting criteria
        crop = chickpea2  # Enter name of crop to harvest when ripe
        on end_of_day:
        script: same as in APS2CPE.paddock.Harvesting rule
  simulation GL90C3
    clock: start_date=20/5/1990; end_date=31/12/1990
    summaryfile
    metfile met: filename=%apsim%\Tests\Validation\Chickpea2\met\cooper.met
    area paddock: text=/>
      micromet: soilalbedo=0.23; a_interception=0.0; b_interception=0.0; c_interception=0.0; d_interception=0.0
      outputfile: filename=GL90C3.out; title=GL90C3
        variables
          variables: day, Expcode as Title, Site, Season, Treatment, dd/mm/yyyy as Date, sw_dep, sw_dep(), ll15_dep, AboveGroundWt, GrainLiveWt, RootDepth, StageCodeValue, LeafPhotosynthesisFtValue, LeafPhotosynthesisFvpdValue, LeafFw, LeafLAI, StemLiveWt, LeafLiveWt, PodLiveWt
        events: event=end_day
      operations
        21/05/1990  'soil water' set sw = 0.413 0.454 0.495 0.495 0.418 0.406 0.385
        07/08/1990  chickpea2 sow population = 43.0, Depth= 50, cultivar = amethyst, maxcover=1.0, budNumber=1
        17/09/1990  irrigation apply amount = 100.0
        07/10/1990  irrigation apply amount = 100.0
        27/10/1990  irrigation apply amount = 100.0
        16/11/1990  irrigation apply amount = 100.0
        26/11/1990  irrigation apply amount = 100.0
      fertiliser
      irrigation
      manager output titles
        ExpCode = GL90C3  # Experimental code
        Site = CP90gat  # experimental site name
        Season = -Y1990  # calander year or years data is from
        Treatment1 = amethyst  # treatment type
        on start_of_day:
```
Expcode='[ExpCode]'
     Site='[Site]'
     Season='[Season]'
     Treatment='[Treatment1]'
```
      soil: same as GE90C3.paddock.soil
      surfaceom
        PoolName = unknown  # Organic Matter pool name
        type = wheat  # Organic Matter type
        mass = 0.0  # Initial surface residue (kg/ha)
        cnr = 10.0  # C:N ratio of initial residue
        standing_fraction = 0.0  # Fraction of residue standing
      chickpea2
      manager Harvesting rule
        # Harvesting criteria
        crop = chickpea2  # Enter name of crop to harvest when ripe
        on end_of_day:
        script: same as in APS2CPE.paddock.Harvesting rule
  simulation HL90C3
    clock: start_date=18/8/1990; end_date=19/12/1990
    summaryfile
    metfile met: filename=%apsim%\Tests\Validation\Chickpea2\met\cooper.met
    area paddock: text=/>
      micromet: soilalbedo=0.23; a_interception=0.0; b_interception=0.0; c_interception=0.0; d_interception=0.0
      outputfile: filename=HL90C3.out; title=HL90C3
        variables
          variables: day, Expcode as Title, Site, Season, Treatment, dd/mm/yyyy as Date, sw_dep, sw_dep(), ll15_dep, AboveGroundWt, GrainLiveWt, RootDepth, StageCodeValue, LeafPhotosynthesisFtValue, LeafPhotosynthesisFvpdValue, LeafFw, LeafLAI, StemLiveWt, LeafLiveWt, PodLiveWt
        events: event=end_day
      operations
        20/08/1990  chickpea2 sow population = 36.7, Depth= 50, cultivar = amethyst, maxcover=1.0, budNumber=1
        28/09/1990  irrigation apply amount = 40.0
      fertiliser
      irrigation
      manager output titles
        ExpCode = HL90C3  # Experimental code
        Site = CP90Her  # experimental site name
        Season = -Y1990  # calander year or years data is from
        Treatment1 = amethyst  # treatment type
        on start_of_day:
```
Expcode='[ExpCode]'
     Site='[Site]'
     Season='[Season]'
     Treatment='[Treatment1]'
```
      soil
        InitWater Initial water
          PercentMethod: Percent=0.80; Distributed=Evenly distributed
        Water
          Layer:
            Thickness (mm)  BD (g/cc)  AirDry (mm/mm)  LL15 (mm/mm)  DUL (mm/mm)  SAT (mm/mm)
            150.0           1.030      0.100           0.200         0.380        0.450
            150.0           1.060      0.200           0.200         0.380        0.450
            300.0           1.060      0.200           0.200         0.380        0.450
            300.0           1.080      0.210           0.210         0.380        0.430
            300.0           1.110      0.230           0.230         0.380        0.430
            300.0           1.140      0.250           0.250         0.380        0.430
            300.0           1.140      0.280           0.280         0.350        0.400
          SoilCrop chickpea2
            Layer:
              Thickness (mm)  LL (mm/mm)  KL (/day)  XF (0-1)
              150.0           0.200       0.06       1.00
              150.0           0.200       0.06       1.00
              300.0           0.200       0.06       1.00
              300.0           0.220       0.05       1.00
              300.0           0.250       0.04       1.00
              300.0           0.260       0.02       1.00
              300.0           0.280       0.02       1.00
        SoilWat: SummerCona=2.0; SummerU=6.0; SummerDate=1-Nov; WinterCona=2.0; WinterU=6.0; WinterDate=1-Apr; DiffusConst=40.0; DiffusSlope=16.0; Salb=0.13; Cn2Bare=82; CnRed=20.0; CnCov=0.8
          Layer:
            Thickness (mm)  SWCON (0-1)
            150.0           0.400
            150.0           0.400
            300.0           0.400
            300.0           0.400
            300.0           0.400
            300.0           0.400
            300.0           0.400
        SoilOrganicMatter: RootCn=80.0; RootWt=500.0; SoilCn=14.5; EnrACoeff=7.4; EnrBCoeff=0.2
          Layer:
            Thickness (mm)  OC (Total %)  FBiom (0-1)  FInert (0-1)
            150.0           2.20          0.02         0.36
            150.0           1.60          0.015        0.50
            300.0           1.35          0.01         0.59
            300.0           0.95          0.01         0.84
            300.0           1.00          0.01         0.80
            300.0           0.80          0.01         0.99
            300.0           0.80          0.01         0.99
        Analysis
          Layer:
            Thickness (mm)  PH (1:5 water)
            150.0           8.25
            150.0           8.50
            300.0           8.75
            300.0           9.00
            300.0           9.00
            300.0           9.00
            300.0           9.00
        Sample Initial nitrogen
          Layer:
            Thickness (mm)  NO3 (ppm)  NH4 (ppm)
            150.0           14.4       4.80
            150.0           6.58       4.20
            300.0           2.45       3.90
            300.0           1.08       3.90
            300.0           0.15       3.80
            300.0           0.83       4.10
            300.0           0.83       4.10
      surfaceom
        PoolName = unknown  # Organic Matter pool name
        type = wheat  # Organic Matter type
        mass = 0.0  # Initial surface residue (kg/ha)
        cnr = 10.0  # C:N ratio of initial residue
        standing_fraction = 0.0  # Fraction of residue standing
      chickpea2
      manager Harvesting rule
        # Harvesting criteria
        crop = chickpea2  # Enter name of crop to harvest when ripe
        on end_of_day:
        script: same as in APS2CPE.paddock.Harvesting rule
  simulation HE90C3
    clock: start_date=14/6/1990; end_date=16/12/1990
    summaryfile
    metfile met: filename=%apsim%\Tests\Validation\Chickpea2\met\Herm90.met
    area paddock: text=/>
      micromet: soilalbedo=0.23; a_interception=0.0; b_interception=0.0; c_interception=0.0; d_interception=0.0
      outputfile: filename=HE90C3.out; title=HE90C3
        variables
          variables: day, Expcode as Title, Site, Season, Treatment, dd/mm/yyyy as Date, sw_dep, sw_dep(), ll15_dep, AboveGroundWt, GrainLiveWt, RootDepth, StageCodeValue, LeafPhotosynthesisFtValue, LeafPhotosynthesisFvpdValue, LeafFw, LeafLAI, StemLiveWt, LeafLiveWt, PodLiveWt
        events: event=end_day
      operations
        15/06/1990  chickpea2 sow population = 45.4, Depth= 50, cultivar = amethyst, maxcover=1.0, budNumber=1
        28/09/1990  irrigation apply amount = 40.0
      fertiliser
      irrigation
      manager output titles
        ExpCode = HE90C3  # Experimental code
        Site = CP90Her  # experimental site name
        Season = -Y1990  # calander year or years data is from
        Treatment1 = amethyst  # treatment type
        on start_of_day:
```
Expcode='[ExpCode]'
     Site='[Site]'
     Season='[Season]'
     Treatment='[Treatment1]'
```
      soil
        Water: same as HL90C3.paddock.soil.Water
        SoilWat: same as HL90C3.paddock.soil.SoilWat
        SoilOrganicMatter: same as HL90C3.paddock.soil.SoilOrganicMatter
        Analysis: same as HL90C3.paddock.soil.Analysis
        Sample Initial nitrogen: same as HL90C3.paddock.soil.Initial nitrogen
        Sample Initial water
          Layer:
            Thickness (mm)  SW (mm/mm)
            150.0           0.413
            150.0           0.456
            300.0           0.408
            300.0           0.374
            300.0           0.340
            300.0           0.370
            300.0           0.370
      surfaceom
        PoolName = unknown  # Organic Matter pool name
        type = wheat  # Organic Matter type
        mass = 0.0  # Initial surface residue (kg/ha)
        cnr = 10.0  # C:N ratio of initial residue
        standing_fraction = 0.0  # Fraction of residue standing
      chickpea2
      manager Harvesting rule
        # Harvesting criteria
        crop = chickpea2  # Enter name of crop to harvest when ripe
        on end_of_day:
        script: same as in APS2CPE.paddock.Harvesting rule
  simulation H88C3P1
    clock: start_date=22/5/1988; end_date=30/12/1988
    summaryfile
    metfile met: filename=%apsim%\Tests\Validation\Chickpea2\met\Herm8889.met
    area paddock: text=/>
      micromet: soilalbedo=0.23; a_interception=0.0; b_interception=0.0; c_interception=0.0; d_interception=0.0
      outputfile: filename=H88C3P1.out; title=H88C3P1
        variables
          variables: day, Expcode as Title, Site, Season, Treatment, dd/mm/yyyy as Date, sw_dep, sw_dep(), ll15_dep, AboveGroundWt, GrainLiveWt, RootDepth, StageCodeValue, LeafPhotosynthesisFtValue, LeafPhotosynthesisFvpdValue, LeafFw, LeafLAI, StemLiveWt, LeafLiveWt, PodLiveWt
        events: event=end_day
      operations
        23/05/1988  'soil water' set sw = 0.300 0.300 0.300 0.310 0.540 0.370 0.370
        23/05/1988  chickpea2 sow population = 67.2, Depth= 50, cultivar = amethyst, maxcover=1.0, budNumber=1
        4/10/1988  irrigation apply amount = 50.0
      fertiliser
      irrigation
      manager output titles
        ExpCode = H88C3P1  # Experimental code
        Site = CP88Her  # experimental site name
        Season = -Y1988  # calander year or years data is from
        Treatment1 = amethyst  # treatment type
        on start_of_day:
```
Expcode='[ExpCode]'
     Site='[Site]'
     Season='[Season]'
     Treatment='[Treatment1]'
```
      soil: same as HL90C3.paddock.soil
      surfaceom
        PoolName = unknown  # Organic Matter pool name
        type = wheat  # Organic Matter type
        mass = 0.0  # Initial surface residue (kg/ha)
        cnr = 10.0  # C:N ratio of initial residue
        standing_fraction = 0.0  # Fraction of residue standing
      chickpea2
      manager Harvesting rule
        # Harvesting criteria
        crop = chickpea2  # Enter name of crop to harvest when ripe
        on end_of_day:
        script: same as in APS2CPE.paddock.Harvesting rule
  simulation H88C3P2
    clock: start_date=22/5/1988; end_date=30/12/1988
    summaryfile
    metfile met: filename=%apsim%\Tests\Validation\Chickpea2\met\Herm8889.met
    area paddock: text=/>
      micromet: soilalbedo=0.23; a_interception=0.0; b_interception=0.0; c_interception=0.0; d_interception=0.0
      outputfile: filename=H88C3P2.out; title=H88C3P2
        variables
          variables: day, Expcode as Title, Site, Season, Treatment, dd/mm/yyyy as Date, sw_dep, sw_dep(), ll15_dep, AboveGroundWt, GrainLiveWt, RootDepth, StageCodeValue, LeafPhotosynthesisFtValue, LeafPhotosynthesisFvpdValue, LeafFw, LeafLAI, StemLiveWt, LeafLiveWt, PodLiveWt
        events: event=end_day
      operations
        23/05/1988  'soil water' set sw = 0.300 0.300 0.300 0.510 0.540 0.370 0.370
        23/06/1988  'soil water' set sw = 0.225 0.311 0.326 0.289 0.278 0.288 0.288
        23/06/1988  chickpea2 sow population = 49.9, Depth= 50, cultivar = amethyst, maxcover=1.0, budNumber=1
        30/06/1988  'soil water' set sw = 0.225 0.311 0.326 0.289 0.278 0.288 0.288
        4/10/1988  irrigation apply amount = 50.0
        24/10/1988  irrigation apply amount = 50.0
      fertiliser
      irrigation
      manager output titles
        ExpCode = H88C3P2  # Experimental code
        Site = CP88Her  # experimental site name
        Season = -Y1988  # calander year or years data is from
        Treatment1 = amethyst  # treatment type
        on start_of_day:
```
Expcode='[ExpCode]'
     Site='[Site]'
     Season='[Season]'
     Treatment='[Treatment1]'
```
      soil: same as HL90C3.paddock.soil
      surfaceom
        PoolName = unknown  # Organic Matter pool name
        type = wheat  # Organic Matter type
        mass = 0.0  # Initial surface residue (kg/ha)
        cnr = 10.0  # C:N ratio of initial residue
        standing_fraction = 0.0  # Fraction of residue standing
      chickpea2
      manager Harvesting rule
        # Harvesting criteria
        crop = chickpea2  # Enter name of crop to harvest when ripe
        on end_of_day:
        script: same as in APS2CPE.paddock.Harvesting rule
  simulation H88C3P3
    clock: start_date=22/5/1988; end_date=30/12/1988
    summaryfile
    metfile met: filename=%apsim%\Tests\Validation\Chickpea2\met\Herm8889.met
    area paddock: text=/>
      micromet: soilalbedo=0.23; a_interception=0.0; b_interception=0.0; c_interception=0.0; d_interception=0.0
      outputfile: filename=H88C3P3.out; title=H88C3P3
        variables
          variables: day, Expcode as Title, Site, Season, Treatment, dd/mm/yyyy as Date, sw_dep, sw_dep(), ll15_dep, AboveGroundWt, GrainLiveWt, RootDepth, StageCodeValue, LeafPhotosynthesisFtValue, LeafPhotosynthesisFvpdValue, LeafFw, LeafLAI, StemLiveWt, LeafLiveWt, PodLiveWt
        events: event=end_day
      operations
        23/05/1988  'soil water' set sw = 0.300 0.300 0.300 0.510 0.540 0.370 0.370
        28/07/1988  'soil water' set sw = 0.226 0.262 0.260 0.260 0.25 0.251 0.288
        28/07/1988  chickpea2 sow population = 49.9, Depth= 50, cultivar = amethyst, maxcover=1.0, budNumber=1
        1/08/1988  'soil water' set sw = 0.226 0.262 0.260 0.260 0.25 0.251 0.288
        16/10/1988  irrigation apply amount = 50.0
        24/10/1988  irrigation apply amount = 50.0
      fertiliser
      irrigation
      manager output titles
        ExpCode = H88C3P3  # Experimental code
        Site = CP88Her  # experimental site name
        Season = -Y1988  # calander year or years data is from
        Treatment1 = amethyst  # treatment type
        on start_of_day:
```
Expcode='[ExpCode]'
     Site='[Site]'
     Season='[Season]'
     Treatment='[Treatment1]'
```
      soil
        InitWater Initial water
          PercentMethod: Percent=0.80; Distributed=Evenly distributed
        Water: same as HL90C3.paddock.soil.Water
        SoilWat: SummerCona=2; SummerU=4; SummerDate=1-Nov; WinterCona=2; WinterU=4; WinterDate=1-Apr; DiffusConst=40; DiffusSlope=16; Salb=0.13; Cn2Bare=82; CnRed=20; CnCov=0.8
          Layer:
            Thickness (mm)  SWCON (0-1)
            150.0           0.400
            150.0           0.400
            300.0           0.400
            300.0           0.400
            300.0           0.400
            300.0           0.400
            300.0           0.400
        SoilOrganicMatter: RootCn=80; RootWt=500; SoilCn=14.5; EnrACoeff=7.4; EnrBCoeff=0.2
          Layer:
            Thickness (mm)  OC (Total %)  FBiom (0-1)  FInert (0-1)
            150.0           2.20          0.02         0.36
            150.0           1.60          0.015        0.50
            300.0           1.35          0.01         0.59
            300.0           0.95          0.01         0.84
            300.0           1.00          0.01         0.80
            300.0           0.80          0.01         0.99
            300.0           0.80          0.01         0.99
        Analysis: same as HL90C3.paddock.soil.Analysis
        Sample Initial nitrogen: same as HL90C3.paddock.soil.Initial nitrogen
      surfaceom
        PoolName = unknown  # Organic Matter pool name
        type = wheat  # Organic Matter type
        mass = 0.0  # Initial surface residue (kg/ha)
        cnr = 10.0  # C:N ratio of initial residue
        standing_fraction = 0.0  # Fraction of residue standing
      chickpea2
      manager Harvesting rule
        # Harvesting criteria
        crop = chickpea2  # Enter name of crop to harvest when ripe
        on end_of_day:
        script: same as in APS2CPE.paddock.Harvesting rule
  simulation H88C3P4
    clock: start_date=22/5/1988; end_date=19/2/1989
    summaryfile
    metfile met: filename=%apsim%\Tests\Validation\Chickpea2\met\Herm8889.met
    area paddock: text=/>
      micromet: soilalbedo=0.23; a_interception=0.0; b_interception=0.0; c_interception=0.0; d_interception=0.0
      outputfile: filename=H88C3P4.out; title=H88C3P4
        variables
          variables: day, Expcode as Title, Site, Season, Treatment, dd/mm/yyyy as Date, sw_dep, sw_dep(), ll15_dep, AboveGroundWt, GrainLiveWt, RootDepth, StageCodeValue, LeafPhotosynthesisFtValue, LeafPhotosynthesisFvpdValue, LeafFw, LeafLAI, StemLiveWt, LeafLiveWt, PodLiveWt
        events: event=end_day
      operations
        23/05/1988  'soil water' set sw = 0.300 0.300 0.300 0.510 0.540 0.370 0.370
        05/09/1988  chickpea2 sow population = 48.5, Depth= 50, cultivar = amethyst, maxcover=1.0, budNumber=1
        24/10/1988  irrigation apply amount = 50.0
        17/11/1988  irrigation apply amount = 35.0
        01/12/1988  irrigation apply amount = 42.0
      fertiliser
      irrigation
      manager output titles
        ExpCode = H88C3P4  # Experimental code
        Site = CP88Her  # experimental site name
        Season = -Y1988  # calander year or years data is from
        Treatment1 = amethyst  # treatment type
        on start_of_day:
```
Expcode='[ExpCode]'
     Site='[Site]'
     Season='[Season]'
     Treatment='[Treatment1]'
```
      soil: same as HL90C3.paddock.soil
      surfaceom
        PoolName = unknown  # Organic Matter pool name
        type = wheat  # Organic Matter type
        mass = 0.0  # Initial surface residue (kg/ha)
        cnr = 10.0  # C:N ratio of initial residue
        standing_fraction = 0.0  # Fraction of residue standing
      chickpea2
      manager Harvesting rule
        # Harvesting criteria
        crop = chickpea2  # Enter name of crop to harvest when ripe
        on end_of_day:
        script: same as in APS2CPE.paddock.Harvesting rule
  simulation H88C3P5
    clock: start_date=22/5/1988; end_date=19/7/1989
    summaryfile
    metfile met: filename=%apsim%\Tests\Validation\Chickpea2\met\Herm8889.met
    area paddock: text=/>
      micromet: soilalbedo=0.23; a_interception=0.0; b_interception=0.0; c_interception=0.0; d_interception=0.0
      outputfile: filename=H88C3P5.out; title=H88C3P5
        variables
          variables: day, Expcode as Title, Site, Season, Treatment, dd/mm/yyyy as Date, sw_dep, sw_dep(), ll15_dep, AboveGroundWt, GrainLiveWt, RootDepth, StageCodeValue, LeafPhotosynthesisFtValue, LeafPhotosynthesisFvpdValue, LeafFw, LeafLAI, StemLiveWt, LeafLiveWt, PodLiveWt
        events: event=end_day
      operations
        23/05/1988  'soil water' set sw = 0.300 0.300 0.300 0.510 0.540 0.370 0.370
        20/10/1988  chickpea2 sow population = 46.6, Depth= 50, cultivar = amethyst, maxcover=1.0, budNumber=1
        24/10/1988  irrigation apply amount = 50.0
      fertiliser
      irrigation
      manager output titles
        ExpCode = H88C3P5  # Experimental code
        Site = CP88Her  # experimental site name
        Season = -Y1988  # calander year or years data is from
        Treatment1 = amethyst  # treatment type
        on start_of_day:
```
Expcode='[ExpCode]'
     Site='[Site]'
     Season='[Season]'
     Treatment='[Treatment1]'
```
      soil: same as HL90C3.paddock.soil
      surfaceom
        PoolName = unknown  # Organic Matter pool name
        type = wheat  # Organic Matter type
        mass = 0.0  # Initial surface residue (kg/ha)
        cnr = 10.0  # C:N ratio of initial residue
        standing_fraction = 0.0  # Fraction of residue standing
      chickpea2
      manager Harvesting rule
        # Harvesting criteria
        crop = chickpea2  # Enter name of crop to harvest when ripe
        on end_of_day:
        script: same as in APS2CPE.paddock.Harvesting rule
  simulation H88C3P6
    clock: start_date=22/5/1988; end_date=19/7/1989
    summaryfile
    metfile met: filename=%apsim%\Tests\Validation\Chickpea2\met\Herm8889.met
    area paddock: text=/>
      micromet: soilalbedo=0.23; a_interception=0.0; b_interception=0.0; c_interception=0.0; d_interception=0.0
      outputfile: filename=H88C3P6.out; title=H88C3P6
        variables
          variables: day, Expcode as Title, Site, Season, Treatment, dd/mm/yyyy as Date, sw_dep, sw_dep(), ll15_dep, AboveGroundWt, GrainLiveWt, RootDepth, StageCodeValue, LeafPhotosynthesisFtValue, LeafPhotosynthesisFvpdValue, LeafFw, LeafLAI, StemLiveWt, LeafLiveWt, PodLiveWt
        events: event=end_day
      operations
        23/05/1988  'soil water' set sw = 0.300 0.300 0.300 0.510 0.540 0.370 0.370
        15/12/1988  chickpea2 sow population = 38.5, Depth= 50, cultivar = amethyst, maxcover=1.0, budNumber=1
        23/02/1989  irrigation apply amount = 50.0
      fertiliser
      irrigation
      manager output titles
        ExpCode = H88C3P6  # Experimental code
        Site = CP88Her  # experimental site name
        Season = -Y1988  # calander year or years data is from
        Treatment1 = Amethyst  # treatment type
        on start_of_day:
```
Expcode='[ExpCode]'
     Site='[Site]'
     Season='[Season]'
     Treatment='[Treatment1]'
```
      soil: same as HL90C3.paddock.soil
      surfaceom
        PoolName = unknown  # Organic Matter pool name
        type = wheat  # Organic Matter type
        mass = 0.0  # Initial surface residue (kg/ha)
        cnr = 10.0  # C:N ratio of initial residue
        standing_fraction = 0.0  # Fraction of residue standing
      chickpea2
      manager Harvesting rule
        # Harvesting criteria
        crop = chickpea2  # Enter name of crop to harvest when ripe
        on end_of_day:
        script: same as in APS2CPE.paddock.Harvesting rule
  simulation H89C3P1
    clock: start_date=13/2/1989; end_date=31/12/1989
    summaryfile
    metfile met: filename=%apsim%\Tests\Validation\Chickpea2\met\Herm8889.met
    area paddock: text=/>
      micromet: soilalbedo=0.23; a_interception=0.0; b_interception=0.0; c_interception=0.0; d_interception=0.0
      outputfile: filename=H89C3P1.out; title=H89C3P1
        variables
          variables: day, Expcode as Title, Site, Season, Treatment, dd/mm/yyyy as Date, sw_dep, sw_dep(), ll15_dep, AboveGroundWt, GrainLiveWt, RootDepth, StageCodeValue, LeafPhotosynthesisFtValue, LeafPhotosynthesisFvpdValue, LeafFw, LeafLAI, StemLiveWt, LeafLiveWt, PodLiveWt
        events: event=end_day
      operations
        13/02/1989  'soil water' set sw = 0.500 0.300 0.300 0.310 0.340 0.370 0.370
        13/02/1989  chickpea2 sow population = 29.6, Depth= 50, cultivar = amethyst, maxcover=1.0, budNumber=1
      fertiliser
      irrigation
      manager output titles
        ExpCode = H89C3P1  # Experimental code
        Site = CP89emr  # experimental site name
        Season = -Y1989  # calander year or years data is from
        Treatment1 = Amethyst  # treatment type
        on start_of_day:
```
Expcode='[ExpCode]'
     Site='[Site]'
     Season='[Season]'
     Treatment='[Treatment1]'
```
      soil: same as HL90C3.paddock.soil
      surfaceom
        PoolName = unknown  # Organic Matter pool name
        type = wheat  # Organic Matter type
        mass = 0.0  # Initial surface residue (kg/ha)
        cnr = 10.0  # C:N ratio of initial residue
        standing_fraction = 0.0  # Fraction of residue standing
      chickpea2
      manager Harvesting rule
        # Harvesting criteria
        crop = chickpea2  # Enter name of crop to harvest when ripe
        on end_of_day:
        script: same as in APS2CPE.paddock.Harvesting rule
  simulation H89C3P2
    clock: start_date=24/4/1989; end_date=31/12/1989
    summaryfile
    metfile met: filename=%apsim%\Tests\Validation\Chickpea2\met\Herm8889.met
    area paddock: text=/>
      micromet: soilalbedo=0.23; a_interception=0.0; b_interception=0.0; c_interception=0.0; d_interception=0.0
      outputfile: filename=H89C3P2.out; title=H89C3P2
        variables
          variables: day, Expcode as Title, Site, Season, Treatment, dd/mm/yyyy as Date, sw_dep, sw_dep(), ll15_dep, AboveGroundWt, GrainLiveWt, RootDepth, StageCodeValue, LeafPhotosynthesisFtValue, LeafPhotosynthesisFvpdValue, LeafFw, LeafLAI, StemLiveWt, LeafLiveWt, PodLiveWt
        events: event=end_day
      operations
        13/02/1989  'soil water' set sw = 0.561 0.548 0.548 0.540 0.527 0.370 0.370
        24/04/1989  chickpea2 sow population = 29.2, Depth= 50, cultivar = amethyst, maxcover=1.0, budNumber=1
        08/09/1989  irrigation apply amount = 30.0
        26/09/1989  irrigation apply amount = 45.0
        10/10/1989  irrigation apply amount = 45.0
      fertiliser
      irrigation
      manager output titles
        ExpCode = H89C3P2  # Experimental code
        Site = CP89HER  # experimental site name
        Season = -Y1989  # calander year or years data is from
        Treatment1 = Amethyst  # treatment type
        on start_of_day:
```
Expcode='[ExpCode]'
     Site='[Site]'
     Season='[Season]'
     Treatment='[Treatment1]'
```
      soil: same as HL90C3.paddock.soil
      surfaceom
        PoolName = unknown  # Organic Matter pool name
        type = wheat  # Organic Matter type
        mass = 0.0  # Initial surface residue (kg/ha)
        cnr = 10.0  # C:N ratio of initial residue
        standing_fraction = 0.0  # Fraction of residue standing
      chickpea2
      manager Harvesting rule
        # Harvesting criteria
        crop = chickpea2  # Enter name of crop to harvest when ripe
        on end_of_day:
        script: same as in APS2CPE.paddock.Harvesting rule
  simulation H89C3P3
    clock: start_date=15/5/1989; end_date=31/12/1989
    summaryfile
    metfile met: filename=%apsim%\Tests\Validation\Chickpea2\met\Herm8889.met
    area paddock: text=/>
      micromet: soilalbedo=0.23; a_interception=0.0; b_interception=0.0; c_interception=0.0; d_interception=0.0
      outputfile: filename=H89C3P3.out; title=H89C3P3
        variables
          variables: day, Expcode as Title, Site, Season, Treatment, dd/mm/yyyy as Date, sw_dep, sw_dep(), ll15_dep, AboveGroundWt, GrainLiveWt, RootDepth, StageCodeValue, LeafPhotosynthesisFtValue, LeafPhotosynthesisFvpdValue, LeafFw, LeafLAI, StemLiveWt, LeafLiveWt, PodLiveWt
        events: event=end_day
      operations
        13/02/1989  'soil water' set sw = 0.561 0.548 0.548 0.540 0.527 0.370 0.370
        15/05/1989  chickpea2 sow population = 28.1, Depth= 50, cultivar = amethyst, maxcover=1.0, budNumber=1
        8/09/1989  irrigation apply amount = 30.0
        26/09/1989  irrigation apply amount = 45.0
        10/10/1989  irrigation apply amount = 45.0
      fertiliser
      irrigation
      manager output titles
        ExpCode = H89C3P3  # Experimental code
        Site = CP89HER  # experimental site name
        Season = -Y1989  # calander year or years data is from
        Treatment1 = Amethyst  # treatment type
        on start_of_day:
```
Expcode='[ExpCode]'
     Site='[Site]'
     Season='[Season]'
     Treatment='[Treatment1]'
```
      soil: same as HL90C3.paddock.soil
      surfaceom
        PoolName = unknown  # Organic Matter pool name
        type = wheat  # Organic Matter type
        mass = 0.0  # Initial surface residue (kg/ha)
        cnr = 10.0  # C:N ratio of initial residue
        standing_fraction = 0.0  # Fraction of residue standing
      chickpea2
      manager Harvesting rule
        # Harvesting criteria
        crop = chickpea2  # Enter name of crop to harvest when ripe
        on end_of_day:
        script: same as in APS2CPE.paddock.Harvesting rule
  simulation H89C3P4
    clock: start_date=19/6/1989; end_date=31/12/1989
    summaryfile
    metfile met: filename=%apsim%\Tests\Validation\Chickpea2\met\Herm8889.met
    area paddock: text=/>
      micromet: soilalbedo=0.23; a_interception=0.0; b_interception=0.0; c_interception=0.0; d_interception=0.0
      outputfile: filename=H89C3P4.out; title=H89C3P4
        variables
          variables: day, Expcode as Title, Site, Season, Treatment, dd/mm/yyyy as Date, sw_dep, sw_dep(), ll15_dep, AboveGroundWt, GrainLiveWt, RootDepth, StageCodeValue, LeafPhotosynthesisFtValue, LeafPhotosynthesisFvpdValue, LeafFw, LeafLAI, StemLiveWt, LeafLiveWt, PodLiveWt
        events: event=end_day
      operations
        13/02/1989  'soil water' set sw = 0.561 0.548 0.548 0.540 0.527 0.370 0.370
        19/06/1989  chickpea2 sow population = 28.9, Depth= 50, cultivar = amethyst, maxcover=1.0, budNumber=1
        26/09/1989  irrigation apply amount = 45.0
        10/10/1989  irrigation apply amount = 45.0
      fertiliser
      irrigation
      manager output titles
        ExpCode = H89C3P4  # Experimental code
        Site = CP89HER  # experimental site name
        Season = -Y1989  # calander year or years data is from
        Treatment1 = Amethyst  # treatment type
        on start_of_day:
```
Expcode='[ExpCode]'
     Site='[Site]'
     Season='[Season]'
     Treatment='[Treatment1]'
```
      soil: same as HL90C3.paddock.soil
      surfaceom
        PoolName = unknown  # Organic Matter pool name
        type = wheat  # Organic Matter type
        mass = 0.0  # Initial surface residue (kg/ha)
        cnr = 10.0  # C:N ratio of initial residue
        standing_fraction = 0.0  # Fraction of residue standing
      chickpea2
      manager Harvesting rule
        # Harvesting criteria
        crop = chickpea2  # Enter name of crop to harvest when ripe
        on end_of_day:
        script: same as in APS2CPE.paddock.Harvesting rule
  simulation H89C3P5
    clock: start_date=14/7/1989; end_date=31/12/1989
    summaryfile
    metfile met: filename=%apsim%\Tests\Validation\Chickpea2\met\Herm8889.met
    area paddock: text=/>
      micromet: soilalbedo=0.23; a_interception=0.0; b_interception=0.0; c_interception=0.0; d_interception=0.0
      outputfile: filename=H89C3P5.out; title=H89C3P5
        variables
          variables: day, Expcode as Title, Site, Season, Treatment, dd/mm/yyyy as Date, sw_dep, sw_dep(), ll15_dep, AboveGroundWt, GrainLiveWt, RootDepth, StageCodeValue, LeafPhotosynthesisFtValue, LeafPhotosynthesisFvpdValue, LeafFw, LeafLAI, StemLiveWt, LeafLiveWt, PodLiveWt
        events: event=end_day
      operations
        13/02/1989  'soil water' set sw = 0.561 0.548 0.548 0.540 0.527 0.370 0.370
        14/07/1989  chickpea2 sow population = 25.7, Depth= 50, cultivar = amethyst, maxcover=1.0, budNumber=1
        26/09/1989  irrigation apply amount = 35.0
        10/10/1989  irrigation apply amount = 45.0
      fertiliser
      irrigation
      manager output titles
        ExpCode = H89C3P5  # Experimental code
        Site = CP89HER  # experimental site name
        Season = -Y1989  # calander year or years data is from
        Treatment1 = Amethyst  # treatment type
        on start_of_day:
```
Expcode='[ExpCode]'
     Site='[Site]'
     Season='[Season]'
     Treatment='[Treatment1]'
```
      soil: same as HL90C3.paddock.soil
      surfaceom
        PoolName = unknown  # Organic Matter pool name
        type = wheat  # Organic Matter type
        mass = 0.0  # Initial surface residue (kg/ha)
        cnr = 10.0  # C:N ratio of initial residue
        standing_fraction = 0.0  # Fraction of residue standing
      chickpea2
      manager Harvesting rule
        # Harvesting criteria
        crop = chickpea2  # Enter name of crop to harvest when ripe
        on end_of_day:
        script: same as in APS2CPE.paddock.Harvesting rule
  simulation H89C3P6
    clock: start_date=14/7/1989; end_date=31/12/1989
    summaryfile
    metfile met: filename=%apsim%\Tests\Validation\Chickpea2\met\Herm8889.met
    area paddock: text=/>
      micromet: soilalbedo=0.23; a_interception=0.0; b_interception=0.0; c_interception=0.0; d_interception=0.0
      outputfile: filename=H89C3P6.out; title=H89C3P6
        variables
          variables: day, Expcode as Title, Site, Season, Treatment, dd/mm/yyyy as Date, sw_dep, sw_dep(), ll15_dep, AboveGroundWt, GrainLiveWt, RootDepth, StageCodeValue, LeafPhotosynthesisFtValue, LeafPhotosynthesisFvpdValue, LeafFw, LeafLAI, StemLiveWt, LeafLiveWt, PodLiveWt
        events: event=end_day
      operations
        13/02/1989  'soil water' set sw = 0.561 0.548 0.548 0.540 0.527 0.370 0.370
        28/08/1989  chickpea2 sow population = 31.1, Depth= 50, cultivar = amethyst, maxcover=1.0, budNumber=1
      fertiliser
      irrigation
      manager output titles
        ExpCode = H89C3P6  # Experimental code
        Site = CP89HER  # experimental site name
        Season = -Y1989  # calander year or years data is from
        Treatment1 = Amethyst  # treatment type
        on start_of_day:
```
Expcode='[ExpCode]'
     Site='[Site]'
     Season='[Season]'
     Treatment='[Treatment1]'
```
      soil: same as HL90C3.paddock.soil
      surfaceom
        PoolName = unknown  # Organic Matter pool name
        type = wheat  # Organic Matter type
        mass = 0.0  # Initial surface residue (kg/ha)
        cnr = 10.0  # C:N ratio of initial residue
        standing_fraction = 0.0  # Fraction of residue standing
      chickpea2
      manager Harvesting rule
        # Harvesting criteria
        crop = chickpea2  # Enter name of crop to harvest when ripe
        on end_of_day:
        script: same as in APS2CPE.paddock.Harvesting rule
  simulation H89C3P7
    clock: start_date=14/7/1989; end_date=10/4/1990
    summaryfile
    metfile met: filename=%apsim%\Tests\Validation\Chickpea2\met\Herm8889.met
    area paddock: text=/>
      micromet: soilalbedo=0.23; a_interception=0.0; b_interception=0.0; c_interception=0.0; d_interception=0.0
      outputfile: filename=H89C3P7.out; title=H89C3P7
        variables
          variables: day, Expcode as Title, Site, Season, Treatment, dd/mm/yyyy as Date, sw_dep, sw_dep(), ll15_dep, AboveGroundWt, GrainLiveWt, RootDepth, StageCodeValue, LeafPhotosynthesisFtValue, LeafPhotosynthesisFvpdValue, LeafFw, LeafLAI, StemLiveWt, LeafLiveWt, PodLiveWt
        events: event=end_day
      operations
        13/02/1989  'soil water' set sw = 0.561 0.548 0.548 0.540 0.527 0.370 0.370
        16/10/1989  chickpea2 sow population = 25.4, Depth= 50, cultivar = amethyst, maxcover=1.0, budNumber=1
        09/10/1989  irrigation apply amount = 30.0
      fertiliser
      irrigation
      manager output titles
        ExpCode = H89C3P7  # Experimental code
        Site = CP89HER  # experimental site name
        Season = -Y1989  # calander year or years data is from
        Treatment1 = Amethyst  # treatment type
        on start_of_day:
```
Expcode='[ExpCode]'
     Site='[Site]'
     Season='[Season]'
     Treatment='[Treatment1]'
```
      soil: same as HL90C3.paddock.soil
      surfaceom
        PoolName = unknown  # Organic Matter pool name
        type = wheat  # Organic Matter type
        mass = 0.0  # Initial surface residue (kg/ha)
        cnr = 10.0  # C:N ratio of initial residue
        standing_fraction = 0.0  # Fraction of residue standing
      chickpea2
      manager Harvesting rule
        # Harvesting criteria
        crop = chickpea2  # Enter name of crop to harvest when ripe
        on end_of_day:
        script: same as in APS2CPE.paddock.Harvesting rule
  simulation H89C3P8
    clock: start_date=14/7/1989; end_date=30/5/1990
    summaryfile
    metfile met: filename=%apsim%\Tests\Validation\Chickpea2\met\Herm8889.met
    area paddock: text=/>
      micromet: soilalbedo=0.23; a_interception=0.0; b_interception=0.0; c_interception=0.0; d_interception=0.0
      outputfile: filename=H89C3P8.out; title=H89C3P8
        variables
          variables: day, Expcode as Title, Site, Season, Treatment, dd/mm/yyyy as Date, sw_dep, sw_dep(), ll15_dep, AboveGroundWt, GrainLiveWt, RootDepth, StageCodeValue, LeafPhotosynthesisFtValue, LeafPhotosynthesisFvpdValue, LeafFw, LeafLAI, StemLiveWt, LeafLiveWt, PodLiveWt
        events: event=end_day
      operations
        13/02/1989  'soil water' set sw = 0.561 0.548 0.548 0.540 0.527 0.370 0.370
        12/12/1989  chickpea2 sow population = 23.7, Depth= 50, cultivar = amethyst, maxcover=1.0, budNumber=1
        15/03/1990  irrigation apply amount = 50.0
      fertiliser
      irrigation
      manager output titles
        ExpCode = H89C3P8  # Experimental code
        Site = CP89HER  # experimental site name
        Season = -Y1989  # calander year or years data is from
        Treatment1 = Amethyst  # treatment type
        on start_of_day:
```
Expcode='[ExpCode]'
     Site='[Site]'
     Season='[Season]'
     Treatment='[Treatment1]'
```
      soil: same as HL90C3.paddock.soil
      surfaceom
        PoolName = unknown  # Organic Matter pool name
        type = wheat  # Organic Matter type
        mass = 0.0  # Initial surface residue (kg/ha)
        cnr = 10.0  # C:N ratio of initial residue
        standing_fraction = 0.0  # Fraction of residue standing
      chickpea2
      manager Harvesting rule
        # Harvesting criteria
        crop = chickpea2  # Enter name of crop to harvest when ripe
        on end_of_day:
        script: same as in APS2CPE.paddock.Harvesting rule
  simulation H89C3P9
    clock: start_date=14/7/1989; end_date=30/5/1990
    summaryfile
    metfile met: filename=%apsim%\Tests\Validation\Chickpea2\met\Herm8889.met
    area paddock: text=/>
      micromet: soilalbedo=0.23; a_interception=0.0; b_interception=0.0; c_interception=0.0; d_interception=0.0
      outputfile: filename=H89C3P9.out; title=H89C3P9
        variables
          variables: day, Expcode as Title, Site, Season, Treatment, dd/mm/yyyy as Date, sw_dep, sw_dep(), ll15_dep, AboveGroundWt, GrainLiveWt, RootDepth, StageCodeValue, LeafPhotosynthesisFtValue, LeafPhotosynthesisFvpdValue, LeafFw, LeafLAI, StemLiveWt, LeafLiveWt, PodLiveWt
        events: event=end_day
      operations
        13/02/1989  'soil water' set sw = 0.561 0.548 0.548 0.540 0.527 0.370 0.370
        23/02/1990  chickpea2 sow population = 34.5, Depth= 50, cultivar = amethyst, maxcover=1.0, budNumber=1
      fertiliser
      irrigation
      manager output titles
        ExpCode = H89C3P9  # Experimental code
        Site = CP89HER  # experimental site name
        Season = -Y1989  # calander year or years data is from
        Treatment1 = Amethyst  # treatment type
        on start_of_day:
```
Expcode='[ExpCode]'
     Site='[Site]'
     Season='[Season]'
     Treatment='[Treatment1]'
```
      soil: same as HL90C3.paddock.soil
      surfaceom
        PoolName = unknown  # Organic Matter pool name
        type = wheat  # Organic Matter type
        mass = 0.0  # Initial surface residue (kg/ha)
        cnr = 10.0  # C:N ratio of initial residue
        standing_fraction = 0.0  # Fraction of residue standing
      chickpea2
      manager Harvesting rule
        # Harvesting criteria
        crop = chickpea2  # Enter name of crop to harvest when ripe
        on end_of_day:
        script: same as in APS2CPE.paddock.Harvesting rule
  simulation H92D1T1A
    clock: start_date=18/7/1992; end_date=25/12/1992
    summaryfile
    metfile met: filename=%apsim%\Tests\Validation\Chickpea2\met\Herm92.met
    area paddock: text=/>
      micromet: soilalbedo=0.23; a_interception=0.0; b_interception=0.0; c_interception=0.0; d_interception=0.0
      outputfile: filename=H92D1T1A.out; title=H92D1T1A
        variables
          variables: day, Expcode as Title, Site, Season, Treatment, dd/mm/yyyy as Date, sw_dep, sw_dep(), ll15_dep, AboveGroundWt, GrainLiveWt, RootDepth, StageCodeValue, LeafPhotosynthesisFtValue, LeafPhotosynthesisFvpdValue, LeafFw, LeafLAI, StemLiveWt, LeafLiveWt, PodLiveWt
        events: event=end_day
      operations
        19/07/1992  'soil water' set sw = 0.465 0.455 0.442 0.440 0.438 0.396 0.372
        24/07/1992  chickpea2 sow population = 14.3, RowSpacing =170, Depth= 50, cultivar = amethyst, maxcover=1.0, budNumber=1
      fertiliser
      irrigation
      manager output titles
        ExpCode = H92D1T1A  # Experimental code
        Site = CP92HER  # experimental site name
        Season = -Y1992  # calander year or years data is from
        Treatment1 = Amethyst  # treatment type
        on start_of_day:
```
Expcode='[ExpCode]'
     Site='[Site]'
     Season='[Season]'
     Treatment='[Treatment1]'
```
      soil: same as HL90C3.paddock.soil
      surfaceom
        PoolName = unknown  # Organic Matter pool name
        type = wheat  # Organic Matter type
        mass = 0.0  # Initial surface residue (kg/ha)
        cnr = 10.0  # C:N ratio of initial residue
        standing_fraction = 0.0  # Fraction of residue standing
      chickpea2
      manager Harvesting rule
        # Harvesting criteria
        crop = chickpea2  # Enter name of crop to harvest when ripe
        on end_of_day:
        script: same as in APS2CPE.paddock.Harvesting rule
  simulation H92D1T2A
    clock: start_date=18/7/1992; end_date=25/12/1992
    summaryfile
    metfile met: filename=%apsim%\Tests\Validation\Chickpea2\met\Herm92.met
    area paddock: text=/>
      micromet: soilalbedo=0.23; a_interception=0.0; b_interception=0.0; c_interception=0.0; d_interception=0.0
      outputfile: filename=H92D1T2A.out; title=H92D1T2A
        variables
          variables: day, Expcode as Title, Site, Season, Treatment, dd/mm/yyyy as Date, sw_dep, sw_dep(), ll15_dep, AboveGroundWt, GrainLiveWt, RootDepth, StageCodeValue, LeafPhotosynthesisFtValue, LeafPhotosynthesisFvpdValue, LeafFw, LeafLAI, StemLiveWt, LeafLiveWt, PodLiveWt
        events: event=end_day
      operations
        19/07/1992  'soil water' set sw = 0.465 0.455 0.442 0.440 0.438 0.396 0.372
        24/07/1992  chickpea2 sow population = 11.44, RowSpacing =350, Depth= 50, cultivar = amethyst, maxcover=1.0, budNumber=1
      fertiliser
      irrigation
      manager output titles
        ExpCode = H92D1T2A  # Experimental code
        Site = CP92HER  # experimental site name
        Season = -Y1992  # calander year or years data is from
        Treatment1 = Amethyst  # treatment type
        on start_of_day:
```
Expcode='[ExpCode]'
     Site='[Site]'
     Season='[Season]'
     Treatment='[Treatment1]'
```
      soil: same as HL90C3.paddock.soil
      surfaceom
        PoolName = unknown  # Organic Matter pool name
        type = wheat  # Organic Matter type
        mass = 0.0  # Initial surface residue (kg/ha)
        cnr = 10.0  # C:N ratio of initial residue
        standing_fraction = 0.0  # Fraction of residue standing
      chickpea2
      manager Harvesting rule
        # Harvesting criteria
        crop = chickpea2  # Enter name of crop to harvest when ripe
        on end_of_day:
        script: same as in APS2CPE.paddock.Harvesting rule
  simulation H92D1T3A
    clock: start_date=18/7/1992; end_date=25/12/1992
    summaryfile
    metfile met: filename=%apsim%\Tests\Validation\Chickpea2\met\Herm92.met
    area paddock: text=/>
      micromet: soilalbedo=0.23; a_interception=0.0; b_interception=0.0; c_interception=0.0; d_interception=0.0
      outputfile: filename=H92D1T3A.out; title=H92D1T3A
        variables
          variables: day, Expcode as Title, Site, Season, Treatment, dd/mm/yyyy as Date, sw_dep, sw_dep(), ll15_dep, AboveGroundWt, GrainLiveWt, RootDepth, StageCodeValue, LeafPhotosynthesisFtValue, LeafPhotosynthesisFvpdValue, LeafFw, LeafLAI, StemLiveWt, LeafLiveWt, PodLiveWt
        events: event=end_day
      operations
        19/07/1992  'soil water' set sw = 0.465 0.455 0.442 0.440 0.438 0.396 0.372
        24/07/1992  chickpea2 sow population = 7.6, RowSpacing =700, Depth= 50, cultivar = amethyst, maxcover=1.0, budNumber=1
      fertiliser
      irrigation
      manager output titles
        ExpCode = H92D1T3A  # Experimental code
        Site = CP92HER  # experimental site name
        Season = -Y1992  # calander year or years data is from
        Treatment1 = Amethyst  # treatment type
        on start_of_day:
```
Expcode='[ExpCode]'
     Site='[Site]'
     Season='[Season]'
     Treatment='[Treatment1]'
```
      surfaceom
        PoolName = unknown  # Organic Matter pool name
        type = wheat  # Organic Matter type
        mass = 0.0  # Initial surface residue (kg/ha)
        cnr = 10.0  # C:N ratio of initial residue
        standing_fraction = 0.0  # Fraction of residue standing
      chickpea2
      manager Harvesting rule
        # Harvesting criteria
        crop = chickpea2  # Enter name of crop to harvest when ripe
        on end_of_day:
        script: same as in APS2CPE.paddock.Harvesting rule
      soil: same as HL90C3.paddock.soil
  simulation H92D2T1A
    clock: start_date=18/7/1992; end_date=25/12/1992
    summaryfile
    metfile met: filename=%apsim%\Tests\Validation\Chickpea2\met\Herm92.met
    area paddock: text=/>
      micromet: soilalbedo=0.23; a_interception=0.0; b_interception=0.0; c_interception=0.0; d_interception=0.0
      outputfile: filename=H92D2T1A.out; title=H92D2T1A
        variables
          variables: day, Expcode as Title, Site, Season, Treatment, dd/mm/yyyy as Date, sw_dep, sw_dep(), ll15_dep, AboveGroundWt, GrainLiveWt, RootDepth, StageCodeValue, LeafPhotosynthesisFtValue, LeafPhotosynthesisFvpdValue, LeafFw, LeafLAI, StemLiveWt, LeafLiveWt, PodLiveWt
        events: event=end_day
      operations
        19/07/1992  'soil water' set sw = 0.465 0.455 0.442 0.440 0.438 0.396 0.372
        24/07/1992  chickpea2 sow population = 20, RowSpacing =170, Depth= 50, cultivar = amethyst, maxcover=1.0, budNumber=1
      fertiliser
      irrigation
      manager output titles
        ExpCode = H92D2T1A  # Experimental code
        Site = CP92HER  # experimental site name
        Season = -Y1992  # calander year or years data is from
        Treatment1 = Amethyst  # treatment type
        on start_of_day:
```
Expcode='[ExpCode]'
     Site='[Site]'
     Season='[Season]'
     Treatment='[Treatment1]'
```
      surfaceom
        PoolName = unknown  # Organic Matter pool name
        type = wheat  # Organic Matter type
        mass = 0.0  # Initial surface residue (kg/ha)
        cnr = 10.0  # C:N ratio of initial residue
        standing_fraction = 0.0  # Fraction of residue standing
      chickpea2
      manager Harvesting rule
        # Harvesting criteria
        crop = chickpea2  # Enter name of crop to harvest when ripe
        on end_of_day:
        script: same as in APS2CPE.paddock.Harvesting rule
      soil: same as HL90C3.paddock.soil
  simulation H92D2T2A
    clock: start_date=18/7/1992; end_date=25/12/1992
    summaryfile
    metfile met: filename=%apsim%\Tests\Validation\Chickpea2\met\Herm92.met
    area paddock: text=/>
      micromet: soilalbedo=0.23; a_interception=0.0; b_interception=0.0; c_interception=0.0; d_interception=0.0
      outputfile: filename=H92D2T2A.out; title=H92D2T2A
        variables
          variables: day, Expcode as Title, Site, Season, Treatment, dd/mm/yyyy as Date, sw_dep, sw_dep(), ll15_dep, AboveGroundWt, GrainLiveWt, RootDepth, StageCodeValue, LeafPhotosynthesisFtValue, LeafPhotosynthesisFvpdValue, LeafFw, LeafLAI, StemLiveWt, LeafLiveWt, PodLiveWt
        events: event=end_day
      operations
        19/07/1992  'soil water' set sw = 0.465 0.455 0.442 0.440 0.438 0.396 0.372
        24/07/1992  chickpea2 sow population = 20, RowSpacing =350, Depth= 50, cultivar = amethyst, maxcover=1.0, budNumber=1
      fertiliser
      irrigation
      manager output titles
        ExpCode = H92D2T2A  # Experimental code
        Site = CP92HER  # experimental site name
        Season = -Y1992  # calander year or years data is from
        Treatment1 = Amethyst  # treatment type
        on start_of_day:
```
Expcode='[ExpCode]'
     Site='[Site]'
     Season='[Season]'
     Treatment='[Treatment1]'
```
      surfaceom
        PoolName = unknown  # Organic Matter pool name
        type = wheat  # Organic Matter type
        mass = 0.0  # Initial surface residue (kg/ha)
        cnr = 10.0  # C:N ratio of initial residue
        standing_fraction = 0.0  # Fraction of residue standing
      chickpea2
      manager Harvesting rule
        # Harvesting criteria
        crop = chickpea2  # Enter name of crop to harvest when ripe
        on end_of_day:
        script: same as in APS2CPE.paddock.Harvesting rule
      soil: same as HL90C3.paddock.soil
  simulation H92D2T3A
    clock: start_date=18/7/1992; end_date=25/12/1992
    summaryfile
    metfile met: filename=%apsim%\Tests\Validation\Chickpea2\met\Herm92.met
    area paddock: text=/>
      micromet: soilalbedo=0.23; a_interception=0.0; b_interception=0.0; c_interception=0.0; d_interception=0.0
      outputfile: filename=H92D2T3A.out; title=H92D2T3A
        variables
          variables: day, Expcode as Title, Site, Season, Treatment, dd/mm/yyyy as Date, sw_dep, sw_dep(), ll15_dep, AboveGroundWt, GrainLiveWt, RootDepth, StageCodeValue, LeafPhotosynthesisFtValue, LeafPhotosynthesisFvpdValue, LeafFw, LeafLAI, StemLiveWt, LeafLiveWt, PodLiveWt
        events: event=end_day
      operations
        19/07/1992  'soil water' set sw = 0.465 0.455 0.442 0.440 0.438 0.396 0.372
        24/07/1992  chickpea2 sow population = 20, RowSpacing =700, Depth= 50, cultivar = amethyst, maxcover=1.0, budNumber=1
      fertiliser
      irrigation
      manager output titles
        ExpCode = H92D2T3A  # Experimental code
        Site = CP92HER  # experimental site name
        Season = -Y1992  # calander year or years data is from
        Treatment1 = Amethyst  # treatment type
        on start_of_day:
```
Expcode='[ExpCode]'
     Site='[Site]'
     Season='[Season]'
     Treatment='[Treatment1]'
```
      surfaceom
        PoolName = unknown  # Organic Matter pool name
        type = wheat  # Organic Matter type
        mass = 0.0  # Initial surface residue (kg/ha)
        cnr = 10.0  # C:N ratio of initial residue
        standing_fraction = 0.0  # Fraction of residue standing
      chickpea2
      manager Harvesting rule
        # Harvesting criteria
        crop = chickpea2  # Enter name of crop to harvest when ripe
        on end_of_day:
        script: same as in APS2CPE.paddock.Harvesting rule
      soil: same as HL90C3.paddock.soil
  simulation H92D3T1A
    clock: start_date=18/7/1992; end_date=25/12/1992
    summaryfile
    metfile met: filename=%apsim%\Tests\Validation\Chickpea2\met\Herm92.met
    area paddock: text=/>
      micromet: soilalbedo=0.23; a_interception=0.0; b_interception=0.0; c_interception=0.0; d_interception=0.0
      outputfile: filename=H92D3T1A.out; title=H92D3T1A
        variables
          variables: day, Expcode as Title, Site, Season, Treatment, dd/mm/yyyy as Date, sw_dep, sw_dep(), ll15_dep, AboveGroundWt, GrainLiveWt, RootDepth, StageCodeValue, LeafPhotosynthesisFtValue, LeafPhotosynthesisFvpdValue, LeafFw, LeafLAI, StemLiveWt, LeafLiveWt, PodLiveWt
        events: event=end_day
      operations
        19/07/1992  'soil water' set sw = 0.465 0.455 0.442 0.440 0.438 0.396 0.372
        24/07/1992  chickpea2 sow population = 41.95, RowSpacing =170, Depth= 50, cultivar = amethyst, maxcover=1.0, budNumber=1
      fertiliser
      irrigation
      manager output titles
        ExpCode = H92D3T1A  # Experimental code
        Site = CP92HER  # experimental site name
        Season = -Y1992  # calander year or years data is from
        Treatment1 = Amethyst  # treatment type
        on start_of_day:
```
Expcode='[ExpCode]'
     Site='[Site]'
     Season='[Season]'
     Treatment='[Treatment1]'
```
      surfaceom
        PoolName = unknown  # Organic Matter pool name
        type = wheat  # Organic Matter type
        mass = 0.0  # Initial surface residue (kg/ha)
        cnr = 10.0  # C:N ratio of initial residue
        standing_fraction = 0.0  # Fraction of residue standing
      chickpea2
      manager Harvesting rule
        # Harvesting criteria
        crop = chickpea2  # Enter name of crop to harvest when ripe
        on end_of_day:
        script: same as in APS2CPE.paddock.Harvesting rule
      soil: same as HL90C3.paddock.soil
  simulation H92D3T2A
    clock: start_date=18/7/1992; end_date=25/12/1992
    summaryfile
    metfile met: filename=%apsim%\Tests\Validation\Chickpea2\met\Herm92.met
    area paddock: text=/>
      micromet: soilalbedo=0.23; a_interception=0.0; b_interception=0.0; c_interception=0.0; d_interception=0.0
      outputfile: filename=H92D3T2A.out; title=H92D3T2A
        variables
          variables: day, Expcode as Title, Site, Season, Treatment, dd/mm/yyyy as Date, sw_dep, sw_dep(), ll15_dep, AboveGroundWt, GrainLiveWt, RootDepth, StageCodeValue, LeafPhotosynthesisFtValue, LeafPhotosynthesisFvpdValue, LeafFw, LeafLAI, StemLiveWt, LeafLiveWt, PodLiveWt
        events: event=end_day
      operations
        19/07/1992  'soil water' set sw = 0.465 0.455 0.442 0.440 0.438 0.396 0.372
        24/07/1992  chickpea2 sow population = 37.2, RowSpacing =350, Depth= 50, cultivar = amethyst, maxcover=1.0, budNumber=1
      fertiliser
      irrigation
      manager output titles
        ExpCode = H92D3T2A  # Experimental code
        Site = CP92HER  # experimental site name
        Season = -Y1992  # calander year or years data is from
        Treatment1 = Amethyst  # treatment type
        on start_of_day:
```
Expcode='[ExpCode]'
     Site='[Site]'
     Season='[Season]'
     Treatment='[Treatment1]'
```
      surfaceom
        PoolName = unknown  # Organic Matter pool name
        type = wheat  # Organic Matter type
        mass = 0.0  # Initial surface residue (kg/ha)
        cnr = 10.0  # C:N ratio of initial residue
        standing_fraction = 0.0  # Fraction of residue standing
      chickpea2
      manager Harvesting rule
        # Harvesting criteria
        crop = chickpea2  # Enter name of crop to harvest when ripe
        on end_of_day:
        script: same as in APS2CPE.paddock.Harvesting rule
      soil: same as HL90C3.paddock.soil
  simulation H92D3T3A
    clock: start_date=18/7/1992; end_date=25/12/1992
    summaryfile
    metfile met: filename=%apsim%\Tests\Validation\Chickpea2\met\Herm92.met
    area paddock: text=/>
      micromet: soilalbedo=0.23; a_interception=0.0; b_interception=0.0; c_interception=0.0; d_interception=0.0
      outputfile: filename=H92D3T3A.out; title=H92D3T3A
        variables
          variables: day, Expcode as Title, Site, Season, Treatment, dd/mm/yyyy as Date, sw_dep, sw_dep(), ll15_dep, AboveGroundWt, GrainLiveWt, RootDepth, StageCodeValue, LeafPhotosynthesisFtValue, LeafPhotosynthesisFvpdValue, LeafFw, LeafLAI, StemLiveWt, LeafLiveWt, PodLiveWt
        events: event=end_day
      operations
        19/07/1992  'soil water' set sw = 0.465 0.455 0.442 0.440 0.438 0.396 0.372
        24/07/1992  chickpea2 sow population = 39.1, RowSpacing =700, Depth= 50, cultivar = amethyst, maxcover=1.0, budNumber=1
      fertiliser
      irrigation
      manager output titles
        ExpCode = H92D3T3A  # Experimental code
        Site = CP92HER  # experimental site name
        Season = -Y1992  # calander year or years data is from
        Treatment1 = Amethyst  # treatment type
        on start_of_day:
```
Expcode='[ExpCode]'
     Site='[Site]'
     Season='[Season]'
     Treatment='[Treatment1]'
```
      surfaceom
        PoolName = unknown  # Organic Matter pool name
        type = wheat  # Organic Matter type
        mass = 0.0  # Initial surface residue (kg/ha)
        cnr = 10.0  # C:N ratio of initial residue
        standing_fraction = 0.0  # Fraction of residue standing
      chickpea2
      manager Harvesting rule
        # Harvesting criteria
        crop = chickpea2  # Enter name of crop to harvest when ripe
        on end_of_day:
        script: same as in APS2CPE.paddock.Harvesting rule
      soil: same as HL90C3.paddock.soil
  simulation H92D4T1A
    clock: start_date=18/7/1992; end_date=25/12/1992
    summaryfile
    metfile met: filename=%apsim%\Tests\Validation\Chickpea2\met\Herm92.met
    area paddock: text=/>
      micromet: soilalbedo=0.23; a_interception=0.0; b_interception=0.0; c_interception=0.0; d_interception=0.0
      outputfile: filename=H92D4T1A.out; title=H92D4T1A
        variables
          variables: day, Expcode as Title, Site, Season, Treatment, dd/mm/yyyy as Date, sw_dep, sw_dep(), ll15_dep, AboveGroundWt, GrainLiveWt, RootDepth, StageCodeValue, LeafPhotosynthesisFtValue, LeafPhotosynthesisFvpdValue, LeafFw, LeafLAI, StemLiveWt, LeafLiveWt, PodLiveWt
        events: event=end_day
      operations
        19/07/1992  'soil water' set sw = 0.465 0.455 0.442 0.440 0.438 0.396 0.372
        24/07/1992  chickpea2 sow population = 70, RowSpacing =170, Depth= 50, cultivar = amethyst, maxcover=1.0, budNumber=1
      fertiliser
      irrigation
      manager output titles
        ExpCode = H92D4T1A  # Experimental code
        Site = CP92HER  # experimental site name
        Season = -Y1992  # calander year or years data is from
        Treatment1 = Amethyst  # treatment type
        on start_of_day:
```
Expcode='[ExpCode]'
     Site='[Site]'
     Season='[Season]'
     Treatment='[Treatment1]'
```
      surfaceom
        PoolName = unknown  # Organic Matter pool name
        type = wheat  # Organic Matter type
        mass = 0  # Initial surface residue (kg/ha)
        cnr = 10  # C:N ratio of initial residue
        standing_fraction = 0  # Fraction of residue standing
      chickpea2
      manager Harvesting rule
        # Harvesting criteria
        crop = chickpea2  # Enter name of crop to harvest when ripe
        on end_of_day:
        script: same as in APS2CPE.paddock.Harvesting rule
      soil: same as HL90C3.paddock.soil
  simulation H92D4T2A
    clock: start_date=18/7/1992; end_date=25/12/1992
    summaryfile
    metfile met: filename=%apsim%\Tests\Validation\Chickpea2\met\Herm92.met
    area paddock: text=/>
      micromet: soilalbedo=0.23; a_interception=0.0; b_interception=0.0; c_interception=0.0; d_interception=0.0
      outputfile: filename=H92D4T2A.out; title=H92D4T2A
        variables
          variables: day, Expcode as Title, Site, Season, Treatment, dd/mm/yyyy as Date, sw_dep, sw_dep(), ll15_dep, AboveGroundWt, GrainLiveWt, RootDepth, StageCodeValue, LeafPhotosynthesisFtValue, LeafPhotosynthesisFvpdValue, LeafFw, LeafLAI, StemLiveWt, LeafLiveWt, PodLiveWt
        events: event=end_day
      operations
        19/07/1992  'soil water' set sw = 0.465 0.455 0.442 0.440 0.438 0.396 0.372
        24/07/1992  chickpea2 sow population = 70, RowSpacing =350, Depth= 50, cultivar = amethyst, maxcover=1.0, budNumber=1
      fertiliser
      irrigation
      manager output titles
        ExpCode = H92D4T2A  # Experimental code
        Site = CP92HER  # experimental site name
        Season = -Y1992  # calander year or years data is from
        Treatment1 = Amethyst  # treatment type
        on start_of_day:
```
Expcode='[ExpCode]'
     Site='[Site]'
     Season='[Season]'
     Treatment='[Treatment1]'
```
      surfaceom
        PoolName = unknown  # Organic Matter pool name
        type = wheat  # Organic Matter type
        mass = 0.0  # Initial surface residue (kg/ha)
        cnr = 10.0  # C:N ratio of initial residue
        standing_fraction = 0.0  # Fraction of residue standing
      chickpea2
      manager Harvesting rule
        # Harvesting criteria
        crop = chickpea2  # Enter name of crop to harvest when ripe
        on end_of_day:
        script: same as in APS2CPE.paddock.Harvesting rule
      soil: same as HL90C3.paddock.soil
  simulation H92D4T3A
    clock: start_date=18/7/1992; end_date=25/12/1992
    summaryfile
    metfile met: filename=%apsim%\Tests\Validation\Chickpea2\met\Herm92.met
    area paddock: text=/>
      micromet: soilalbedo=0.23; a_interception=0.0; b_interception=0.0; c_interception=0.0; d_interception=0.0
      outputfile: filename=H92D4T3A.out; title=H92D4T3A
        variables
          variables: day, Expcode as Title, Site, Season, Treatment, dd/mm/yyyy as Date, sw_dep, sw_dep(), ll15_dep, AboveGroundWt, GrainLiveWt, RootDepth, StageCodeValue, LeafPhotosynthesisFtValue, LeafPhotosynthesisFvpdValue, LeafFw, LeafLAI, StemLiveWt, LeafLiveWt, PodLiveWt
        events: event=end_day
      operations
        19/07/1992  'soil water' set sw = 0.465 0.455 0.442 0.440 0.438 0.396 0.372
        24/07/1992  chickpea2 sow population = 70, RowSpacing =700, Depth= 50, cultivar = amethyst, maxcover=1.0, budNumber=1
      fertiliser
      irrigation
      manager output titles
        ExpCode = H92D4T3A  # Experimental code
        Site = CP92HER  # experimental site name
        Season = -Y1992  # calander year or years data is from
        Treatment1 = Amethyst  # treatment type
        on start_of_day:
```
Expcode='[ExpCode]'
     Site='[Site]'
     Season='[Season]'
     Treatment='[Treatment1]'
```
      surfaceom
        PoolName = unknown  # Organic Matter pool name
        type = wheat  # Organic Matter type
        mass = 0.0  # Initial surface residue (kg/ha)
        cnr = 10.0  # C:N ratio of initial residue
        standing_fraction = 0.0  # Fraction of residue standing
      chickpea2
      manager Harvesting rule
        # Harvesting criteria
        crop = chickpea2  # Enter name of crop to harvest when ripe
        on end_of_day:
        script: same as in APS2CPE.paddock.Harvesting rule
      soil: same as HL90C3.paddock.soil
  simulation H92D5T1A
    clock: start_date=18/7/1992; end_date=25/12/1992
    summaryfile
    metfile met: filename=%apsim%\Tests\Validation\Chickpea2\met\Herm92.met
    area paddock: text=/>
      micromet: soilalbedo=0.23; a_interception=0.0; b_interception=0.0; c_interception=0.0; d_interception=0.0
      outputfile: filename=H92D5T1A.out; title=H92D5T1A
        variables
          variables: day, Expcode as Title, Site, Season, Treatment, dd/mm/yyyy as Date, sw_dep, sw_dep(), ll15_dep, AboveGroundWt, GrainLiveWt, RootDepth, StageCodeValue, LeafPhotosynthesisFtValue, LeafPhotosynthesisFvpdValue, LeafFw, LeafLAI, StemLiveWt, LeafLiveWt, PodLiveWt
        events: event=end_day
      operations
        19/07/1992  'soil water' set sw = 0.465 0.455 0.442 0.440 0.438 0.396 0.372
        24/07/1992  chickpea2 sow population = 78, RowSpacing =170, Depth= 50, cultivar = amethyst, maxcover=1.0, budNumber=1
      fertiliser
      irrigation
      manager output titles
        ExpCode = H92D5T1A  # Experimental code
        Site = CP92HER  # experimental site name
        Season = -Y1992  # calander year or years data is from
        Treatment1 = Amethyst  # treatment type
        on start_of_day:
```
Expcode='[ExpCode]'
     Site='[Site]'
     Season='[Season]'
     Treatment='[Treatment1]'
```
      surfaceom
        PoolName = unknown  # Organic Matter pool name
        type = wheat  # Organic Matter type
        mass = 0.0  # Initial surface residue (kg/ha)
        cnr = 10.0  # C:N ratio of initial residue
        standing_fraction = 0.0  # Fraction of residue standing
      chickpea2
      manager Harvesting rule
        # Harvesting criteria
        crop = chickpea2  # Enter name of crop to harvest when ripe
        on end_of_day:
        script: same as in APS2CPE.paddock.Harvesting rule
      soil: same as HL90C3.paddock.soil
  simulation H92D5T2A
    clock: start_date=18/7/1992; end_date=25/12/1992
    summaryfile
    metfile met: filename=%apsim%\Tests\Validation\Chickpea2\met\Herm92.met
    area paddock: text=/>
      micromet: soilalbedo=0.23; a_interception=0.0; b_interception=0.0; c_interception=0.0; d_interception=0.0
      outputfile: filename=H92D5T2A.out; title=H92D5T2A
        variables
          variables: day, Expcode as Title, Site, Season, Treatment, dd/mm/yyyy as Date, sw_dep, sw_dep(), ll15_dep, AboveGroundWt, GrainLiveWt, RootDepth, StageCodeValue, LeafPhotosynthesisFtValue, LeafPhotosynthesisFvpdValue, LeafFw, LeafLAI, StemLiveWt, LeafLiveWt, PodLiveWt
        events: event=end_day
      operations
        19/07/1992  'soil water' set sw = 0.465 0.455 0.442 0.440 0.438 0.396 0.372
        24/07/1992  chickpea2 sow population = 75, RowSpacing =350, Depth= 50, cultivar = amethyst, maxcover=1.0, budNumber=1
      fertiliser
      irrigation
      manager output titles
        ExpCode = H92D5T2A  # Experimental code
        Site = CP92HER  # experimental site name
        Season = -Y1992  # calander year or years data is from
        Treatment1 = Amethyst  # treatment type
        on start_of_day:
```
Expcode='[ExpCode]'
     Site='[Site]'
     Season='[Season]'
     Treatment='[Treatment1]'
```
      surfaceom
        PoolName = unknown  # Organic Matter pool name
        type = wheat  # Organic Matter type
        mass = 0.0  # Initial surface residue (kg/ha)
        cnr = 10.0  # C:N ratio of initial residue
        standing_fraction = 0.0  # Fraction of residue standing
      chickpea2
      manager Harvesting rule
        # Harvesting criteria
        crop = chickpea2  # Enter name of crop to harvest when ripe
        on end_of_day:
        script: same as in APS2CPE.paddock.Harvesting rule
      soil: same as HL90C3.paddock.soil
  simulation H92D5T3A
    clock: start_date=18/7/1992; end_date=25/12/1992
    summaryfile
    metfile met: filename=%apsim%\Tests\Validation\Chickpea2\met\Herm92.met
    area paddock: text=/>
      micromet: soilalbedo=0.23; a_interception=0.0; b_interception=0.0; c_interception=0.0; d_interception=0.0
      outputfile: filename=H92D5T3A.out; title=H92D5T3A
        variables
          variables: day, Expcode as Title, Site, Season, Treatment, dd/mm/yyyy as Date, sw_dep, sw_dep(), ll15_dep, AboveGroundWt, GrainLiveWt, RootDepth, StageCodeValue, LeafPhotosynthesisFtValue, LeafPhotosynthesisFvpdValue, LeafFw, LeafLAI, StemLiveWt, LeafLiveWt, PodLiveWt
        events: event=end_day
      operations
        19/07/1992  'soil water' set sw = 0.465 0.455 0.442 0.440 0.438 0.396 0.372
        24/07/1992  chickpea2 sow population = 80, RowSpacing =700, Depth= 50, cultivar = amethyst, maxcover=1.0, budNumber=1
      fertiliser
      irrigation
      manager output titles
        ExpCode = H92D5T3A  # Experimental code
        Site = CP92HER  # experimental site name
        Season = -Y1992  # calander year or years data is from
        Treatment1 = Amethyst  # treatment type
        on start_of_day:
```
Expcode='[ExpCode]'
     Site='[Site]'
     Season='[Season]'
     Treatment='[Treatment1]'
```
      surfaceom
        PoolName = unknown  # Organic Matter pool name
        type = wheat  # Organic Matter type
        mass = 0.0  # Initial surface residue (kg/ha)
        cnr = 10.0  # C:N ratio of initial residue
        standing_fraction = 0.0  # Fraction of residue standing
      chickpea2
      manager Harvesting rule
        # Harvesting criteria
        crop = chickpea2  # Enter name of crop to harvest when ripe
        on end_of_day:
        script: same as in APS2CPE.paddock.Harvesting rule
      soil: same as HL90C3.paddock.soil
  simulation H92D6T1A
    clock: start_date=18/7/1992; end_date=25/12/1992
    summaryfile
    metfile met: filename=%apsim%\Tests\Validation\Chickpea2\met\Herm92.met
    area paddock: text=/>
      micromet: soilalbedo=0.23; a_interception=0.0; b_interception=0.0; c_interception=0.0; d_interception=0.0
      outputfile: filename=H92D6T1A.out; title=H92D6T1A
        variables
          variables: day, Expcode as Title, Site, Season, Treatment, dd/mm/yyyy as Date, sw_dep, sw_dep(), ll15_dep, AboveGroundWt, GrainLiveWt, RootDepth, StageCodeValue, LeafPhotosynthesisFtValue, LeafPhotosynthesisFvpdValue, LeafFw, LeafLAI, StemLiveWt, LeafLiveWt, PodLiveWt
        events: event=end_day
      operations
        19/07/1992  'soil water' set sw = 0.465 0.455 0.442 0.440 0.438 0.396 0.372
        24/07/1992  chickpea2 sow population = 110, RowSpacing =170, Depth= 50, cultivar = amethyst, maxcover=1.0, budNumber=1
      fertiliser
      irrigation
      manager output titles
        ExpCode = H92D6T1A  # Experimental code
        Site = CP92HER  # experimental site name
        Season = -Y1992  # calander year or years data is from
        Treatment1 = Amethyst  # treatment type
        on start_of_day:
```
Expcode='[ExpCode]'
     Site='[Site]'
     Season='[Season]'
     Treatment='[Treatment1]'
```
      surfaceom
        PoolName = unknown  # Organic Matter pool name
        type = wheat  # Organic Matter type
        mass = 0.0  # Initial surface residue (kg/ha)
        cnr = 10.0  # C:N ratio of initial residue
        standing_fraction = 0.0  # Fraction of residue standing
      chickpea2
      manager Harvesting rule
        # Harvesting criteria
        crop = chickpea2  # Enter name of crop to harvest when ripe
        on end_of_day:
        script: same as in APS2CPE.paddock.Harvesting rule
      soil: same as HL90C3.paddock.soil
  simulation H92D6T2A
    clock: start_date=18/7/1992; end_date=25/12/1992
    summaryfile
    metfile met: filename=%apsim%\Tests\Validation\Chickpea2\met\Herm92.met
    area paddock: text=/>
      micromet: soilalbedo=0.23; a_interception=0.0; b_interception=0.0; c_interception=0.0; d_interception=0.0
      outputfile: filename=H92D6T2A.out; title=H92D6T2A
        variables
          variables: day, Expcode as Title, Site, Season, Treatment, dd/mm/yyyy as Date, sw_dep, sw_dep(), ll15_dep, AboveGroundWt, GrainLiveWt, RootDepth, StageCodeValue, LeafPhotosynthesisFtValue, LeafPhotosynthesisFvpdValue, LeafFw, LeafLAI, StemLiveWt, LeafLiveWt, PodLiveWt
        events: event=end_day
      operations
        19/07/1992  'soil water' set sw = 0.465 0.455 0.442 0.440 0.438 0.396 0.372
        24/07/1992  chickpea2 sow population = 110, RowSpacing =350, Depth= 50, cultivar = amethyst, maxcover=1.0, budNumber=1
      fertiliser
      irrigation
      manager output titles
        ExpCode = H92D6T2A  # Experimental code
        Site = CP92HER  # experimental site name
        Season = -Y1992  # calander year or years data is from
        Treatment1 = Amethyst  # treatment type
        on start_of_day:
```
Expcode='[ExpCode]'
     Site='[Site]'
     Season='[Season]'
     Treatment='[Treatment1]'
```
      surfaceom
        PoolName = unknown  # Organic Matter pool name
        type = wheat  # Organic Matter type
        mass = 0.0  # Initial surface residue (kg/ha)
        cnr = 10.0  # C:N ratio of initial residue
        standing_fraction = 0.0  # Fraction of residue standing
      chickpea2
      manager Harvesting rule
        # Harvesting criteria
        crop = chickpea2  # Enter name of crop to harvest when ripe
        on end_of_day:
        script: same as in APS2CPE.paddock.Harvesting rule
      soil: same as HL90C3.paddock.soil
  simulation H92D6T3A
    clock: start_date=18/7/1992; end_date=25/12/1992
    summaryfile
    metfile met: filename=%apsim%\Tests\Validation\Chickpea2\met\Herm92.met
    area paddock: text=/>
      micromet: soilalbedo=0.23; a_interception=0.0; b_interception=0.0; c_interception=0.0; d_interception=0.0
      outputfile: filename=H92D6T3A.out; title=H92D6T3A
        variables
          variables: day, Expcode as Title, Site, Season, Treatment, dd/mm/yyyy as Date, sw_dep, sw_dep(), ll15_dep, AboveGroundWt, GrainLiveWt, RootDepth, StageCodeValue, LeafPhotosynthesisFtValue, LeafPhotosynthesisFvpdValue, LeafFw, LeafLAI, StemLiveWt, LeafLiveWt, PodLiveWt
        events: event=end_day
      operations
        19/07/1992  'soil water' set sw = 0.465 0.455 0.442 0.440 0.438 0.396 0.372
        24/07/1992  chickpea2 sow population = 110, RowSpacing =700, Depth= 50, cultivar = amethyst, maxcover=1.0, budNumber=1
      fertiliser
      irrigation
      manager output titles
        ExpCode = H92D6T3A  # Experimental code
        Site = CP92HER  # experimental site name
        Season = -Y1992  # calander year or years data is from
        Treatment1 = Amethyst  # treatment type
        on start_of_day:
```
Expcode='[ExpCode]'
     Site='[Site]'
     Season='[Season]'
     Treatment='[Treatment1]'
```
      surfaceom
        PoolName = unknown  # Organic Matter pool name
        type = wheat  # Organic Matter type
        mass = 0.0  # Initial surface residue (kg/ha)
        cnr = 10.0  # C:N ratio of initial residue
        standing_fraction = 0.0  # Fraction of residue standing
      chickpea2
      manager Harvesting rule
        # Harvesting criteria
        crop = chickpea2  # Enter name of crop to harvest when ripe
        on end_of_day:
        script: same as in APS2CPE.paddock.Harvesting rule
      soil: same as HL90C3.paddock.soil
  simulation H92D7T1A
    clock: start_date=18/7/1992; end_date=25/12/1992
    summaryfile
    metfile met: filename=%apsim%\Tests\Validation\Chickpea2\met\Herm92.met
    area paddock: text=/>
      micromet: soilalbedo=0.23; a_interception=0.0; b_interception=0.0; c_interception=0.0; d_interception=0.0
      outputfile: filename=H92D7T1A.out; title=H92D7T1A
        variables
          variables: day, Expcode as Title, Site, Season, Treatment, dd/mm/yyyy as Date, sw_dep, sw_dep(), ll15_dep, AboveGroundWt, GrainLiveWt, RootDepth, StageCodeValue, LeafPhotosynthesisFtValue, LeafPhotosynthesisFvpdValue, LeafFw, LeafLAI, StemLiveWt, LeafLiveWt, PodLiveWt
        events: event=end_day
      operations
        19/07/1992  'soil water' set sw = 0.465 0.455 0.442 0.440 0.438 0.396 0.372
        24/07/1992  chickpea2 sow population = 115, RowSpacing =170, Depth= 50, cultivar = amethyst, maxcover=1.0, budNumber=1
      fertiliser
      irrigation
      manager output titles
        ExpCode = H92D7T1A  # Experimental code
        Site = CP92HER  # experimental site name
        Season = -Y1992  # calander year or years data is from
        Treatment1 = Amethyst  # treatment type
        on start_of_day:
```
Expcode='[ExpCode]'
     Site='[Site]'
     Season='[Season]'
     Treatment='[Treatment1]'
```
      surfaceom
        PoolName = unknown  # Organic Matter pool name
        type = wheat  # Organic Matter type
        mass = 0.0  # Initial surface residue (kg/ha)
        cnr = 10.0  # C:N ratio of initial residue
        standing_fraction = 0.0  # Fraction of residue standing
      chickpea2
      manager Harvesting rule
        # Harvesting criteria
        crop = chickpea2  # Enter name of crop to harvest when ripe
        on end_of_day:
        script: same as in APS2CPE.paddock.Harvesting rule
      soil: same as HL90C3.paddock.soil
  simulation H92D7T2A
    clock: start_date=18/7/1992; end_date=25/12/1992
    summaryfile
    metfile met: filename=%apsim%\Tests\Validation\Chickpea2\met\Herm92.met
    area paddock: text=/>
      micromet: soilalbedo=0.23; a_interception=0.0; b_interception=0.0; c_interception=0.0; d_interception=0.0
      outputfile: filename=H92D7T2A.out; title=H92D7T2A
        variables
          variables: day, Expcode as Title, Site, Season, Treatment, dd/mm/yyyy as Date, sw_dep, sw_dep(), ll15_dep, AboveGroundWt, GrainLiveWt, RootDepth, StageCodeValue, LeafPhotosynthesisFtValue, LeafPhotosynthesisFvpdValue, LeafFw, LeafLAI, StemLiveWt, LeafLiveWt, PodLiveWt
        events: event=end_day
      operations
        19/07/1992  'soil water' set sw = 0.465 0.455 0.442 0.440 0.438 0.396 0.372
        24/07/1992  chickpea2 sow population = 118, RowSpacing =350, Depth= 50, cultivar = amethyst, maxcover=1.0, budNumber=1
      fertiliser
      irrigation
      manager output titles
        ExpCode = H92D7T2A  # Experimental code
        Site = CP92HER  # experimental site name
        Season = -Y1992  # calander year or years data is from
        Treatment1 = Amethyst  # treatment type
        on start_of_day:
```
Expcode='[ExpCode]'
     Site='[Site]'
     Season='[Season]'
     Treatment='[Treatment1]'
```
      surfaceom
        PoolName = unknown  # Organic Matter pool name
        type = wheat  # Organic Matter type
        mass = 0.0  # Initial surface residue (kg/ha)
        cnr = 10.0  # C:N ratio of initial residue
        standing_fraction = 0.0  # Fraction of residue standing
      chickpea2
      manager Harvesting rule
        # Harvesting criteria
        crop = chickpea2  # Enter name of crop to harvest when ripe
        on end_of_day:
        script: same as in APS2CPE.paddock.Harvesting rule
      soil: same as HL90C3.paddock.soil
  simulation H92D7T3A
    clock: start_date=18/7/1992; end_date=25/12/1992
    summaryfile
    metfile met: filename=%apsim%\Tests\Validation\Chickpea2\met\Herm92.met
    area paddock: text=/>
      micromet: soilalbedo=0.23; a_interception=0.0; b_interception=0.0; c_interception=0.0; d_interception=0.0
      outputfile: filename=H92D7T3A.out; title=H92D7T3A
        variables
          variables: day, Expcode as Title, Site, Season, Treatment, dd/mm/yyyy as Date, sw_dep, sw_dep(), ll15_dep, AboveGroundWt, GrainLiveWt, RootDepth, StageCodeValue, LeafPhotosynthesisFtValue, LeafPhotosynthesisFvpdValue, LeafFw, LeafLAI, StemLiveWt, LeafLiveWt, PodLiveWt
        events: event=end_day
      operations
        19/07/1992  'soil water' set sw = 0.465 0.455 0.442 0.440 0.438 0.396 0.372
        24/07/1992  chickpea2 sow population = 112, RowSpacing =700, Depth= 50, cultivar = amethyst, maxcover=1.0, budNumber=1
      fertiliser
      irrigation
      manager output titles
        ExpCode = H92D7T3A  # Experimental code
        Site = CP92HER  # experimental site name
        Season = -Y1992  # calander year or years data is from
        Treatment1 = Amethyst  # treatment type
        on start_of_day:
```
Expcode='[ExpCode]'
     Site='[Site]'
     Season='[Season]'
     Treatment='[Treatment1]'
```
      surfaceom
        PoolName = unknown  # Organic Matter pool name
        type = wheat  # Organic Matter type
        mass = 0.0  # Initial surface residue (kg/ha)
        cnr = 10.0  # C:N ratio of initial residue
        standing_fraction = 0.0  # Fraction of residue standing
      chickpea2
      manager Harvesting rule
        # Harvesting criteria
        crop = chickpea2  # Enter name of crop to harvest when ripe
        on end_of_day:
        script: same as in APS2CPE.paddock.Harvesting rule
      soil: same as HL90C3.paddock.soil
  simulation W92N1A
    clock
      start_date = 29/4/1992
      end_date = 25/12/1992
    summaryfile
    metfile met: filename=%apsim%\Tests\Validation\Chickpea2\met\Windr.met
    area paddock: text=/>
      micromet: soilalbedo=0.23; a_interception=0.0; b_interception=0.0; c_interception=0.0; d_interception=0.0
      outputfile: filename=W92N1A.out; title=W92N1A
        variables
          variables: day, Expcode as Title, Site, Season, Treatment, dd/mm/yyyy as Date, sw_dep, sw_dep(), ll15_dep, AboveGroundWt, GrainLiveWt, RootDepth, StageCodeValue, LeafPhotosynthesisFtValue, LeafPhotosynthesisFvpdValue, LeafFw, LeafLAI, StemLiveWt, LeafLiveWt, PodLiveWt
        events: event=end_day
      operations
        7/05/1992  'soil water' set sw = 0.321 0.352 0.330 0.285 0.298 0.298
        7/05/1992  'soil Nitrogen' set no3ppm = 14.67 12.83 1.36 4.48 9.39 0.39
        7/05/1992  fertiliser apply amount = 0 (kg/ha), depth=10(mm), type=nh4no3
        7/05/1992  chickpea2 sow population = 40, Depth= 50, cultivar = amethyst, maxcover=1.0, budNumber=1
      fertiliser
      irrigation
      manager output titles
        ExpCode = W92N1A  # Experimental code
        Site = windridge  # experimental site name
        Season = -Y1992  # calander year or years data is from
        Treatment1 = Amethyst  # treatment type
        on start_of_day:
```
Expcode='[ExpCode]'
     Site='[Site]'
     Season='[Season]'
     Treatment='[Treatment1]'
```
      manager Harvesting rule
        # Harvesting criteria
        crop = chickpea2  # Enter name of crop to harvest when ripe
        on end_of_day:
        script: same as in APS2CPE.paddock.Harvesting rule
      soil
        InitWater Initial water
          PercentMethod: Percent=1.00; Distributed=Evenly distributed
        Water
          Layer:
            Thickness (mm)  BD (g/cc)  AirDry (mm/mm)  LL15 (mm/mm)  DUL (mm/mm)  SAT (mm/mm)
            150.0           1.30       0.1             0.2           0.38         0.43
            150.0           1.40       0.2             0.2           0.38         0.43
            300.0           1.40       0.2             0.2           0.38         0.43
            300.0           1.40       0.2             0.2           0.37         0.42
            300.0           1.40       0.2             0.2           0.35         0.40
            300.0           1.40       0.2             0.2           0.35         0.40
          SoilCrop chickpea2
            Layer:
              Thickness (mm)  LL (mm/mm)  KL (/day)  XF (0-1)
              150.0           0.2         0.06       1.00
              150.0           0.22        0.06       1.00
              300.0           0.23        0.06       1.00
              300.0           0.25        0.05       1.00
              300.0           0.28        0.04       1.00
              300.0           0.30        0.02       1.00
        SoilWat: SummerCona=2.0; SummerU=6.0; SummerDate=1-Nov; WinterCona=2.0; WinterU=6.0; WinterDate=1-Apr; DiffusConst=88.0; DiffusSlope=35.4; Salb=0.13; Cn2Bare=72.0; CnRed=20.0; CnCov=0.8
          Layer:
            Thickness (mm)  SWCON (0-1)
            150.0           0.50
            150.0           0.50
            300.0           0.50
            300.0           0.50
            300.0           0.50
            300.0           0.50
        SoilOrganicMatter: RootCn=40.0; RootWt=100.0; SoilCn=15.86; EnrACoeff=7.4; EnrBCoeff=0.2
          Layer:
            Thickness (mm)  OC (Total %)  FBiom (0-1)  FInert (0-1)
            150.0           1.43          0.03         0.4
            150.0           0.91          0.02         0.4
            300.0           0.65          0.01         0.6
            300.0           0.26          0.01         0.8
            300.0           0.13          0.01         0.96
            300.0           0.10          0.01         0.96
        Analysis
          Layer:
            Thickness (mm)  PH (1:5 water)
            150.0           7.62
            150.0           7.62
            300.0           7.62
            300.0           7.62
            300.0           7.62
            300.0           7.62
        Sample Initial nitrogen
          Layer:
            Thickness (mm)  NO3 (ppm)  NH4 (ppm)
            150.0           14.4       0.01
            150.0           6.58       0.01
            300.0           2.45       0.01
            300.0           1.08       0.01
            300.0           0.15       0.01
            300.0           0.83       0.01
      surfaceom
        PoolName = unknown  # Organic Matter pool name
        type = wheat  # Organic Matter type
        mass = 0  # Initial surface residue (kg/ha)
        cnr = 10  # C:N ratio of initial residue
        standing_fraction = 0  # Fraction of residue standing
      chickpea2
  simulation W92N2A
    clock: start_date=29/4/1992; end_date=25/12/1992
    summaryfile
    metfile met: filename=%apsim%\Tests\Validation\Chickpea2\met\Windr.met
    area paddock: text=/>
      micromet: soilalbedo=0.23; a_interception=0.0; b_interception=0.0; c_interception=0.0; d_interception=0.0
      outputfile: filename=W92N2A.out; title=W92N2A
        variables
          variables: day, Expcode as Title, Site, Season, Treatment, dd/mm/yyyy as Date, sw_dep, sw_dep(), ll15_dep, AboveGroundWt, GrainLiveWt, RootDepth, StageCodeValue, LeafPhotosynthesisFtValue, LeafPhotosynthesisFvpdValue, LeafFw, LeafLAI, StemLiveWt, LeafLiveWt, PodLiveWt
        events: event=end_day
      operations
        7/05/1992  'soil water' set sw =  0.324 0.338 0.332 0.307 0.292 0.292
        7/05/1992  chickpea2 sow population = 40, Depth= 50, cultivar = amethyst, maxcover=1.0, budNumber=1
        7/05/1992  'soil nitrogen' set no3ppm = 25.78 12.61 8.93 5.12 11.76 11.76
        7/05/1992  fertiliser apply amount =  40 (kg/ha), depth=10(mm), type=nh4no3()
      fertiliser
      irrigation
      manager output titles
        ExpCode = W92N2A  # Experimental code
        Site = windridge  # experimental site name
        Season = -Y1992  # calander year or years data is from
        Treatment1 = Amethyst  # treatment type
        on start_of_day:
```
Expcode='[ExpCode]'
     Site='[Site]'
     Season='[Season]'
     Treatment='[Treatment1]'
```
      soil: same as W92N1A.paddock.soil
      surfaceom
        PoolName = unknown  # Organic Matter pool name
        type = wheat  # Organic Matter type
        mass = 0.0  # Initial surface residue (kg/ha)
        cnr = 10.0  # C:N ratio of initial residue
        standing_fraction = 0.0  # Fraction of residue standing
      chickpea2
      manager Harvesting rule
        # Harvesting criteria
        crop = chickpea2  # Enter name of crop to harvest when ripe
        on end_of_day:
        script: same as in APS2CPE.paddock.Harvesting rule
  simulation W92N3A
    clock: start_date=29/4/1992; end_date=25/12/1992
    summaryfile
    metfile met: filename=%apsim%\Tests\Validation\Chickpea2\met\Windr.met
    area paddock: text=/>
      micromet: soilalbedo=0.23; a_interception=0.0; b_interception=0.0; c_interception=0.0; d_interception=0.0
      outputfile: filename=W92N3A.out; title=W92N3A
        variables
          variables: day, Expcode as Title, Site, Season, Treatment, dd/mm/yyyy as Date, sw_dep, sw_dep(), ll15_dep, AboveGroundWt, GrainLiveWt, RootDepth, StageCodeValue, LeafPhotosynthesisFtValue, LeafPhotosynthesisFvpdValue, LeafFw, LeafLAI, StemLiveWt, LeafLiveWt, PodLiveWt
        events: event=end_day
      operations
        7/05/1992  'soil water' set sw = 0.345 0.375 0.354 0.302 0.297 0.297
        7/05/1992  'soil Nitrogen' set no3ppm = 16.16 10.57 8.82 3.63 7.82 7.82
        7/05/1992  fertiliser apply amount = 80 (kg/ha), depth=10(mm), type=nh4no3
        7/05/1992  chickpea2 sow population = 40, Depth= 50, cultivar = amethyst, maxcover=1.0, budNumber=1
      fertiliser
      irrigation
      manager output titles
        ExpCode = W92N2A  # Experimental code
        Site = windridge  # experimental site name
        Season = -Y1992  # calander year or years data is from
        Treatment1 = Amethyst  # treatment type
        on start_of_day:
```
Expcode='[ExpCode]'
     Site='[Site]'
     Season='[Season]'
     Treatment='[Treatment1]'
```
      soil
        Water: same as W92N1A.paddock.soil.Water
        SoilWat: same as W92N1A.paddock.soil.SoilWat
        SoilOrganicMatter: same as W92N1A.paddock.soil.SoilOrganicMatter
        Analysis: same as W92N1A.paddock.soil.Analysis
        Sample Initial nitrogen: same as W92N1A.paddock.soil.Initial nitrogen
        Sample Initial water
          Layer:
            Thickness (mm)  SW (mm/mm)
            150.0           0.40
            150.0           0.40
            300.0           0.40
            300.0           0.40
            300.0           0.40
            300.0           0.40
      surfaceom
        PoolName = unknown  # Organic Matter pool name
        type = wheat  # Organic Matter type
        mass = 0.0  # Initial surface residue (kg/ha)
        cnr = 10.0  # C:N ratio of initial residue
        standing_fraction = 0.0  # Fraction of residue standing
      chickpea2
      manager Harvesting rule
        # Harvesting criteria
        crop = chickpea2  # Enter name of crop to harvest when ripe
        on end_of_day:
        script: same as in APS2CPE.paddock.Harvesting rule
  simulation W92N4A
    clock: start_date=29/4/1992; end_date=25/12/1992
    summaryfile
    metfile met: filename=%apsim%\Tests\Validation\Chickpea2\met\Windr.met
    area paddock: text=/>
      micromet: soilalbedo=0.23; a_interception=0.0; b_interception=0.0; c_interception=0.0; d_interception=0.0
      outputfile: filename=W92N4A.out; title=W92N4A
        variables
          variables: day, Expcode as Title, Site, Season, Treatment, dd/mm/yyyy as Date, sw_dep, sw_dep(), ll15_dep, AboveGroundWt, GrainLiveWt, RootDepth, StageCodeValue, LeafPhotosynthesisFtValue, LeafPhotosynthesisFvpdValue, LeafFw, LeafLAI, StemLiveWt, LeafLiveWt, PodLiveWt
        events: event=end_day
      operations
        7/05/1992  'soil water' set sw = 0.305 0.344 0.303 0.278 0.300 0.300
        7/05/1992  'soil Nitrogen' set no3ppm = 22.29 9.58 6.72 4.36 8.01 8.01
        7/05/1992  fertiliser apply amount = 120 (kg/ha), depth=10(mm), type=nh4no3
        7/05/1992  chickpea2 sow population = 40, Depth= 50, cultivar = amethyst, maxcover=1.0, budNumber=1
      fertiliser
      irrigation
      manager output titles
        ExpCode = W92N4A  # Experimental code
        Site = windridge  # experimental site name
        Season = -Y1992  # calander year or years data is from
        Treatment1 = Amethyst  # treatment type
        on start_of_day:
```
Expcode='[ExpCode]'
     Site='[Site]'
     Season='[Season]'
     Treatment='[Treatment1]'
```
      soil: same as W92N3A.paddock.soil
      surfaceom
        PoolName = unknown  # Organic Matter pool name
        type = wheat  # Organic Matter type
        mass = 0.0  # Initial surface residue (kg/ha)
        cnr = 10.0  # C:N ratio of initial residue
        standing_fraction = 0.0  # Fraction of residue standing
      chickpea2
      manager Harvesting rule
        # Harvesting criteria
        crop = chickpea2  # Enter name of crop to harvest when ripe
        on end_of_day:
        script: same as in APS2CPE.paddock.Harvesting rule
  simulation W92N5A
    clock: start_date=29/4/1992; end_date=25/12/1992
    summaryfile
    metfile met: filename=%apsim%\Tests\Validation\Chickpea2\met\Windr.met
    area paddock: text=/>
      micromet: soilalbedo=0.23; a_interception=0.0; b_interception=0.0; c_interception=0.0; d_interception=0.0
      outputfile: filename=W92N5A.out; title=W92N5A
        variables
          variables: day, Expcode as Title, Site, Season, Treatment, dd/mm/yyyy as Date, sw_dep, sw_dep(), ll15_dep, AboveGroundWt, GrainLiveWt, RootDepth, StageCodeValue, LeafPhotosynthesisFtValue, LeafPhotosynthesisFvpdValue, LeafFw, LeafLAI, StemLiveWt, LeafLiveWt, PodLiveWt
        events: event=end_day
      operations
        7/05/1992  'soil water' set sw = 0.326 0.343 0.298 0.262 0.294 0.294
        7/05/1992  'soil Nitrogen' set no3ppm = 21.52 12.31 8.10 4.78 10.74 10.74
        7/05/1992  fertiliser apply amount = 160 (kg/ha), depth=10(mm), type=nh4no3
        7/05/1992  chickpea2 sow population = 40, Depth= 50, cultivar = amethyst, maxcover=1.0, budNumber=1
      fertiliser
      irrigation
      manager output titles
        ExpCode = W92N5A  # Experimental code
        Site = windridge  # experimental site name
        Season = -Y1992  # calander year or years data is from
        Treatment1 = Amethyst  # treatment type
        on start_of_day:
```
Expcode='[ExpCode]'
     Site='[Site]'
     Season='[Season]'
     Treatment='[Treatment1]'
```
      soil: same as W92N3A.paddock.soil
      surfaceom
        PoolName = unknown  # Organic Matter pool name
        type = wheat  # Organic Matter type
        mass = 0.0  # Initial surface residue (kg/ha)
        cnr = 10.0  # C:N ratio of initial residue
        standing_fraction = 0.0  # Fraction of residue standing
      chickpea2
      manager Harvesting rule
        # Harvesting criteria
        crop = chickpea2  # Enter name of crop to harvest when ripe
        on end_of_day:
        script: same as in APS2CPE.paddock.Harvesting rule
  simulation W92N6A
    clock: start_date=29/4/1992; end_date=25/12/1992
    summaryfile
    metfile met: filename=%apsim%\Tests\Validation\Chickpea2\met\Windr.met
    area paddock: text=/>
      micromet: soilalbedo=0.23; a_interception=0.0; b_interception=0.0; c_interception=0.0; d_interception=0.0
      outputfile: filename=W92N6A.out; title=W92N6A
        variables
          variables: day, Expcode as Title, Site, Season, Treatment, dd/mm/yyyy as Date, sw_dep, sw_dep(), ll15_dep, AboveGroundWt, GrainLiveWt, RootDepth, StageCodeValue, LeafPhotosynthesisFtValue, LeafPhotosynthesisFvpdValue, LeafFw, LeafLAI, StemLiveWt, LeafLiveWt, PodLiveWt
        events: event=end_day
      operations
        7/05/1992  'soil water' set sw = 0.315 0.346 0.312 0.268 0.293 0.293
        7/05/1992  'soil Nitrogen' set no3ppm = 30.61 11.40 9.06 3.03 9.6 9.6
        7/05/1992  fertiliser apply amount = 200 (kg/ha), depth=10(mm), type=nh4no3
        7/05/1992  chickpea2 sow population = 40, Depth= 50, cultivar = amethyst, maxcover=1.0, budNumber=1
      fertiliser
      irrigation
      manager output titles
        ExpCode = W92N6A  # Experimental code
        Site = windridge  # experimental site name
        Season = -Y1992  # calander year or years data is from
        Treatment1 = Amethyst  # treatment type
        on start_of_day:
```
Expcode='[ExpCode]'
     Site='[Site]'
     Season='[Season]'
     Treatment='[Treatment1]'
```
      soil: same as W92N3A.paddock.soil
      surfaceom
        PoolName = unknown  # Organic Matter pool name
        type = wheat  # Organic Matter type
        mass = 0.0  # Initial surface residue (kg/ha)
        cnr = 10.0  # C:N ratio of initial residue
        standing_fraction = 0.0  # Fraction of residue standing
      chickpea2
      manager Harvesting rule
        # Harvesting criteria
        crop = chickpea2  # Enter name of crop to harvest when ripe
        on end_of_day:
        script: same as in APS2CPE.paddock.Harvesting rule
  simulation APS36d
    clock: start_date=13/5/1997; end_date=31/12/1997
    summaryfile
    metfile met: filename=%apsim%\Tests\Validation\Chickpea2\met\Gatton97.met
    area paddock: text=/>
      micromet: soilalbedo=0.23; a_interception=0.0; b_interception=0.0; c_interception=0.0; d_interception=0.0
      outputfile: filename=APS36d.out; title=APS36d
        variables
          variables: day, Expcode as Title, Site, Season, Treatment, dd/mm/yyyy as Date, sw_dep, sw_dep(), ll15_dep, AboveGroundWt, GrainLiveWt, RootDepth, StageCodeValue, LeafPhotosynthesisFtValue, LeafPhotosynthesisFvpdValue, LeafFw, LeafLAI, StemLiveWt, LeafLiveWt, PodLiveWt
        events: event=end_day
      operations
        14/05/1997  'soil water' set sw = 0.277 0.345 0.340 0.279 0.308 0.306 0.258 0.300
        14/05/1997  'soil Nitrogen' set no3ppm = 30.03 10.83 4.07 2.00 1.03 0.93 0.35 0.00
        21/05/1997  chickpea2 sow population = 45.0, Depth= 50, cultivar = amethyst, maxcover=1.0, budNumber=1
        22/05/1997  irrigation apply amount = 5
        29/05/1997  irrigation apply amount = 10
        02/06/1997  irrigation apply amount = 5
        11/06/1997  irrigation apply amount = 12
        19/06/1997  irrigation apply amount = 5
        24/06/1997  irrigation apply amount = 15
      fertiliser
      irrigation
      manager output titles
        ExpCode = APS36d  # Experimental code
        Site = aps  # experimental site name
        Season = -Y1997  # calander year or years data is from
        Treatment1 = Amethyst  # treatment type
        on start_of_day:
```
Expcode='[ExpCode]'
     Site='[Site]'
     Season='[Season]'
     Treatment='[Treatment1]'
```
      soil: same as APS2CPL.paddock.soil
      surfaceom
        PoolName = unknown  # Organic Matter pool name
        type = wheat  # Organic Matter type
        mass = 0.0  # Initial surface residue (kg/ha)
        cnr = 0.0  # C:N ratio of initial residue
        standing_fraction = 0.0  # Fraction of residue standing
      chickpea2
      manager Harvesting rule
        # Harvesting criteria
        crop = chickpea2  # Enter name of crop to harvest when ripe
        on end_of_day:
        script: same as in APS2CPE.paddock.Harvesting rule
  simulation APS36i
    clock: start_date=13/5/1997; end_date=31/12/1997
    summaryfile
    metfile met: filename=%apsim%\Tests\Validation\Chickpea2\met\Gatton97.met
    area paddock: text=/>
      micromet: soilalbedo=0.23; a_interception=0.0; b_interception=0.0; c_interception=0.0; d_interception=0.0
      outputfile: filename=APS36i.out; title=APS36i
        variables
          variables: day, Expcode as Title, Site, Season, Treatment, dd/mm/yyyy as Date, sw_dep, sw_dep(), ll15_dep, AboveGroundWt, GrainLiveWt, RootDepth, StageCodeValue, LeafPhotosynthesisFtValue, LeafPhotosynthesisFvpdValue, LeafFw, LeafLAI, StemLiveWt, LeafLiveWt, PodLiveWt
        events: event=end_day
      operations
        14/05/1997  'soil water' set sw = 0.288 0.372 0.403 0.327 0.332 0.292 0.274 0.300
        14/05/1997  'soil Nitrogen' set no3ppm = 17.47 15.70 6.37 1.47 0.67 0.47 0.43 0.00
        21/05/1997  chickpea2 sow population = 45.0, Depth= 50, cultivar = amethyst, maxcover=1.0, budNumber=1
        22/05/1997  irrigation apply amount = 5
        29/05/1997  irrigation apply amount = 10
        02/06/1997  irrigation apply amount = 5
        11/06/1997  irrigation apply amount = 12
        19/06/1997  irrigation apply amount = 5
        24/06/1997  irrigation apply amount = 15
        23/07/1997  irrigation apply amount = 18
        01/08/1997  irrigation apply amount = 38
        15/08/1997  irrigation apply amount = 53
        28/08/1997  irrigation apply amount = 35
        11/09/1997  irrigation apply amount = 33
        18/09/1997  irrigation apply amount = 15
        19/09/1997  irrigation apply amount = 15
      fertiliser
      irrigation
      manager output titles
        ExpCode = APS36i  # Experimental code
        Site = aps  # experimental site name
        Season = -Y1992  # calander year or years data is from
        Treatment1 = Amethyst  # treatment type
        on start_of_day:
```
Expcode='[ExpCode]'
     Site='[Site]'
     Season='[Season]'
     Treatment='[Treatment1]'
```
      soil: same as APS2CPL.paddock.soil
      surfaceom
        PoolName = unknown  # Organic Matter pool name
        type = wheat  # Organic Matter type
        mass = 0.0  # Initial surface residue (kg/ha)
        cnr = 0.0  # C:N ratio of initial residue
        standing_fraction = 0.0  # Fraction of residue standing
      chickpea2
      manager Harvesting rule
        # Harvesting criteria
        crop = chickpea2  # Enter name of crop to harvest when ripe
        on end_of_day:
        script: same as in APS2CPE.paddock.Harvesting rule
  simulation APS36p
    clock: start_date=13/5/1997; end_date=31/12/1997
    summaryfile
    metfile met: filename=%apsim%\Tests\Validation\Chickpea2\met\Gatton97.met
    area paddock: text=/>
      micromet: soilalbedo=0.23; a_interception=0.0; b_interception=0.0; c_interception=0.0; d_interception=0.0
      outputfile: filename=APS36p.out; title=APS36p
        variables
          variables: day, Expcode as Title, Site, Season, Treatment, dd/mm/yyyy as Date, sw_dep, sw_dep(), ll15_dep, AboveGroundWt, GrainLiveWt, RootDepth, StageCodeValue, LeafPhotosynthesisFtValue, LeafPhotosynthesisFvpdValue, LeafFw, LeafLAI, StemLiveWt, LeafLiveWt, PodLiveWt
        events: event=end_day
      operations
        14/05/1997  'soil water' set sw = 0.281 0.350 0.318 0.348 0.358 0.285 0.272 0.300
        14/05/1997  'soil Nitrogen' set no3ppm = 8.53 8.13 3.13 1.70 0.97 0.60 0.67 0.00
        21/05/1997  chickpea2 sow population = 45.0, Depth= 50, cultivar = amethyst, maxcover=1.0, budNumber=1
        22/05/1997  irrigation apply amount = 5
        29/05/1997  irrigation apply amount = 10
        02/06/1997  irrigation apply amount = 5
        11/06/1997  irrigation apply amount = 12
        19/06/1997  irrigation apply amount = 5
        24/06/1997  irrigation apply amount = 15
        18/09/1997  irrigation apply amount = 15
      fertiliser
      irrigation
      manager output titles
        ExpCode = APS36p  # Experimental code
        Site = aps  # experimental site name
        Season = -Y1997  # calander year or years data is from
        Treatment1 = Amethyst  # treatment type
        on start_of_day:
```
Expcode='[ExpCode]'
     Site='[Site]'
     Season='[Season]'
     Treatment='[Treatment1]'
```
      soil: same as APS2CPL.paddock.soil
      surfaceom
        PoolName = unknown  # Organic Matter pool name
        type = wheat  # Organic Matter type
        mass = 0.0  # Initial surface residue (kg/ha)
        cnr = 0.0  # C:N ratio of initial residue
        standing_fraction = 0.0  # Fraction of residue standing
      chickpea2
      manager Harvesting rule
        # Harvesting criteria
        crop = chickpea2  # Enter name of crop to harvest when ripe
        on end_of_day:
        script: same as in APS2CPE.paddock.Harvesting rule
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