folder Simulations: version=36
  folder Plots
    RGraphics Flowering DAS x site
```r
# Make some plots
library(dplyr)
library(ggplot2)
library(gridExtra)
library(grid)

options(stringsAsFactors = F)

#### Cultivar groups
groups<- list()
groups[["early"]] <- c("HallmarkXT", "Bolt")
groups[["mid"]] <- c("Blitz", "Jumbo2")
groups[["late"]] <- c("Nugget", "Digger", "Greenfield", "Northfield")

# Generic function to read apsim output files. 
read.apsim <- function(apsim.name) {
  header<-readLines(apsim.name, n=25)
  if (length(header) == 0 ) {return(NULL)}
  i<-3  # 4th line
  apsim <- read.table(apsim.name,skip=i+1,na.strings=c("NA","?"))
  names(apsim) <- unlist(strsplit(trimws(header[i]), " +"))  
#  cat(apsim.name, " = ", ncol(apsim), "\n")
  return(cbind(filename=apsim.name, apsim))
}

capitalise <- function(x) {
  s <- strsplit(x, " ")[[1]]
  paste(toupper(substring(s, 1,1)), tolower(substring(s, 2)),
        sep="", collapse=" ")
}

df.pred<- do.call(rbind, lapply(list.files(pattern="^.*Harvest\\.out$"), read.apsim))
df.pred$SimulationName<- tolower(sapply(strsplit(df.pred$filename, " "), function (x) {return(x[1])}))
df.pred$TOS <- toupper(df.pred$TOS)
df.pred$site <- sapply(df.pred$site, capitalise)
df.pred$cultivar <- sapply(df.pred$cultivar, capitalise)
df.pred<- df.pred[,c("SimulationName", "site", "TOS", "cultivar", "FloweringDAS", "MaturityDAS", "biomass", "yield", "MaxLAI")]

df.obs<-  read.csv("Lentil auto observed.csv")
df.obs$SimulationName<- tolower(df.obs$SimulationName)
df.obs$cultivar <- sapply(df.obs$cultivar, capitalise)
df.obs$site <- sapply(df.obs$site, capitalise)

df <- df.obs %>% left_join(df.pred[,!names(df.pred) %in% c("site", "TOS", "cultivar")], 
                           by=c("SimulationName"), 
                           suffix = c(".obs", ".pred"))

jpeg(imageFileName, width=width, height=height)
g<-ggplot(df[!is.na(df$FloweringDAS.obs),]) + geom_point(aes(x=FloweringDAS.obs, y=FloweringDAS.pred, color=site)) + 
    scale_x_continuous(limits=range(na.omit(c(df$FloweringDAS.obs, df$FloweringDAS.pred)))) +
    scale_y_continuous(limits=range(na.omit(c(df$FloweringDAS.obs, df$FloweringDAS.pred)))) +
  labs(title="Flowering DAS", x="Observed", y = "Predicted") +
  geom_abline(intercept=0, colour="grey") + theme_minimal()
  
print(g)
dev.off()
```
    RGraphics Flowering DAS x cultivar
```r
# Make some plots
library(dplyr)
library(ggplot2)
library(gridExtra)
library(grid)

options(stringsAsFactors = F)

#### Cultivar groups
groups<- list()
groups[["early"]] <- c("HallmarkXT", "Bolt")
groups[["mid"]] <- c("Blitz", "Jumbo2")
groups[["late"]] <- c("Nugget", "Digger", "Greenfield", "Northfield")

# Generic function to read apsim output files. 
read.apsim <- function(apsim.name) {
  header<-readLines(apsim.name, n=25)
  if (length(header) == 0 ) {return(NULL)}
  i<-3  # 4th line
  apsim <- read.table(apsim.name,skip=i+1,na.strings=c("NA","?"))
  names(apsim) <- unlist(strsplit(trimws(header[i]), " +"))  
#  cat(apsim.name, " = ", ncol(apsim), "\n")
  return(cbind(filename=apsim.name, apsim))
}

capitalise <- function(x) {
  s <- strsplit(x, " ")[[1]]
  paste(toupper(substring(s, 1,1)), tolower(substring(s, 2)),
        sep="", collapse=" ")
}

df.pred<- do.call(rbind, lapply(list.files(pattern="^.*Harvest\\.out$"), read.apsim))
df.pred$SimulationName<- tolower(sapply(strsplit(df.pred$filename, " "), function (x) {return(x[1])}))
df.pred$TOS <- toupper(df.pred$TOS)
df.pred$site <- sapply(df.pred$site, capitalise)
df.pred$cultivar <- sapply(df.pred$cultivar, capitalise)
df.pred<- df.pred[,c("SimulationName", "site", "TOS", "cultivar", "FloweringDAS", "MaturityDAS", "biomass", "yield", "MaxLAI")]

df.obs<-  read.csv("Lentil auto observed.csv")
df.obs$SimulationName<- tolower(df.obs$SimulationName)
df.obs$cultivar <- sapply(df.obs$cultivar, capitalise)
df.obs$site <- sapply(df.obs$site, capitalise)

df <- df.obs %>% left_join(df.pred[,!names(df.pred) %in% c("site", "TOS", "cultivar")], 
                           by=c("SimulationName"), 
                           suffix = c(".obs", ".pred"))

jpeg(imageFileName, width=width, height=height)
g<-ggplot(df[!is.na(df$FloweringDAS.obs),]) + geom_point(aes(x=FloweringDAS.obs, y=FloweringDAS.pred, color=cultivar)) + 
    scale_x_continuous(limits=range(na.omit(c(df$FloweringDAS.obs, df$FloweringDAS.pred)))) +
    scale_y_continuous(limits=range(na.omit(c(df$FloweringDAS.obs, df$FloweringDAS.pred)))) +
  labs(title="Flowering DAS", x="Observed", y = "Predicted") +
  geom_abline(intercept=0, colour="grey") + theme_minimal()
  
print(g)
dev.off()
```
    RGraphics Maturity DAS x site
```r
# Make some plots
library(dplyr)
library(ggplot2)
library(gridExtra)
library(grid)

options(stringsAsFactors = F)

#### Cultivar groups
groups<- list()
groups[["early"]] <- c("HallmarkXT", "Bolt")
groups[["mid"]] <- c("Blitz", "Jumbo2")
groups[["late"]] <- c("Nugget", "Digger", "Greenfield", "Northfield")

# Generic function to read apsim output files. 
read.apsim <- function(apsim.name) {
  header<-readLines(apsim.name, n=25)
  if (length(header) == 0 ) {return(NULL)}
  i<-3  # 4th line
  apsim <- read.table(apsim.name,skip=i+1,na.strings=c("NA","?"))
  names(apsim) <- unlist(strsplit(trimws(header[i]), " +"))  
#  cat(apsim.name, " = ", ncol(apsim), "\n")
  return(cbind(filename=apsim.name, apsim))
}

capitalise <- function(x) {
  s <- strsplit(x, " ")[[1]]
  paste(toupper(substring(s, 1,1)), tolower(substring(s, 2)),
        sep="", collapse=" ")
}

df.pred<- do.call(rbind, lapply(list.files(pattern="^.*Harvest\\.out$"), read.apsim))
df.pred$SimulationName<- tolower(sapply(strsplit(df.pred$filename, " "), function (x) {return(x[1])}))
df.pred$TOS <- toupper(df.pred$TOS)
df.pred$site <- sapply(df.pred$site, capitalise)
df.pred$cultivar <- sapply(df.pred$cultivar, capitalise)
df.pred<- df.pred[,c("SimulationName", "site", "TOS", "cultivar", "FloweringDAS", "MaturityDAS", "biomass", "yield", "MaxLAI")]

df.obs<-  read.csv("Lentil auto observed.csv")
df.obs$SimulationName<- tolower(df.obs$SimulationName)
df.obs$cultivar <- sapply(df.obs$cultivar, capitalise)
df.obs$site <- sapply(df.obs$site, capitalise)

df <- df.obs %>% left_join(df.pred[,!names(df.pred) %in% c("site", "TOS", "cultivar")], 
                           by=c("SimulationName"), 
                           suffix = c(".obs", ".pred"))

jpeg(imageFileName, width=width, height=height)
g<-ggplot(df[!is.na(df$MaturityDAS.obs),]) + geom_point(aes(x=MaturityDAS.obs, y=MaturityDAS.pred, color=site)) + 
  scale_x_continuous(limits=range(na.omit(c(df$MaturityDAS.obs, df$MaturityDAS.pred)))) +
  scale_y_continuous(limits=range(na.omit(c(df$MaturityDAS.obs, df$MaturityDAS.pred)))) +
  labs(title="Maturity DAS", x="Observed", y = "Predicted") +
  geom_abline(intercept=0, colour="grey") +
  theme_minimal()
    
print(g)
dev.off()
```
    RGraphics Maturity DAS x cultivar
```r
# Make some plots
library(dplyr)
library(ggplot2)
library(gridExtra)
library(grid)

options(stringsAsFactors = F)

#### Cultivar groups
groups<- list()
groups[["early"]] <- c("HallmarkXT", "Bolt")
groups[["mid"]] <- c("Blitz", "Jumbo2")
groups[["late"]] <- c("Nugget", "Digger", "Greenfield", "Northfield")

# Generic function to read apsim output files. 
read.apsim <- function(apsim.name) {
  header<-readLines(apsim.name, n=25)
  if (length(header) == 0 ) {return(NULL)}
  i<-3  # 4th line
  apsim <- read.table(apsim.name,skip=i+1,na.strings=c("NA","?"))
  names(apsim) <- unlist(strsplit(trimws(header[i]), " +"))  
#  cat(apsim.name, " = ", ncol(apsim), "\n")
  return(cbind(filename=apsim.name, apsim))
}

capitalise <- function(x) {
  s <- strsplit(x, " ")[[1]]
  paste(toupper(substring(s, 1,1)), tolower(substring(s, 2)),
        sep="", collapse=" ")
}

df.pred<- do.call(rbind, lapply(list.files(pattern="^.*Harvest\\.out$"), read.apsim))
df.pred$SimulationName<- tolower(sapply(strsplit(df.pred$filename, " "), function (x) {return(x[1])}))
df.pred$TOS <- toupper(df.pred$TOS)
df.pred$site <- sapply(df.pred$site, capitalise)
df.pred$cultivar <- sapply(df.pred$cultivar, capitalise)
df.pred<- df.pred[,c("SimulationName", "site", "TOS", "cultivar", "FloweringDAS", "MaturityDAS", "biomass", "yield", "MaxLAI")]

df.obs<-  read.csv("Lentil auto observed.csv")
df.obs$SimulationName<- tolower(df.obs$SimulationName)
df.obs$cultivar <- sapply(df.obs$cultivar, capitalise)
df.obs$site <- sapply(df.obs$site, capitalise)

df <- df.obs %>% left_join(df.pred[,!names(df.pred) %in% c("site", "TOS", "cultivar")], 
                           by=c("SimulationName"), 
                           suffix = c(".obs", ".pred"))

jpeg(imageFileName, width=width, height=height)
g<-ggplot(df[!is.na(df$MaturityDAS.obs),]) + geom_point(aes(x=MaturityDAS.obs, y=MaturityDAS.pred, color=cultivar)) + 
  scale_x_continuous(limits=range(na.omit(c(df$MaturityDAS.obs, df$MaturityDAS.pred)))) +
  scale_y_continuous(limits=range(na.omit(c(df$MaturityDAS.obs, df$MaturityDAS.pred)))) +
  labs(title="Maturity DAS", x="Observed", y = "Predicted") +
  geom_abline(intercept=0, colour="grey") +
  theme_minimal()
    
print(g)
dev.off()
```
    RGraphics Harvest biomass
```r
# Make some plots
library(dplyr)
library(ggplot2)
library(gridExtra)
library(grid)

options(stringsAsFactors = F)

#### Cultivar groups
groups<- list()
groups[["early"]] <- c("HallmarkXT", "Bolt")
groups[["mid"]] <- c("Blitz", "Jumbo2")
groups[["late"]] <- c("Nugget", "Digger", "Greenfield", "Northfield")

# Generic function to read apsim output files. 
read.apsim <- function(apsim.name) {
  header<-readLines(apsim.name, n=25)
  if (length(header) == 0 ) {return(NULL)}
  i<-3  # 4th line
  apsim <- read.table(apsim.name,skip=i+1,na.strings=c("NA","?"))
  names(apsim) <- unlist(strsplit(trimws(header[i]), " +"))  
#  cat(apsim.name, " = ", ncol(apsim), "\n")
  return(cbind(filename=apsim.name, apsim))
}

capitalise <- function(x) {
  s <- strsplit(x, " ")[[1]]
  paste(toupper(substring(s, 1,1)), tolower(substring(s, 2)),
        sep="", collapse=" ")
}

df.pred<- do.call(rbind, lapply(list.files(pattern="^.*Harvest\\.out$"), read.apsim))
df.pred$SimulationName<- tolower(sapply(strsplit(df.pred$filename, " "), function (x) {return(x[1])}))
df.pred$TOS <- toupper(df.pred$TOS)
df.pred$site <- sapply(df.pred$site, capitalise)
df.pred$cultivar <- sapply(df.pred$cultivar, capitalise)
df.pred<- df.pred[,c("SimulationName", "site", "TOS", "cultivar", "FloweringDAS", "MaturityDAS", "biomass", "yield", "MaxLAI")]

df.obs<-  read.csv("Lentil auto observed.csv")
df.obs$SimulationName<- tolower(df.obs$SimulationName)
df.obs$cultivar <- sapply(df.obs$cultivar, capitalise)
df.obs$site <- sapply(df.obs$site, capitalise)

df <- df.obs %>% left_join(df.pred[,!names(df.pred) %in% c("site", "TOS", "cultivar")], 
                           by=c("SimulationName"), 
                           suffix = c(".obs", ".pred"))

jpeg(imageFileName, width=width, height=height)
g<-ggplot(df[!is.na(df$biomass.obs),]) + geom_point(aes(x=biomass.obs, y=biomass.pred, color=cultivar)) + 
  scale_x_continuous(limits=range(na.omit(c(df$biomass.obs, df$biomass.pred)))) +
  scale_y_continuous(limits=range(na.omit(c(df$biomass.obs, df$biomass.pred)))) +
  labs(title="Biomass (kg/ha)", x="Observed", y = "Predicted") +
  geom_abline(intercept=0, colour="grey") + facet_wrap(~site) +
  theme_minimal()

print(g)
dev.off()
```
    RGraphics Harvest yield
```r
# Make some plots
library(dplyr)
library(ggplot2)
library(gridExtra)
library(grid)

options(stringsAsFactors = F)

#### Cultivar groups
groups<- list()
groups[["early"]] <- c("HallmarkXT", "Bolt")
groups[["mid"]] <- c("Blitz", "Jumbo2")
groups[["late"]] <- c("Nugget", "Digger", "Greenfield", "Northfield")

# Generic function to read apsim output files. 
read.apsim <- function(apsim.name) {
  header<-readLines(apsim.name, n=25)
  if (length(header) == 0 ) {return(NULL)}
  i<-3  # 4th line
  apsim <- read.table(apsim.name,skip=i+1,na.strings=c("NA","?"))
  names(apsim) <- unlist(strsplit(trimws(header[i]), " +"))  
#  cat(apsim.name, " = ", ncol(apsim), "\n")
  return(cbind(filename=apsim.name, apsim))
}

capitalise <- function(x) {
  s <- strsplit(x, " ")[[1]]
  paste(toupper(substring(s, 1,1)), tolower(substring(s, 2)),
        sep="", collapse=" ")
}

df.pred<- do.call(rbind, lapply(list.files(pattern="^.*Harvest\\.out$"), read.apsim))
df.pred$SimulationName<- tolower(sapply(strsplit(df.pred$filename, " "), function (x) {return(x[1])}))
df.pred$TOS <- toupper(df.pred$TOS)
df.pred$site <- sapply(df.pred$site, capitalise)
df.pred$cultivar <- sapply(df.pred$cultivar, capitalise)
df.pred<- df.pred[,c("SimulationName", "site", "TOS", "cultivar", "FloweringDAS", "MaturityDAS", "biomass", "yield", "MaxLAI")]

df.obs<-  read.csv("Lentil auto observed.csv")
df.obs$SimulationName<- tolower(df.obs$SimulationName)
df.obs$cultivar <- sapply(df.obs$cultivar, capitalise)
df.obs$site <- sapply(df.obs$site, capitalise)

df <- df.obs %>% left_join(df.pred[,!names(df.pred) %in% c("site", "TOS", "cultivar")], 
                           by=c("SimulationName"), 
                           suffix = c(".obs", ".pred"))

jpeg(imageFileName, width=width, height=height)
g<-ggplot(df[!is.na(df$yield.obs),]) + geom_point(aes(x=yield.obs, y=yield.pred, color=cultivar)) + 
  scale_x_continuous(limits=range(na.omit(c(df$yield.obs, df$yield.pred)))) +
  scale_y_continuous(limits=range(na.omit(c(df$yield.obs, df$yield.pred)))) +
  labs(title="Yield (kg/ha)", x="Observed", y = "Predicted") +
  geom_abline(intercept=0, colour="grey") + facet_wrap(~site) +
  theme_minimal()
print(g)
dev.off()
```
    RGraphics ESW (0-600)
```r
library(dplyr)
library(ggplot2)
library(gridExtra)
library(grid)
library(data.table)

options(stringsAsFactors = F)

# Generic function to read apsim output files. Adds factor levels if found.
read.apsim <- function(apsim.name) {
  header<-readLines(apsim.name, n=25)
  if (length(header) == 0 ) {return(NULL)}
  i<-3  # 4th line
  apsim <- read.table(apsim.name,skip=i+1,na.strings=c("NA","?"))
  names(apsim) <- unlist(strsplit(trimws(header[i]), " +"))
  
  #cat(apsim.name, " = ", ncol(apsim), "\n")
  return(cbind(filename=apsim.name, apsim))
}

capitalise <- function(x) {
  s <- strsplit(x, " ")[[1]]
  paste(toupper(substring(s, 1,1)), tolower(substring(s, 2)),
        sep="", collapse=" ")
}

groups<- list()
groups[["early"]] <- c("HallmarkXT", "Bolt")
groups[["mid"]] <- c("Blitz", "Jumbo2", "Ace")
groups[["late"]] <- c("Nugget", "Digger", "Greenfield", "Northfield")

df.pred<- rbindlist( lapply(list.files(pattern="^.*Daily\\.out$"), read.apsim), fill=T)
df.pred$SimulationName<- tolower(sapply(strsplit(df.pred$filename, " "), function (x) {return(x[1])}))
df.pred$TOS <- toupper(df.pred$TOS)
df.pred$site <- sapply(df.pred$site, capitalise)
df.pred$cultivar <- sapply(df.pred$cultivar, capitalise)
df.pred$Date <- as.Date(df.pred$Date, format="%d/%m/%Y")
colnames(df.pred)[which(names(df.pred) == "esw_0_600")] <-"esw(0-600)"
colnames(df.pred)[which(names(df.pred) == "esw_100_600")] <-"esw(100-600)"

df.pred$cvgroup <- ifelse(df.pred$cultivar %in% groups[["early"]], "Early",
                            ifelse(df.pred$cultivar %in% groups[["mid"]], "Mid",
                                   ifelse(df.pred$cultivar %in% groups[["late"]], "Late", NA)))


df.obs<-  read.csv("Lentil auto observed daily.csv")
df.obs$SimulationName<- tolower(df.obs$SimulationName)
df.obs$cultivar <- sapply(df.obs$cultivar, capitalise)
df.obs$site <- sapply(df.obs$site, capitalise)
df.obs$Date <- as.Date(df.obs$Date, format="%d/%m/%Y")
df.obs$cvgroup <- ifelse(df.obs$cultivar %in% groups[["early"]], "Early",
                          ifelse(df.obs$cultivar %in% groups[["mid"]], "Mid",
                                 ifelse(df.obs$cultivar %in% groups[["late"]], "Late", NA)))


colnames(df.obs)[which(names(df.obs) == "sw.1.")] <-"sw(1)"
colnames(df.obs)[which(names(df.obs) == "sw.2.")] <-"sw(2)"
colnames(df.obs)[which(names(df.obs) == "sw.3.")] <-"sw(3)"
colnames(df.obs)[which(names(df.obs) == "sw.4.")] <-"sw(4)"
colnames(df.obs)[which(names(df.obs) == "sw.5.")] <-"sw(5)"
colnames(df.obs)[which(names(df.obs) == "sw.6.")] <-"sw(6)"
colnames(df.obs)[which(names(df.obs) == "sw.7.")] <-"sw(7)"

colnames(df.obs)[which(names(df.obs) == "esw.1.")] <-"esw(1)"
colnames(df.obs)[which(names(df.obs) == "esw.2.")] <-"esw(2)"
colnames(df.obs)[which(names(df.obs) == "esw.3.")] <-"esw(3)"
colnames(df.obs)[which(names(df.obs) == "esw.4.")] <-"esw(4)"
colnames(df.obs)[which(names(df.obs) == "esw.5.")] <-"esw(5)"
colnames(df.obs)[which(names(df.obs) == "esw.6.")] <-"esw(6)"
colnames(df.obs)[which(names(df.obs) == "esw.7.")] <-"esw(7)"

colnames(df.obs)[which(names(df.obs) == "esw_0_600")] <-"esw(0-600)"
colnames(df.obs)[which(names(df.obs) == "esw_100_600")] <-"esw(100-600)"


#table(df.obs$`sw(2)` > 0 , df.obs$site)

# merge together 
df <- df.pred %>% 
  left_join(select(df.obs, -one_of( c("site", "TOS", "cultivar", "cvgroup", "Date"))), 
     by=c("SimulationName", "DaysAfterSowing"), 
     suffix = c(".pred", ".obs")) 

jpeg(imageFileName, width=width, height=height)

g<-ggplot(df) + geom_abline(intercept=0, colour="lightgrey") +
  geom_point(aes(x=`esw(0-600).obs`, y=`esw(0-600).pred`, color=site), na.rm = TRUE) + 
  labs(title="All esw (0-600)") + 
  theme_minimal()
print(g)

dev.off()
```
    RGraphics ESW (100-600)
```r
library(dplyr)
library(ggplot2)
library(gridExtra)
library(grid)
library(data.table)

options(stringsAsFactors = F)

# Generic function to read apsim output files. Adds factor levels if found.
read.apsim <- function(apsim.name) {
  header<-readLines(apsim.name, n=25)
  if (length(header) == 0 ) {return(NULL)}
  i<-3  # 4th line
  apsim <- read.table(apsim.name,skip=i+1,na.strings=c("NA","?"))
  names(apsim) <- unlist(strsplit(trimws(header[i]), " +"))
  
  #cat(apsim.name, " = ", ncol(apsim), "\n")
  return(cbind(filename=apsim.name, apsim))
}

capitalise <- function(x) {
  s <- strsplit(x, " ")[[1]]
  paste(toupper(substring(s, 1,1)), tolower(substring(s, 2)),
        sep="", collapse=" ")
}

groups<- list()
groups[["early"]] <- c("HallmarkXT", "Bolt")
groups[["mid"]] <- c("Blitz", "Jumbo2", "Ace")
groups[["late"]] <- c("Nugget", "Digger", "Greenfield", "Northfield")

df.pred<- rbindlist( lapply(list.files(pattern="^.*Daily\\.out$"), read.apsim), fill=T)
df.pred$SimulationName<- tolower(sapply(strsplit(df.pred$filename, " "), function (x) {return(x[1])}))
df.pred$TOS <- toupper(df.pred$TOS)
df.pred$site <- sapply(df.pred$site, capitalise)
df.pred$cultivar <- sapply(df.pred$cultivar, capitalise)
df.pred$Date <- as.Date(df.pred$Date, format="%d/%m/%Y")
colnames(df.pred)[which(names(df.pred) == "esw_0_600")] <-"esw(0-600)"
colnames(df.pred)[which(names(df.pred) == "esw_100_600")] <-"esw(100-600)"

df.pred$cvgroup <- ifelse(df.pred$cultivar %in% groups[["early"]], "Early",
                            ifelse(df.pred$cultivar %in% groups[["mid"]], "Mid",
                                   ifelse(df.pred$cultivar %in% groups[["late"]], "Late", NA)))


df.obs<-  read.csv("Lentil auto observed daily.csv")
df.obs$SimulationName<- tolower(df.obs$SimulationName)
df.obs$cultivar <- sapply(df.obs$cultivar, capitalise)
df.obs$site <- sapply(df.obs$site, capitalise)
df.obs$Date <- as.Date(df.obs$Date, format="%d/%m/%Y")
df.obs$cvgroup <- ifelse(df.obs$cultivar %in% groups[["early"]], "Early",
                          ifelse(df.obs$cultivar %in% groups[["mid"]], "Mid",
                                 ifelse(df.obs$cultivar %in% groups[["late"]], "Late", NA)))


colnames(df.obs)[which(names(df.obs) == "sw.1.")] <-"sw(1)"
colnames(df.obs)[which(names(df.obs) == "sw.2.")] <-"sw(2)"
colnames(df.obs)[which(names(df.obs) == "sw.3.")] <-"sw(3)"
colnames(df.obs)[which(names(df.obs) == "sw.4.")] <-"sw(4)"
colnames(df.obs)[which(names(df.obs) == "sw.5.")] <-"sw(5)"
colnames(df.obs)[which(names(df.obs) == "sw.6.")] <-"sw(6)"
colnames(df.obs)[which(names(df.obs) == "sw.7.")] <-"sw(7)"

colnames(df.obs)[which(names(df.obs) == "esw.1.")] <-"esw(1)"
colnames(df.obs)[which(names(df.obs) == "esw.2.")] <-"esw(2)"
colnames(df.obs)[which(names(df.obs) == "esw.3.")] <-"esw(3)"
colnames(df.obs)[which(names(df.obs) == "esw.4.")] <-"esw(4)"
colnames(df.obs)[which(names(df.obs) == "esw.5.")] <-"esw(5)"
colnames(df.obs)[which(names(df.obs) == "esw.6.")] <-"esw(6)"
colnames(df.obs)[which(names(df.obs) == "esw.7.")] <-"esw(7)"

colnames(df.obs)[which(names(df.obs) == "esw_0_600")] <-"esw(0-600)"
colnames(df.obs)[which(names(df.obs) == "esw_100_600")] <-"esw(100-600)"


#table(df.obs$`sw(2)` > 0 , df.obs$site)

# merge together 
df <- df.pred %>% 
  left_join(select(df.obs, -one_of( c("site", "TOS", "cultivar", "cvgroup", "Date"))), 
     by=c("SimulationName", "DaysAfterSowing"), 
     suffix = c(".pred", ".obs")) 

jpeg(imageFileName, width=width, height=height)

g<-ggplot(df) + geom_abline(intercept=0, colour="lightgrey") +
  geom_point(aes(x=`esw(100-600).obs`, y=`esw(100-600).pred`, color=site), na.rm = TRUE) + 
  labs(title="All esw (100-600)") + 
  theme_minimal()
print(g)

dev.off()
```
    RGraphics sw(1)
```r
library(dplyr)
library(ggplot2)
library(gridExtra)
library(grid)
library(data.table)

options(stringsAsFactors = F)

# Generic function to read apsim output files. Adds factor levels if found.
read.apsim <- function(apsim.name) {
  header<-readLines(apsim.name, n=25)
  if (length(header) == 0 ) {return(NULL)}
  i<-3  # 4th line
  apsim <- read.table(apsim.name,skip=i+1,na.strings=c("NA","?"))
  names(apsim) <- unlist(strsplit(trimws(header[i]), " +"))
  
  #cat(apsim.name, " = ", ncol(apsim), "\n")
  return(cbind(filename=apsim.name, apsim))
}

capitalise <- function(x) {
  s <- strsplit(x, " ")[[1]]
  paste(toupper(substring(s, 1,1)), tolower(substring(s, 2)),
        sep="", collapse=" ")
}

groups<- list()
groups[["early"]] <- c("HallmarkXT", "Bolt")
groups[["mid"]] <- c("Blitz", "Jumbo2", "Ace")
groups[["late"]] <- c("Nugget", "Digger", "Greenfield", "Northfield")

df.pred<- rbindlist( lapply(list.files(pattern="^.*Daily\\.out$"), read.apsim), fill=T)
df.pred$SimulationName<- tolower(sapply(strsplit(df.pred$filename, " "), function (x) {return(x[1])}))
df.pred$TOS <- toupper(df.pred$TOS)
df.pred$site <- sapply(df.pred$site, capitalise)
df.pred$cultivar <- sapply(df.pred$cultivar, capitalise)
df.pred$Date <- as.Date(df.pred$Date, format="%d/%m/%Y")
colnames(df.pred)[which(names(df.pred) == "esw_0_600")] <-"esw(0-600)"
colnames(df.pred)[which(names(df.pred) == "esw_100_600")] <-"esw(100-600)"

df.pred$cvgroup <- ifelse(df.pred$cultivar %in% groups[["early"]], "Early",
                            ifelse(df.pred$cultivar %in% groups[["mid"]], "Mid",
                                   ifelse(df.pred$cultivar %in% groups[["late"]], "Late", NA)))


df.obs<-  read.csv("Lentil auto observed daily.csv")
df.obs$SimulationName<- tolower(df.obs$SimulationName)
df.obs$cultivar <- sapply(df.obs$cultivar, capitalise)
df.obs$site <- sapply(df.obs$site, capitalise)
df.obs$Date <- as.Date(df.obs$Date, format="%d/%m/%Y")
df.obs$cvgroup <- ifelse(df.obs$cultivar %in% groups[["early"]], "Early",
                          ifelse(df.obs$cultivar %in% groups[["mid"]], "Mid",
                                 ifelse(df.obs$cultivar %in% groups[["late"]], "Late", NA)))


colnames(df.obs)[which(names(df.obs) == "sw.1.")] <-"sw(1)"
colnames(df.obs)[which(names(df.obs) == "sw.2.")] <-"sw(2)"
colnames(df.obs)[which(names(df.obs) == "sw.3.")] <-"sw(3)"
colnames(df.obs)[which(names(df.obs) == "sw.4.")] <-"sw(4)"
colnames(df.obs)[which(names(df.obs) == "sw.5.")] <-"sw(5)"
colnames(df.obs)[which(names(df.obs) == "sw.6.")] <-"sw(6)"
colnames(df.obs)[which(names(df.obs) == "sw.7.")] <-"sw(7)"

colnames(df.obs)[which(names(df.obs) == "esw.1.")] <-"esw(1)"
colnames(df.obs)[which(names(df.obs) == "esw.2.")] <-"esw(2)"
colnames(df.obs)[which(names(df.obs) == "esw.3.")] <-"esw(3)"
colnames(df.obs)[which(names(df.obs) == "esw.4.")] <-"esw(4)"
colnames(df.obs)[which(names(df.obs) == "esw.5.")] <-"esw(5)"
colnames(df.obs)[which(names(df.obs) == "esw.6.")] <-"esw(6)"
colnames(df.obs)[which(names(df.obs) == "esw.7.")] <-"esw(7)"

colnames(df.obs)[which(names(df.obs) == "esw_0_600")] <-"esw(0-600)"
colnames(df.obs)[which(names(df.obs) == "esw_100_600")] <-"esw(100-600)"


#table(df.obs$`sw(2)` > 0 , df.obs$site)

# merge together 
df <- df.pred %>% 
  left_join(select(df.obs, -one_of( c("site", "TOS", "cultivar", "cvgroup", "Date"))), 
     by=c("SimulationName", "DaysAfterSowing"), 
     suffix = c(".pred", ".obs")) 

swSites<-unique(df$site[!is.na(df$`esw(100-600).obs`)])

jpeg(imageFileName, width=width, height=height)

# Not all sites have sw(1)
df2 <- df[!is.na(df$`sw(1).obs`),]
g<-ggplot() + 
  geom_point(data=df2, aes(x=DaysAfterSowing, color=SimulationName, y=`sw(1).obs`))  + 
  geom_line(data=df.pred[df.pred$site %in% swSites,], aes(x=DaysAfterSowing, group=SimulationName, color=SimulationName, y=`sw(1)`)) + 
  labs(y="sw(1)", x="Days after sowing") +
  facet_wrap(~site)  + theme_minimal() + theme(legend.position = "none")

print(g)
dev.off()
```
    RGraphics sw(2)
```r
library(dplyr)
library(ggplot2)
library(gridExtra)
library(grid)
library(data.table)

options(stringsAsFactors = F)

# Generic function to read apsim output files. Adds factor levels if found.
read.apsim <- function(apsim.name) {
  header<-readLines(apsim.name, n=25)
  if (length(header) == 0 ) {return(NULL)}
  i<-3  # 4th line
  apsim <- read.table(apsim.name,skip=i+1,na.strings=c("NA","?"))
  names(apsim) <- unlist(strsplit(trimws(header[i]), " +"))
  
  #cat(apsim.name, " = ", ncol(apsim), "\n")
  return(cbind(filename=apsim.name, apsim))
}

capitalise <- function(x) {
  s <- strsplit(x, " ")[[1]]
  paste(toupper(substring(s, 1,1)), tolower(substring(s, 2)),
        sep="", collapse=" ")
}

groups<- list()
groups[["early"]] <- c("HallmarkXT", "Bolt")
groups[["mid"]] <- c("Blitz", "Jumbo2", "Ace")
groups[["late"]] <- c("Nugget", "Digger", "Greenfield", "Northfield")

df.pred<- rbindlist( lapply(list.files(pattern="^.*Daily\\.out$"), read.apsim), fill=T)
df.pred$SimulationName<- tolower(sapply(strsplit(df.pred$filename, " "), function (x) {return(x[1])}))
df.pred$TOS <- toupper(df.pred$TOS)
df.pred$site <- sapply(df.pred$site, capitalise)
df.pred$cultivar <- sapply(df.pred$cultivar, capitalise)
df.pred$Date <- as.Date(df.pred$Date, format="%d/%m/%Y")
colnames(df.pred)[which(names(df.pred) == "esw_0_600")] <-"esw(0-600)"
colnames(df.pred)[which(names(df.pred) == "esw_100_600")] <-"esw(100-600)"

df.pred$cvgroup <- ifelse(df.pred$cultivar %in% groups[["early"]], "Early",
                            ifelse(df.pred$cultivar %in% groups[["mid"]], "Mid",
                                   ifelse(df.pred$cultivar %in% groups[["late"]], "Late", NA)))


df.obs<-  read.csv("Lentil auto observed daily.csv")
df.obs$SimulationName<- tolower(df.obs$SimulationName)
df.obs$cultivar <- sapply(df.obs$cultivar, capitalise)
df.obs$site <- sapply(df.obs$site, capitalise)
df.obs$Date <- as.Date(df.obs$Date, format="%d/%m/%Y")
df.obs$cvgroup <- ifelse(df.obs$cultivar %in% groups[["early"]], "Early",
                          ifelse(df.obs$cultivar %in% groups[["mid"]], "Mid",
                                 ifelse(df.obs$cultivar %in% groups[["late"]], "Late", NA)))


colnames(df.obs)[which(names(df.obs) == "sw.1.")] <-"sw(1)"
colnames(df.obs)[which(names(df.obs) == "sw.2.")] <-"sw(2)"
colnames(df.obs)[which(names(df.obs) == "sw.3.")] <-"sw(3)"
colnames(df.obs)[which(names(df.obs) == "sw.4.")] <-"sw(4)"
colnames(df.obs)[which(names(df.obs) == "sw.5.")] <-"sw(5)"
colnames(df.obs)[which(names(df.obs) == "sw.6.")] <-"sw(6)"
colnames(df.obs)[which(names(df.obs) == "sw.7.")] <-"sw(7)"

colnames(df.obs)[which(names(df.obs) == "esw.1.")] <-"esw(1)"
colnames(df.obs)[which(names(df.obs) == "esw.2.")] <-"esw(2)"
colnames(df.obs)[which(names(df.obs) == "esw.3.")] <-"esw(3)"
colnames(df.obs)[which(names(df.obs) == "esw.4.")] <-"esw(4)"
colnames(df.obs)[which(names(df.obs) == "esw.5.")] <-"esw(5)"
colnames(df.obs)[which(names(df.obs) == "esw.6.")] <-"esw(6)"
colnames(df.obs)[which(names(df.obs) == "esw.7.")] <-"esw(7)"

colnames(df.obs)[which(names(df.obs) == "esw_0_600")] <-"esw(0-600)"
colnames(df.obs)[which(names(df.obs) == "esw_100_600")] <-"esw(100-600)"


#table(df.obs$`sw(2)` > 0 , df.obs$site)

# merge together 
df <- df.pred %>% 
  left_join(select(df.obs, -one_of( c("site", "TOS", "cultivar", "cvgroup", "Date"))), 
     by=c("SimulationName", "DaysAfterSowing"), 
     suffix = c(".pred", ".obs")) 

swSites<-unique(df$site[!is.na(df$`esw(100-600).obs`)])

# Not all sites have sw(1)
df2 <- df[!is.na(df$`sw(2).obs`),]

jpeg(imageFileName, width=width, height=height)
ggplot() + 
  geom_point(data=df2, aes(x=DaysAfterSowing, 
             color=SimulationName, y=`sw(2).obs`))  + 
  geom_line(data=df.pred[df.pred$site %in% swSites,], 
             aes(x=DaysAfterSowing, group=SimulationName, color=SimulationName, y=`sw(2)`)) + 
  labs(y="sw(2)", x="Days after sowing") +
  facet_wrap(~site)  + theme_minimal() + theme(legend.position = "none")

print(g)
dev.off()
```
    RGraphics sw(3)
```r
library(dplyr)
library(ggplot2)
library(gridExtra)
library(grid)
library(data.table)

options(stringsAsFactors = F)

# Generic function to read apsim output files. Adds factor levels if found.
read.apsim <- function(apsim.name) {
  header<-readLines(apsim.name, n=25)
  if (length(header) == 0 ) {return(NULL)}
  i<-3  # 4th line
  apsim <- read.table(apsim.name,skip=i+1,na.strings=c("NA","?"))
  names(apsim) <- unlist(strsplit(trimws(header[i]), " +"))
  
  #cat(apsim.name, " = ", ncol(apsim), "\n")
  return(cbind(filename=apsim.name, apsim))
}

capitalise <- function(x) {
  s <- strsplit(x, " ")[[1]]
  paste(toupper(substring(s, 1,1)), tolower(substring(s, 2)),
        sep="", collapse=" ")
}

groups<- list()
groups[["early"]] <- c("HallmarkXT", "Bolt")
groups[["mid"]] <- c("Blitz", "Jumbo2", "Ace")
groups[["late"]] <- c("Nugget", "Digger", "Greenfield", "Northfield")

df.pred<- rbindlist( lapply(list.files(pattern="^.*Daily\\.out$"), read.apsim), fill=T)
df.pred$SimulationName<- tolower(sapply(strsplit(df.pred$filename, " "), function (x) {return(x[1])}))
df.pred$TOS <- toupper(df.pred$TOS)
df.pred$site <- sapply(df.pred$site, capitalise)
df.pred$cultivar <- sapply(df.pred$cultivar, capitalise)
df.pred$Date <- as.Date(df.pred$Date, format="%d/%m/%Y")
colnames(df.pred)[which(names(df.pred) == "esw_0_600")] <-"esw(0-600)"
colnames(df.pred)[which(names(df.pred) == "esw_100_600")] <-"esw(100-600)"

df.pred$cvgroup <- ifelse(df.pred$cultivar %in% groups[["early"]], "Early",
                            ifelse(df.pred$cultivar %in% groups[["mid"]], "Mid",
                                   ifelse(df.pred$cultivar %in% groups[["late"]], "Late", NA)))


df.obs<-  read.csv("Lentil auto observed daily.csv")
df.obs$SimulationName<- tolower(df.obs$SimulationName)
df.obs$cultivar <- sapply(df.obs$cultivar, capitalise)
df.obs$site <- sapply(df.obs$site, capitalise)
df.obs$Date <- as.Date(df.obs$Date, format="%d/%m/%Y")
df.obs$cvgroup <- ifelse(df.obs$cultivar %in% groups[["early"]], "Early",
                          ifelse(df.obs$cultivar %in% groups[["mid"]], "Mid",
                                 ifelse(df.obs$cultivar %in% groups[["late"]], "Late", NA)))


colnames(df.obs)[which(names(df.obs) == "sw.1.")] <-"sw(1)"
colnames(df.obs)[which(names(df.obs) == "sw.2.")] <-"sw(2)"
colnames(df.obs)[which(names(df.obs) == "sw.3.")] <-"sw(3)"
colnames(df.obs)[which(names(df.obs) == "sw.4.")] <-"sw(4)"
colnames(df.obs)[which(names(df.obs) == "sw.5.")] <-"sw(5)"
colnames(df.obs)[which(names(df.obs) == "sw.6.")] <-"sw(6)"
colnames(df.obs)[which(names(df.obs) == "sw.7.")] <-"sw(7)"

colnames(df.obs)[which(names(df.obs) == "esw.1.")] <-"esw(1)"
colnames(df.obs)[which(names(df.obs) == "esw.2.")] <-"esw(2)"
colnames(df.obs)[which(names(df.obs) == "esw.3.")] <-"esw(3)"
colnames(df.obs)[which(names(df.obs) == "esw.4.")] <-"esw(4)"
colnames(df.obs)[which(names(df.obs) == "esw.5.")] <-"esw(5)"
colnames(df.obs)[which(names(df.obs) == "esw.6.")] <-"esw(6)"
colnames(df.obs)[which(names(df.obs) == "esw.7.")] <-"esw(7)"

colnames(df.obs)[which(names(df.obs) == "esw_0_600")] <-"esw(0-600)"
colnames(df.obs)[which(names(df.obs) == "esw_100_600")] <-"esw(100-600)"

# merge together 
df <- df.pred %>% 
  left_join(select(df.obs, -one_of( c("site", "TOS", "cultivar", "cvgroup", "Date"))), 
     by=c("SimulationName", "DaysAfterSowing"), 
     suffix = c(".pred", ".obs")) 

swSites<-unique(df$site[!is.na(df$`esw(100-600).obs`)])

# Not all sites have sw(1)
df2 <- df[!is.na(df$`sw(3).obs`),]
jpeg(imageFileName, width=width, height=height)
ggplot() + 
  geom_point(data=df2, aes(x=DaysAfterSowing, color=SimulationName, y=`sw(3).obs`))  + 
  geom_line(data=df.pred[df.pred$site %in% swSites,], aes(x=DaysAfterSowing, group=SimulationName, color=SimulationName, y=`sw(3)`)) + 
  labs(y="sw(3)", x="Days after sowing") +
  facet_wrap(~site)  + theme_minimal() + theme(legend.position = "none")

print(g)
dev.off()
```
    RGraphics TS Biomass
```r
library(dplyr)
library(ggplot2)
library(gridExtra)
library(grid)
library(data.table)

options(stringsAsFactors = F)

# Generic function to read apsim output files. Adds factor levels if found.
read.apsim <- function(apsim.name) {
  header<-readLines(apsim.name, n=25)
  if (length(header) == 0 ) {return(NULL)}
  i<-3  # 4th line
  apsim <- read.table(apsim.name,skip=i+1,na.strings=c("NA","?"))
  names(apsim) <- unlist(strsplit(trimws(header[i]), " +"))
  
  #cat(apsim.name, " = ", ncol(apsim), "\n")
  return(cbind(filename=apsim.name, apsim))
}

capitalise <- function(x) {
  s <- strsplit(x, " ")[[1]]
  paste(toupper(substring(s, 1,1)), tolower(substring(s, 2)),
        sep="", collapse=" ")
}

groups<- list()
groups[["early"]] <- c("HallmarkXT", "Bolt")
groups[["mid"]] <- c("Blitz", "Jumbo2", "Ace")
groups[["late"]] <- c("Nugget", "Digger", "Greenfield", "Northfield")

df.pred<- rbindlist( lapply(list.files(pattern="^.*Daily\\.out$"), read.apsim), fill=T)
df.pred$SimulationName<- tolower(sapply(strsplit(df.pred$filename, " "), function (x) {return(x[1])}))
df.pred$TOS <- toupper(df.pred$TOS)
df.pred$site <- sapply(df.pred$site, capitalise)
df.pred$cultivar <- sapply(df.pred$cultivar, capitalise)
df.pred$Date <- as.Date(df.pred$Date, format="%d/%m/%Y")
colnames(df.pred)[which(names(df.pred) == "esw_0_600")] <-"esw(0-600)"
colnames(df.pred)[which(names(df.pred) == "esw_100_600")] <-"esw(100-600)"

df.pred$cvgroup <- ifelse(df.pred$cultivar %in% groups[["early"]], "Early",
                            ifelse(df.pred$cultivar %in% groups[["mid"]], "Mid",
                                   ifelse(df.pred$cultivar %in% groups[["late"]], "Late", NA)))


df.obs<-  read.csv("Lentil auto observed daily.csv")
df.obs$SimulationName<- tolower(df.obs$SimulationName)
df.obs$cultivar <- sapply(df.obs$cultivar, capitalise)
df.obs$site <- sapply(df.obs$site, capitalise)
df.obs$Date <- as.Date(df.obs$Date, format="%d/%m/%Y")
df.obs$cvgroup <- ifelse(df.obs$cultivar %in% groups[["early"]], "Early",
                          ifelse(df.obs$cultivar %in% groups[["mid"]], "Mid",
                                 ifelse(df.obs$cultivar %in% groups[["late"]], "Late", NA)))


colnames(df.obs)[which(names(df.obs) == "sw.1.")] <-"sw(1)"
colnames(df.obs)[which(names(df.obs) == "sw.2.")] <-"sw(2)"
colnames(df.obs)[which(names(df.obs) == "sw.3.")] <-"sw(3)"
colnames(df.obs)[which(names(df.obs) == "sw.4.")] <-"sw(4)"
colnames(df.obs)[which(names(df.obs) == "sw.5.")] <-"sw(5)"
colnames(df.obs)[which(names(df.obs) == "sw.6.")] <-"sw(6)"
colnames(df.obs)[which(names(df.obs) == "sw.7.")] <-"sw(7)"

colnames(df.obs)[which(names(df.obs) == "esw.1.")] <-"esw(1)"
colnames(df.obs)[which(names(df.obs) == "esw.2.")] <-"esw(2)"
colnames(df.obs)[which(names(df.obs) == "esw.3.")] <-"esw(3)"
colnames(df.obs)[which(names(df.obs) == "esw.4.")] <-"esw(4)"
colnames(df.obs)[which(names(df.obs) == "esw.5.")] <-"esw(5)"
colnames(df.obs)[which(names(df.obs) == "esw.6.")] <-"esw(6)"
colnames(df.obs)[which(names(df.obs) == "esw.7.")] <-"esw(7)"

colnames(df.obs)[which(names(df.obs) == "esw_0_600")] <-"esw(0-600)"
colnames(df.obs)[which(names(df.obs) == "esw_100_600")] <-"esw(100-600)"

# merge together 
df <- df.pred %>% 
  left_join(select(df.obs, -one_of( c("site", "TOS", "cultivar", "cvgroup", "Date"))), 
     by=c("SimulationName", "DaysAfterSowing"), 
     suffix = c(".pred", ".obs")) 


jpeg(imageFileName, width=width, height=height)

df2 <- df[! df$site %in% c("Beulah", "Birchip", "Gatton", "Greenethorpe2", "Horsham" ),]
ggplot(df2) + 
  geom_point(aes(x=DaysAfterSowing, color=cvgroup, y=AboveGround.Wt.obs), na.rm=T)  + 
  geom_line(aes(x=DaysAfterSowing, group=SimulationName, color=cvgroup, y=AboveGround.Wt.pred))  +
  labs(y="Biomass Wt (g/m2)") +
  facet_wrap(~site)  + theme_minimal() + theme(legend.position = "none")

print(g)
dev.off()
```
    RGraphics TS Yield
```r
library(dplyr)
library(ggplot2)
library(gridExtra)
library(grid)
library(data.table)

options(stringsAsFactors = F)

# Generic function to read apsim output files. Adds factor levels if found.
read.apsim <- function(apsim.name) {
  header<-readLines(apsim.name, n=25)
  if (length(header) == 0 ) {return(NULL)}
  i<-3  # 4th line
  apsim <- read.table(apsim.name,skip=i+1,na.strings=c("NA","?"))
  names(apsim) <- unlist(strsplit(trimws(header[i]), " +"))
  
  #cat(apsim.name, " = ", ncol(apsim), "\n")
  return(cbind(filename=apsim.name, apsim))
}

capitalise <- function(x) {
  s <- strsplit(x, " ")[[1]]
  paste(toupper(substring(s, 1,1)), tolower(substring(s, 2)),
        sep="", collapse=" ")
}

groups<- list()
groups[["early"]] <- c("HallmarkXT", "Bolt")
groups[["mid"]] <- c("Blitz", "Jumbo2", "Ace")
groups[["late"]] <- c("Nugget", "Digger", "Greenfield", "Northfield")

df.pred<- rbindlist( lapply(list.files(pattern="^.*Daily\\.out$"), read.apsim), fill=T)
df.pred$SimulationName<- tolower(sapply(strsplit(df.pred$filename, " "), function (x) {return(x[1])}))
df.pred$TOS <- toupper(df.pred$TOS)
df.pred$site <- sapply(df.pred$site, capitalise)
df.pred$cultivar <- sapply(df.pred$cultivar, capitalise)
df.pred$Date <- as.Date(df.pred$Date, format="%d/%m/%Y")
colnames(df.pred)[which(names(df.pred) == "esw_0_600")] <-"esw(0-600)"
colnames(df.pred)[which(names(df.pred) == "esw_100_600")] <-"esw(100-600)"

df.pred$cvgroup <- ifelse(df.pred$cultivar %in% groups[["early"]], "Early",
                            ifelse(df.pred$cultivar %in% groups[["mid"]], "Mid",
                                   ifelse(df.pred$cultivar %in% groups[["late"]], "Late", NA)))


df.obs<-  read.csv("Lentil auto observed daily.csv")
df.obs$SimulationName<- tolower(df.obs$SimulationName)
df.obs$cultivar <- sapply(df.obs$cultivar, capitalise)
df.obs$site <- sapply(df.obs$site, capitalise)
df.obs$Date <- as.Date(df.obs$Date, format="%d/%m/%Y")
df.obs$cvgroup <- ifelse(df.obs$cultivar %in% groups[["early"]], "Early",
                          ifelse(df.obs$cultivar %in% groups[["mid"]], "Mid",
                                 ifelse(df.obs$cultivar %in% groups[["late"]], "Late", NA)))


colnames(df.obs)[which(names(df.obs) == "sw.1.")] <-"sw(1)"
colnames(df.obs)[which(names(df.obs) == "sw.2.")] <-"sw(2)"
colnames(df.obs)[which(names(df.obs) == "sw.3.")] <-"sw(3)"
colnames(df.obs)[which(names(df.obs) == "sw.4.")] <-"sw(4)"
colnames(df.obs)[which(names(df.obs) == "sw.5.")] <-"sw(5)"
colnames(df.obs)[which(names(df.obs) == "sw.6.")] <-"sw(6)"
colnames(df.obs)[which(names(df.obs) == "sw.7.")] <-"sw(7)"

colnames(df.obs)[which(names(df.obs) == "esw.1.")] <-"esw(1)"
colnames(df.obs)[which(names(df.obs) == "esw.2.")] <-"esw(2)"
colnames(df.obs)[which(names(df.obs) == "esw.3.")] <-"esw(3)"
colnames(df.obs)[which(names(df.obs) == "esw.4.")] <-"esw(4)"
colnames(df.obs)[which(names(df.obs) == "esw.5.")] <-"esw(5)"
colnames(df.obs)[which(names(df.obs) == "esw.6.")] <-"esw(6)"
colnames(df.obs)[which(names(df.obs) == "esw.7.")] <-"esw(7)"

colnames(df.obs)[which(names(df.obs) == "esw_0_600")] <-"esw(0-600)"
colnames(df.obs)[which(names(df.obs) == "esw_100_600")] <-"esw(100-600)"

# merge together 
df <- df.pred %>% 
  left_join(select(df.obs, -one_of( c("site", "TOS", "cultivar", "cvgroup", "Date"))), 
     by=c("SimulationName", "DaysAfterSowing"), 
     suffix = c(".pred", ".obs")) 


jpeg(imageFileName, width=width, height=height)
df2 <- df[! df$site %in% c("Beulah", "Birchip","Caragabal", "Emerald",  "Gatton", "Greenethorpe2", "Horsham", "Mildura", "Millmerran" ),]
ggplot(df2) + 
  geom_point(aes(x=DaysAfterSowing, color=cvgroup, y=GrainWt.obs))  + 
  geom_line(aes(x=DaysAfterSowing, group=SimulationName, color=cvgroup, y=GrainWt.pred))  +
  labs(y="Grain Wt") +
  facet_wrap(~site)  + theme_minimal() + theme(legend.position = "none")


print(g)
dev.off()
```
  simulation Gatton.irrigated.TOS1.Genesis
    metfile met: filename=Gatton.met
    clock: start_date=21/05/2019; end_date=16/02/2020
    summaryfile
    area paddock
      surfaceom SurfaceOrganicMatter
        PoolName = wheat  # Organic Matter pool name
        type = wheat  # Organic Matter type
        mass = 50  # Initial surface residue (kg/ha)
        cnr = 60  # C:N ratio of initial residue
        standing_fraction = 0  # Fraction of residue standing
      fertiliser
      irrigation
        automatic_irrigation = off
        asw_depth = 600  # Depth to which ASW is calculated. (mm)
        crit_fr_asw = 0.5  # Fraction of ASW below which irrigation is applied (0-1.0)
        irrigation_efficiency = 1  # Efficiency of the irrigation. (0-1.0)
        irrigation_allocation = off  # Allocation limits
        allocation = 0  # Allocation in mm
        default_no3_conc = 0.0  # Nitrate concentration (ppm N)
        default_nh4_conc = 0.0  # Ammonium concentration (ppm N)
        default_cl_conc = 0.0  # Chloride concentration (ppm Cl)
      chickpea
      folder Manager folder
        manager Rules
          sow_date = 22/05/2019
          reset_date = 21/05/2019
          cultivar = Genesis
          density = 25
          soil = Black Vertosol (Lawes No037)
          Irrigation_level = irrigated
          site = Gatton
          tos = TOS1
          on init:
```
!rule name 
under_crop = 0 ! 0: no crop in field; 1: field is cropped

sow_day = '[sow_date]'
TOS = '[TOS]'
cultivar = '[cultivar]'
density = '[density]'
site = '[site]'
Irrigation_level = '[Irrigation_level]'
MaxLAI = 0
```
          on start_of_day:
```
! finds if there is a crop in the field, if 0 no crop if1 crop

if (under_crop > 0 AND StageName = 'out') then
   under_crop = 0
endif


if (lai > MaxLAI) then
   MaxLAI = lai
endif

if (Today = Date('[reset_date]')) then 
   '[soil] Water' reset
   '[soil] Nitrogen' reset
   'SurfaceOrganicMatter' reset
endif

if (Today = Date('[sow_date]')) then
   chickpea sow cultivar = '[cultivar]', plants = [density] (/m2), sowing_depth = 40 (mm)
   MaxLAI = 0
   under_crop = 1
endif

! if maturity harvest the crop
if (StageName = 'harvest_ripe') or (plant_status = 'dead') then
   act_mods harvest
   act_mods end_crop
endif


if (today = Date('22-may')) then
irrigation apply amount = 40
endif

if (today = Date('11-jun')) then
irrigation apply amount = 15
endif

if (today = Date('26-jun')) then
irrigation apply amount = 15
endif

if (today = Date('23-jul')) then
irrigation apply amount = 30
endif

if (today = Date('6-aug')) then
irrigation apply amount = 40
endif

if (today = Date('15-aug')) then
irrigation apply amount = 30
endif

if (today = Date('4-sep')) then
irrigation apply amount = 30
endif
```
          on end_of_day:
```
if (under_crop > 0) then
   'outputfile Daily' do_output
endif
```
        manager2 SW Calcs
          # Irrigation parameters
```csharp
using System;
using ModelFramework;
using CSGeneral;

public class Script 
{      
   [Input] DateTime today;
   
   [Link] Paddock Paddock;
   private double [] dlayer;
   private double [] dul_dep;
   private double [] ll15_dep;
   
   private ManagerUtility.Tracker<double> stressTracker; 

   [EventHandler] public void OnInitialised()
   {
      dlayer = new double[15];
      Paddock.Get("dlayer", out dlayer);
      ll15_dep = new double[15];
      Paddock.Get("ll15_dep", out ll15_dep);
      dul_dep = new double[15];
      Paddock.Get("dul_dep", out dul_dep);
      stressTracker = new ManagerUtility.Tracker<double>(5); 

   }
   [EventHandler] public void OnProcess()
   {
      double stress = 0;
      Paddock.Get("sw_stress_photo", out stress);
      stressTracker.Add(stress);
   }
   [Output] double stress_5 {
      get {
         return(stressTracker.Average());
      }
      set {
      }
   }
   // Return the fraction of this layer we include in 
   private double LayerFrac (int layer, double max_depth) {
      double cum_depth = 0;
      for(int i = 0; i <= layer; i++)
         cum_depth += dlayer[i];
      if (cum_depth < max_depth)
         return 1.0;
      if (cum_depth - dlayer[layer] < max_depth)
         return((max_depth - (cum_depth - dlayer[layer])) / dlayer[layer]);
      return 0.0;
   }
   private double TopLayerFrac (int layer, double min_depth) {
      double cum_depth = 0;
      for(int i = 0; i <= layer; i++)
         cum_depth += dlayer[i];
      if (cum_depth <= min_depth)
         return 0.0;
      if (cum_depth - min_depth  < dlayer[layer] )
         return((cum_depth - min_depth) / dlayer[layer]);
      return 1.0;
   }
   //ESW calculated to 600mm
   [Output] double esw_0_600 {
      get {
         double[] sw_dep = new double[15];
         Paddock.Get("sw_dep", out sw_dep);
         
         // relative to LL15
         double[] SW = new double[sw_dep.Length]; //double s = 0;
         for (int i = 0; i < sw_dep.Length; i++) {
            SW[i] = Math.Max(0.0, sw_dep[i] - ll15_dep[i]) * LayerFrac(i, 600.0);
            //s += dlayer[i];
            //Console.WriteLine("L" + i.ToString() + " " + s + " = " + LayerFrac(i, 600.0));
         }
         return(MathUtility.Sum(SW));
      }
      set {}
   }

   //ESW calculated between 100 & 600mm
   [Output] double esw_100_600 {
      get {
         double[] sw_dep = new double[15];
         Paddock.Get("sw_dep", out sw_dep);
         double s = 0;
         // relative to LL15
         double[] SW = new double[sw_dep.Length]; //double s = 0;
         for (int i = 0; i < sw_dep.Length; i++) {
            SW[i] = Math.Max(0.0, sw_dep[i] - ll15_dep[i]) * LayerFrac(i, 600.0) * TopLayerFrac(i, 100);
            s += dlayer[i];
            //Console.WriteLine("1-6 L" + i.ToString() + " " + s + " = " + TopLayerFrac(i, 100) + ", " + LayerFrac(i, 600.0));
         }
         return(MathUtility.Sum(SW));
      }
      set {}
   }

   //ESW calculated to 1200mm
   [Output] double esw_1200 {
      get {
         double[] sw_dep = new double[15];
         Paddock.Get("sw_dep", out sw_dep);
         
         // relative to LL15
         double[] SW = new double[sw_dep.Length]; //double s = 0;
         for (int i = 0; i < sw_dep.Length; i++) {
            SW[i] = Math.Max(0.0, sw_dep[i] - ll15_dep[i]) * LayerFrac(i, 1200.0);
            //s += dlayer[i];
            //Console.WriteLine("L" + i.ToString() + " " + s + " = " + LayerFrac(i, 600.0));
         }
         return(MathUtility.Sum(SW));
      }
      set {}
   }
}
```
      outputfile outputfile Daily: filename=base outputfile Daily.out; title=base outputfile Daily; events=Reporting Frequency
        variables
          variables: dd/mm/yyyy as Date, StageName, DaysAfterSowing, lai, leaf_no, node_no, leaves_per_node, yield as Yield, biomass as Biomass, leafTotalWt, leafGreenWt, leafSenescedWt, grainTotalWt, podTotalWt, stemTotalWt, root_depth, sw, esw_layr as esw, esw_100_600, esw_0_600, stress_5, TT, TTAfterStart_Grain_fill, site, cultivar, Irrigation_level, tos as TOS
      outputfile outputfile Harvest: filename=base outputfile Harvest.out; title=base outputfile Harvest
        variables
          variable:
            dd/mm/yyyy as HarvestDate
            sow_day as SowDate
            yield
            biomass
            root_depth
            MaxLAI
            floral_initiation_das as BuddingDAS
            flowering_das as FloweringDAS
            start_grain_fill_das as PoddingDAS
            DaysAfterSowing as MaturityDAS
            Irrigation_level
            cultivar
            tos as TOS
            site
        events Reporting Frequency: event=harvesting
      Soil Black Vertosol (Lawes No037): ASCOrder=Vertosol; ASCSubOrder=Black; SoilType=Clay; Site=Lawes; NearestTown=Lawes, Q 4343; Region=Southeast Coast; State=Queensland; Country=Australia; NaturalVegetation=Blue Gum, Moreton Bay Ash, Tea Tree; ApsoilNumber=37; Latitude=-27.537; Longitude=152.336; LocationAccuracy=+/- 20m; YearOfSampling=0; DataSource=CSIRO Sustainable Ecosystems, Toowoomba; Comments=OC and ph estimated
        Water
          Thickness  BD    AirDry  LL15   DUL    SAT
          150        1.25  0.182   0.192  0.49   0.52
          150        1.25  0.259   0.273  0.48   0.52
          300        1.23  0.298   0.298  0.386  0.509
          300        1.27  0.257   0.257  0.37   0.495
          300        1.37  0.265   0.265  0.34   0.459
          300        1.35  0.272   0.272  0.332  0.466
          BD, DUL source: Field measured and checked for sensibility
          AirDry, LL15 source: Estimated based on local knowledge
          SAT source: Calculated from measured, estimated or calculated BD
          SoilCrop chickpea: LL=[0.192, 0.273, 0.298, 0.257, 0.265, 0.272]; KL=[0.08, 0.08, 0.08, 0.06, 0.04, 0.02]; XF=[1, 1, 1, 1, 1, 1]
        SoilWater: SummerCona=3.5; SummerU=6; SummerDate=1-Nov; WinterCona=2.5; WinterU=4; WinterDate=1-Apr; DiffusConst=40; DiffusSlope=16; Salb=0.12; CN2Bare=73; CNRed=20; CNCov=0.8; Thickness=[150, 150, 300, 300, 300, 300, 300]; SWCON=[0.3, 0.3, 0.3, 0.3, 0.3, 0.3, 0.3]
        SoilOrganicMatter: RootCN=40; RootWt=1000; SoilCN=12; EnrACoeff=7.4; EnrBCoeff=0.2; OCUnits=WalkleyBlack
          Thickness  OC        FBiom  FInert
          150        0.953846  0.04   0.4
          150        0.953846  0.02   0.6
          300        0.961538  0.02   0.8
          300        0.846154  0.02   1
          300        0.546154  0.01   1
          300        0.261538  0.01   1
          300        0.2       0.01   1
          OC source: Estimated based on local knowledge
        Analysis: Thickness=[150, 150, 300, 300, 300, 300, 300]; PH=[8, 8, 8, 8, 8, 8, 8]; PHUnits=Water; BoronUnits=HotWater
          PH source: Estimated based on local knowledge
        Sample Initial Conditions: NO3Units=kgha; NH4Units=kgha; SWUnits=Volumetric; OCUnits=Total; PHUnits=Water
          Thickness  NO3  NH4  SW
          150        22   0    0.33
          150        15   0    0.355
          300        7.5  0    0.34
          300        9    0    0.27
          300        11   0    0.265
          300        11   0    0.29
  simulation Gatton.irrigated.TOS1.HatTrick
    metfile met: filename=Gatton.met
    clock: start_date=21/05/2019; end_date=16/02/2020
    summaryfile
    area paddock
      surfaceom SurfaceOrganicMatter
        PoolName = wheat  # Organic Matter pool name
        type = wheat  # Organic Matter type
        mass = 50  # Initial surface residue (kg/ha)
        cnr = 60  # C:N ratio of initial residue
        standing_fraction = 0  # Fraction of residue standing
      fertiliser
      irrigation: same as Gatton.irrigated.TOS1.Genesis.paddock.Irrigation
      chickpea
      folder Manager folder
        manager Rules
          sow_date = 22/05/2019
          reset_date = 21/05/2019
          cultivar = HatTrick
          density = 25
          soil = Black Vertosol (Lawes No037)
          Irrigation_level = irrigated
          site = Gatton
          tos = TOS1
          on init:
          script: same as in Gatton.irrigated.TOS1.Genesis.paddock.Manager folder.Rules
          on start_of_day:
          script: same as in Gatton.irrigated.TOS1.Genesis.paddock.Manager folder.Rules
          on end_of_day:
```
if (under_crop > 0) then
   'outputfile Daily' do_output
endif
```
        manager2 SW Calcs: same as Gatton.irrigated.TOS1.Genesis.paddock.Manager folder.SW Calcs
      outputfile outputfile Daily: same as Gatton.irrigated.TOS1.Genesis.paddock.outputfile Daily
      outputfile outputfile Harvest: same as Gatton.irrigated.TOS1.Genesis.paddock.outputfile Harvest
      Soil Black Vertosol (Lawes No037): same as Gatton.irrigated.TOS1.Genesis.paddock.Black Vertosol (Lawes No037)
  simulation Gatton.irrigated.TOS2.Genesis
    metfile met: filename=Gatton.met
    clock: start_date=21/05/2019; end_date=16/02/2020
    summaryfile
    area paddock
      surfaceom SurfaceOrganicMatter
        PoolName = wheat  # Organic Matter pool name
        type = wheat  # Organic Matter type
        mass = 50  # Initial surface residue (kg/ha)
        cnr = 60  # C:N ratio of initial residue
        standing_fraction = 0  # Fraction of residue standing
      fertiliser
      irrigation: same as Gatton.irrigated.TOS1.Genesis.paddock.Irrigation
      chickpea
      folder Manager folder
        manager Rules
          sow_date = 10/06/2019
          reset_date = 21/05/2019
          cultivar = Genesis
          density = 25
          soil = Black Vertosol (Lawes No037)
          Irrigation_level = irrigated
          site = Gatton
          tos = TOS2
          on init:
          script: same as in Gatton.irrigated.TOS1.Genesis.paddock.Manager folder.Rules
          on start_of_day:
          script: same as in Gatton.irrigated.TOS1.Genesis.paddock.Manager folder.Rules
          on end_of_day:
```
if (under_crop > 0) then
   'outputfile Daily' do_output
endif
```
        manager2 SW Calcs: same as Gatton.irrigated.TOS1.Genesis.paddock.Manager folder.SW Calcs
      outputfile outputfile Daily: same as Gatton.irrigated.TOS1.Genesis.paddock.outputfile Daily
      outputfile outputfile Harvest: same as Gatton.irrigated.TOS1.Genesis.paddock.outputfile Harvest
      Soil Black Vertosol (Lawes No037): same as Gatton.irrigated.TOS1.Genesis.paddock.Black Vertosol (Lawes No037)
  simulation Gatton.irrigated.TOS2.HatTrick
    metfile met: filename=Gatton.met
    clock: start_date=21/05/2019; end_date=16/02/2020
    summaryfile
    area paddock
      surfaceom SurfaceOrganicMatter
        PoolName = wheat  # Organic Matter pool name
        type = wheat  # Organic Matter type
        mass = 50  # Initial surface residue (kg/ha)
        cnr = 60  # C:N ratio of initial residue
        standing_fraction = 0  # Fraction of residue standing
      fertiliser
      irrigation: same as Gatton.irrigated.TOS1.Genesis.paddock.Irrigation
      chickpea
      folder Manager folder
        manager Rules
          sow_date = 10/06/2019
          reset_date = 21/05/2019
          cultivar = HatTrick
          density = 25
          soil = Black Vertosol (Lawes No037)
          Irrigation_level = irrigated
          site = Gatton
          tos = TOS2
          on init:
          script: same as in Gatton.irrigated.TOS1.Genesis.paddock.Manager folder.Rules
          on start_of_day:
          script: same as in Gatton.irrigated.TOS1.Genesis.paddock.Manager folder.Rules
          on end_of_day:
```
if (under_crop > 0) then
   'outputfile Daily' do_output
endif
```
        manager2 SW Calcs: same as Gatton.irrigated.TOS1.Genesis.paddock.Manager folder.SW Calcs
      outputfile outputfile Daily: same as Gatton.irrigated.TOS1.Genesis.paddock.outputfile Daily
      outputfile outputfile Harvest: same as Gatton.irrigated.TOS1.Genesis.paddock.outputfile Harvest
      Soil Black Vertosol (Lawes No037): same as Gatton.irrigated.TOS1.Genesis.paddock.Black Vertosol (Lawes No037)
  simulation Gatton.irrigated.TOS3.Genesis
    metfile met: filename=Gatton.met
    clock: start_date=21/05/2019; end_date=16/02/2020
    summaryfile
    area paddock
      surfaceom SurfaceOrganicMatter
        PoolName = wheat  # Organic Matter pool name
        type = wheat  # Organic Matter type
        mass = 50  # Initial surface residue (kg/ha)
        cnr = 60  # C:N ratio of initial residue
        standing_fraction = 0  # Fraction of residue standing
      fertiliser
      irrigation: same as Gatton.irrigated.TOS1.Genesis.paddock.Irrigation
      chickpea
      folder Manager folder
        manager Rules
          sow_date = 25/06/2019
          reset_date = 21/05/2019
          cultivar = Genesis
          density = 25
          soil = Black Vertosol (Lawes No037)
          Irrigation_level = irrigated
          site = Gatton
          tos = TOS3
          on init:
          script: same as in Gatton.irrigated.TOS1.Genesis.paddock.Manager folder.Rules
          on start_of_day:
          script: same as in Gatton.irrigated.TOS1.Genesis.paddock.Manager folder.Rules
          on end_of_day:
```
if (under_crop > 0) then
   'outputfile Daily' do_output
endif
```
        manager2 SW Calcs: same as Gatton.irrigated.TOS1.Genesis.paddock.Manager folder.SW Calcs
      outputfile outputfile Daily: same as Gatton.irrigated.TOS1.Genesis.paddock.outputfile Daily
      outputfile outputfile Harvest: same as Gatton.irrigated.TOS1.Genesis.paddock.outputfile Harvest
      Soil Black Vertosol (Lawes No037): same as Gatton.irrigated.TOS1.Genesis.paddock.Black Vertosol (Lawes No037)
  simulation Gatton.irrigated.TOS3.HatTrick
    metfile met: filename=Gatton.met
    clock: start_date=21/05/2019; end_date=16/02/2020
    summaryfile
    area paddock
      surfaceom SurfaceOrganicMatter
        PoolName = wheat  # Organic Matter pool name
        type = wheat  # Organic Matter type
        mass = 50  # Initial surface residue (kg/ha)
        cnr = 60  # C:N ratio of initial residue
        standing_fraction = 0  # Fraction of residue standing
      fertiliser
      irrigation: same as Gatton.irrigated.TOS1.Genesis.paddock.Irrigation
      chickpea
      folder Manager folder
        manager Rules
          sow_date = 25/06/2019
          reset_date = 21/05/2019
          cultivar = HatTrick
          density = 25
          soil = Black Vertosol (Lawes No037)
          Irrigation_level = irrigated
          site = Gatton
          tos = TOS3
          on init:
          script: same as in Gatton.irrigated.TOS1.Genesis.paddock.Manager folder.Rules
          on start_of_day:
          script: same as in Gatton.irrigated.TOS1.Genesis.paddock.Manager folder.Rules
          on end_of_day:
```
if (under_crop > 0) then
   'outputfile Daily' do_output
endif
```
        manager2 SW Calcs: same as Gatton.irrigated.TOS1.Genesis.paddock.Manager folder.SW Calcs
      outputfile outputfile Daily: same as Gatton.irrigated.TOS1.Genesis.paddock.outputfile Daily
      outputfile outputfile Harvest: same as Gatton.irrigated.TOS1.Genesis.paddock.outputfile Harvest
      Soil Black Vertosol (Lawes No037): same as Gatton.irrigated.TOS1.Genesis.paddock.Black Vertosol (Lawes No037)
  simulation Gatton.rainfed.TOS1.Genesis
    metfile met: filename=Gatton.met
    clock: start_date=21/05/2019; end_date=16/02/2020
    summaryfile
    area paddock
      surfaceom SurfaceOrganicMatter
        PoolName = wheat  # Organic Matter pool name
        type = wheat  # Organic Matter type
        mass = 50  # Initial surface residue (kg/ha)
        cnr = 60  # C:N ratio of initial residue
        standing_fraction = 0  # Fraction of residue standing
      fertiliser
      irrigation: same as Gatton.irrigated.TOS1.Genesis.paddock.Irrigation
      chickpea
      folder Manager folder
        manager Rules
          sow_date = 22/05/2019
          reset_date = 21/05/2019
          cultivar = Genesis
          density = 25
          soil = Black Vertosol (Lawes No037)
          Irrigation_level = rainfed
          site = Gatton
          tos = TOS1
          on init:
          script: same as in Gatton.irrigated.TOS1.Genesis.paddock.Manager folder.Rules
          on start_of_day:
```
! finds if there is a crop in the field, if 0 no crop if1 crop

if (under_crop > 0 AND StageName = 'out') then
   under_crop = 0
endif


if (lai > MaxLAI) then
   MaxLAI = lai
endif

if (Today = Date('[reset_date]')) then 
   '[soil] Water' reset
   '[soil] Nitrogen' reset
   'SurfaceOrganicMatter' reset
endif

if (Today = Date('[sow_date]')) then
   chickpea sow cultivar = '[cultivar]', plants = [density] (/m2), sowing_depth = 40 (mm)
   MaxLAI = 0
   under_crop = 1
endif

! if maturity harvest the crop
if (StageName = 'harvest_ripe') or (plant_status = 'dead') then
   act_mods harvest
   act_mods end_crop
endif


if (today = Date('22-may')) then
irrigation apply amount = 40
endif

if (today = Date('11-jun')) then
irrigation apply amount = 15
endif

if (today = Date('26-jun')) then
irrigation apply amount = 15
endif

if (today = Date('15-aug')) then
irrigation apply amount = 15
endif
```
          on end_of_day:
```
if (under_crop > 0) then
   'outputfile Daily' do_output
endif
```
        manager2 SW Calcs: same as Gatton.irrigated.TOS1.Genesis.paddock.Manager folder.SW Calcs
      outputfile outputfile Daily: same as Gatton.irrigated.TOS1.Genesis.paddock.outputfile Daily
      outputfile outputfile Harvest: same as Gatton.irrigated.TOS1.Genesis.paddock.outputfile Harvest
      Soil Black Vertosol (Lawes No037): ASCOrder=Vertosol; ASCSubOrder=Black; SoilType=Clay; Site=Lawes; NearestTown=Lawes, Q 4343; Region=Southeast Coast; State=Queensland; Country=Australia; NaturalVegetation=Blue Gum, Moreton Bay Ash, Tea Tree; ApsoilNumber=37; Latitude=-27.537; Longitude=152.336; LocationAccuracy=+/- 20m; YearOfSampling=0; DataSource=CSIRO Sustainable Ecosystems, Toowoomba; Comments=OC and ph estimated
        Water: same as Gatton.irrigated.TOS1.Genesis.paddock.Black Vertosol (Lawes No037).Water
        SoilWater: same as Gatton.irrigated.TOS1.Genesis.paddock.Black Vertosol (Lawes No037).SoilWater
        SoilOrganicMatter: same as Gatton.irrigated.TOS1.Genesis.paddock.Black Vertosol (Lawes No037).SoilOrganicMatter
        Analysis: same as Gatton.irrigated.TOS1.Genesis.paddock.Black Vertosol (Lawes No037).Analysis
        Sample Initial Conditions: NO3Units=kgha; NH4Units=kgha; SWUnits=Volumetric; OCUnits=Total; PHUnits=Water
          Thickness  NO3  NH4  SW
          150        57   0    0.33
          150        35   0    0.355
          300        14   0    0.35
          300        17   0    0.31
          300        23   0    0.315
          300        27   0    0.33
  simulation Gatton.rainfed.TOS1.HatTrick
    metfile met: filename=Gatton.met
    clock: start_date=21/05/2019; end_date=16/02/2020
    summaryfile
    area paddock
      surfaceom SurfaceOrganicMatter
        PoolName = wheat  # Organic Matter pool name
        type = wheat  # Organic Matter type
        mass = 50  # Initial surface residue (kg/ha)
        cnr = 60  # C:N ratio of initial residue
        standing_fraction = 0  # Fraction of residue standing
      fertiliser
      irrigation: same as Gatton.irrigated.TOS1.Genesis.paddock.Irrigation
      chickpea
      folder Manager folder
        manager Rules
          sow_date = 22/05/2019
          reset_date = 21/05/2019
          cultivar = HatTrick
          density = 25
          soil = Black Vertosol (Lawes No037)
          Irrigation_level = rainfed
          site = Gatton
          tos = TOS1
          on init:
          script: same as in Gatton.irrigated.TOS1.Genesis.paddock.Manager folder.Rules
          on start_of_day:
          script: same as in Gatton.rainfed.TOS1.Genesis.paddock.Manager folder.Rules
          on end_of_day:
```
if (under_crop > 0) then
   'outputfile Daily' do_output
endif
```
        manager2 SW Calcs: same as Gatton.irrigated.TOS1.Genesis.paddock.Manager folder.SW Calcs
      outputfile outputfile Daily: same as Gatton.irrigated.TOS1.Genesis.paddock.outputfile Daily
      outputfile outputfile Harvest: same as Gatton.irrigated.TOS1.Genesis.paddock.outputfile Harvest
      Soil Black Vertosol (Lawes No037): same as Gatton.rainfed.TOS1.Genesis.paddock.Black Vertosol (Lawes No037)
  simulation Gatton.rainfed.TOS2.Genesis
    metfile met: filename=Gatton.met
    clock: start_date=21/05/2019; end_date=16/02/2020
    summaryfile
    area paddock
      surfaceom SurfaceOrganicMatter
        PoolName = wheat  # Organic Matter pool name
        type = wheat  # Organic Matter type
        mass = 50  # Initial surface residue (kg/ha)
        cnr = 60  # C:N ratio of initial residue
        standing_fraction = 0  # Fraction of residue standing
      fertiliser
      irrigation: same as Gatton.irrigated.TOS1.Genesis.paddock.Irrigation
      chickpea
      folder Manager folder
        manager Rules
          sow_date = 10/06/2019
          reset_date = 21/05/2019
          cultivar = Genesis
          density = 25
          soil = Black Vertosol (Lawes No037)
          Irrigation_level = rainfed
          site = Gatton
          tos = TOS2
          on init:
          script: same as in Gatton.irrigated.TOS1.Genesis.paddock.Manager folder.Rules
          on start_of_day:
          script: same as in Gatton.rainfed.TOS1.Genesis.paddock.Manager folder.Rules
          on end_of_day:
```
if (under_crop > 0) then
   'outputfile Daily' do_output
endif
```
        manager2 SW Calcs: same as Gatton.irrigated.TOS1.Genesis.paddock.Manager folder.SW Calcs
      outputfile outputfile Daily: same as Gatton.irrigated.TOS1.Genesis.paddock.outputfile Daily
      outputfile outputfile Harvest: same as Gatton.irrigated.TOS1.Genesis.paddock.outputfile Harvest
      Soil Black Vertosol (Lawes No037): same as Gatton.rainfed.TOS1.Genesis.paddock.Black Vertosol (Lawes No037)
  simulation Gatton.rainfed.TOS2.HatTrick
    metfile met: filename=Gatton.met
    clock: start_date=21/05/2019; end_date=16/02/2020
    summaryfile
    area paddock
      surfaceom SurfaceOrganicMatter
        PoolName = wheat  # Organic Matter pool name
        type = wheat  # Organic Matter type
        mass = 50  # Initial surface residue (kg/ha)
        cnr = 60  # C:N ratio of initial residue
        standing_fraction = 0  # Fraction of residue standing
      fertiliser
      irrigation: same as Gatton.irrigated.TOS1.Genesis.paddock.Irrigation
      chickpea
      folder Manager folder
        manager Rules
          sow_date = 10/06/2019
          reset_date = 21/05/2019
          cultivar = HatTrick
          density = 25
          soil = Black Vertosol (Lawes No037)
          Irrigation_level = rainfed
          site = Gatton
          tos = TOS2
          on init:
          script: same as in Gatton.irrigated.TOS1.Genesis.paddock.Manager folder.Rules
          on start_of_day:
          script: same as in Gatton.rainfed.TOS1.Genesis.paddock.Manager folder.Rules
          on end_of_day:
```
if (under_crop > 0) then
   'outputfile Daily' do_output
endif
```
        manager2 SW Calcs: same as Gatton.irrigated.TOS1.Genesis.paddock.Manager folder.SW Calcs
      outputfile outputfile Daily: same as Gatton.irrigated.TOS1.Genesis.paddock.outputfile Daily
      outputfile outputfile Harvest: same as Gatton.irrigated.TOS1.Genesis.paddock.outputfile Harvest
      Soil Black Vertosol (Lawes No037): same as Gatton.rainfed.TOS1.Genesis.paddock.Black Vertosol (Lawes No037)
  simulation Gatton.rainfed.TOS3.Genesis
    metfile met: filename=Gatton.met
    clock: start_date=21/05/2019; end_date=16/02/2020
    summaryfile
    area paddock
      surfaceom SurfaceOrganicMatter
        PoolName = wheat  # Organic Matter pool name
        type = wheat  # Organic Matter type
        mass = 50  # Initial surface residue (kg/ha)
        cnr = 60  # C:N ratio of initial residue
        standing_fraction = 0  # Fraction of residue standing
      fertiliser
      irrigation: same as Gatton.irrigated.TOS1.Genesis.paddock.Irrigation
      chickpea
      folder Manager folder
        manager Rules
          sow_date = 25/06/2019
          reset_date = 21/05/2019
          cultivar = Genesis
          density = 25
          soil = Black Vertosol (Lawes No037)
          Irrigation_level = rainfed
          site = Gatton
          tos = TOS3
          on init:
          script: same as in Gatton.irrigated.TOS1.Genesis.paddock.Manager folder.Rules
          on start_of_day:
          script: same as in Gatton.rainfed.TOS1.Genesis.paddock.Manager folder.Rules
          on end_of_day:
```
if (under_crop > 0) then
   'outputfile Daily' do_output
endif
```
        manager2 SW Calcs: same as Gatton.irrigated.TOS1.Genesis.paddock.Manager folder.SW Calcs
      outputfile outputfile Daily: same as Gatton.irrigated.TOS1.Genesis.paddock.outputfile Daily
      outputfile outputfile Harvest: same as Gatton.irrigated.TOS1.Genesis.paddock.outputfile Harvest
      Soil Black Vertosol (Lawes No037): same as Gatton.rainfed.TOS1.Genesis.paddock.Black Vertosol (Lawes No037)
  simulation Gatton.rainfed.TOS3.HatTrick
    metfile met: filename=Gatton.met
    clock: start_date=21/05/2019; end_date=16/02/2020
    summaryfile
    area paddock
      surfaceom SurfaceOrganicMatter
        PoolName = wheat  # Organic Matter pool name
        type = wheat  # Organic Matter type
        mass = 50  # Initial surface residue (kg/ha)
        cnr = 60  # C:N ratio of initial residue
        standing_fraction = 0  # Fraction of residue standing
      fertiliser
      irrigation: same as Gatton.irrigated.TOS1.Genesis.paddock.Irrigation
      chickpea
      folder Manager folder
        manager Rules
          sow_date = 25/06/2019
          reset_date = 21/05/2019
          cultivar = HatTrick
          density = 25
          soil = Black Vertosol (Lawes No037)
          Irrigation_level = rainfed
          site = Gatton
          tos = TOS3
          on init:
          script: same as in Gatton.irrigated.TOS1.Genesis.paddock.Manager folder.Rules
          on start_of_day:
          script: same as in Gatton.rainfed.TOS1.Genesis.paddock.Manager folder.Rules
          on end_of_day:
```
if (under_crop > 0) then
   'outputfile Daily' do_output
endif
```
        manager2 SW Calcs: same as Gatton.irrigated.TOS1.Genesis.paddock.Manager folder.SW Calcs
      outputfile outputfile Daily: same as Gatton.irrigated.TOS1.Genesis.paddock.outputfile Daily
      outputfile outputfile Harvest: same as Gatton.irrigated.TOS1.Genesis.paddock.outputfile Harvest
      Soil Black Vertosol (Lawes No037): same as Gatton.rainfed.TOS1.Genesis.paddock.Black Vertosol (Lawes No037)
  simulation Greenethorpe.irrigated.TOS1.Genesis
    metfile met: filename=Greenethorpe.met
    clock: start_date=29/04/2019; end_date=25/01/2020
    summaryfile
    area paddock
      surfaceom SurfaceOrganicMatter
        PoolName = wheat  # Organic Matter pool name
        type = wheat  # Organic Matter type
        mass = 50  # Initial surface residue (kg/ha)
        cnr = 60  # C:N ratio of initial residue
        standing_fraction = 0  # Fraction of residue standing
      fertiliser
      irrigation: same as Gatton.irrigated.TOS1.Genesis.paddock.Irrigation
      chickpea
      folder Manager folder
        manager Rules
          sow_date = 30/04/2019
          reset_date = 29/04/2019
          cultivar = Genesis
          density = 25
          soil = Sandy loam over a sandy clay and heavy clay (Greenethorpe No691)
          Irrigation_level = irrigated
          site = Greenethorpe
          tos = TOS1
          on init:
          script: same as in Gatton.irrigated.TOS1.Genesis.paddock.Manager folder.Rules
          on start_of_day:
```
! finds if there is a crop in the field, if 0 no crop if1 crop

if (under_crop > 0 AND StageName = 'out') then
   under_crop = 0
endif


if (lai > MaxLAI) then
   MaxLAI = lai
endif

if (Today = Date('[reset_date]')) then 
   '[soil] Water' reset
   '[soil] Nitrogen' reset
   'SurfaceOrganicMatter' reset
endif

if (Today = Date('[sow_date]')) then
   chickpea sow cultivar = '[cultivar]', plants = [density] (/m2), sowing_depth = 40 (mm)
   MaxLAI = 0
   under_crop = 1
endif

! if maturity harvest the crop
if (StageName = 'harvest_ripe') or (plant_status = 'dead') then
   act_mods harvest
   act_mods end_crop
endif


if (today = Date('21-may')) then
if (TOS = 'TOS2') then 
 irrigation apply amount = 15 
 endif
endif

if (today = Date('13-aug')) then
irrigation apply amount = 10
endif

if (today = Date('14-aug')) then
irrigation apply amount = 10
endif

if (today = Date('15-aug')) then
irrigation apply amount = 10
endif

if (today = Date('26-aug')) then
irrigation apply amount = 10
endif

if (today = Date('31-aug')) then
irrigation apply amount = 10
endif

if (today = Date('03-sep')) then
irrigation apply amount = 10
endif

if (today = Date('25-sep')) then
irrigation apply amount = 10
endif

if (today = Date('30-sep')) then
irrigation apply amount = 10
endif

if (today = Date('1-oct')) then
irrigation apply amount = 10
endif
```
          on end_of_day:
```
if (under_crop > 0) then
   'outputfile Daily' do_output
endif
```
        manager2 SW Calcs: same as Gatton.irrigated.TOS1.Genesis.paddock.Manager folder.SW Calcs
      outputfile outputfile Daily: same as Gatton.irrigated.TOS1.Genesis.paddock.outputfile Daily
      outputfile outputfile Harvest: same as Gatton.irrigated.TOS1.Genesis.paddock.outputfile Harvest
      Soil Sandy loam over a sandy clay and heavy clay (Greenethorpe No691): SoilType=Sandy loam; Site=Greenethorpe; NearestTown=Greenethorpe; Region=Central West Slopes and Plains; State=New South Wales; Country=Australia; ApsoilNumber=691; Latitude=-34.01972; Longitude=148.39261; LocationAccuracy=+/- 20m; YearOfSampling=0; Comments=Classification based on partical size analysis.
        DataSource=Data collected as part of the GRDC project ‘Training growers to manage soil water’ by CSIRO Sustainable Ecosystems in collaboration with farmers and Lachlan CMA
        Water
          Thickness  BD       AirDry    LL15      DUL       SAT
          150        1.48581  0.05      0.1       0.212928  0.409319
          150        1.48549  0.08      0.1       0.205254  0.409439
          300        1.53604  0.157622  0.157622  0.250329  0.390361
          300        1.47305  0.157622  0.157622  0.296632  0.414133
          300        1.62233  0.157622  0.157622  0.303414  0.357801
          300        1.59237  0.157622  0.157622  0.319104  0.369104
          SoilCrop wheat: LL=[0.1, 0.1, 0.157622, 0.218078, 0.262429, 0.283389]; KL=[0.06, 0.06, 0.06, 0.04, 0.04, 0.02]; XF=[1, 1, 1, 1, 1, 1]
          SoilCrop chickpea: LL=[0.1, 0.1, 0.157622, 0.218078, 0.262429, 0.283389]; KL=[0.06, 0.06, 0.06, 0.04, 0.04, 0.02]; XF=[1, 1, 1, 1, 1, 1]
          SoilCrop barley: LL=[0.1, 0.1, 0.157622, 0.218078, 0.262429, 0.283389]; KL=[0.07, 0.07, 0.07, 0.05, 0.05, 0.03]; XF=[1, 1, 1, 1, 1, 1]
          SoilCrop oats: LL=[0.1, 0.1, 0.157622, 0.218078, 0.262429, 0.283389]; KL=[0.06, 0.06, 0.06, 0.04, 0.04, 0.02]; XF=[1, 1, 1, 1, 1, 1]
            LL source: Estimated based on local knowledge
          SoilCrop canola: same as Greenethorpe.irrigated.TOS1.Genesis.paddock.Sandy loam over a sandy clay and heavy clay (Greenethorpe No691).Water.oats
        SoilWater: SummerCona=3.5; SummerU=6; SummerDate=1-Nov; WinterCona=2; WinterU=2; WinterDate=1-Apr; DiffusConst=88; DiffusSlope=35; Salb=0.13; CN2Bare=68; CNRed=20; CNCov=0.8; Thickness=[150, 150, 300, 300, 300, 300]; SWCON=[0.5, 0.5, 0.3, 0.3, 0.3, 0.3]
        SoilOrganicMatter: RootCN=40; RootWt=1000; SoilCN=12; EnrACoeff=7.4; EnrBCoeff=0.2; OCUnits=WalkleyBlack
          Thickness  OC         FBiom  FInert
          150        0.955455   0.04   0.4
          150        0.342068   0.02   0.5
          300        0.172858   0.02   0.7
          300        0.0459505  0.02   1
          300        0.0459505  0.01   1
          300        0.0459505  0.01   1
          OC source: Measured
        Analysis: PHUnits=Water; BoronUnits=HotWater
          Thickness  Texture          EC     PH   CL       Boron     CEC      Ca       Mg        Na         K         ESP       ParticleSizeSand  ParticleSizeSilt  ParticleSizeClay
          150        Sandy loam       0.051  4.9  14.7715  0.603847  5.39635  3.92467  0.518551  0.0558853  0.897242  1.03561   74.8673428        5.92687319        19.205784
          150        Sandy clay loam  0.052  5.3  14.7715  0.594115  6.99876  5.52656  0.987762  0.0399001  0.444529  0.570102  64.824            9.89027904        25.2858
          300        Sandy clay       0.033  6    9.62707  0.649316  8.67176  6.10458  2.07718   0.0451155  0.444887  0.520258  52.992            8.66627904        38.3418
          300        Heavy clay       0.054  6.4  17.4146  0.862613  14.0939  8.60517  4.7502    0.0929039  0.645651  0.659177  32.184            6.21828           61.5978
          300        Heavy clay       0.039  6.4  9.62707  1.26479   14.032   8.16469  4.96333   0.111667   0.792268  0.795807  35.448            5.40227903        59.1498
          300        -                -      6.4  -        -         -        -        -         -          -         -         -                 -                 -
          PH source: Unknown source or quality of data, Estimated based on local knowledge
        Sample Initial Conditions: NO3Units=kgha; NH4Units=kgha; SWUnits=Volumetric; OCUnits=Total; PHUnits=Water
          Thickness  NO3  NH4  SW
          150        42   0    0.1925
          150        14   0    0.3855
          300        7    0    0.319
          300        7    0    0.2965
          300        0    0    0.269
          300        0    0    0.255
  simulation Greenethorpe.irrigated.TOS1.HatTrick
    metfile met: filename=Greenethorpe.met
    clock: start_date=29/04/2019; end_date=25/01/2020
    summaryfile
    area paddock
      surfaceom SurfaceOrganicMatter
        PoolName = wheat  # Organic Matter pool name
        type = wheat  # Organic Matter type
        mass = 50  # Initial surface residue (kg/ha)
        cnr = 60  # C:N ratio of initial residue
        standing_fraction = 0  # Fraction of residue standing
      fertiliser
      irrigation: same as Gatton.irrigated.TOS1.Genesis.paddock.Irrigation
      chickpea
      folder Manager folder
        manager Rules
          sow_date = 30/04/2019
          reset_date = 29/04/2019
          cultivar = HatTrick
          density = 25
          soil = Sandy loam over a sandy clay and heavy clay (Greenethorpe No691)
          Irrigation_level = irrigated
          site = Greenethorpe
          tos = TOS1
          on init:
          script: same as in Gatton.irrigated.TOS1.Genesis.paddock.Manager folder.Rules
          on start_of_day:
          script: same as in Greenethorpe.irrigated.TOS1.Genesis.paddock.Manager folder.Rules
          on end_of_day:
```
if (under_crop > 0) then
   'outputfile Daily' do_output
endif
```
        manager2 SW Calcs: same as Gatton.irrigated.TOS1.Genesis.paddock.Manager folder.SW Calcs
      outputfile outputfile Daily: same as Gatton.irrigated.TOS1.Genesis.paddock.outputfile Daily
      outputfile outputfile Harvest: same as Gatton.irrigated.TOS1.Genesis.paddock.outputfile Harvest
      Soil Sandy loam over a sandy clay and heavy clay (Greenethorpe No691): same as Greenethorpe.irrigated.TOS1.Genesis.paddock.Sandy loam over a sandy clay and heavy clay (Greenethorpe No691)
  simulation Greenethorpe.irrigated.TOS2.Genesis
    metfile met: filename=Greenethorpe.met
    clock: start_date=29/04/2019; end_date=25/01/2020
    summaryfile
    area paddock
      surfaceom SurfaceOrganicMatter
        PoolName = wheat  # Organic Matter pool name
        type = wheat  # Organic Matter type
        mass = 50  # Initial surface residue (kg/ha)
        cnr = 60  # C:N ratio of initial residue
        standing_fraction = 0  # Fraction of residue standing
      fertiliser
      irrigation: same as Gatton.irrigated.TOS1.Genesis.paddock.Irrigation
      chickpea
      folder Manager folder
        manager Rules
          sow_date = 21/05/2019
          reset_date = 29/04/2019
          cultivar = Genesis
          density = 25
          soil = Sandy loam over a sandy clay and heavy clay (Greenethorpe No691)
          Irrigation_level = irrigated
          site = Greenethorpe
          tos = TOS2
          on init:
          script: same as in Gatton.irrigated.TOS1.Genesis.paddock.Manager folder.Rules
          on start_of_day:
          script: same as in Greenethorpe.irrigated.TOS1.Genesis.paddock.Manager folder.Rules
          on end_of_day:
```
if (under_crop > 0) then
   'outputfile Daily' do_output
endif
```
        manager2 SW Calcs: same as Gatton.irrigated.TOS1.Genesis.paddock.Manager folder.SW Calcs
      outputfile outputfile Daily: same as Gatton.irrigated.TOS1.Genesis.paddock.outputfile Daily
      outputfile outputfile Harvest: same as Gatton.irrigated.TOS1.Genesis.paddock.outputfile Harvest
      Soil Sandy loam over a sandy clay and heavy clay (Greenethorpe No691): same as Greenethorpe.irrigated.TOS1.Genesis.paddock.Sandy loam over a sandy clay and heavy clay (Greenethorpe No691)
  simulation Greenethorpe.irrigated.TOS2.HatTrick
    metfile met: filename=Greenethorpe.met
    clock: start_date=29/04/2019; end_date=25/01/2020
    summaryfile
    area paddock
      surfaceom SurfaceOrganicMatter
        PoolName = wheat  # Organic Matter pool name
        type = wheat  # Organic Matter type
        mass = 50  # Initial surface residue (kg/ha)
        cnr = 60  # C:N ratio of initial residue
        standing_fraction = 0  # Fraction of residue standing
      fertiliser
      irrigation: same as Gatton.irrigated.TOS1.Genesis.paddock.Irrigation
      chickpea
      folder Manager folder
        manager Rules
          sow_date = 21/05/2019
          reset_date = 29/04/2019
          cultivar = HatTrick
          density = 25
          soil = Sandy loam over a sandy clay and heavy clay (Greenethorpe No691)
          Irrigation_level = irrigated
          site = Greenethorpe
          tos = TOS2
          on init:
          script: same as in Gatton.irrigated.TOS1.Genesis.paddock.Manager folder.Rules
          on start_of_day:
          script: same as in Greenethorpe.irrigated.TOS1.Genesis.paddock.Manager folder.Rules
          on end_of_day:
```
if (under_crop > 0) then
   'outputfile Daily' do_output
endif
```
        manager2 SW Calcs: same as Gatton.irrigated.TOS1.Genesis.paddock.Manager folder.SW Calcs
      outputfile outputfile Daily: same as Gatton.irrigated.TOS1.Genesis.paddock.outputfile Daily
      outputfile outputfile Harvest: same as Gatton.irrigated.TOS1.Genesis.paddock.outputfile Harvest
      Soil Sandy loam over a sandy clay and heavy clay (Greenethorpe No691): same as Greenethorpe.irrigated.TOS1.Genesis.paddock.Sandy loam over a sandy clay and heavy clay (Greenethorpe No691)
  simulation Greenethorpe.irrigated.TOS3.Genesis
    metfile met: filename=Greenethorpe.met
    clock: start_date=29/04/2019; end_date=25/01/2020
    summaryfile
    area paddock
      surfaceom SurfaceOrganicMatter
        PoolName = wheat  # Organic Matter pool name
        type = wheat  # Organic Matter type
        mass = 50  # Initial surface residue (kg/ha)
        cnr = 60  # C:N ratio of initial residue
        standing_fraction = 0  # Fraction of residue standing
      fertiliser
      irrigation: same as Gatton.irrigated.TOS1.Genesis.paddock.Irrigation
      chickpea
      folder Manager folder
        manager Rules
          sow_date = 11/06/2019
          reset_date = 29/04/2019
          cultivar = Genesis
          density = 25
          soil = Sandy loam over a sandy clay and heavy clay (Greenethorpe No691)
          Irrigation_level = irrigated
          site = Greenethorpe
          tos = TOS3
          on init:
          script: same as in Gatton.irrigated.TOS1.Genesis.paddock.Manager folder.Rules
          on start_of_day:
          script: same as in Greenethorpe.irrigated.TOS1.Genesis.paddock.Manager folder.Rules
          on end_of_day:
```
if (under_crop > 0) then
   'outputfile Daily' do_output
endif
```
        manager2 SW Calcs: same as Gatton.irrigated.TOS1.Genesis.paddock.Manager folder.SW Calcs
      outputfile outputfile Daily: same as Gatton.irrigated.TOS1.Genesis.paddock.outputfile Daily
      outputfile outputfile Harvest: same as Gatton.irrigated.TOS1.Genesis.paddock.outputfile Harvest
      Soil Sandy loam over a sandy clay and heavy clay (Greenethorpe No691): same as Greenethorpe.irrigated.TOS1.Genesis.paddock.Sandy loam over a sandy clay and heavy clay (Greenethorpe No691)
  simulation Greenethorpe.irrigated.TOS3.HatTrick
    metfile met: filename=Greenethorpe.met
    clock: start_date=29/04/2019; end_date=25/01/2020
    summaryfile
    area paddock
      surfaceom SurfaceOrganicMatter
        PoolName = wheat  # Organic Matter pool name
        type = wheat  # Organic Matter type
        mass = 50  # Initial surface residue (kg/ha)
        cnr = 60  # C:N ratio of initial residue
        standing_fraction = 0  # Fraction of residue standing
      fertiliser
      irrigation: same as Gatton.irrigated.TOS1.Genesis.paddock.Irrigation
      chickpea
      folder Manager folder
        manager Rules
          sow_date = 11/06/2019
          reset_date = 29/04/2019
          cultivar = HatTrick
          density = 25
          soil = Sandy loam over a sandy clay and heavy clay (Greenethorpe No691)
          Irrigation_level = irrigated
          site = Greenethorpe
          tos = TOS3
          on init:
          script: same as in Gatton.irrigated.TOS1.Genesis.paddock.Manager folder.Rules
          on start_of_day:
          script: same as in Greenethorpe.irrigated.TOS1.Genesis.paddock.Manager folder.Rules
          on end_of_day:
```
if (under_crop > 0) then
   'outputfile Daily' do_output
endif
```
        manager2 SW Calcs: same as Gatton.irrigated.TOS1.Genesis.paddock.Manager folder.SW Calcs
      outputfile outputfile Daily: same as Gatton.irrigated.TOS1.Genesis.paddock.outputfile Daily
      outputfile outputfile Harvest: same as Gatton.irrigated.TOS1.Genesis.paddock.outputfile Harvest
      Soil Sandy loam over a sandy clay and heavy clay (Greenethorpe No691): same as Greenethorpe.irrigated.TOS1.Genesis.paddock.Sandy loam over a sandy clay and heavy clay (Greenethorpe No691)
  simulation Greenethorpe.rainfed.TOS1.Genesis
    metfile met: filename=Greenethorpe.met
    clock: start_date=29/04/2019; end_date=25/01/2020
    summaryfile
    area paddock
      surfaceom SurfaceOrganicMatter
        PoolName = wheat  # Organic Matter pool name
        type = wheat  # Organic Matter type
        mass = 50  # Initial surface residue (kg/ha)
        cnr = 60  # C:N ratio of initial residue
        standing_fraction = 0  # Fraction of residue standing
      fertiliser
      irrigation: same as Gatton.irrigated.TOS1.Genesis.paddock.Irrigation
      chickpea
      folder Manager folder
        manager Rules
          sow_date = 30/04/2019
          reset_date = 29/04/2019
          cultivar = Genesis
          density = 25
          soil = Sandy loam over a sandy clay and heavy clay (Greenethorpe No691)
          Irrigation_level = rainfed
          site = Greenethorpe
          tos = TOS1
          on init:
          script: same as in Gatton.irrigated.TOS1.Genesis.paddock.Manager folder.Rules
          on start_of_day:
```
! finds if there is a crop in the field, if 0 no crop if1 crop

if (under_crop > 0 AND StageName = 'out') then
   under_crop = 0
endif


if (lai > MaxLAI) then
   MaxLAI = lai
endif

if (Today = Date('[reset_date]')) then 
   '[soil] Water' reset
   '[soil] Nitrogen' reset
   'SurfaceOrganicMatter' reset
endif

if (Today = Date('[sow_date]')) then
   chickpea sow cultivar = '[cultivar]', plants = [density] (/m2), sowing_depth = 40 (mm)
   MaxLAI = 0
   under_crop = 1
endif

! if maturity harvest the crop
if (StageName = 'harvest_ripe') or (plant_status = 'dead') then
   act_mods harvest
   act_mods end_crop
endif
```
          on end_of_day:
```
if (under_crop > 0) then
   'outputfile Daily' do_output
endif
```
        manager2 SW Calcs: same as Gatton.irrigated.TOS1.Genesis.paddock.Manager folder.SW Calcs
      outputfile outputfile Daily: same as Gatton.irrigated.TOS1.Genesis.paddock.outputfile Daily
      outputfile outputfile Harvest: same as Gatton.irrigated.TOS1.Genesis.paddock.outputfile Harvest
      Soil Sandy loam over a sandy clay and heavy clay (Greenethorpe No691): same as Greenethorpe.irrigated.TOS1.Genesis.paddock.Sandy loam over a sandy clay and heavy clay (Greenethorpe No691)
  simulation Greenethorpe.rainfed.TOS1.HatTrick
    metfile met: filename=Greenethorpe.met
    clock: start_date=29/04/2019; end_date=25/01/2020
    summaryfile
    area paddock
      surfaceom SurfaceOrganicMatter
        PoolName = wheat  # Organic Matter pool name
        type = wheat  # Organic Matter type
        mass = 50  # Initial surface residue (kg/ha)
        cnr = 60  # C:N ratio of initial residue
        standing_fraction = 0  # Fraction of residue standing
      fertiliser
      irrigation: same as Gatton.irrigated.TOS1.Genesis.paddock.Irrigation
      chickpea
      folder Manager folder
        manager Rules
          sow_date = 30/04/2019
          reset_date = 29/04/2019
          cultivar = HatTrick
          density = 25
          soil = Sandy loam over a sandy clay and heavy clay (Greenethorpe No691)
          Irrigation_level = rainfed
          site = Greenethorpe
          tos = TOS1
          on init:
          script: same as in Gatton.irrigated.TOS1.Genesis.paddock.Manager folder.Rules
          on start_of_day:
          script: same as in Greenethorpe.rainfed.TOS1.Genesis.paddock.Manager folder.Rules
          on end_of_day:
```
if (under_crop > 0) then
   'outputfile Daily' do_output
endif
```
        manager2 SW Calcs: same as Gatton.irrigated.TOS1.Genesis.paddock.Manager folder.SW Calcs
      outputfile outputfile Daily: same as Gatton.irrigated.TOS1.Genesis.paddock.outputfile Daily
      outputfile outputfile Harvest: same as Gatton.irrigated.TOS1.Genesis.paddock.outputfile Harvest
      Soil Sandy loam over a sandy clay and heavy clay (Greenethorpe No691): same as Greenethorpe.irrigated.TOS1.Genesis.paddock.Sandy loam over a sandy clay and heavy clay (Greenethorpe No691)
  simulation Greenethorpe.rainfed.TOS2.Genesis
    metfile met: filename=Greenethorpe.met
    clock: start_date=29/04/2019; end_date=25/01/2020
    summaryfile
    area paddock
      surfaceom SurfaceOrganicMatter
        PoolName = wheat  # Organic Matter pool name
        type = wheat  # Organic Matter type
        mass = 50  # Initial surface residue (kg/ha)
        cnr = 60  # C:N ratio of initial residue
        standing_fraction = 0  # Fraction of residue standing
      fertiliser
      irrigation: same as Gatton.irrigated.TOS1.Genesis.paddock.Irrigation
      chickpea
      folder Manager folder
        manager Rules
          sow_date = 21/05/2019
          reset_date = 29/04/2019
          cultivar = Genesis
          density = 25
          soil = Sandy loam over a sandy clay and heavy clay (Greenethorpe No691)
          Irrigation_level = rainfed
          site = Greenethorpe
          tos = TOS2
          on init:
          script: same as in Gatton.irrigated.TOS1.Genesis.paddock.Manager folder.Rules
          on start_of_day:
          script: same as in Greenethorpe.rainfed.TOS1.Genesis.paddock.Manager folder.Rules
          on end_of_day:
```
if (under_crop > 0) then
   'outputfile Daily' do_output
endif
```
        manager2 SW Calcs: same as Gatton.irrigated.TOS1.Genesis.paddock.Manager folder.SW Calcs
      outputfile outputfile Daily: same as Gatton.irrigated.TOS1.Genesis.paddock.outputfile Daily
      outputfile outputfile Harvest: same as Gatton.irrigated.TOS1.Genesis.paddock.outputfile Harvest
      Soil Sandy loam over a sandy clay and heavy clay (Greenethorpe No691): same as Greenethorpe.irrigated.TOS1.Genesis.paddock.Sandy loam over a sandy clay and heavy clay (Greenethorpe No691)
  simulation Greenethorpe.rainfed.TOS2.HatTrick
    metfile met: filename=Greenethorpe.met
    clock: start_date=29/04/2019; end_date=25/01/2020
    summaryfile
    area paddock
      surfaceom SurfaceOrganicMatter
        PoolName = wheat  # Organic Matter pool name
        type = wheat  # Organic Matter type
        mass = 50  # Initial surface residue (kg/ha)
        cnr = 60  # C:N ratio of initial residue
        standing_fraction = 0  # Fraction of residue standing
      fertiliser
      irrigation: same as Gatton.irrigated.TOS1.Genesis.paddock.Irrigation
      chickpea
      folder Manager folder
        manager Rules
          sow_date = 21/05/2019
          reset_date = 29/04/2019
          cultivar = HatTrick
          density = 25
          soil = Sandy loam over a sandy clay and heavy clay (Greenethorpe No691)
          Irrigation_level = rainfed
          site = Greenethorpe
          tos = TOS2
          on init:
          script: same as in Gatton.irrigated.TOS1.Genesis.paddock.Manager folder.Rules
          on start_of_day:
          script: same as in Greenethorpe.rainfed.TOS1.Genesis.paddock.Manager folder.Rules
          on end_of_day:
```
if (under_crop > 0) then
   'outputfile Daily' do_output
endif
```
        manager2 SW Calcs: same as Gatton.irrigated.TOS1.Genesis.paddock.Manager folder.SW Calcs
      outputfile outputfile Daily: same as Gatton.irrigated.TOS1.Genesis.paddock.outputfile Daily
      outputfile outputfile Harvest: same as Gatton.irrigated.TOS1.Genesis.paddock.outputfile Harvest
      Soil Sandy loam over a sandy clay and heavy clay (Greenethorpe No691): same as Greenethorpe.irrigated.TOS1.Genesis.paddock.Sandy loam over a sandy clay and heavy clay (Greenethorpe No691)
  simulation Greenethorpe.rainfed.TOS3.Genesis
    metfile met: filename=Greenethorpe.met
    clock: start_date=29/04/2019; end_date=25/01/2020
    summaryfile
    area paddock
      surfaceom SurfaceOrganicMatter
        PoolName = wheat  # Organic Matter pool name
        type = wheat  # Organic Matter type
        mass = 50  # Initial surface residue (kg/ha)
        cnr = 60  # C:N ratio of initial residue
        standing_fraction = 0  # Fraction of residue standing
      fertiliser
      irrigation: same as Gatton.irrigated.TOS1.Genesis.paddock.Irrigation
      chickpea
      folder Manager folder
        manager Rules
          sow_date = 11/06/2019
          reset_date = 29/04/2019
          cultivar = Genesis
          density = 25
          soil = Sandy loam over a sandy clay and heavy clay (Greenethorpe No691)
          Irrigation_level = rainfed
          site = Greenethorpe
          tos = TOS3
          on init:
          script: same as in Gatton.irrigated.TOS1.Genesis.paddock.Manager folder.Rules
          on start_of_day:
          script: same as in Greenethorpe.rainfed.TOS1.Genesis.paddock.Manager folder.Rules
          on end_of_day:
```
if (under_crop > 0) then
   'outputfile Daily' do_output
endif
```
        manager2 SW Calcs: same as Gatton.irrigated.TOS1.Genesis.paddock.Manager folder.SW Calcs
      outputfile outputfile Daily: same as Gatton.irrigated.TOS1.Genesis.paddock.outputfile Daily
      outputfile outputfile Harvest: same as Gatton.irrigated.TOS1.Genesis.paddock.outputfile Harvest
      Soil Sandy loam over a sandy clay and heavy clay (Greenethorpe No691): same as Greenethorpe.irrigated.TOS1.Genesis.paddock.Sandy loam over a sandy clay and heavy clay (Greenethorpe No691)
  simulation Greenethorpe.rainfed.TOS3.HatTrick
    metfile met: filename=Greenethorpe.met
    clock: start_date=29/04/2019; end_date=25/01/2020
    summaryfile
    area paddock
      surfaceom SurfaceOrganicMatter
        PoolName = wheat  # Organic Matter pool name
        type = wheat  # Organic Matter type
        mass = 50  # Initial surface residue (kg/ha)
        cnr = 60  # C:N ratio of initial residue
        standing_fraction = 0  # Fraction of residue standing
      fertiliser
      irrigation: same as Gatton.irrigated.TOS1.Genesis.paddock.Irrigation
      chickpea
      folder Manager folder
        manager Rules
          sow_date = 11/06/2019
          reset_date = 29/04/2019
          cultivar = HatTrick
          density = 25
          soil = Sandy loam over a sandy clay and heavy clay (Greenethorpe No691)
          Irrigation_level = rainfed
          site = Greenethorpe
          tos = TOS3
          on init:
          script: same as in Gatton.irrigated.TOS1.Genesis.paddock.Manager folder.Rules
          on start_of_day:
          script: same as in Greenethorpe.rainfed.TOS1.Genesis.paddock.Manager folder.Rules
          on end_of_day:
```
if (under_crop > 0) then
   'outputfile Daily' do_output
endif
```
        manager2 SW Calcs: same as Gatton.irrigated.TOS1.Genesis.paddock.Manager folder.SW Calcs
      outputfile outputfile Daily: same as Gatton.irrigated.TOS1.Genesis.paddock.outputfile Daily
      outputfile outputfile Harvest: same as Gatton.irrigated.TOS1.Genesis.paddock.outputfile Harvest
      Soil Sandy loam over a sandy clay and heavy clay (Greenethorpe No691): same as Greenethorpe.irrigated.TOS1.Genesis.paddock.Sandy loam over a sandy clay and heavy clay (Greenethorpe No691)
