folder simulations chickpea subset: version=36; creator=Apsim 7.6-r3549
  simulation APS2CPE
    clock
      start_date = 29/5/1991
      end_date = 26/12/1991
    summaryfile
    metfile met: filename=%apsim%\Tests\Validation\Chickpeas\met\cooper.met
    area paddock
      outputfile: filename=APS2CPE.out; title=APS2CPE
        variables
          variable:
            day
            expcode as title
            Site
            Season
            Treatment
            dd/mm/yyyy as Date  # Date (dd/mm/yyyy)
            chickpea.Stage
            chickpea.DaysAfterSowing
            chickpea.TTAfterSowing
            chickpea.yield
            chickpea.biomass
            chickpea.green_biomass
            chickpea.dlt_dm
            chickpea.RootGreenWt
            chickpea.LeafGreenWt
            chickpea.StemGreenWt
            chickpea.PodGreenWt
            chickpea.grain_wt
            chickpea.stage
            chickpea.Stage
            chickpea.lai
            chickpea.tlai
            chickpea.slai
            chickpea.leaf_no as leaf_no
            chickpea.leaf_no_dead()
            chickpea.root_depth
            chickpea.grain_no
            chickpea.swdef_pheno
            chickpea.swdef_photo
            chickpea.swdef_expan
            chickpea.nfact_photo
            chickpea.nfact_grain
            chickpea.n_demand
            chickpea.n_supply_soil
            chickpea.n_supply
            chickpea.n_fix_pot
            chickpea.n_uptake
            chickpea.n_uptake_grain as grain_n
            chickpea.n_uptake_stover as stover_n
            chickpea.n_conc_stover
            no3()
            sw_dep()
            leafvegetativetotalwt aa leaf_biomass  # VegetativeTotal leaf dry matter
            podvegetativetotalwt  as pod_biomass  # VegetativeTotal Pod dry matter
            podvegetativewt  # Vegetative Pod dry matter
            stemvegetativetotalwt as stem_biomass  # VegetativeTotal Stem dry matter
            stemvegetativewt  # Vegetative Stem dry matter
        events: event=end_day
      operations
        30/05/1991  chickpea sow plants = 28, row_spacing = 350, sowing_depth = 50, cultivar = amethyst
        31/05/1991  irrigation apply amount = 40.0
        20/06/1991  irrigation apply amount = 40.0
        10/07/1991  irrigation apply amount = 40.0
        30/07/1991  irrigation apply amount = 40.0
        19/08/1991  irrigation apply amount = 40.0
        8/09/1991  irrigation apply amount = 40.0
        28/09/1991  irrigation apply amount = 40.0
        18/10/1991  irrigation apply amount = 40.0
        7/11/1991  irrigation apply amount = 40.0
      fertiliser
      irrigation
      manager output titles
        ExpCode = APS2CPE  # Experimental code
        Site = CP91GAT  # experimental site name
        Season = -Y1991  # calander year or years data is from
        Treatment1 = Amethyst  # treatment type
        on start_of_day:
```
     Expcode='[ExpCode]'
     Site='[Site]'
     Season='[Season]'
     Treatment='[Treatment1]'
```
      Soil
        Water
          Thickness  BD     AirDry  LL15   DUL    SAT
          150.0      1.380  0.050   0.180  0.384  0.434
          150.0      1.380  0.190   0.190  0.381  0.431
          300.0      1.320  0.200   0.200  0.440  0.490
          300.0      1.460  0.220   0.220  0.424  0.448
          300.0      1.510  0.190   0.190  0.419  0.430
          300.0      1.490  0.170   0.170  0.376  0.426
          300.0      1.470  0.170   0.170  0.377  0.427
          SoilCrop chickpea: LL=[0.250, 0.250, 0.230, 0.250, 0.200, 0.200, 0.200]; KL=[0.06, 0.06, 0.06, 0.05, 0.04, 0.02, 0.02]; XF=[1.00, 1.00, 1.00, 1.00, 1.00, 1.00, 1.00]
        SoilWater: SummerCona=2.0; SummerU=6.0; SummerDate=1-Nov; WinterCona=2.0; WinterU=6.0; WinterDate=1-Apr; DiffusConst=40.0; DiffusSlope=16.0; Salb=0.13; CN2Bare=72; CNRed=20.0; CNCov=0.8; Thickness=[150.0, 150.0, 300.0, 300.0, 300.0, 300.0, 300.0]; SWCON=[0.400, 0.400, 0.400, 0.400, 0.400, 0.400, 0.400]
        SoilOrganicMatter: RootCN=80.0; RootWt=500.0; SoilCN=14.5; EnrACoeff=7.4; EnrBCoeff=0.2
          Thickness  OC    FBiom  FInert
          150.0      1.2   0.02   0.36
          150.0      0.8   0.015  0.50
          300.0      0.5   0.01   0.59
          300.0      0.3   0.01   0.84
          300.0      0.2   0.01   0.80
          300.0      0.1   0.01   0.99
          300.0      0.10  0.01   0.99
        Analysis: Thickness=[150.0, 150.0, 300.0, 300.0, 300.0, 300.0, 300.0]; PH=[7.50, 8.00, 8.00, 8.00, 8.00, 8.00, 8.00]
        Sample Initial nitrogen
          Thickness  NO3   NH4
          150        14.3  0
          150        5.9   0
          300        1.8   0
          300        0.9   0
          300        1     0
          300        0.2   0
          300        0.1   0
        Sample Initial water: Thickness=[150.0, 150.0, 300.0, 300.0, 300.0, 300.0, 300.0]; SW=[0.384, 0.381, 0.440, 0.424, 0.419, 0.376, 0.377]
      surfaceom
        PoolName = unknown  # Organic Matter pool name
        type = wheat  # Organic Matter type
        mass = 0  # Initial surface residue (kg/ha)
        cnr = 0  # C:N ratio of initial residue
        standing_fraction = 0  # Fraction of residue standing
      chickpea
      manager Harvesting rule
        # Harvesting criteria
        crop = chickpea  # Enter name of crop to harvest when ripe
        on end_of_day:
```
           if ([crop].StageName = 'harvest_ripe' or [crop].plant_status = 'dead') then
              [crop]  harvest
              [crop]  end_crop
           endif
```
  simulation APS2CPL
    clock: start_date=29/5/1991; end_date=26/12/1991
    summaryfile
    metfile met: filename=%apsim%\Tests\Validation\Chickpeas\met\cooper.met
    area paddock
      outputfile: filename=APS2CPL.out; title=APS2CPL
        variables
          variable:
            day
            Expcode as Title
            Site
            Season
            Treatment
            dd/mm/yyyy as Date  # Date (dd/mm/yyyy)
            chickpea.Stage
            chickpea.DaysAfterSowing
            chickpea.TTAfterSowing
            chickpea.yield
            chickpea.biomass
            chickpea.green_biomass
            chickpea.dlt_dm
            chickpea.RootGreenWt
            chickpea.LeafGreenWt
            chickpea.StemGreenWt
            chickpea.PodGreenWt
            chickpea.grain_wt
            chickpea.stage
            chickpea.Stage
            chickpea.lai
            chickpea.tlai
            chickpea.slai
            chickpea.leaf_no as leaf_no
            chickpea.leaf_no_dead()
            chickpea.root_depth
            chickpea.grain_no
            chickpea.swdef_pheno
            chickpea.swdef_photo
            chickpea.swdef_expan
            chickpea.nfact_photo
            chickpea.nfact_grain
            chickpea.n_demand
            chickpea.n_supply_soil
            chickpea.n_supply
            chickpea.n_fix_pot
            chickpea.n_uptake
            chickpea.n_uptake_grain as grain_n
            chickpea.n_uptake_stover as stover_n
            chickpea.n_conc_stover
            no3()
            sw_dep()
        events: event=end_day
      operations
        09/08/1991  chickpea sow plants = 28, row_spacing = 350, sowing_depth = 50, cultivar = amethyst
        31/05/1991  irrigation apply amount = 40.0
        20/06/1991  irrigation apply amount = 40.0
        10/07/1991  irrigation apply amount = 40.0
        30/07/1991  irrigation apply amount = 40.0
        19/08/1991  irrigation apply amount = 40.0
        08/09/1991  irrigation apply amount = 40.0
        28/09/1991  irrigation apply amount = 40.0
        18/10/1991  irrigation apply amount = 40.0
        07/11/1991  irrigation apply amount = 40.0
      fertiliser
      irrigation
      manager output titles
        ExpCode = APS2CPl  # Experimental code
        Site = CP91GAT  # experimental site name
        Season = -Y1991  # calander year or years data is from
        Treatment1 = Amethyst  # treatment type
        on start_of_day:
```
Expcode='[ExpCode]'
     Site='[Site]'
     Season='[Season]'
     Treatment='[Treatment1]'
```
      Soil
        Water: same as APS2CPE.paddock.soil.Water
        SoilWater: same as APS2CPE.paddock.soil.SoilWater
        SoilOrganicMatter: same as APS2CPE.paddock.soil.SoilOrganicMatter
        Analysis: Thickness=[150.0, 150.0, 300.0, 300.0, 300.0, 300.0, 300.0]; PH=[7.50, 8.00, 8.00, 8.00, 8.00, 8.00, 8.00]
        Sample Initial nitrogen
          Thickness  NO3    NH4
          150.0      14.30  0
          150.0      5.90   0
          300.0      1.80   0
          300.0      0.90   0
          300.0      1.00   0
          300.0      0.20   0
          300.0      0.10   0
        Sample Initial water: Thickness=[150.0, 150.0, 300.0, 300.0, 300.0, 300.0, 300.0]; SW=[0.384, 0.381, 0.440, 0.424, 0.419, 0.376, 0.377]
      surfaceom
        PoolName = unknown  # Organic Matter pool name
        type = wheat  # Organic Matter type
        mass = 0.0  # Initial surface residue (kg/ha)
        cnr = 0.0  # C:N ratio of initial residue
        standing_fraction = 0.0  # Fraction of residue standing
      chickpea
      manager Harvesting rule
        # Harvesting criteria
        crop = chickpea  # Enter name of crop to harvest when ripe
        on end_of_day:
        script: same as in APS2CPE.paddock.Harvesting rule
  simulation A16P1T1A
    clock: start_date=24/5/1993; end_date=26/12/1993
    summaryfile
    metfile met: filename=%apsim%\Tests\Validation\Chickpeas\met\cooper.met
    area paddock
      outputfile: filename=A16P1T1A.out; title=A16P1T1A
        variables: same as APS2CPL.paddock.outputfile.variables
        events: event=end_day
      operations
        25/05/1993  'soil water' set sw = .413 .456 .408 .374 .327 .325 .371
        25/05/1993  chickpea sow plants = 41, row_spacing = 700, sowing_depth = 50, cultivar = amethyst
        05/07/1993  irrigation apply amount = 52.0
      fertiliser
      irrigation
      manager output titles
        ExpCode = A16P1T1A  # Experimental code
        Site = CP93gat  # experimental site name
        Season = -Y1993  # calander year or years data is from
        Treatment1 = Amethyst  # treatment type
        on start_of_day:
```
Expcode='[ExpCode]'
     Site='[Site]'
     Season='[Season]'
     Treatment='[Treatment1]'
```
      Soil
        Water: same as APS2CPE.paddock.soil.Water
        SoilWater: SummerCona=2; SummerU=6; SummerDate=1-Nov; WinterCona=2; WinterU=6; WinterDate=1-Apr; DiffusConst=40; DiffusSlope=16; Salb=0.13; CN2Bare=72; CNRed=20; CNCov=0.8; Thickness=[150.0, 150.0, 300.0, 300.0, 300.0, 300.0, 300.0]; SWCON=[0.400, 0.400, 0.400, 0.400, 0.400, 0.400, 0.400]
        SoilOrganicMatter: RootCN=80; RootWt=500; SoilCN=14.5; EnrACoeff=7.4; EnrBCoeff=0.2
          Thickness  OC    FBiom  FInert
          150.0      1.2   0.02   0.36
          150.0      0.8   0.015  0.50
          300.0      0.5   0.01   0.59
          300.0      0.3   0.01   0.84
          300.0      0.2   0.01   0.80
          300.0      0.1   0.01   0.99
          300.0      0.10  0.01   0.99
        Analysis: Thickness=[150.0, 150.0, 300.0, 300.0, 300.0, 300.0, 300.0]; PH=[7.50, 8.00, 8.00, 8.00, 8.00, 8.00, 8.00]
        Sample Initial nitrogen
          Thickness  NO3    NH4
          150.0      14.30  0
          150.0      5.90   0
          300.0      1.80   0
          300.0      0.90   0
          300.0      1.00   0
          300.0      0.20   0
          300.0      0.10   0
        Sample Initial water: Thickness=[150.0, 150.0, 300.0, 300.0, 300.0, 300.0, 300.0]; SW=[0.384, 0.381, 0.440, 0.424, 0.419, 0.376, 0.377]
      surfaceom
        PoolName = unknown  # Organic Matter pool name
        type = wheat  # Organic Matter type
        mass = 0.0  # Initial surface residue (kg/ha)
        cnr = 0.0  # C:N ratio of initial residue
        standing_fraction = 0.0  # Fraction of residue standing
      chickpea
      manager Harvesting rule
        # Harvesting criteria
        crop = chickpea  # Enter name of crop to harvest when ripe
        on end_of_day:
        script: same as in APS2CPE.paddock.Harvesting rule
  simulation A16P1T2A
    clock: start_date=24/5/1993; end_date=26/12/1993
    summaryfile
    metfile met: filename=%apsim%\Tests\Validation\Chickpeas\met\cooper.met
    area paddock
      outputfile: filename=A16P1T2A.out; title=A16P1T2A
        variables: same as APS2CPL.paddock.outputfile.variables
        events: event=end_day
      operations
        25/05/1993  'soil water' set sw = .413 .456 .408 .374 .327 .325 .371
        25/05/1993  chickpea sow plants = 35, row_spacing = 350, sowing_depth = 50, cultivar = amethyst
        05/07/1993  irrigation apply amount = 52.0
      fertiliser
      irrigation
      manager output titles
        ExpCode = A16P1T2A  # Experimental code
        Site = CP93gat  # experimental site name
        Season = -Y1993  # calander year or years data is from
        Treatment1 = Amethyst  # treatment type
        on start_of_day:
```
Expcode='[ExpCode]'
     Site='[Site]'
     Season='[Season]'
     Treatment='[Treatment1]'
```
      Soil: same as APS2CPL.paddock.soil
      surfaceom
        PoolName = unknown  # Organic Matter pool name
        type = wheat  # Organic Matter type
        mass = 0.0  # Initial surface residue (kg/ha)
        cnr = 0.0  # C:N ratio of initial residue
        standing_fraction = 0.0  # Fraction of residue standing
      chickpea
      manager Harvesting rule
        # Harvesting criteria
        crop = chickpea  # Enter name of crop to harvest when ripe
        on end_of_day:
        script: same as in APS2CPE.paddock.Harvesting rule
  simulation A16P1T3A
    clock: start_date=24/5/1993; end_date=26/12/1993
    summaryfile
    metfile met: filename=%apsim%\Tests\Validation\Chickpeas\met\cooper.met
    area paddock
      outputfile: filename=A16P1T3A.out; title=A16P1T3A
        variables: same as APS2CPL.paddock.outputfile.variables
        events: event=end_day
      operations
        25/05/1993  'soil water' set sw = .413 .456 .408 .374 .327 .325 .371
        25/05/1993  chickpea sow plants = 20, row_spacing = 170, sowing_depth = 50, cultivar = amethyst
        5/07/1993  irrigation apply amount = 52.0
      fertiliser
      irrigation
      manager output titles
        ExpCode = A16P1T3A  # Experimental code
        Site = CP93gat  # experimental site name
        Season = -Y1993  # calander year or years data is from
        Treatment1 = Amethyst  # treatment type
        on start_of_day:
```
Expcode='[ExpCode]'
     Site='[Site]'
     Season='[Season]'
     Treatment='[Treatment1]'
```
      Soil: same as APS2CPL.paddock.soil
      surfaceom
        PoolName = unknown  # Organic Matter pool name
        type = wheat  # Organic Matter type
        mass = 0.0  # Initial surface residue (kg/ha)
        cnr = 0.0  # C:N ratio of initial residue
        standing_fraction = 0.0  # Fraction of residue standing
      chickpea
      manager Harvesting rule
        # Harvesting criteria
        crop = chickpea  # Enter name of crop to harvest when ripe
        on end_of_day:
        script: same as in APS2CPE.paddock.Harvesting rule
  simulation A16P1T4A
    clock: start_date=24/5/1993; end_date=26/12/1993
    summaryfile
    metfile met: filename=%apsim%\Tests\Validation\Chickpeas\met\cooper.met
    area paddock
      outputfile: filename=A16P1T4A.out; title=A16P1T4A
        variables: same as APS2CPL.paddock.outputfile.variables
        events: event=end_day
      operations
        25/05/1993  'soil water' set sw = .413 .456 .408 .374 .327 .325 .371
        25/05/1993  chickpea sow plants = 18, row_spacing = 350, sowing_depth = 50, cultivar = amethyst
        05/07/1993  irrigation apply amount = 52.0
      fertiliser
      irrigation
      manager output titles
        ExpCode = A16P1T4A  # Experimental code
        Site = CP93gat  # experimental site name
        Season = -Y1993  # calander year or years data is from
        Treatment1 = Amethyst  # treatment type
        on start_of_day:
```
Expcode='[ExpCode]'
     Site='[Site]'
     Season='[Season]'
     Treatment='[Treatment1]'
```
      Soil: same as APS2CPL.paddock.soil
      surfaceom
        PoolName = unknown  # Organic Matter pool name
        type = wheat  # Organic Matter type
        mass = 0.0  # Initial surface residue (kg/ha)
        cnr = 0.0  # C:N ratio of initial residue
        standing_fraction = 0.0  # Fraction of residue standing
      chickpea
      manager Harvesting rule
        # Harvesting criteria
        crop = chickpea  # Enter name of crop to harvest when ripe
        on end_of_day:
        script: same as in APS2CPE.paddock.Harvesting rule
  simulation A16P1T5A
    clock: start_date=24/5/1993; end_date=26/12/1993
    summaryfile
    metfile met: filename=%apsim%\Tests\Validation\Chickpeas\met\cooper.met
    area paddock
      outputfile: filename=A16P1T5A.out; title=A16P1T5A
        variables: same as APS2CPL.paddock.outputfile.variables
        events: event=end_day
      operations
        25/05/1993  'soil water' set sw = .413 .456 .408 .374 .327 .325 .371
        25/05/1993  chickpea sow plants = 33, row_spacing = 170, sowing_depth = 50, cultivar = amethyst
        05/07/1993  irrigation apply amount = 52.0
      fertiliser
      irrigation
      manager output titles
        ExpCode = A16P1T5A  # Experimental code
        Site = CP93gat  # experimental site name
        Season = -Y1993  # calander year or years data is from
        Treatment1 = Amethyst  # treatment type
        on start_of_day:
```
Expcode='[ExpCode]'
     Site='[Site]'
     Season='[Season]'
     Treatment='[Treatment1]'
```
      Soil
        Water
          Thickness  BD    AirDry  LL15  DUL    SAT
          150        1.38  0.05    0.18  0.384  0.434
          150        1.38  0.19    0.19  0.381  0.431
          300        1.32  0.2     0.2   0.44   0.49
          300        1.46  0.22    0.22  0.424  0.448
          300        1.51  0.19    0.19  0.419  0.43
          300        1.49  0.17    0.17  0.376  0.426
          300        1.47  0.17    0.17  0.377  0.427
          SoilCrop chickpea: LL=[0.25, 0.25, 0.23, 0.25, 0.2, 0.2, 0.2]; KL=[0.06, 0.06, 0.06, 0.05, 0.04, 0.02, 0.02]; XF=[1, 1, 1, 1, 1, 1, 1]
        SoilWater: same as APS2CPE.paddock.soil.SoilWater
        SoilOrganicMatter: same as APS2CPE.paddock.soil.SoilOrganicMatter
        Analysis: Thickness=[150.0, 150.0, 300.0, 300.0, 300.0, 300.0, 300.0]; PH=[7.50, 8.00, 8.00, 8.00, 8.00, 8.00, 8.00]
        Sample Initial nitrogen
          Thickness  NO3    NH4
          150.0      14.30  0
          150.0      5.90   0
          300.0      1.80   0
          300.0      0.90   0
          300.0      1.00   0
          300.0      0.20   0
          300.0      0.10   0
        Sample Initial water: Thickness=[150.0, 150.0, 300.0, 300.0, 300.0, 300.0, 300.0]; SW=[0.384, 0.381, 0.440, 0.424, 0.419, 0.376, 0.377]
      surfaceom
        PoolName = unknown  # Organic Matter pool name
        type = wheat  # Organic Matter type
        mass = 0.0  # Initial surface residue (kg/ha)
        cnr = 0.0  # C:N ratio of initial residue
        standing_fraction = 0.0  # Fraction of residue standing
      chickpea
      manager Harvesting rule
        # Harvesting criteria
        crop = chickpea  # Enter name of crop to harvest when ripe
        on end_of_day:
        script: same as in APS2CPE.paddock.Harvesting rule
  simulation A16P2T1A
    clock: start_date=24/5/1993; end_date=26/12/1993
    summaryfile
    metfile met: filename=%apsim%\Tests\Validation\Chickpeas\met\cooper.met
    area paddock
      outputfile: filename=A16P2T1A.out; title=A16P2T1A
        variables: same as APS2CPL.paddock.outputfile.variables
        events: event=end_day
      operations
        25/05/1993  'soil water' set sw = .413 .456 .408 .374 .327 .325 .371
        21/07/1993  chickpea sow plants = 37, row_spacing = 700, sowing_depth = 50, cultivar = amethyst
      fertiliser
      irrigation
      manager output titles
        ExpCode = A16P2T1A  # Experimental code
        Site = CP93gat  # experimental site name
        Season = -Y1993  # calander year or years data is from
        Treatment1 = Amethyst  # treatment type
        on start_of_day:
```
Expcode='[ExpCode]'
     Site='[Site]'
     Season='[Season]'
     Treatment='[Treatment1]'
```
      Soil
        InitialWater Initial water: RelativeTo=ll15; FractionFull=0.90; PercentMethod=EvenlyDistributed
        Water
          Thickness  BD    AirDry  LL15   DUL    SAT
          150        1.32  0.1     0.31   0.413  0.453
          150        1.38  0.26    0.313  0.454  0.479
          300        1.33  0.32    0.376  0.495  0.498
          300        1.33  0.3     0.356  0.495  0.498
          300        1.42  0.27    0.3    0.418  0.464
          300        1.33  0.24    0.303  0.4    0.457
          300        1.35  0.31    0.31   0.37   0.435
          SoilCrop chickpea: LL=[0.25, 0.26, 0.32, 0.3, 0.27, 0.303, 0.31]; KL=[0.06, 0.06, 0.06, 0.05, 0.04, 0.02, 0.02]; XF=[1, 1, 1, 1, 1, 1, 1]
        SoilWater: SummerCona=2; SummerU=6; SummerDate=1-Nov; WinterCona=2; WinterU=6; WinterDate=1-Apr; DiffusConst=40; DiffusSlope=16; Salb=0.13; CN2Bare=75; CNRed=20; CNCov=0.8; Thickness=[150, 150, 300, 300, 300, 300, 300]; SWCON=[0.3, 0.3, 0.3, 0.3, 0.3, 0.3, 0.3]
        SoilOrganicMatter: RootCN=80.0; RootWt=500.0; SoilCN=14.5; EnrACoeff=7.4; EnrBCoeff=0.2
          Thickness  OC    FBiom  FInert
          150.0      1.00  0.05   0.39
          150.0      0.64  0.02   0.47
          300.0      0.64  0.015  0.60
          300.0      0.47  0.01   0.83
          300.0      0.47  0.01   0.93
          300.0      0.35  0.01   0.93
          300.0      0.26  0.01   0.93
        Analysis: Thickness=[150.0, 150.0, 300.0, 300.0, 300.0, 300.0, 300.0]; PH=[6.50, 6.20, 6.20, 6.30, 6.30, 6.40, 6.50]
        Sample Initial nitrogen
          Thickness  NO3   NH4
          150.0      14.4  0.60
          150.0      6.58  0.10
          300.0      2.45  0.10
          300.0      1.08  0.10
          300.0      0.15  0.10
          300.0      0.83  0.10
          300.0      2.30  0.10
      surfaceom
        PoolName = unknown  # Organic Matter pool name
        type = wheat  # Organic Matter type
        mass = 0.0  # Initial surface residue (kg/ha)
        cnr = 10.0  # C:N ratio of initial residue
        standing_fraction = 0.0  # Fraction of residue standing
      chickpea
      manager Harvesting rule
        # Harvesting criteria
        crop = chickpea  # Enter name of crop to harvest when ripe
        on end_of_day:
        script: same as in APS2CPE.paddock.Harvesting rule
  simulation A16P2T2A
    clock: start_date=24/5/1993; end_date=26/12/1993
    summaryfile
    metfile met: filename=%apsim%\Tests\Validation\Chickpeas\met\cooper.met
    area paddock
      outputfile: filename=A16P2T2A.out; title=A16P2T2A
        variables: same as APS2CPL.paddock.outputfile.variables
        events: event=end_day
      operations
        25/05/1993  'soil water' set sw = .413 .456 .408 .374 .327 .325 .371
        21/07/1993  chickpea sow plants = 41, row_spacing = 350, sowing_depth = 50, cultivar = amethyst
      fertiliser
      irrigation
      manager output titles
        ExpCode = A16P2T2A  # Experimental code
        Site = CP93gat  # experimental site name
        Season = -Y1993  # calander year or years data is from
        Treatment1 = Amethyst  # treatment type
        on start_of_day:
```
Expcode='[ExpCode]'
     Site='[Site]'
     Season='[Season]'
     Treatment='[Treatment1]'
```
      Soil
        InitialWater Initial water: FractionFull=0.91; PercentMethod=EvenlyDistributed
        Water: same as A16P2T1A.paddock.soil.Water
        SoilWater: SummerCona=2.0; SummerU=6.0; SummerDate=1-Nov; WinterCona=2.0; WinterU=6.0; WinterDate=1-Apr; DiffusConst=40.0; DiffusSlope=16.0; Salb=0.13; CN2Bare=75; CNRed=20.0; CNCov=0.8; Thickness=[150.0, 150.0, 300.0, 300.0, 300.0, 300.0, 300.0]; SWCON=[0.300, 0.300, 0.300, 0.300, 0.300, 0.300, 0.300]
        SoilOrganicMatter: same as A16P2T1A.paddock.soil.SoilOrganicMatter
        Analysis: Thickness=[150.0, 150.0, 300.0, 300.0, 300.0, 300.0, 300.0]; PH=[6.50, 6.20, 6.20, 6.30, 6.30, 6.40, 6.50]
        Sample Initial nitrogen
          Thickness  NO3   NH4
          150.0      14.4  0.60
          150.0      6.58  0.10
          300.0      2.45  0.10
          300.0      1.08  0.10
          300.0      0.15  0.10
          300.0      0.83  0.10
          300.0      2.30  0.10
      surfaceom
        PoolName = unknown  # Organic Matter pool name
        type = wheat  # Organic Matter type
        mass = 0.0  # Initial surface residue (kg/ha)
        cnr = 10.0  # C:N ratio of initial residue
        standing_fraction = 0.0  # Fraction of residue standing
      chickpea
      manager Harvesting rule
        # Harvesting criteria
        crop = chickpea  # Enter name of crop to harvest when ripe
        on end_of_day:
        script: same as in APS2CPE.paddock.Harvesting rule
  simulation A16P2T4A
    clock: start_date=24/5/1993; end_date=26/12/1993
    summaryfile
    metfile met: filename=%apsim%\Tests\Validation\Chickpeas\met\cooper.met
    area paddock
      outputfile: filename=A16P2T4A.out; title=A16P2T4A
        variables: same as APS2CPL.paddock.outputfile.variables
        events: event=end_day
      operations
        25/05/1993  'soil water' set sw = .413 .456 .408 .374 .327 .325 .371
        21/07/1993  chickpea sow plants = 18, row_spacing = 350, sowing_depth = 50, cultivar = amethyst
      fertiliser
      irrigation
      manager output titles
        ExpCode = A16P2T4A  # Experimental code
        Site = CP93gat  # experimental site name
        Season = -Y1993  # calander year or years data is from
        Treatment1 = Amethyst  # treatment type
        on start_of_day:
```
Expcode='[ExpCode]'
     Site='[Site]'
     Season='[Season]'
     Treatment='[Treatment1]'
```
      Soil
        InitialWater Initial water: FractionFull=0.90; PercentMethod=EvenlyDistributed
        Water: same as A16P2T1A.paddock.soil.Water
        SoilWater: same as A16P2T1A.paddock.soil.SoilWater
        SoilOrganicMatter: same as A16P2T1A.paddock.soil.SoilOrganicMatter
        Analysis: Thickness=[150.0, 150.0, 300.0, 300.0, 300.0, 300.0, 300.0]; PH=[6.50, 6.20, 6.20, 6.30, 6.30, 6.40, 6.50]
        Sample Initial nitrogen
          Thickness  NO3   NH4
          150.0      14.4  0.60
          150.0      6.58  0.10
          300.0      2.45  0.10
          300.0      1.08  0.10
          300.0      0.15  0.10
          300.0      0.83  0.10
          300.0      2.30  0.10
      surfaceom
        PoolName = unknown  # Organic Matter pool name
        type = wheat  # Organic Matter type
        mass = 0.0  # Initial surface residue (kg/ha)
        cnr = 10.0  # C:N ratio of initial residue
        standing_fraction = 0.0  # Fraction of residue standing
      chickpea
      manager Harvesting rule
        # Harvesting criteria
        crop = chickpea  # Enter name of crop to harvest when ripe
        on end_of_day:
        script: same as in APS2CPE.paddock.Harvesting rule
  simulation A16P2T5A
    clock: start_date=24/5/1993; end_date=26/12/1993
    summaryfile
    metfile met: filename=%apsim%\Tests\Validation\Chickpeas\met\cooper.met
    area paddock
      outputfile: filename=A16P2T5A.out; title=A16P2T5A
        variables: same as APS2CPL.paddock.outputfile.variables
        events: event=end_day
      operations
        25/05/1993  'soil water' set sw = .413 .456 .408 .374 .327 .325 .371
        21/07/1993  chickpea sow plants = 50, row_spacing = 170, sowing_depth = 50, cultivar = amethyst
      fertiliser
      irrigation
      manager output titles
        ExpCode = A16P2T5A  # Experimental code
        Site = CP93gat  # experimental site name
        Season = -Y1993  # calander year or years data is from
        Treatment1 = Amethyst  # treatment type
        on start_of_day:
```
Expcode='[ExpCode]'
     Site='[Site]'
     Season='[Season]'
     Treatment='[Treatment1]'
```
      Soil
        InitialWater Initial water: FractionFull=0.90; PercentMethod=EvenlyDistributed
        Water: same as A16P2T1A.paddock.soil.Water
        SoilWater: same as A16P2T2A.paddock.soil.SoilWater
        SoilOrganicMatter: same as A16P2T1A.paddock.soil.SoilOrganicMatter
        Analysis: Thickness=[150.0, 150.0, 300.0, 300.0, 300.0, 300.0, 300.0]; PH=[6.50, 6.20, 6.20, 6.30, 6.30, 6.40, 6.50]
        Sample Initial nitrogen
          Thickness  NO3   NH4
          150.0      14.4  0.60
          150.0      6.58  0.10
          300.0      2.45  0.10
          300.0      1.08  0.10
          300.0      0.15  0.10
          300.0      0.83  0.10
          300.0      2.30  0.10
      surfaceom
        PoolName = unknown  # Organic Matter pool name
        type = wheat  # Organic Matter type
        mass = 0.0  # Initial surface residue (kg/ha)
        cnr = 10.0  # C:N ratio of initial residue
        standing_fraction = 0.0  # Fraction of residue standing
      chickpea
      manager Harvesting rule
        # Harvesting criteria
        crop = chickpea  # Enter name of crop to harvest when ripe
        on end_of_day:
        script: same as in APS2CPE.paddock.Harvesting rule
  simulation B90C3P1
    clock: start_date=1/3/1990; end_date=31/12/1990
    summaryfile
    metfile met: filename=%apsim%\Tests\Validation\Chickpeas\met\biloela.met
    area paddock
      outputfile: filename=B90C3P1.out; title=B90C3P1
        variables: same as APS2CPL.paddock.outputfile.variables
        events: event=end_day
      operations
        07/03/1990  'soil water' set sw = 0.400 0.420 0.447 0.460
        13/03/1990  chickpea sow plants = 24.79, sowing_depth = 50, cultivar = amethyst
        08/03/1990  irrigation apply amount = 100.0
      fertiliser
      irrigation
      manager output titles
        ExpCode = B90C3P1  # Experimental code
        Site = CP93gat  # experimental site name
        Season = -Y1993  # calander year or years data is from
        Treatment1 = Amethyst  # treatment type
        on start_of_day:
```
Expcode='[ExpCode]'
     Site='[Site]'
     Season='[Season]'
     Treatment='[Treatment1]'
```
      Soil
        Water
          Thickness  BD     AirDry  LL15   DUL    SAT
          150.0      1.090  0.100   0.167  0.400  0.410
          150.0      1.270  0.167   0.167  0.420  0.430
          300.0      1.300  0.213   0.213  0.447  0.455
          300.0      1.300  0.220   0.220  0.460  0.470
          SoilCrop chickpea: LL=[0.167, 0.167, 0.250, 0.370]; KL=[0.080, 0.060, 0.040, 0.020]; XF=[1.0, 1.0, 1.0, 1.0]
        SoilWater: SummerCona=2.0; SummerU=6.0; SummerDate=1-Nov; WinterCona=2.0; WinterU=6.0; WinterDate=1-Apr; DiffusConst=40.0; DiffusSlope=16.0; Salb=0.13; CN2Bare=75; CNRed=20; CNCov=0.8; Thickness=[150.0, 150.0, 300.0, 300.0]; SWCON=[0.1, 0.1, 0.1, 0.1]
        SoilOrganicMatter: RootCN=80.0; RootWt=500.0; SoilCN=14.5; EnrACoeff=7.4; EnrBCoeff=0.2
          Thickness  OC    FBiom  FInert
          150.0      0.80  0.05   0.39
          150.0      0.40  0.02   0.47
          300.0      0.20  0.015  0.52
          300.0      0.20  0.015  0.52
        Analysis: Thickness=[150.0, 150.0, 300.0, 300.0]; PH=[7.50, 8.00, 8.00, 8.00]
        Sample Initial nitrogen
          Thickness  NO3   NH4
          150.0      3.90  0.60
          150.0      1.30  0.10
          300.0      1.50  0.10
          300.0      1.50  0.10
        Sample Initial water: Thickness=[150.0, 150.0, 300.0, 300.0]; SW=[0.400, 0.420, 0.447, 0.460]
      surfaceom
        PoolName = unknown  # Organic Matter pool name
        type = wheat  # Organic Matter type
        mass = 0.0  # Initial surface residue (kg/ha)
        cnr = 10.0  # C:N ratio of initial residue
        standing_fraction = 0.0  # Fraction of residue standing
      chickpea
      manager Harvesting rule
        # Harvesting criteria
        crop = chickpea  # Enter name of crop to harvest when ripe
        on end_of_day:
        script: same as in APS2CPE.paddock.Harvesting rule
  simulation B90C3P2
    clock: start_date=1/3/1990; end_date=31/12/1990
    summaryfile
    metfile met: filename=%apsim%\Tests\Validation\Chickpeas\met\biloela.met
    area paddock
      outputfile: filename=B90C3P2.out; title=B90C3P2
        variables: same as APS2CPL.paddock.outputfile.variables
        events: event=end_day
      operations
        08/03/1990  irrigation apply amount = 100.0
        07/03/1990  'soil water' set sw = 0.400 0.420 0.447 0.460
        27/04/1990  chickpea sow plants = 21.35, sowing_depth = 50, cultivar = amethyst
      fertiliser
      irrigation
      manager output titles
        ExpCode = A16P2T6A  # Experimental code
        Site = CP93gat  # experimental site name
        Season = -Y1993  # calander year or years data is from
        Treatment1 = Amethyst  # treatment type
        on start_of_day:
```
Expcode='[ExpCode]'
     Site='[Site]'
     Season='[Season]'
     Treatment='[Treatment1]'
```
      Soil: same as B90C3P1.paddock.soil
      surfaceom
        PoolName = unknown  # Organic Matter pool name
        type = wheat  # Organic Matter type
        mass = 0.0  # Initial surface residue (kg/ha)
        cnr = 10.0  # C:N ratio of initial residue
        standing_fraction = 0.0  # Fraction of residue standing
      chickpea
      manager Harvesting rule
        # Harvesting criteria
        crop = chickpea  # Enter name of crop to harvest when ripe
        on end_of_day:
        script: same as in APS2CPE.paddock.Harvesting rule
  simulation B90C3P3
    clock: start_date=1/3/1990; end_date=31/12/1990
    summaryfile
    metfile met: filename=%apsim%\Tests\Validation\Chickpeas\met\biloela.met
    area paddock
      outputfile: filename=B90C3P3.out; title=B90C3P3
        variables: same as APS2CPL.paddock.outputfile.variables
        events: event=end_day
      operations
        07/03/1990  'soil water' set sw = 0.400 0.420 0.447 0.460
        19/06/1990  chickpea sow plants = 24.43, sowing_depth = 50, cultivar = amethyst
        14/09/1990  irrigation apply amount = 100.0
      fertiliser
      irrigation
      manager output titles
        ExpCode = A16P2T7A  # Experimental code
        Site = CP93gat  # experimental site name
        Season = -Y1993  # calander year or years data is from
        Treatment1 = Amethyst  # treatment type
        on start_of_day:
```
Expcode='[ExpCode]'
     Site='[Site]'
     Season='[Season]'
     Treatment='[Treatment1]'
```
      Soil: same as B90C3P1.paddock.soil
      surfaceom
        PoolName = unknown  # Organic Matter pool name
        type = wheat  # Organic Matter type
        mass = 0.0  # Initial surface residue (kg/ha)
        cnr = 10.0  # C:N ratio of initial residue
        standing_fraction = 0.0  # Fraction of residue standing
      chickpea
      manager Harvesting rule
        # Harvesting criteria
        crop = chickpea  # Enter name of crop to harvest when ripe
        on end_of_day:
        script: same as in APS2CPE.paddock.Harvesting rule
  simulation B90C3P4
    clock: start_date=1/3/1990; end_date=31/12/1990
    summaryfile
    metfile met: filename=%apsim%\Tests\Validation\Chickpeas\met\biloela.met
    area paddock
      outputfile: filename=B90C3P4.out; title=B90C3P4
        variables: same as APS2CPL.paddock.outputfile.variables
        events: event=end_day
      operations
        07/03/1990  'soil water' set sw = 0.400 0.420 0.447 0.460
        17/07/1990  chickpea sow plants = 19.18, sowing_depth = 50, cultivar = amethyst
        14/09/1990  irrigation apply amount = 100.0
      fertiliser
      irrigation
      manager output titles
        ExpCode = A16P2T8A  # Experimental code
        Site = CP93gat  # experimental site name
        Season = -Y1993  # calander year or years data is from
        Treatment1 = Amethyst  # treatment type
        on start_of_day:
```
Expcode='[ExpCode]'
     Site='[Site]'
     Season='[Season]'
     Treatment='[Treatment1]'
```
      Soil: same as B90C3P1.paddock.soil
      surfaceom
        PoolName = unknown  # Organic Matter pool name
        type = wheat  # Organic Matter type
        mass = 0.0  # Initial surface residue (kg/ha)
        cnr = 10.0  # C:N ratio of initial residue
        standing_fraction = 0.0  # Fraction of residue standing
      chickpea
      manager Harvesting rule
        # Harvesting criteria
        crop = chickpea  # Enter name of crop to harvest when ripe
        on end_of_day:
        script: same as in APS2CPE.paddock.Harvesting rule
  simulation E89C3P1
    clock: start_date=5/3/1989; end_date=31/12/1989
    summaryfile
    metfile met: filename=%apsim%\Tests\Validation\Chickpeas\met\biloela.met
    area paddock
      outputfile: filename=E89C3P1.out; title=E89C3P1
        variables: same as APS2CPL.paddock.outputfile.variables
        events: event=end_day
      operations
        06/03/1989  chickpea sow plants = 13.7, sowing_depth = 50, cultivar = amethyst
        13/07/1989  irrigation apply amount = 50.0
        17/08/1989  irrigation apply amount = 100.0
        29/10/1989  irrigation apply amount = 100.0
      fertiliser
      irrigation
      manager output titles
        ExpCode = E89C3P1  # Experimental code
        Site = CP89emr  # experimental site name
        Season = -Y1989  # calander year or years data is from
        Treatment1 = amethyst  # treatment type
        on start_of_day:
```
Expcode='[ExpCode]'
     Site='[Site]'
     Season='[Season]'
     Treatment='[Treatment1]'
```
      Soil
        Water
          Thickness  BD    AirDry  LL15  DUL    SAT
          150        1.09  0.14    0.28  0.48   0.49
          150        1.27  0.14    0.28  0.467  0.47
          300        1.3   0.14    0.3   0.484  0.49
          300        1.3   0.14    0.3   0.48   0.49
          SoilCrop chickpea: LL=[0.28, 0.28, 0.34, 0.34]; KL=[0.06, 0.06, 0.04, 0.2]; XF=[1, 1, 1, 1]
        SoilWater: SummerCona=2.0; SummerU=6.0; SummerDate=1-Nov; WinterCona=2.0; WinterU=6.0; WinterDate=1-Apr; DiffusConst=40.0; DiffusSlope=16.0; Salb=0.13; CN2Bare=75; CNRed=20; CNCov=0.8; Thickness=[150, 150, 300, 300]; SWCON=[0.1, 0.1, 0.1, 0.1]
        SoilOrganicMatter: RootCN=80.0; RootWt=500.0; SoilCN=14.5; EnrACoeff=7.4; EnrBCoeff=0.2
          Thickness  OC   FBiom  FInert
          150        0.8  0.05   0.39
          150        0.4  0.02   0.47
          300        0.2  0.015  0.52
          300        0.2  0.015  0.52
        Analysis: Thickness=[150, 150, 300, 300]; PH=[7.5, 8, 8, 8]
        Sample Initial nitrogen
          Thickness  NO3    NH4
          150.0      3.900  0.600
          150.0      1.300  0.100
          300.0      1.500  0.100
          300.0      -      -
        Sample Initial water: Thickness=[150.0, 150.0, 300.0, 300.0]; SW=[0.480, 0.460, 0.480, 0.480]
      surfaceom
        PoolName = unknown  # Organic Matter pool name
        type = wheat  # Organic Matter type
        mass = 0.0  # Initial surface residue (kg/ha)
        cnr = 10.0  # C:N ratio of initial residue
        standing_fraction = 0.0  # Fraction of residue standing
      chickpea
      manager Harvesting rule
        # Harvesting criteria
        crop = chickpea  # Enter name of crop to harvest when ripe
        on end_of_day:
        script: same as in APS2CPE.paddock.Harvesting rule
  simulation E89C3P2
    clock: start_date=5/3/1989; end_date=31/12/1989
    summaryfile
    metfile met: filename=%apsim%\Tests\Validation\Chickpeas\met\Emer89.met
    area paddock
      outputfile: filename=E89C3P2.out; title=E89C3P2
        variables: same as APS2CPL.paddock.outputfile.variables
        events: event=end_day
      operations
        14/04/1989  chickpea sow plants = 18.6, sowing_depth = 50, cultivar = amethyst
        13/07/1989  irrigation apply amount = 50.0
        17/08/1989  irrigation apply amount = 100.0
        29/10/1989  irrigation apply amount = 100.0
      fertiliser
      irrigation
      manager output titles
        ExpCode = E89C3P2  # Experimental code
        Site = CP89emr  # experimental site name
        Season = -Y1989  # calander year or years data is from
        Treatment1 = amethyst  # treatment type
        on start_of_day:
```
Expcode='[ExpCode]'
     Site='[Site]'
     Season='[Season]'
     Treatment='[Treatment1]'
```
      Soil
        Water
          Thickness  BD    AirDry  LL15  DUL    SAT
          150        1.09  0.14    0.28  0.48   0.49
          150        1.27  0.14    0.28  0.467  0.47
          300        1.3   0.14    0.3   0.484  0.49
          300        8     0.14    0.3   0.48   0.49
          SoilCrop chickpea: LL=[0.28, 0.28, 0.34, 0.34]; KL=[0.06, 0.06, 0.04, 0.02]; XF=[1, 1, 1, 1]
        SoilWater: SummerCona=2.0; SummerU=6.0; SummerDate=1-Nov; WinterCona=2.0; WinterU=6.0; WinterDate=1-Apr; DiffusConst=40.0; DiffusSlope=16.0; Salb=0.13; CN2Bare=75; CNRed=20; CNCov=0.8; Thickness=[150, 150, 300, 300]; SWCON=[0.1, 0.1, 0.1, 0.1]
        SoilOrganicMatter: RootCN=80.0; RootWt=500.0; SoilCN=14.5; EnrACoeff=7.4; EnrBCoeff=0.2
          Thickness  OC   FBiom  FInert
          150        0.8  0.05   0.39
          150        0.4  0.02   0.47
          300        0.2  0.015  0.52
          300        0.2  0.015  0.52
        Analysis: Thickness=[150, 150, 300, 300]; PH=[7.5, 8, 8, 8]
        Sample Initial nitrogen
          Thickness  NO3    NH4
          150.0      3.900  0.600
          150.0      1.300  0.100
          300.0      1.500  0.100
          300.0      -      -
        Sample Initial water: Thickness=[150.0, 150.0, 300.0, 300.0]; SW=[0.480, 0.460, 0.480, 0.480]
      surfaceom
        PoolName = unknown  # Organic Matter pool name
        type = wheat  # Organic Matter type
        mass = 0.0  # Initial surface residue (kg/ha)
        cnr = 10.0  # C:N ratio of initial residue
        standing_fraction = 0.0  # Fraction of residue standing
      chickpea
      manager Harvesting rule
        # Harvesting criteria
        crop = chickpea  # Enter name of crop to harvest when ripe
        on end_of_day:
        script: same as in APS2CPE.paddock.Harvesting rule
  simulation E89C3P3
    clock: start_date=5/3/1989; end_date=31/12/1989
    summaryfile
    metfile met: filename=%apsim%\Tests\Validation\Chickpeas\met\Emer89.met
    area paddock
      outputfile: filename=E89C3P3.out; title=E89C3P3
        variables: same as APS2CPL.paddock.outputfile.variables
        events: event=end_day
      operations
        03/05/1989  chickpea sow plants = 18.7, sowing_depth = 50, cultivar = amethyst
        13/07/1989  irrigation apply amount = 50.0
        17/08/1989  irrigation apply amount = 100.0
        29/10/1989  irrigation apply amount = 100.0
      fertiliser
      irrigation
      manager output titles
        ExpCode = E89C3P3  # Experimental code
        Site = CP89emr  # experimental site name
        Season = -Y1989  # calander year or years data is from
        Treatment1 = amethyst  # treatment type
        on start_of_day:
```
Expcode='[ExpCode]'
     Site='[Site]'
     Season='[Season]'
     Treatment='[Treatment1]'
```
      surfaceom
        PoolName = unknown  # Organic Matter pool name
        type = wheat  # Organic Matter type
        mass = 0.0  # Initial surface residue (kg/ha)
        cnr = 10.0  # C:N ratio of initial residue
        standing_fraction = 0.0  # Fraction of residue standing
      chickpea
      manager Harvesting rule
        # Harvesting criteria
        crop = chickpea  # Enter name of crop to harvest when ripe
        on end_of_day:
        script: same as in APS2CPE.paddock.Harvesting rule
      Soil: same as E89C3P2.paddock.soil
  simulation E89C3P4
    clock: start_date=5/3/1989; end_date=31/12/1989
    summaryfile
    metfile met: filename=%apsim%\Tests\Validation\Chickpeas\met\Emer89.met
    area paddock
      outputfile: filename=E89C3P4.out; title=E89C3P4
        variables: same as APS2CPL.paddock.outputfile.variables
        events: event=end_day
      operations
        19/07/1989  chickpea sow plants = 18.8, sowing_depth = 50, cultivar = amethyst
        13/07/1989  irrigation apply amount = 50.0
        17/08/1989  irrigation apply amount = 100.0
        29/10/1989  irrigation apply amount = 100.0
      fertiliser
      irrigation
      manager output titles
        ExpCode = E89C3P4  # Experimental code
        Site = CP89emr  # experimental site name
        Season = -Y1989  # calander year or years data is from
        Treatment1 = amethyst  # treatment type
        on start_of_day:
```
Expcode='[ExpCode]'
     Site='[Site]'
     Season='[Season]'
     Treatment='[Treatment1]'
```
      surfaceom
        PoolName = unknown  # Organic Matter pool name
        type = wheat  # Organic Matter type
        mass = 0.0  # Initial surface residue (kg/ha)
        cnr = 10.0  # C:N ratio of initial residue
        standing_fraction = 0.0  # Fraction of residue standing
      chickpea
      manager Harvesting rule
        # Harvesting criteria
        crop = chickpea  # Enter name of crop to harvest when ripe
        on end_of_day:
        script: same as in APS2CPE.paddock.Harvesting rule
      Soil: same as E89C3P2.paddock.soil
  simulation GE90C3
    clock: start_date=20/5/1990; end_date=31/12/1990
    summaryfile
    metfile met: filename=%apsim%\Tests\Validation\Chickpeas\met\cooper.met
    area paddock
      outputfile: filename=GE90C3.out; title=GE90C3
        variables: same as APS2CPL.paddock.outputfile.variables
        events: event=end_day
      operations
        21/05/1990  'soil water' set sw = 0.413 0.454 0.495 0.495 0.418 0.406 0.385
        21/05/1990  chickpea sow plants = 33.4, sowing_depth = 50, cultivar = amethyst
        29/07/1990  irrigation apply amount = 100.0
        28/08/1990  irrigation apply amount = 100.0
        27/09/1990  irrigation apply amount = 100.0
      fertiliser
      irrigation
      manager output titles
        ExpCode = GE90C3  # Experimental code
        Site = CP90gat  # experimental site name
        Season = -Y1990  # calander year or years data is from
        Treatment1 = amethyst  # treatment type
        on start_of_day:
```
Expcode='[ExpCode]'
     Site='[Site]'
     Season='[Season]'
     Treatment='[Treatment1]'
```
      Soil
        Water: same as A16P2T1A.paddock.soil.Water
        SoilWater: same as A16P2T1A.paddock.soil.SoilWater
        SoilOrganicMatter: same as A16P2T1A.paddock.soil.SoilOrganicMatter
        Analysis: Thickness=[150.0, 150.0, 300.0, 300.0, 300.0, 300.0, 300.0]; PH=[6.50, 6.20, 6.20, 6.30, 6.30, 6.40, 6.50]
        Sample Initial nitrogen
          Thickness  NO3   NH4
          150.0      14.4  0.60
          150.0      6.58  0.10
          300.0      2.45  0.10
          300.0      1.08  0.10
          300.0      0.15  0.10
          300.0      0.83  0.10
          300.0      2.30  0.10
        Sample Initial water: Thickness=[150.0, 150.0, 300.0, 300.0, 300.0, 300.0, 300.0]; SW=[0.413, 0.456, 0.408, 0.374, 0.327, 0.325, 0.371]
      surfaceom
        PoolName = unknown  # Organic Matter pool name
        type = wheat  # Organic Matter type
        mass = 0.0  # Initial surface residue (kg/ha)
        cnr = 10.0  # C:N ratio of initial residue
        standing_fraction = 0.0  # Fraction of residue standing
      chickpea
      manager Harvesting rule
        # Harvesting criteria
        crop = chickpea  # Enter name of crop to harvest when ripe
        on end_of_day:
        script: same as in APS2CPE.paddock.Harvesting rule
  simulation GL90C3
    clock: start_date=20/5/1990; end_date=31/12/1990
    summaryfile
    metfile met: filename=%apsim%\Tests\Validation\Chickpeas\met\cooper.met
    area paddock
      outputfile: filename=GL90C3.out; title=GL90C3
        variables: same as APS2CPL.paddock.outputfile.variables
        events: event=end_day
      operations
        21/05/1990  'soil water' set sw = 0.413 0.454 0.495 0.495 0.418 0.406 0.385
        07/08/1990  chickpea sow plants = 43.0, sowing_depth = 50, cultivar = amethyst
        17/09/1990  irrigation apply amount = 100.0
        07/10/1990  irrigation apply amount = 100.0
        27/10/1990  irrigation apply amount = 100.0
        16/11/1990  irrigation apply amount = 100.0
        26/11/1990  irrigation apply amount = 100.0
      fertiliser
      irrigation
      manager output titles
        ExpCode = GL90C3  # Experimental code
        Site = CP90gat  # experimental site name
        Season = -Y1990  # calander year or years data is from
        Treatment1 = amethyst  # treatment type
        on start_of_day:
```
Expcode='[ExpCode]'
     Site='[Site]'
     Season='[Season]'
     Treatment='[Treatment1]'
```
      Soil
        Water: same as A16P2T1A.paddock.soil.Water
        SoilWater: same as A16P2T2A.paddock.soil.SoilWater
        SoilOrganicMatter: same as A16P2T1A.paddock.soil.SoilOrganicMatter
        Analysis: Thickness=[150.0, 150.0, 300.0, 300.0, 300.0, 300.0, 300.0]; PH=[6.50, 6.20, 6.20, 6.30, 6.30, 6.40, 6.50]
        Sample Initial nitrogen
          Thickness  NO3   NH4
          150.0      14.4  0.60
          150.0      6.58  0.10
          300.0      2.45  0.10
          300.0      1.08  0.10
          300.0      0.15  0.10
          300.0      0.83  0.10
          300.0      2.30  0.10
        Sample Initial water: Thickness=[150.0, 150.0, 300.0, 300.0, 300.0, 300.0, 300.0]; SW=[0.413, 0.456, 0.408, 0.374, 0.327, 0.325, 0.371]
      surfaceom
        PoolName = unknown  # Organic Matter pool name
        type = wheat  # Organic Matter type
        mass = 0.0  # Initial surface residue (kg/ha)
        cnr = 10.0  # C:N ratio of initial residue
        standing_fraction = 0.0  # Fraction of residue standing
      chickpea
      manager Harvesting rule
        # Harvesting criteria
        crop = chickpea  # Enter name of crop to harvest when ripe
        on end_of_day:
        script: same as in APS2CPE.paddock.Harvesting rule
  simulation HL90C3
    clock: start_date=18/8/1990; end_date=19/12/1990
    summaryfile
    metfile met: filename=%apsim%\Tests\Validation\Chickpeas\met\Herm90.met
    area paddock
      outputfile: filename=HL90C3.out; title=HL90C3
        variables: same as APS2CPL.paddock.outputfile.variables
        events: event=end_day
      operations
        20/08/1990  chickpea sow plants = 36.7, sowing_depth = 50, cultivar = amethyst
        28/09/1990  irrigation apply amount = 40.0
      fertiliser
      irrigation
      manager output titles
        ExpCode = HL90C3  # Experimental code
        Site = CP90Her  # experimental site name
        Season = -Y1990  # calander year or years data is from
        Treatment1 = amethyst  # treatment type
        on start_of_day:
```
Expcode='[ExpCode]'
     Site='[Site]'
     Season='[Season]'
     Treatment='[Treatment1]'
```
      Soil
        InitialWater Initial water: FractionFull=0.80; PercentMethod=EvenlyDistributed
        Water
          Thickness  BD     AirDry  LL15   DUL    SAT
          150.0      1.030  0.100   0.200  0.380  0.450
          150.0      1.060  0.200   0.200  0.380  0.450
          300.0      1.060  0.200   0.200  0.380  0.450
          300.0      1.080  0.210   0.210  0.380  0.430
          300.0      1.110  0.230   0.230  0.380  0.430
          300.0      1.140  0.250   0.250  0.380  0.430
          300.0      1.140  0.280   0.280  0.350  0.400
          SoilCrop chickpea: LL=[0.200, 0.200, 0.200, 0.220, 0.250, 0.260, 0.280]; KL=[0.06, 0.06, 0.06, 0.05, 0.04, 0.02, 0.02]; XF=[1.00, 1.00, 1.00, 1.00, 1.00, 1.00, 1.00]
        SoilWater: SummerCona=2.0; SummerU=6.0; SummerDate=1-Nov; WinterCona=2.0; WinterU=6.0; WinterDate=1-Apr; DiffusConst=40.0; DiffusSlope=16.0; Salb=0.13; CN2Bare=82; CNRed=20.0; CNCov=0.8; Thickness=[150.0, 150.0, 300.0, 300.0, 300.0, 300.0, 300.0]; SWCON=[0.400, 0.400, 0.400, 0.400, 0.400, 0.400, 0.400]
        SoilOrganicMatter: RootCN=80.0; RootWt=500.0; SoilCN=14.5; EnrACoeff=7.4; EnrBCoeff=0.2
          Thickness  OC    FBiom  FInert
          150.0      2.20  0.02   0.36
          150.0      1.60  0.015  0.50
          300.0      1.35  0.01   0.59
          300.0      0.95  0.01   0.84
          300.0      1.00  0.01   0.80
          300.0      0.80  0.01   0.99
          300.0      0.80  0.01   0.99
        Analysis: Thickness=[150.0, 150.0, 300.0, 300.0, 300.0, 300.0, 300.0]; PH=[8.25, 8.50, 8.75, 9.00, 9.00, 9.00, 9.00]
        Sample Initial nitrogen
          Thickness  NO3   NH4
          150.0      14.4  4.80
          150.0      6.58  4.20
          300.0      2.45  3.90
          300.0      1.08  3.90
          300.0      0.15  3.80
          300.0      0.83  4.10
          300.0      0.83  4.10
      surfaceom
        PoolName = unknown  # Organic Matter pool name
        type = wheat  # Organic Matter type
        mass = 0.0  # Initial surface residue (kg/ha)
        cnr = 10.0  # C:N ratio of initial residue
        standing_fraction = 0.0  # Fraction of residue standing
      chickpea
      manager Harvesting rule
        # Harvesting criteria
        crop = chickpea  # Enter name of crop to harvest when ripe
        on end_of_day:
        script: same as in APS2CPE.paddock.Harvesting rule
  simulation HE90C3
    clock: start_date=14/6/1990; end_date=16/12/1990
    summaryfile
    metfile met: filename=%apsim%\Tests\Validation\Chickpeas\met\Herm90.met
    area paddock
      outputfile: filename=HE90C3.out; title=HE90C3
        variables: same as APS2CPL.paddock.outputfile.variables
        events: event=end_day
      operations
        15/06/1990  chickpea sow plants = 45.4, sowing_depth = 50, cultivar = amethyst
        28/09/1990  irrigation apply amount = 40.0
      fertiliser
      irrigation
      manager output titles
        ExpCode = HE90C3  # Experimental code
        Site = CP90Her  # experimental site name
        Season = -Y1990  # calander year or years data is from
        Treatment1 = amethyst  # treatment type
        on start_of_day:
```
Expcode='[ExpCode]'
     Site='[Site]'
     Season='[Season]'
     Treatment='[Treatment1]'
```
      Soil
        Water: same as HL90C3.paddock.soil.Water
        SoilWater: same as HL90C3.paddock.soil.SoilWater
        SoilOrganicMatter: same as HL90C3.paddock.soil.SoilOrganicMatter
        Analysis: Thickness=[150.0, 150.0, 300.0, 300.0, 300.0, 300.0, 300.0]; PH=[8.25, 8.50, 8.75, 9.00, 9.00, 9.00, 9.00]
        Sample Initial nitrogen
          Thickness  NO3   NH4
          150.0      14.4  4.80
          150.0      6.58  4.20
          300.0      2.45  3.90
          300.0      1.08  3.90
          300.0      0.15  3.80
          300.0      0.83  4.10
          300.0      0.83  4.10
        Sample Initial water: Thickness=[150.0, 150.0, 300.0, 300.0, 300.0, 300.0, 300.0]; SW=[0.413, 0.456, 0.408, 0.374, 0.340, 0.370, 0.370]
      surfaceom
        PoolName = unknown  # Organic Matter pool name
        type = wheat  # Organic Matter type
        mass = 0.0  # Initial surface residue (kg/ha)
        cnr = 10.0  # C:N ratio of initial residue
        standing_fraction = 0.0  # Fraction of residue standing
      chickpea
      manager Harvesting rule
        # Harvesting criteria
        crop = chickpea  # Enter name of crop to harvest when ripe
        on end_of_day:
        script: same as in APS2CPE.paddock.Harvesting rule
  simulation W92N1A
    clock
      start_date = 29/4/1992
      end_date = 25/12/1992
    summaryfile
    metfile met: filename=%apsim%\Tests\Validation\Chickpeas\met\Windr.met
    area paddock
      outputfile: filename=W92N1A.out; title=W92N1A
        variables: same as APS2CPL.paddock.outputfile.variables
        events: event=end_day
      operations
        7/05/1992  'soil water' set sw = 0.321 0.352 0.330 0.285 0.298 0.298
        7/05/1992  'soil Nitrogen' set no3ppm = 14.67 12.83 1.36 4.48 9.39 0.39
        7/05/1992  fertiliser apply amount = 0 (kg/ha), depth=10(mm), type=nh4no3
        7/05/1992  chickpea sow plants = 40, sowing_depth = 50, cultivar = amethyst
      fertiliser
      irrigation
      manager output titles
        ExpCode = W92N1A  # Experimental code
        Site = windridge  # experimental site name
        Season = -Y1992  # calander year or years data is from
        Treatment1 = Amethyst  # treatment type
        on start_of_day:
```
Expcode='[ExpCode]'
     Site='[Site]'
     Season='[Season]'
     Treatment='[Treatment1]'
```
      manager Harvesting rule
        # Harvesting criteria
        crop = chickpea  # Enter name of crop to harvest when ripe
        on end_of_day:
        script: same as in APS2CPE.paddock.Harvesting rule
      Soil
        InitialWater Initial water: FractionFull=1.00; PercentMethod=EvenlyDistributed
        Water
          Thickness  BD    AirDry  LL15  DUL   SAT
          150.0      1.30  0.1     0.2   0.38  0.43
          150.0      1.40  0.2     0.2   0.38  0.43
          300.0      1.40  0.2     0.2   0.38  0.43
          300.0      1.40  0.2     0.2   0.37  0.42
          300.0      1.40  0.2     0.2   0.35  0.40
          300.0      1.40  0.2     0.2   0.35  0.40
          SoilCrop chickpea: LL=[0.2, 0.22, 0.23, 0.25, 0.28, 0.30]; KL=[0.06, 0.06, 0.06, 0.05, 0.04, 0.02]; XF=[1.00, 1.00, 1.00, 1.00, 1.00, 1.00]
        SoilWater: SummerCona=2.0; SummerU=6.0; SummerDate=1-Nov; WinterCona=2.0; WinterU=6.0; WinterDate=1-Apr; DiffusConst=88.0; DiffusSlope=35.4; Salb=0.13; CN2Bare=72.0; CNRed=20.0; CNCov=0.8; Thickness=[150.0, 150.0, 300.0, 300.0, 300.0, 300.0]; SWCON=[0.50, 0.50, 0.50, 0.50, 0.50, 0.50]
        SoilOrganicMatter: RootCN=40.0; RootWt=100.0; SoilCN=15.86; EnrACoeff=7.4; EnrBCoeff=0.2
          Thickness  OC    FBiom  FInert
          150.0      1.43  0.03   0.4
          150.0      0.91  0.02   0.4
          300.0      0.65  0.01   0.6
          300.0      0.26  0.01   0.8
          300.0      0.13  0.01   0.96
          300.0      0.10  0.01   0.96
        Analysis: Thickness=[150.0, 150.0, 300.0, 300.0, 300.0, 300.0]; PH=[7.62, 7.62, 7.62, 7.62, 7.62, 7.62]
        Sample Initial nitrogen
          Thickness  NO3   NH4
          150.0      14.4  0.01
          150.0      6.58  0.01
          300.0      2.45  0.01
          300.0      1.08  0.01
          300.0      0.15  0.01
          300.0      0.83  0.01
      surfaceom
        PoolName = unknown  # Organic Matter pool name
        type = wheat  # Organic Matter type
        mass = 0  # Initial surface residue (kg/ha)
        cnr = 10  # C:N ratio of initial residue
        standing_fraction = 0  # Fraction of residue standing
      chickpea
  simulation W92N2A
    clock: start_date=29/4/1992; end_date=25/12/1992
    summaryfile
    metfile met: filename=%apsim%\Tests\Validation\Chickpeas\met\Windr.met
    area paddock
      outputfile: filename=W92N2A.out; title=W92N2A
        variables: same as APS2CPL.paddock.outputfile.variables
        events: event=end_day
      operations
        7/05/1992  'soil water' set sw =  0.324 0.338 0.332 0.307 0.292 0.292
        7/05/1992  chickpea sow plants = 40, sowing_depth = 70, cultivar = amethyst
        7/05/1992  'soil nitrogen' set no3ppm = 25.78 12.61 8.93 5.12 11.76 11.76
        7/05/1992  fertiliser apply amount =  40 (kg/ha), depth=10(mm), type=nh4no3()
      fertiliser
      irrigation
      manager output titles
        ExpCode = W92N2A  # Experimental code
        Site = windridge  # experimental site name
        Season = -Y1992  # calander year or years data is from
        Treatment1 = Amethyst  # treatment type
        on start_of_day:
```
Expcode='[ExpCode]'
     Site='[Site]'
     Season='[Season]'
     Treatment='[Treatment1]'
```
      Soil: same as W92N1A.paddock.soil
      surfaceom
        PoolName = unknown  # Organic Matter pool name
        type = wheat  # Organic Matter type
        mass = 0.0  # Initial surface residue (kg/ha)
        cnr = 10.0  # C:N ratio of initial residue
        standing_fraction = 0.0  # Fraction of residue standing
      chickpea
      manager Harvesting rule
        # Harvesting criteria
        crop = chickpea  # Enter name of crop to harvest when ripe
        on end_of_day:
        script: same as in APS2CPE.paddock.Harvesting rule
  simulation W92N3A
    clock: start_date=29/4/1992; end_date=25/12/1992
    summaryfile
    metfile met: filename=%apsim%\Tests\Validation\Chickpeas\met\Windr.met
    area paddock
      outputfile: filename=W92N3A.out; title=W92N3A
        variables: same as APS2CPL.paddock.outputfile.variables
        events: event=end_day
      operations
        7/05/1992  'soil water' set sw = 0.345 0.375 0.354 0.302 0.297 0.297
        7/05/1992  'soil Nitrogen' set no3ppm = 16.16 10.57 8.82 3.63 7.82 7.82
        7/05/1992  fertiliser apply amount = 80 (kg/ha), depth=10(mm), type=nh4no3
        7/05/1992  chickpea sow plants = 40, sowing_depth = 50, cultivar = amethyst
      fertiliser
      irrigation
      manager output titles
        ExpCode = W92N2A  # Experimental code
        Site = windridge  # experimental site name
        Season = -Y1992  # calander year or years data is from
        Treatment1 = Amethyst  # treatment type
        on start_of_day:
```
Expcode='[ExpCode]'
     Site='[Site]'
     Season='[Season]'
     Treatment='[Treatment1]'
```
      Soil
        Water: same as W92N1A.paddock.soil.Water
        SoilWater: same as W92N1A.paddock.soil.SoilWater
        SoilOrganicMatter: same as W92N1A.paddock.soil.SoilOrganicMatter
        Analysis: Thickness=[150.0, 150.0, 300.0, 300.0, 300.0, 300.0]; PH=[7.62, 7.62, 7.62, 7.62, 7.62, 7.62]
        Sample Initial nitrogen
          Thickness  NO3   NH4
          150.0      14.4  0.01
          150.0      6.58  0.01
          300.0      2.45  0.01
          300.0      1.08  0.01
          300.0      0.15  0.01
          300.0      0.83  0.01
        Sample Initial water: Thickness=[150.0, 150.0, 300.0, 300.0, 300.0, 300.0]; SW=[0.40, 0.40, 0.40, 0.40, 0.40, 0.40]
      surfaceom
        PoolName = unknown  # Organic Matter pool name
        type = wheat  # Organic Matter type
        mass = 0.0  # Initial surface residue (kg/ha)
        cnr = 10.0  # C:N ratio of initial residue
        standing_fraction = 0.0  # Fraction of residue standing
      chickpea
      manager Harvesting rule
        # Harvesting criteria
        crop = chickpea  # Enter name of crop to harvest when ripe
        on end_of_day:
        script: same as in APS2CPE.paddock.Harvesting rule
  simulation W92N4A
    clock: start_date=29/4/1992; end_date=25/12/1992
    summaryfile
    metfile met: filename=%apsim%\Tests\Validation\Chickpeas\met\Windr.met
    area paddock
      outputfile: filename=W92N4A.out; title=W92N4A
        variables: same as APS2CPL.paddock.outputfile.variables
        events: event=end_day
      operations
        7/05/1992  'soil water' set sw = 0.305 0.344 0.303 0.278 0.300 0.300
        7/05/1992  'soil Nitrogen' set no3ppm = 22.29 9.58 6.72 4.36 8.01 8.01
        7/05/1992  fertiliser apply amount = 120 (kg/ha), depth=10(mm), type=nh4no3
        7/05/1992  chickpea sow plants = 40, sowing_depth = 50, cultivar = amethyst
      fertiliser
      irrigation
      manager output titles
        ExpCode = W92N4A  # Experimental code
        Site = windridge  # experimental site name
        Season = -Y1992  # calander year or years data is from
        Treatment1 = Amethyst  # treatment type
        on start_of_day:
```
Expcode='[ExpCode]'
     Site='[Site]'
     Season='[Season]'
     Treatment='[Treatment1]'
```
      Soil: same as W92N3A.paddock.soil
      surfaceom
        PoolName = unknown  # Organic Matter pool name
        type = wheat  # Organic Matter type
        mass = 0.0  # Initial surface residue (kg/ha)
        cnr = 10.0  # C:N ratio of initial residue
        standing_fraction = 0.0  # Fraction of residue standing
      chickpea
      manager Harvesting rule
        # Harvesting criteria
        crop = chickpea  # Enter name of crop to harvest when ripe
        on end_of_day:
        script: same as in APS2CPE.paddock.Harvesting rule
  simulation W92N5A
    clock: start_date=29/4/1992; end_date=25/12/1992
    summaryfile
    metfile met: filename=%apsim%\Tests\Validation\Chickpeas\met\Windr.met
    area paddock
      outputfile: filename=W92N5A.out; title=W92N5A
        variables: same as APS2CPL.paddock.outputfile.variables
        events: event=end_day
      operations
        7/05/1992  'soil water' set sw = 0.326 0.343 0.298 0.262 0.294 0.294
        7/05/1992  'soil Nitrogen' set no3ppm = 21.52 12.31 8.10 4.78 10.74 10.74
        7/05/1992  fertiliser apply amount = 160 (kg/ha), depth=10(mm), type=nh4no3
        7/05/1992  chickpea sow plants = 40, sowing_depth = 50, cultivar = amethyst
      fertiliser
      irrigation
      manager output titles
        ExpCode = W92N5A  # Experimental code
        Site = windridge  # experimental site name
        Season = -Y1992  # calander year or years data is from
        Treatment1 = Amethyst  # treatment type
        on start_of_day:
```
Expcode='[ExpCode]'
     Site='[Site]'
     Season='[Season]'
     Treatment='[Treatment1]'
```
      Soil: same as W92N3A.paddock.soil
      surfaceom
        PoolName = unknown  # Organic Matter pool name
        type = wheat  # Organic Matter type
        mass = 0.0  # Initial surface residue (kg/ha)
        cnr = 10.0  # C:N ratio of initial residue
        standing_fraction = 0.0  # Fraction of residue standing
      chickpea
      manager Harvesting rule
        # Harvesting criteria
        crop = chickpea  # Enter name of crop to harvest when ripe
        on end_of_day:
        script: same as in APS2CPE.paddock.Harvesting rule
  simulation W92N6A
    clock: start_date=29/4/1992; end_date=25/12/1992
    summaryfile
    metfile met: filename=%apsim%\Tests\Validation\Chickpeas\met\Windr.met
    area paddock
      outputfile: filename=W92N6A.out; title=W92N6A
        variables: same as APS2CPL.paddock.outputfile.variables
        events: event=end_day
      operations
        7/05/1992  'soil water' set sw = 0.315 0.346 0.312 0.268 0.293 0.293
        7/05/1992  'soil Nitrogen' set no3ppm = 30.61 11.40 9.06 3.03 9.6 9.6
        7/05/1992  fertiliser apply amount = 200 (kg/ha), depth=10(mm), type=nh4no3
        7/05/1992  chickpea sow plants = 40, sowing_depth = 50, cultivar = amethyst
      fertiliser
      irrigation
      manager output titles
        ExpCode = W92N6A  # Experimental code
        Site = windridge  # experimental site name
        Season = -Y1992  # calander year or years data is from
        Treatment1 = Amethyst  # treatment type
        on start_of_day:
```
Expcode='[ExpCode]'
     Site='[Site]'
     Season='[Season]'
     Treatment='[Treatment1]'
```
      Soil: same as W92N3A.paddock.soil
      surfaceom
        PoolName = unknown  # Organic Matter pool name
        type = wheat  # Organic Matter type
        mass = 0.0  # Initial surface residue (kg/ha)
        cnr = 10.0  # C:N ratio of initial residue
        standing_fraction = 0.0  # Fraction of residue standing
      chickpea
      manager Harvesting rule
        # Harvesting criteria
        crop = chickpea  # Enter name of crop to harvest when ripe
        on end_of_day:
        script: same as in APS2CPE.paddock.Harvesting rule
  simulation APS27W
    clock: start_date=30/5/1995; end_date=26/11/1995
    summaryfile
    metfile met: filename=%apsim%\Tests\Validation\Chickpeas\met\cooper.met
    area paddock
      outputfile: filename=APS27W.out; title=APS27W
        variables
          variable:
            day
            Expcode as Title
            Site
            Season
            Treatment
            dd/mm/yyyy as Date  # Date (dd/mm/yyyy)
            chickpea.Stage
            chickpea.DaysAfterSowing
            chickpea.TTAfterSowing
            chickpea.yield
            chickpea.biomass
            chickpea.green_biomass
            chickpea.dlt_dm
            chickpea.RootGreenWt
            chickpea.LeafGreenWt
            chickpea.StemGreenWt
            chickpea.PodGreenWt
            chickpea.grain_wt
            chickpea.stage
            chickpea.Stage
            chickpea.lai
            chickpea.tlai
            chickpea.slai
            chickpea.leaf_no as leaf_no
            chickpea.leaf_no_dead()
            chickpea.root_depth
            chickpea.grain_no
            chickpea.swdef_pheno
            chickpea.swdef_photo
            chickpea.swdef_expan
            chickpea.nfact_photo
            chickpea.nfact_grain
            chickpea.n_demand
            chickpea.n_supply_soil
            chickpea.n_supply
            chickpea.n_fix_pot
            chickpea.n_uptake
            chickpea.n_uptake_grain as grain_n
            chickpea.n_uptake_stover as stover_n
            chickpea.n_conc_stover
            no3()
            sw_dep()
            sw_dep
        events: event=end_day
      operations
        15/06/1995  'soil water' set sw = 0.370 0.340 0.350 0.310 0.390 0.350 0.250 0.250
        15/06/1995  chickpea sow plants = 37.3, sowing_depth = 50, cultivar = amethyst
        5/06/1995  irrigation apply amount = 175.0
        23/06/1995  irrigation apply amount = 12.0
        5/07/1995  irrigation apply amount = 7.0
        13/07/1995  irrigation apply amount = 24.0
        21/07/1995  irrigation apply amount = 13.5
        1/08/1995  irrigation apply amount = 28.0
        11/08/1995  irrigation apply amount = 32.0
        25/08/1995  irrigation apply amount = 15.0
        1/09/1995  irrigation apply amount = 14.0
        4/09/1995  irrigation apply amount = 15.0
        15/09/1995  irrigation apply amount = 25.0
        22/09/1995  irrigation apply amount = 20.0
        29/09/1995  irrigation apply amount = 9.0
        2/10/1995  irrigation apply amount = 11.0
      fertiliser
      irrigation
      manager output titles
        ExpCode = APS27W  # Experimental code
        Site = CP95gat  # experimental site name
        Season = -Y1995  # calander year or years data is from
        Treatment1 = Amethyst  # treatment type
        on start_of_day:
```
Expcode='[ExpCode]'
     Site='[Site]'
     Season='[Season]'
     Treatment='[Treatment1]'
```
      Soil: same as APS2CPL.paddock.soil
      surfaceom
        PoolName = unknown  # Organic Matter pool name
        type = wheat  # Organic Matter type
        mass = 0.0  # Initial surface residue (kg/ha)
        cnr = 0.0  # C:N ratio of initial residue
        standing_fraction = 0.0  # Fraction of residue standing
      chickpea
      manager Harvesting rule
        # Harvesting criteria
        crop = chickpea  # Enter name of crop to harvest when ripe
        on end_of_day:
        script: same as in APS2CPE.paddock.Harvesting rule
  simulation APS27D
    clock: start_date=30/5/1995; end_date=26/11/1995
    summaryfile
    metfile met: filename=%apsim%\Tests\Validation\Chickpeas\met\cooper.met
    area paddock
      outputfile: filename=APS27D.out; title=APS27D
        variables: same as APS27W.paddock.outputfile.variables
        events: event=end_day
      operations
        14/06/1995  'soil water' set sw = 0.340 0.346 0.309 0.323 0.301 0.288 0.278
        15/06/1995  chickpea sow plants = 39.5, sowing_depth = 50, cultivar = amethyst
        5/06/1995  irrigation apply amount = 175.0
        23/06/1995  irrigation apply amount = 12.0
        5/07/1995  irrigation apply amount = 7.0
        13/07/1995  irrigation apply amount = 24.0
      fertiliser
      irrigation
      manager output titles
        ExpCode = APS27D  # Experimental code
        Site = APS27W  # experimental site name
        Season = -Y1995  # calander year or years data is from
        Treatment1 = Amethyst  # treatment type
        on start_of_day:
```
Expcode='[ExpCode]'
     Site='[Site]'
     Season='[Season]'
     Treatment='[Treatment1]'
```
      Soil
        Water
          Thickness  BD     AirDry  LL15   DUL    SAT
          150.0      1.380  0.050   0.180  0.384  0.434
          150.0      1.380  0.190   0.190  0.381  0.431
          300.0      1.320  0.200   0.200  0.44   0.49
          300.0      1.460  0.220   0.220  0.424  0.448
          300.0      1.510  0.190   0.190  0.419  0.43
          300.0      1.490  0.170   0.170  0.376  0.426
          300.0      1.470  0.170   0.170  0.377  0.427
          SoilCrop chickpea: LL=[0.25, 0.25, 0.23, 0.25, 0.2, 0.2, 0.2]; KL=[0.06, 0.06, 0.06, 0.05, 0.04, 0.02, 0.02]; XF=[1, 1, 1, 1, 1, 1, 1]
        SoilWater: same as APS2CPE.paddock.soil.SoilWater
        SoilOrganicMatter: same as APS2CPE.paddock.soil.SoilOrganicMatter
        Analysis: Thickness=[150.0, 150.0, 300.0, 300.0, 300.0, 300.0, 300.0]; PH=[7.50, 8.00, 8.00, 8.00, 8.00, 8.00, 8.00]
        Sample Initial nitrogen
          Thickness  NO3    NH4
          150.0      14.30  0
          150.0      5.90   0
          300.0      1.80   0
          300.0      0.90   0
          300.0      1.00   0
          300.0      0.20   0
          300.0      0.10   0
        Sample Initial water: Thickness=[150.0, 150.0, 300.0, 300.0, 300.0, 300.0, 300.0]; SW=[0.384, 0.381, 0.440, 0.424, 0.419, 0.376, 0.377]
      surfaceom
        PoolName = unknown  # Organic Matter pool name
        type = wheat  # Organic Matter type
        mass = 0.0  # Initial surface residue (kg/ha)
        cnr = 0.0  # C:N ratio of initial residue
        standing_fraction = 0.0  # Fraction of residue standing
      chickpea
      manager Harvesting rule
        # Harvesting criteria
        crop = chickpea  # Enter name of crop to harvest when ripe
        on end_of_day:
        script: same as in APS2CPE.paddock.Harvesting rule
  memo
    	Note: If you have Observered data for some samplings but not others, then in the .obs file (for the observations) you can use * or ?  for those missing values instead of using 0

    	This allows you to tell the difference between data you did not collect, and data that actually had a value of 0

    	Data with a * or ? is not plotted on the graph (hence neither is its predicted value) whereas data with 0 is.
  memo: same as memo
  memo: same as memo
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