folder simulations: version=36; creator=Apsim 7.6-r3549
  simulation ChicorySim
    metfile met: filename=%apsim%\Tests\Validation\Chicory\Ruakura.met
    clock
      start_date = 01/07/2008  # Select the start date of the simulation
      end_date = 30/05/2010  # Select the end date of the simulation
    summaryfile
    area paddockSpecifiedDates
      chicory
      Soil SoilHorotiu: SoilType=0; Site=Horotiu; State=New Zealand; NaturalVegetation=0; ApsoilNumber=0; Latitude=0; Longitude=0; LocationAccuracy=0; DataSource=published soil profile description (as an example)
        InitialWater Initial water: FractionFull=0.5; PercentMethod=EvenlyDistributed; RelativeTo=ll15
        Water
          Thickness  BD   AirDry  LL15  DUL   SAT
          100        1.1  0.16    0.26  0.42  0.43
          90         1.1  0.16    0.26  0.42  0.43
          60         1.1  0.15    0.2   0.42  0.51
          110        1.1  0.12    0.16  0.37  0.47
          240        1.1  0.12    0.17  0.34  0.43
          110        1.1  0.12    0.16  0.32  0.39
          290        1.1  0.12    0.17  0.32  0.38
          200        1.1  0.12    0.17  0.32  0.38
          300        1.1  0.12    0.17  0.34  0.4
          SoilCrop chicory: LL=[0.26, 0.26, 0.2, 0.16, 0.17, 0.16, 0.17, 0.17, 0.17]; KL=[0.06, 0.06, 0.06, 0.04, 0.02, 0.01, 0, 0, 0]; XF=[1, 1, 1, 1, 1, 1, 0, 0, 0]
          SoilCrop agpasture: LL=[0.26, 0.26, 0.2, 0.16, 0.17, 0.16, 0.17, 0.17, 0.17]; KL=[0.06, 0.06, 0.06, 0.04, 0.02, 0.01, 0, 0, 0]; XF=[1, 1, 1, 1, 1, 1, 0, 0, 0]
          SoilCrop ryegrass: LL=[0.26, 0.26, 0.2, 0.16, 0.17, 0.16, 0.17, 0.17, 0.17]; KL=[0.06, 0.06, 0.06, 0.04, 0.02, 0.01, 0, 0, 0]; XF=[1, 1, 1, 1, 1, 1, 0, 0, 0]
          SoilCrop clover: LL=[0.26, 0.26, 0.2, 0.16, 0.17, 0.16, 0.17, 0.17, 0.17]; KL=[0.06, 0.06, 0.06, 0.04, 0.02, 0.01, 0, 0, 0]; XF=[1, 1, 1, 1, 1, 1, 0, 0, 0]
        SoilWater: SummerCona=3.5; SummerU=6; SummerDate=1-Nov; WinterCona=2; WinterU=2; WinterDate=1-apr; DiffusConst=88; DiffusSlope=35; Salb=0.13; CN2Bare=73; CNRed=20; CNCov=0.8; Slope=0; DischargeWidth=0; CatchmentArea=0; MaxPond=0; Thickness=[100, 90, 60, 110, 240, 100, 300, 200, 300]; SWCON=[0.5, 0.5, 0.5, 0.5, 0.8, 0.8, 0.8, 0.9, 0.9]
        SoilOrganicMatter: RootCN=40; RootWt=800; SoilCN=11.3; EnrACoeff=7.4; EnrBCoeff=0.2; OCUnits=Total
          Thickness  OC   FBiom  FInert
          100        8.2  0.08   0.3
          90         8.2  0.06   0.4
          60         5.5  0.04   0.5
          110        3.3  0.02   0.5
          240        1.7  0.02   0.8
          110        1.7  0.01   0.9
          290        1.2  0.01   1
          200        0.7  0      1
          300        0.1  0      1
        Analysis: PHUnits=Water; BoronUnits=HotWater
          Thickness  Texture  PH
          100        2        5.9
          200        2        6
          300        2        6
          300        2        6
          300        2        6
          300        2        6
          300        2        6
        Sample Initial nitrogen: NO3Units=ppm; NH4Units=ppm; SWUnits=Volumetric; OCUnits=Total
          Thickness  NO3      NH4
          100        7.61905  0.132451
          200        7.27008  0.132451
          300        3.87147  0.132451
          300        3.84025  0.132451
          300        3.80952  0.132451
          300        3.77929  0.132451
          300        3.6914   0.132451
      folder Manager folder
        manager Sow on a fixed date
          # Sowing criteria
          date = 23/10/2008  # Enter sowing date (dd-mmm)
          # Sowing parameters
          crop = chicory  # Enter name of crop to sow
          density = 200  # Enter sowing density (plants/m2)
          depth = 10  # Enter sowing depth (mm)
          cultivar = Choice  # Enter cultivar
          row_spacing = 150  # Enter row spacing (mm)
          on start_of_day:
```
!Sowing crop
if (today = date('[date]') then
     [crop] sow plants =[density], sowing_depth = [depth], cultivar = [cultivar], row_spacing = [row_spacing]
endif
```
        manager Chicory Dormancy
          # Harvesting criteria
          crop = chicory  # Enter name of crop to harvest when ripe
          criticalMint = 2  # cretical minimum T for darmancy
          Days = 10  # number of days for averaging minimum temperature
          on end_of_day:
```
critT = [criticalmint]
accumDays = [days]

!Calculate creteria for dormancy        
if ([crop].plant_status = 'alive' and dormant = 0 and day > 120 and day < 240 and mint < critT) then
   dayCount1 = dayCount1 + 1
   if (dayCount1 < accumDays) then
       dormAccumT = dormAccumT + mint
   elseif (dayCount1 > accumDays) then
       dormAccumT = (accumDays-1)/accumDays*dormAccumT + mint
   endif
endif

! Calculate creteria for ending dormancy
if ([crop].plant_status = 'alive' and dormant = 1 and day > 180 and mint >=critT ) then
   dayCount2 = dayCount2 + 1
   if (dayCount2 < accumDays) then
       regrowAccumT = regrowAccumT + mint
   elseif (dayCount2 > accumDays) then
       regrowAccumT = (accumDays-1)/accumDays*regrowAccumT + mint
   endif
endif

! Starting/Ending dormancy 
if (dayCount1 >= accumDays and dormAccumT < critT*accumDays) then
    chicory dormancy
!   reset TT              
    dormant = 1
    dayCount1 = 0
elseif (dayCount2 >= accumDays and regrowAccumT > critT*accumDays) then
   chicory spring
   dormant = 0
   dayCount2 = 0
endif
```
          on init:
```
dayCount1 = 0
dayCount2 = 0
dormAccumT = 0
dormant = 0
regrowAccumT = 0
```
        manager2 Chicory Defoliation with spcified dates
          Crop2Defoliate = chicory  # Name of crop to defoliate (must be a Plant1 crop)
          ResidualStem = 0.5  # Fraction of stem remaining after defoliation (0-1)
          ResidualLeaf = 0.05  # Fraction of leaf remaining after defoliation (0-1)
          # Population
          PopDecline = 0.8  # population decline due to defoliation
          popStartDate = 01/02/2009  # Population decline starting date (d/mm/yyyy)
          popEndDate = 01/04/2010  # Population decline ending date (d/mm/yyyy)
          # Harvest Dates
          hdate1 = 19/01/2009  # harvest date 1
          hdate2 = 23/02/2009  # harvest date 2
          hdate3 = 1/04/2009  # harvest date 3
          hdate4 = 8/05/2009  # harvest date 4
          hdate5 = 14/09/2009  # harvest date 5
          hdate6 = 22/10/2009  # harvest date 6
          hdate7 = 25/11/2009  # harvest date 7
          hdate8 = 21/12/2009  # harvest date 8
          hdate9 = 15/01/2010  # harvest date 9
          hdate10 = 12/02/2010  # harvest date 10
          hdate11 = 22/03/2010  # harvest date 11
          hdate12 = 1/1/1900  # harvest date 12
          hdate13 = 1/1/1900  # harvest date 13
          hdate14 = 1/1/1900  # harvest date 14
          hdate15 = 1/1/1900  # harvest date 15
          hdate16 = 1/1/1900  # harvest date 16
          hdate17 = 1/1/1900  # harvest date 17
          hdate18 = 1/1/1900  # harvest date 18
          hdate19 = 1/1/1900  # harvest date 19
          hdate20 = 1/1/1900  # harvest date 20
          hdate21 = 1/1/1900  # harvest date 21
          hdate22 = 1/1/1900  # harvest date 22
          hdate23 = 1/1/1900  # harvest date 23
          hdate24 = 01/01/1900  # harvest date 24
          hdate25 = 1/1/1900  # harvest date 25
          hdate26 = 1/1/1900  # harvest date 26
```csharp
   using System;
   using ModelFramework;

public class Script 
{
  // [Param()] private string DefoliationDateString;
   [Param()] private double ResidualStem;
   [Param()] private double ResidualLeaf;
   [Param()] private string Crop2Defoliate;
   
   [Param()] private double popDecline;
   [Param()] private string popStartDate;
   [Param()] private string popEndDate;   
   
   [Param()] private string hdate1;
   [Param()] private string hdate2;   
   [Param()] private string hdate3;
   [Param()] private string hdate4;
   [Param()] private string hdate5;
   [Param()] private string hdate6;
   [Param()] private string hdate7;
   [Param()] private string hdate8;   
   [Param()] private string hdate9;
   [Param()] private string hdate10;
   [Param()] private string hdate11;
   [Param()] private string hdate12;   
   [Param()] private string hdate13;
   [Param()] private string hdate14;
   [Param()] private string hdate15;
   [Param()] private string hdate16;
   [Param()] private string hdate17;
   [Param()] private string hdate18;   
   [Param()] private string hdate19;
   [Param()] private string hdate20;
   [Param()] private string hdate21;
   [Param()] private string hdate22;   
   [Param()] private string hdate23;
   [Param()] private string hdate24;
   [Param()] private string hdate25;
   [Param()] private string hdate26;
   
   [Link()]
   public Paddock MyPaddock;
   [Input()] private DateTime Today;
   [Input()] private double mint;
   [Input()] private double maxt;
   [Input()] private double meant;
   
   [Input()] private double stage;
   [Input()] private double height;
   [Input()] private double biomass;
   [Input()] private double plants;
   [Input()] private double leafgreennconc;
   [Input()] private double stemgreennconc;
   
   
   private double GreenLeaf = 0.0;
   private double GreenStem = 0.0;
   private double dlt_GreenLeaf = 0.0;
   private double dlt_GreenStem = 0.0;
   private double Grazed = 0.0;
   private int dayCount = 0;
   
   private DateTime popStart = new DateTime();
   private DateTime popEnd = new DateTime(); 
   private DateTime[] hdates = new DateTime[26];
   private double vd = 0;

   
   [Output()]
   private double DMharvest = 0.0;   
   private double DMharvestLeaf = 0.0;
   private double DMharvestStem = 0.0;
   
   private double vernalDays = 0;

   [Event]
   public event BiomassRemovedDelegate BiomassRemoved;
   
   [EventHandler] public void OnInitialised()
   {   
       popStart = DateTime.ParseExact(popStartDate, "d/M/yyyy", null);
       popEnd   = DateTime.ParseExact(popEndDate, "d/M/yyyy", null);
      
       hdates[0] = DateTime.ParseExact(hdate1, "d/M/yyyy", null);
       hdates[1] = DateTime.ParseExact(hdate2, "d/M/yyyy", null);
       hdates[2] = DateTime.ParseExact(hdate3, "d/M/yyyy", null);
       hdates[3] = DateTime.ParseExact(hdate4, "d/M/yyyy", null);
       hdates[4] = DateTime.ParseExact(hdate5, "d/M/yyyy", null);
       hdates[5] = DateTime.ParseExact(hdate6, "d/M/yyyy", null);
       hdates[6] = DateTime.ParseExact(hdate7, "d/M/yyyy", null);
       hdates[7] = DateTime.ParseExact(hdate8, "d/M/yyyy", null);
       hdates[8] = DateTime.ParseExact(hdate9, "d/M/yyyy", null);
       hdates[9] = DateTime.ParseExact(hdate10, "d/M/yyyy", null);
       hdates[10] = DateTime.ParseExact(hdate11, "d/M/yyyy", null);
       hdates[11] = DateTime.ParseExact(hdate12, "d/M/yyyy", null);
       hdates[12] = DateTime.ParseExact(hdate13, "d/M/yyyy", null);
       hdates[13] = DateTime.ParseExact(hdate14, "d/M/yyyy", null);
       hdates[14] = DateTime.ParseExact(hdate15, "d/M/yyyy", null);
       hdates[15] = DateTime.ParseExact(hdate16, "d/M/yyyy", null);
       hdates[16] = DateTime.ParseExact(hdate17, "d/M/yyyy", null);
       hdates[17] = DateTime.ParseExact(hdate18, "d/M/yyyy", null);
       hdates[18] = DateTime.ParseExact(hdate19, "d/M/yyyy", null);
       hdates[19] = DateTime.ParseExact(hdate20, "d/M/yyyy", null);
       hdates[20] = DateTime.ParseExact(hdate21, "d/M/yyyy", null);
       hdates[21] = DateTime.ParseExact(hdate22, "d/M/yyyy", null);
       hdates[22] = DateTime.ParseExact(hdate23, "d/M/yyyy", null);
       hdates[23] = DateTime.ParseExact(hdate24, "d/M/yyyy", null);
       hdates[24] = DateTime.ParseExact(hdate25, "d/M/yyyy", null);
       hdates[25] = DateTime.ParseExact(hdate26, "d/M/yyyy", null);
   }
         
   [EventHandler] public void OnPrepare()
   {
     
      for (int i = 0; i < hdates.Length; i++)
      {         
         if (hdates[i] != null && Today == hdates[i])   
         {         
            doHarvest();                
         }                    
      }
              
      DateTime hDate = new DateTime(2010, 8, 1);
      dayCount++;
      if (Today.CompareTo(hDate) >= 0 && dayCount > 28 )
      {
         dayCount = 0;
         doHarvest();
      }
        
      //reset TT during winter dormancy
      if (Today.DayOfYear == 152 && stage >= 4.0)
      {         
         HarvestType hSet = new HarvestType();
         hSet.Remove = 0;   
         hSet.Height = 800;   
         //MyPaddock.Publish(Crop2Defoliate + ".harvest", hSet);
         
         resetPhenoByRemoval();
      }
         
      //tracing vernalisation
      DateTime sday = new DateTime(2008, 10, 23);
      if (Today > sday)
      {
         if ( meant >= 0 && meant < 5)
            vd = 1;
         else if (meant > -5 && meant < 0)
            vd = (meant + 5) / 5;
         else if (meant >= 5 && meant < 15) 
            vd = (15 - meant) / 10;
         else
            vd = 0;            
         vernalDays += vd;
      }
   }
   
   public void doHarvest()
   {
      MyPaddock.Get(Crop2Defoliate + ".leafgreenwt", out GreenLeaf);
      MyPaddock.Get(Crop2Defoliate + ".stemgreenwt", out GreenStem);
      

      dlt_GreenLeaf = Math.Max(0, GreenLeaf * (1.0 - ResidualLeaf));
      dlt_GreenStem = Math.Max(0, GreenStem * (1.0 - ResidualStem));
    
      RemoveCropBiomassdmType GreenRemoveCropDmDm = new RemoveCropBiomassdmType();
            
      GreenRemoveCropDmDm.pool = "green";
      GreenRemoveCropDmDm.part = new string[]
         {"leaf","stem"};
      GreenRemoveCropDmDm.dlt = new double[] 
         {dlt_GreenLeaf, dlt_GreenStem};
            
      RemoveCropBiomassType MyRemoveCropDM = new RemoveCropBiomassType();
           
      MyRemoveCropDM.dm = new RemoveCropBiomassdmType[] { GreenRemoveCropDmDm };            
       
      MyPaddock.Publish(Crop2Defoliate + ".remove_crop_biomass", MyRemoveCropDM);
            
      Console.WriteLine(Today.ToShortDateString() + " - " + "Plant1 Defoliation Rule Invoked");
      Console.WriteLine("          - " + Crop2Defoliate + " has been defoliated");
      Console.WriteLine("          - Removed " + dlt_GreenLeaf + " g/m2 of Leaf");
      Console.WriteLine("          - Removed " + dlt_GreenStem + " g/m2 of Stem");
      Console.WriteLine(" "); 
     
      DMharvestLeaf = dlt_GreenLeaf * 10;     //in kgDM/ha
      DMharvestStem = dlt_GreenStem * 10; 
      DMharvest = DMharvestLeaf + DMharvestStem;  
      
      //Reducing population 
      if (Today.CompareTo(popStart) >= 0 && Today.CompareTo(popEnd)< 0 )
      {
         KillCropType reducePopn = new KillCropType();
         reducePopn.KillFraction = (float) (1.0 - popDecline);
         MyPaddock.Publish(Crop2Defoliate + ".kill_crop", reducePopn);
      }
   }
   
   public void  resetPhenoByRemoval()
   {
      MyPaddock.Get(Crop2Defoliate + ".leafgreenwt", out GreenLeaf);
      MyPaddock.Get(Crop2Defoliate + ".stemgreenwt", out GreenStem);
      
      dlt_GreenLeaf = Math.Max(0, GreenLeaf * 0.95);  //large removal for windback phenology
      dlt_GreenStem = Math.Max(0, GreenStem * 0.95);
      RemoveCropBiomassdmType GreenRemoveCropDmDm = new RemoveCropBiomassdmType();
            
      GreenRemoveCropDmDm.pool = "green";
      GreenRemoveCropDmDm.part = new string[] {"leaf","stem"};
      GreenRemoveCropDmDm.dlt = new double[]  {dlt_GreenLeaf, dlt_GreenStem};            
   
      RemoveCropBiomassType MyRemoveCropDM = new RemoveCropBiomassType();
      MyRemoveCropDM.dm = new RemoveCropBiomassdmType[] { GreenRemoveCropDmDm };            
      MyPaddock.Publish(Crop2Defoliate + ".remove_crop_biomass", MyRemoveCropDM);            
      Console.WriteLine(Today.ToShortDateString() + " - " + "To reset Pheno");
   }
   
   [EventHandler] public void OnPost()
   {
      DMharvestLeaf = 0.0;    //in kgDM/ha
      DMharvestStem = 0.0; 
      DMharvest = 0.0;  
          
   }
}
```
      irrigation
        automatic_irrigation = on
        asw_depth = 300  # Depth to which ASW is calculated. (mm)
        crit_fr_asw = 0.75  # Fraction of ASW below which irrigation is applied (0-1.0)
        irrigation_efficiency = 1  # Efficiency of the irrigation. (0-1.0)
        irrigation_allocation = off  # Allocation limits
        allocation = 0  # Allocation in ML
        default_no3_conc = 0  # Nitrate concentration (ppm N)
        default_nh4_conc = 0  # Ammonium concentration (ppm N)
        default_cl_conc = 0  # Chloride concentration (ppm Cl)
        default_no3_conc = 0  # Nitrate concentration (ppm N)
        default_nh4_conc = 0  # Ammonium concentration (ppm N)
        default_cl_conc = 0  # Chloride concentration (ppm Cl)
      manager Fertilise incrop on critical NO3 level- top up
        # When should fertiliser be applied
        modulename = chicory  # In which crop is fertiliser being applied
        fert_criteria = 200  # Maximum Amount of NO3 required in top 3 layers (kg/ha)
        fert_critical = 100  # Critical Amount of NO3 in top 3 layers (kg/ha)
        # Fertiliser application details
        fertmodule = Fertiliser  # Module used to apply the fertiliser
        fert_type = urea_N  # Fertiliser type
        on start_of_day:
```
         if ([modulename].plant_status = 'alive') then
            NO3_available = no3(1) + no3(2) + no3(3)
            if (NO3_available <= [fert_critical]) then
               N_deficit = [fert_criteria] - NO3_available
               '[fertmodule]' apply amount = N_deficit (kg/ha), depth = 50 (mm), type = [fert_type] ()
            endif
         endif
```
      fertiliser
      outputfile: filename=ChicorySim paddockSpecifiedDates.out; title=ChicorySim paddockSpecifiedDates
        variables My Variables
          variables: dd/mmm/yyyy as Date, year, biomass, stage, DMharvest, irrigation, fertiliser, node_no, leaf_no, plants
        events My Variables Events: event=daily
        memo
          	Note: If you have Observered data for some samplings but not others, then in the .out file (for the observations) you can use * or ?  for those missing values instead of using 0

          	This allows you to tell the difference between data you did not collect, and data that actually had a value of 0

          	Data with a * or ? is not plotted on the graph (hence neither is its predicted value) whereas data with 0 is.

          	Note: You can add error bars to your Observed data by adding an extra column with the same name but with the word "Error" appended to the column name.
                    eg. If you have a column called "yield" you would add an extra column called "yieldError" to your Observed data output file.
                        (It is very important you don't put any spaces between the "yield" and "Error")
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