folder EGrandis: version=32
  simulation Coffs
    clock: start_date=1/1/1953; end_date=31/12/1983
    summaryfile
    metfile met: filename=coffs.met
    area paddock
      outputfile report: filename=Coffs report.out; title=Coffs report
        variables
          variable:
            day
            year
            dd/mm/yyyy as date
            egrandis.age
            egrandis.lai
            tracker.avg@fn
            tracker.avg@fw
            tracker.avg@fvpd
            tracker.avg@ft
            egrandis.adm_green(1) as stemgreenwt
            egrandis.adm_green(2) as branch_wt
            egrandis.adm_green(3) as bark_wt
            egrandis.foliage_mass as leafgreenwt
            manager.total_wt as total_wt
            egrandis.root_mass
            egrandis.adm_sen()
            tracker.avg@sw_demand
            egrandis.ep
            egrandis.height
            tracker.dlt_stem_wt
            tracker.dlt_branch_wt
            tracker.dlt_bark_wt
            tracker.dlt_leaf_wt
            egrandis.foliage_n
            egrandis.an_green(1) as stemgreenn
            egrandis.an_green(2) as branch_n
            egrandis.an_green(3) as bark_n
            tracker.sum@n_demand
            tracker.sum@dlt_no3()
            egrandis.plants
            carbon_tot(1)
            carbon_tot(2)
            nit_tot(1)
            nit_tot(2)
            esw
            tracker.sum@runoff
            tracker.sum@drain
            tracker.sum@es
            no3()
            nh4()
            biom_n()
            fom_n()
            hum_n()
            tracker.sum@dlt_n_min()
            surfaceom.surfaceom_wt
            surfaceom.surfaceom_n
            manager.c_n1
            manager.c_n2
            manager.oc1
            manager.oc2
            tracker.sum@flow_no3(5)
            tracker.sum@flow_no3(8)
            egrandis.total_n
            nit_tot()
            egrandis.rlv
            dlayer
            tracker.sum@interception
            tracker.sum@rain
      manager
        on start_of_day:
```
            if day = 90 and year = 1953 then
               egrandis establish plants = 625, init_section = seedling
            endif
```
        on end_of_day:
```
            ! try to reproduce initial fom pools from previous pinus ellioti plantation
            !if day = 35 and year = 1987 then!   surfaceom add_surfaceom mass=75000 kg/ha, cnr=100, type=grandis, name=grandis
            !   surfaceom tillage type = user_defined, f_incorp = 1.0, tillage_depth = 150 (mm)
            !endif
            c_n1 = carbon_tot(1)/nit_tot(1)
            c_n2 = carbon_tot(2)/nit_tot(2)
            oc1 = (carbon_tot(1)/100)/(bd(1)*dlayer(1))
            oc2 = (carbon_tot(2)/100)/(bd(2)*dlayer(2))
            total_wt = egrandis.foliage_mass + egrandis.adm_green()
            if is_end_year = 1 then
               report do_output
            endif
```
      micromet: soilalbedo=0.23; a_interception=0.0; b_interception=0.0; c_interception=0.0; d_interception=0.0
      soil
        InitWater Initial water
          percentmethod: percent=0.80; distributed=Evenly distributed
        Water
          Layer:
            Thickness (mm)  BD (g/cc)  AirDry (mm/mm)  LL15 (mm/mm)  DUL (mm/mm)  SAT (mm/mm)
            100             1.50       .010            .050          .160         .290
            300             1.60       .010            .050          .150         .290
            600             1.68       .010            .050          .140         .290
            1000            1.75       .020            .050          .130         .290
            1000            1.70       .050            .050          .120         .290
            1000            1.7        .050            .050          .120         .290
            1000            1.7        .050            .050          .120         .290
            1000            1.7        .050            .050          .120         .290
          SoilCrop Egrandis
            Layer:
              Thickness (mm)  LL (mm/mm)  KL (/day)  XF (0-1)
              100             .100        0.07       1.00
              300             .100        0.07       1.00
              600             .100        0.05       1.00
              1000            .100        0.02       1.00
              1000            .100        0.02       1.00
              1000            .100        0.02       1.00
              1000            .10         0.01       1.00
              1000            0.10        0.01       1.00
        SoilWat: SummerCona=3.5; SummerU=4; SummerDate=1-Nov; WinterCona=3.5; WinterU=4; WinterDate=1-Apr; DiffusConst=88.; DiffusSlope=35.4; Salb=0.13; Cn2Bare=65; CnRed=20; CnCov=.8
          Layer:
            Thickness (mm)  SWCON (0-1)
            100             0.9
            300             0.9
            600             0.9
            1000            0.6
            1000            0.6
            1000            0.6
            1000            0.6
            1000            0.6
        SoilOrganicMatter: RootCn=60.; RootWt=1.0; SoilCn=14.5; EnrACoeff=7.4; EnrBCoeff=0.2
          Layer:
            Thickness (mm)  OC (Total %)  FBiom (0-1)  FInert (0-1)
            100             2.00          .020         0.50
            300             1.00          .020         0.50
            600             0.50          .010         0.85
            1000            0.20          0.01         0.50
            1000            0.12          0.01         0.90
            1000            0.10          0.01         0.99
            1000            0.10          0.01         0.99
            1000            0.10          0.01         0.99
        Analysis
          Layer:
            Thickness (mm)  PH (1:5 water)
            100             5.80
            300             5.70
            600             5.70
            1000            5.90
            1000            5.70
            1000            5.70
            1000            5.70
            1000            5.70
        Sample Initial nitrogen
          Layer:
            Thickness (mm)  NO3 (ppm)  NH4 (ppm)
            100             0.10       0.01
            300             0.10       0.01
            600             0.10       0.01
            1000            0.01       0.01
            1000            0.01       0.01
            1000            0.01       0.01
            1000            0.01       0.01
            1000            0.01       0.01
      surfaceom
        PoolName = sugar  # Organic Matter pool name
        type = sugar  # Organic Matter type
        mass = 10.  # Initial surface residue (kg/ha)
        cnr = 80.0  # C:N ratio of initial residue
        standing_fraction = 0.0  # Fraction of residue standing
      tracker
        variable:
          average of egrandis.fn on process from report.reported to now as avg@fn
          average of egrandis.fw on process from report.reported to now as avg@fw
          average of egrandis.fvpd on process from report.reported to now as avg@fvpd
          average of egrandis.ft on process from report.reported to now as avg@ft
          average of egrandis.sw_demand on process from report.reported to now as avg@sw_demand
          sum of egrandis.dlt_adm_green(1) on process from report.reported to now as dlt_stem_wt
          sum of egrandis.dlt_adm_green(2) on process from report.reported to now as dlt_branch_wt
          sum of egrandis.dlt_adm_green(3) on process from report.reported to now as dlt_bark_wt
          sum of egrandis.dlt_foliage_mass on process from report.reported to now as dlt_leaf_wt
          sum of egrandis.n_demand on process from report.reported to now as sum@n_demand
          sum of egrandis.dlt_no3() on process from report.reported to now as dlt_no3()
          sum of runoff on process from report.reported to now as sum@runoff
          sum of drain on process from report.reported to now as sum@drain
          sum of es on process from report.reported to now as sum@es
          sum of dlt_n_min() on process from report.reported to now as sum@dlt_n_min()
          sum of microinterception on process from report.reported to now as sum@interception
          sum of rain on process from report.reported to now as sum@rain
      egrandis
  simulation GympieControl
    clock: start_date=4/2/1987; end_date=4/2/1997
    summaryfile
    metfile met: filename=toolara8797.met
    area paddock
      outputfile report: filename=GympieControl report.out; title=GympieControl report
        variables
          variable:
            day
            year
            dd/mm/yyyy as date
            egrandis.age
            esw
            tracker1.sum@soilwat2_runoff
            tracker1.sum@soilwat2_drain
            tracker1.sum@soilwat2_es
            tracker1.sum@irrigate_irrigation
            no3()
            nh4()
            biom_n()
            fom_n()
            hum_n()
            tracker1.sum@soiln2_dlt_n_min[]
            surfaceom.surfaceom_wt
            surfaceom.surfaceom_n
            egrandis.lai
            tracker1.avg@egrandis_fn
            tracker1.avg@egrandis_fw
            tracker1.avg@egrandis_fvpd
            tracker1.avg@egrandis_ft
            egrandis.adm_green(1) as stemgreenwt
            egrandis.adm_green(2) as branch_wt
            egrandis.adm_green(3) as bark_wt
            egrandis.foliage_mass as leafgreenwt
            egrandis.root_mass
            egrandis.adm_sen()
            tracker1.avg@egrandis_sw_demand
            egrandis.ep
            egrandis.height
            tracker1.sum@egrandis_dlt_adm_green[1] as dlt_stem_wt
            tracker1.sum@egrandis_dlt_adm_green[2] as dlt_branch_wt
            tracker1.sum@egrandis_dlt_adm_green[3] as dlt_bark_wt
            tracker1.sum@egrandis_dlt_foliage_mass as dlt_leaf_wt
            egrandis.foliage_n
            egrandis.an_green(1) as stemgreenn
            egrandis.an_green(2) as branch_n
            egrandis.an_green(3) as bark_n
            tracker1.sum@egrandis_n_demand
            tracker1.sum@egrandis_dlt_no3[]
            egrandis.plants
            carbon_tot(1)
            carbon_tot(2)
            nit_tot(1)
            nit_tot(2)
            manager.c_n1
            manager.c_n2
            manager.oc1
            manager.oc2
            manager.volume
            tracker1.sum@soilwat2_flow_no3[5]
            tracker1.sum@soilwat2_flow_no3[8]
            egrandis.total_n
            nit_tot()
            tracker1.sum@egrandis_dlt_no3
            egrandis.rlv
            dlayer
            tracker1.sum@micromet_interception
            tracker1.sum@met_rain
            tracker1.sum@fertiliz_fertiliser
      fertiliser
      irrigation
        automatic_irrigation = off
        asw_depth = 600  # Depth to which ASW is calculated. (mm)
        crit_fr_asw = 0.5  # Fraction of ASW below which irrigation is applied (0-1.0)
        irrigation_efficiency = 1  # Efficiency of the irrigation. (0-1.0)
        irrigation_allocation = off  # Allocation limits
        allocation = 0  # Allocation in mm
        default_no3_conc = 0.0  # Nitrate concentration (ppm N)
        default_nh4_conc = 0.0  # Ammonium concentration (ppm N)
        default_cl_conc = 0.0  # Chloride concentration (ppm Cl)
      manager
        on start_of_day:
```
            if day = 35 and year = 1987 then
               egrandis establish plants = 1111, init_section = seedling
            endif
            ! calculate interception losses
            !if rain > 4 then
            !
            !   rain = rain *(1.0 - 1.9534 * rain ** (-0.81))
            !
            !elseif rain > 0 then
            !   rain = 0
            !endif
            !start_popn = 1111
            !end_popn = 900
            !death_rate = (start_popn - end_popn)/(2. * 365)
```
        on end_of_day:
```
            ! try to reproduce initial fom pools from previous pinus ellioti plantation
            if day = 35 and year = 1987 then
               surfaceom add_surfaceom mass=75000 kg/ha, cnr=100, type=grandis, name=grandis
               surfaceom tillage type = user_defined, f_incorp = 1.0, tillage_depth = 150 (mm)
            endif
            c_n1 = carbon_tot(1)/nit_tot(1)
            c_n2 = carbon_tot(2)/nit_tot(2)
            oc1 = (carbon_tot(1)/100)/(bd(1)*dlayer(1))
            oc2 = (carbon_tot(2)/100)/(bd(2)*dlayer(2))
            volume = (adm_green(1) + adm_green(3) + foliage_mass)/1000. * 1000./500.
            if is_end_week = 1 then
               report do_output
            endif
```
        on start_of_day:
```
            !if year > 1987 then
            !   forest thin dlt_plants = 0.13
            !endif
```
      micromet: soilalbedo=0.23; a_interception=0.0; b_interception=0.0; c_interception=0.0; d_interception=0.0
      soil
        InitWater Initial water
          percentmethod: percent=0.80; distributed=Evenly distributed
        Water
          Layer:
            Thickness (mm)  BD (g/cc)  AirDry (mm/mm)  LL15 (mm/mm)  DUL (mm/mm)  SAT (mm/mm)
            100             1.50       .010            .050          .160         .290
            300             1.60       .010            .050          .150         .290
            600             1.68       .010            .050          .140         .290
            1000            1.75       .020            .050          .130         .290
            1000            1.70       .050            .050          .120         .290
            1000            1.7        .050            .050          .120         .290
            1000            1.7        .050            .050          .120         .290
            1000            1.7        .050            .050          .120         .290
          SoilCrop Egrandis
            Layer:
              Thickness (mm)  LL (mm/mm)  KL (/day)  XF (0-1)
              100             .100        0.07       1.00
              300             .100        0.07       1.00
              600             .100        0.05       1.00
              1000            .100        0.02       1.00
              1000            .100        0.02       1.00
              1000            .100        0.02       0.00
              1000            .10         0.01       0.00
              1000            0.10        0.01       0.00
        SoilWat: same as Coffs.paddock.soil.SoilWat
        SoilOrganicMatter: RootCn=60.; RootWt=1.0; SoilCn=20; EnrACoeff=7.4; EnrBCoeff=0.2
          Layer:
            Thickness (mm)  OC (Total %)  FBiom (0-1)  FInert (0-1)
            100             1.00          .020         0.60
            300             1.00          .020         0.70
            600             0.29          .010         0.95
            1000            0.20          0.01         0.99
            1000            0.12          0.01         0.99
            1000            0.10          0.01         0.99
            1000            0.10          0.01         0.99
            1000            0.10          0.01         0.99
        Analysis: same as Coffs.paddock.soil.Analysis
        Sample Initial nitrogen: same as Coffs.paddock.soil.Initial nitrogen
      surfaceom
        PoolName = sugar  # Organic Matter pool name
        type = sugar  # Organic Matter type
        mass = 10.  # Initial surface residue (kg/ha)
        cnr = 80.0  # C:N ratio of initial residue
        standing_fraction = 0.0  # Fraction of residue standing
      tracker tracker1
        variable:
          sum of runoff on process from report.reported to now as sum@soilwat2_runoff
          sum of drain on process from report.reported to now as sum@soilwat2_drain
          sum of es on process from report.reported to now as sum@soilwat2_es
          sum of irrigation.irrigation on process from report.reported to now as sum@irrigate_irrigation
          sum of dlt_n_min() on process from report.reported to now as sum@soiln2_dlt_n_min[]
          average of egrandis.fn on process from report.reported to now as avg@egrandis_fn
          average of egrandis.fw on process from report.reported to now as avg@egrandis_fw
          average of egrandis.fvpd on process from report.reported to now as avg@egrandis_fvpd
          average of egrandis.ft on process from report.reported to now as avg@egrandis_ft
          average of egrandis.sw_demand on process from report.reported to now as avg@egrandis_sw_demand
          sum of egrandis.dlt_adm_green(1) on process from report.reported to now as sum@egrandis_dlt_adm_green[1]
          sum of egrandis.dlt_adm_green(2) on process from report.reported to now as sum@egrandis_dlt_adm_green[2]
          sum of egrandis.dlt_adm_green(3) on process from report.reported to now as sum@egrandis_dlt_adm_green[3]
          sum of egrandis.dlt_foliage_mass on process from report.reported to now as sum@egrandis_dlt_foliage_mass
          sum of egrandis.n_demand on process from report.reported to now as sum@egrandis_n_demand
          sum of egrandis.dlt_no3() on process from report.reported to now as sum@egrandis_dlt_no3[]
          sum of flow_no3(5) on process from report.reported to now as sum@soilwat2_flow_no3[5]
          sum of flow_no3(8) on process from report.reported to now as sum@soilwat2_flow_no3[8]
          sum of egrandis.dlt_no3 on process from report.reported to now as sum@egrandis_dlt_no3
          sum of microinterception on process from report.reported to now as sum@micromet_interception
          sum of rain on process from report.reported to now as sum@met_rain
          sum of fertiliser.fertiliser on process from report.reported to now as sum@fertiliz_fertiliser
      egrandis
      memo
        	Note: If you have Observered data for some samplings but not others, then in the .out file (for the observations) you can use * or ?  for those missing values instead of using 0

        	This allows you to tell the difference between data you did not collect, and data that actually had a value of 0

        	Data with a * or ? is not plotted on the graph (hence neither is its predicted value) whereas data with 0 is.
  simulation GympieFertilized
    clock: start_date=4/2/1987; end_date=4/2/1997
    summaryfile
    metfile met: filename=toolara8797.met
    area paddock
      outputfile report: filename=GympieFertilized report.out; title=GympieFertilized report
        variables: same as GympieControl.paddock.report.variables
      operations
        09/02/1987  fertiliser apply amount = 192, type = no3_n, depth = 10
        20/05/1987  fertiliser apply amount = 192, type = no3_n, depth = 10
        28/08/1987  fertiliser apply amount = 96, type = no3_n, depth = 10
        06/12/1987  fertiliser apply amount = 256, type = no3_n, depth = 10
        29/02/1988  fertiliser apply amount = 256, type = no3_n, depth = 10
        18/07/1988  fertiliser apply amount = 128, type = no3_n, depth = 10
        26/10/1988  fertiliser apply amount = 192, type = no3_n, depth = 10
        09/06/1989  fertiliser apply amount = 128, type = no3_n, depth = 10
        27/10/1989  fertiliser apply amount = 96, type = no3_n, depth = 10
      fertiliser
      irrigation: same as GympieControl.paddock.irrigation
      manager: same as GympieControl.paddock.manager
      micromet: soilalbedo=0.23; a_interception=0.0; b_interception=0.0; c_interception=0.0; d_interception=0.0
      soil: same as GympieControl.paddock.soil
      surfaceom
        PoolName = sugar  # Organic Matter pool name
        type = sugar  # Organic Matter type
        mass = 10.  # Initial surface residue (kg/ha)
        cnr = 80.0  # C:N ratio of initial residue
        standing_fraction = 0.0  # Fraction of residue standing
      tracker tracker1: same as GympieControl.paddock.tracker1
      egrandis
      memo: same as GympieControl.paddock.memo
  simulation GympieIrrigated
    clock: start_date=4/2/1987; end_date=4/2/1997
    summaryfile
    metfile met: filename=toolara8797.met
    area paddock
      outputfile report: filename=GympieIrrigated report.out; title=GympieIrrigated report
        variables: same as GympieControl.paddock.report.variables
      operations
        08/01/1986  irrigation apply amount = 0
        15/01/1986  irrigation apply amount = 0
        22/01/1986  irrigation apply amount = 0
        29/01/1986  irrigation apply amount = 0
        08/02/1986  irrigation apply amount = 0
        15/02/1986  irrigation apply amount = 0
        22/02/1986  irrigation apply amount = 0
        01/03/1986  irrigation apply amount = 0
        08/03/1986  irrigation apply amount = 0
        15/03/1986  irrigation apply amount = 0
        22/03/1986  irrigation apply amount = 0
        29/03/1986  irrigation apply amount = 0
        08/04/1986  irrigation apply amount = 0
        15/04/1986  irrigation apply amount = 0
        22/04/1986  irrigation apply amount = 0
        29/04/1986  irrigation apply amount = 0
        08/05/1986  irrigation apply amount = 0
        15/05/1986  irrigation apply amount = 0
        22/05/1986  irrigation apply amount = 0
        29/05/1986  irrigation apply amount = 0
        08/06/1986  irrigation apply amount = 0
        15/06/1986  irrigation apply amount = 0
        22/06/1986  irrigation apply amount = 0
        29/06/1986  irrigation apply amount = 0
        08/07/1986  irrigation apply amount = 0
        15/07/1986  irrigation apply amount = 0
        22/07/1986  irrigation apply amount = 0
        29/07/1986  irrigation apply amount = 0
        08/08/1986  irrigation apply amount = 0
        15/08/1986  irrigation apply amount = 0
        22/08/1986  irrigation apply amount = 0
        29/08/1986  irrigation apply amount = 0
        08/09/1986  irrigation apply amount = 0
        15/09/1986  irrigation apply amount = 0
        22/09/1986  irrigation apply amount = 0
        29/09/1986  irrigation apply amount = 0
        08/10/1986  irrigation apply amount = 0
        15/10/1986  irrigation apply amount = 0
        22/10/1986  irrigation apply amount = 0
        29/10/1986  irrigation apply amount = 0
        08/11/1986  irrigation apply amount = 0
        15/11/1986  irrigation apply amount = 0
        22/11/1986  irrigation apply amount = 0
        29/11/1986  irrigation apply amount = 0
        08/12/1986  irrigation apply amount = 0
        15/12/1986  irrigation apply amount = 0
        22/12/1986  irrigation apply amount = 0
        29/12/1986  irrigation apply amount = 0
        08/01/1987  irrigation apply amount = 0
        15/01/1987  irrigation apply amount = 0
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        08/02/1987  irrigation apply amount = 3.885
        08/03/1987  irrigation apply amount = 25.5633
        08/04/1987  irrigation apply amount = 17.6379
        08/05/1987  irrigation apply amount = 9.7902
        08/07/1987  irrigation apply amount = 13.6752
        08/08/1987  irrigation apply amount = 11.655
        08/09/1987  irrigation apply amount = 17.5602
        08/10/1987  irrigation apply amount = 6.1383
        08/11/1987  irrigation apply amount = 11.8881
        08/12/1987  irrigation apply amount = 9.7125
        08/01/1988  irrigation apply amount = 13.7529
        08/02/1988  irrigation apply amount = 37.0629
        08/03/1988  irrigation apply amount = 42.56018
        08/08/1988  irrigation apply amount = 7.77
        08/09/1988  irrigation apply amount = 9.965025
        08/10/1988  irrigation apply amount = 32.634
        08/11/1988  irrigation apply amount = 41.78318
        08/12/1988  irrigation apply amount = 12.91763
        08/01/1989  irrigation apply amount = 8.0031
        08/02/1989  irrigation apply amount = 15.9285
        08/03/1989  irrigation apply amount = 23.7762
        08/07/1989  irrigation apply amount = 0.2331
        08/08/1989  irrigation apply amount = 8.8578
        08/09/1989  irrigation apply amount = 21.73658
        08/10/1989  irrigation apply amount = 43.08465
        08/11/1989  irrigation apply amount = 23.36828
        08/12/1989  irrigation apply amount = 35.21753
        08/01/1990  irrigation apply amount = 53.94323
        08/02/1990  irrigation apply amount = 54.27345
        08/03/1990  irrigation apply amount = 23.11575
        08/08/1990  irrigation apply amount = 16.9386
        08/09/1990  irrigation apply amount = 34.8096
        08/10/1990  irrigation apply amount = 32.28435
        08/11/1990  irrigation apply amount = 21.65888
        08/12/1990  irrigation apply amount = 32.1678
        08/01/1991  irrigation apply amount = 8.2362
        08/05/1991  irrigation apply amount = 8.1585
        08/09/1991  irrigation apply amount = 36.57728
        08/10/1991  irrigation apply amount = 16.14218
        08/11/1991  irrigation apply amount = 14.89898
        08/12/1991  irrigation apply amount = 15.54
        08/01/1992  irrigation apply amount = 23.4654
        08/02/1992  irrigation apply amount = 3.85
        08/07/1992  irrigation apply amount = 6.41
        08/08/1992  irrigation apply amount = 23.31
        08/09/1992  irrigation apply amount = 1.9425
        08/10/1992  irrigation apply amount = 21.23153
        08/11/1992  irrigation apply amount = 2.777775
        08/01/1993  irrigation apply amount = 10.81973
        08/02/1993  irrigation apply amount = 15.6177
        08/03/1993  irrigation apply amount = 7.57575
        08/04/1993  irrigation apply amount = 30.55553
        08/06/1993  irrigation apply amount = 15.28748
        08/07/1993  irrigation apply amount = 5.01165
        08/08/1993  irrigation apply amount = 15.43133
        08/09/1993  irrigation apply amount = 4.019925
        08/10/1993  irrigation apply amount = 15.2646
        08/12/1993  irrigation apply amount = 10.50368
        08/01/1994  irrigation apply amount = 6.85425
      fertiliser
      irrigation: same as GympieControl.paddock.irrigation
      manager
        on start_of_day:
        script: same as in GympieControl.paddock.manager
        on end_of_day:
        script: same as in GympieControl.paddock.manager
        on start_of_day:
```
            !if year > 1987 then
            !   forest thin dlt_plants = 0.13
            !endif
```
        on start_of_day:
```
            if day = 1 and year = 1994 then
               automatic_irrigation = 'off'
            endif
```
      micromet: soilalbedo=0.23; a_interception=0.0; b_interception=0.0; c_interception=0.0; d_interception=0.0
      soil: same as GympieControl.paddock.soil
      surfaceom
        PoolName = sugar  # Organic Matter pool name
        type = sugar  # Organic Matter type
        mass = 10.  # Initial surface residue (kg/ha)
        cnr = 80.0  # C:N ratio of initial residue
        standing_fraction = 0.0  # Fraction of residue standing
      tracker tracker1: same as GympieControl.paddock.tracker1
      egrandis
    memo: same as GympieControl.paddock.memo
  simulation GympieIrrigatedFertilized
    clock: start_date=4/2/1987; end_date=4/2/1997
    summaryfile
    metfile met: filename=toolara8797.met
    area paddock
      outputfile report: filename=GympieIrrigatedFertilized report.out; title=GympieIrrigatedFertilized report
        variables: same as GympieControl.paddock.report.variables
      operations
        09/02/1987  fertiliser apply amount = 192, type = no3_n, depth = 10
        20/05/1987  fertiliser apply amount = 192, type = no3_n, depth = 10
        28/08/1987  fertiliser apply amount = 96, type = no3_n, depth = 10
        06/12/1987  fertiliser apply amount = 256, type = no3_n, depth = 10
        29/02/1988  fertiliser apply amount = 256, type = no3_n, depth = 10
        18/07/1988  fertiliser apply amount = 128, type = no3_n, depth = 10
        26/10/1988  fertiliser apply amount = 192, type = no3_n, depth = 10
        09/06/1989  fertiliser apply amount = 128, type = no3_n, depth = 10
        27/10/1989  fertiliser apply amount = 96, type = no3_n, depth = 10
        09/02/1988  egrandis thin plants_fr=0.1, biomass_fr = 0.15
        19/05/1988  egrandis thin plants_fr=0.22, biomass_fr = 0.33
        26/09/1988  egrandis thin plants_fr=0.14, biomass_fr = 0.21
        08/01/1986  irrigation apply amount = 0
        15/01/1986  irrigation apply amount = 0
        22/01/1986  irrigation apply amount = 0
        29/01/1986  irrigation apply amount = 0
        08/02/1986  irrigation apply amount = 0
        15/02/1986  irrigation apply amount = 0
        22/02/1986  irrigation apply amount = 0
        01/03/1986  irrigation apply amount = 0
        08/03/1986  irrigation apply amount = 0
        15/03/1986  irrigation apply amount = 0
        22/03/1986  irrigation apply amount = 0
        29/03/1986  irrigation apply amount = 0
        08/04/1986  irrigation apply amount = 0
        15/04/1986  irrigation apply amount = 0
        22/04/1986  irrigation apply amount = 0
        29/04/1986  irrigation apply amount = 0
        08/05/1986  irrigation apply amount = 0
        15/05/1986  irrigation apply amount = 0
        22/05/1986  irrigation apply amount = 0
        29/05/1986  irrigation apply amount = 0
        08/06/1986  irrigation apply amount = 0
        15/06/1986  irrigation apply amount = 0
        22/06/1986  irrigation apply amount = 0
        29/06/1986  irrigation apply amount = 0
        08/07/1986  irrigation apply amount = 0
        15/07/1986  irrigation apply amount = 0
        22/07/1986  irrigation apply amount = 0
        29/07/1986  irrigation apply amount = 0
        08/08/1986  irrigation apply amount = 0
        15/08/1986  irrigation apply amount = 0
        22/08/1986  irrigation apply amount = 0
        29/08/1986  irrigation apply amount = 0
        08/09/1986  irrigation apply amount = 0
        15/09/1986  irrigation apply amount = 0
        22/09/1986  irrigation apply amount = 0
        29/09/1986  irrigation apply amount = 0
        08/10/1986  irrigation apply amount = 0
        15/10/1986  irrigation apply amount = 0
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        08/02/1987  irrigation apply amount = 2.2533
        08/03/1987  irrigation apply amount = 25.5633
        08/04/1987  irrigation apply amount = 21.5229
        08/05/1987  irrigation apply amount = 13.6752
        08/07/1987  irrigation apply amount = 17.6379
        08/08/1987  irrigation apply amount = 7.77
        08/09/1987  irrigation apply amount = 16.58895
        08/10/1987  irrigation apply amount = 15.8508
        08/11/1987  irrigation apply amount = 20.47395
        08/12/1987  irrigation apply amount = 19.425
        08/01/1988  irrigation apply amount = 15.6954
        08/02/1988  irrigation apply amount = 39.0054
        08/03/1988  irrigation apply amount = 42.56018
        08/09/1988  irrigation apply amount = 9.965025
        08/10/1988  irrigation apply amount = 40.404
        08/11/1988  irrigation apply amount = 49.55318
        08/12/1988  irrigation apply amount = 12.91763
        08/01/1989  irrigation apply amount = 11.8881
        08/02/1989  irrigation apply amount = 15.9285
        08/03/1989  irrigation apply amount = 23.7762
        08/07/1989  irrigation apply amount = 0.2331
        08/09/1989  irrigation apply amount = 51.70935
        08/10/1989  irrigation apply amount = 61.4607
        08/11/1989  irrigation apply amount = 31.21598
        08/12/1989  irrigation apply amount = 13.73348
        08/01/1990  irrigation apply amount = 69.50265
        08/02/1990  irrigation apply amount = 77.19495
        08/03/1990  irrigation apply amount = 30.6915
        08/08/1990  irrigation apply amount = 24.82515
        08/09/1990  irrigation apply amount = 59.9844
        08/10/1990  irrigation apply amount = 60.70313
        08/11/1990  irrigation apply amount = 42.22995
        08/12/1990  irrigation apply amount = 61.0722
        08/01/1991  irrigation apply amount = 16.02563
        08/02/1991  irrigation apply amount = 10.29525
        08/03/1991  irrigation apply amount = 23.73735
        08/04/1991  irrigation apply amount = 15.54
        08/08/1991  irrigation apply amount = 16.51125
        08/09/1991  irrigation apply amount = 61.63553
        08/10/1991  irrigation apply amount = 31.7016
        08/11/1991  irrigation apply amount = 29.04038
        08/12/1991  irrigation apply amount = 31.08
        08/01/1992  irrigation apply amount = 46.7754
        08/02/1992  irrigation apply amount = 7.7
        08/07/1992  irrigation apply amount = 6.41
        08/08/1992  irrigation apply amount = 34.965
        08/09/1992  irrigation apply amount = 3.885
        08/10/1992  irrigation apply amount = 41.35583
        08/11/1992  irrigation apply amount = 3.69075
        08/01/1993  irrigation apply amount = 11.79098
        08/02/1993  irrigation apply amount = 26.37915
        08/03/1993  irrigation apply amount = 9.51825
        08/04/1993  irrigation apply amount = 47.64953
        08/06/1993  irrigation apply amount = 20.70705
        08/07/1993  irrigation apply amount = 17.19113
        08/08/1993  irrigation apply amount = 30.56625
        08/09/1993  irrigation apply amount = 7.724925
        08/10/1993  irrigation apply amount = 30.381
        08/12/1993  irrigation apply amount = 10.50368
        08/01/1994  irrigation apply amount = 15.38898
      fertiliser
      irrigation: same as GympieControl.paddock.irrigation
      manager
        on start_of_day:
        script: same as in GympieControl.paddock.manager
        on end_of_day:
        script: same as in GympieControl.paddock.manager
        on start_of_day:
```
            !if year > 1987 then
            !   forest thin dlt_plants = 0.43
            !endif
```
        on start_of_day:
```
            if day = 1 and year = 1994 then
               automatic_irrigation = 'off'
            endif
```
      micromet: soilalbedo=0.23; a_interception=0.0; b_interception=0.0; c_interception=0.0; d_interception=0.0
      soil: same as GympieControl.paddock.soil
      surfaceom
        PoolName = sugar  # Organic Matter pool name
        type = sugar  # Organic Matter type
        mass = 10.  # Initial surface residue (kg/ha)
        cnr = 80.0  # C:N ratio of initial residue
        standing_fraction = 0.0  # Fraction of residue standing
      tracker tracker1: same as GympieControl.paddock.tracker1
      egrandis
    memo: same as GympieControl.paddock.memo
  simulation Wagga Effluent Irrigated E. grandis
    clock: start_date=1/7/1991; end_date=30/6/1996
    summaryfile
    metfile met: filename=wwepp.met
    area paddock
      outputfile report: filename=Wagga Effluent Irrigated E. grandis report.out; title=Wagga Effluent Irrigated E. grandis report
        variables
          variable:
            dd/mm/yyyy as date
            day
            year
            egrandis.age
            egrandis.lai
            tracker.avg@fn
            tracker.avg@fw
            tracker.avg@fvpd
            tracker.avg@ft
            egrandis.adm_green(1) as stemgreenwt
            egrandis.adm_green(2) as branch_wt
            egrandis.adm_green(3) as bark_wt
            egrandis.foliage_mass as leafgreenwt
            egrandis.root_mass
            egrandis.height
            tracker.sum@ep
            tracker.litterfall
            manager.cum_litterfall
            wood
      fertiliser
      irrigation
        automatic_irrigation = on
        asw_depth = 1000.  # Depth to which ASW is calculated. (mm)
        crit_fr_asw = 0.95  # Fraction of ASW below which irrigation is applied (0-1.0)
        irrigation_efficiency = 1  # Efficiency of the irrigation. (0-1.0)
        irrigation_allocation = off  # Allocation limits
        allocation = 0  # Allocation in mm
        default_no3_conc = 4.5  # Nitrate concentration (ppm N)
        default_nh4_conc = 2.5  # Ammonium concentration (ppm N)
        default_cl_conc = 0.0  # Chloride concentration (ppm Cl)
      manager
        on init:
```
            cum_litterfall = 0
```
        on start_of_day:
```
            if year = 1991 and day = 182 then
               egrandis establish plants = 1333, init_section = seedling
            endif
```
        on end_of_day:
```
            cum_litterfall = cum_litterfall + egrandis.dlt_foliage_mass_detached
            if is_end_week = 1 then
               report do_output
            endif
```
      micromet: soilalbedo=0.23; a_interception=0.0; b_interception=0.0; c_interception=0.0; d_interception=0.0
      soil
        InitWater Initial water
          percentmethod: percent=0.80; distributed=Evenly distributed
        Water
          Layer:
            Thickness (mm)  BD (g/cc)  AirDry (mm/mm)  LL15 (mm/mm)  DUL (mm/mm)  SAT (mm/mm)
            200             1.50       .010            .100          .240         .290
            300             1.60       .010            .100          .240         .290
            500             1.68       .010            .100          .240         .290
            1000            1.75       .020            .100          .240         .290
            1000            1.70       .050            .100          .240         .290
            1000            1.7        .050            .100          .240         .290
          SoilCrop Egrandis
            Layer:
              Thickness (mm)  LL (mm/mm)  KL (/day)  XF (0-1)
              200             .100        0.09       1.00
              300             .100        0.07       1.00
              500             .100        0.07       1.00
              1000            .100        0.02       1.00
              1000            .100        0.02       1.00
              1000            .100        0.02       1.00
        SoilWat: SummerCona=3.5; SummerU=4; SummerDate=1-Nov; WinterCona=3.5; WinterU=4; WinterDate=1-Apr; DiffusConst=88.; DiffusSlope=35.4; Salb=0.13; Cn2Bare=70; CnRed=20; CnCov=.8
          Layer:
            Thickness (mm)  SWCON (0-1)
            200             0.9
            300             0.9
            500             0.9
            1000            0.6
            1000            0.6
            1000            0.6
        SoilOrganicMatter: RootCn=60.; RootWt=20000.; SoilCn=14; EnrACoeff=7.4; EnrBCoeff=0.2
          Layer:
            Thickness (mm)  OC (Total %)  FBiom (0-1)  FInert (0-1)
            200             1.00          .030         0.60
            300             0.45          .020         0.70
            500             0.27          .015         0.85
            1000            0.27          0.01         0.95
            1000            0.27          0.01         0.95
            1000            0.27          0.01         0.95
        Analysis
          Layer:
            Thickness (mm)  PH (1:5 water)
            200             5.70
            300             5.50
            500             5.30
            1000            5.30
            1000            5.30
            1000            5.30
        Sample Initial nitrogen
          Layer:
            Thickness (mm)  NO3 (ppm)  NH4 (ppm)
            200             1.00       0.10
            300             0.50       0.10
            500             0.10       0.10
            1000            0.10       0.10
            1000            0.10       0.10
            1000            0.10       0.10
      surfaceom
        PoolName = sugar  # Organic Matter pool name
        type = sugar  # Organic Matter type
        mass = 10.  # Initial surface residue (kg/ha)
        cnr = 80.0  # C:N ratio of initial residue
        standing_fraction = 0.0  # Fraction of residue standing
      tracker
        variable:
          average of egrandis.fn on process from report.reported to now as avg@fn
          average of egrandis.fw on process from report.reported to now as avg@fw
          average of egrandis.fvpd on process from report.reported to now as avg@fvpd
          average of egrandis.ft on process from report.reported to now as avg@ft
          sum of egrandis.ep on process from report.reported to now as sum@ep
          sum of egrandis.dlt_foliage_mass_detached on process from report.reported to now as litterfall
      egrandis
      manager Empty manager
        on init:
```
wood = 0
```
        on end_of_day:
```
wood = egrandis.adm_green(1) + egrandis.adm_green(3)
```
  simulation Grandis
    clock: start_date=9/4/1980; end_date=10/4/1994
    summaryfile
    metfile met: filename=wodonga.met
    area paddock
      outputfile report: filename=Grandis report.out; title=Grandis report
        variables
          variable:
            dd/mm/yyyy as date
            day
            year
            egrandis.age
            egrandis.lai
            tracker1.avg@egrandis_fn
            tracker1.avg@egrandis_fw
            tracker1.avg@egrandis_fvpd
            tracker1.avg@egrandis_ft
            egrandis.adm_green(1) as stemgreenwt
            egrandis.adm_green(2) as branch_wt
            egrandis.adm_green(3) as bark_wt
            egrandis.foliage_mass as leafgreenwt
            egrandis.root_mass
            egrandis.height
      fertiliser
      irrigation
        automatic_irrigation = on
        asw_depth = 1000.  # Depth to which ASW is calculated. (mm)
        crit_fr_asw = 0.9  # Fraction of ASW below which irrigation is applied (0-1.0)
        irrigation_efficiency = 1  # Efficiency of the irrigation. (0-1.0)
        irrigation_allocation = off  # Allocation limits
        allocation = 0  # Allocation in mm
        default_no3_conc = 0.0  # Nitrate concentration (ppm N)
        default_nh4_conc = 0.0  # Ammonium concentration (ppm N)
        default_cl_conc = 0.0  # Chloride concentration (ppm Cl)
      manager
        on start_of_day:
```
            if day = 1 and year = 1987 then
               ! guess that this is about when they stopped irrigating ??
               irrigation.automatic_irrigation = 'off'
            endif
            !if is_end_month = 1 then
            !   fertiliser apply amount = 50 (kg/ha), depth = 5 (mm), type = no3_n
            !endif
```
        on end_of_day:
```
            if is_end_week = 1 then
               report do_output
            endif
```
      micromet: soilalbedo=0.23; a_interception=0.0; b_interception=0.0; c_interception=0.0; d_interception=0.0
      soil
        InitWater Initial water
          percentmethod: percent=0.80; distributed=Evenly distributed
        Water
          Layer:
            Thickness (mm)  BD (g/cc)  AirDry (mm/mm)  LL15 (mm/mm)  DUL (mm/mm)  SAT (mm/mm)
            200             1.50       .010            .100          .220         .300
            300             1.60       .010            .100          .220         .300
            500             1.68       .010            .100          .220         .300
            1000            1.75       .020            .100          .220         .300
            1000            1.70       .050            .100          .220         .300
            1000            1.7        .050            .100          .220         .300
            1000            1.7        .050            .100          .220         .300
            1000            1.7        .050            .100          .220         .300
          SoilCrop Egrandis
            Layer:
              Thickness (mm)  LL (mm/mm)  KL (/day)  XF (0-1)
              200             .100        0.07       1.00
              300             .100        0.07       1.00
              500             .100        0.05       1.00
              1000            .100        0.02       1.00
              1000            .100        0.02       1.00
              1000            .100        0.02       1.00
              1000            .100        0.02       1.00
              1000            .100        0.02       1.00
        SoilWat: SummerCona=3.5; SummerU=4; SummerDate=1-Nov; WinterCona=3.5; WinterU=4; WinterDate=1-Apr; DiffusConst=88.; DiffusSlope=35.4; Salb=0.13; Cn2Bare=70; CnRed=20; CnCov=.8
          Layer:
            Thickness (mm)  SWCON (0-1)
            200             0.6
            300             0.6
            500             0.6
            1000            0.6
            1000            0.6
            1000            0.6
            1000            0.6
            1000            0.6
        SoilOrganicMatter: RootCn=60.; RootWt=20000.; SoilCn=14; EnrACoeff=7.4; EnrBCoeff=0.2
          Layer:
            Thickness (mm)  OC (Total %)  FBiom (0-1)  FInert (0-1)
            200             1.00          .030         0.60
            300             0.45          .020         0.70
            500             0.27          .015         0.85
            1000            0.27          0.01         0.95
            1000            0.27          0.01         0.95
            1000            0.27          0.01         0.95
            1000            0.27          0.01         0.99
            1000            0.27          0.01         0.99
        Analysis
          Layer:
            Thickness (mm)  PH (1:5 water)
            200             5.70
            300             5.50
            500             5.30
            1000            5.30
            1000            5.30
            1000            5.30
            1000            5.30
            1000            5.30
        Sample Initial nitrogen
          Layer:
            Thickness (mm)  NO3 (ppm)  NH4 (ppm)
            200             1.00       0.10
            300             0.50       0.10
            500             0.10       0.10
            1000            0.10       0.10
            1000            0.10       0.10
            1000            0.10       0.10
            1000            0.10       0.10
            1000            0.10       0.10
      surfaceom
        PoolName = sugar  # Organic Matter pool name
        type = sugar  # Organic Matter type
        mass = 10.  # Initial surface residue (kg/ha)
        cnr = 80.0  # C:N ratio of initial residue
        standing_fraction = 0.0  # Fraction of residue standing
      tracker tracker1
        variable:
          average of egrandis.fn on process from report.reported to now as avg@egrandis_fn
          average of egrandis.fw on process from report.reported to now as avg@egrandis_fw
          average of egrandis.fvpd on process from report.reported to now as avg@egrandis_fvpd
          average of egrandis.ft on process from report.reported to now as avg@egrandis_ft
      egrandis
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