folder Simulations: version=32
  simulation Bare
    clock
      start_date = 21/02/2006  # Select the start date of the simulation
      end_date = 04/09/2006  # Select the end date of the simulation
    summaryfile
    metfile met -> /Simulations/shared/met
    climatechange ShelterEffects
      maxtmodifier = 0.0  # Change in maximum temperature in degrees celsius
      mintmodifier = 0.0  # Change in minimum temperature in degrees celsius
      rainmodifier = 0  # Relative change in rainfall
      radiationmodifier = 0.66  # Relative change in radiation
      co2 = 350  # Atmospheric C02 concentration (ppm)
    area paddock
      operations
        21-feb  'WellCamp Water' set sw = 0.46 0.48 0.50 0.45 0.36 0.38 0.4 0.4 0.4 0.4 0.4 0.4
        21-feb  irrigation apply amount = 15
      outputfile -> /Simulations/shared/outputfile: filename=Bare.out; title=Bare
        variables -> /Simulations/shared/outputfile/Variables
        events Reporting Frequency -> /Simulations/shared/outputfile/Reporting Frequency
      irrigation
        automatic_irrigation = off
        asw_depth = 600.0  # Depth to which ASW is calculated. (mm)
        crit_fr_asw = 0.5  # Fraction of ASW below which irrigation is applied (0-1.0)
        irrigation_efficiency = 1.0  # Efficiency of the irrigation. (0-1.0)
        default_no3_conc = 0.0  # Nitrate concentration (ppm N)
        default_nh4_conc = 0.0  # Ammonium concentration (ppm N)
        default_cl_conc = 0.0  # Chloride concentration (ppm Cl)
      surfaceom surface organic matter -> /Simulations/shared/surface organic matter
      Epopulnea -> /Simulations/shared/Epopulnea
      manager OutputCalculator -> /Simulations/shared/OutputCalculator
      micromet: soilalbedo=0.13; a_interception=0.0; b_interception=0.0; c_interception=0.0; d_interception=0.0
      soil WellCamp: LocalName=Waco; Site=Jimbour; Region=South East Queensland
        ec=[0.84, 0.84, 0.84, 0.84]
        SoilType = Black Vertosol  # Soil description
        NearestTown = Jimbour, Q 4352
        NaturalVegetation = Grassland, mainly Qld bluegrass
        InitWater Initial water: RelativeTo=Epopulnea
          PercentMethod: Percent=0.00; Distributed=Filled from top
        Water
          Layer:
            Thickness (mm)  BD (g/cc)  AirDry (mm/mm)  LL15 (mm/mm)  DUL (mm/mm)  SAT (mm/mm)
            150             0.9        0.19            0.2           0.54         0.59
            150             1.01       0.25            0.27          0.52         0.58
            300             1.02       0.3             0.35          0.52         0.59
            300             1          0.25            0.3           0.48         0.53
            300             1.06       0.21            0.25          0.42         0.47
            300             1.14       0.21            0.275         0.4          0.45
            300             1.23       0.21            0.3           0.4          0.45
            300             1.23       0.21            0.3           0.4          0.45
            400             1.23       0.21            0.3           0.4          0.45
            500             1.23       0.21            0.3           0.4          0.45
            500             1.23       0.21            0.3           0.4          0.45
            500             1.23       0.21            0.3           0.4          0.45
          SoilCrop Epopulnea
            Layer:
              Thickness (mm)  LL (mm/mm)  KL (/day)  XF (0-1)
              150             0.2         0.02       0.21
              150             0.27        0.02       0.15
              300             0.35        0.025      1
              300             0.3         0.02       1
              300             0.25        0.02       1
              300             0.275       0.02       1
              300             0.3         0.02       1
              300             0.3         0.02       1
              400             0.3         0.02       1
              500             0.3         0.02       1
              500             0.3         0.02       0
              500             0.3         0.02       0
        SoilWat: SummerCona=5; SummerU=5; SummerDate=1-Nov; WinterCona=5; WinterU=5; WinterDate=1-Apr; DiffusConst=20; DiffusSlope=8; Salb=0.09; Cn2Bare=85; CnRed=0; CnCov=0.8
          Layer:
            Thickness (mm)  SWCON (0-1)
            150             0.3
            150             0.3
            300             0.3
            300             0.3
            300             0.3
            300             0.3
            300             0.3
            300             0.3
            400             0.3
            500             0.3
            500             0.3
            500             0.3
        SoilOrganicMatter: RootCn=40; RootWt=200; SoilCn=12.5; EnrACoeff=7.4; EnrBCoeff=0.2
          Layer:
            Thickness (mm)  OC (Total %)  FBiom (0-1)  FInert (0-1)
            150             1.04          0.025        0.4
            150             0.89          0.02         0.6
            300             0.89          0.015        0.8
            300             0.89          0.01         0.9
            300             0.77          0.01         0.95
            300             0.45          0.01         0.95
            300             0.45          0.01         0.95
            300             0.45          0.01         0.95
            400             0.45          0.01         0.95
            500             0.45          0.01         0.95
            500             0.45          0.01         0.95
            500             0.45          0.01         0.95
        Analysis
          Layer:
            Thickness (mm)  EC (1:5 dS/m)  PH (1:5 water)
            150             0.2            8.4
            150             0.25           8.8
            300             0.31           9
            300             0.4            9.2
            300             0.59           9.2
            300             0.84           9.1
            300             0.84           9.1
            300             0.84           9.1
            400             -              9.1
            500             -              9.1
            500             -              9.1
            500             -              9.1
        Sample Initial nitrogen
          Layer:
            Thickness (mm)  NO3 (ppm)  NH4 (ppm)
            150             6.503      0.599
            150             5          0.100
            300             5          0.100
            300             5          0.100
            300             5          0.100
            300             5          0.100
            300             5          0.100
            300             5          0.100
            400             5          0.100
            500             5          0.100
            500             5          0.100
            500             5          0.100
  simulation populneaOutside
    clock
      start_date = 21/02/2006  # Select the start date of the simulation
      end_date = 04/09/2006  # Select the end date of the simulation
    summaryfile
    metfile met -> /Simulations/shared/met
    area paddock
      operations
        21-feb  Epopulnea establish plants = 62500, init_section = seedling
        21-feb  'WellCamp Water' set sw = 0.38 0.47 0.505 0.42 0.31 0.33 0.3 0.3 0.3 0.3 0.3 0.3
        21-feb  irrigation apply amount = 15
      outputfile -> /Simulations/shared/outputfile: filename=populneaOutside.out; title=populneaOutside
        variables -> /Simulations/shared/outputfile/Variables
        events Reporting Frequency -> /Simulations/shared/outputfile/Reporting Frequency
      irrigation: same as Bare.paddock.Irrigation
      surfaceom surface organic matter -> /Simulations/shared/surface organic matter
      Epopulnea -> /Simulations/shared/Epopulnea
      manager OutputCalculator -> /Simulations/shared/OutputCalculator
      micromet: soilalbedo=0.13; a_interception=0.0; b_interception=0.0; c_interception=0.0; d_interception=0.0
      soil WellCamp: LocalName=Waco; Site=Jimbour; Region=South East Queensland
        ec=[0.84, 0.84, 0.84, 0.84]
        SoilType = Black Vertosol  # Soil description
        NearestTown = Jimbour, Q 4352
        NaturalVegetation = Grassland, mainly Qld bluegrass
        InitWater Initial water: RelativeTo=Epopulnea
          PercentMethod: Percent=0.00; Distributed=Filled from top
        Water
          Layer:
            Thickness (mm)  BD (g/cc)  AirDry (mm/mm)  LL15 (mm/mm)  DUL (mm/mm)  SAT (mm/mm)
            150             0.9        0.19            0.19          0.54         0.59
            150             1.01       0.25            0.32          0.52         0.58
            300             1.02       0.3             0.38          0.52         0.59
            300             1          0.25            0.3           0.48         0.53
            300             1.06       0.21            0.25          0.42         0.47
            300             1.14       0.21            0.28          0.4          0.45
            300             1.23       0.21            0.3           0.4          0.45
            300             1.23       0.21            0.3           0.4          0.45
            400             1.23       0.21            0.3           0.4          0.45
            500             1.23       0.21            0.3           0.4          0.45
            500             1.23       0.21            0.3           0.4          0.45
            500             1.23       0.21            0.3           0.4          0.45
          SoilCrop Epopulnea
            Layer:
              Thickness (mm)  LL (mm/mm)  KL (/day)  XF (0-1)
              150             0.19        0.01       0.21
              150             0.32        0.02       0.2
              300             0.38        0.04       1
              300             0.3         0.03       1
              300             0.25        0.03       1
              300             0.28        0.03       1
              300             0.3         0.03       1
              300             0.3         0.03       1
              400             0.3         0.03       1
              500             0.3         0.03       1
              500             0.3         0.03       0
              500             0.3         0.03       0
        SoilWat: same as Bare.paddock.WellCamp.SoilWat
        SoilOrganicMatter: same as Bare.paddock.WellCamp.SoilOrganicMatter
        Analysis: same as Bare.paddock.WellCamp.Analysis
        Sample Initial nitrogen: same as Bare.paddock.WellCamp.Initial nitrogen
  simulation populneaW1
    clock
      start_date = 21/02/2006  # Select the start date of the simulation
      end_date = 04/09/2006  # Select the end date of the simulation
    summaryfile
    metfile met -> /Simulations/shared/met
    climatechange ShelterEffects -> /Simulations/shared/ShelterEffects
    area paddock
      operations
        21-feb  Epopulnea establish plants = 55000, init_section = seedling
        21-feb  'WellCamp Water' set sw = 0.27 0.353 0.390 0.30 0.25 0.28 0.3 0.3 0.3 0.3 0.3 0.3
      outputfile -> /Simulations/shared/outputfile: filename=populneaW1.out; title=populneaW1
        variables -> /Simulations/shared/outputfile/Variables
        events Reporting Frequency -> /Simulations/shared/outputfile/Reporting Frequency
      irrigation: same as Bare.paddock.Irrigation
      surfaceom surface organic matter -> /Simulations/shared/surface organic matter
      Epopulnea -> /Simulations/shared/Epopulnea
      manager OutputCalculator -> /Simulations/shared/OutputCalculator
      micromet: soilalbedo=0.13; a_interception=0.0; b_interception=0.0; c_interception=0.0; d_interception=0.0
      soil WellCamp: LocalName=Waco; Site=Jimbour; Region=South East Queensland
        ec=[0.84, 0.84, 0.84, 0.84]
        SoilType = Black Vertosol  # Soil description
        NearestTown = Jimbour, Q 4352
        NaturalVegetation = Grassland, mainly Qld bluegrass
        InitWater Initial water: RelativeTo=Epopulnea
          PercentMethod: Percent=0.00; Distributed=Filled from top
        Water: same as populneaOutside.paddock.WellCamp.Water
        SoilWat: SummerCona=1; SummerU=0; SummerDate=1-Nov; WinterCona=1; WinterU=0; WinterDate=1-Apr; DiffusConst=20; DiffusSlope=8; Salb=0.09; Cn2Bare=85; CnRed=0; CnCov=0.8
          Layer:
            Thickness (mm)  SWCON (0-1)
            150             0.3
            150             0.3
            300             0.3
            300             0.3
            300             0.3
            300             0.3
            300             0.3
            300             0.3
            400             0.3
            500             0.3
            500             0.3
            500             0.3
        SoilOrganicMatter: same as Bare.paddock.WellCamp.SoilOrganicMatter
        Analysis: same as Bare.paddock.WellCamp.Analysis
        Sample Initial nitrogen: same as Bare.paddock.WellCamp.Initial nitrogen
  simulation populneaW2
    clock
      start_date = 21/02/2006  # Select the start date of the simulation
      end_date = 04/09/2006  # Select the end date of the simulation
    summaryfile
    metfile met -> /Simulations/shared/met
    climatechange ShelterEffects -> /Simulations/shared/ShelterEffects
    area paddock
      operations
        21-feb  Epopulnea establish plants = 62500, init_section = seedling
        21-feb  'WellCamp Water' set sw = 0.32 0.365 0.392 0.31 0.25 0.28 0.3 0.3 0.3 0.3 0.3 0.3
      outputfile -> /Simulations/shared/outputfile: filename=populneaW2.out; title=populneaW2
        variables -> /Simulations/shared/outputfile/Variables
        events Reporting Frequency -> /Simulations/shared/outputfile/Reporting Frequency
      irrigation: same as Bare.paddock.Irrigation
      surfaceom surface organic matter -> /Simulations/shared/surface organic matter
      Epopulnea -> /Simulations/shared/Epopulnea
      manager OutputCalculator -> /Simulations/shared/OutputCalculator
      micromet: soilalbedo=0.13; a_interception=0.0; b_interception=0.0; c_interception=0.0; d_interception=0.0
      soil WellCamp: same as populneaW1.paddock.WellCamp
  simulation populneaW3
    clock
      start_date = 21/02/2006  # Select the start date of the simulation
      end_date = 04/09/2006  # Select the end date of the simulation
    summaryfile
    metfile met -> /Simulations/shared/met
    climatechange ShelterEffects -> /Simulations/shared/ShelterEffects
    area paddock
      operations
        21-feb  Epopulnea establish plants = 59400, init_section = seedling
        21-feb  'WellCamp Water' set sw = 0.32 0.37 0.40 0.33 0.29 0.30 0.3 0.3 0.3 0.3 0.3 0.3
      outputfile -> /Simulations/shared/outputfile: filename=populneaW3.out; title=populneaW3
        variables -> /Simulations/shared/outputfile/Variables
        events Reporting Frequency -> /Simulations/shared/outputfile/Reporting Frequency
      irrigation: same as Bare.paddock.Irrigation
      surfaceom surface organic matter -> /Simulations/shared/surface organic matter
      Epopulnea -> /Simulations/shared/Epopulnea
      manager OutputCalculator -> /Simulations/shared/OutputCalculator
      micromet: soilalbedo=0.13; a_interception=0.0; b_interception=0.0; c_interception=0.0; d_interception=0.0
      soil WellCamp: LocalName=Waco; Site=Jimbour; Region=South East Queensland
        ec=[0.84, 0.84, 0.84, 0.84]
        SoilType = Black Vertosol  # Soil description
        NearestTown = Jimbour, Q 4352
        NaturalVegetation = Grassland, mainly Qld bluegrass
        InitWater Initial water: RelativeTo=Epopulnea
          PercentMethod: Percent=0.00; Distributed=Filled from top
        Water
          Layer:
            Thickness (mm)  BD (g/cc)  AirDry (mm/mm)  LL15 (mm/mm)  DUL (mm/mm)  SAT (mm/mm)
            150             0.9        0.19            0.19          0.54         0.59
            150             1.01       0.25            0.32          0.52         0.58
            300             1.02       0.3             0.38          0.52         0.59
            300             1          0.25            0.3           0.48         0.53
            300             1.06       0.21            0.25          0.42         0.47
            300             1.14       0.21            0.28          0.4          0.45
            300             1.23       0.21            0.3           0.4          0.45
            300             1.23       0.21            0.3           0.4          0.45
            400             1.23       0.21            0.3           0.4          0.45
            500             1.23       0.21            0.3           0.4          0.45
            500             1.23       0.21            0.3           0.4          0.45
            500             1.23       0.21            0.3           0.4          0.45
          SoilCrop Epopulnea
            Layer:
              Thickness (mm)  LL (mm/mm)  KL (/day)  XF (0-1)
              150             0.19        0.015      0.21
              150             0.32        0.02       0.2
              300             0.38        0.04       1
              300             0.3         0.03       1
              300             0.25        0.03       1
              300             0.28        0.03       1
              300             0.3         0.03       1
              300             0.3         0.03       1
              400             0.3         0.03       1
              500             0.3         0.03       1
              500             0.3         0.03       0
              500             0.3         0.03       0
        SoilWat: same as Bare.paddock.WellCamp.SoilWat
        SoilOrganicMatter: same as Bare.paddock.WellCamp.SoilOrganicMatter
        Analysis: same as Bare.paddock.WellCamp.Analysis
        Sample Initial nitrogen: same as Bare.paddock.WellCamp.Initial nitrogen
  simulation populneaW4
    clock
      start_date = 21/02/2006  # Select the start date of the simulation
      end_date = 04/09/2006  # Select the end date of the simulation
    summaryfile
    metfile met -> /Simulations/shared/met
    climatechange ShelterEffects -> /Simulations/shared/ShelterEffects
    area paddock
      operations
        21-feb  Epopulnea establish plants = 62500, init_section = seedling
        21-feb  'WellCamp Water' set sw = 0.385 0.385 0.43 0.38 0.30 0.31 0.3 0.3 0.3 0.3 0.3 0.3
        21-feb  irrigation apply amount = 15
      outputfile -> /Simulations/shared/outputfile: filename=populneaW4.out; title=populneaW4
        variables -> /Simulations/shared/outputfile/Variables
        events Reporting Frequency -> /Simulations/shared/outputfile/Reporting Frequency
      irrigation: same as Bare.paddock.Irrigation
      surfaceom surface organic matter -> /Simulations/shared/surface organic matter
      Epopulnea -> /Simulations/shared/Epopulnea
      manager OutputCalculator -> /Simulations/shared/OutputCalculator
      micromet: soilalbedo=0.13; a_interception=0.0; b_interception=0.0; c_interception=0.0; d_interception=0.0
      soil WellCamp: same as populneaW3.paddock.WellCamp
  simulation populneaW5
    clock
      start_date = 21/02/2006  # Select the start date of the simulation
      end_date = 04/09/2006  # Select the end date of the simulation
    summaryfile
    metfile met -> /Simulations/shared/met
    climatechange ShelterEffects -> /Simulations/shared/ShelterEffects
    area paddock
      operations
        21-feb  Epopulnea establish plants = 62500, init_section = seedling
        21-feb  'WellCamp Water' set sw = 0.41 0.45 0.48 0.42 0.30 0.32 0.3 0.3 0.3 0.3 0.3 0.3
        21-feb  irrigation apply amount = 15
      outputfile -> /Simulations/shared/outputfile: filename=populneaW5.out; title=populneaW5
        variables -> /Simulations/shared/outputfile/Variables
        events Reporting Frequency -> /Simulations/shared/outputfile/Reporting Frequency
      irrigation: same as Bare.paddock.Irrigation
      surfaceom surface organic matter -> /Simulations/shared/surface organic matter
      Epopulnea -> /Simulations/shared/Epopulnea
      manager OutputCalculator -> /Simulations/shared/OutputCalculator
      micromet: soilalbedo=0.13; a_interception=0.0; b_interception=0.0; c_interception=0.0; d_interception=0.0
      soil WellCamp: same as populneaW3.paddock.WellCamp
  simulation populneaWet
    clock
      start_date = 21/02/2006  # Select the start date of the simulation
      end_date = 04/09/2006  # Select the end date of the simulation
    summaryfile
    metfile met -> /Simulations/shared/met
    climatechange ShelterEffects -> /Simulations/shared/ShelterEffects
    area paddock
      micromet: soilalbedo=0.13; a_interception=0.0; b_interception=0.0; c_interception=0.0; d_interception=0.0
      operations
        21-feb  Epopulnea establish plants = 62500, init_section = seedling
        21-feb  'WellCamp Water' set sw = 0.41 0.445 0.48 0.42 0.30 0.32 0.3 0.3 0.3 0.3 0.3 0.3
        21-Feb  irrigation apply amount = 15
        27-Feb  irrigation apply amount = 15
        7-Mar  irrigation apply amount = 15
        13-Mar  irrigation apply amount = 15
        20-Mar  irrigation apply amount = 15
        29-Mar  irrigation apply amount = 15
        3-Apr  irrigation apply amount = 15
        10-Apr  irrigation apply amount = 15
        17-Apr  irrigation apply amount = 15
        25-Apr  irrigation apply amount = 15
        2-May  irrigation apply amount = 15
        8-May  irrigation apply amount = 10
        15-May  irrigation apply amount = 10
        22-May  irrigation apply amount = 10
        30-May  irrigation apply amount = 10
        7-Jun  irrigation apply amount = 10
        13-Jun  irrigation apply amount = 10
        19-Jun  irrigation apply amount = 10
        27-Jun  irrigation apply amount = 10
        2-Jul  irrigation apply amount = 10
        11-Jul  irrigation apply amount = 10
        17-Jul  irrigation apply amount = 10
        24-Jul  irrigation apply amount = 10
        1-Aug  irrigation apply amount = 10
        9-Aug  irrigation apply amount = 10
        22-Aug  irrigation apply amount = 10
        29-Aug  irrigation apply amount = 10
      outputfile -> /Simulations/shared/outputfile: filename=populneaWet.out; title=populneaWet
        variables -> /Simulations/shared/outputfile/Variables
        events Reporting Frequency -> /Simulations/shared/outputfile/Reporting Frequency
      irrigation
        automatic_irrigation = off
        asw_depth = 1000  # Depth to which ASW is calculated. (mm)
        crit_fr_asw = 1  # Fraction of ASW below which irrigation is applied (0-1.0)
        irrigation_efficiency = 1.0  # Efficiency of the irrigation. (0-1.0)
        default_no3_conc = 0.0  # Nitrate concentration (ppm N)
        default_nh4_conc = 0.0  # Ammonium concentration (ppm N)
        default_cl_conc = 0.0  # Chloride concentration (ppm Cl)
      surfaceom surface organic matter -> /Simulations/shared/surface organic matter
      Epopulnea -> /Simulations/shared/Epopulnea
      manager OutputCalculator -> /Simulations/shared/OutputCalculator
      soil WellCamp: same as populneaW3.paddock.WellCamp
  folder shared
    outputfile: filename=.out
      variables
        variable:
          dd/mm/yyyy as Date  # Date (dd/mm/yyyy)
          day
          lai
          adm_green(1) as stem_wt
          foliage_mass as leaf_wt
          fw
          fn
          rain
          irrigation
          es
          sw
          sw_dep()
          ft
          plantleaf
          plantstem
          plantla
          plantbiomass
          swsi
          plants
          slai
          no3()
          nh4()
          root_depth
          rlv
          ep
          eo
          rtr
          sw150
          petr
          peta
          ffasw
          height
          ftcanopy
          sw_demand
          sw_supply
          runoff
          cum_stress
          esw
          fwcanopy
          ga
          biomass
          fvpd
      events Reporting Frequency: event=Daily  # End of day
    Epopulnea
    surfaceom surface organic matter
      PoolName = wheat  # Organic Matter pool name
      type = wheat  # Organic Matter type
      mass = 0.1  # Initial surface residue (kg/ha)
      cnr = 80.0  # C:N ratio of initial residue
      standing_fraction = 0.0  # Fraction of residue standing
    metfile met: filename=%apsim%\Tests\MetFiles\Toowoomba.met
    climatechange ShelterEffects
      maxtmodifier = 0  # Change in maximum temperature in degrees celsius
      mintmodifier = 0  # Change in minimum temperature in degrees celsius
      rainmodifier = 0  # Relative change in rainfall
      radiationmodifier = 0.9  # Relative change in radiation
      co2 = 350  # Atmospheric C02 concentration (ppm)
    manager OutputCalculator
      on init:
```
 
plantbiomass = 0 
plantleaf = 0
plantstem = 0
plantla = 0
SWSI = 0
nodes = 0
RTR = 0
sw150 = 0
windspeed = 5.55 ! (m/s) ! 20 km/h average at both 9am and 3pm
```
      on endofday:
```
if lai > 0 then
   plantbiomass = biomass/plants*1000
   plantleaf = foliage_mass/plants*1000
   plantstem = adm_green(1)/ plants*1000
   plantla = lai * 10000 / plants
   SWSI = SWSI + (1.0 - swdef_photo)
   RTR = ep / (eo * cover_green)
endif
  sw150 = sw_dep(1) + sw_dep(2) + sw_dep(3) + sw_dep(4) + sw_dep(5) + sw_dep(6)
  sw60 = sw_dep(1) + sw_dep(2) + sw_dep(3)
  ll60 = ll15_dep(1) + ll15_dep(2) + ll15_dep(3)
  dul60 = dul_dep(1) + dul_dep(2) + dul_dep(3)
```
    soil WellCamp: same as Bare.paddock.WellCamp
    soil Black Vertosol-Waco (Wellcamp No030): Site=Wellcamp; Region=Darling Downs; State=Queensland
      Comment = Soil naming structure: \State\Region\Classification-Local Name (Site/district and locator number); oc and ph estimated  # Comments
      SoilType = Black Vertosol  # Soil description
      NearestTown = Toowoomba, Q 4350
      NaturalVegetation = Grassland, mainly Qld Blue grass
      DataSource = CSIRO Sustainable Ecosystems, Toowoomba
      Water
        Layer:
          Thickness (mm)  BD (g/cc)  AirDry (mm/mm)  LL15 (mm/mm)  DUL (mm/mm)  SAT (mm/mm)
          150             0.9        0.15            0.3           0.52         0.59
          150             1.01       0.24            0.3           0.53         0.59
          300             1.02       0.3             0.3           0.54         0.59
          300             1          0.3             0.3           0.54         0.59
          300             1.06       0.3             0.3           0.52         0.57
          300             1.14       0.3             0.3           0.49         0.54
          300             1.23       0.3             0.3           0.46         0.51
        SoilCrop wheat
          Layer:
            Thickness (mm)  LL (mm/mm)  KL (/day)  XF (0-1)
            150             0.3         0.06       1
            150             0.34        0.06       1
            300             0.38        0.06       1
            300             0.36        0.04       1
            300             0.4         0.04       1
            300             0.36        0.02       1
            300             0.46        0.02       1
      SoilWat: SummerCona=3.5; SummerU=6; SummerDate=1-Nov; WinterCona=3.5; WinterU=6; WinterDate=1-Apr; DiffusConst=40; DiffusSlope=16; Salb=0.12; CN2Bare=73; CNRed=20; CNCov=0.8
        Layer:
          Thickness (mm)  SWCON (0-1)
          150             0.3
          150             0.3
          300             0.3
          300             0.3
          300             0.3
          300             0.3
          300             0.3
      SoilOrganicMatter: RootCN=40; RootWT=1000; SoilCN=12; EnrACoeff=7.4; EnrBCoeff=0.2
        Layer:
          Thickness (mm)  OC (Total %)  FBiom (0-1)  FInert (0-1)
          150             1.24          0.04         0.4
          150             1.24          0.02         0.6
          300             1.25          0.02         0.8
          300             1.1           0.02         1
          300             0.71          0.01         1
          300             0.34          0.01         1
          300             0.26          0.01         1
      Analysis
        Layer:
          Thickness (mm)  PH (1:5 water)
          150             7
          150             7
          300             7
          300             7
          300             7
          300             7
          300             7
      Sample Initial nitrogen
        Layer:
          Thickness (mm)  NO3 (ppm)  NH4 (ppm)
          150             6          1
          150             5          1
          300             3          0.900
          300             2          0.700
          300             1          0.200
          300             1          0.100
          300             1          0.010
      Sample Initial water
        Layer:
          Thickness (mm)  SW (mm/mm)
          150             0.300
          150             0.340
          300             0.380
          300             0.360
          300             0.400
          300             0.360
          300             0.460
