folder Simulations: version=32
  simulation Site 67
    metfile met: filename=Site67.met
    clock
      start_date = 1/01/1957  # Select the start date of the simulation
      end_date = 31/12/1999  # Select the end date of the simulation
    summaryfile
    area paddock
      folder Manager folder
        manager Planting rule
          # Sowing criteria
          date1 = 1-feb  # Enter planting date (dd-mmm)
          # Sowing parameters
          crop = grasp  # Enter name of growth module to sow
          on start_of_day:
```
         if (date('[date1]') = today) and [crop].crop_status = 3 then
               [crop] establish init_section = establishment
         endif
```
        manager Burning rule
          # Burn criteria
          date1 = 1-sep  # Enter burn date (dd-mmm)
          # Burn parameters
          crop = grasp  # Enter name of module to burn
          on start_of_day:
```
 if ((date('[date1]') = today) AND ([crop].crop_status = 1)) then
   [crop].green_pool = 0
   [crop].dead_pool = 0
 endif
```
        manager Scratch
          on end_of_day:
```
swdep = sw_dep() - sw_dep(4)
no3avail = no3() - no3(4)
swdep1_2 = sw_dep(1) + sw_dep(2)
cover_green_pcnt = cover_green * 100.0

grasp_dlt_dm = grasp.dlt_dm * 10.0
```
      fertiliser
      surfaceom surface organic matter
        PoolName = wheat  # Organic Matter pool name
        type = wheat  # Organic Matter type
        mass = 1000.  # Initial surface residue (kg/ha)
        cnr = 80.0  # C:N ratio of initial residue
        standing_fraction = 0.0  # Fraction of residue standing
      soil Site67
        InitNitrogen Initial nitrogen
          PercentMethod: Percent=0
        InitWater Initial water
          percentmethod: percent=1; distributed=filled from top
        Water
          Layer:
            Thickness (mm)  BD (g/cc)  AirDry (mm/mm)  LL15 (mm/mm)  DUL (mm/mm)  SAT (mm/mm)
            100             1.64035    0.05            0.06          0.301        0.351
            400             2.03785    0.049           0.05          0.151        0.201
            500             2.17035    0.059           0.06          0.101        0.151
            50              1.68717    0.059           0.06          0.061        0.333333
          SoilCrop nativepasture
            Layer:
              Thickness (mm)  LL (mm/mm)  KL (/day)  XF (0-1)
              100             0.06        0.08       1
              400             0.05        0.08       1
              500             0.06        0.08       1
              50              0.06        0          0
          SoilCrop weed
            Layer:
              Thickness (mm)  LL (mm/mm)  KL (/day)  XF (0-1)
              100             0.06        0.08       1
              400             0.05        0.08       1
              500             0.06        0.08       1
              50              0.06        0          0
          SoilCrop grasp
            Layer:
              Thickness (mm)  LL (mm/mm)  KL (/day)  XF (0-1)
              100             0.06        0.5        0
              400             0.05        0.5        0
              500             0.06        1          0
              50              0.06        0          0
          SoilCrop tree
            Layer:
              Thickness (mm)  LL (mm/mm)  KL (/day)  XF (0-1)
              100             0.05        0.129589   0
              400             0.059       0.446075   0
              500             0.059       0.424336   0
              50              0.059       0.0357429  0
        SoilWat: SummerCona=3.5; SummerU=6; SummerDate=1-Nov; WinterCona=3.5; WinterU=6; WinterDate=1-Apr; DiffusConst=40; DiffusSlope=16; Salb=0.14; CN2Bare=73; CNRed=20; CNCov=0.8
          Layer:
            Thickness (mm)  SWCON (0-1)
            100             0.3
            400             0.3
            500             0.3
            50              0.3
        SoilOrganicMatter: RootCN=40; RootWT=1000; SoilCN=12; EnrACoeff=7.4; EnrBCoeff=0.2
          Layer:
            Thickness (mm)  OC (Total %)  FBiom (0-1)  FInert (0-1)
            100             1.24          0.04         0.4
            400             1.24          0.02         0.7
            500             0.9           0.02         0.9
            50              0.5           0.2          0.95
        Analysis
          Layer:
            Thickness (mm)  PH (1:5 water)
            100             7
            400             7
            500             7
            50              7
        Sample Soil sample
          Layer:
            {Thickness (mm)=3000, NO3 (ppm)=0, NH4 (ppm)=0, SW (mm/mm)=0}
      grasp
        root_depth_init = 950  # Initial depth of roots (mm)
        dm_dead_leaf_init = 0  # Initial Dead Leaf weight (kg/ha)
        dm_dead_stem_init = 0  # Initial Dead Stem weight (kg/ha)
        dm_dead_root_init = 0  # Initial Dead Root weight (kg/ha)
        dm_green_leaf_init = 0  # Initial Green Leaf weight (p135, kg/ha)
        dm_green_stem_init = 0  # Initial Green Stem weight (p136, kg/ha)
        dm_green_root_init = 0  # Initial Green Root weight (kg/ha)
        basal_area_init = 4.4  # Initial Basal area of tussocks (p005, %)
        acc_trans_for_n_init = 0  # Initial accumulated transpiration, used for N uptake (mm)
        acc_growth_for_n_init = 0  # Initial accumulated growth, used for N uptake (kg/ha)
        max_n_avail = 50  # Limit to total N (p099, kg/year)
        max_n_avail_dist = 0.6    0.3  0.1  0.0  # Distribution of N in profile
        ll = 0.06     0.05     0.06     0.06  # Lower limit (ll) of water extraction (mm/mm)
        kl = 0.5      0.5      1.0    0.0  0.0  # Rate of water extraction (kl)
        kl2rlv = 1.0
        crop_type = grass
        uptake_source = calc
        height_max = 1200  # Maximum canopy height (mm)
        hgt_vpd_screen = 200  # Height at which surface effects on vpd are 0 (p095*10, mm)
        height_1000kg = 100  # Sward Height per tonne (p096*10, mm)
        et_use_efficiency = 0  # Evapotranspiration use efficiency used in BA calc (p288, kg/ha/mm) (p288)
        frac_leaf2total = 0.5  # Fraction of total dm produced that goes into leaf pool (p123,0-1)
        yld_cover_slope = 0.693147  # Shape of exponential curve relating yield and cover
        yld_fpc50 = 1600  # yld_fpc50 (p046)
        yld_cov50 = 1600  # Yield transpiring at 50% of pan evap (p045)
        yld_tcov50 = 1150  # Tsdm yield at which cover for runoff is 50% (p271)
        swi_fullgreen = 0.8  # Min soil water for 100% green (p009)
        swi_nogrow = 0.01  # SWI when growth stops (swi_nogrow)
        pot_regrow = 10  # Max rate regrowth from tussocks (p006, kg/ha/unit grass ba)
        te_std = 25  # Transpiration efficiency at vpd=20mb (p007)
        rad_factor = 8.97
        residual_plant_N = 5  # Always this much n in plant (p097, kg/ha)
        litter_n = 0.3  # N conc of detached stems and roots ((p110-p111)/2)
        n_uptk_per100 = 50  # Nitrogen uptake per 100mm water (p098, kg/ha)
        frost_start = 2  # Minimum screen temp at which green cover=100% (p125, oC)
        frost_kill = 0  # Minimum screen temp at which frost kills all green (p011, oC)
        death_slope = 0.013  # Rate of green death per soil water (p051)
        death_intercept = 0.002  # Background death rate (p010)
        leaf_death_ratio = 1  # Proportion of leaf death to total death (p133)
        stem_death_ratio = 1  # Proportion of stem death to total death (p134)
        n_conc_dm_crit = 2.5  # Level of plant N at which no N stress occurs (p102)
        n_conc_dm_min = 0.4  # Level of soil N at which no N stress occurs (p101)
        n_conc_dm_max = 0.5  # Level of soil N at which soil N to high for growth (p100)
        stem_thresh = 0  # stem_thresh (p124)
        detach_dryseason = 0.0   0.005     0.005  # detach_dryseason: root, leaf, stem
        detach_wetseason = 0.0   0.0     0.0  # detach_wetseason: root, leaf, stem
        day_start_summer = 305
        day_end_summer = 120
        acc_et_reset = 120
        acc_growth_reset = 334
        trans_for_n_reset = 258
        growth_for_n_reset = 258
        day_start_wet = 334
        day_start_dry = 121
        enr_a_coeff = 7.4
        enr_b_coeff = 0.2
      outputfile Annual: filename=Site 67 Annual.out; title=Site 67 Annual
        variables
          variable:
            year as Year  # Date (dd/mm/yyyy)
            grasp.n_uptake
            tracker.dlt_dm as total_growth
        events Reporting Frequency: event=End_year  # End of year
      tracker
        variable=sum of Scratch.grasp_dlt_dm on end_of_day from Annual.reported to now as dlt_dm
      operations
        11-Oct-1991  grasp set green_pool= 702 !(kg/ha)  (end_of_day)
        11-Oct-1991  grasp set dead_pool = 0 !(kg/ha)  (end_of_day)
        15-Oct-1991  'Site67 Water' set sw_dep = 5 39.5 42.4 3 !(mm)  (end_of_day)
        10-Nov-1992  grasp set green_pool= 80 !(kg/ha)  (end_of_day)
        10-Nov-1992  grasp set dead_pool= 0 !(kg/ha)  (end_of_day)
        29-Oct-1993  grasp set green_pool= 50 !(kg/ha)  (end_of_day)
        29-Oct-1993  grasp set green_pool= 0 !(kg/ha)  (end_of_day)
