folder Bilo Skip2: version=23
  simulation Bilo05Skip2DSHD
    clock
      start_date = 1/1/2006  # Select the start date of the simulation
      end_date = 23/5/2006  # Select the end date of the simulation
    summaryfile: filename=Sorghum_Bilo Skip1_MR Buster_DS_HD.sum
    metfile met: filename=Bilo Skip2.met
    area paddock
      folder Manager folder
        manager Sow SkipRow on a fixed date
          category =  # Sowing criteria
          date = 27/01/2006  # Enter sowing date (d/m/yyyy)
          category =  # Sowing parameters
          crop = Sorghum  # Enter name of crop to sow
          density = 5  # Enter sowing density (plants/m2)
          depth = 30  # Enter sowing depth (mm)
          cultivar = Buster  # Enter cultivar
          row_spacing = 1  # Enter row spacing (m)
          RowConfiguration = double  # Enter skip row configuration
          ftn =  # Enter Fertile Tiller No.
          on start_of_day:
```
     if (biomass > 0) then
         harvIndx = yield / biomass
      else
         harvIndx = 0
      endif


      if (day > 152) then
        current_season = year
      else
        current_season = year -1
      endif

            if (paddock_is_fallow() = 1 and today = date('[date]')) then
              season = current_season
              SowDay = day
               SowYear = year
ftn = 0

              [crop] sow plants =[density], sowing_depth = [depth], cultivar = [cultivar], row_spacing = [row_spacing], skip = [RowConfiguration], tiller_no_fertile = [ftn] ()
            endif
            if (paddock_is_fallow() = 0) then
               outputfile do_output
            endif
```
        manager Harvesting rule
          crop = Sorghum  # Enter name of crop to harvest when ripe
          on end_of_day:
```
           if [crop].StageName = 'harvest_ripe' or [crop].plant_status = 'dead' then
              [crop]  harvest
              [crop]  end_crop
           endif
```
      soil Bilo Skip2 (avg): Site=Biloela; Region=Central Queensland; LocalName=Biloela
        SoilType = BiloSkip1(avg)  # Classification
        NearestTown = Unknown
        NaturalVegetation = Unknown
        Water
          Layer:
            Thickness (mm)  BD (g/cc)  AirDry (mm/mm)  LL15 (mm/mm)  DUL (mm/mm)  SAT (mm/mm)
            150             1.230      0.140           0.240         0.340        0.360
            150             1.440      0.200           0.240         0.350        0.370
            300             1.430      0.250           0.270         0.390        0.410
            300             1.520      0.250           0.270         0.370        0.390
            300             1.670      0.200           0.220         0.290        0.310
            300             1.510      0.190           0.210         0.300        0.320
            300             1.580      0.190           0.210         0.260        0.280
          SoilCrop Sorghum
            Layer:
              Thickness (mm)  LL (mm/mm)  KL (/day)  XF (0-1)
              150             0.240       0.080      1
              150             0.240       0.080      1
              300             0.270       0.080      1
              300             0.270       0.080      1
              300             0.220       0.060      1
              300             0.210       0.040      1
              300             0.210       0.020      1
        SoilWat: SummerCona=3.5; WinterCona=3.5; SummerU=6; WinterU=6; SummerDate=1-Nov; WinterDate=1-Apr; DiffusConst=88; DiffusSlope=35.4; Salb=0.13; Cn2Bare=91; CnRed=20; CnCov=0.8; CnCanopyFact=0.8
          Layer:
            Thickness (mm)  SWCON (0-1)
            150             0.500
            150             0.500
            300             0.500
            300             0.500
            300             0.500
            300             0.500
            300             0.500
        SoilOrganicMatter: RootCn=30; RootWt=1500; SoilCn=12.5; EnrACoeff=7.4; EnrBCoeff=0.2
          Layer:
            Thickness (mm)  OC (Total %)  FBiom (0-1)  FInert (0-1)
            150             1.630         0.030        0.400
            150             1.250         0.020        0.600
            300             1             0.010        0.800
            300             0.700         0.010        0.900
            300             0.700         0.010        1
            300             0.300         0.010        1
            300             0.300         0.010        1
        Lab
          Layer:
            Thickness (mm)  PH (1:5 water)
            150             6.750
            150             6.900
            300             7.050
            300             7.500
            300             7.900
            300             7.800
            300             7.750
        Sample Initial nitrogen
          Layer:
            Thickness (mm)  NO3 (ppm)  NH4 (ppm)
            150             13.55      0.1
            150             14.815     0.1
            300             5.12802    0.1
            300             4.82502    0.1
            300             4.19201    0.1
            300             3.97401    0.1
            300             3.16501    0.1
        InitWater Initial water
          PercentMethod: Percent=1.00; Distributed=Filled from top
      manager Logic
        on end_of_day:
```
  if (sw_demand > 0) then
     sdr = sw_supply / sw_demand
     if (sdr > 1) then
        sdr = 1
     endif
  else
     sdr = 1
  endif
```
      sorghum
      outputfile
        variables
          variables: dd/mm/yyyy as date, DaysAfterSowing, sw_dep(), ll15_dep(), dul_dep(), WaterSD, Biomass, yield, lai, GrainNo, stage, biomass_wt, GrainGreenWt, RachisGreenWt, StemGreenWt, GrainSize, LeafSenescedWt, LeafGreenWt, TillerNoFertile
  simulation Bilo05Skip2DSLD -> /Bilo Skip2/Bilo05Skip2DSHD
    area paddock -> /Bilo Skip2/Bilo05Skip2DSHD/paddock
      folder Manager folder -> /Bilo Skip2/Bilo05Skip2DSHD/paddock/Manager folder
        manager Sow SkipRow on a fixed date
          category =  # Sowing criteria
          date = 27/01/2006  # Enter sowing date (d/m/yyyy)
          category =  # Sowing parameters
          crop = Sorghum  # Enter name of crop to sow
          density = 2.5  # Enter sowing density (plants/m2)
          depth = 30  # Enter sowing depth (mm)
          cultivar = Buster  # Enter cultivar
          row_spacing = 1  # Enter row spacing (m)
          RowConfiguration = double  # Enter skip row configuration
          ftn =  # Enter Fertile Tiller No.
          on start_of_day:
          script: same as in Bilo05Skip2DSHD.paddock.Manager folder.Sow SkipRow on a fixed date
  simulation Bilo05Skip2SHD -> /Bilo Skip2/Bilo05Skip2DSHD
    area paddock -> /Bilo Skip2/Bilo05Skip2DSHD/paddock
      folder Manager folder -> /Bilo Skip2/Bilo05Skip2DSHD/paddock/Manager folder
        manager Sow SkipRow on a fixed date
          category =  # Sowing criteria
          date = 27/01/2006  # Enter sowing date (d/m/yyyy)
          category =  # Sowing parameters
          crop = Sorghum  # Enter name of crop to sow
          density = 5  # Enter sowing density (plants/m2)
          depth = 30  # Enter sowing depth (mm)
          cultivar = Buster  # Enter cultivar
          row_spacing = 1  # Enter row spacing (m)
          RowConfiguration = solid  # Enter skip row configuration
          ftn =  # Enter Fertile Tiller No.
          on start_of_day:
          script: same as in Bilo05Skip2DSHD.paddock.Manager folder.Sow SkipRow on a fixed date
