folder Clermont DGP: version=23
  simulation Sorghum_Clermont_DGP_Buster
    clock
      start_date = 1/02/2007  # Select the start date of the simulation
      end_date = 30/06/2007  # Select the end date of the simulation
    summaryfile: filename=Sorghum_Clermont_DGP_Buster.sum
    metfile met: filename=Clermont DGP.met
    area paddock
      folder Manager folder
        manager Sow SkipRow on a fixed date
          category =  # Sowing criteria
          date = 13/02/2007  # Enter sowing date (d/m/yyyy)
          category =  # Sowing parameters
          crop = Sorghum  # Enter name of crop to sow
          density = 4.5  # Enter sowing density (plants/m2)
          depth = 30  # Enter sowing depth (mm)
          cultivar = Buster  # Enter cultivar
          row_spacing = 1  # Enter row spacing (m)
          RowConfiguration = solid  # Enter skip row configuration
          ftn =  # Enter Fertile Tiller No.
          on start_of_day:
```
if (paddock_is_fallow() = 1 and today = date('[date]')) then
    if (day > 152) then
        season  = year
    else
        season  = year -1
    endif

    SowDay = day
    SowYear = year



   [crop] sow plants = [density], sowing_depth = [depth], cultivar = [cultivar], row_spacing = [row_spacing], skip = [RowConfiguration], tiller_no_fertile = [ftn] 
endif
if (paddock_is_fallow() = 0) then
       outputfile do_output
endif
```
        manager Harvesting rule
          crop = Sorghum  # Enter name of crop to harvest when ripe
          on end_of_day:
```
           if [crop].StageName = 'harvest_ripe' or [crop].plant_status = 'dead' then
              [crop]  harvest
              [crop]  end_crop
           endif
```
      soil Clermont: Site=Clermont; Region=Central Queensland; LocalName=Clermont
        SoilType = Clermont  # Classification
        NearestTown = Unknown
        NaturalVegetation = Unknown
        Water
          Layer:
            Thickness (mm)  BD (g/cc)  AirDry (mm/mm)  LL15 (mm/mm)  DUL (mm/mm)  SAT (mm/mm)
            150             1.080      0.15            0.3           0.45         0.5
            150             1.150      0.2             0.3           0.49         0.54
            300             1.180      0.3             0.35          0.47         0.52
            300             1.340      0.34            0.35          0.4          0.45
            300             1.480      0.32            0.32          0.38         0.39
            300             1.480      0.32            0.32          0.36         0.37
            300             1.480      0.32            0.32          0.35         0.35
          SoilCrop Sorghum
            Layer:
              Thickness (mm)  LL (mm/mm)  KL (/day)  XF (0-1)
              150             0.300       0.080      1
              150             0.300       0.080      1
              300             0.350       0.080      1
              300             0.350       0.080      1
              300             0.320       0.060      1
              300             0.320       0.040      1
              300             0.320       0.020      1
        SoilWat: SummerCona=3.5; WinterCona=3.5; SummerU=6; WinterU=6; SummerDate=1-Nov; WinterDate=1-Apr; DiffusConst=88; DiffusSlope=35.4; Salb=0.13; Cn2Bare=91; CnRed=20; CnCov=0.8; CnCanopyFact=0.8
          Layer:
            Thickness (mm)  SWCON (0-1)
            150             0.500
            150             0.500
            300             0.500
            300             0.500
            300             0.500
            300             0.500
            300             0.500
        SoilOrganicMatter: RootCn=30; RootWt=1500; SoilCn=12.5; EnrACoeff=7.4; EnrBCoeff=0.2
          Layer:
            Thickness (mm)  OC (Total %)  FBiom (0-1)  FInert (0-1)
            150             1.870         0.040        0.400
            150             1.200         0.020        0.500
            300             0.600         0.020        0.500
            300             0.300         0.020        0.600
            300             0.200         0.010        0.600
            300             0.340         0            0
            300             0.260         0            0
        Lab
          Layer:
            Thickness (mm)  PH (1:5 water)
            150             7.790
            150             8.010
            300             8.150
            300             8.280
            300             8.310
            300             8.400
            300             8.100
        Sample Initial nitrogen
          Layer:
            Thickness (mm)  NO3 (ppm)  NH4 (ppm)
            150             6.20941    0.100021
            150             6.20941    0.100021
            300             6.20941    0.100021
            300             6.20941    0.100021
            300             6.20941    0.100021
            300             6.20941    0.100021
            300             6.20941    0.100021
        InitWater Initial water
          PercentMethod: Percent=1.00; Distributed=Evenly distributed
      manager Logic
        on init:
```
 sdr = 1
```
        on end_of_day:
```
  GrainSize = grain_size * 1000
  if (sw_demand > 0) then
     sdr = sw_supply / sw_demand
     if (sdr > 1) then
        sdr = 1
     endif
  else
     sdr = 1
  endif
```
      irrigation
        automatic_irrigation = off  # switch
        asw_depth = 1000  # Depth to which ASW is calculated. (mm)
        crit_fr_asw = 0.5  # Fraction of ASW below which irrigation is applied (0-1.0)
        irrigation_efficiency = 1  # Efficiency of the irrigation. (0-1.0)
        default_no3_conc = 0  # Nitrate concentration (ppm N)
        default_nh4_conc = 0  # Ammonium concentration (ppm N)
        default_cl_conc = 0  # Chloride concentration (ppm Cl)
      fertiliser
      operations
      outputfile: events=My Variables Events
        variables
          variables: dd/mm/yyyy as date, DaysAfterSowing, sw_dep(), ll15_dep(), dul_dep(), WaterSD, Biomass, yield, lai, GrainNo, stage, biomass_wt, GrainGreenWt, RachisGreenWt, StemGreenWt, GrainSize, LeafSenescedWt, LeafGreenWt, TillerNoFertile, esw
      sorghum
