folder Hermitage AYT 2008: version=23
  simulation Hermitage_AYT_2008
    clock
      start_date = 17/11/2008  # Select the start date of the simulation
      end_date = 30/04/2009  # Select the end date of the simulation
    summaryfile: filename=Sorghum_Hermitage_AYT_2008_Buster.sum
    metfile met: filename=HRS.met
    area paddock
      folder Manager folder
        manager Sow SkipRow on a fixed date
          category =  # Sowing criteria
          date = 11/12/2008  # Enter sowing date (d/m/yyyy)
          category =  # Sowing parameters
          crop = Sorghum  # Enter name of crop to sow
          density = 7.3  # Enter sowing density (plants/m2)
          depth = 30  # Enter sowing depth (mm)
          cultivar = Buster  # Enter cultivar
          row_spacing = 0.75  # Enter row spacing (m)
          RowConfiguration = solid  # Enter skip row configuration
          ftn =  # Enter Fertile Tiller No.
          on start_of_day:
```
AccTT = AccTT + DeltaTT

if (paddock_is_fallow() = 1 and today = date('[date]')) then
   AccTT = DeltaTT
   [crop] sow plants =[density], sowing_depth = [depth], cultivar = [cultivar], row_spacing = [row_spacing], skip = [RowConfiguration], tiller_no_fertile = [ftn] ()
endif

if (paddock_is_fallow() = 0) then
    outputfile do_output
endif
```
        manager Harvesting rule
          category =  # Harvesting criteria
          crop = Sorghum  # Enter name of crop to harvest when ripe
          on end_of_day:
```
           if [crop].StageName = 'harvest_ripe' or [crop].plant_status = 'dead' then
              [crop]  harvest
              [crop]  end_crop
           endif
```
        manager Fertilise at sowing
          category =  # When should fertiliser be applied
          modulename = Sorghum  # On which module should the event come from
          eventname = sowing  # On which event should fertiliser be applied
          category =  # Fertiliser application details
          fertmodule = fertiliser  # Module used to apply the fertiliser
          fert_amount_sow = 150  # Amount of starter fertiliser at sowing (kg/ha)
          fert_type_sow = urea_N  # Sowing fertiliser type
          on [modulename].[eventname]:
```
        [fertmodule] apply amount = [fert_amount_sow] (kg/ha), depth = 50 (mm), type = [fert_type_sow]
```
      irrigation
        automatic_irrigation = off  # switch
        asw_depth = 1800  # Depth to which ASW is calculated. (mm)
        crit_fr_asw = 1  # Fraction of ASW below which irrigation is applied (0-1.0)
        irrigation_efficiency = 1  # Efficiency of the irrigation. (0-1.0)
        default_no3_conc = 0  # Nitrate concentration (ppm N)
        default_nh4_conc = 0  # Ammonium concentration (ppm N)
        default_cl_conc = 0  # Chloride concentration (ppm Cl)
      fertiliser
      operations
      soil Hermitage: Site=Hermitage; Region=Darling Downs; LocalName=Hermitage
        SoilType = Hermitage  # Classification
        NearestTown = Unknown
        NaturalVegetation = Unknown
        Water
          Layer:
            Thickness (mm)  BD (g/cc)  AirDry (mm/mm)  LL15 (mm/mm)  DUL (mm/mm)  SAT (mm/mm)
            150             1.030      0.17            0.23          0.560        0.610
            150             1.060      0.22            0.25          0.550        0.600
            300             1.060      0.32            0.34          0.550        0.600
            300             1.080      0.35            0.36          0.540        0.590
            300             1.110      0.4             0.41          0.530        0.580
            300             1.140      0.44            0.44          0.520        0.530
            300             1.170      0.46            0.46          0.510        0.530
          SoilCrop sorghum
            Layer:
              Thickness (mm)  LL (mm/mm)  KL (/day)  XF (0-1)
              150             0.23        0.08       1
              150             0.25        0.08       1
              300             0.34        0.06       1
              300             0.36        0.04       1
              300             0.41        0.04       1
              300             0.44        0.04       1
              300             0.46        0.04       1
        SoilWat: SummerCona=3.5; WinterCona=3.5; SummerU=6; WinterU=6; SummerDate=1-Nov; WinterDate=1-Apr; DiffusConst=88; DiffusSlope=35.4; Salb=0.13; Cn2Bare=91; CnRed=20; CnCov=0.8; CnCanopyFact=0.8
          Layer:
            Thickness (mm)  SWCON (0-1)
            150             0.500
            150             0.500
            300             0.500
            300             0.500
            300             0.500
            300             0.500
            300             0.500
        SoilOrganicMatter: RootCn=30; RootWt=1500; SoilCn=12.5; EnrACoeff=7.4; EnrBCoeff=0.2
          Layer:
            Thickness (mm)  OC (Total %)  FBiom (0-1)  FInert (0-1)
            150             1.310         0.030        0.400
            150             1.240         0.020        0.600
            300             1.250         0.010        0.800
            300             1.100         0.010        0.900
            300             0.710         0.010        1
            300             0.340         0.010        1
            300             0.260         0.010        1
        Lab
          Layer:
            Thickness (mm)  PH (1:5 water)
            150             7.800
            150             8.100
            300             8
            300             8
            300             8.100
            300             8.100
            300             8.100
        Sample Initial nitrogen
          Layer:
            Thickness (mm)  NO3 (ppm)  NH4 (ppm)
            150             8.832      0.0500126
            150             8.832      0.0500126
            300             8.832      0.0500126
            300             8.832      0.0500126
            300             8.832      0.0500126
            300             8.832      0.0500126
            300             8.832      0.0500126
        InitWater Initial water
          PercentMethod: Percent=0.82; Distributed=Filled from top
      sorghum
      outputfile: events=My Variables Events
        variables
          variables: dd/mm/yyyy as date, DaysAfterSowing, sw_dep(), ll15_dep(), dul_dep(), WaterSD, Biomass, yield, lai, GrainNo, stage, biomass_wt, GrainGreenWt, RachisGreenWt, StemGreenWt, GrainSize, LeafSenescedWt, LeafGreenWt, TillerNoFertile
