folder Bilo Skip1: version=32
  shared
  shared
  shared
  shared
  shared
  shared
  shared
  shared
  shared
  shared
  shared
  shared
  shared
  shared
  shared
  shared
  shared
  shared
  shared
  shared
  shared
  shared
  shared
  shared
  shared
  shared
  shared
  shared
  shared
  shared
  simulation Bilo05Skip1DSHD
    clock
      start_date = 1/10/2005  # Select the start date of the simulation
      end_date = 28/2/2006  # Select the end date of the simulation
    summaryfile
    metfile met: filename=Bilo Skip1.met
    area paddock
      folder Manager folder
        manager Sow SkipRow on a fixed date
          # Sowing criteria
          date = 5/10/2005  # Enter sowing date (d/m/yyyy)
          # Sowing parameters
          crop = Sorghum  # Enter name of crop to sow
          density = 5  # Enter sowing density (plants/m2)
          depth = 30  # Enter sowing depth (mm)
          cultivar = Buster  # Enter cultivar
          row_spacing = 1  # Enter row spacing (m)
          RowConfiguration = double  # Enter skip row configuration
          ftn = 0  # Enter Fertile Tiller No.
          on start_of_day:
```
     if (biomass > 0) then
         harvIndx = yield / biomass
      else
         harvIndx = 0
      endif


      if (day > 152) then
        current_season = year
      else
        current_season = year -1
      endif

            if (paddock_is_fallow() = 1 and today = date('[date]')) then
              season = current_season
              SowDay = day
               SowYear = year
              [crop] sow population =[density], sowing_depth = [depth], cultivar = [cultivar], row_spacing = [row_spacing], skip = [RowConfiguration], tiller_no_fertile = [ftn] ()
            endif
            if (paddock_is_fallow() = 0) then
               outputfile do_output
            endif
```
        manager Harvesting rule
          # Harvesting criteria
          crop = Sorghum  # Enter name of crop to harvest when ripe
          on end_of_day:
```
           if [crop].StageName = 'harvest_ripe' or [crop].plant_status = 'dead' then
              [crop]  harvest
              [crop]  end_crop
           endif
```
      soil Bilo Skip1 (avg): LocalName=Biloela; Site=Biloela; Region=Central Queensland
        SoilType = BiloSkip1(avg)  # Soil description
        NearestTown = Unknown
        NaturalVegetation = Unknown
        Water
          Layer:
            Thickness (mm)  BD (g/cc)  AirDry (mm/mm)  LL15 (mm/mm)  DUL (mm/mm)  SAT (mm/mm)
            150             1.230      0.140           0.240         0.340        0.360
            150             1.440      0.200           0.240         0.350        0.370
            300             1.430      0.250           0.270         0.390        0.410
            300             1.520      0.250           0.270         0.370        0.390
            300             1.670      0.200           0.220         0.290        0.310
            300             1.510      0.190           0.210         0.300        0.320
            300             1.580      0.190           0.210         0.260        0.280
          SoilCrop Sorghum
            Layer:
              Thickness (mm)  LL (mm/mm)  KL (/day)  XF (0-1)
              150             0.240       0.080      1
              150             0.240       0.080      1
              300             0.270       0.080      1
              300             0.270       0.080      1
              300             0.220       0.060      1
              300             0.210       0.040      1
              300             0.210       0.020      1
        SoilWat: SummerCona=3.5; SummerU=6; SummerDate=1-Nov; WinterCona=3.5; WinterU=6; WinterDate=1-Apr; DiffusConst=88; DiffusSlope=35.4; Salb=0.13; Cn2Bare=91; CnRed=20; CnCov=0.8
          Layer:
            Thickness (mm)  SWCON (0-1)
            150             0.500
            150             0.500
            300             0.500
            300             0.500
            300             0.500
            300             0.500
            300             0.500
        SoilOrganicMatter: RootCn=30; RootWt=1500; SoilCn=12.5; EnrACoeff=7.4; EnrBCoeff=0.2
          Layer:
            Thickness (mm)  OC (Total %)  FBiom (0-1)  FInert (0-1)
            150             1.630         0.030        0.400
            150             1.250         0.020        0.600
            300             1             0.010        0.800
            300             0.700         0.010        0.900
            300             0.700         0.010        1
            300             0.300         0.010        1
            300             0.300         0.010        1
        Analysis
          Layer:
            Thickness (mm)  PH (1:5 water)
            150             6.750
            150             6.900
            300             7.050
            300             7.500
            300             7.900
            300             7.800
            300             7.750
        Sample Initial nitrogen
          Layer:
            Thickness (mm)  NO3 (ppm)  NH4 (ppm)
            150             13.55      0.1
            150             14.815     0.1
            300             5.12802    0.1
            300             4.82502    0.1
            300             4.19201    0.1
            300             3.97401    0.1
            300             3.16501    0.1
        Sample Initial water
          Layer:
            Thickness (mm)  SW (mm/mm)
            150             0.271
            150             0.368
            300             0.353
            300             0.294
            300             0.273
            300             0.232
            300             0.230
      manager Logic
        on end_of_day:
```
  if (sw_demand > 0) then
     sdr = sw_supply / sw_demand
     if (sdr > 1) then
        sdr = 1
     endif
  else
     sdr = 1
  endif
```
      sorghum
      outputfile: filename=Bilo05Skip1DSHD.out; title=Bilo05Skip1DSHD
        variables
          variable:
            dd/mm/yyyy as date  # Date (dd/mm/yyyy)
            DaysAfterSowing  # Days after sowing
            sw_dep()
            ll15_dep()
            dul_dep()
            WaterSD
            Biomass  # Total above-ground biomass
            yield
            lai
            GrainNo
            stage
            biomass_wt  # Total above-ground biomass
            GrainGreenWt  # Live grain dry weight
            RachisGreenWt  # Live rachis dry weight
            StemGreenWt  # Stem dry weight
            GrainSize  # 1000 grain weight
            LeafSenescedWt  # Senesced leaf dry weight
            LeafGreenWt  # Live leaf dry weight
            TillerNoFertile  # No of tillers that produce a head
  simulation Bilo05Skip1DSLD -> /Bilo Skip1/Bilo05Skip1DSHD
    area paddock -> /Bilo Skip1/Bilo05Skip1DSHD/paddock
      folder Manager folder -> /Bilo Skip1/Bilo05Skip1DSHD/paddock/Manager folder
        manager Sow SkipRow on a fixed date
          # Sowing criteria
          date = 5/10/2005  # Enter sowing date (d/m/yyyy)
          # Sowing parameters
          crop = Sorghum  # Enter name of crop to sow
          density = 2.5  # Enter sowing density (plants/m2)
          depth = 30  # Enter sowing depth (mm)
          cultivar = Buster  # Enter cultivar
          row_spacing = 1  # Enter row spacing (m)
          RowConfiguration = double  # Enter skip row configuration
          ftn = 1.2  # Enter Fertile Tiller No.
          on start_of_day:
          script: same as in Bilo05Skip1DSHD.paddock.Manager folder.Sow SkipRow on a fixed date
      outputfile -> /Bilo Skip1/Bilo05Skip1DSHD/paddock/Outputfile: filename=Bilo05Skip1DSLD.out; title=Bilo05Skip1DSLD
        variables -> /Bilo Skip1/Bilo05Skip1DSHD/paddock/Outputfile/Variables
  simulation Bilo05Skip1SHD -> /Bilo Skip1/Bilo05Skip1DSHD
    area paddock -> /Bilo Skip1/Bilo05Skip1DSHD/paddock
      folder Manager folder -> /Bilo Skip1/Bilo05Skip1DSHD/paddock/Manager folder
        manager Sow SkipRow on a fixed date
          # Sowing criteria
          date = 5/10/2005  # Enter sowing date (d/m/yyyy)
          # Sowing parameters
          crop = Sorghum  # Enter name of crop to sow
          density = 5  # Enter sowing density (plants/m2)
          depth = 30  # Enter sowing depth (mm)
          cultivar = Buster  # Enter cultivar
          row_spacing = 1  # Enter row spacing (m)
          RowConfiguration = solid  # Enter skip row configuration
          ftn = 1.5  # Enter Fertile Tiller No.
          on start_of_day:
          script: same as in Bilo05Skip1DSHD.paddock.Manager folder.Sow SkipRow on a fixed date
      soil Bilo Skip1 (avg) -> /Bilo Skip1/Bilo05Skip1DSHD/paddock/Bilo Skip1 (avg)
        Sample Initial water
          Layer:
            Thickness (mm)  SW (mm/mm)
            150             0.271
            150             0.368
            300             0.363
            300             0.354
            300             0.273
            300             0.262
            300             0.23
      outputfile -> /Bilo Skip1/Bilo05Skip1DSHD/paddock/Outputfile: filename=Bilo05Skip1SHD.out; title=Bilo05Skip1SHD
        variables -> /Bilo Skip1/Bilo05Skip1DSHD/paddock/Outputfile/Variables
