folder Biloela DGP 2008: version=32
  simulation Biloela_DGP_2008
    clock
      start_date = 1/01/2009  # Select the start date of the simulation
      end_date = 30/06/2009  # Select the end date of the simulation
    summaryfile
    metfile met: filename=Biloela DGP 2008.met
    area paddock
      folder Manager folder
        manager Sow SkipRow on a fixed date
          # Sowing criteria
          date = 30/01/2009  # Enter sowing date (d/m/yyyy)
          # Sowing parameters
          crop = Sorghum  # Enter name of crop to sow
          density = 6  # Enter sowing density (plants/m2)
          depth = 30  # Enter sowing depth (mm)
          cultivar = Buster  # Enter cultivar
          row_spacing = 1  # Enter row spacing (m)
          RowConfiguration = solid  # Enter skip row configuration
          ftn = 0.79  # Enter Fertile Tiller No.
          on start_of_day:
```
if (paddock_is_fallow() = 1 and today = date('[date]')) then
    if (day > 152) then
        season  = year
    else
        season  = year -1
    endif

    SowDay = day
    SowYear = year

   adjFtn = [ftn] *   1.0
   adjDensity = [density] * 1.0


   [crop] sow population = adjDensity, sowing_depth = [depth], cultivar = [cultivar], row_spacing = [row_spacing], skip = [RowConfiguration], tiller_no_fertile = adjFtn 
endif
if (paddock_is_fallow() = 0) then
       outputfile do_output
endif
```
        manager Harvesting rule
          # Harvesting criteria
          crop = Sorghum  # Enter name of crop to harvest when ripe
          on end_of_day:
```
           if [crop].StageName = 'harvest_ripe' or [crop].plant_status = 'dead' then
              [crop]  harvest
              [crop]  end_crop
           endif
```
      soil M2: LocalName=Biloela; Site=Biloela; Region=Central Queensland
        SoilType = Biloela  # Soil description
        NearestTown = Unknown
        NaturalVegetation = Unknown
        Water
          Layer:
            Thickness (mm)  BD (g/cc)  AirDry (mm/mm)  LL15 (mm/mm)  DUL (mm/mm)  SAT (mm/mm)
            150             1.27       0.05            0.14          0.39         0.44
            150             1.35       0.18            0.21          0.41         0.46
            300             1.39       0.19            0.21          0.4          0.45
            300             1.47       0.19            0.2           0.37         0.42
            300             1.49       0.18            0.19          0.36         0.41
            300             1.49       0.2             0.21          0.36         0.41
            300             1.48       0.15            0.16          0.36         0.41
          SoilCrop Sorghum
            Layer:
              Thickness (mm)  LL (mm/mm)  KL (/day)  XF (0-1)
              150             0.14        0.08       1
              150             0.21        0.08       1
              300             0.21        0.08       1
              300             0.2         0.08       1
              300             0.19        0.06       1
              300             0.21        0.04       1
              300             0.16        0.02       1
        SoilWat: SummerCona=3.5; SummerU=6; SummerDate=1-Nov; WinterCona=3.5; WinterU=6; WinterDate=1-Apr; DiffusConst=88; DiffusSlope=35.4; Salb=0.13; Cn2Bare=91; CnRed=20; CnCov=0.8
          Layer:
            Thickness (mm)  SWCON (0-1)
            150             0.5
            150             0.5
            300             0.5
            300             0.5
            300             0.5
            300             0.5
            300             0.5
        SoilOrganicMatter: RootCn=30; RootWt=1500; SoilCn=12.5; EnrACoeff=7.4; EnrBCoeff=0.2
          Layer:
            Thickness (mm)  OC (Total %)  FBiom (0-1)  FInert (0-1)
            150             2.57          0.04         0.4
            150             1.2           0.02         0.5
            300             0.6           0.02         0.5
            300             0.3           0.02         0.6
            300             0.2           0.01         0.6
            300             0.2           0.01         0.7
            300             0.2           0.01         0.8
        Analysis
          Layer:
            Thickness (mm)  PH (1:5 water)
            150             6.87
            150             7.45
            300             7.81
            300             8.31
            300             8.47
            300             8.37
            300             8.12
        Sample Initial nitrogen
          Layer:
            Thickness (mm)  NO3 (ppm)  NH4 (ppm)
            150             16.5       0.1
            150             9.5        0.1
            300             10.3       0.1
            300             6.2        0.1
            300             6.5        0.1
            300             8.5        0.1
            300             10         0.1
        Sample Initial water
          Layer:
            Thickness (mm)  SW (mm/mm)
            150             0.245
            150             0.3
            300             0.307
            300             0.299
            300             0.305
            300             0.312
            300             0.296
      irrigation
        automatic_irrigation = off  # switch
        asw_depth = 1800  # Depth to which ASW is calculated. (mm)
        crit_fr_asw = 1  # Fraction of ASW below which irrigation is applied (0-1.0)
        irrigation_efficiency = 1  # Efficiency of the irrigation. (0-1.0)
        default_no3_conc = 0  # Nitrate concentration (ppm N)
        default_nh4_conc = 0  # Ammonium concentration (ppm N)
        default_cl_conc = 0  # Chloride concentration (ppm Cl)
      fertiliser
      operations
      manager Calc
        on end_of_day:
```
   if (transp_eff > 1000) then
      te = 0
   else
      te = Transp_eff
   endif


   if (vpd > 1000) then
      vpDef = 0
   else
      vpDef = vpd
   endif
```
      outputfile: filename=Biloela_DGP_2008.out; title=Biloela_DGP_2008; events=My Variables Events
        variables
          variable:
            dd/mm/yyyy as date  # Date (dd/mm/yyyy)
            DaysAfterSowing  # Days after sowing
            sw_dep()
            ll15_dep()
            dul_dep()
            WaterSD
            Biomass  # Total above-ground biomass
            yield
            lai
            GrainNo
            stage
            biomass_wt  # Total above-ground biomass
            GrainGreenWt  # Live grain dry weight
            RachisGreenWt  # Live rachis dry weight
            StemGreenWt  # Stem dry weight
            GrainSize  # 1000 grain weight
            LeafSenescedWt  # Senesced leaf dry weight
            LeafGreenWt  # Live leaf dry weight
            TillerNoFertile
      sorghum
