folder Biloela: version=32
  shared
  shared
  shared
  simulation Biloela05
    clock
      start_date = 1/01/2006  # Select the start date of the simulation
      end_date = 31/05/2006  # Select the end date of the simulation
    summaryfile
    metfile met: filename=Biloela.met
    area paddock
      folder Manager folder
        manager Sow SkipRow on a fixed date
          # Sowing criteria
          date = 26/01/2006  # Enter sowing date (d/m/yyyy)
          # Sowing parameters
          crop = Sorghum  # Enter name of crop to sow
          density = 6.5  # Enter sowing density (plants/m2)
          depth = 30  # Enter sowing depth (mm)
          cultivar = Buster  # Enter cultivar
          row_spacing = 1  # Enter row spacing (m)
          RowConfiguration = solid  # Enter skip row configuration
          ftn = 0.7  # Enter Fertile Tiller No.
          on start_of_day:
```
     if (biomass > 0) then
         harvIndx = yield / biomass
      else
         harvIndx = 0
      endif


      if (day > 152) then
        current_season = year
      else
        current_season = year -1
      endif

            if (paddock_is_fallow() = 1 and today = date('[date]')) then
              season = current_season
              SowDay = day
               SowYear = year
ftn = 0

              [crop] sow population =[density], sowing_depth = [depth], cultivar = [cultivar], row_spacing = [row_spacing], skip = [RowConfiguration], tiller_no_fertile = [ftn] ()
            endif
            if (paddock_is_fallow() = 0) then
               outputfile do_output
            endif
```
        manager Harvesting rule
          # Harvesting criteria
          crop = Sorghum  # Enter name of crop to harvest when ripe
          on end_of_day:
```
           if [crop].StageName = 'harvest_ripe' or [crop].plant_status = 'dead' then
              [crop]  harvest
              [crop]  end_crop
           endif
```
      Soil Biloela (avg): Site=Banana; Region=Central Queensland
        Comment = oc and ph estimated  # Comments
        NearestTown = Banana, Q 4702
        DataSource = Data provided by D. Lack, Queensland Department of Primary Industries
        InitWater Initial water
          PercentMethod: Percent=1.00; Distributed=Filled from top
        Water
          Layer:
            Thickness (mm)  BD (g/cc)  AirDry (mm/mm)  LL15 (mm/mm)  DUL (mm/mm)  SAT (mm/mm)
            150             1.260      0.075           0.150         0.450        0.490
            150             1.290      0.207           0.230         0.440        0.480
            300             1.320      0.250           0.250         0.430        0.470
            300             1.330      0.250           0.250         0.430        0.470
            300             1.400      0.230           0.230         0.400        0.440
            300             1.570      0.270           0.270         0.340        0.380
            300             1.620      0.300           0.300         0.330        0.360
          SoilCrop Sorghum
            Layer:
              Thickness (mm)  LL (mm/mm)  KL (/day)  XF (0-1)
              150             0.150       0.100      1
              150             0.230       0.100      1
              300             0.250       0.100      1
              300             0.250       0.080      1
              300             0.230       0.060      1
              300             0.270       0.040      1
              300             0.300       0.020      1
        SoilWat: SummerCona=3.5; SummerU=6; SummerDate=1-Nov; WinterCona=3.5; WinterU=6; WinterDate=1-Apr; DiffusConst=40; DiffusSlope=16; Salb=0.13; CN2Bare=73; CNRed=20; CNCov=0.8
          Layer:
            Thickness (mm)  SWCON (0-1)
            150             0.300
            150             0.300
            300             0.300
            300             0.300
            300             0.300
            300             0.300
            300             0.300
        SoilOrganicMatter: RootCN=40; RootWT=200; SoilCN=12.5; EnrACoeff=7.4; EnrBCoeff=0.2
          Layer:
            Thickness (mm)  OC (Total %)  FBiom (0-1)  FInert (0-1)
            150             1.240         0.030        0.400
            150             1.240         0.020        0.600
            300             1.250         0.010        0.800
            300             1.100         0.010        0.900
            300             0.710         0.010        0.950
            300             0.340         0.010        0.950
            300             0.260         0.010        0.950
        Analysis
          Layer:
            Thickness (mm)  PH (1:5 water)
            150             7
            150             7
            300             7
            300             7
            300             7
            300             7
            300             7
        Sample Initial nitrogen
          Layer:
            Thickness (mm)  NO3 (ppm)  NH4 (ppm)
            150             30.198     0.600
            150             9.756      0.100
            300             9.756      0.100
            300             7.898      0.100
            300             7.898      0.100
            300             7.898      0.100
            300             7.898      0.100
      manager Logic
        on end_of_day:
```
  if (sw_demand > 0) then
     sdr = sw_supply / sw_demand
     if (sdr > 1) then
        sdr = 1
     endif
  else
     sdr = 1
  endif
```
      outputfile: filename=Biloela05.out; title=Biloela05
        variables
          variable:
            dd/mm/yyyy as date  # Date (dd/mm/yyyy)
            DaysAfterSowing  # Days after sowing
            sw_dep()
            ll15_dep()
            dul_dep()
            WaterSD
            Biomass  # Total above-ground biomass
            yield
            lai
            GrainNo
            stage
            biomass_wt  # Total above-ground biomass
            GrainGreenWt  # Live grain dry weight
            RachisGreenWt  # Live rachis dry weight
            StemGreenWt  # Stem dry weight
            GrainSize  # 1000 grain weight
            LeafSenescedWt  # Senesced leaf dry weight
            LeafGreenWt  # Live leaf dry weight
            TillerNoFertile  # No of tillers that produce a head
      sorghum
