folder Biloela DGP: version=32
  simulation Biloela06DGP
    clock
      start_date = 1/01/2007  # Select the start date of the simulation
      end_date = 30/05/2007  # Select the end date of the simulation
    summaryfile
    metfile met: filename=Biloela DGP.met
    area paddock
      outputfile: filename=Biloela06DGP.out; title=Biloela06DGP; events=My Variables Events
        variables
          variable:
            dd/mm/yyyy as date  # Date (dd/mm/yyyy)
            DaysAfterSowing  # Days after sowing
            sw_dep()
            ll15_dep()
            dul_dep()
            WaterSD
            Biomass  # Total above-ground biomass
            yield
            lai
            GrainNo
            stage
            biomass_wt  # Total above-ground biomass
            GrainGreenWt  # Live grain dry weight
            RachisGreenWt  # Live rachis dry weight
            StemGreenWt  # Stem dry weight
            GrainSize  # 1000 grain weight
            LeafSenescedWt  # Senesced leaf dry weight
            LeafGreenWt  # Live leaf dry weight
            TillerNoFertile
      folder Manager folder
        manager Sow SkipRow on a fixed date
          # Sowing criteria
          date = 17/01/2007  # Enter sowing date (d/m/yyyy)
          # Sowing parameters
          crop = Sorghum  # Enter name of crop to sow
          density = 5.7  # Enter sowing density (plants/m2)
          depth = 30  # Enter sowing depth (mm)
          cultivar = Buster  # Enter cultivar
          row_spacing = 1  # Enter row spacing (m)
          RowConfiguration = solid  # Enter skip row configuration
          ftn = 0.9  # Enter Fertile Tiller No.
          on start_of_day:
```
            if (paddock_is_fallow() = 1 and today = date('[date]')) then
              [crop] sow population =[density], sowing_depth = [depth], cultivar = [cultivar], row_spacing = [row_spacing], skip = [RowConfiguration], tiller_no_fertile = [ftn] ()
            endif
            if (paddock_is_fallow() = 0) then
               outputfile do_output
            endif
```
        manager Harvesting rule
          # Harvesting criteria
          crop = Sorghum  # Enter name of crop to harvest when ripe
          on end_of_day:
```
           if [crop].StageName = 'harvest_ripe' or [crop].plant_status = 'dead' then
              [crop]  harvest
              [crop]  end_crop
           endif
```
      manager Calculator
        on init:
```
 head_wt = 0
RootGreenN = 0
head_n = 0
LeafGreenN = 0
sd = 0
```
        on end_of_day:
```
 
head_wt = GreenWt4)
RootGreenN = GreenN1)
head_n = GreenN4)
LeafGreenN = GreenN2)

if (sw_demand > 0) then
   sd = sw_supply / sw_demand
else
   sd = 1
endif

if (sd > 1) then
   sd = 1
endif
```
      sorghum
      soil Biloela: LocalName=Biloela; Site=Biloela; Region=Central Queensland
        SoilType = Biloela  # Soil description
        NearestTown = Unknown
        NaturalVegetation = Unknown
        InitWater Initial water
          PercentMethod: Percent=0.60; Distributed=Filled from top
        Water
          Layer:
            Thickness (mm)  BD (g/cc)  AirDry (mm/mm)  LL15 (mm/mm)  DUL (mm/mm)  SAT (mm/mm)
            150             1.270      0.120           0.140         0.390        0.440
            150             1.350      0.200           0.210         0.410        0.460
            300             1.390      0.200           0.210         0.400        0.450
            300             1.470      0.190           0.200         0.370        0.420
            300             1.490      0.180           0.190         0.360        0.410
            300             1.490      0.210           0.210         0.360        0.410
            300             1.480      0.160           0.160         0.360        0.410
          SoilCrop Sorghum
            Layer:
              Thickness (mm)  LL (mm/mm)  KL (/day)  XF (0-1)
              150             0.140       0.080      1
              150             0.210       0.080      1
              300             0.210       0.060      1
              300             0.200       0.040      1
              300             0.190       0.040      1
              300             0.210       0.040      1
              300             0.160       0.040      1
        SoilWat: SummerCona=3.5; SummerU=6; SummerDate=1-Nov; WinterCona=3.5; WinterU=6; WinterDate=1-Apr; DiffusConst=88; DiffusSlope=35.4; Salb=0.13; Cn2Bare=91; CnRed=20; CnCov=0.8
          Layer:
            Thickness (mm)  SWCON (0-1)
            150             0.500
            150             0.500
            300             0.500
            300             0.500
            300             0.500
            300             0.500
            300             0.500
        SoilOrganicMatter: RootCn=30; RootWt=1500; SoilCn=12.5; EnrACoeff=7.4; EnrBCoeff=0.2
          Layer:
            Thickness (mm)  OC (Total %)  FBiom (0-1)  FInert (0-1)
            150             1.240         0.030        0.400
            150             1.240         0.020        0.600
            300             1.250         0.010        0.800
            300             1.100         0.010        0.900
            300             0.710         0.010        0.950
            300             0.340         0.010        0.950
            300             0.260         0.010        0.950
        Analysis
          Layer:
            Thickness (mm)  PH (1:5 water)
            150             7
            150             7
            300             7
            300             7
            300             7
            300             7
            300             7
        Sample Initial nitrogen
          Layer:
            Thickness (mm)  NO3 (ppm)  NH4 (ppm)
            150             16.999     0.600
            150             11.977     0.100
            300             7.376      0.100
            300             6.235      0.100
            300             6.622      0.100
            300             6.174      0.100
            300             6.880      0.100
