folder Breeders: version=19
  simulation DysartDGP06
    clock
      start_date = 1/02/2007  # Select the start date of the simulation
      end_date = 31/07/2007  # Select the end date of the simulation
    summaryfile: filename=Buster.sum
    metfile met: filename=Dysart DGP.met
    area paddock
      outputfile
        variables
          variables: dd/mm/yyyy as date, DaysAfterSowing, sw_dep(), ll15_dep(), dul_dep(), WaterSD, Biomass, yield, lai, GrainNo, stage, biomass_wt, GrainGreenWt, RachisGreenWt, StemGreenWt, GrainSize, LeafSenescedWt, LeafGreenWt, TillerNoFertile
      folder Manager folder
        manager Sow SkipRow on a fixed date
          category =  # Sowing criteria
          date = 25/02/2007  # Enter sowing date (d/m/yyyy)
          category =  # Sowing parameters
          crop = Sorghum  # Enter name of crop to sow
          density = 4.4  # Enter sowing density (plants/m2)
          depth = 30  # Enter sowing depth (mm)
          cultivar = Buster  # Enter cultivar
          row_spacing = 1  # Enter row spacing (m)
          RowConfiguration = solid  # Enter skip row configuration
          ftn = 0.08  # Enter Fertile Tiller No.
          TillerFactor = 1  # Enter Tiller Factor
          DensityFactor = 1  # Enter Density Factor
          on start_of_day:
```
if (paddock_is_fallow() = 0) then
   outputfile do_output
endif
if (paddock_is_fallow() = 1 and today = date('[date]')) then
     season = current_season
     SowDay = day
     SowYear = year

     adjFtn = [ftn] * [TillerFactor]
     adjDensity = [density] * [DensityFactor]

     [crop] sow plants =adjDensity , sowing_depth = [depth], cultivar = [cultivar], row_spacing = [row_spacing], skip = [RowConfiguration], tiller_no_fertile = adjFtn  ()
endif
```
        manager Harvesting rule
          crop = Sorghum  # Enter name of crop to harvest when ripe
          on end_of_day:
```
           if [crop].StageName = 'harvest_ripe' or [crop].plant_status = 'dead' then
              [crop]  harvest
              [crop]  end_crop
           endif
```
      soil Dysart: Site=Dysart; Region=Central Queensland; LocalName=Dysart; SoilType=Dysart; NearestTown=Unknown; NaturalVegetation=Unknown; Cona=3.5; DiffusConst=88; DiffusSlope=35.4; U=6; Salb=0.13; Cn2Bare=91; CnRed=20; CnCov=0.8; CnCanopyFact=0.8; RootCn=30; RootWt=1500; SoilCn=12.5; EnrACoeff=7.4; EnrBCoeff=0.2
        profile
          layer:
            thickness  bd     ll15   airdry  dul    sat    sw     swcon  fbiom  finert  oc     ph     ll Sorghum  kl Sorghum  xf Sorghum
            150        1.340  0.220  0.160   0.420  0.470  0.374  0.500  0.030  0.400   1.310  7.800  0.220       0.080       1
            150        1.380  0.220  0.200   0.400  0.450  0.415  0.500  0.020  0.600   1.240  8.100  0.220       0.080       1
            300        1.380  0.240  0.230   0.400  0.450  0.435  0.500  0.010  0.800   1.250  8      0.240       0.060       1
            300        1.340  0.280  0.270   0.410  0.460  5.686  0.500  0.010  0.900   1.100  8      0.280       0.040       1
            300        1.350  0.300  0.290   0.410  0.460  5.207  0.500  0.010  1       0.710  8.100  0.300       0.040       1
            300        1.480  0.290  0.290   0.360  0.410  0.382  0.500  0.010  1       0.340  8.100  0.290       0.040       1
            300        1.710  0.260  0.260   0.270  0.320  0.424  0.500  0.010  1       0.260  8.100  0.260       0.040       1
        InitWater
          PercentMethod: Percent=0.60; Distributed=Filled from top
        InitNitrogen
          profile
            layer:
              no3    nh4    thickness
              6.500  0.600  150
              2.100  0.100  150
              2.100  0.100  300
              1.700  0.100  300
              1.700  0.100  300
              1.700  0.100  300
              1.700  0.100  300
      sorghum
