folder Simulations: version=32
  simulation LiverpoolPlains2007
    metfile met: filename=Liverpool Plains 2007.met
    clock
      start_date = 1/11/2007  # Select the start date of the simulation
      end_date = 6/05/2008  # Select the end date of the simulation
    summaryfile
    area paddock
      folder Manager folder
        manager Sow on a fixed date
          # Sowing criteria
          date = 14/11/2007  # Enter sowing date (d/m/yyyy)
          # Sowing parameters
          crop = Sorghum  # Enter name of crop to sow
          density = 7.3  # Enter sowing density (plants/m2)
          depth = 30  # Enter sowing depth (mm)
          cultivar = Buster  # Enter cultivar
          row_spacing = 0.75  # Enter row spacing (mm)
          RowConfiguration = solid  # Enter skip row configuration
          ftn = 1.4  # Enter Fertile Tiller Number
          on start_of_day:
```
if (today = date('[date]') then
    if (day > 152) then
        season  = year
    else
        season  = year -1
    endif

    SowDay = day
     SowYear = year
    [crop] sow population =[density], sowing_depth = [depth], cultivar = [cultivar], row_spacing = [row_spacing], skip = [RowConfiguration], tiller_no_fertile = [ftn]
endif
```
        manager Harvesting rule
          # Harvesting criteria
          crop = sorghum  # Enter name of crop to harvest when ripe
          on end_of_day:
```
           if [crop].StageName = 'harvest_ripe' or [crop].plant_status = 'dead' then
              [crop]  harvest
              [crop]  end_crop
           endif
```
      fertiliser
      surfaceom surface organic matter
        PoolName = wheat  # Organic Matter pool name
        type = wheat  # Organic Matter type
        mass = 1000  # Initial surface residue (kg/ha)
        cnr = 80  # C:N ratio of initial residue
        standing_fraction = 0  # Fraction of residue standing
      soil Windy Station: LocalName=Pine Ridge; Site=Pine Ridge; Region=Northern NSW
        SoilType = LiverpoolPlains  # Soil description
        NearestTown = Unknown
        NaturalVegetation = Unknown
        InitWater Initial water
          PercentMethod: Percent=1.00; Distributed=Filled from top
        Water
          Layer:
            Thickness (mm)  BD (g/cc)  AirDry (mm/mm)  LL15 (mm/mm)  DUL (mm/mm)  SAT (mm/mm)
            150             1.06       0.34            0.39          0.52         0.57
            150             1.09       0.36            0.39          0.51         0.56
            300             1.12       0.38            0.39          0.5          0.55
            300             1.13       0.38            0.38          0.5          0.55
            300             1.13       0.4             0.4           0.49         0.54
            300             1.15       0.39            0.4           0.49         0.54
            300             1.17       0.39            0.4           0.48         0.53
            300             1.18       0.4             0.41          0.47         0.52
          SoilCrop Sorghum
            Layer:
              Thickness (mm)  LL (mm/mm)  KL (/day)  XF (0-1)
              150             0.39        0.07       1
              150             0.39        0.06       1
              300             0.39        0.06       1
              300             0.38        0.06       1
              300             0.4         0.05       1
              300             0.4         0.05       1
              300             0.4         0.04       1
              300             0.41        0.04       1
        SoilWat: SummerCona=3.5; SummerU=6; SummerDate=1-Nov; WinterCona=3.5; WinterU=6; WinterDate=1-Apr; DiffusConst=88; DiffusSlope=35.4; Salb=0.13; Cn2Bare=91; CnRed=20; CnCov=0.8
          Layer:
            Thickness (mm)  SWCON (0-1)
            150             0.5
            150             0.5
            300             0.5
            300             0.5
            300             0.5
            300             0.5
            300             0.5
            300             0.5
        SoilOrganicMatter: RootCn=30; RootWt=1500; SoilCn=12.5; EnrACoeff=7.4; EnrBCoeff=0.2
          Layer:
            Thickness (mm)  OC (Total %)  FBiom (0-1)  FInert (0-1)
            150             1.38          0.04         0.4
            150             0.69          0.02         0.6
            300             0.34          0.02         0.8
            300             0.17          0.02         1
            300             0.17          0.01         1
            300             0.17          0.01         1
            300             0.17          0.01         1
            300             0.17          0.01         1
        Analysis
          Layer:
            Thickness (mm)  PH (1:5 water)
            150             6.6
            150             7.6
            300             8.2
            300             8.5
            300             8.7
            300             8.8
            300             8.7
            300             8.7
        Sample Initial nitrogen
          Layer:
            Thickness (mm)  NO3 (ppm)  NH4 (ppm)
            150             22.83      0.100021
            150             22.83      0.100021
            300             21.08      0.100021
            300             19.36      0.100021
            300             14.31      0.100021
            300             9.02999    0.100021
            300             3.58       0.100021
            300             3.58       0.100021
      manager Calculator
        on end_of_day:
```
if (paddock_is_fallow() = 0) then
   outputfile do_output
endif
```
      sorghum
      outputfile: filename=LiverpoolPlains2007.out; title=LiverpoolPlains2007; events=My Variables Events
        variables
          variable:
            dd/mm/yyyy as date  # Date (dd/mm/yyyy)
            DaysAfterSowing  # Days after sowing
            sw_dep()
            ll15_dep()
            dul_dep()
            WaterSD
            Biomass  # Total above-ground biomass
            yield
            lai
            GrainNo
            stage
            biomass_wt  # Total above-ground biomass
            GrainGreenWt  # Live grain dry weight
            RachisGreenWt  # Live rachis dry weight
            StemGreenWt  # Stem dry weight
            GrainSize  # 1000 grain weight
            LeafSenescedWt  # Senesced leaf dry weight
            LeafGreenWt  # Live leaf dry weight
            no3()
            esw
            rain
            TillerNoFertile
      irrigation
        automatic_irrigation = on
        asw_depth = 600  # Depth to which ASW is calculated. (mm)
        crit_fr_asw = 0.5  # Fraction of ASW below which irrigation is applied (0-1.0)
        irrigation_efficiency = 1  # Efficiency of the irrigation. (0-1.0)
        irrigation_allocation = off  # Allocation limits
        allocation = 0  # Allocation in mm
        default_no3_conc = 0  # Nitrate concentration (ppm N)
        default_nh4_conc = 0  # Ammonium concentration (ppm N)
        default_cl_conc = 0  # Chloride concentration (ppm Cl)
