folder Moree: version=32
  shared
  shared
  shared
  shared
  simulation Moree05
    clock
      start_date = 1/12/2005  # Select the start date of the simulation
      end_date = 30/04/2006  # Select the end date of the simulation
    summaryfile
    metfile met: filename=Moree.met
    area paddock
      outputfile: filename=Moree05.out; title=Moree05; events=My Variables Events
        variables
          variable:
            dd/mm/yyyy as date  # Date (dd/mm/yyyy)
            DaysAfterSowing  # Days after sowing
            sw_dep()
            ll15_dep()
            dul_dep()
            WaterSD
            Biomass  # Total above-ground biomass
            yield
            lai
            GrainNo
            stage
            biomass_wt  # Total above-ground biomass
            GrainGreenWt  # Live grain dry weight
            RachisGreenWt  # Live rachis dry weight
            StemGreenWt  # Stem dry weight
            GrainSize  # 1000 grain weight
            LeafSenescedWt  # Senesced leaf dry weight
            LeafGreenWt  # Live leaf dry weight
            TillerNoFertile
      folder Manager folder
        manager Sow SkipRow on a fixed date
          # Sowing criteria
          date = 7/12/2005  # Enter sowing date (d/m/yyyy)
          # Sowing parameters
          crop = Sorghum  # Enter name of crop to sow
          density = 14  # Enter sowing density (plants/m2)
          depth = 30  # Enter sowing depth (mm)
          cultivar = Buster  # Enter cultivar
          row_spacing = 0.75  # Enter row spacing (m)
          RowConfiguration = solid  # Enter skip row configuration
          ftn = 0.4  # Enter Fertile Tiller No.
          on start_of_day:
```
    if (biomass > 0) then
         harvIndx = yield / biomass
      else
         harvIndx = 0
      endif


      if (day > 152) then
        current_season = year
      else
        current_season = year -1
      endif

            if (paddock_is_fallow() = 1 and today = date('[date]')) then
              season = current_season
              SowDay = day
               SowYear = year
ftn = 0

              [crop] sow population =[density], sowing_depth = [depth], cultivar = [cultivar], row_spacing = [row_spacing], skip = [RowConfiguration], tiller_no_fertile = [ftn] ()
            endif
            if (paddock_is_fallow() = 0) then
               outputfile do_output
         
            endif
```
        manager Harvesting rule
          # Harvesting criteria
          crop = Sorghum  # Enter name of crop to harvest when ripe
          on end_of_day:
```
           if [crop].StageName = 'harvest_ripe' or [crop].plant_status = 'dead' then
              [crop]  harvest
              [crop]  end_crop
           endif
```
      Soil Moree (avg): Site=Croppa Creek; Region=New South Wales
        Comment = oc and ph estimated  # Comments
        SoilType = Grey Vertosol  # Soil description
        NearestTown = Croppa Creek, NSW 2411
        NaturalVegetation = Brigalow
        InitWater Initial water
          PercentMethod: Percent=1.00; Distributed=Filled from top
        Water
          Layer:
            Thickness (mm)  BD (g/cc)  AirDry (mm/mm)  LL15 (mm/mm)  DUL (mm/mm)  SAT (mm/mm)
            150             1.300      0.165           0.260         0.430        0.480
            150             1.270      0.216           0.240         0.440        0.490
            300             1.290      0.240           0.240         0.430        0.480
            300             1.270      0.250           0.250         0.440        0.490
            300             1.280      0.270           0.270         0.440        0.490
            300             1.240      0.290           0.290         0.450        0.500
            300             1.250      0.300           0.300         0.450        0.500
          SoilCrop Sorghum
            Layer:
              Thickness (mm)  LL (mm/mm)  KL (/day)  XF (0-1)
              150             0.260       0.080      1.000
              150             0.240       0.080      1.000
              300             0.240       0.080      1.000
              300             0.250       0.080      1.000
              300             0.270       0.060      1.000
              300             0.290       0.040      1.000
              300             0.300       0.020      1.000
          SoilCrop wheat
            Layer:
              Thickness (mm)  LL (mm/mm)  KL (/day)  XF (0-1)
              150             0.340       0.100      1
              150             0.240       0.100      1
              300             0.240       0.080      1
              300             0.250       0.060      1
              300             0.270       0.040      1
              300             0.290       0.020      1
              300             0.300       0.010      1
          SoilCrop Chickpea
            Layer:
              Thickness (mm)  LL (mm/mm)  KL (/day)  XF (0-1)
              150             0.420       0.100      1
              150             0.240       0.100      1
              300             0.240       0.080      1
              300             0.280       0.060      1
              300             0.300       0.040      1
              300             0.340       0.020      1
              300             0.380       0.010      1
          SoilCrop Fababean
            Layer:
              Thickness (mm)  LL (mm/mm)  KL (/day)  XF (0-1)
              150             0.430       0.100      1
              150             0.240       0.100      1
              300             0.240       0.080      1
              300             0.290       0.060      1
              300             0.300       0.040      1
              300             0.340       0.020      1
              300             0.380       0.010      1
          SoilCrop Cotton
            Layer:
              Thickness (mm)  LL (mm/mm)  KL (/day)  XF (0-1)
              150             0.330       0.100      1
              150             0.240       0.100      1
              300             0.240       0.100      1
              300             0.250       0.100      1
              300             0.270       0.090      1
              300             0.290       0.070      1
              300             0.300       0.050      1
        SoilWat: SummerCona=3.5; SummerU=6; SummerDate=1-Nov; WinterCona=3.5; WinterU=6; WinterDate=1-Apr; DiffusConst=40; DiffusSlope=16; Salb=0.13; CN2Bare=73; CNRed=20; CNCov=0.8
          Layer:
            Thickness (mm)  SWCON (0-1)
            150             0.300
            150             0.300
            300             0.300
            300             0.300
            300             0.300
            300             0.300
            300             0.300
        SoilOrganicMatter: RootCN=40; RootWT=200; SoilCN=12.5; EnrACoeff=7.4; EnrBCoeff=0.2
          Layer:
            Thickness (mm)  OC (Total %)  FBiom (0-1)  FInert (0-1)
            150             1.200         0.020        0.600
            150             1.200         0.010        0.800
            300             1.200         0.010        0.900
            300             1.100         0.010        0.950
            300             0.700         0.010        0.950
            300             0.300         0.010        0.950
            300             0.300         0.030        0.400
        Analysis
          Layer:
            Thickness (mm)  PH (1:5 water)
            150             7
            150             7
            300             7
            300             7
            300             7
            300             7
            300             7
        Sample Initial nitrogen
          Layer:
            Thickness (mm)  NO3 (ppm)  NH4 (ppm)
            150             19.888     0.100012
            150             20.357     0.100012
            300             10.855     0.100012
            300             11.027     0.100012
            300             7.57499    0.100012
            300             8.68699    0.100012
            300             10.503     0.600072
      manager Logic
        on end_of_day:
```
  if (sw_demand > 0) then
     sdr = sw_supply / sw_demand
     if (sdr > 1) then
        sdr = 1
     endif
  else
     sdr = 1
  endif
```
      sorghum
      fertiliser
