folder Simulations: version=32
  simulation Sorghum_Dalby 2007_Buster
    metfile met: filename=Dalby 2007.met
    clock
      start_date = 1/09/2007  # Select the start date of the simulation
      end_date = 9/03/2008  # Select the end date of the simulation
    summaryfile
    area paddock
      folder Manager folder
        manager Sow on a fixed date
          # Sowing criteria
          date = 21/09/2007  # Enter sowing date (d/m/yyyy)
          # Sowing parameters
          crop = Sorghum  # Enter name of crop to sow
          density = 5.2  # Enter sowing density (plants/m2)
          depth = 30  # Enter sowing depth (mm)
          cultivar = Buster  # Enter cultivar
          row_spacing = 1  # Enter row spacing (mm)
          RowConfiguration = solid  # Enter skip row configuration
          ftn = 1.5  # Enter Fertile Tiller Number
          on start_of_day:
```
if (today = date('[date]') then
    if (day > 152) then
        season  = year
    else
        season  = year -1
    endif

    SowDay = day
     SowYear = year
    [crop] sow population =[density], sowing_depth = [depth], cultivar = [cultivar], row_spacing = [row_spacing], skip = [RowConfiguration], tiller_no_fertile = [ftn]
endif
```
        manager Harvesting rule
          # Harvesting criteria
          crop = sorghum  # Enter name of crop to harvest when ripe
          on end_of_day:
```
           if [crop].StageName = 'harvest_ripe' or [crop].plant_status = 'dead' then
              [crop]  harvest
              [crop]  end_crop
           endif
```
        outputfile output: filename=Sorghum_Dalby 2007_Buster output.out; title=Sorghum_Dalby 2007_Buster output; events=Reporting Frequency
          variables
            variables: dd/mm/yyyy as Date, season, SowYear, SowDay, DaysAfterSowing as Das, Stage, TillerNoFertile as ftn, LeafNo, Biomass, Yield, LAI, GrainNo, GrainSize, esw, sw(), mint, maxt, rain, sw_dep(), ll15_dep(), dul_dep(), WaterSD, GrainGreenN, biomass_wt, GrainGreenWt, LeafGreenWt, StemGreenWt, WaterSD
      fertiliser
      surfaceom surface organic matter
        PoolName = wheat  # Organic Matter pool name
        type = wheat  # Organic Matter type
        mass = 1000  # Initial surface residue (kg/ha)
        cnr = 80  # C:N ratio of initial residue
        standing_fraction = 0  # Fraction of residue standing
      soil Dalby: LocalName=Dalby; Site=Dalby; Region=Darling Downs
        SoilType = Dalby  # Soil description
        NearestTown = Unknown
        NaturalVegetation = Unknown
        Water
          Layer:
            Thickness (mm)  BD (g/cc)  AirDry (mm/mm)  LL15 (mm/mm)  DUL (mm/mm)  SAT (mm/mm)
            150             0.98       0.27            0.32          0.55         0.6
            150             0.99       0.29            0.32          0.55         0.6
            300             1.02       0.32            0.33          0.53         0.58
            300             1.07       0.33            0.33          0.52         0.57
            300             1.08       0.33            0.33          0.51         0.56
            300             1.11       0.37            0.37          0.5          0.55
            300             1.12       0.38            0.38          0.5          0.55
          SoilCrop Sorghum
            Layer:
              Thickness (mm)  LL (mm/mm)  KL (/day)  XF (0-1)
              150             0.32        0.07       1
              150             0.32        0.06       1
              300             0.33        0.06       1
              300             0.33        0.06       1
              300             0.33        0.05       1
              300             0.37        0.05       1
              300             0.38        0.04       1
        SoilWat: SummerCona=3.5; SummerU=6; SummerDate=1-Nov; WinterCona=3.5; WinterU=6; WinterDate=1-Apr; DiffusConst=88; DiffusSlope=35.4; Salb=0.13; Cn2Bare=91; CnRed=20; CnCov=0.8
          Layer:
            Thickness (mm)  SWCON (0-1)
            150             0.5
            150             0.5
            300             0.5
            300             0.5
            300             0.5
            300             0.5
            300             0.5
        SoilOrganicMatter: RootCn=30; RootWt=1500; SoilCn=12.5; EnrACoeff=7.4; EnrBCoeff=0.2
          Layer:
            Thickness (mm)  OC (Total %)  FBiom (0-1)  FInert (0-1)
            150             1.93          0.04         0.4
            150             0.96          0.02         0.6
            300             0.48          0.02         0.8
            300             0.24          0.02         1
            300             0.12          0.01         1
            300             0.12          0.01         1
            300             0.12          0.01         1
        Analysis
          Layer:
            Thickness (mm)  PH (1:5 water)
            150             7.9
            150             8.5
            300             8.8
            300             9.1
            300             9.1
            300             9
            300             9
        Sample Initial nitrogen
          Layer:
            Thickness (mm)  NO3 (ppm)  NH4 (ppm)
            150             33.551     0.1
            150             32.16      0.1
            300             24.1399    0.1
            300             10.0502    0.1
            300             3.14       0.1
            300             2.4        0.1
            300             2.03       0.1
        Sample Initial water
          Layer:
            Thickness (mm)  SW (mm/mm)
            150             0.436
            150             0.501
            300             0.444
            300             0.374
            300             0.392
            300             0.423
            300             0.452
      manager Calculator
        on end_of_day:
```
if (paddock_is_fallow() = 0) then
   outputfile do_output
endif
```
      sorghum
      outputfile: filename=Sorghum_Dalby 2007_Buster.out; title=Sorghum_Dalby 2007_Buster; events=Reporting Frequency
        variables
          variables: dd/mm/yyyy as date, DaysAfterSowing, sw_dep(), ll15_dep(), dul_dep(), WaterSD, Biomass, yield, lai, GrainNo, stage, biomass_wt, GrainGreenWt, RachisGreenWt, StemGreenWt, GrainSize, LeafSenescedWt, LeafGreenWt, TillerNoFertile
