folder Dalby Box Skip Row: version=32
  simulation DalbyBoxDoubleHD04
    clock
      start_date = 26/11/2004  # Select the start date of the simulation
      end_date = 31/3/2005  # Select the end date of the simulation
    summaryfile
    metfile met: filename=Dalby Box Skip Row.met
    area paddock
      folder Manager folder
        manager Sow SkipRow on a fixed date
          # Sowing criteria
          date = 26/11/2004  # Enter sowing date (d/m/yyyy)
          # Sowing parameters
          crop = Sorghum  # Enter name of crop to sow
          density = 5  # Enter sowing density (plants/m2)
          depth = 30  # Enter sowing depth (mm)
          cultivar = Buster  # Enter cultivar
          row_spacing = 1  # Enter row spacing (m)
          RowConfiguration = double  # Enter skip row configuration
          ftn = 0  # Enter Fertile Tiller No.
          on start_of_day:
```
     if (biomass > 0) then
         harvIndx = yield / biomass
      else
         harvIndx = 0
      endif

      if (day > 152) then
        current_season = year
      else
        current_season = year -1
      endif

            if (paddock_is_fallow() = 1 and today = date('[date]')) then
              season = current_season
              SowDay = day
               SowYear = year
ftn = 0

              [crop] sow population =[density], sowing_depth = [depth], cultivar = [cultivar], row_spacing = [row_spacing], skip = [RowConfiguration], tiller_no_fertile = [ftn] ()
            endif
            if (paddock_is_fallow() = 0) then
               outputfile do_output
            endif
```
        manager Harvesting rule
          # Harvesting criteria
          crop = Sorghum  # Enter name of crop to harvest when ripe
          on end_of_day:
```
           if [crop].StageName = 'harvest_ripe' or [crop].plant_status = 'dead' then
              [crop]  harvest
              [crop]  end_crop
           endif
```
      manager Logic
        on init:
```
 sdr = 1
```
        on end_of_day:
```
if (sw_demand > 0) then
   sdr = sw_supply / sw_demand
   if (sdr > 1) then
      sdr = 1
   endif
else
   sdr = 1
endif
```
      soil Box2004: LocalName=Dalby Box; Site=Dalby Box; Region=Darling Downs
        SoilType = DalbyBox  # Soil description
        NearestTown = Unknown
        NaturalVegetation = Unknown
        Water
          Layer:
            Thickness (mm)  BD (g/cc)  AirDry (mm/mm)  LL15 (mm/mm)  DUL (mm/mm)  SAT (mm/mm)
            150             1.230      0.180           0.250         0.460        0.510
            150             1.190      0.180           0.250         0.470        0.520
            300             1.150      0.200           0.290         0.490        0.540
            300             1.200      0.240           0.350         0.470        0.520
            300             1.230      0.260           0.370         0.450        0.500
            300             1.250      0.270           0.380         0.450        0.500
            300             1.300      0.280           0.400         0.430        0.480
          SoilCrop Sorghum
            Layer:
              Thickness (mm)  LL (mm/mm)  KL (/day)  XF (0-1)
              150             0.250       0.070      1
              150             0.250       0.070      1
              300             0.290       0.070      1
              300             0.350       0.050      1
              300             0.370       0.050      1
              300             0.380       0.040      1
              300             0.400       0.040      1
        SoilWat: SummerCona=3.5; SummerU=6; SummerDate=1-Nov; WinterCona=3.5; WinterU=6; WinterDate=1-Apr; DiffusConst=40; DiffusSlope=16; Salb=0.11; Cn2Bare=85; CnRed=0.8; CnCov=0.2
          Layer:
            Thickness (mm)  SWCON (0-1)
            150             0
            150             0
            300             0
            300             0
            300             0
            300             0
            300             0
        SoilOrganicMatter: RootCn=45; RootWt=1000; SoilCn=14.5; EnrACoeff=7.4; EnrBCoeff=0.2
          Layer:
            Thickness (mm)  OC (Total %)  FBiom (0-1)  FInert (0-1)
            150             0.920         0.050        0.390
            150             0.450         0.020        0.470
            300             0.320         0.010        0.520
            300             0.290         0.010        0.620
            300             0.230         0.010        0.740
            300             0.270         0.010        0.830
            300             0.300         0.010        0.930
        Analysis
          Layer:
            Thickness (mm)  PH (1:5 water)
            150             7.400
            150             8
            300             8.100
            300             8.200
            300             8.300
            300             8.100
            300             8.300
        Sample Initial nitrogen
          Layer:
            Thickness (mm)  NO3 (ppm)  NH4 (ppm)
            150             49.8001    0.1
            150             13.704     0.1
            300             6.75901    0.1
            300             2.778      0.1
            300             0.833001   0.1
            300             0          0.1
            300             0          0.1
        Sample Initial water
          Layer:
            Thickness (mm)  SW (mm/mm)
            150             0.310
            150             0.400
            300             0.430
            300             0.420
            300             0.410
            300             0.400
            300             0.400
      sorghum
      outputfile: filename=DalbyBoxDoubleHD04.out; title=DalbyBoxDoubleHD04
        variables
          variable:
            dd/mm/yyyy as date  # Date (dd/mm/yyyy)
            DaysAfterSowing  # Days after sowing
            sw_dep()
            ll15_dep()
            dul_dep()
            WaterSD
            Biomass  # Total above-ground biomass
            yield
            lai
            GrainNo
            stage
            biomass_wt  # Total above-ground biomass
            GrainGreenWt  # Live grain dry weight
            RachisGreenWt  # Live rachis dry weight
            StemGreenWt  # Stem dry weight
            GrainSize  # 1000 grain weight
            LeafSenescedWt  # Senesced leaf dry weight
            TillerNoFertile
  simulation DalbyBoxDoubleLD04 -> /Dalby Box Skip Row/DalbyBoxDoubleHD04
    area paddock -> /Dalby Box Skip Row/DalbyBoxDoubleHD04/paddock
      folder Manager folder -> /Dalby Box Skip Row/DalbyBoxDoubleHD04/paddock/Manager folder
        manager Sow SkipRow on a fixed date
          # Sowing criteria
          date = 26/11/2004  # Enter sowing date (d/m/yyyy)
          # Sowing parameters
          crop = Sorghum  # Enter name of crop to sow
          density = 2.5  # Enter sowing density (plants/m2)
          depth = 30  # Enter sowing depth (mm)
          cultivar = Buster  # Enter cultivar
          row_spacing = 1  # Enter row spacing (m)
          RowConfiguration = double  # Enter skip row configuration
          ftn = 0.2  # Enter Fertile Tiller No.
          on start_of_day:
          script: same as in DalbyBoxDoubleHD04.paddock.Manager folder.Sow SkipRow on a fixed date
      outputfile -> /Dalby Box Skip Row/DalbyBoxDoubleHD04/paddock/Outputfile: filename=DalbyBoxDoubleLD04.out; title=DalbyBoxDoubleLD04
        variables -> /Dalby Box Skip Row/DalbyBoxDoubleHD04/paddock/Outputfile/Variables
  simulation DalbyBoxSolidHD04 -> /Dalby Box Skip Row/DalbyBoxDoubleHD04
    area paddock -> /Dalby Box Skip Row/DalbyBoxDoubleHD04/paddock
      folder Manager folder -> /Dalby Box Skip Row/DalbyBoxDoubleHD04/paddock/Manager folder
        manager Sow SkipRow on a fixed date
          # Sowing criteria
          date = 26/11/2004  # Enter sowing date (d/m/yyyy)
          # Sowing parameters
          crop = Sorghum  # Enter name of crop to sow
          density = 5  # Enter sowing density (plants/m2)
          depth = 30  # Enter sowing depth (mm)
          cultivar = Buster  # Enter cultivar
          row_spacing = 1  # Enter row spacing (m)
          RowConfiguration = solid  # Enter skip row configuration
          ftn = 0.2  # Enter Fertile Tiller No.
          on start_of_day:
          script: same as in DalbyBoxDoubleHD04.paddock.Manager folder.Sow SkipRow on a fixed date
      soil Box2004 -> /Dalby Box Skip Row/DalbyBoxDoubleHD04/paddock/Box2004
        Sample Initial water
          Layer:
            Thickness (mm)  SW (mm/mm)
            150             0.33807
            150             0.39661
            300             0.45758
            300             0.45302
            300             0.44368
            300             0.43253
            300             0.42905
      outputfile -> /Dalby Box Skip Row/DalbyBoxDoubleHD04/paddock/Outputfile: filename=DalbyBoxSolidHD04.out; title=DalbyBoxSolidHD04
        variables -> /Dalby Box Skip Row/DalbyBoxDoubleHD04/paddock/Outputfile/Variables
