folder Simulations: version=32
  simulation DalbyBox2007
    metfile met: filename=Dalby Box 2007.met
    clock
      start_date = 1/10/2007  # Select the start date of the simulation
      end_date = 18/3/2008  # Select the end date of the simulation
    summaryfile
    area paddock
      folder Manager folder
        manager Sow on a fixed date
          # Sowing criteria
          date = 18/10/2007  # Enter sowing date (d/m/yyyy)
          # Sowing parameters
          crop = Sorghum  # Enter name of crop to sow
          density = 7  # Enter sowing density (plants/m2)
          depth = 30  # Enter sowing depth (mm)
          cultivar = Buster  # Enter cultivar
          row_spacing = 0.75  # Enter row spacing (mm)
          RowConfiguration = solid  # Enter skip row configuration
          ftn = 0.6  # Enter Fertile Tiller Number
          on start_of_day:
```
if (today = date('[date]') then
    if (day > 152) then
        season  = year
    else
        season  = year -1
    endif

    SowDay = day
     SowYear = year
    [crop] sow population =[density], sowing_depth = [depth], cultivar = [cultivar], row_spacing = [row_spacing], skip = [RowConfiguration], tiller_no_fertile = [ftn]
endif
```
        manager Harvesting rule
          # Harvesting criteria
          crop = sorghum  # Enter name of crop to harvest when ripe
          on end_of_day:
```
           if [crop].StageName = 'harvest_ripe' or [crop].plant_status = 'dead' then
              [crop]  harvest
              [crop]  end_crop
           endif
```
      fertiliser
      surfaceom surface organic matter
        PoolName = wheat  # Organic Matter pool name
        type = wheat  # Organic Matter type
        mass = 1000  # Initial surface residue (kg/ha)
        cnr = 80  # C:N ratio of initial residue
        standing_fraction = 0  # Fraction of residue standing
      soil Dalby Box: LocalName=Dalby Box; Site=Dalby Box; Region=Darling Downs
        SoilType = DalbyBox  # Soil description
        NearestTown = Unknown
        NaturalVegetation = Unknown
        Water
          Layer:
            Thickness (mm)  BD (g/cc)  AirDry (mm/mm)  LL15 (mm/mm)  DUL (mm/mm)  SAT (mm/mm)
            150             1.25       0.2             0.25          0.45         0.5
            150             1.26       0.22            0.25          0.45         0.5
            300             1.26       0.28            0.29          0.44         0.49
            300             1.26       0.33            0.34          0.45         0.5
            300             1.27       0.36            0.37          0.44         0.49
            300             1.29       0.38            0.38          0.43         0.48
            300             1.29       0.4             0.4           0.43         0.48
          SoilCrop Sorghum
            Layer:
              Thickness (mm)  LL (mm/mm)  KL (/day)  XF (0-1)
              150             0.25        0.07       1
              150             0.25        0.06       1
              300             0.29        0.06       1
              300             0.34        0.06       1
              300             0.37        0.05       1
              300             0.38        0.05       1
              300             0.4         0.04       1
        SoilWat: SummerCona=3.5; SummerU=6; SummerDate=1-Nov; WinterCona=3.5; WinterU=6; WinterDate=1-Apr; DiffusConst=88; DiffusSlope=35.4; Salb=0.13; Cn2Bare=91; CnRed=20; CnCov=0.8
          Layer:
            Thickness (mm)  SWCON (0-1)
            150             0.5
            150             0.5
            300             0.5
            300             0.5
            300             0.5
            300             0.5
            300             0.5
        SoilOrganicMatter: RootCn=30; RootWt=1500; SoilCn=12.5; EnrACoeff=7.4; EnrBCoeff=0.2
          Layer:
            Thickness (mm)  OC (Total %)  FBiom (0-1)  FInert (0-1)
            150             1.28          0.04         0.4
            150             0.64          0.02         0.6
            300             0.32          0.02         0.8
            300             0.16          0.02         1
            300             0.16          0.01         1
            300             0.16          0.01         1
            300             0.16          0.01         1
        Analysis
          Layer:
            Thickness (mm)  PH (1:5 water)
            150             7.6
            150             7.8
            300             8
            300             8.4
            300             8.3
            300             8.2
            300             8.3
        Sample Initial nitrogen
          Layer:
            Thickness (mm)  NO3 (ppm)  NH4 (ppm)
            150             19.01      0.100022
            150             24.86      0.100022
            300             23.98      0.100022
            300             9.37002    0.100022
            300             2.81001    0.100022
            300             1.68       0.100022
            300             1.31       0.100022
        Sample Initial water
          Layer:
            Thickness (mm)  SW (mm/mm)
            150             0.415
            150             0.448
            300             0.447
            300             0.427
            300             0.39
            300             0.38
            300             0.4
      manager Calculator
        on end_of_day:
```
if (paddock_is_fallow() = 0) then
   outputfile do_output
endif
```
      outputfile: filename=DalbyBox2007.out; title=DalbyBox2007; events=My Variables Events
        variables
          variable:
            dd/mm/yyyy as date  # Date (dd/mm/yyyy)
            DaysAfterSowing  # Days after sowing
            sw_dep()
            ll15_dep()
            dul_dep()
            WaterSD
            Biomass  # Total above-ground biomass
            yield
            lai
            GrainNo
            stage
            biomass_wt  # Total above-ground biomass
            GrainGreenWt  # Live grain dry weight
            RachisGreenWt  # Live rachis dry weight
            StemGreenWt  # Stem dry weight
            GrainSize  # 1000 grain weight
            LeafSenescedWt  # Senesced leaf dry weight
            LeafGreenWt  # Live leaf dry weight
            TillerNoFertile
      sorghum
