folder Dalby Box Skip: version=32
  shared
  shared
  shared
  shared
  shared
  shared
  shared
  shared
  shared
  shared
  shared
  simulation DalbyBox05SkipDSLD
    clock
      start_date = 1/12/2005  # Select the start date of the simulation
      end_date = 30/04/2006  # Select the end date of the simulation
    summaryfile
    metfile met: filename=Dalby Box Skip.met
    area paddock
      folder Manager folder
        manager Sow SkipRow on a fixed date
          # Sowing criteria
          date = 21/12/2005  # Enter sowing date (d/m/yyyy)
          # Sowing parameters
          crop = Sorghum  # Enter name of crop to sow
          density = 2.5  # Enter sowing density (plants/m2)
          depth = 30  # Enter sowing depth (mm)
          cultivar = Buster  # Enter cultivar
          row_spacing = 1  # Enter row spacing (m)
          RowConfiguration = double  # Enter skip row configuration
          ftn = 0.3  # Enter Fertile Tiller No.
          on start_of_day:
```
     if (biomass > 0) then
         harvIndx = yield / biomass
      else
         harvIndx = 0
      endif

      if (day > 152) then
        current_season = year
      else
        current_season = year -1
      endif

            if (paddock_is_fallow() = 1 and today = date('[date]')) then
              season = current_season
              SowDay = day
               SowYear = year
ftn = 0

              [crop] sow population =[density], sowing_depth = [depth], cultivar = [cultivar], row_spacing = [row_spacing], skip = [RowConfiguration], tiller_no_fertile = [ftn] ()
            endif
            if (paddock_is_fallow() = 0) then
               outputfile do_output
            endif
```
        manager Harvesting rule
          # Harvesting criteria
          crop = Sorghum  # Enter name of crop to harvest when ripe
          on end_of_day:
```
           if [crop].StageName = 'harvest_ripe' or [crop].plant_status = 'dead' then
              [crop]  harvest
              [crop]  end_crop
           endif
```
      manager Logic
        on end_of_day:
```
  if (sw_demand > 0) then
     sdr = sw_supply / sw_demand
     if (sdr > 1) then
        sdr = 1
     endif
  else
     sdr = 1
  endif
```
      soil Dalby Box (avg): LocalName=Dalby Box; Site=Dalby Box; Region=Darling Downs
        SoilType = DalbyBox(avg)  # Soil description
        NearestTown = Unknown
        NaturalVegetation = Unknown
        InitWater Initial water
          PercentMethod: Percent=0.66; Distributed=Filled from top
        Water
          Layer:
            Thickness (mm)  BD (g/cc)  AirDry (mm/mm)  LL15 (mm/mm)  DUL (mm/mm)  SAT (mm/mm)
            150             1.230      0               0.250         0.460        0.510
            150             1.190      0               0.250         0.470        0.520
            300             1.150      0               0.290         0.490        0.540
            300             1.200      0               0.350         0.470        0.520
            300             1.230      0               0.370         0.450        0.500
            300             1.250      0               0.380         0.450        0.500
            300             1.300      0               0.400         0.430        0.480
          SoilCrop Sorghum
            Layer:
              Thickness (mm)  LL (mm/mm)  KL (/day)  XF (0-1)
              150             0.250       0.080      1
              150             0.250       0.080      1
              300             0.290       0.080      1
              300             0.350       0.080      1
              300             0.370       0.060      1
              300             0.380       0.040      1
              300             0.400       0.020      1
        SoilWat: SummerCona=3.5; SummerU=6; SummerDate=1-Nov; WinterCona=3.5; WinterU=6; WinterDate=1-Apr; DiffusConst=88; DiffusSlope=35.4; Salb=0.13; Cn2Bare=91; CnRed=20; CnCov=0.8
          Layer:
            Thickness (mm)  SWCON (0-1)
            150             0.500
            150             0.500
            300             0.500
            300             0.500
            300             0.500
            300             0.500
            300             0.500
        SoilOrganicMatter: RootCn=30; RootWt=1500; SoilCn=12.5; EnrACoeff=7.4; EnrBCoeff=0.2
          Layer:
            Thickness (mm)  OC (Total %)  FBiom (0-1)  FInert (0-1)
            150             1.310         0.030        0.400
            150             1.240         0.020        0.600
            300             1.250         0.010        0.800
            300             1.100         0.010        0.900
            300             0.710         0.010        1
            300             0.340         0.010        1
            300             0.260         0.010        1
        Analysis
          Layer:
            Thickness (mm)  PH (1:5 water)
            150             7.800
            150             8.050
            300             7.950
            300             8
            300             8.050
            300             8.100
            300             8.050
        Sample Initial nitrogen
          Layer:
            Thickness (mm)  NO3 (ppm)  NH4 (ppm)
            150             4.832      0.100
            150             5.577      0.100
            300             5.329      0.100
            300             0          0.100
            300             0          0.100
            300             0          0.100
            300             0          0.100
      irrigation
        automatic_irrigation = off  # switch
        asw_depth = 600.0  # Depth to which ASW is calculated. (mm)
        crit_fr_asw = 0.5  # Fraction of ASW below which irrigation is applied (0-1.0)
        irrigation_efficiency = 1.0  # Efficiency of the irrigation. (0-1.0)
        default_no3_conc = 0.0  # Nitrate concentration (ppm N)
        default_nh4_conc = 0.0  # Ammonium concentration (ppm N)
        default_cl_conc = 0.0  # Chloride concentration (ppm Cl)
      fertiliser
      operations
        21/12/2005  fertiliser apply amount = 3 (kg/ha), depth = 50 (mm), type = NO3_N ()
      sorghum
      outputfile: filename=DalbyBox05SkipDSLD.out; title=DalbyBox05SkipDSLD
        variables
          variable:
            dd/mm/yyyy as date  # Date (dd/mm/yyyy)
            DaysAfterSowing  # Days after sowing
            sw_dep()
            ll15_dep()
            dul_dep()
            WaterSD
            Biomass  # Total above-ground biomass
            yield
            lai
            GrainNo
            stage
            biomass_wt  # Total above-ground biomass
            GrainGreenWt  # Live grain dry weight
            RachisGreenWt  # Live rachis dry weight
            StemGreenWt  # Stem dry weight
            GrainSize  # 1000 grain weight
            LeafSenescedWt  # Senesced leaf dry weight
            LeafGreenWt  # Live leaf dry weight
            TillerNoFertile
  simulation DalbyBox05SkipSHD -> /Dalby Box Skip/DalbyBox05SkipDSLD
    area paddock -> /Dalby Box Skip/DalbyBox05SkipDSLD/paddock
      folder Manager folder -> /Dalby Box Skip/DalbyBox05SkipDSLD/paddock/Manager folder
        manager Sow SkipRow on a fixed date
          # Sowing criteria
          date = 21/12/2005  # Enter sowing date (d/m/yyyy)
          # Sowing parameters
          crop = Sorghum  # Enter name of crop to sow
          density = 5  # Enter sowing density (plants/m2)
          depth = 30  # Enter sowing depth (mm)
          cultivar = Buster  # Enter cultivar
          row_spacing = 1  # Enter row spacing (m)
          RowConfiguration = solid  # Enter skip row configuration
          ftn = 0  # Enter Fertile Tiller No.
          on start_of_day:
          script: same as in DalbyBox05SkipDSLD.paddock.Manager folder.Sow SkipRow on a fixed date
      soil Dalby Box (avg) -> /Dalby Box Skip/DalbyBox05SkipDSLD/paddock/Dalby Box (avg)
        InitWater Initial water
          PercentMethod: Percent=1.00; Distributed=Filled from top
      outputfile -> /Dalby Box Skip/DalbyBox05SkipDSLD/paddock/Outputfile: filename=DalbyBox05SkipSHD.out; title=DalbyBox05SkipSHD
        variables -> /Dalby Box Skip/DalbyBox05SkipDSLD/paddock/Outputfile/Variables
