folder Dalby Racecourse Skip row: version=32
  simulation DalbyRaceDSHD04
    clock
      start_date = 16/11/2004  # Select the start date of the simulation
      end_date = 31/3/2005  # Select the end date of the simulation
    summaryfile
    metfile met: filename=Dalby Racecourse Skip row.met
    area paddock
      folder Manager folder
        manager Sow SkipRow on a fixed date
          # Sowing criteria
          date = 16/11/2004  # Enter sowing date (d/m/yyyy)
          # Sowing parameters
          crop = Sorghum  # Enter name of crop to sow
          density = 5  # Enter sowing density (plants/m2)
          depth = 30  # Enter sowing depth (mm)
          cultivar = Buster  # Enter cultivar
          row_spacing = 1  # Enter row spacing (m)
          RowConfiguration = double  # Enter skip row configuration
          ftn = 0  # Enter Fertile Tiller No.
          on start_of_day:
```
     if (biomass > 0) then
         harvIndx = yield / biomass
      else
         harvIndx = 0
      endif


      if (day > 152) then
        current_season = year
      else
        current_season = year -1
      endif

            if (paddock_is_fallow() = 1 and today = date('[date]')) then
              season = current_season
              SowDay = day
               SowYear = year
ftn = 0

              [crop] sow population =[density], sowing_depth = [depth], cultivar = [cultivar], row_spacing = [row_spacing], skip = [RowConfiguration], tiller_no_fertile = [ftn] ()
            endif
            if (paddock_is_fallow() = 0) then
               outputfile do_output
            endif
```
        manager Harvesting rule
          # Harvesting criteria
          crop = Sorghum  # Enter name of crop to harvest when ripe
          on end_of_day:
```
           if [crop].StageName = 'harvest_ripe' or [crop].plant_status = 'dead' then
              [crop]  harvest
              [crop]  end_crop
           endif
```
      soil Racecourse2004: LocalName=Dalby Racecourse; Site=Dalby Racecourse; Region=Darling Downs
        SoilType = DalbyRacecourseBox  # Soil description
        NearestTown = Unknown
        NaturalVegetation = Unknown
        Water
          Layer:
            Thickness (mm)  BD (g/cc)  AirDry (mm/mm)  LL15 (mm/mm)  DUL (mm/mm)  SAT (mm/mm)
            150             1.490      0.190           0.260         0.370        0.420
            150             1.520      0.190           0.260         0.350        0.400
            300             1.360      0.160           0.230         0.410        0.460
            300             1.340      0.180           0.250         0.410        0.460
            300             1.420      0.180           0.260         0.390        0.440
            300             1.400      0.200           0.290         0.400        0.450
            300             1.400      0.190           0.280         0.390        0.440
          SoilCrop Sorghum
            Layer:
              Thickness (mm)  LL (mm/mm)  KL (/day)  XF (0-1)
              150             0.260       0.070      1
              150             0.260       0.070      1
              300             0.230       0.070      1
              300             0.250       0.050      1
              300             0.260       0.050      1
              300             0.290       0.040      1
              300             0.280       0.040      1
        SoilWat: SummerCona=3.5; SummerU=6; SummerDate=1-Nov; WinterCona=3.5; WinterU=6; WinterDate=1-Apr; DiffusConst=40; DiffusSlope=16; Salb=0.11; Cn2Bare=85; CnRed=0.8; CnCov=0.2
          Layer:
            Thickness (mm)  SWCON (0-1)
            150             0
            150             0
            300             0
            300             0
            300             0
            300             0
            300             0
        SoilOrganicMatter: RootCn=45; RootWt=1000; SoilCn=14.5; EnrACoeff=7.4; EnrBCoeff=0.2
          Layer:
            Thickness (mm)  OC (Total %)  FBiom (0-1)  FInert (0-1)
            150             0.910         0.050        0.390
            150             0.450         0.020        0.470
            300             0.320         0.010        0.520
            300             0.290         0.010        0.620
            300             0.230         0.010        0.740
            300             0.270         0.010        0.830
            300             0.300         0.010        0.930
        Analysis
          Layer:
            Thickness (mm)  PH (1:5 water)
            150             7.100
            150             7.600
            300             8.500
            300             7.900
            300             7.900
            300             7.600
            300             7.400
        Sample Initial nitrogen
          Layer:
            Thickness (mm)  NO3 (ppm)  NH4 (ppm)
            150             28.113     0.10002
            150             19.906     0.10002
            300             10.377     0.10002
            300             9.528      0.10002
            300             5.755      0.10002
            300             21.944     0.10002
            300             0          0.10002
        Sample Initial water
          Layer:
            Thickness (mm)  SW (mm/mm)
            150             0.320
            150             0.310
            300             0.310
            300             0.310
            300             0.320
            300             0.330
            300             0.340
      manager Logic
        on init:
```
 sdr = 1
```
        on end_of_day:
```
  if (sw_demand > 0) then
     sdr = sw_supply / sw_demand
     if (sdr > 1) then
        sdr = 1
     endif
  else
     sdr = 1
  endif
```
      outputfile: filename=DalbyRaceDSHD04.out; title=DalbyRaceDSHD04
        variables
          variable:
            dd/mm/yyyy as date  # Date (dd/mm/yyyy)
            DaysAfterSowing  # Days after sowing
            sw_dep()
            ll15_dep()
            dul_dep()
            WaterSD
            Biomass  # Total above-ground biomass
            yield
            lai
            GrainNo
            stage
            biomass_wt  # Total above-ground biomass
            GrainGreenWt  # Live grain dry weight
            RachisGreenWt  # Live rachis dry weight
            StemGreenWt  # Stem dry weight
            GrainSize  # 1000 grain weight
            LeafSenescedWt  # Senesced leaf dry weight
            TillerNoFertile
      sorghum
  simulation DalbyRaceDSLD04 -> /Dalby Racecourse Skip row/DalbyRaceDSHD04
    area paddock -> /Dalby Racecourse Skip row/DalbyRaceDSHD04/paddock
      folder Manager folder -> /Dalby Racecourse Skip row/DalbyRaceDSHD04/paddock/Manager folder
        manager Sow SkipRow on a fixed date
          # Sowing criteria
          date = 16/11/2004  # Enter sowing date (d/m/yyyy)
          # Sowing parameters
          crop = Sorghum  # Enter name of crop to sow
          density = 2.5  # Enter sowing density (plants/m2)
          depth = 30  # Enter sowing depth (mm)
          cultivar = Buster  # Enter cultivar
          row_spacing = 1  # Enter row spacing (m)
          RowConfiguration = double  # Enter skip row configuration
          ftn = 0.3  # Enter Fertile Tiller No.
          on start_of_day:
          script: same as in DalbyRaceDSHD04.paddock.Manager folder.Sow SkipRow on a fixed date
      outputfile -> /Dalby Racecourse Skip row/DalbyRaceDSHD04/paddock/Outputfile: filename=DalbyRaceDSLD04.out; title=DalbyRaceDSLD04
        variables -> /Dalby Racecourse Skip row/DalbyRaceDSHD04/paddock/Outputfile/Variables
  simulation DalbyRaceSHD04 -> /Dalby Racecourse Skip row/DalbyRaceDSHD04
    area paddock -> /Dalby Racecourse Skip row/DalbyRaceDSHD04/paddock
      folder Manager folder -> /Dalby Racecourse Skip row/DalbyRaceDSHD04/paddock/Manager folder
        manager Sow SkipRow on a fixed date
          # Sowing criteria
          date = 16/11/2004  # Enter sowing date (d/m/yyyy)
          # Sowing parameters
          crop = Sorghum  # Enter name of crop to sow
          density = 5  # Enter sowing density (plants/m2)
          depth = 30  # Enter sowing depth (mm)
          cultivar = Buster  # Enter cultivar
          row_spacing = 1  # Enter row spacing (m)
          RowConfiguration = solid  # Enter skip row configuration
          ftn = 0.3  # Enter Fertile Tiller No.
          on start_of_day:
          script: same as in DalbyRaceDSHD04.paddock.Manager folder.Sow SkipRow on a fixed date
      outputfile -> /Dalby Racecourse Skip row/DalbyRaceDSHD04/paddock/Outputfile: filename=DalbyRaceSHD04.out; title=DalbyRaceSHD04
        variables -> /Dalby Racecourse Skip row/DalbyRaceDSHD04/paddock/Outputfile/Variables
