folder Breeders: version=32
  simulation HermitageDGP04
    clock
      start_date = 5/11/2004  # Select the start date of the simulation
      end_date = 30/04/2005  # Select the end date of the simulation
    summaryfile
    metfile met: filename=Hermitage DGP.met
    area paddock
      folder Manager folder
        manager Sow SkipRow on a fixed date
          # Sowing criteria
          date = 5/11/2004  # Enter sowing date (d/m/yyyy)
          # Sowing parameters
          crop = Sorghum  # Enter name of crop to sow
          density = 10  # Enter sowing density (plants/m2)
          depth = 30  # Enter sowing depth (mm)
          cultivar = Buster  # Enter cultivar
          row_spacing = 0.75  # Enter row spacing (m)
          RowConfiguration = solid  # Enter skip row configuration
          ftn = 0.9  # Enter Fertile Tiller No.
          TillerFactor = 1  # Enter Tiller Factor
          DensityFactor = 1  # Enter Density Factor
          on start_of_day:
```
if (paddock_is_fallow() = 1 and today = date('[date]')) then
     season = current_season
     SowDay = day
     SowYear = year

     adjFtn = [ftn] * [TillerFactor]
     adjDensity = [density] * [DensityFactor]

     [crop] sow population =adjDensity , sowing_depth = [depth], cultivar = [cultivar], row_spacing = [row_spacing], skip = [RowConfiguration], tiller_no_fertile = adjFtn  ()
endif
```
        manager Harvesting rule
          # Harvesting criteria
          crop = Sorghum  # Enter name of crop to harvest when ripe
          on end_of_day:
```
           if [crop].StageName = 'harvest_ripe' or [crop].plant_status = 'dead' then
              [crop]  harvest
              [crop]  end_crop
           endif
```
      manager Calculator
        on init:
```
 head_wt = 0
root_n = 0
head_n = 0
leaf_n = 0
sd = 0
     if (day > 152) then
        current_season = year
      else
        current_season = year -1
      endif
```
        on start_of_day:
```
     if (day > 152) then
        current_season = year
      else
        current_season = year -1
      endif
```
        on end_of_day:
```
 
if (biomass > 0) then
     harvIndx = yield / biomass
else
     harvIndx = 0
endif


if (sw_demand > 0) then
   sdr = sw_supply / sw_demand
   if (sdr > 1) then
      sdr = 1
   endif
else
   sdr = 1
endif


if (paddock_is_fallow() = 0) then
    outputfile do_output

endif
```
      soil HRS2004: LocalName=Hermitage; Site=Hermitage; Region=Darling Downs
        SoilType = Hermitage  # Soil description
        NearestTown = Unknown
        NaturalVegetation = Unknown
        InitWater Initial water
          PercentMethod: Percent=0.75; Distributed=Filled from top
        Water
          Layer:
            Thickness (mm)  BD (g/cc)  AirDry (mm/mm)  LL15 (mm/mm)  DUL (mm/mm)  SAT (mm/mm)
            150             1.030      0.150           0.210         0.560        0.580
            150             1.060      0.200           0.290         0.550        0.570
            300             1.060      0.190           0.310         0.550        0.570
            300             1.080      0.190           0.310         0.540        0.560
            300             1.110      0.200           0.320         0.530        0.550
            300             1.140      0.210           0.330         0.520        0.530
            300             1.170      0.210           0.340         0.510        0.520
          SoilCrop Sorghum
            Layer:
              Thickness (mm)  LL (mm/mm)  KL (/day)  XF (0-1)
              150             0.21        0.06       1
              150             0.29        0.06       1
              300             0.31        0.06       1
              300             0.31        0.06       1
              300             0.32        0.06       1
              300             0.33        0.06       1
              300             0.34        0.06       1
        SoilWat: SummerCona=3.5; SummerU=6; SummerDate=1-Nov; WinterCona=3.5; WinterU=6; WinterDate=1-Apr; DiffusConst=40; DiffusSlope=16; Salb=0.11; Cn2Bare=85; CnRed=0.8; CnCov=0.2
          Layer:
            Thickness (mm)  SWCON (0-1)
            150             0
            150             0
            300             0
            300             0
            300             0
            300             0
            300             0
        SoilOrganicMatter: RootCn=45; RootWt=1000; SoilCn=14.5; EnrACoeff=7.4; EnrBCoeff=0.2
          Layer:
            Thickness (mm)  OC (Total %)  FBiom (0-1)  FInert (0-1)
            150             1.560         0.050        0.390
            150             0.450         0.020        0.470
            300             0.320         0.010        0.520
            300             0.290         0.010        0.620
            300             0.230         0.010        0.740
            300             0.270         0.010        0.830
            300             0.300         0.010        0.930
        Analysis
          Layer:
            Thickness (mm)  PH (1:5 water)
            150             7.600
            150             7.700
            300             8.200
            300             8.500
            300             8.600
            300             8.600
            300             8.500
        Sample Initial nitrogen
          Layer:
            Thickness (mm)  NO3 (ppm)  NH4 (ppm)
            150             37.1011    0.100025
            150             26.1601    0.100025
            300             6.28901    0.100025
            300             8.70902    0.100025
            300             6.00601    0.100025
            300             8.56102    0.100025
            300             10.781     0.100025
      sorghum
      outputfile: filename=HermitageDGP04.out; title=HermitageDGP04
        variables
          variable:
            dd/mm/yyyy as date  # Date (dd/mm/yyyy)
            DaysAfterSowing  # Days after sowing
            sw_dep()
            ll15_dep()
            dul_dep()
            WaterSD
            Biomass  # Total above-ground biomass
            yield
            lai
            GrainNo
            stage
            biomass_wt  # Total above-ground biomass
            GrainGreenWt  # Live grain dry weight
            RachisGreenWt  # Live rachis dry weight
            StemGreenWt  # Stem dry weight
            GrainSize  # 1000 grain weight
            LeafSenescedWt  # Senesced leaf dry weight
            LeafGreenWt  # Live leaf dry weight
            TillerNoFertile
  simulation Hermitage AYT04
    clock
      start_date = 27/10/2004  # Select the start date of the simulation
      end_date = 30/04/2005  # Select the end date of the simulation
    summaryfile
    metfile met: filename=Hermitage AYT.met
    area paddock
      folder Manager folder
        manager Sow SkipRow on a fixed date
          # Sowing criteria
          date = 27/10/2004  # Enter sowing date (d/m/yyyy)
          # Sowing parameters
          crop = Sorghum  # Enter name of crop to sow
          density = 10  # Enter sowing density (plants/m2)
          depth = 30  # Enter sowing depth (mm)
          cultivar = Buster  # Enter cultivar
          row_spacing = 0.75  # Enter row spacing (m)
          RowConfiguration = solid  # Enter skip row configuration
          ftn = 1.6  # Enter Fertile Tiller No.
          on start_of_day:
```
     if (biomass > 0) then
         harvIndx = yield / biomass
      else
         harvIndx = 0
      endif

      if (day > 152) then
        current_season = year
      else
        current_season = year -1
      endif

            if (paddock_is_fallow() = 1 and today = date('[date]')) then
              season = current_season
              SowDay = day
               SowYear = year
ftn = 0

              [crop] sow population =[density], sowing_depth = [depth], cultivar = [cultivar], row_spacing = [row_spacing], skip = [RowConfiguration], tiller_no_fertile = [ftn] ()
            endif
            if (paddock_is_fallow() = 0) then
               outputfile do_output
            endif
```
        manager Harvesting rule
          # Harvesting criteria
          crop = Sorghum  # Enter name of crop to harvest when ripe
          on end_of_day:
          script: same as in HermitageDGP04.paddock.Manager folder.Harvesting rule
      soil HRS2004: LocalName=Hermitage; Site=Hermitage; Region=Darling Downs
        SoilType = Hermitage  # Soil description
        NearestTown = Unknown
        NaturalVegetation = Unknown
        InitWater Initial water
          PercentMethod: Percent=1.00; Distributed=Filled from top
        Water
          Layer:
            Thickness (mm)  BD (g/cc)  AirDry (mm/mm)  LL15 (mm/mm)  DUL (mm/mm)  SAT (mm/mm)
            150             1.030      0.150           0.210         0.560        0.610
            150             1.060      0.200           0.280         0.550        0.600
            300             1.060      0.190           0.300         0.550        0.600
            300             1.080      0.190           0.300         0.540        0.590
            300             1.110      0.200           0.310         0.530        0.580
            300             1.140      0.210           0.320         0.520        0.570
            300             1.170      0.210           0.330         0.510        0.560
          SoilCrop Sorghum
            Layer:
              Thickness (mm)  LL (mm/mm)  KL (/day)  XF (0-1)
              150             0.210       0.070      1.000
              150             0.280       0.070      1.000
              300             0.300       0.070      1.000
              300             0.300       0.050      1.000
              300             0.310       0.050      1.000
              300             0.320       0.040      1.000
              300             0.330       0.040      1.000
        SoilWat: same as HermitageDGP04.paddock.HRS2004.SoilWat
        SoilOrganicMatter: same as HermitageDGP04.paddock.HRS2004.SoilOrganicMatter
        Analysis: same as HermitageDGP04.paddock.HRS2004.Analysis
        Sample Initial nitrogen
          Layer:
            Thickness (mm)  NO3 (ppm)  NH4 (ppm)
            150             25.984     0.1
            150             20.056     0.1
            300             8.38001    0.1
            300             8.55401    0.1
            300             6.77101    0.1
            300             6.58201    0.1
            300             6.77901    0.1
      manager Logic
        on init:
```
 sdr = 1
```
        on end_of_day:
```
  if (sw_demand > 0) then
     sdr = sw_supply / sw_demand
     if (sdr > 1) then
        sdr = 1
     endif
  else
     sdr = 1
  endif
```
      irrigation
        automatic_irrigation = off  # switch
        asw_depth = 600.0  # Depth to which ASW is calculated. (mm)
        crit_fr_asw = 0.5  # Fraction of ASW below which irrigation is applied (0-1.0)
        irrigation_efficiency = 1.0  # Efficiency of the irrigation. (0-1.0)
        default_no3_conc = 0.0  # Nitrate concentration (ppm N)
        default_nh4_conc = 0.0  # Ammonium concentration (ppm N)
        default_cl_conc = 0.0  # Chloride concentration (ppm Cl)
      fertiliser
      operations
        27/10/2004  fertiliser apply amount = 4 (kg/ha), depth = 50 (mm), type = NO3_N ()
      sorghum
      outputfile -> /Breeders/HermitageDGP04/paddock/Outputfile: filename=Hermitage AYT04.out; title=Hermitage AYT04
        variables -> /Breeders/HermitageDGP04/paddock/Outputfile/Variables
