folder Jimbour Breeders: version=32
  simulation Jimbour04
    clock
      start_date = 15/11/2004  # Select the start date of the simulation
      end_date = 31/03/2005  # Select the end date of the simulation
    summaryfile
    metfile met: filename=Jimbour Breeders.met
    area paddock
      folder Manager folder
        manager Sow SkipRow on a fixed date
          # Sowing criteria
          date = 15/11/2004  # Enter sowing date (d/m/yyyy)
          # Sowing parameters
          crop = Sorghum  # Enter name of crop to sow
          density = 10  # Enter sowing density (plants/m2)
          depth = 30  # Enter sowing depth (mm)
          cultivar = Buster  # Enter cultivar
          row_spacing = 0.75  # Enter row spacing (m)
          RowConfiguration = solid  # Enter skip row configuration
          ftn = 0.25  # Enter Fertile Tiller No.
          on start_of_day:
```
     if (biomass > 0) then
         harvIndx = yield / biomass
      else
         harvIndx = 0
      endif



      if (day > 152) then
        current_season = year
      else
        current_season = year -1
      endif

            if (paddock_is_fallow() = 1 and today = date('[date]')) then
              season = current_season
              SowDay = day
               SowYear = year
ftn = 0

              [crop] sow population =[density], sowing_depth = [depth], cultivar = [cultivar], row_spacing = [row_spacing], skip = [RowConfiguration], tiller_no_fertile = [ftn] ()
            endif
            if (paddock_is_fallow() = 0) then
               outputfile do_output
            endif
```
        manager Harvesting rule
          # Harvesting criteria
          crop = Sorghum  # Enter name of crop to harvest when ripe
          on end_of_day:
```
           if [crop].StageName = 'harvest_ripe' or [crop].plant_status = 'dead' then
              [crop]  harvest
              [crop]  end_crop
           endif
```
      soil Jimbour2004: LocalName=Jimbour; Site=Jimbour; Region=Darling Downs
        SoilType = JimbourBlack  # Soil description
        NearestTown = Unknown
        NaturalVegetation = Unknown
        InitWater Initial water
          PercentMethod: Percent=1.00; Distributed=Filled from top
        Water
          Layer:
            Thickness (mm)  BD (g/cc)  AirDry (mm/mm)  LL15 (mm/mm)  DUL (mm/mm)  SAT (mm/mm)
            150             1.070      0.220           0.320         0.520        0.570
            150             1.080      0.220           0.320         0.510        0.560
            300             1.080      0.230           0.330         0.510        0.560
            300             1.070      0.230           0.330         0.510        0.560
            300             1.080      0.230           0.330         0.510        0.560
            300             1.130      0.260           0.370         0.500        0.550
            300             1.170      0.270           0.380         0.480        0.530
          SoilCrop Sorghum
            Layer:
              Thickness (mm)  LL (mm/mm)  KL (/day)  XF (0-1)
              150             0.320       0.070      1
              150             0.320       0.070      1
              300             0.330       0.070      1
              300             0.330       0.050      1
              300             0.330       0.050      1
              300             0.370       0.040      1
              300             0.380       0.040      1
        SoilWat: SummerCona=3.5; SummerU=6; SummerDate=1-Nov; WinterCona=3.5; WinterU=6; WinterDate=1-Apr; DiffusConst=40; DiffusSlope=16; Salb=0.11; Cn2Bare=85; CnRed=0.8; CnCov=0.2
          Layer:
            Thickness (mm)  SWCON (0-1)
            150             0
            150             0
            300             0
            300             0
            300             0
            300             0
            300             0
        SoilOrganicMatter: RootCn=45; RootWt=1000; SoilCn=14.5; EnrACoeff=7.4; EnrBCoeff=0.2
          Layer:
            Thickness (mm)  OC (Total %)  FBiom (0-1)  FInert (0-1)
            150             1.570         0.050        0.390
            150             0.450         0.020        0.470
            300             0.320         0.010        0.520
            300             0.290         0.010        0.620
            300             0.230         0.010        0.740
            300             0.270         0.010        0.830
            300             0.300         0.010        0.930
        Analysis
          Layer:
            Thickness (mm)  PH (1:5 water)
            150             7.600
            150             8
            300             8.200
            300             8.400
            300             8.400
            300             8.300
            300             8.300
        Sample Initial nitrogen
          Layer:
            Thickness (mm)  NO3 (ppm)  NH4 (ppm)
            150             20.914     0.100
            150             34.151     0.100
            300             13.679     0.100
            300             8.396      0.100
            300             5.283      0.100
            300             1.981      0.100
            300             7.358      0.100
      manager Logic
        on init:
```
 sdr = 1
```
        on end_of_day:
```
  if (sw_demand > 0) then
     sdr = sw_supply / sw_demand
     if (sdr > 1) then
        sdr = 1
     endif
  else
     sdr = 1
  endif
```
      irrigation
        automatic_irrigation = off  # switch
        asw_depth = 600  # Depth to which ASW is calculated. (mm)
        crit_fr_asw = 0.5  # Fraction of ASW below which irrigation is applied (0-1.0)
        irrigation_efficiency = 1  # Efficiency of the irrigation. (0-1.0)
        default_no3_conc = 0  # Nitrate concentration (ppm N)
        default_nh4_conc = 0  # Ammonium concentration (ppm N)
        default_cl_conc = 0  # Chloride concentration (ppm Cl)
      fertiliser
      operations
        15/11/2004  fertiliser apply amount = 4 (kg/ha), depth = 50 (mm), type = NO3_N ()
      outputfile: filename=Jimbour04.out; title=Jimbour04
        variables
          variable:
            dd/mm/yyyy as date  # Date (dd/mm/yyyy)
            DaysAfterSowing  # Days after sowing
            sw_dep()
            ll15_dep()
            dul_dep()
            WaterSD
            Biomass  # Total above-ground biomass
            yield
            lai
            GrainNo
            stage
            biomass_wt  # Total above-ground biomass
            GrainGreenWt  # Live grain dry weight
            RachisGreenWt  # Live rachis dry weight
            StemGreenWt  # Stem dry weight
            GrainSize  # 1000 grain weight
            LeafSenescedWt  # Senesced leaf dry weight
            TillerNoFertile
      sorghum
