folder Jimbour: version=32
  shared
  shared
  shared
  shared
  simulation Jimbour05
    clock
      start_date = 1/12/2005  # Select the start date of the simulation
      end_date = 30/04/2006  # Select the end date of the simulation
    summaryfile
    metfile met: filename=Jimbour.met
    area paddock
      folder Manager folder
        manager Sow SkipRow on a fixed date
          # Sowing criteria
          date = 12/12/2005  # Enter sowing date (d/m/yyyy)
          # Sowing parameters
          crop = Sorghum  # Enter name of crop to sow
          density = 10.1  # Enter sowing density (plants/m2)
          depth = 30  # Enter sowing depth (mm)
          cultivar = Buster  # Enter cultivar
          row_spacing = 0.75  # Enter row spacing (m)
          RowConfiguration = solid  # Enter skip row configuration
          ftn = 0.64  # Enter Fertile Tiller No.
          on start_of_day:
```
    if (biomass > 0) then
         harvIndx = yield / biomass
      else
         harvIndx = 0
      endif



      if (day > 152) then
        current_season = year
      else
        current_season = year -1
      endif

            if (paddock_is_fallow() = 1 and today = date('[date]')) then
              season = current_season
              SowDay = day
               SowYear = year
ftn = 0

              [crop] sow population =[density], sowing_depth = [depth], cultivar = [cultivar], row_spacing = [row_spacing], skip = [RowConfiguration], tiller_no_fertile = [ftn] ()
            endif
            if (paddock_is_fallow() = 0) then
               outputfile do_output
            endif
```
        manager Harvesting rule
          # Harvesting criteria
          crop = Sorghum  # Enter name of crop to harvest when ripe
          on end_of_day:
```
           if [crop].StageName = 'harvest_ripe' or [crop].plant_status = 'dead' then
              [crop]  harvest
              [crop]  end_crop
           endif
```
      soil Jimbour (avg): LocalName=Jimbour; Site=Jimbour; Region=Darling Downs
        SoilType = Jimbour(avg)  # Soil description
        NearestTown = Unknown
        NaturalVegetation = Unknown
        InitWater Initial water
          PercentMethod: Percent=0.74; Distributed=Filled from top
        Water
          Layer:
            Thickness (mm)  BD (g/cc)  AirDry (mm/mm)  LL15 (mm/mm)  DUL (mm/mm)  SAT (mm/mm)
            150             1.150      0.170           0.220         0.450        0.540
            150             1.170      0.210           0.220         0.440        0.530
            300             1.160      0.240           0.250         0.440        0.530
            300             1.200      0.260           0.270         0.430        0.520
            300             1.220      0.300           0.310         0.420        0.510
            300             1.250      0.320           0.330         0.410        0.500
            300             1.250      0.320           0.340         0.410        0.500
          SoilCrop Sorghum
            Layer:
              Thickness (mm)  LL (mm/mm)  KL (/day)  XF (0-1)
              150             0.220       0.080      1.000
              150             0.220       0.080      1.000
              300             0.250       0.080      1.000
              300             0.270       0.080      1.000
              300             0.310       0.060      1.000
              300             0.330       0.040      1.000
              300             0.340       0.020      1.000
        SoilWat: SummerCona=3.5; SummerU=6; SummerDate=1-Nov; WinterCona=3.5; WinterU=6; WinterDate=1-Apr; DiffusConst=88; DiffusSlope=35.4; Salb=0.13; Cn2Bare=91; CnRed=20; CnCov=0.8
          Layer:
            Thickness (mm)  SWCON (0-1)
            150             0.500
            150             0.500
            300             0.500
            300             0.500
            300             0.500
            300             0.500
            300             0.500
        SoilOrganicMatter: RootCn=30; RootWt=1500; SoilCn=12.5; EnrACoeff=7.4; EnrBCoeff=0.2
          Layer:
            Thickness (mm)  OC (Total %)  FBiom (0-1)  FInert (0-1)
            150             1.240         0.020        0.600
            150             1.250         0.010        0.800
            300             1.100         0.010        0.900
            300             0.710         0.010        1
            300             0.340         0.010        1
            300             0.260         0.010        1
            300             1.640         0.010        1
        Analysis
          Layer:
            Thickness (mm)  PH (1:5 water)
            150             7.150
            150             7.900
            300             8.250
            300             8.400
            300             8.350
            300             8.300
            300             8.400
        Sample Initial nitrogen
          Layer:
            Thickness (mm)  NO3 (ppm)  NH4 (ppm)
            150             138.065    0.100
            150             18.385     0.100
            300             20.387     0.100
            300             19.278     0.100
            300             4.272      0.100
            300             0          0.100
            300             0          0.100
      manager Logic
        on end_of_day:
```
  if (sw_demand > 0) then
     sdr = sw_supply / sw_demand
     if (sdr > 1) then
        sdr = 1
     endif
  else
     sdr = 1
  endif
```
      outputfile: filename=Jimbour05.out; title=Jimbour05
        variables
          variable:
            dd/mm/yyyy as date  # Date (dd/mm/yyyy)
            DaysAfterSowing  # Days after sowing
            sw_dep()
            ll15_dep()
            dul_dep()
            WaterSD
            Biomass  # Total above-ground biomass
            yield
            lai
            GrainNo
            stage
            biomass_wt  # Total above-ground biomass
            GrainGreenWt  # Live grain dry weight
            RachisGreenWt  # Live rachis dry weight
            StemGreenWt  # Stem dry weight
            GrainSize  # 1000 grain weight
            LeafSenescedWt  # Senesced leaf dry weight
            LeafGreenWt  # Live leaf dry weight
            TillerNoFertile
      sorghum
