folder Jimbour AYT 2008: version=19
  simulation Jimbour_AYT_2008
    clock
      start_date = 1/09/2008  # Select the start date of the simulation
      end_date = 28/02/2009  # Select the end date of the simulation
    summaryfile: filename=Sorghum_Jimbour_AYT_2008_Buster.sum
    metfile met: filename=Jimbour AYT 2008.met
    area paddock
      folder Manager folder
        manager Sow SkipRow on a fixed date
          category =  # Sowing criteria
          date = 30/09/2008  # Enter sowing date (d/m/yyyy)
          category =  # Sowing parameters
          crop = Sorghum  # Enter name of crop to sow
          density = 5.5  # Enter sowing density (plants/m2)
          depth = 30  # Enter sowing depth (mm)
          cultivar = Buster  # Enter cultivar
          row_spacing = 1  # Enter row spacing (m)
          RowConfiguration = solid  # Enter skip row configuration
          ftn = 1.15  # Enter Fertile Tiller No.
          on start_of_day:
```
            if (paddock_is_fallow() = 1 and today = date('[date]')) then
              [crop] sow plants =[density], sowing_depth = [depth], cultivar = [cultivar], row_spacing = [row_spacing], skip = [RowConfiguration], tiller_no_fertile = [ftn] ()
            endif
            if (paddock_is_fallow() = 0) then
               outputfile do_output
            endif
```
        manager Harvesting rule
          category =  # Harvesting criteria
          crop = Sorghum  # Enter name of crop to harvest when ripe
          on end_of_day:
```
           if [crop].StageName = 'harvest_ripe' or [crop].plant_status = 'dead' then
              [crop]  harvest
              [crop]  end_crop
           endif
```
      soil Rondfieldt: Site=Jimbour; Region=Darling Downs; LocalName=Jimbour; SoilType=Jimbour; NearestTown=Unknown; NaturalVegetation=Unknown; Cona=3.5; DiffusConst=88; DiffusSlope=35.4; U=6; Salb=0.13; Cn2Bare=91; CnRed=20; CnCov=0.8; CnCanopyFact=0.8; RootCn=30; RootWt=1500; SoilCn=12.5; EnrACoeff=7.4; EnrBCoeff=0.2
        profile
          layer:
            thickness  bd    ll15  airdry  dul   sat   sw    swcon  oc    ph    fbiom  finert  ll Sorghum  kl Sorghum  xf Sorghum
            150        1.11  0.24  0.19    0.5   0.55  0.5   0.5    2.11  7.96  0.04   0.4     0.24        0.08        1
            150        1.08  0.24  0.23    0.51  0.56  0.51  0.5    1.24  8.47  0.02   0.5     0.24        0.08        1
            300        1.09  0.27  0.26    0.51  0.56  0.51  0.5    1.25  8.74  0.02   0.5     0.27        0.08        1
            300        1.12  0.29  0.28    0.5   0.55  0.5   0.5    1.1   8.74  0.02   0.6     0.29        0.08        1
            300        1.15  0.33  0.32    0.49  0.54  0.49  0.5    0.71  8.38  0.01   0.6     0.33        0.06        1
            300        1.17  0.35  0.34    0.48  0.53  0.48  0.5    0.34  8.44  0.01   0.7     0.35        0.04        1
            300        1.22  0.36  0.34    0.46  0.51  0.46  0.5    0.26  8.54  0.01   0.8     0.36        0.02        1
        InitWater
          profile
            layer:
              thickness  sw
              150        0.474
              150        0.51
              300        0.486
              300        0.479
              300        0.437
              300        0.397
              300        0.386
        InitNitrogen
          profile
            layer:
              thickness  no3      nh4
              150        12.1743  4.86973
              150        12.1743  4.86973
              300        12.1743  4.86973
              300        12.1743  4.86973
              300        12.1743  4.86973
              300        12.1743  4.86973
              300        12.1743  4.86973
      irrigation
        automatic_irrigation = off  # switch
        asw_depth = 1800  # Depth to which ASW is calculated. (mm)
        crit_fr_asw = 1  # Fraction of ASW below which irrigation is applied (0-1.0)
        irrigation_efficiency = 1  # Efficiency of the irrigation. (0-1.0)
        default_no3_conc = 0  # Nitrate concentration (ppm N)
        default_nh4_conc = 0  # Ammonium concentration (ppm N)
        default_cl_conc = 0  # Chloride concentration (ppm Cl)
      fertiliser
      operations
      outputfile: events=My Variables Events
        variables
          variables: dd/mm/yyyy as date, DaysAfterSowing, sw_dep(), ll15_dep(), dul_dep(), WaterSD, Biomass, yield, lai, GrainNo, stage, biomass_wt, GrainGreenWt, RachisGreenWt, StemGreenWt, GrainSize, LeafSenescedWt, LeafGreenWt, TillerNoFertile
      sorghum
