folder Simulations: version=32
  simulation Kilcummin2007
    metfile met: filename=Kilcummin 2007.met
    clock
      start_date = 14/1/2008  # Select the start date of the simulation
      end_date = 2/7/2008  # Select the end date of the simulation
    summaryfile
    area paddock
      folder Manager folder
        manager Sow on a fixed date
          # Sowing criteria
          date = 4/02/2008  # Enter sowing date (d/m/yyyy)
          # Sowing parameters
          crop = Sorghum  # Enter name of crop to sow
          density = 3.5  # Enter sowing density (plants/m2)
          depth = 30  # Enter sowing depth (mm)
          cultivar = Buster  # Enter cultivar
          row_spacing = 1  # Enter row spacing (mm)
          RowConfiguration = solid  # Enter skip row configuration
          ftn = 0.6  # Enter Fertile Tiller Number
          on start_of_day:
```
if (today = date('[date]') then
    if (day > 152) then
        season  = year
    else
        season  = year -1
    endif

    SowDay = day
     SowYear = year
    [crop] sow population =[density], sowing_depth = [depth], cultivar = [cultivar], row_spacing = [row_spacing], skip = [RowConfiguration], tiller_no_fertile = [ftn]
endif
```
        manager Harvesting rule
          # Harvesting criteria
          crop = sorghum  # Enter name of crop to harvest when ripe
          on end_of_day:
```
           if [crop].StageName = 'harvest_ripe' or [crop].plant_status = 'dead' then
              [crop]  harvest
              [crop]  end_crop
           endif
```
        manager Reset water, nitrogen and surfaceOM on fixed date
          # When should a reset be done
          reset_date = 11-mar  # Enter date of reset (dd-mmm)
          # Reset details
          soilmodule = Moranbah  # Name of your soil module
          surfaceommodule = surface organic matter  # Name of your surface organic matter module
          resetWater = yes  # Reset soil water?
          resetNitrogen = no  # Reset soil nitrogen?
          resetSurfaceOM = no  # Reset surface organic matter?
          on start_of_day:
```
         if (today = date('[reset_date]')) then
            resetWater = '[resetWater]'
            resetNitrogen  = '[resetNitrogen]'
            resetSurfaceOM = '[resetSurfaceOM]'
            if (resetWater = 'yes') then
                '[soilmodule] Water' reset
            endif
            if (resetNitrogen = 'yes') then
                '[soilmodule] Nitrogen' reset
            endif
            if (resetSurfaceOM = 'yes') then
                '[surfaceommodule]' reset
            endif
            act_mods reseting
         endif
```
      fertiliser
      surfaceom surface organic matter
        PoolName = wheat  # Organic Matter pool name
        type = wheat  # Organic Matter type
        mass = 1000  # Initial surface residue (kg/ha)
        cnr = 80  # C:N ratio of initial residue
        standing_fraction = 0  # Fraction of residue standing
      soil Moranbah: LocalName=Moranbah; Site=Moranbah; Region=Central Queensland
        SoilType = Kilcummin  # Soil description
        NearestTown = Unknown
        NaturalVegetation = Unknown
        InitWater Initial water
          PercentMethod: Percent=1.00; Distributed=Filled from top
        Water
          Layer:
            Thickness (mm)  BD (g/cc)  AirDry (mm/mm)  LL15 (mm/mm)  DUL (mm/mm)  SAT (mm/mm)
            150             1.29       0.22            0.27          0.43         0.48
            150             1.31       0.24            0.27          0.43         0.48
            300             1.32       0.28            0.29          0.42         0.47
            300             1.32       0.32            0.32          0.42         0.47
            300             1.32       0.35            0.35          0.42         0.47
            300             1.32       0.38            0.38          0.42         0.47
            300             1.33       0.39            0.39          0.42         0.47
          SoilCrop Sorghum
            Layer:
              Thickness (mm)  LL (mm/mm)  KL (/day)  XF (0-1)
              150             0.27        0.07       1
              150             0.27        0.06       1
              300             0.29        0.06       1
              300             0.32        0.06       1
              300             0.35        0.05       1
              300             0.38        0.05       1
              300             0.39        0.04       1
        SoilWat: SummerCona=3.5; SummerU=6; SummerDate=1-Nov; WinterCona=3.5; WinterU=6; WinterDate=1-Apr; DiffusConst=88; DiffusSlope=35.4; Salb=0.13; Cn2Bare=91; CnRed=20; CnCov=0.8
          Layer:
            Thickness (mm)  SWCON (0-1)
            150             0.5
            150             0.5
            300             0.5
            300             0.5
            300             0.5
            300             0.5
            300             0.5
        SoilOrganicMatter: RootCn=30; RootWt=1500; SoilCn=12.5; EnrACoeff=7.4; EnrBCoeff=0.2
          Layer:
            Thickness (mm)  OC (Total %)  FBiom (0-1)  FInert (0-1)
            150             2.05          0.04         0.4
            150             1.02          0.02         0.6
            300             0.51          0.02         0.8
            300             0.26          0.02         1
            300             0.13          0.01         1
            300             0.13          0.01         1
            300             0.13          0.01         1
        Analysis
          Layer:
            Thickness (mm)  PH (1:5 water)
            150             8.7
            150             9.2
            300             8.6
            300             8
            300             7.9
            300             5.5
            300             5
        Sample Initial nitrogen
          Layer:
            Thickness (mm)  NO3 (ppm)  NH4 (ppm)
            150             2.1        0.1
            150             1.5        0.1
            300             3          0.1
            300             9.7        0.1
            300             36         0.1
            300             38.7       0.1
            300             32.5       0.1
      manager Calculator
        on end_of_day:
```
if (paddock_is_fallow() = 0) then
   outputfile do_output
endif
```
      sorghum
      outputfile: filename=Kilcummin2007.out; title=Kilcummin2007; events=My Variables Events
        variables
          variable:
            dd/mm/yyyy as date  # Date (dd/mm/yyyy)
            DaysAfterSowing  # Days after sowing
            sw_dep()
            ll15_dep()
            dul_dep()
            WaterSD
            Biomass  # Total above-ground biomass
            yield
            lai
            GrainNo
            stage
            biomass_wt  # Total above-ground biomass
            GrainGreenWt  # Live grain dry weight
            RachisGreenWt  # Live rachis dry weight
            StemGreenWt  # Stem dry weight
            GrainSize  # 1000 grain weight
            LeafSenescedWt  # Senesced leaf dry weight
            LeafGreenWt  # Live leaf dry weight
            TillerNoFertile
