folder Simulations: version=37; creator=Apsim 7.9-r4040
  folder Sowing date trial
    simulation kale_1Oct06_264
      metfile met: filename=%apsim%\Examples\MetFiles\lincoln.met
      micromet
        soilalbedo = 0.23
        a_interception = 0
        b_interception = 0
        c_interception = 0
        d_interception = 0
      clock
        start_date = 30/09/2006  # Enter the start date of the simulation
        end_date = 1/8/2007  # Enter the end date of the simulation
      summaryfile
      area paddock
        folder Manager folder
          operations
            1/10/2006  fertiliser apply amount=200 (kg/ha), type=cropDAP (), depth=10 (mm)
            18/10/2006  irrigation apply amount =5 (mm)
            6/11/2006  irrigation apply amount =5 (mm)
            30/11/2006  fertiliser apply amount=100 (kg/ha), type=urea_N (), depth=10 (mm)
            19/12/2006  irrigation apply amount =25 (mm)
            28/12/2006  fertiliser apply amount=68(kg/ha), type=urea_N (), depth=10 (mm)
            15/01/2007  irrigation apply amount =25 (mm)
            29/01/2007  fertiliser apply amount=60(kg/ha), type=urea_N (), depth=10 (mm)
            2/02/2007  irrigation apply amount =40 (mm)
            5/02/2007  irrigation apply amount =10 (mm)
            19/02/2007  irrigation apply amount =60 (mm)
            13/03/2007  irrigation apply amount =30 (mm)
            5/04/2007  irrigation apply amount =40 (mm)
          irrigation
            automatic_irrigation = off
            asw_depth = 600  # Depth to which ASW is calculated. (mm)
            crit_fr_asw = 0.5  # Fraction of ASW below which irrigation is applied (0-1.0)
            irrigation_efficiency = 1  # Efficiency of the irrigation. (0-1.0)
            irrigation_allocation = off  # Allocation limits
            allocation = 0  # Allocation in ML
            default_no3_conc = 0  # Nitrate concentration (ppm N)
            default_nh4_conc = 0  # Ammonium concentration (ppm N)
            default_cl_conc = 0  # Chloride concentration (ppm Cl)
            default_no3_conc = 0  # Nitrate concentration (ppm N)
            default_nh4_conc = 0  # Ammonium concentration (ppm N)
            default_cl_conc = 0  # Chloride concentration (ppm Cl)
          manager End crop on a fixed date
            # Harvesting criteria
            crop = kale2  # Enter name of crop to harvest when ripe
            date = 29-May-2007  # Enter ending date (dd-mmm)
            on end_of_day:
```
        if (today = date('[date]') then
              [crop]  end_crop
        endif
```
            on start_of_day:
```
Final_harvest = 0

        if (today = date('[date]') then
              Final_harvest = 1
        endif
```
          manager Sow on a fixed date
            # Sowing criteria
            date = 1-oct  # Enter sowing date (dd-mmm)
            # Sowing parameters
            crop = kale2  # Enter name of crop to sow
            density = 15  # Enter sowing density (plants/m2)
            depth = 90  # Enter sowing depth (mm)
            cultivar = grunner  # Enter cultivar
            class =  # Enter crop growth class
            row_spacing = 150  # Enter row spacing (mm)
            on start_of_day:
```
        if (today = date('[date]') then
              [crop] sow population =[density], depth = [depth], cultivar = [cultivar], MaxCover = 1.0, BudNumber = 1, row_spacing = [row_spacing], crop_class = [class]
         endif
```
        fertiliser
          ini: filename=%apsim%\Model\Fertiliser.xml
        surfaceom surface organic matter
          PoolName = wheat  # Organic Matter pool name
          type = wheat  # Organic Matter type
          mass = 0  # Initial surface residue (kg/ha)
          cnr = 0  # C:N ratio of initial residue
          standing_fraction = 0  # Fraction of residue standing
        Soil Templeton_siltloam: Latitude=0; Longitude=0; YearOfSampling=0
          InitialWater Initial water: FractionFull=1; PercentMethod=FilledFromTop
          Water
            Thickness  BD   AirDry  LL15  DUL   SAT
            100        1.3  0.04    0.08  0.31  0.44
            200        1.3  0.055   0.07  0.3   0.44
            200        1.3  0.07    0.07  0.28  0.44
            200        1.3  0.09    0.09  0.31  0.44
            200        1.3  0.11    0.11  0.3   0.44
            100        1.3  0.16    0.16  0.28  0.44
            300        1.3  0.15    0.15  0.3   0.44
            200        1.3  0.12    0.12  0.34  0.44
            300        1.3  0.12    0.12  0.34  0.44
            SoilCrop canola: LL=[0.08, 0.07, 0.07, 0.09, 0.11, 0.16, 0.15, 0.12, 0.12]; KL=[0.06, 0.06, 0.06, 0.06, 0.06, 0.04, 0.03, 0.02, 0.01]; XF=[1, 1, 1, 1, 1, 1, 1, 1, 1]
            SoilCrop Kale: LL=[0.08, 0.07, 0.07, 0.09, 0.11, 0.16, 0.15, 0.12, 0.12]; KL=[0.06, 0.06, 0.06, 0.06, 0.06, 0.06, 0.06, 0.06, 0.06]; XF=[1, 1, 1, 1, 1, 1, 1, 1, 1]
            SoilCrop Kale2: LL=[0.08, 0.07, 0.07, 0.09, 0.11, 0.16, 0.15, 0.12, 0.12]; KL=[0.06, 0.06, 0.06, 0.06, 0.06, 0.06, 0.06, 0.06, 0.06]; XF=[1, 1, 1, 1, 1, 1, 1, 1, 1]
          SoilWater: SummerCona=3.5; SummerU=6; SummerDate=1-Nov; WinterCona=3.5; WinterU=6; WinterDate=1-Apr; DiffusConst=88; DiffusSlope=35.4; Salb=0.18; CN2Bare=68; CNRed=20; CNCov=0.8; Thickness=[100, 200, 200, 200, 200, 100, 300, 200, 300]; SWCON=[0.55, 0.55, 0.55, 0.55, 0.55, 0.55, 0.55, 0.55, 0.55]
          SoilOrganicMatter: RootCN=30; RootWt=3000; SoilCN=11.5; EnrACoeff=7.4; EnrBCoeff=0.2
            Thickness  OC    FBiom  FInert
            100        4     0.025  0.3
            200        1.47  0.025  0.4
            200        0.6   0.015  0.75
            200        0.4   0.01   0.9
            200        0.2   0.01   0.96
            100        0.2   0.01   1
            300        0.2   0.01   1
            200        0.2   0.01   1
            300        0.2   0.01   1
          Analysis: Thickness=[100, 200, 200, 200, 200, 100, 300, 200, 300]; PH=[6.6, 6.2, 5.7, 5.5, 5.5, 5.5, 5.5, 5.5, 5.5]
          Sample Initial nitrogen: NO3Units=ppm; NH4Units=ppm; SWUnits=Volumetric; OCUnits=Total; PHUnits=Water
            Thickness  NO3       NH4
            100        26.1539   0.1
            200        41.5385   0.1
            200        9.99997   0.1
            200        1.15384   0.1
            200        0.769229  0.1
            100        0.76923   0.1
            300        0.25641   0.1
            200        0.384615  0.1
            300        0.25641   0.1
        kale2
        outputfile: filename=kale_1Oct06_264.out; title=kale_1Oct06_264
          variables
            variable:
              dd/mmm/yyyy
              LeafLAI
              LeafNodeNo
              PhenologyThermalTimeValue
              PhenologyCurrentPhaseName
              PhenologyCurrentStageName
              LeafLiveWt
              StemLiveWt
              StemDeadWt
              StemLiveN
              StemDeadN
              LeafDeadN
              TotalLiveWt
              RootLiveWt
              AboveGroundDeadWt
              LeafDeadWt
              Biomass
              LeafLiveN
              stagecode
              RueAct
              LeafAboveGroundPotentialDMAllocation
              ArbitratorDMSupply
              LeafDMDemand
              StemDMDemand
              DMDemand
              TotalLiveN
              RootDMDemand
              StructureMainStemNodeNo
              TopsDM
          events Reporting Frequency: event=Daily
        manager ModValues
          on init:
```
DMDemand = 0
TopsDM = 0
```
          on end_of_day:
```
TopsDM = Kale2.LeafLiveWt + Kale2.StemLiveWt
DMDemand =DMDemand + kale2.StemDMDemand + Kale2.LeafDMDemand
```
    simulation kale_3Nov06_264 -> /Simulations/Sowing date trial/kale_1Oct06_264
      area paddock -> /Simulations/Sowing date trial/kale_1Oct06_264/paddock
        folder Manager folder
          irrigation: same as Sowing date trial.kale_1Oct06_264.paddock.Manager folder.Irrigation
          manager End crop on a fixed date: same as Sowing date trial.kale_1Oct06_264.paddock.Manager folder.End crop on a fixed date
          operations
            18/10/2006  irrigation apply amount =5 (mm)
            3/11/2006  fertiliser apply amount=200 (kg/ha), type=cropDAP (), depth=10 (mm)
            6/11/2006  irrigation apply amount =5 (mm)
            19/12/2006  irrigation apply amount =25 (mm)
            28/12/2006  fertiliser apply amount=100(kg/ha), type=urea_N (), depth=10 (mm)
            15/01/2007  irrigation apply amount =25 (mm)
            29/01/2007  fertiliser apply amount=60(kg/ha), type=urea_N (), depth=10 (mm)
            2/02/2007  irrigation apply amount =40 (mm)
            5/02/2007  irrigation apply amount =10 (mm)
            5/02/2007  fertiliser apply amount=68(kg/ha), type=urea_N (), depth=10 (mm)
            19/02/2007  irrigation apply amount =60 (mm)
            13/03/2007  irrigation apply amount =30 (mm)
            5/04/2007  irrigation apply amount =40 (mm)
          manager Sow on a fixed date
            # Sowing criteria
            date = 3-nov  # Enter sowing date (dd-mmm)
            # Sowing parameters
            crop = kale2  # Enter name of crop to sow
            density = 15  # Enter sowing density (plants/m2)
            depth = 90  # Enter sowing depth (mm)
            cultivar = grunner  # Enter cultivar
            class =  # Enter crop growth class
            row_spacing = 150  # Enter row spacing (mm)
            on start_of_day:
            script: same as in Sowing date trial.kale_1Oct06_264.paddock.Manager folder.Sow on a fixed date
        outputfile: filename=kale_3Nov06_264.out; title=kale_3Nov06_264
          variables: same as Sowing date trial.kale_1Oct06_264.paddock.outputfile.Variables
          events Reporting Frequency: event=Daily
    simulation kale_1Dec06_264 -> /Simulations/Sowing date trial/kale_1Oct06_264
      area paddock -> /Simulations/Sowing date trial/kale_1Oct06_264/paddock
        folder Manager folder
          irrigation: same as Sowing date trial.kale_1Oct06_264.paddock.Manager folder.Irrigation
          manager End crop on a fixed date: same as Sowing date trial.kale_1Oct06_264.paddock.Manager folder.End crop on a fixed date
          operations
            18/10/2006  irrigation apply amount =5 (mm)
            6/11/2006  irrigation apply amount =5 (mm)
            1/12/2006  fertiliser apply amount=200 (kg/ha), type=cropDAP (), depth=10 (mm)
            19/12/2006  irrigation apply amount =25 (mm)
            15/01/2007  irrigation apply amount =25 (mm)
            29/01/2007  fertiliser apply amount=60(kg/ha), type=urea_N (), depth=10 (mm)
            2/02/2007  irrigation apply amount =40 (mm)
            5/02/2007  irrigation apply amount =10 (mm)
            5/02/2007  fertiliser apply amount=100(kg/ha), type=urea_N (), depth=10 (mm)
            19/02/2007  irrigation apply amount =60 (mm)
            13/03/2007  irrigation apply amount =30 (mm)
            21/03/2007  fertiliser apply amount=68(kg/ha), type=urea_N (), depth=10 (mm)
            5/04/2007  irrigation apply amount =40 (mm)
          manager Sow on a fixed date
            # Sowing criteria
            date = 1-dec  # Enter sowing date (dd-mmm)
            # Sowing parameters
            crop = kale2  # Enter name of crop to sow
            density = 15  # Enter sowing density (plants/m2)
            depth = 90  # Enter sowing depth (mm)
            cultivar = grunner  # Enter cultivar
            class =  # Enter crop growth class
            row_spacing = 150  # Enter row spacing (mm)
            on start_of_day:
            script: same as in Sowing date trial.kale_1Oct06_264.paddock.Manager folder.Sow on a fixed date
        outputfile: filename=kale_1Dec06_264.out; title=kale_1Dec06_264
          variables: same as Sowing date trial.kale_1Oct06_264.paddock.outputfile.Variables
          events Reporting Frequency: event=Daily
  folder Sowing date by N trial
    simulation kale_1Oct06_nil
      metfile met: filename=%apsim%\Examples\MetFiles\lincoln.met
      micromet -> /Simulations/Sowing date trial/kale_1Oct06_264/Micromet
      clock
        start_date = 1/09/2006  # Enter the start date of the simulation
        end_date = 1/8/2007  # Enter the end date of the simulation
      summaryfile
      area paddock
        folder Manager folder
          operations
            18/10/2006  irrigation apply amount =5 (mm)
            6/11/2006  irrigation apply amount =10 (mm)
            24/11/2006  irrigation apply amount =25 (mm)
            19/12/2006  irrigation apply amount =25 (mm)
            15/01/2007  irrigation apply amount =25 (mm)
            2/02/2007  irrigation apply amount =30 (mm)
            5/02/2007  irrigation apply amount =10 (mm)
            19/02/2007  irrigation apply amount =60 (mm)
            13/03/2007  irrigation apply amount =30 (mm)
            5/04/2007  irrigation apply amount =40 (mm)
          irrigation: same as Sowing date trial.kale_1Oct06_264.paddock.Manager folder.Irrigation
          manager End crop on a fixed date
            # Harvesting criteria
            crop = kale2  # Enter name of crop to harvest when ripe
            date = 5-Jun-2007  # Enter ending date (dd-mmm)
            on end_of_day:
```
        if (today = date('[date]') then
              [crop]  end_crop
        endif
```
            on start_of_day:
```
Final_harvest = 0

        if (today = date('[date]') then
              Final_harvest = 1
        endif
```
          manager Sow on a fixed date
            # Sowing criteria
            date = 15-oct  # Enter sowing date (dd-mmm)
            # Sowing parameters
            crop = kale2  # Enter name of crop to sow
            density = 15  # Enter sowing density (plants/m2)
            depth = 90  # Enter sowing depth (mm)
            cultivar = grunner  # Enter cultivar
            class =  # Enter crop growth class
            row_spacing = 150  # Enter row spacing (mm)
            on start_of_day:
            script: same as in Sowing date trial.kale_1Oct06_264.paddock.Manager folder.Sow on a fixed date
        fertiliser
          ini: filename=%apsim%\Model\Fertiliser.xml
        surfaceom surface organic matter
          PoolName = wheat  # Organic Matter pool name
          type = wheat  # Organic Matter type
          mass = 0  # Initial surface residue (kg/ha)
          cnr = 80  # C:N ratio of initial residue
          standing_fraction = 0  # Fraction of residue standing
        Soil Templeton_siltloam: Latitude=0; Longitude=0
          InitialWater Initial water: FractionFull=1.00; PercentMethod=FilledFromTop
          Water
            Thickness  BD   AirDry  LL15  DUL   SAT
            100        1.3  0.04    0.08  0.31  0.44
            200        1.3  0.055   0.07  0.3   0.44
            200        1.3  0.07    0.07  0.28  0.44
            200        1.3  0.09    0.09  0.31  0.44
            200        1.3  0.11    0.11  0.3   0.44
            100        1.3  0.16    0.16  0.28  0.44
            300        1.3  0.15    0.15  0.3   0.44
            200        1.3  0.12    0.12  0.34  0.44
            300        1.3  0.12    0.12  0.34  0.44
            SoilCrop canola: LL=[0.08, 0.07, 0.07, 0.09, 0.11, 0.16, 0.15, 0.12, 0.12]; KL=[0.06, 0.06, 0.06, 0.06, 0.06, 0.04, 0.03, 0.02, 0.01]; XF=[1, 1, 1, 1, 1, 1, 1, 1, 1]
            SoilCrop kale2: LL=[0.08, 0.07, 0.07, 0.09, 0.11, 0.16, 0.08, 0.08, 0.08]; KL=[0.06, 0.06, 0.06, 0.06, 0.06, 0.06, 0.06, 0.06, 0.06]; XF=[1, 1, 1, 1, 1, 1, 1, 1, 1]
          SoilWater: SummerCona=4; SummerU=6; SummerDate=1-Nov; WinterCona=4; WinterU=6; WinterDate=1-Apr; DiffusConst=88; DiffusSlope=35.4; Salb=0.18; CN2Bare=68; CNRed=20; CNCov=0.8; Thickness=[100, 200, 200, 200, 200, 100, 300, 200, 300]; SWCON=[0.55, 0.55, 0.55, 0.55, 0.55, 0.55, 0.55, 0.55, 0.55]
          SoilOrganicMatter: RootCN=30; RootWt=3000; SoilCN=11.5; EnrACoeff=7.4; EnrBCoeff=0.2
            Thickness  OC    FBiom  FInert
            100        2.9   0.025  0.3
            200        1.47  0.025  0.4
            200        0.6   0.015  0.75
            200        0.4   0.01   0.9
            200        0.2   0.01   0.96
            100        0.2   0.01   1
            300        0.2   0.01   1
            200        0.2   0.01   1
            300        0.2   0.01   1
          Analysis: Thickness=[100, 200, 200, 200, 200, 100, 300, 200, 300]; PH=[6.6, 6.2, 5.7, 5.5, 5.5, 5.5, 5.5, 5.5, 5.5]
          Sample Initial nitrogen
            Thickness  NO3       NH4
            100        26.1539   0.1
            200        41.5385   0.1
            200        9.99997   0.1
            200        1.15384   0.1
            200        0.769229  0.1
            100        0.76923   0.1
            300        0.25641   0.1
            200        0.384615  0.1
            300        0.25641   0.1
        kale2
        outputfile: filename=kale_1Oct06_nil.out; title=kale_1Oct06_nil
          variables: same as Sowing date trial.kale_1Oct06_264.paddock.outputfile.Variables
          events Reporting Frequency: event=Daily
        manager ModValues
          on init:
```
DMDemand = 0
TopsDM = 0
Irr = Full
Nit = 150
```
          on end_of_day:
          script: same as in Sowing date trial.kale_1Oct06_264.paddock.ModValues
    simulation kale_1Oct06_150 -> /Simulations/Sowing date by N trial/kale_1Oct06_nil
      area paddock -> /Simulations/Sowing date by N trial/kale_1Oct06_nil/paddock
        folder Manager folder
          operations
            18/10/2006  irrigation apply amount =5 (mm)
            6/11/2006  irrigation apply amount =10 (mm)
            24/11/2006  irrigation apply amount =25 (mm)
            19/12/2006  irrigation apply amount =25 (mm)
            15/01/2007  irrigation apply amount =25 (mm)
            2/02/2007  irrigation apply amount =30 (mm)
            5/02/2007  irrigation apply amount =10 (mm)
            19/02/2007  irrigation apply amount =60 (mm)
            13/03/2007  irrigation apply amount =30 (mm)
            5/04/2007  irrigation apply amount =40 (mm)
            24/10/2006  fertiliser apply amount=50(kg/ha), type=urea_N (), depth=10 (mm)
            30/11/2006  fertiliser apply amount=50(kg/ha), type=urea_N (), depth=10 (mm)
            29/12/2006  fertiliser apply amount=50(kg/ha), type=urea_N (), depth=10 (mm)
          irrigation: same as Sowing date trial.kale_1Oct06_264.paddock.Manager folder.Irrigation
          manager Sow on a fixed date -> /Simulations/Sowing date by N trial/kale_1Oct06_nil/paddock/Manager folder/Sow on a fixed date
          manager End crop on a fixed date -> /Simulations/Sowing date by N trial/kale_1Oct06_nil/paddock/Manager folder/End crop on a fixed date
        outputfile: filename=kale_1Oct06_150.out; title=kale_1Oct06_150
          variables
            variable:
              dd/mmm/yyyy
              LeafLAI
              LeafNodeNo
              PhenologyThermalTimeValue
              PhenologyCurrentPhaseName
              PhenologyCurrentStageName
              LeafLiveWt
              StemLiveWt
              StemDeadWt
              StemLiveN
              StemDeadN
              LeafDeadN
              TotalLiveWt
              RootLiveWt
              AboveGroundDeadWt
              LeafDeadWt
              Biomass
              LeafLiveN
              stagecode
              RueAct
              LeafAboveGroundPotentialDMAllocation
              ArbitratorDMSupply
              LeafDMDemand
              StemDMDemand
              DMDemand
              TotalLiveN
              RootDMDemand
              StructureMainStemNodeNo
              TopsDM
              Irr
              Nit
          events Reporting Frequency: event=Daily
        manager ModValues
          on init:
```
DMDemand = 0
TopsDM = 0
Irr = Full
Nit = 150
```
          on end_of_day:
          script: same as in Sowing date trial.kale_1Oct06_264.paddock.ModValues
    simulation kale_1Oct06_500 -> /Simulations/Sowing date by N trial/kale_1Oct06_nil
      area paddock -> /Simulations/Sowing date by N trial/kale_1Oct06_nil/paddock
        folder Manager folder
          operations
            18/10/2006  irrigation apply amount =5 (mm)
            6/11/2006  irrigation apply amount =10 (mm)
            24/11/2006  irrigation apply amount =25 (mm)
            19/12/2006  irrigation apply amount =25 (mm)
            15/01/2007  irrigation apply amount =25 (mm)
            2/02/2007  irrigation apply amount =30 (mm)
            5/02/2007  irrigation apply amount =10 (mm)
            19/02/2007  irrigation apply amount =60 (mm)
            13/03/2007  irrigation apply amount =30 (mm)
            5/04/2007  irrigation apply amount =40 (mm)
            24/10/2006  fertiliser apply amount=100(kg/ha), type=urea_N (), depth=10 (mm)
            30/11/2006  fertiliser apply amount=200(kg/ha), type=urea_N (), depth=10 (mm)
            29/12/2006  fertiliser apply amount=200(kg/ha), type=urea_N (), depth=10 (mm)
          irrigation: same as Sowing date trial.kale_1Oct06_264.paddock.Manager folder.Irrigation
          manager End crop on a fixed date -> /Simulations/Sowing date by N trial/kale_1Oct06_nil/paddock/Manager folder/End crop on a fixed date
          manager Sow on a fixed date -> /Simulations/Sowing date by N trial/kale_1Oct06_nil/paddock/Manager folder/Sow on a fixed date
        outputfile: filename=kale_1Oct06_500.out; title=kale_1Oct06_500
          variables: same as Sowing date by N trial.kale_1Oct06_150.paddock.outputfile.Variables
          events Reporting Frequency: event=Daily
        manager ModValues
          on init:
```
DMDemand = 0
TopsDM = 0
Irr = Full
Nit = 500
```
          on end_of_day:
          script: same as in Sowing date trial.kale_1Oct06_264.paddock.ModValues
    simulation kale_1Dec06_nil -> /Simulations/Sowing date by N trial/kale_1Oct06_nil
      area paddock -> /Simulations/Sowing date by N trial/kale_1Oct06_nil/paddock
        folder Manager folder
          irrigation: same as Sowing date trial.kale_1Oct06_264.paddock.Manager folder.Irrigation
          operations: same as Sowing date by N trial.kale_1Oct06_nil.paddock.Manager folder.operations
          manager End crop on a fixed date -> /Simulations/Sowing date by N trial/kale_1Oct06_nil/paddock/Manager folder/End crop on a fixed date
          manager Sow on a fixed date: same as Sowing date trial.kale_1Dec06_264.paddock.Manager folder.Sow on a fixed date
        outputfile: filename=kale_1Dec06_nil.out; title=kale_1Dec06_nil
          variables: same as Sowing date by N trial.kale_1Oct06_150.paddock.outputfile.Variables
          events Reporting Frequency: event=Daily
      manager ModValues
        on init:
```
DMDemand = 0
TopsDM = 0
Irr = Full
Nit = 0
```
        on end_of_day:
        script: same as in Sowing date trial.kale_1Oct06_264.paddock.ModValues
    simulation kale_1Dec06_150 -> /Simulations/Sowing date by N trial/kale_1Oct06_nil
      area paddock -> /Simulations/Sowing date by N trial/kale_1Oct06_nil/paddock
        folder Manager folder
          irrigation: same as Sowing date trial.kale_1Oct06_264.paddock.Manager folder.Irrigation
          operations
            18/10/2006  irrigation apply amount =5 (mm)
            6/11/2006  irrigation apply amount =10 (mm)
            24/11/2006  irrigation apply amount =25 (mm)
            19/12/2006  irrigation apply amount =25 (mm)
            15/01/2007  irrigation apply amount =25 (mm)
            2/02/2007  irrigation apply amount =30 (mm)
            5/02/2007  irrigation apply amount =10 (mm)
            19/02/2007  irrigation apply amount =60 (mm)
            13/03/2007  irrigation apply amount =30 (mm)
            5/04/2007  irrigation apply amount =40 (mm)
            21/12/2006  fertiliser apply amount=50(kg/ha), type=urea_N (), depth=10 (mm)
            5/02/2007  fertiliser apply amount=50(kg/ha), type=urea_N (), depth=10 (mm)
            21/03/2007  fertiliser apply amount=50(kg/ha), type=urea_N (), depth=10 (mm)
          manager End crop on a fixed date -> /Simulations/Sowing date by N trial/kale_1Dec06_nil/paddock/Manager folder/End crop on a fixed date
          manager Sow on a fixed date -> /Simulations/Sowing date by N trial/kale_1Dec06_nil/paddock/Manager folder/Sow on a fixed date
        outputfile: filename=kale_1Dec06_150.out; title=kale_1Dec06_150
          variables: same as Sowing date by N trial.kale_1Oct06_150.paddock.outputfile.Variables
          events Reporting Frequency: event=Daily
        manager ModValues
          on init:
```
DMDemand = 0
TopsDM = 0
Irr = Full
Nit = 150
```
          on end_of_day:
          script: same as in Sowing date trial.kale_1Oct06_264.paddock.ModValues
    simulation kale_1Dec06_500 -> /Simulations/Sowing date by N trial/kale_1Oct06_nil
      area paddock -> /Simulations/Sowing date by N trial/kale_1Oct06_nil/paddock
        folder Manager folder
          irrigation: same as Sowing date trial.kale_1Oct06_264.paddock.Manager folder.Irrigation
          operations
            18/10/2006  irrigation apply amount =5 (mm)
            6/11/2006  irrigation apply amount =10 (mm)
            24/11/2006  irrigation apply amount =25 (mm)
            19/12/2006  irrigation apply amount =25 (mm)
            15/01/2007  irrigation apply amount =25 (mm)
            2/02/2007  irrigation apply amount =30 (mm)
            5/02/2007  irrigation apply amount =10 (mm)
            19/02/2007  irrigation apply amount =60 (mm)
            13/03/2007  irrigation apply amount =30 (mm)
            5/04/2007  irrigation apply amount =40 (mm)
            21/12/2006  fertiliser apply amount=100(kg/ha), type=urea_N (), depth=10 (mm)
            5/02/2007  fertiliser apply amount=200(kg/ha), type=urea_N (), depth=10 (mm)
            21/03/2007  fertiliser apply amount=200(kg/ha), type=urea_N (), depth=10 (mm)
          manager End crop on a fixed date -> /Simulations/Sowing date by N trial/kale_1Dec06_nil/paddock/Manager folder/End crop on a fixed date
          manager Sow on a fixed date -> /Simulations/Sowing date by N trial/kale_1Dec06_nil/paddock/Manager folder/Sow on a fixed date
        outputfile: filename=kale_1Dec06_500.out; title=kale_1Dec06_500
          variables: same as Sowing date by N trial.kale_1Oct06_150.paddock.outputfile.Variables
          events Reporting Frequency: event=Daily
        manager ModValues
          on init:
```
DMDemand = 0
TopsDM = 0
Irr = Full
Nit = 500
```
          on end_of_day:
          script: same as in Sowing date trial.kale_1Oct06_264.paddock.ModValues
  folder Nitrogen trail
    simulation kale_9Nov05_500
      metfile met: filename=%apsim%\Examples\Metfiles\lincoln.met
      micromet -> /Simulations/Sowing date trial/kale_1Oct06_264/Micromet
      clock
        start_date = 8/11/2005  # Enter the start date of the simulation
        end_date = 1/08/2006  # Enter the end date of the simulation
      summaryfile
      area paddock
        fertiliser
          ini: filename=%apsim%\Model\Fertiliser.xml
        surfaceom surface organic matter
          PoolName = wheat  # Organic Matter pool name
          type = wheat  # Organic Matter type
          mass = 0  # Initial surface residue (kg/ha)
          cnr = 80  # C:N ratio of initial residue
          standing_fraction = 0  # Fraction of residue standing
        folder Manager folder
          operations
            10/11/2005  irrigation apply amount =5 (mm)
            12/12/2005  irrigation apply amount =25 (mm)
            29/12/2005  irrigation apply amount =15 (mm)
            4/01/2006  irrigation apply amount =25 (mm)
            24/01/2006  irrigation apply amount =40 (mm)
            3/02/2006  irrigation apply amount =50 (mm)
            17/02/2006  irrigation apply amount =30 (mm)
            20/04/2006  irrigation apply amount =70 (mm)
            22/11/2005  fertiliser apply amount=100(kg/ha), type=urea_N (), depth=10 (mm)
            29/12/2005  fertiliser apply amount=200(kg/ha), type=urea_N (), depth=10 (mm)
            8/02/2006  fertiliser apply amount=200(kg/ha), type=urea_N (), depth=10 (mm)
          irrigation: same as Sowing date trial.kale_1Oct06_264.paddock.Manager folder.Irrigation
          manager End crop on a fixed date
            # Harvesting criteria
            crop = kale2  # Enter name of crop to harvest when ripe
            date = 9-May-2006  # Enter ending date (dd-mmm)
            on end_of_day:
```
        if (today = date('[date]') then
              [crop]  end_crop
        endif
```
            on start_of_day:
```
Final_harvest = 0

        if (today = date('[date]') then
              Final_harvest = 1
        endif
```
          manager Sow on a fixed date
            # Sowing criteria
            date = 9-nov  # Enter sowing date (dd-mmm)
            # Sowing parameters
            crop = kale2  # Enter name of crop to sow
            density = 15  # Enter sowing density (plants/m2)
            depth = 5  # Enter sowing depth (mm)
            cultivar = grunner  # Enter cultivar
            class =  # Enter crop growth class
            row_spacing = 150  # Enter row spacing (mm)
            on start_of_day:
            script: same as in Sowing date trial.kale_1Oct06_264.paddock.Manager folder.Sow on a fixed date
        Soil Templeton_siltloam: Latitude=0; Longitude=0
          InitialWater Initial water: FractionFull=1; PercentMethod=FilledFromTop
          Water: same as Sowing date trial.kale_1Oct06_264.paddock.Templeton_siltloam.Water
          SoilWater: same as Sowing date trial.kale_1Oct06_264.paddock.Templeton_siltloam.SoilWater
          SoilOrganicMatter: same as Sowing date trial.kale_1Oct06_264.paddock.Templeton_siltloam.SoilOrganicMatter
          Analysis: Thickness=[100, 200, 200, 200, 200, 100, 300, 200, 300]; PH=[6.6, 6.2, 5.7, 5.5, 5.5, 5.5, 5.5, 5.5, 5.5]
          Sample Initial nitrogen: same as Sowing date by N trial.kale_1Oct06_nil.paddock.Templeton_siltloam.Initial nitrogen
        kale2
          ini: filename=%apsim%\Model\Kale2.xml
        outputfile: filename=kale_9Nov05_500.out; title=kale_9Nov05_500
          variables: same as Sowing date trial.kale_1Oct06_264.paddock.outputfile.Variables
          events Reporting Frequency: event=Daily
        manager ModValues
          on init:
```
DMDemand = 0
TopsDM = 0
```
          on end_of_day:
          script: same as in Sowing date trial.kale_1Oct06_264.paddock.ModValues
    simulation kale_9Nov05_250 -> /Simulations/Nitrogen trail/kale_9Nov05_500
      area paddock -> /Simulations/Nitrogen trail/kale_9Nov05_500/paddock
        folder Manager folder
          operations
            10/11/2005  irrigation apply amount =5 (mm)
            12/12/2005  irrigation apply amount =25 (mm)
            29/12/2005  irrigation apply amount =15 (mm)
            4/01/2006  irrigation apply amount =25 (mm)
            24/01/2006  irrigation apply amount =40 (mm)
            3/02/2006  irrigation apply amount =50 (mm)
            17/02/2006  irrigation apply amount =30 (mm)
            20/04/2006  irrigation apply amount =70 (mm)
            22/11/2005  fertiliser apply amount=50(kg/ha), type=urea_N (), depth=10 (mm)
            29/12/2005  fertiliser apply amount=100(kg/ha), type=urea_N (), depth=10 (mm)
            8/02/2006  fertiliser apply amount=100(kg/ha), type=urea_N (), depth=10 (mm)
          irrigation: same as Sowing date trial.kale_1Oct06_264.paddock.Manager folder.Irrigation
          manager End crop on a fixed date -> /Simulations/Nitrogen trail/kale_9Nov05_500/paddock/Manager folder/End crop on a fixed date
          manager Sow on a fixed date -> /Simulations/Nitrogen trail/kale_9Nov05_500/paddock/Manager folder/Sow on a fixed date
        kale2
        outputfile: filename=kale_9Nov05_250.out; title=kale_9Nov05_250
          variables: same as Sowing date trial.kale_1Oct06_264.paddock.outputfile.Variables
          events Reporting Frequency: event=Daily
    simulation kale_9Nov05_150 -> /Simulations/Nitrogen trail/kale_9Nov05_500
      area paddock -> /Simulations/Nitrogen trail/kale_9Nov05_500/paddock
        folder Manager folder
          operations
            10/11/2005  irrigation apply amount =5 (mm)
            12/12/2005  irrigation apply amount =25 (mm)
            29/12/2005  irrigation apply amount =15 (mm)
            4/01/2006  irrigation apply amount =25 (mm)
            24/01/2006  irrigation apply amount =40 (mm)
            3/02/2006  irrigation apply amount =50 (mm)
            17/02/2006  irrigation apply amount =30 (mm)
            20/04/2006  irrigation apply amount =70 (mm)
            22/11/2005  fertiliser apply amount=50(kg/ha), type=urea_N (), depth=10 (mm)
            29/12/2005  fertiliser apply amount=100(kg/ha), type=urea_N (), depth=10 (mm)
          irrigation: same as Sowing date trial.kale_1Oct06_264.paddock.Manager folder.Irrigation
          manager End crop on a fixed date -> /Simulations/Nitrogen trail/kale_9Nov05_500/paddock/Manager folder/End crop on a fixed date
          manager Sow on a fixed date -> /Simulations/Nitrogen trail/kale_9Nov05_500/paddock/Manager folder/Sow on a fixed date
        outputfile: filename=kale_9Nov05_150.out; title=kale_9Nov05_150
          variables: same as Sowing date trial.kale_1Oct06_264.paddock.outputfile.Variables
          events Reporting Frequency: event=Daily
        kale2
    simulation kale_9Nov05_50 -> /Simulations/Nitrogen trail/kale_9Nov05_500
      area paddock -> /Simulations/Nitrogen trail/kale_9Nov05_500/paddock
        folder Manager folder
          operations
            10/11/2005  irrigation apply amount =5 (mm)
            12/12/2005  irrigation apply amount =25 (mm)
            29/12/2005  irrigation apply amount =15 (mm)
            4/01/2006  irrigation apply amount =25 (mm)
            24/01/2006  irrigation apply amount =40 (mm)
            3/02/2006  irrigation apply amount =50 (mm)
            17/02/2006  irrigation apply amount =30 (mm)
            20/04/2006  irrigation apply amount =70 (mm)
            22/11/2005  fertiliser apply amount=50(kg/ha), type=urea_N (), depth=10 (mm)
          irrigation: same as Sowing date trial.kale_1Oct06_264.paddock.Manager folder.Irrigation
          manager End crop on a fixed date -> /Simulations/Nitrogen trail/kale_9Nov05_500/paddock/Manager folder/End crop on a fixed date
          manager Sow on a fixed date -> /Simulations/Nitrogen trail/kale_9Nov05_500/paddock/Manager folder/Sow on a fixed date
        kale2
        outputfile: filename=kale_9Nov05_50.out; title=kale_9Nov05_50
          variables: same as Sowing date trial.kale_1Oct06_264.paddock.outputfile.Variables
          events Reporting Frequency: event=Daily
        manager ModValues
          on init:
```
DMDemand = 0
TopsDM = 0
```
          on end_of_day:
          script: same as in Sowing date trial.kale_1Oct06_264.paddock.ModValues
    simulation kale_9Nov05_nil -> /Simulations/Nitrogen trail/kale_9Nov05_500
      area paddock -> /Simulations/Nitrogen trail/kale_9Nov05_500/paddock
        folder Manager folder
          operations
            10/11/2005  irrigation apply amount =5 (mm)
            12/12/2005  irrigation apply amount =25 (mm)
            29/12/2005  irrigation apply amount =15 (mm)
            4/01/2006  irrigation apply amount =25 (mm)
            24/01/2006  irrigation apply amount =40 (mm)
            3/02/2006  irrigation apply amount =50 (mm)
            17/02/2006  irrigation apply amount =30 (mm)
            20/04/2006  irrigation apply amount =70 (mm)
          irrigation: same as Sowing date trial.kale_1Oct06_264.paddock.Manager folder.Irrigation
          manager End crop on a fixed date -> /Simulations/Nitrogen trail/kale_9Nov05_500/paddock/Manager folder/End crop on a fixed date
          manager Sow on a fixed date -> /Simulations/Nitrogen trail/kale_9Nov05_500/paddock/Manager folder/Sow on a fixed date
        kale2
        outputfile: filename=kale_9Nov05_nil.out; title=kale_9Nov05_nil
          variables: same as Sowing date trial.kale_1Oct06_264.paddock.outputfile.Variables
          events Reporting Frequency: event=Daily
        manager ModValues
          on init:
```
DMDemand = 0
TopsDM = 0
```
          on end_of_day:
          script: same as in Sowing date trial.kale_1Oct06_264.paddock.ModValues
  folder Rainshelter
    simulation kale201112_Fullmanagement
      metfile met: filename=%apsim%\Examples\MetFiles\lincoln.met
      clock
        start_date = 01/11/2011  # Enter the start date of the simulation
        end_date = 30/06/2012  # Enter the end date of the simulation
      summaryfile
      area paddock
        kale2
        folder Manager folder
          manager Sow on a fixed date
            # Sowing criteria
            date = 14-Nov  # Enter sowing date (dd-mmm)
            # Sowing parameters
            crop = kale2  # Enter name of crop to sow
            density = 45  # Enter sowing density (plants/m2)
            depth = 90  # Enter sowing depth (mm)
            cultivar = regal  # Enter cultivar
            class =  # Enter crop growth class
            row_spacing = 150  # Enter row spacing (mm)
            on start_of_day:
            script: same as in Sowing date trial.kale_1Oct06_264.paddock.Manager folder.Sow on a fixed date
          operations
            20/12/2011  irrigation apply amount = 6 (mm)
            27/12/2011  irrigation apply amount = 30 (mm)
            4/01/2012  irrigation apply amount = 31 (mm)
            10/01/2012  irrigation apply amount = 28 (mm)
            17/01/2012  irrigation apply amount = 38 (mm)
            24/01/2012  irrigation apply amount = 33 (mm)
            31/01/2012  irrigation apply amount = 28 (mm)
            7/02/2012  irrigation apply amount = 27 (mm)
            14/02/2012  irrigation apply amount = 28 (mm)
            21/02/12  irrigation apply amount = 31 (mm)
            28/02/2012  irrigation apply amount = 16 (mm)
            6/03/12  irrigation apply amount = 21 (mm)
            13/03/2012  irrigation apply amount = 19.2 (mm)
            20/03/2012  irrigation apply amount = 24 (mm)
            27/03/2012  irrigation apply amount = 18 (mm)
            3/04/2012  irrigation apply amount = 15 (mm)
            4/04/2012  irrigation apply amount = 35 (mm)
            10/04/2012  irrigation apply amount = 12 (mm)
            17/04/2012  irrigation apply amount = 12 (mm)
            24/04/2012  irrigation apply amount = 9 (mm)
            1/05/2012  irrigation apply amount = 12 (mm)
            8/05/2012  irrigation apply amount = 8 (mm)
            16/12/2011  fertiliser apply amount= 80 (kg/ha), type=urea_N (), depth=0 (mm)
            11/01/2012  fertiliser apply amount= 80 (kg/ha), type=urea_N (), depth=0 (mm)
            1/02/2012  fertiliser apply amount= 80 (kg/ha), type=urea_N (), depth=0 (mm)
          irrigation: same as Sowing date trial.kale_1Oct06_264.paddock.Manager folder.Irrigation
          manager End crop on a fixed date
            #
            crop = kale2  # Enter name of crop to harvest when ripe
            date = 8-Jun-2007  # Enter ending date (dd-mmm)
            on end_of_day:
```
        if (today = date('[date]') then
              [crop]  end_crop
        endif
```
          outputfile: filename=kale201112_Fullmanagement.out; title=kale201112_Fullmanagement
            variables
              variable:
                dd/mmm/yyyy
                LeafLAI
                LeafNodeNo
                PhenologyThermalTimeValue
                PhenologyCurrentPhaseName
                PhenologyCurrentStageName
                LeafLiveWt
                StemLiveWt
                StemDeadWt
                StemLiveN
                StemDeadN
                LeafDeadN
                TotalLiveWt
                RootLiveWt
                AboveGroundDeadWt
                LeafDeadWt
                Biomass
                LeafLiveN
                stagecode
                RueAct
                LeafAboveGroundPotentialDMAllocation
                ArbitratorDMSupply
                LeafDMDemand
                StemDMDemand
                DMDemand
                TotalLiveN
                RootDMDemand
                StructureMainStemNodeNo
                TopsDM
                WaterSupplyDemandRatio
            events Reporting Frequency: event=Daily
          manager ClimateControl
            # Climate Control Window
            date1 = 1-jan  # Enter window START date (dd-mmm)
            date2 = 31-dec  # Enter window END date (dd-mmm)
            # Climate Change Parameters
            MaxtChange = 0  # Change in maximum temperature (oC)
            MintChange = 0  # Change in minimum temperature (oC)
            RainChange = -100  # Relative change in daily rainfall (%)
            RadnChange = 0  # Relative change in daily radiation (%)
            CO2 = 350  # Atmospheric CO2 Concentration (ppm)
            on prenewmet:
```
!  Adjust daily temperatures, rainfall and radiation up or down according to user-defined amounts
! To apply different levels of climate control to different times of year add multiple copies of this logic into your simulation and change the window.

if (date_within('[date1], [date2]') = 1) then
   maxt = maxt + [MaxtChange]
   mint = mint + [MintChange]
   rain = 0
   radn = radn + radn * [RadnChange] / 100
   co2 = [CO2]
 endif
```
        fertiliser
        surfaceom surface organic matter
          PoolName = wheat  # Organic Matter pool name
          type = wheat  # Organic Matter type
          mass = 1000  # Initial surface residue (kg/ha)
          cnr = 80  # C:N ratio of initial residue
          standing_fraction = 0  # Fraction of residue standing
        Soil Templeton_ABlock: Latitude=0; Longitude=0
          InitialWater Initial water: FractionFull=1; PercentMethod=EvenlyDistributed
          Water
            Thickness  BD   AirDry  LL15  DUL   SAT
            100        1.3  0.05    0.08  0.31  0.44
            150        1.3  0.05    0.07  0.3   0.44
            300        1.3  0.05    0.07  0.28  0.44
            300        1.3  0.05    0.09  0.31  0.44
            300        1.3  0.05    0.11  0.3   0.44
            300        1.3  0.05    0.16  0.28  0.44
            50         1.3  0.05    0.08  0.31  0.44
            SoilCrop wheat: LL=[0.08, 0.07, 0.07, 0.09, 0.11, 0.16, 0.08]; KL=[0.06, 0.06, 0.06, 0.04, 0.03, 0.02, 0.08]; XF=[1, 1, 1, 1, 0.6, 0.4, 1]
            SoilCrop canola: LL=[0.1, 0.09, 0.09, 0.11, 0.18, 0.19, 0.08]; KL=[0.06, 0.06, 0.06, 0.06, 0.06, 0.06, 0.06]; XF=[1, 1, 1, 1, 1, 1, 1]
            SoilCrop ForageBrassica: LL=[0.08, 0.07, 0.07, 0.09, 0.11, 0.16, 0.08]; KL=[0.06, 0.06, 0.06, 0.06, 0.06, 0.06, 0.06]; XF=[1, 1, 1, 1, 1, 1, 1]
            SoilCrop Kale: LL=[0.08, 0.07, 0.07, 0.09, 0.11, 0.16, 0.08]; KL=[0.06, 0.06, 0.06, 0.06, 0.06, 0.06, 0.06]; XF=[1, 1, 1, 1, 1, 1, 1]
            SoilCrop Kale2: LL=[0.08, 0.07, 0.07, 0.09, 0.11, 0.16, 0.08]; KL=[0.06, 0.06, 0.06, 0.06, 0.06, 0.06, 0.06]; XF=[1, 1, 1, 1, 1, 1, 1]
          SoilWater: SummerCona=4.4; SummerU=9; SummerDate=1-Nov; WinterCona=4.4; WinterU=9; WinterDate=1-Apr; DiffusConst=88; DiffusSlope=35.4; Salb=0.18; CN2Bare=68; CNRed=20; CNCov=0.8; Thickness=[100, 150, 300, 300, 300, 300, 50]; SWCON=[0.55, 0.55, 0.55, 0.55, 0.55, 0.55, 0.55]
          SoilOrganicMatter: RootCN=30; RootWt=3000; SoilCN=11.5; EnrACoeff=7.4; EnrBCoeff=0.2
            Thickness  OC    FBiom  FInert
            100        1.82  0.025  0.3
            150        1.47  0.025  0.4
            300        1.2   0.015  0.75
            300        1.03  0.01   0.9
            300        0.47  0.01   0.96
            300        0.47  0.01   0.96
            50         0.47  0.01   0.96
          Analysis: Thickness=[100, 150, 300, 300, 300, 300, 50]; PH=[6.6, 6.2, 5.7, 5.5, 5.5, 5.5, 5.5]
          Sample Initial nitrogen
            Thickness  NO3       NH4
            150        34.8718   0.1
            150        37.9487   0.1
            300        6.66667   0.1
            300        1.28205   0.1
            300        0.769231  0.1
            300        0.51282   0.1
        micromet
          soilalbedo = 0.23
          a_interception = 0
          b_interception = 0
          c_interception = 0
          d_interception = 0
        manager ModValues
          on init:
```
DMDemand = 0
TopsDM = 0
```
          on end_of_day:
          script: same as in Sowing date trial.kale_1Oct06_264.paddock.ModValues
        folder Kale Crop Analysis Graphs
          manager Diagnostic variables
            CropType = kale2  # Select crop type to report variables for
            on init:
```
SimDay = 1

AccumPlantN = 0
AccumMineralisation = 0
AccumDenit = 0
AccumFert = 0
AccumLeach = 0
AccumDetach = 0
DeltaSoilOMN = 0
DeltaSurfaceOMN = 0
DeltaSoilMineralN = 0

AccumEO = 0
AccumEP = 0
AccumES = 0
AccumDrainage = 0
AccumRunoff = 0
AccumOutflowLat = 0
AccumIrrigation = 0
AccumRainfall = 0
SoilWaterDeficit = 0

AccumTtemerg = 0
```
            on start_of_day:
```
if simday = 1 then
InitialSoilOMN = biom_n() + fom_n() + hum_n()
InitialSurfaceOMN = surfaceom_n
InitialMineralN = no3() + nh4() + urea()
endif

!!!!!! Nitrogen balance components !!!!!!
!!!!!!^^^^^^^^^^^^^^^^^^^^^^^^^^^^^!!!!!!
AccumPlantN =  AccumPlantN - [CropType].RootNuptake
AccumMineralisation = AccumMineralisation + dlt_n_min() + dlt_n_min_res()
AccumDenit = AccumDenit - dnit() 
AccumFert = AccumFert + fertiliser
AccumLeach = AccumLeach - leach_urea - leach_no3 - leach_nh4 
AccumDetach = 0 !plant2 doesn't detach yet
DeltaSoilOMN = (biom_n() + fom_n() + hum_n()) - InitialSoilOMN
DeltaSurfaceOMN = surfaceom_n - InitialSurfaceOMN
DeltaSoilMineralN = (no3() + nh4() + urea()) - InitialMineralN

!!!!!! Water balance components !!!!!!
!!!!!!^^^^^^^^^^^^^^^^^^^^^^^^^^!!!!!!
AccumEO = AccumEO - eo
AccumEP = AccumEP - [CropType].LeafTranspiration
AccumES = AccumES - es
AccumDrainage = AccumDrainage - drain
AccumRunoff = AccumRunoff - runoff
AccumOutflowLat = AccumOutflowLat - outflow_lat()
AccumIrrigation = AccumIrrigation + Irrigation
AccumRainfall = Accumrainfall + rain
SoilWaterDeficit =  sw_dep() - dul_dep()

!!!!!! Thermal time calculation !!!!!!
!!!!!! ^^^^^^^^^^^^^^^^^^^^^^^^ !!!!!!
If [CropType].StageCodeValue >= 3 Then
AccumTtemerg = AccumTtemerg + [CropType].PhenologyThermalTimeValue
Endif
```
            on end_of_day:
```
if SimDay = 1 then
SimDay = 2
Else SimDay = 2
endif
```
          outputfile Outputs: filename=kale201112_Fullmanagement Outputs.out; title=kale201112_Fullmanagement Outputs
            events Reporting Frequency: event=Daily
            variables
              variable:
                dd/mmm/yyyy
                AccumTtemerg
                PhenologyCurrentPhaseName
                StageCodeValue
                AccumPlantN
                AccumMineralisation
                AccumDenit
                AccumFert
                AccumLeach
                AccumDetach
                DeltaSoilOMN
                DeltaSurfaceOMN
                DeltaSoilMineralN
                RootNSupplyUptake
                eo
                es
                sw_dep()
                dul_dep()
                drain
                runoff
                outflow_lat()
                pond
                AccumEO
                AccumEP
                AccumES
                AccumDrainage
                AccumRunoff
                AccumRainfall
                AccumIrrigation
                AccumOutflowLat
                SoilWaterDeficit
                AboveGroundWt
                BelowGroundWt
                TotalWt
                LeafDeadWt
                LeafLiveWt
                StemDeadWt
                StemLiveWt
                RootDeadWt
                RootLiveWt
                AboveGroundN
                BelowGroundN
                TotalN
                TotalLiveN
                TotalDeadN
                LeafDeadN
                LeafLiveN
                StemDeadN
                StemLiveN
                RootLiveN
                RootDeadN
                LeafLiveNConc
                LeafDeadNConc
                StemLiveNConc
                RootLiveNConc
                RootWaterSupply
                RootWaterUptake
                LeafTranspiration
                LeafWaterDemand
                RootDepth
                Cover_green
                Cover_tot
                Cover_dead
                LeafLAI
                LeafLAIDead
                Height
                LeafFn
                LeafFw
                LeafPhotosynthesisFtValue
                LeafPhotosynthesisFvpdValue
                StructurePlantMainStemNodeNo
                StructureTotalStemPopn
                LeafPlantAppearedGreenLeafNo
                LeafExpandingCohortNo
                LeafAppearedCohortNo
                LeafDeadCohortNo
                StructureMainStemNodeNo
                LeafSenescingCohortNo
                StructurePrimaryBudMainStemNodeNo
                LeafMinimumNConcValue
                StemMinimumNConcValue
                RootMinimumNConcValue
                LeafMaximumNConcValue
                StemMaximumNConcValue
                RootMaximumNConcValue
                TotalLiveWt
                StemLiveStructuralWt
                StemLiveNonStructuralWt
                LeafSpecificArea
                TotalDeadWt
                LeafExpandedCohortNo
    simulation kale201112_Irr_N120 -> /Simulations/Rainshelter/kale201112_Fullmanagement
      area paddock -> /Simulations/Rainshelter/kale201112_Fullmanagement/paddock
        folder Manager folder -> /Simulations/Rainshelter/kale201112_Fullmanagement/paddock/Manager folder
          outputfile -> /Simulations/Rainshelter/kale201112_Fullmanagement/paddock/Manager folder/outputfile: filename=kale201112_Irr_N120.out; title=kale201112_Irr_N120
            variables -> /Simulations/Rainshelter/kale201112_Fullmanagement/paddock/Manager folder/outputfile/Variables
            events Reporting Frequency -> /Simulations/Rainshelter/kale201112_Fullmanagement/paddock/Manager folder/outputfile/Reporting Frequency
          operations
            20/12/11  irrigation apply amount = 6 (mm)
            27/12/11  irrigation apply amount = 30 (mm)
            4/01/12  irrigation apply amount = 31 (mm)
            10/01/12  irrigation apply amount = 28 (mm)
            17/01/12  irrigation apply amount = 38 (mm)
            24/01/12  irrigation apply amount = 33 (mm)
            31/01/12  irrigation apply amount = 28 (mm)
            7/02/12  irrigation apply amount = 27 (mm)
            14/02/12  irrigation apply amount = 28 (mm)
            21/02/12  irrigation apply amount = 31 (mm)
            28/02/12  irrigation apply amount = 16 (mm)
            6/03/12  irrigation apply amount = 21 (mm)
            13/03/12  irrigation apply amount = 19.2 (mm)
            20/03/12  irrigation apply amount = 24 (mm)
            27/03/12  irrigation apply amount = 18 (mm)
            3/04/12  irrigation apply amount = 15 (mm)
            4/04/12  irrigation apply amount = 35 (mm)
            10/04/12  irrigation apply amount = 12 (mm)
            17/04/12  irrigation apply amount = 12 (mm)
            24/04/12  irrigation apply amount = 9 (mm)
            1/05/12  irrigation apply amount = 12 (mm)
            8/05/12  irrigation apply amount = 8 (mm)
            16/12/2011  fertiliser apply amount= 40 (kg/ha), type=urea_N (), depth=0 (mm)
            11/01/2012  fertiliser apply amount= 40 (kg/ha), type=urea_N (), depth=0 (mm)
            1/02/2012  fertiliser apply amount= 40 (kg/ha), type=urea_N (), depth=0 (mm)
        folder Kale Crop Analysis Graphs -> /Simulations/Rainshelter/kale201112_Fullmanagement/paddock/Kale Crop Analysis Graphs
          outputfile Outputs -> /Simulations/Rainshelter/kale201112_Fullmanagement/paddock/Kale Crop Analysis Graphs/Outputs: filename=kale201112_Irr_N120 Outputs.out; title=kale201112_Irr_N120 Outputs
            events Reporting Frequency -> /Simulations/Rainshelter/kale201112_Fullmanagement/paddock/Kale Crop Analysis Graphs/Outputs/Reporting Frequency
            variables -> /Simulations/Rainshelter/kale201112_Fullmanagement/paddock/Kale Crop Analysis Graphs/Outputs/Variables
    simulation kale201112__irr_N30 -> /Simulations/Rainshelter/kale201112_Fullmanagement
      area paddock -> /Simulations/Rainshelter/kale201112_Fullmanagement/paddock
        folder Manager folder -> /Simulations/Rainshelter/kale201112_Fullmanagement/paddock/Manager folder
          outputfile -> /Simulations/Rainshelter/kale201112_Fullmanagement/paddock/Manager folder/outputfile: filename=kale201112__irr_N30.out; title=kale201112__irr_N30
            variables -> /Simulations/Rainshelter/kale201112_Fullmanagement/paddock/Manager folder/outputfile/Variables
            events Reporting Frequency -> /Simulations/Rainshelter/kale201112_Fullmanagement/paddock/Manager folder/outputfile/Reporting Frequency
          operations
            20/12/11  irrigation apply amount = 6 (mm)
            27/12/11  irrigation apply amount = 30 (mm)
            4/01/12  irrigation apply amount = 31 (mm)
            10/01/12  irrigation apply amount = 28 (mm)
            17/01/12  irrigation apply amount = 38 (mm)
            24/01/12  irrigation apply amount = 33 (mm)
            31/01/12  irrigation apply amount = 28 (mm)
            7/02/12  irrigation apply amount = 27 (mm)
            14/02/12  irrigation apply amount = 28 (mm)
            21/02/12  irrigation apply amount = 31 (mm)
            28/02/12  irrigation apply amount = 16 (mm)
            6/03/12  irrigation apply amount = 21 (mm)
            13/03/12  irrigation apply amount = 19.2 (mm)
            20/03/12  irrigation apply amount = 24 (mm)
            27/03/12  irrigation apply amount = 18 (mm)
            3/04/12  irrigation apply amount = 15 (mm)
            4/04/12  irrigation apply amount = 35 (mm)
            10/04/12  irrigation apply amount = 12 (mm)
            17/04/12  irrigation apply amount = 12 (mm)
            24/04/12  irrigation apply amount = 9 (mm)
            1/05/12  irrigation apply amount = 12 (mm)
            8/05/12  irrigation apply amount = 8 (mm)
            16/12/2011  fertiliser apply amount= 10 (kg/ha), type=urea_N (), depth=0 (mm)
            11/01/2012  fertiliser apply amount= 10 (kg/ha), type=urea_N (), depth=0 (mm)
            1/02/2012  fertiliser apply amount= 10 (kg/ha), type=urea_N (), depth=0 (mm)
        folder Kale Crop Analysis Graphs -> /Simulations/Rainshelter/kale201112_Fullmanagement/paddock/Kale Crop Analysis Graphs
          outputfile Outputs -> /Simulations/Rainshelter/kale201112_Fullmanagement/paddock/Kale Crop Analysis Graphs/Outputs: filename=kale201112__irr_N30 Outputs.out; title=kale201112__irr_N30 Outputs
            events Reporting Frequency -> /Simulations/Rainshelter/kale201112_Fullmanagement/paddock/Kale Crop Analysis Graphs/Outputs/Reporting Frequency
            variables -> /Simulations/Rainshelter/kale201112_Fullmanagement/paddock/Kale Crop Analysis Graphs/Outputs/Variables
    simulation kale201112_Irr_N0 -> /Simulations/Rainshelter/kale201112_Fullmanagement
      area paddock -> /Simulations/Rainshelter/kale201112_Fullmanagement/paddock
        folder Manager folder -> /Simulations/Rainshelter/kale201112_Fullmanagement/paddock/Manager folder
          outputfile -> /Simulations/Rainshelter/kale201112_Fullmanagement/paddock/Manager folder/outputfile: filename=kale201112_Irr_N0.out; title=kale201112_Irr_N0
            variables -> /Simulations/Rainshelter/kale201112_Fullmanagement/paddock/Manager folder/outputfile/Variables
            events Reporting Frequency -> /Simulations/Rainshelter/kale201112_Fullmanagement/paddock/Manager folder/outputfile/Reporting Frequency
          operations
            20/12/11  irrigation apply amount = 6 (mm)
            27/12/11  irrigation apply amount = 30 (mm)
            4/01/12  irrigation apply amount = 31 (mm)
            10/01/12  irrigation apply amount = 28 (mm)
            17/01/12  irrigation apply amount = 38 (mm)
            24/01/12  irrigation apply amount = 33 (mm)
            31/01/12  irrigation apply amount = 28 (mm)
            7/02/12  irrigation apply amount = 27 (mm)
            14/02/12  irrigation apply amount = 28 (mm)
            21/02/12  irrigation apply amount = 31 (mm)
            28/02/12  irrigation apply amount = 16 (mm)
            6/03/12  irrigation apply amount = 21 (mm)
            13/03/12  irrigation apply amount = 19.2 (mm)
            20/03/12  irrigation apply amount = 24 (mm)
            27/03/12  irrigation apply amount = 18 (mm)
            3/04/12  irrigation apply amount = 15 (mm)
            4/04/12  irrigation apply amount = 35 (mm)
            10/04/12  irrigation apply amount = 12 (mm)
            17/04/12  irrigation apply amount = 12 (mm)
            24/04/12  irrigation apply amount = 9 (mm)
            1/05/12  irrigation apply amount = 12 (mm)
            8/05/12  irrigation apply amount = 8 (mm)
            16/12/2011  fertiliser apply amount= 0 (kg/ha), type=urea_N (), depth=0 (mm)
            11/01/2012  fertiliser apply amount= 0 (kg/ha), type=urea_N (), depth=0 (mm)
            1/02/2012  fertiliser apply amount= 0 (kg/ha), type=urea_N (), depth=0 (mm)
        folder Kale Crop Analysis Graphs -> /Simulations/Rainshelter/kale201112_Fullmanagement/paddock/Kale Crop Analysis Graphs
          outputfile Outputs -> /Simulations/Rainshelter/kale201112_Fullmanagement/paddock/Kale Crop Analysis Graphs/Outputs: filename=kale201112_Irr_N0 Outputs.out; title=kale201112_Irr_N0 Outputs
            events Reporting Frequency -> /Simulations/Rainshelter/kale201112_Fullmanagement/paddock/Kale Crop Analysis Graphs/Outputs/Reporting Frequency
            variables -> /Simulations/Rainshelter/kale201112_Fullmanagement/paddock/Kale Crop Analysis Graphs/Outputs/Variables
    simulation kale201112_Nil_N240 -> /Simulations/Rainshelter/kale201112_Fullmanagement
      area paddock -> /Simulations/Rainshelter/kale201112_Fullmanagement/paddock
        folder Manager folder -> /Simulations/Rainshelter/kale201112_Fullmanagement/paddock/Manager folder
          outputfile -> /Simulations/Rainshelter/kale201112_Fullmanagement/paddock/Manager folder/outputfile: filename=kale201112_Nil_N240.out; title=kale201112_Nil_N240
            variables -> /Simulations/Rainshelter/kale201112_Fullmanagement/paddock/Manager folder/outputfile/Variables
            events Reporting Frequency -> /Simulations/Rainshelter/kale201112_Fullmanagement/paddock/Manager folder/outputfile/Reporting Frequency
          operations
            20/12/11  irrigation apply amount = 0 (mm)
            27/12/11  irrigation apply amount = 0 (mm)
            4/01/12  irrigation apply amount = 0 (mm)
            10/01/12  irrigation apply amount = 0 (mm)
            17/01/12  irrigation apply amount = 0 (mm)
            24/01/12  irrigation apply amount = 0 (mm)
            31/01/12  irrigation apply amount = 0 (mm)
            7/02/12  irrigation apply amount = 0 (mm)
            14/02/12  irrigation apply amount = 0 (mm)
            21/02/12  irrigation apply amount = 0 (mm)
            28/02/12  irrigation apply amount = 0 (mm)
            6/03/12  irrigation apply amount = 0 (mm)
            13/03/12  irrigation apply amount = 0 (mm)
            20/03/12  irrigation apply amount = 0 (mm)
            27/03/12  irrigation apply amount = 0 (mm)
            3/04/12  irrigation apply amount = 15 (mm)
            4/04/12  irrigation apply amount = 35 (mm)
            10/04/12  irrigation apply amount = 12 (mm)
            17/04/12  irrigation apply amount = 12 (mm)
            24/04/12  irrigation apply amount = 9 (mm)
            1/05/12  irrigation apply amount = 12 (mm)
            8/05/12  irrigation apply amount = 8 (mm)
            16/12/2011  fertiliser apply amount= 80 (kg/ha), type=urea_N (), depth=0 (mm)
            11/01/2012  fertiliser apply amount= 80 (kg/ha), type=urea_N (), depth=0 (mm)
            1/02/2012  fertiliser apply amount= 80 (kg/ha), type=urea_N (), depth=0 (mm)
        folder Kale Crop Analysis Graphs -> /Simulations/Rainshelter/kale201112_Fullmanagement/paddock/Kale Crop Analysis Graphs
          outputfile Outputs -> /Simulations/Rainshelter/kale201112_Fullmanagement/paddock/Kale Crop Analysis Graphs/Outputs: filename=kale201112_Nil_N240 Outputs.out; title=kale201112_Nil_N240 Outputs
            events Reporting Frequency -> /Simulations/Rainshelter/kale201112_Fullmanagement/paddock/Kale Crop Analysis Graphs/Outputs/Reporting Frequency
            variables -> /Simulations/Rainshelter/kale201112_Fullmanagement/paddock/Kale Crop Analysis Graphs/Outputs/Variables
    simulation kale201112_Nil_N120 -> /Simulations/Rainshelter/kale201112_Nil_N240
      area paddock -> /Simulations/Rainshelter/kale201112_Nil_N240/paddock
        folder Manager folder -> /Simulations/Rainshelter/kale201112_Nil_N240/paddock/Manager folder
          outputfile -> /Simulations/Rainshelter/kale201112_Nil_N240/paddock/Manager folder/outputfile: filename=kale201112_Nil_N120.out; title=kale201112_Nil_N120
            variables -> /Simulations/Rainshelter/kale201112_Nil_N240/paddock/Manager folder/outputfile/Variables
            events Reporting Frequency -> /Simulations/Rainshelter/kale201112_Nil_N240/paddock/Manager folder/outputfile/Reporting Frequency
          operations
            20/12/11  irrigation apply amount = 0 (mm)
            27/12/11  irrigation apply amount = 0 (mm)
            4/01/12  irrigation apply amount = 0 (mm)
            10/01/12  irrigation apply amount = 0 (mm)
            17/01/12  irrigation apply amount = 0 (mm)
            24/01/12  irrigation apply amount = 0 (mm)
            31/01/12  irrigation apply amount = 0 (mm)
            7/02/12  irrigation apply amount = 0 (mm)
            14/02/12  irrigation apply amount = 0 (mm)
            21/02/12  irrigation apply amount = 0 (mm)
            28/02/12  irrigation apply amount = 0 (mm)
            6/03/12  irrigation apply amount = 0 (mm)
            13/03/12  irrigation apply amount = 0 (mm)
            20/03/12  irrigation apply amount = 0 (mm)
            27/03/12  irrigation apply amount = 0 (mm)
            3/04/12  irrigation apply amount = 15 (mm)
            4/04/12  irrigation apply amount = 35 (mm)
            10/04/12  irrigation apply amount = 12 (mm)
            17/04/12  irrigation apply amount = 12 (mm)
            24/04/12  irrigation apply amount = 9 (mm)
            1/05/12  irrigation apply amount = 12 (mm)
            8/05/12  irrigation apply amount = 8 (mm)
            16/12/2011  fertiliser apply amount= 40 (kg/ha), type=urea_N (), depth=0 (mm)
            11/01/2012  fertiliser apply amount= 40 (kg/ha), type=urea_N (), depth=0 (mm)
            1/02/2012  fertiliser apply amount= 40 (kg/ha), type=urea_N (), depth=0 (mm)
        folder Kale Crop Analysis Graphs -> /Simulations/Rainshelter/kale201112_Nil_N240/paddock/Kale Crop Analysis Graphs
          outputfile Outputs -> /Simulations/Rainshelter/kale201112_Nil_N240/paddock/Kale Crop Analysis Graphs/Outputs: filename=kale201112_Nil_N120 Outputs.out; title=kale201112_Nil_N120 Outputs
            events Reporting Frequency -> /Simulations/Rainshelter/kale201112_Nil_N240/paddock/Kale Crop Analysis Graphs/Outputs/Reporting Frequency
            variables -> /Simulations/Rainshelter/kale201112_Nil_N240/paddock/Kale Crop Analysis Graphs/Outputs/Variables
    simulation kale201112_Nil_N30 -> /Simulations/Rainshelter/kale201112_Nil_N120
      area paddock -> /Simulations/Rainshelter/kale201112_Nil_N120/paddock
        folder Manager folder -> /Simulations/Rainshelter/kale201112_Nil_N120/paddock/Manager folder
          outputfile -> /Simulations/Rainshelter/kale201112_Nil_N120/paddock/Manager folder/outputfile: filename=kale201112_Nil_N30.out; title=kale201112_Nil_N30
            variables -> /Simulations/Rainshelter/kale201112_Nil_N120/paddock/Manager folder/outputfile/Variables
            events Reporting Frequency -> /Simulations/Rainshelter/kale201112_Nil_N120/paddock/Manager folder/outputfile/Reporting Frequency
          operations
            20/12/11  irrigation apply amount = 0 (mm)
            27/12/11  irrigation apply amount = 0 (mm)
            4/01/12  irrigation apply amount = 0 (mm)
            10/01/12  irrigation apply amount = 0 (mm)
            17/01/12  irrigation apply amount = 0 (mm)
            24/01/12  irrigation apply amount = 0 (mm)
            31/01/12  irrigation apply amount = 0 (mm)
            7/02/12  irrigation apply amount = 0 (mm)
            14/02/12  irrigation apply amount = 0 (mm)
            21/02/12  irrigation apply amount = 0 (mm)
            28/02/12  irrigation apply amount = 0 (mm)
            6/03/12  irrigation apply amount = 0 (mm)
            13/03/12  irrigation apply amount = 0 (mm)
            20/03/12  irrigation apply amount = 0 (mm)
            27/03/12  irrigation apply amount = 0 (mm)
            3/04/12  irrigation apply amount = 15 (mm)
            4/04/12  irrigation apply amount = 35 (mm)
            10/04/12  irrigation apply amount = 12 (mm)
            17/04/12  irrigation apply amount = 12 (mm)
            24/04/12  irrigation apply amount = 9 (mm)
            1/05/12  irrigation apply amount = 12 (mm)
            8/05/12  irrigation apply amount = 8 (mm)
            16/12/2011  fertiliser apply amount= 10 (kg/ha), type=urea_N (), depth=0 (mm)
            11/01/2012  fertiliser apply amount= 10 (kg/ha), type=urea_N (), depth=0 (mm)
            1/02/2012  fertiliser apply amount= 10 (kg/ha), type=urea_N (), depth=0 (mm)
        folder Kale Crop Analysis Graphs -> /Simulations/Rainshelter/kale201112_Nil_N120/paddock/Kale Crop Analysis Graphs
          outputfile Outputs -> /Simulations/Rainshelter/kale201112_Nil_N120/paddock/Kale Crop Analysis Graphs/Outputs: filename=kale201112_Nil_N30 Outputs.out; title=kale201112_Nil_N30 Outputs
            events Reporting Frequency -> /Simulations/Rainshelter/kale201112_Nil_N120/paddock/Kale Crop Analysis Graphs/Outputs/Reporting Frequency
            variables -> /Simulations/Rainshelter/kale201112_Nil_N120/paddock/Kale Crop Analysis Graphs/Outputs/Variables
    simulation kale201112_Nil_N0 -> /Simulations/Rainshelter/kale201112_Nil_N30
      area paddock -> /Simulations/Rainshelter/kale201112_Nil_N30/paddock
        folder Manager folder -> /Simulations/Rainshelter/kale201112_Nil_N30/paddock/Manager folder
          outputfile -> /Simulations/Rainshelter/kale201112_Nil_N30/paddock/Manager folder/outputfile: filename=kale201112_Nil_N0.out; title=kale201112_Nil_N0
            variables -> /Simulations/Rainshelter/kale201112_Nil_N30/paddock/Manager folder/outputfile/Variables
            events Reporting Frequency -> /Simulations/Rainshelter/kale201112_Nil_N30/paddock/Manager folder/outputfile/Reporting Frequency
          operations
            20/12/11  irrigation apply amount = 0 (mm)
            27/12/11  irrigation apply amount = 0 (mm)
            4/01/12  irrigation apply amount = 0 (mm)
            10/01/12  irrigation apply amount = 0 (mm)
            17/01/12  irrigation apply amount = 0 (mm)
            24/01/12  irrigation apply amount = 0 (mm)
            31/01/12  irrigation apply amount = 0 (mm)
            7/02/12  irrigation apply amount = 0 (mm)
            14/02/12  irrigation apply amount = 0 (mm)
            21/02/12  irrigation apply amount = 0 (mm)
            28/02/12  irrigation apply amount = 0 (mm)
            6/03/12  irrigation apply amount = 0 (mm)
            13/03/12  irrigation apply amount = 0 (mm)
            20/03/12  irrigation apply amount = 0 (mm)
            27/03/12  irrigation apply amount = 0 (mm)
            3/04/12  irrigation apply amount = 15 (mm)
            4/04/12  irrigation apply amount = 35 (mm)
            10/04/12  irrigation apply amount = 12 (mm)
            17/04/12  irrigation apply amount = 12 (mm)
            24/04/12  irrigation apply amount = 9 (mm)
            1/05/12  irrigation apply amount = 12 (mm)
            8/05/12  irrigation apply amount = 8 (mm)
            16/12/2011  fertiliser apply amount= 0 (kg/ha), type=urea_N (), depth=0 (mm)
            11/01/2012  fertiliser apply amount= 0 (kg/ha), type=urea_N (), depth=0 (mm)
            1/02/2012  fertiliser apply amount= 0 (kg/ha), type=urea_N (), depth=0 (mm)
        folder Kale Crop Analysis Graphs -> /Simulations/Rainshelter/kale201112_Nil_N30/paddock/Kale Crop Analysis Graphs
          outputfile Outputs -> /Simulations/Rainshelter/kale201112_Nil_N30/paddock/Kale Crop Analysis Graphs/Outputs: filename=kale201112_Nil_N0 Outputs.out; title=kale201112_Nil_N0 Outputs
            events Reporting Frequency -> /Simulations/Rainshelter/kale201112_Nil_N30/paddock/Kale Crop Analysis Graphs/Outputs/Reporting Frequency
            variables -> /Simulations/Rainshelter/kale201112_Nil_N30/paddock/Kale Crop Analysis Graphs/Outputs/Variables
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