folder simulations: version=32
  simulation Patagonia1
    clock
      start_date = 2-May-2007  # Select the start date of the simulation
      end_date = 15/10/2007  # Select the end date of the simulation
    summaryfile
    metfile met: filename=Gatton.met
    area Paddock
      folder Manager folder
        manager Sow on a fixed date
          # Sowing criteria
          date = 2-May-2007  # Enter sowing date (dd-mmm)
          # Sowing parameters
          crop = lettuce  # Enter name of crop to sow
          density = 6  # Enter sowing density (plants/m2)
          depth = 50  # Enter sowing depth (mm)
          cultivar = Patagonia  # Enter cultivar
          row_spacing = 600  # Enter row spacing (mm)
          on start_of_day:
```
      if (today = date('[date]') then
                    [crop] sow plants =[density], sowing_depth = [depth], cultivar = [cultivar], row_spacing = [row_spacing]
        endif
```
        manager Harvest on a Growth Stage
          # Harvesting criteria
          stage = maturity  # Enter stage name
          # Harvesting parameters
          crop = lettuce  # Enter name of crop to sow
          on start_of_day:
```
        if ([crop].StageName = '[stage]') then
                    [crop] harvest
                    [crop] end_crop
        endif
```
      lettuce
      soil: Site=Brookstead; Region=Darling Downs; State=Queensland
        Comment = Soil naming structure: \State\Region\Classification-Local Name (Site/district and locator number)  # Comments
        NearestTown = Brookstead, Q 4352
        NaturalVegetation = Queensland bluegrass
        DataSource = CSIRO Sustainable Ecosystems, Toowoomba
        InitNitrogen Initial nitrogen
          PercentMethod: Percent=0
        InitWater Initial water
          percentmethod: percent=1; distributed=filled from top
        Water
          Layer:
            Thickness (mm)  BD (g/cc)  AirDry (mm/mm)  LL15 (mm/mm)  DUL (mm/mm)  SAT (mm/mm)
            150             1.05       0.13            0.25          0.52         0.57
            150             1.16       0.2             0.25          0.48         0.53
            300             1.19       0.25            0.25          0.47         0.52
            300             1.18       0.25            0.25          0.47         0.52
            300             1.24       0.25            0.25          0.45         0.5
            300             1.31       0.25            0.25          0.42         0.47
            300             1.35       0.25            0.25          0.41         0.46
          SoilCrop lettuce
            Layer:
              Thickness (mm)  LL (mm/mm)  KL (/day)  XF (0-1)
              150             0.25        0.06       1
              150             0.25        0.06       1
              300             0.25        0.06       1
              300             0.25        0.06       1
              300             0.25        0.06       1
              300             0.25        0.06       1
              300             0.25        0.06       1
        SoilWat: SummerCona=3.5; SummerU=6; SummerDate=1-nov; WinterCona=2.5; WinterU=4; WinterDate=1-apr; DiffusConst=40; DiffusSlope=16; Salb=0.12; CN2Bare=73; CNRed=20; CNCov=0.8
          Layer:
            Thickness (mm)  SWCON (0-1)
            150             0.3
            150             0.3
            300             0.3
            300             0.3
            300             0.3
            300             0.3
            300             0.3
        SoilOrganicMatter: RootCN=40; RootWT=1000; SoilCN=12; EnrACoeff=7.4; EnrBCoeff=0.2
          Layer:
            Thickness (mm)  OC (Total %)  FBiom (0-1)  FInert (0-1)
            150             1.19          0.04         0.4
            150             1.01          0.02         0.6
            300             0.45          0.02         0.8
            300             0.3           0.02         1
            300             0.2           0.01         1
            300             0.16          0.01         1
            300             0.17          0.01         1
        Analysis
          Layer:
            Thickness (mm)  PH (1:5 water)
            150             8.2
            150             8.5
            300             8.6
            300             8.6
            300             7.4
            300             5.3
            300             5.3
        Sample Soil sample
          Layer:
            {Thickness (mm)=3000, NO3 (ppm)=0, NH4 (ppm)=0, SW (mm/mm)=0}
      outputfile: filename=Patagonia1.out; title=Patagonia1
        variables
          variable:
            day  # Day
            sowing_date  # Day number of sowing
            sowing_das  # Days from sowing to sowing
            maturity_das  # Days from sowing to maturity
            maturity_date  # Day number of maturity
        events Reporting Frequency: event=harvesting  # Day
  simulation Patagonia2
    clock
      start_date = 9-May-2007  # Select the start date of the simulation
      end_date = 15/10/2007  # Select the end date of the simulation
    summaryfile
    metfile met: filename=Gatton.met
    area Paddock
      folder Manager folder
        manager Sow on a fixed date
          # Sowing criteria
          date = 9-May-2007  # Enter sowing date (dd-mmm)
          # Sowing parameters
          crop = lettuce  # Enter name of crop to sow
          density = 6  # Enter sowing density (plants/m2)
          depth = 50  # Enter sowing depth (mm)
          cultivar = Patagonia  # Enter cultivar
          row_spacing = 600  # Enter row spacing (mm)
          on start_of_day:
          script: same as in Patagonia1.Paddock.Manager folder.Sow on a fixed date
        manager Harvest on a Growth Stage
          # Harvesting criteria
          stage = maturity  # Enter stage name
          # Harvesting parameters
          crop = lettuce  # Enter name of crop to sow
          on start_of_day:
```
        if ([crop].StageName = '[stage]') then
                    [crop] harvest
                    [crop] end_crop
        endif
```
      lettuce
      soil: same as Patagonia1.Paddock.Soil
      outputfile: filename=Patagonia2.out; title=Patagonia2
        variables
          variable:
            day  # Day
            sowing_date  # Day number of sowing
            sowing_das  # Days from sowing to sowing
            maturity_das  # Days from sowing to maturity
            maturity_date  # Day number of maturity
        events Reporting Frequency: event=harvesting  # Day
  simulation Patagonia3
    clock
      start_date = 15-May-2007  # Select the start date of the simulation
      end_date = 15/10/2007  # Select the end date of the simulation
    summaryfile
    metfile met: filename=Gatton.met
    area Paddock
      folder Manager folder
        manager Sow on a fixed date
          # Sowing criteria
          date = 15-May-2007  # Enter sowing date (dd-mmm)
          # Sowing parameters
          crop = lettuce  # Enter name of crop to sow
          density = 6  # Enter sowing density (plants/m2)
          depth = 50  # Enter sowing depth (mm)
          cultivar = Patagonia  # Enter cultivar
          row_spacing = 600  # Enter row spacing (mm)
          on start_of_day:
          script: same as in Patagonia1.Paddock.Manager folder.Sow on a fixed date
        manager Harvest on a Growth Stage
          # Harvesting criteria
          stage = maturity  # Enter stage name
          # Harvesting parameters
          crop = lettuce  # Enter name of crop to sow
          on start_of_day:
```
        if ([crop].StageName = '[stage]') then
                    [crop] harvest
                    [crop] end_crop
        endif
```
      lettuce
      soil: same as Patagonia1.Paddock.Soil
      outputfile: filename=Patagonia3.out; title=Patagonia3
        variables
          variable:
            day  # Day
            sowing_date  # Day number of sowing
            sowing_das  # Days from sowing to sowing
            maturity_das  # Days from sowing to maturity
            maturity_date  # Day number of maturity
        events Reporting Frequency: event=harvesting  # Day
  simulation Patagonia4
    clock
      start_date = 23-May-2007  # Select the start date of the simulation
      end_date = 15/10/2007  # Select the end date of the simulation
    summaryfile
    metfile met: filename=Gatton.met
    area Paddock
      folder Manager folder
        manager Sow on a fixed date
          # Sowing criteria
          date = 23-May-2007  # Enter sowing date (dd-mmm)
          # Sowing parameters
          crop = lettuce  # Enter name of crop to sow
          density = 6  # Enter sowing density (plants/m2)
          depth = 50  # Enter sowing depth (mm)
          cultivar = Patagonia  # Enter cultivar
          row_spacing = 600  # Enter row spacing (mm)
          on start_of_day:
          script: same as in Patagonia1.Paddock.Manager folder.Sow on a fixed date
        manager Harvest on a Growth Stage
          # Harvesting criteria
          stage = maturity  # Enter stage name
          # Harvesting parameters
          crop = lettuce  # Enter name of crop to sow
          on start_of_day:
```
        if ([crop].StageName = '[stage]') then
                    [crop] harvest
                    [crop] end_crop
        endif
```
      lettuce
      soil: same as Patagonia1.Paddock.Soil
      outputfile: filename=Patagonia4.out; title=Patagonia4
        variables
          variable:
            day  # Day
            sowing_date  # Day number of sowing
            sowing_das  # Days from sowing to sowing
            maturity_das  # Days from sowing to maturity
            maturity_date  # Day number of maturity
        events Reporting Frequency: event=harvesting  # Day
  simulation Patagonia5
    clock
      start_date = 30-May-2007  # Select the start date of the simulation
      end_date = 15/10/2007  # Select the end date of the simulation
    summaryfile
    metfile met: filename=Gatton.met
    area Paddock
      folder Manager folder
        manager Sow on a fixed date
          # Sowing criteria
          date = 30-May-2007  # Enter sowing date (dd-mmm)
          # Sowing parameters
          crop = lettuce  # Enter name of crop to sow
          density = 6  # Enter sowing density (plants/m2)
          depth = 50  # Enter sowing depth (mm)
          cultivar = Patagonia  # Enter cultivar
          row_spacing = 600  # Enter row spacing (mm)
          on start_of_day:
          script: same as in Patagonia1.Paddock.Manager folder.Sow on a fixed date
        manager Harvest on a Growth Stage
          # Harvesting criteria
          stage = maturity  # Enter stage name
          # Harvesting parameters
          crop = lettuce  # Enter name of crop to sow
          on start_of_day:
```
        if ([crop].StageName = '[stage]') then
                    [crop] harvest
                    [crop] end_crop
        endif
```
      lettuce
      soil: same as Patagonia1.Paddock.Soil
      outputfile: filename=Patagonia5.out; title=Patagonia5
        variables
          variable:
            day  # Day
            sowing_date  # Day number of sowing
            sowing_das  # Days from sowing to sowing
            maturity_das  # Days from sowing to maturity
            maturity_date  # Day number of maturity
        events Reporting Frequency: event=harvesting  # Day
  simulation Patagonia6
    clock
      start_date = 5-Jun-2007  # Select the start date of the simulation
      end_date = 15/10/2007  # Select the end date of the simulation
    summaryfile
    metfile met: filename=Gatton.met
    area Paddock
      folder Manager folder
        manager Sow on a fixed date
          # Sowing criteria
          date = 5-Jun-2007  # Enter sowing date (dd-mmm)
          # Sowing parameters
          crop = lettuce  # Enter name of crop to sow
          density = 6  # Enter sowing density (plants/m2)
          depth = 50  # Enter sowing depth (mm)
          cultivar = Patagonia  # Enter cultivar
          row_spacing = 600  # Enter row spacing (mm)
          on start_of_day:
          script: same as in Patagonia1.Paddock.Manager folder.Sow on a fixed date
        manager Harvest on a Growth Stage
          # Harvesting criteria
          stage = maturity  # Enter stage name
          # Harvesting parameters
          crop = lettuce  # Enter name of crop to sow
          on start_of_day:
```
        if ([crop].StageName = '[stage]') then
                    [crop] harvest
                    [crop] end_crop
        endif
```
      lettuce
      soil: same as Patagonia1.Paddock.Soil
      outputfile: filename=Patagonia6.out; title=Patagonia6
        variables
          variable:
            day  # Day
            sowing_date  # Day number of sowing
            sowing_das  # Days from sowing to sowing
            maturity_das  # Days from sowing to maturity
            maturity_date  # Day number of maturity
        events Reporting Frequency: event=harvesting  # Day
  simulation Patagonia7
    clock
      start_date = 12-Jun-2007  # Select the start date of the simulation
      end_date = 15/10/2007  # Select the end date of the simulation
    summaryfile
    metfile met: filename=Gatton.met
    area Paddock
      folder Manager folder
        manager Sow on a fixed date
          # Sowing criteria
          date = 12-Jun-2007  # Enter sowing date (dd-mmm)
          # Sowing parameters
          crop = lettuce  # Enter name of crop to sow
          density = 6  # Enter sowing density (plants/m2)
          depth = 50  # Enter sowing depth (mm)
          cultivar = Patagonia  # Enter cultivar
          row_spacing = 600  # Enter row spacing (mm)
          on start_of_day:
          script: same as in Patagonia1.Paddock.Manager folder.Sow on a fixed date
        manager Harvest on a Growth Stage
          # Harvesting criteria
          stage = maturity  # Enter stage name
          # Harvesting parameters
          crop = lettuce  # Enter name of crop to sow
          on start_of_day:
```
        if ([crop].StageName = '[stage]') then
                    [crop] harvest
                    [crop] end_crop
        endif
```
      lettuce
      soil: same as Patagonia1.Paddock.Soil
      outputfile: filename=Patagonia7.out; title=Patagonia7
        variables
          variable:
            day  # Day
            sowing_date  # Day number of sowing
            sowing_das  # Days from sowing to sowing
            maturity_das  # Days from sowing to maturity
            maturity_date  # Day number of maturity
        events Reporting Frequency: event=harvesting  # Day
  simulation Patagonia8
    clock
      start_date = 22-Jun-2007  # Select the start date of the simulation
      end_date = 15/10/2007  # Select the end date of the simulation
    summaryfile
    metfile met: filename=Gatton.met
    area Paddock
      folder Manager folder
        manager Sow on a fixed date
          # Sowing criteria
          date = 22-Jun-2007  # Enter sowing date (dd-mmm)
          # Sowing parameters
          crop = lettuce  # Enter name of crop to sow
          density = 6  # Enter sowing density (plants/m2)
          depth = 50  # Enter sowing depth (mm)
          cultivar = Patagonia  # Enter cultivar
          row_spacing = 600  # Enter row spacing (mm)
          on start_of_day:
          script: same as in Patagonia1.Paddock.Manager folder.Sow on a fixed date
        manager Harvest on a Growth Stage
          # Harvesting criteria
          stage = maturity  # Enter stage name
          # Harvesting parameters
          crop = lettuce  # Enter name of crop to sow
          on start_of_day:
```
        if ([crop].StageName = '[stage]') then
                    [crop] harvest
                    [crop] end_crop
        endif
```
      lettuce
      soil: same as Patagonia1.Paddock.Soil
      outputfile: filename=Patagonia8.out; title=Patagonia8
        variables
          variable:
            day  # Day
            sowing_date  # Day number of sowing
            sowing_das  # Days from sowing to sowing
            maturity_das  # Days from sowing to maturity
            maturity_date  # Day number of maturity
        events Reporting Frequency: event=harvesting  # Day
  simulation Patagonia9
    clock
      start_date = 25-Jun-2007  # Select the start date of the simulation
      end_date = 15/10/2007  # Select the end date of the simulation
    summaryfile
    metfile met: filename=Gatton.met
    area Paddock
      folder Manager folder
        manager Sow on a fixed date
          # Sowing criteria
          date = 25-Jun-2007  # Enter sowing date (dd-mmm)
          # Sowing parameters
          crop = lettuce  # Enter name of crop to sow
          density = 6  # Enter sowing density (plants/m2)
          depth = 50  # Enter sowing depth (mm)
          cultivar = Patagonia  # Enter cultivar
          row_spacing = 600  # Enter row spacing (mm)
          on start_of_day:
          script: same as in Patagonia1.Paddock.Manager folder.Sow on a fixed date
        manager Harvest on a Growth Stage
          # Harvesting criteria
          stage = maturity  # Enter stage name
          # Harvesting parameters
          crop = lettuce  # Enter name of crop to sow
          on start_of_day:
```
        if ([crop].StageName = '[stage]') then
                    [crop] harvest
                    [crop] end_crop
        endif
```
      lettuce
      soil: same as Patagonia1.Paddock.Soil
      outputfile: filename=Patagonia9.out; title=Patagonia9
        variables
          variable:
            day  # Day
            sowing_date  # Day number of sowing
            sowing_das  # Days from sowing to sowing
            maturity_das  # Days from sowing to maturity
            maturity_date  # Day number of maturity
        events Reporting Frequency: event=harvesting  # Day
  simulation Patagonia10
    clock
      start_date = 3-Jul-2007  # Select the start date of the simulation
      end_date = 15/10/2007  # Select the end date of the simulation
    summaryfile
    metfile met: filename=Gatton.met
    area Paddock
      folder Manager folder
        manager Sow on a fixed date
          # Sowing criteria
          date = 3-Jul-2007  # Enter sowing date (dd-mmm)
          # Sowing parameters
          crop = lettuce  # Enter name of crop to sow
          density = 6  # Enter sowing density (plants/m2)
          depth = 50  # Enter sowing depth (mm)
          cultivar = Patagonia  # Enter cultivar
          row_spacing = 600  # Enter row spacing (mm)
          on start_of_day:
          script: same as in Patagonia1.Paddock.Manager folder.Sow on a fixed date
        manager Harvest on a Growth Stage
          # Harvesting criteria
          stage = maturity  # Enter stage name
          # Harvesting parameters
          crop = lettuce  # Enter name of crop to sow
          on start_of_day:
```
        if ([crop].StageName = '[stage]') then
                    [crop] harvest
                    [crop] end_crop
        endif
```
      lettuce
      soil: same as Patagonia1.Paddock.Soil
      outputfile: filename=Patagonia10.out; title=Patagonia10
        variables
          variable:
            day  # Day
            sowing_date  # Day number of sowing
            sowing_das  # Days from sowing to sowing
            maturity_das  # Days from sowing to maturity
            maturity_date  # Day number of maturity
        events Reporting Frequency: event=harvesting  # Day
  simulation Annie1
    clock
      start_date = 3-Apr-2007  # Select the start date of the simulation
      end_date = 15/10/2007  # Select the end date of the simulation
    summaryfile
    metfile met: filename=Gatton.met
    area Paddock
      folder Manager folder
        manager Sow on a fixed date
          # Sowing criteria
          date = 3-Apr-2007  # Enter sowing date (dd-mmm)
          # Sowing parameters
          crop = lettuce  # Enter name of crop to sow
          density = 6  # Enter sowing density (plants/m2)
          depth = 50  # Enter sowing depth (mm)
          cultivar = Annie  # Enter cultivar
          row_spacing = 600  # Enter row spacing (mm)
          on start_of_day:
          script: same as in Patagonia1.Paddock.Manager folder.Sow on a fixed date
        manager Harvest on a Growth Stage
          # Harvesting criteria
          stage = maturity  # Enter stage name
          # Harvesting parameters
          crop = lettuce  # Enter name of crop to sow
          on start_of_day:
```
        if ([crop].StageName = '[stage]') then
                    [crop] harvest
                    [crop] end_crop
        endif
```
      lettuce
      soil: same as Patagonia1.Paddock.Soil
      outputfile: filename=Annie1.out; title=Annie1
        variables
          variable:
            day  # Day
            sowing_date  # Day number of sowing
            sowing_das  # Days from sowing to sowing
            maturity_das  # Days from sowing to maturity
            maturity_date  # Day number of maturity
        events Reporting Frequency: event=harvesting  # Day
  simulation Annie2
    clock
      start_date = 11-Apr-2007  # Select the start date of the simulation
      end_date = 15/10/2007  # Select the end date of the simulation
    summaryfile
    metfile met: filename=Gatton.met
    area Paddock
      folder Manager folder
        manager Sow on a fixed date
          # Sowing criteria
          date = 11-Apr-2007  # Enter sowing date (dd-mmm)
          # Sowing parameters
          crop = lettuce  # Enter name of crop to sow
          density = 6  # Enter sowing density (plants/m2)
          depth = 50  # Enter sowing depth (mm)
          cultivar = Annie  # Enter cultivar
          row_spacing = 600  # Enter row spacing (mm)
          on start_of_day:
          script: same as in Patagonia1.Paddock.Manager folder.Sow on a fixed date
        manager Harvest on a Growth Stage
          # Harvesting criteria
          stage = maturity  # Enter stage name
          # Harvesting parameters
          crop = lettuce  # Enter name of crop to sow
          on start_of_day:
```
        if ([crop].StageName = '[stage]') then
                    [crop] harvest
                    [crop] end_crop
        endif
```
      lettuce
      soil: same as Patagonia1.Paddock.Soil
      outputfile: filename=Annie2.out; title=Annie2
        variables
          variable:
            day  # Day
            sowing_date  # Day number of sowing
            sowing_das  # Days from sowing to sowing
            maturity_das  # Days from sowing to maturity
            maturity_date  # Day number of maturity
        events Reporting Frequency: event=harvesting  # Day
  simulation Annie3
    clock
      start_date = 17-Apr-2007  # Select the start date of the simulation
      end_date = 15/10/2007  # Select the end date of the simulation
    summaryfile
    metfile met: filename=Gatton.met
    area Paddock
      folder Manager folder
        manager Sow on a fixed date
          # Sowing criteria
          date = 17-Apr-2007  # Enter sowing date (dd-mmm)
          # Sowing parameters
          crop = lettuce  # Enter name of crop to sow
          density = 6  # Enter sowing density (plants/m2)
          depth = 50  # Enter sowing depth (mm)
          cultivar = Annie  # Enter cultivar
          row_spacing = 600  # Enter row spacing (mm)
          on start_of_day:
          script: same as in Patagonia1.Paddock.Manager folder.Sow on a fixed date
        manager Harvest on a Growth Stage
          # Harvesting criteria
          stage = maturity  # Enter stage name
          # Harvesting parameters
          crop = lettuce  # Enter name of crop to sow
          on start_of_day:
```
        if ([crop].StageName = '[stage]') then
                    [crop] harvest
                    [crop] end_crop
        endif
```
      lettuce
      soil: same as Patagonia1.Paddock.Soil
      outputfile: filename=Annie3.out; title=Annie3
        variables
          variable:
            day  # Day
            sowing_date  # Day number of sowing
            sowing_das  # Days from sowing to sowing
            maturity_das  # Days from sowing to maturity
            maturity_date  # Day number of maturity
        events Reporting Frequency: event=harvesting  # Day
  simulation Annie4
    clock
      start_date = 24-Apr-2007  # Select the start date of the simulation
      end_date = 15/10/2007  # Select the end date of the simulation
    summaryfile
    metfile met: filename=Gatton.met
    area Paddock
      folder Manager folder
        manager Sow on a fixed date
          # Sowing criteria
          date = 24-Apr-2007  # Enter sowing date (dd-mmm)
          # Sowing parameters
          crop = lettuce  # Enter name of crop to sow
          density = 6  # Enter sowing density (plants/m2)
          depth = 50  # Enter sowing depth (mm)
          cultivar = Annie  # Enter cultivar
          row_spacing = 600  # Enter row spacing (mm)
          on start_of_day:
          script: same as in Patagonia1.Paddock.Manager folder.Sow on a fixed date
        manager Harvest on a Growth Stage
          # Harvesting criteria
          stage = maturity  # Enter stage name
          # Harvesting parameters
          crop = lettuce  # Enter name of crop to sow
          on start_of_day:
```
        if ([crop].StageName = '[stage]') then
                    [crop] harvest
                    [crop] end_crop
        endif
```
      lettuce
      soil: same as Patagonia1.Paddock.Soil
      outputfile: filename=Annie4.out; title=Annie4
        variables
          variable:
            day  # Day
            sowing_date  # Day number of sowing
            sowing_das  # Days from sowing to sowing
            maturity_das  # Days from sowing to maturity
            maturity_date  # Day number of maturity
        events Reporting Frequency: event=harvesting  # Day
  simulation Annie5
    clock
      start_date = 17-Jul-2007  # Select the start date of the simulation
      end_date = 15/10/2007  # Select the end date of the simulation
    summaryfile
    metfile met: filename=Gatton.met
    area Paddock
      folder Manager folder
        manager Sow on a fixed date
          # Sowing criteria
          date = 17-Jul-2007  # Enter sowing date (dd-mmm)
          # Sowing parameters
          crop = lettuce  # Enter name of crop to sow
          density = 6  # Enter sowing density (plants/m2)
          depth = 50  # Enter sowing depth (mm)
          cultivar = Annie  # Enter cultivar
          row_spacing = 600  # Enter row spacing (mm)
          on start_of_day:
          script: same as in Patagonia1.Paddock.Manager folder.Sow on a fixed date
        manager Harvest on a Growth Stage
          # Harvesting criteria
          stage = maturity  # Enter stage name
          # Harvesting parameters
          crop = lettuce  # Enter name of crop to sow
          on start_of_day:
```
        if ([crop].StageName = '[stage]') then
                    [crop] harvest
                    [crop] end_crop
        endif
```
      lettuce
      soil: same as Patagonia1.Paddock.Soil
      outputfile: filename=Annie5.out; title=Annie5
        variables
          variable:
            day  # Day
            sowing_date  # Day number of sowing
            sowing_das  # Days from sowing to sowing
            maturity_das  # Days from sowing to maturity
            maturity_date  # Day number of maturity
        events Reporting Frequency: event=harvesting  # Day
  simulation Annie6
    clock
      start_date = 26-Jul-2007  # Select the start date of the simulation
      end_date = 15/10/2007  # Select the end date of the simulation
    summaryfile
    metfile met: filename=Gatton.met
    area Paddock
      folder Manager folder
        manager Sow on a fixed date
          # Sowing criteria
          date = 26-Jul-2007  # Enter sowing date (dd-mmm)
          # Sowing parameters
          crop = lettuce  # Enter name of crop to sow
          density = 6  # Enter sowing density (plants/m2)
          depth = 50  # Enter sowing depth (mm)
          cultivar = Annie  # Enter cultivar
          row_spacing = 600  # Enter row spacing (mm)
          on start_of_day:
          script: same as in Patagonia1.Paddock.Manager folder.Sow on a fixed date
        manager Harvest on a Growth Stage
          # Harvesting criteria
          stage = maturity  # Enter stage name
          # Harvesting parameters
          crop = lettuce  # Enter name of crop to sow
          on start_of_day:
```
        if ([crop].StageName = '[stage]') then
                    [crop] harvest
                    [crop] end_crop
        endif
```
      lettuce
      soil: same as Patagonia1.Paddock.Soil
      outputfile: filename=Annie6.out; title=Annie6
        variables
          variable:
            day  # Day
            sowing_date  # Day number of sowing
            sowing_das  # Days from sowing to sowing
            maturity_das  # Days from sowing to maturity
            maturity_date  # Day number of maturity
        events Reporting Frequency: event=harvesting  # Day
  simulation Annie7
    clock
      start_date = 1-Aug-2007  # Select the start date of the simulation
      end_date = 15/10/2007  # Select the end date of the simulation
    summaryfile
    metfile met: filename=Gatton.met
    area Paddock
      folder Manager folder
        manager Sow on a fixed date
          # Sowing criteria
          date = 1-Aug-2007  # Enter sowing date (dd-mmm)
          # Sowing parameters
          crop = lettuce  # Enter name of crop to sow
          density = 6  # Enter sowing density (plants/m2)
          depth = 50  # Enter sowing depth (mm)
          cultivar = Annie  # Enter cultivar
          row_spacing = 600  # Enter row spacing (mm)
          on start_of_day:
          script: same as in Patagonia1.Paddock.Manager folder.Sow on a fixed date
        manager Harvest on a Growth Stage
          # Harvesting criteria
          stage = maturity  # Enter stage name
          # Harvesting parameters
          crop = lettuce  # Enter name of crop to sow
          on start_of_day:
```
        if ([crop].StageName = '[stage]') then
                    [crop] harvest
                    [crop] end_crop
        endif
```
      lettuce
      soil: same as Patagonia1.Paddock.Soil
      outputfile: filename=Annie7.out; title=Annie7
        variables
          variable:
            day  # Day
            sowing_date  # Day number of sowing
            sowing_das  # Days from sowing to sowing
            maturity_das  # Days from sowing to maturity
            maturity_date  # Day number of maturity
        events Reporting Frequency: event=harvesting  # Day
  simulation Annie8
    clock
      start_date = 8-Aug-2007  # Select the start date of the simulation
      end_date = 15/10/2007  # Select the end date of the simulation
    summaryfile
    metfile met: filename=Gatton.met
    area Paddock
      folder Manager folder
        manager Sow on a fixed date
          # Sowing criteria
          date = 8-Aug-2007  # Enter sowing date (dd-mmm)
          # Sowing parameters
          crop = lettuce  # Enter name of crop to sow
          density = 6  # Enter sowing density (plants/m2)
          depth = 50  # Enter sowing depth (mm)
          cultivar = Annie  # Enter cultivar
          row_spacing = 600  # Enter row spacing (mm)
          on start_of_day:
          script: same as in Patagonia1.Paddock.Manager folder.Sow on a fixed date
        manager Harvest on a Growth Stage
          # Harvesting criteria
          stage = maturity  # Enter stage name
          # Harvesting parameters
          crop = lettuce  # Enter name of crop to sow
          on start_of_day:
```
        if ([crop].StageName = '[stage]') then
                    [crop] harvest
                    [crop] end_crop
        endif
```
      lettuce
      soil: same as Patagonia1.Paddock.Soil
      outputfile: filename=Annie8.out; title=Annie8
        variables
          variable:
            day  # Day
            sowing_date  # Day number of sowing
            sowing_das  # Days from sowing to sowing
            maturity_das  # Days from sowing to maturity
            maturity_date  # Day number of maturity
        events Reporting Frequency: event=harvesting  # Day
  simulation AztecSun1
    clock
      start_date = 3-Apr-2007  # Select the start date of the simulation
      end_date = 15/10/2007  # Select the end date of the simulation
    summaryfile
    metfile met: filename=Gatton.met
    area Paddock
      folder Manager folder
        manager Sow on a fixed date
          # Sowing criteria
          date = 3-Apr-2007  # Enter sowing date (dd-mmm)
          # Sowing parameters
          crop = lettuce  # Enter name of crop to sow
          density = 6  # Enter sowing density (plants/m2)
          depth = 50  # Enter sowing depth (mm)
          cultivar = AztecSun  # Enter cultivar
          row_spacing = 600  # Enter row spacing (mm)
          on start_of_day:
          script: same as in Patagonia1.Paddock.Manager folder.Sow on a fixed date
        manager Harvest on a Growth Stage
          # Harvesting criteria
          stage = maturity  # Enter stage name
          # Harvesting parameters
          crop = lettuce  # Enter name of crop to sow
          on start_of_day:
```
        if ([crop].StageName = '[stage]') then
                    [crop] harvest
                    [crop] end_crop
        endif
```
      lettuce
      soil: same as Patagonia1.Paddock.Soil
      outputfile: filename=AztecSun1.out; title=AztecSun1
        variables
          variable:
            day  # Day
            sowing_date  # Day number of sowing
            sowing_das  # Days from sowing to sowing
            maturity_das  # Days from sowing to maturity
            maturity_date  # Day number of maturity
        events Reporting Frequency: event=harvesting  # Day
  simulation AztecSun2
    clock
      start_date = 11-Apr-2007  # Select the start date of the simulation
      end_date = 15/10/2007  # Select the end date of the simulation
    summaryfile
    metfile met: filename=Gatton.met
    area Paddock
      folder Manager folder
        manager Sow on a fixed date
          # Sowing criteria
          date = 11-Apr-2007  # Enter sowing date (dd-mmm)
          # Sowing parameters
          crop = lettuce  # Enter name of crop to sow
          density = 6  # Enter sowing density (plants/m2)
          depth = 50  # Enter sowing depth (mm)
          cultivar = AztecSun  # Enter cultivar
          row_spacing = 600  # Enter row spacing (mm)
          on start_of_day:
          script: same as in Patagonia1.Paddock.Manager folder.Sow on a fixed date
        manager Harvest on a Growth Stage
          # Harvesting criteria
          stage = maturity  # Enter stage name
          # Harvesting parameters
          crop = lettuce  # Enter name of crop to sow
          on start_of_day:
```
        if ([crop].StageName = '[stage]') then
                    [crop] harvest
                    [crop] end_crop
        endif
```
      lettuce
      soil: same as Patagonia1.Paddock.Soil
      outputfile: filename=AztecSun2.out; title=AztecSun2
        variables
          variable:
            day  # Day
            sowing_date  # Day number of sowing
            sowing_das  # Days from sowing to sowing
            maturity_das  # Days from sowing to maturity
            maturity_date  # Day number of maturity
        events Reporting Frequency: event=harvesting  # Day
  simulation Raider1
    clock
      start_date = 29-mar-2004  # Select the start date of the simulation
      end_date = 15/10/2007  # Select the end date of the simulation
    summaryfile
    metfile met: filename=Gatton.met
    area Paddock
      folder Manager folder
        manager Sow on a fixed date
          # Sowing criteria
          date = 29-mar-2004  # Enter sowing date (dd-mmm)
          # Sowing parameters
          crop = lettuce  # Enter name of crop to sow
          density = 6  # Enter sowing density (plants/m2)
          depth = 50  # Enter sowing depth (mm)
          cultivar = Raider  # Enter cultivar
          row_spacing = 600  # Enter row spacing (mm)
          on start_of_day:
          script: same as in Patagonia1.Paddock.Manager folder.Sow on a fixed date
        manager Harvest on a Growth Stage
          # Harvesting criteria
          stage = maturity  # Enter stage name
          # Harvesting parameters
          crop = lettuce  # Enter name of crop to sow
          on start_of_day:
```
        if ([crop].StageName = '[stage]') then
                    [crop] harvest
                    [crop] end_crop
        endif
```
      lettuce
      soil: same as Patagonia1.Paddock.Soil
      outputfile: filename=Raider1.out; title=Raider1
        variables
          variable:
            day  # Day
            sowing_date  # Day number of sowing
            sowing_das  # Days from sowing to sowing
            maturity_das  # Days from sowing to maturity
            maturity_date  # Day number of maturity
        events Reporting Frequency: event=harvesting  # Day
  simulation Raider2
    clock
      start_date = 30-mar-2004  # Select the start date of the simulation
      end_date = 15/10/2007  # Select the end date of the simulation
    summaryfile
    metfile met: filename=Gatton.met
    area Paddock
      folder Manager folder
        manager Sow on a fixed date
          # Sowing criteria
          date = 30-mar-2004  # Enter sowing date (dd-mmm)
          # Sowing parameters
          crop = lettuce  # Enter name of crop to sow
          density = 6  # Enter sowing density (plants/m2)
          depth = 50  # Enter sowing depth (mm)
          cultivar = Raider  # Enter cultivar
          row_spacing = 600  # Enter row spacing (mm)
          on start_of_day:
          script: same as in Patagonia1.Paddock.Manager folder.Sow on a fixed date
        manager Harvest on a Growth Stage
          # Harvesting criteria
          stage = maturity  # Enter stage name
          # Harvesting parameters
          crop = lettuce  # Enter name of crop to sow
          on start_of_day:
```
        if ([crop].StageName = '[stage]') then
                    [crop] harvest
                    [crop] end_crop
        endif
```
      lettuce
      soil: same as Patagonia1.Paddock.Soil
      outputfile: filename=Raider2.out; title=Raider2
        variables
          variable:
            day  # Day
            sowing_date  # Day number of sowing
            sowing_das  # Days from sowing to sowing
            maturity_das  # Days from sowing to maturity
            maturity_date  # Day number of maturity
        events Reporting Frequency: event=harvesting  # Day
  simulation Raider3
    clock
      start_date = 15-jul-2004  # Select the start date of the simulation
      end_date = 15/10/2007  # Select the end date of the simulation
    summaryfile
    metfile met: filename=Gatton.met
    area Paddock
      folder Manager folder
        manager Sow on a fixed date
          # Sowing criteria
          date = 15-jul-2004  # Enter sowing date (dd-mmm)
          # Sowing parameters
          crop = lettuce  # Enter name of crop to sow
          density = 6  # Enter sowing density (plants/m2)
          depth = 50  # Enter sowing depth (mm)
          cultivar = Raider  # Enter cultivar
          row_spacing = 600  # Enter row spacing (mm)
          on start_of_day:
          script: same as in Patagonia1.Paddock.Manager folder.Sow on a fixed date
        manager Harvest on a Growth Stage
          # Harvesting criteria
          stage = maturity  # Enter stage name
          # Harvesting parameters
          crop = lettuce  # Enter name of crop to sow
          on start_of_day:
```
        if ([crop].StageName = '[stage]') then
                    [crop] harvest
                    [crop] end_crop
        endif
```
      lettuce
      soil: same as Patagonia1.Paddock.Soil
      outputfile: filename=Raider3.out; title=Raider3
        variables
          variable:
            day  # Day
            sowing_date  # Day number of sowing
            sowing_das  # Days from sowing to sowing
            maturity_das  # Days from sowing to maturity
            maturity_date  # Day number of maturity
        events Reporting Frequency: event=harvesting  # Day
  simulation Raider4
    clock
      start_date = 16-jul-2004  # Select the start date of the simulation
      end_date = 15/10/2007  # Select the end date of the simulation
    summaryfile
    metfile met: filename=Gatton.met
    area Paddock
      folder Manager folder
        manager Sow on a fixed date
          # Sowing criteria
          date = 16-jul-2004  # Enter sowing date (dd-mmm)
          # Sowing parameters
          crop = lettuce  # Enter name of crop to sow
          density = 6  # Enter sowing density (plants/m2)
          depth = 50  # Enter sowing depth (mm)
          cultivar = Raider  # Enter cultivar
          row_spacing = 600  # Enter row spacing (mm)
          on start_of_day:
          script: same as in Patagonia1.Paddock.Manager folder.Sow on a fixed date
        manager Harvest on a Growth Stage
          # Harvesting criteria
          stage = maturity  # Enter stage name
          # Harvesting parameters
          crop = lettuce  # Enter name of crop to sow
          on start_of_day:
```
        if ([crop].StageName = '[stage]') then
                    [crop] harvest
                    [crop] end_crop
        endif
```
      lettuce
      soil: same as Patagonia1.Paddock.Soil
      outputfile: filename=Raider4.out; title=Raider4
        variables
          variable:
            day  # Day
            sowing_date  # Day number of sowing
            sowing_das  # Days from sowing to sowing
            maturity_das  # Days from sowing to maturity
            maturity_date  # Day number of maturity
        events Reporting Frequency: event=harvesting  # Day
  simulation Raider5
    clock
      start_date = 27-jul-2004  # Select the start date of the simulation
      end_date = 15/10/2007  # Select the end date of the simulation
    summaryfile
    metfile met: filename=Gatton.met
    area Paddock
      folder Manager folder
        manager Sow on a fixed date
          # Sowing criteria
          date = 27-jul-2004  # Enter sowing date (dd-mmm)
          # Sowing parameters
          crop = lettuce  # Enter name of crop to sow
          density = 6  # Enter sowing density (plants/m2)
          depth = 50  # Enter sowing depth (mm)
          cultivar = Raider  # Enter cultivar
          row_spacing = 600  # Enter row spacing (mm)
          on start_of_day:
          script: same as in Patagonia1.Paddock.Manager folder.Sow on a fixed date
        manager Harvest on a Growth Stage
          # Harvesting criteria
          stage = maturity  # Enter stage name
          # Harvesting parameters
          crop = lettuce  # Enter name of crop to sow
          on start_of_day:
```
        if ([crop].StageName = '[stage]') then
                    [crop] harvest
                    [crop] end_crop
        endif
```
      lettuce
      soil: same as Patagonia1.Paddock.Soil
      outputfile: filename=Raider5.out; title=Raider5
        variables
          variable:
            day  # Day
            sowing_date  # Day number of sowing
            sowing_das  # Days from sowing to sowing
            maturity_das  # Days from sowing to maturity
            maturity_date  # Day number of maturity
        events Reporting Frequency: event=harvesting  # Day
  simulation Raider6
    clock
      start_date = 12-jul-2001  # Select the start date of the simulation
      end_date = 15/10/2007  # Select the end date of the simulation
    summaryfile
    metfile met: filename=Gatton.met
    area Paddock
      folder Manager folder
        manager Sow on a fixed date
          # Sowing criteria
          date = 12-jul-2001  # Enter sowing date (dd-mmm)
          # Sowing parameters
          crop = lettuce  # Enter name of crop to sow
          density = 6  # Enter sowing density (plants/m2)
          depth = 50  # Enter sowing depth (mm)
          cultivar = Raider  # Enter cultivar
          row_spacing = 600  # Enter row spacing (mm)
          on start_of_day:
          script: same as in Patagonia1.Paddock.Manager folder.Sow on a fixed date
        manager Harvest on a Growth Stage
          # Harvesting criteria
          stage = maturity  # Enter stage name
          # Harvesting parameters
          crop = lettuce  # Enter name of crop to sow
          on start_of_day:
```
        if ([crop].StageName = '[stage]') then
                    [crop] harvest
                    [crop] end_crop
        endif
```
      lettuce
      soil: same as Patagonia1.Paddock.Soil
      outputfile: filename=Raider6.out; title=Raider6
        variables
          variable:
            day  # Day
            sowing_date  # Day number of sowing
            sowing_das  # Days from sowing to sowing
            maturity_das  # Days from sowing to maturity
            maturity_date  # Day number of maturity
        events Reporting Frequency: event=harvesting  # Day
  simulation Oxford1
    clock
      start_date = 27-apr-2004  # Select the start date of the simulation
      end_date = 15/10/2007  # Select the end date of the simulation
    summaryfile
    metfile met: filename=Gatton.met
    area Paddock
      folder Manager folder
        manager Sow on a fixed date
          # Sowing criteria
          date = 27-apr-2004  # Enter sowing date (dd-mmm)
          # Sowing parameters
          crop = lettuce  # Enter name of crop to sow
          density = 6  # Enter sowing density (plants/m2)
          depth = 50  # Enter sowing depth (mm)
          cultivar = Oxford  # Enter cultivar
          row_spacing = 600  # Enter row spacing (mm)
          on start_of_day:
          script: same as in Patagonia1.Paddock.Manager folder.Sow on a fixed date
        manager Harvest on a Growth Stage
          # Harvesting criteria
          stage = maturity  # Enter stage name
          # Harvesting parameters
          crop = lettuce  # Enter name of crop to sow
          on start_of_day:
```
        if ([crop].StageName = '[stage]') then
                    [crop] harvest
                    [crop] end_crop
        endif
```
      lettuce
      soil: same as Patagonia1.Paddock.Soil
      outputfile: filename=Oxford1.out; title=Oxford1
        variables
          variable:
            day  # Day
            sowing_date  # Day number of sowing
            sowing_das  # Days from sowing to sowing
            maturity_das  # Days from sowing to maturity
            maturity_date  # Day number of maturity
        events Reporting Frequency: event=harvesting  # Day
  simulation Oxford2
    clock
      start_date = 3-may-2004  # Select the start date of the simulation
      end_date = 15/10/2007  # Select the end date of the simulation
    summaryfile
    metfile met: filename=Gatton.met
    area Paddock
      folder Manager folder
        manager Sow on a fixed date
          # Sowing criteria
          date = 3-may-2004  # Enter sowing date (dd-mmm)
          # Sowing parameters
          crop = lettuce  # Enter name of crop to sow
          density = 6  # Enter sowing density (plants/m2)
          depth = 50  # Enter sowing depth (mm)
          cultivar = Oxford  # Enter cultivar
          row_spacing = 600  # Enter row spacing (mm)
          on start_of_day:
          script: same as in Patagonia1.Paddock.Manager folder.Sow on a fixed date
        manager Harvest on a Growth Stage
          # Harvesting criteria
          stage = maturity  # Enter stage name
          # Harvesting parameters
          crop = lettuce  # Enter name of crop to sow
          on start_of_day:
```
        if ([crop].StageName = '[stage]') then
                    [crop] harvest
                    [crop] end_crop
        endif
```
      lettuce
      soil: same as Patagonia1.Paddock.Soil
      outputfile: filename=Oxford2.out; title=Oxford2
        variables
          variable:
            day  # Day
            sowing_date  # Day number of sowing
            sowing_das  # Days from sowing to sowing
            maturity_das  # Days from sowing to maturity
            maturity_date  # Day number of maturity
        events Reporting Frequency: event=harvesting  # Day
  simulation Oxford3
    clock
      start_date = 18-may-2004  # Select the start date of the simulation
      end_date = 15/10/2007  # Select the end date of the simulation
    summaryfile
    metfile met: filename=Gatton.met
    area Paddock
      folder Manager folder
        manager Sow on a fixed date
          # Sowing criteria
          date = 18-may-2004  # Enter sowing date (dd-mmm)
          # Sowing parameters
          crop = lettuce  # Enter name of crop to sow
          density = 6  # Enter sowing density (plants/m2)
          depth = 50  # Enter sowing depth (mm)
          cultivar = Oxford  # Enter cultivar
          row_spacing = 600  # Enter row spacing (mm)
          on start_of_day:
          script: same as in Patagonia1.Paddock.Manager folder.Sow on a fixed date
        manager Harvest on a Growth Stage
          # Harvesting criteria
          stage = maturity  # Enter stage name
          # Harvesting parameters
          crop = lettuce  # Enter name of crop to sow
          on start_of_day:
```
        if ([crop].StageName = '[stage]') then
                    [crop] harvest
                    [crop] end_crop
        endif
```
      lettuce
      soil: same as Patagonia1.Paddock.Soil
      outputfile: filename=Oxford3.out; title=Oxford3
        variables
          variable:
            day  # Day
            sowing_date  # Day number of sowing
            sowing_das  # Days from sowing to sowing
            maturity_das  # Days from sowing to maturity
            maturity_date  # Day number of maturity
        events Reporting Frequency: event=harvesting  # Day
  simulation Oxford4
    clock
      start_date = 12-jul-2001  # Select the start date of the simulation
      end_date = 15/10/2007  # Select the end date of the simulation
    summaryfile
    metfile met: filename=Gatton.met
    area Paddock
      folder Manager folder
        manager Sow on a fixed date
          # Sowing criteria
          date = 12-jul-2001  # Enter sowing date (dd-mmm)
          # Sowing parameters
          crop = lettuce  # Enter name of crop to sow
          density = 6  # Enter sowing density (plants/m2)
          depth = 50  # Enter sowing depth (mm)
          cultivar = Oxford  # Enter cultivar
          row_spacing = 600  # Enter row spacing (mm)
          on start_of_day:
          script: same as in Patagonia1.Paddock.Manager folder.Sow on a fixed date
        manager Harvest on a Growth Stage
          # Harvesting criteria
          stage = maturity  # Enter stage name
          # Harvesting parameters
          crop = lettuce  # Enter name of crop to sow
          on start_of_day:
```
        if ([crop].StageName = '[stage]') then
                    [crop] harvest
                    [crop] end_crop
        endif
```
      lettuce
      soil: same as Patagonia1.Paddock.Soil
      outputfile: filename=Oxford4.out; title=Oxford4
        variables
          variable:
            day  # Day
            sowing_date  # Day number of sowing
            sowing_das  # Days from sowing to sowing
            maturity_das  # Days from sowing to maturity
            maturity_date  # Day number of maturity
        events Reporting Frequency: event=harvesting  # Day
  simulation Titanic1
    clock
      start_date = 26-may-2004  # Select the start date of the simulation
      end_date = 15/10/2007  # Select the end date of the simulation
    summaryfile
    metfile met: filename=Gatton.met
    area Paddock
      folder Manager folder
        manager Sow on a fixed date
          # Sowing criteria
          date = 26-may-2004  # Enter sowing date (dd-mmm)
          # Sowing parameters
          crop = lettuce  # Enter name of crop to sow
          density = 6  # Enter sowing density (plants/m2)
          depth = 50  # Enter sowing depth (mm)
          cultivar = Titanic  # Enter cultivar
          row_spacing = 600  # Enter row spacing (mm)
          on start_of_day:
          script: same as in Patagonia1.Paddock.Manager folder.Sow on a fixed date
        manager Harvest on a Growth Stage
          # Harvesting criteria
          stage = maturity  # Enter stage name
          # Harvesting parameters
          crop = lettuce  # Enter name of crop to sow
          on start_of_day:
```
        if ([crop].StageName = '[stage]') then
                    [crop] harvest
                    [crop] end_crop
        endif
```
      lettuce
      soil: same as Patagonia1.Paddock.Soil
      outputfile: filename=Titanic1.out; title=Titanic1
        variables
          variable:
            day  # Day
            sowing_date  # Day number of sowing
            sowing_das  # Days from sowing to sowing
            maturity_das  # Days from sowing to maturity
            maturity_date  # Day number of maturity
        events Reporting Frequency: event=harvesting  # Day
  simulation Titanic2
    clock
      start_date = 7-jun-2004  # Select the start date of the simulation
      end_date = 15/10/2007  # Select the end date of the simulation
    summaryfile
    metfile met: filename=Gatton.met
    area Paddock
      folder Manager folder
        manager Sow on a fixed date
          # Sowing criteria
          date = 7-jun-2004  # Enter sowing date (dd-mmm)
          # Sowing parameters
          crop = lettuce  # Enter name of crop to sow
          density = 6  # Enter sowing density (plants/m2)
          depth = 50  # Enter sowing depth (mm)
          cultivar = Titanic  # Enter cultivar
          row_spacing = 600  # Enter row spacing (mm)
          on start_of_day:
          script: same as in Patagonia1.Paddock.Manager folder.Sow on a fixed date
        manager Harvest on a Growth Stage
          # Harvesting criteria
          stage = maturity  # Enter stage name
          # Harvesting parameters
          crop = lettuce  # Enter name of crop to sow
          on start_of_day:
```
        if ([crop].StageName = '[stage]') then
                    [crop] harvest
                    [crop] end_crop
        endif
```
      lettuce
      soil: same as Patagonia1.Paddock.Soil
      outputfile: filename=Titanic2.out; title=Titanic2
        variables
          variable:
            day  # Day
            sowing_date  # Day number of sowing
            sowing_das  # Days from sowing to sowing
            maturity_das  # Days from sowing to maturity
            maturity_date  # Day number of maturity
        events Reporting Frequency: event=harvesting  # Day
  simulation Titanic3
    clock
      start_date = 12-apr-2007  # Select the start date of the simulation
      end_date = 15/10/2007  # Select the end date of the simulation
    summaryfile
    metfile met: filename=Gatton.met
    area Paddock
      folder Manager folder
        manager Sow on a fixed date
          # Sowing criteria
          date = 12-apr-2007  # Enter sowing date (dd-mmm)
          # Sowing parameters
          crop = lettuce  # Enter name of crop to sow
          density = 6  # Enter sowing density (plants/m2)
          depth = 50  # Enter sowing depth (mm)
          cultivar = Titanic  # Enter cultivar
          row_spacing = 600  # Enter row spacing (mm)
          on start_of_day:
          script: same as in Patagonia1.Paddock.Manager folder.Sow on a fixed date
        manager Harvest on a Growth Stage
          # Harvesting criteria
          stage = maturity  # Enter stage name
          # Harvesting parameters
          crop = lettuce  # Enter name of crop to sow
          on start_of_day:
```
        if ([crop].StageName = '[stage]') then
                    [crop] harvest
                    [crop] end_crop
        endif
```
      lettuce
      soil: same as Patagonia1.Paddock.Soil
      outputfile: filename=Titanic3.out; title=Titanic3
        variables
          variable:
            day  # Day
            sowing_date  # Day number of sowing
            sowing_das  # Days from sowing to sowing
            maturity_das  # Days from sowing to maturity
            maturity_date  # Day number of maturity
        events Reporting Frequency: event=harvesting  # Day
