folder simulations: version=32
  memo
    - report.par file missing from original simulations. Assumed obs leaf_wt, stem_wt, root_wt were green wt and so output green wt variables to compare with observed.

    - In the two Warra sims, lucerne was intercropped with wheat. In both simulations lucerne dies because of total leaf senescence about 6 months after the wheat crop is harvested.

    - In the two Warra sims, wheat harvest dates in the original manager have a note next to them saying that dates were guessed. In both cases they are later than when stage 10 is reached in the model, so produces a message in summary file saying that wheat also dies because of total leaf senescence. Wheat harvest dates have been changed to be the same date as when stage 10 is reached so that do not generate wheat crop failure message.

    - In the two Roseworthy sims, the observed data at the times when the lucerne was cut has two observed values for biomass height etc - assuming these are pre-cut sampling values and post-cut sampling values. The height value is always 50mm post cut. In operations the harvest height was set to 10mm so increased this to 50mm to reflect observed data.
  simulation Gatton 1994-95 Hunter River
    memo
      Note that irrigation included with rain in met file.
    metfile met: filename=gat9495i.met
    clock
      start_date = 29/04/1994  # Enter the start date of the simulation
      end_date = 9/11/1995  # Enter the end date of the simulation
    summaryfile
    area paddock
      folder Manager folder
        manager Gatton
          on init:
```
reduce_status = 0
```
          on start_of_day:
```
if (crop_class = 'regrowth' and day = 120 and reduce_status = 0) then
      lucerne reduce
      reduce_status = 1
endif

if (day = 150 and crop_class = 'reduced') then
     lucerne spring
     reduce_status = 0
endif

! Simulation info
site='Gatton'
season='1994-95'
treat=1
```
      operations
        5/05/1994  lucerne sow plants = 300, sowing_depth = 10, cultivar = hunter_river
        12/09/1994  lucerne harvest height = 10 (mm), remove = 0.95 (), plants = 700
        17/10/1994  lucerne harvest height = 10 (mm), remove = 0.95 ()
        16/11/1994  lucerne harvest height = 10 (mm), remove = 0.95 ()
        14/12/1994  lucerne harvest height = 10 (mm), remove = 0.95 ()
        9/01/1995  lucerne harvest height = 10 (mm), remove = 0.95 ()
        21/02/1995  lucerne harvest height = 10 (mm), remove = 0.95 ()
        28/03/1995  lucerne harvest height = 10 (mm), remove = 0.95 ()
        23/05/1995  lucerne harvest height = 10 (mm), remove = 0.95 ()
        13/07/1995  lucerne harvest height = 10 (mm), remove = 0.95 ()
        1/09/1995  lucerne harvest height = 10 (mm), remove = 0.95 ()
        10/10/1995  lucerne harvest height = 10 (mm), remove = 0.95 ()
        9/11/1995  lucerne harvest height = 10 (mm), remove = 0.95 ()
      lucerne
      surfaceom Surface Organic Matter
        PoolName = sorghum  # Organic Matter pool name
        type = sorghum  # Organic Matter type
        mass = 1500  # Initial surface residue (kg/ha)
        cnr = 100  # C:N ratio of initial residue
        standing_fraction = 1  # Fraction of residue standing
      outputfile: filename=Gatton 1994-95 Hunter River.out; title=Gatton 1994-95 Hunter River
        variables
          variable:
            site
            season
            treat
            dd/mm/yyyy as Date  # Date (dd/mm/yyyy)
            year  # Year
            day  # Day
            daysafteremergence  # emergence - days spent in this phase
            lai  # Leaf area index
            biomass  # Biomass
            leafgreenwt  # Green leaf dry matter
            leaftotalwt  # Total leaf dry matter
            stemgreenwt  # Green Stem dry matter
            stemtotalwt  # Total Stem dry matter
            n_uptake  # N uptake
            rootgreenwt  # Green Root dry matter
            roottotalwt  # Total Root dry matter
            node_no  # Number of mainstem nodes per plant
            sw_dep() as total_sw
            no3() as total_no3
            n_conc_stover
            height
            swdef_photo
            nfact_photo
        events Reporting Frequency: event=Daily  # End of daily simulation time step
      soil gatton94_95
        Water
          Layer:
            Thickness (mm)  BD (g/cc)  AirDry (mm/mm)  LL15 (mm/mm)  DUL (mm/mm)  SAT (mm/mm)
            150             1.38       0.1             0.143         0.38         0.43
            150             1.34       0.1             0.201         0.38         0.43
            300             1.35       0.1             0.237         0.4          0.43
            300             1.47       0.1             0.237         0.4          0.43
            300             1.49       0.1             0.192         0.39         0.42
            300             1.5        0.1             0.176         0.38         0.4
            300             1.54       0.1             0.2           0.38         0.4
            300             1.55       0.1             0.23          0.38         0.4
            300             1.55       0.1             0.25          0.359        0.41
            300             1.57       0.1             0.26          0.356        0.408
            300             1.58       0.1             0.27          0.356        0.404
            600             1.6        0.1             0.28          0.35         0.396
          SoilCrop lucerne
            Layer:
              Thickness (mm)  LL (mm/mm)  KL (/day)  XF (0-1)
              150             0.143       0.12       1
              150             0.201       0.12       1
              300             0.237       0.1        1
              300             0.237       0.1        1
              300             0.192       0.1        1
              300             0.176       0.08       1
              300             0.2         0.08       1
              300             0.23        0.05       1
              300             0.25        0.05       1
              300             0.25        0.03       1
              300             0.25        0.03       1
              600             0.25        0.03       1
        SoilWat: SummerCona=3.5; SummerU=6; SummerDate=1-Nov; WinterCona=3.5; WinterU=6; WinterDate=1-Apr; DiffusConst=250; DiffusSlope=22; Salb=0.13; CN2Bare=68; CNRed=20; CNCov=0.8
          Layer:
            Thickness (mm)  SWCON (0-1)
            150             0.3
            150             0.3
            300             0.3
            300             0.3
            300             0.3
            300             0.3
            300             0.3
            300             0.3
            300             0.3
            300             0.3
            300             0.3
            600             0.3
        SoilOrganicMatter: RootCN=50; RootWT=1500; SoilCN=14.5; EnrACoeff=7.4; EnrBCoeff=0.2
          Layer:
            Thickness (mm)  OC (Total %)  FBiom (0-1)  FInert (0-1)
            150             1.82          0.025        0.45
            150             1.47          0.025        0.6
            300             1.2           0.015        0.75
            300             1.03          0.01         0.9
            300             0.47          0.01         0.96
            300             0.47          0.01         0.96
            300             0.47          0.01         0.96
            300             0.47          0.01         0.96
            300             0.47          0.01         0.96
            300             0.47          0.01         0.96
            300             0.47          0.01         0.96
            600             0.47          0.01         0.96
        Analysis
          Layer:
            Thickness (mm)  PH (1:5 water)
            150             7.5
            150             8
            300             8
            300             8
            300             8
            300             8
            300             8
            300             8
            300             8
            300             8
            300             8
            600             8
        Sample Initial nitrogen
          Layer:
            Thickness (mm)  NO3 (ppm)  NH4 (ppm)
            150             0.709935   1.00004
            150             0.339966   0.999854
            300             0.259977   0.999957
            300             0.22998    1.00001
            300             0.229982   0.500003
            300             0.259982   0.500013
            300             0.269982   0.500013
            300             0.299986   0.500008
            300             0.299987   0.500019
            300             0.299989   0.500009
            300             0.299994   0.500007
            600             0.299994   0.5
        Sample Initial water
          Layer:
            Thickness (mm)  SW (mm/mm)
            150             0.2
            150             0.2
            300             0.2
            300             0.2
            300             0.2
            300             0.2
            300             0.2
            300             0.2
            300             0.2
            300             0.2
            300             0.2
            600             0.2
  simulation Lincoln 1996-01 Kaituna Dryland
    metfile met: filename=ivf9601.met
    clock
      start_date = 31/10/1996  # Enter the start date of the simulation
      end_date = 6/01/2002  # Enter the end date of the simulation
    summaryfile
    area paddock
      irrigation
      folder Manager folder
        irriation
        manager Lincoln
          on init:
```
reduce_status = 0
```
          on start_of_day:
```
if (crop_class = 'regrowth' and day = 120 and reduce_status = 0) then
      lucerne reduce
      reduce_status = 1
endif

if (day = 150 and crop_class = 'reduced') then
     lucerne spring
     reduce_status = 0
endif

! Simulation info
site='Lincoln'
season='1996-2001'
treat=1
```
      operations
        31/10/1996  lucerne sow plants = 450, sowing_depth = 20, cultivar = kaituna !sets plant number at 850
        21/02/1997  lucerne harvest height = 1(mm) , remove = 0.98, plants = 850  ()   !21 Feb
        5/06/1997  lucerne harvest height = 1(mm) , remove = 0.98       !0.98 ()    ! 5 June
        6/10/1997  lucerne harvest height = 1(mm) , remove = 0.98 () ! 6 Oct
        18/11/1997  lucerne harvest height = 1(mm) , remove = 0.99 () !18 Nov
        23/12/1997  lucerne harvest height = 1(mm) , remove = 0.98 () !23 Dec
        3/02/1998  lucerne harvest height = 1(mm) , remove = 0.98 () ! 3 Feb
        12/03/1998  lucerne harvest height = 1(mm) , remove = 0.98 () !12 Mar
        6/05/1998  lucerne kill_stem                                 ! 5 May
        29/05/1998  lucerne harvest height = 1(mm) , remove = 0.98 () !29 May
        11/09/1998  irrigation apply amount = 30 (mm) !11 Sep
        12/09/1998  irrigation apply amount = 30 (mm) !12 Sep
        14/09/1998  irrigation apply amount = 30 (mm) !14 Sep
        16/09/1998  irrigation apply amount = 30 (mm) !16 Sep
        18/09/1998  irrigation apply amount = 30 (mm) !18 Sep
        29/09/1998  lucerne harvest height  = 1(mm) , remove = 0.98 (), plants = 600 !29 Sep
        12/11/1998  lucerne harvest height  = 1(mm) , remove = 0.98 () !12 Nov
        15/12/1998  lucerne harvest height  = 1(mm) , remove = 0.98 () !15 Dec
        13/01/1999  lucerne harvest height  = 1(mm) , remove = 0.98 () !13 Jan
        18/02/1999  lucerne harvest height  = 1(mm) , remove = 0.98 () !18 Feb
        15/04/1999  lucerne harvest height =  1(mm) , remove = 0.98 () !15 Apr
        2/07/1999  lucerne harvest height =  1(mm) , remove = 0.98 () ! 2 Jul
        29/09/1999  lucerne harvest height = 1(mm) , remove = 0.98 () !29 Sep
        11/11/1999  lucerne harvest height = 1(mm) , remove = 0.98 () !11 Nov
        20/12/1999  lucerne harvest height = 1(mm) , remove = 0.98 () !20 Dec
        24/01/2000  lucerne harvest height = 1(mm) , remove = 0.98 () !24 Jan
        12/03/2000  lucerne harvest height = 1(mm) , remove = 0.98 () !14 Mar
        17/05/2000  lucerne kill_stem                                 !17 May
        25/05/2000  lucerne harvest height = 1(mm) , remove = 0.98 () !25 May
        22/09/2000  lucerne harvest height = 1(mm) , remove = 0.98 () !22 Sep
        10/11/2000  lucerne harvest height = 1(mm) , remove = 0.98 () !10 Nov
        22/12/2000  lucerne harvest height = 1(mm) , remove = 0.98 () !22 Dec
        24/01/2001  lucerne harvest height = 1(mm) , remove = 0.98 () !25 Jan
        12/03/2001  lucerne harvest height = 1(mm) , remove = 0.98 () !12 mar
        2/05/2001  Lucerne harvest height = 1(mm) , remove = 0.98 () ! 2 May
        2/07/2001  lucerne harvest height = 1(mm) , remove = 0.98 () ! 2 Jul
        5/10/2001  lucerne harvest height = 1(mm) , remove = 0.98 () ! 5 Oct
        20/11/2001  lucerne harvest height = 1(mm) , remove = 0.98 () !20 Nov
        24/12/2001  lucerne harvest height = 1(mm) , remove = 0.98 () !23 Dec
      lucerne
      surfaceom Surface Organic Matter
        PoolName = wheat  # Organic Matter pool name
        type = wheat  # Organic Matter type
        mass = 500  # Initial surface residue (kg/ha)
        cnr = 100  # C:N ratio of initial residue
        standing_fraction = 1  # Fraction of residue standing
      outputfile: filename=Lincoln 1996-01 Kaituna Dryland.out; title=Lincoln 1996-01 Kaituna Dryland
        variables -> /simulations/Gatton 1994-95 Hunter River/paddock/Outputfile/Variables
        events Reporting Frequency -> /simulations/Gatton 1994-95 Hunter River/paddock/Outputfile/Reporting Frequency
      soil IVF96_99_dryland
        InitWater Initial water
          PercentMethod: Percent=1.00; Distributed=Filled from top
        Water
          Layer:
            Thickness (mm)  BD (g/cc)  AirDry (mm/mm)  LL15 (mm/mm)  DUL (mm/mm)  SAT (mm/mm)
            200             1.13       0.1             0.139         0.353        0.549
            100             1.28       0.1             0.139         0.32         0.496
            100             1.46       0.1             0.137         0.29         0.432
            100             1.58       0.1             0.127         0.27         0.389
            100             1.49       0.086           0.094         0.28         0.42
            100             1.4        0.07            0.072         0.28         0.451
            100             1.37       0.06            0.064         0.294        0.464
            100             1.41       0.07            0.073         0.31         0.448
            100             1.38       0.1             0.105         0.32         0.462
            100             1.43       0.1             0.134         0.33         0.455
            100             1.43       0.1             0.139         0.34         0.455
            100             1.43       0.1             0.135         0.31         0.455
            100             1.39       0.1             0.142         0.27         0.456
            100             1.39       0.1             0.15          0.25         0.455
            100             1.39       0.1             0.184         0.29         0.455
            100             1.39       0.1             0.235         0.32         0.455
            100             1.39       0.1             0.229         0.31         0.455
            100             1.39       0.1             0.232         0.32         0.455
            100             1.39       0.1             0.231         0.32         0.455
            100             1.39       0.1             0.184         0.32         0.455
            100             1.39       0.1             0.149         0.335        0.455
            100             1.39       0.1             0.17          0.37         0.455
          SoilCrop lucerne
            Layer:
              Thickness (mm)  LL (mm/mm)  KL (/day)  XF (0-1)
              200             0.139       0.12       1
              100             0.139       0.12       1
              100             0.137       0.11       1
              100             0.127       0.11       1
              100             0.094       0.11       1
              100             0.072       0.1        1
              100             0.064       0.09       1
              100             0.073       0.05       1
              100             0.105       0.03       1
              100             0.134       0.03       1
              100             0.139       0.04       1
              100             0.135       0.05       1
              100             0.142       0.05       1
              100             0.15        0.015      1
              100             0.184       0.015      1
              100             0.235       0.01       1
              100             0.229       0.01       1
              100             0.232       0.01       1
              100             0.231       0.01       1
              100             0.184       0.01       1
              100             0.149       0.01       1
              100             0.17        0.01       1
        SoilWat: SummerCona=3.5; SummerU=6; SummerDate=1-Nov; WinterCona=3.5; WinterU=6; WinterDate=1-Apr; DiffusConst=88; DiffusSlope=35.4; Salb=0.18; CN2Bare=68; CNRed=20; CNCov=0.8
          Layer:
            Thickness (mm)  SWCON (0-1)
            200             0.55
            100             0.55
            100             0.55
            100             0.55
            100             0.55
            100             0.55
            100             0.55
            100             0.55
            100             0.55
            100             0.55
            100             0.55
            100             0.55
            100             0.65
            100             0.65
            100             0.65
            100             0.65
            100             0.65
            100             0.65
            100             0.65
            100             0.65
            100             0.65
            100             0.65
        SoilOrganicMatter: RootCN=50; RootWT=1500; SoilCN=14.5; EnrACoeff=7.4; EnrBCoeff=0.2
          Layer:
            Thickness (mm)  OC (Total %)  FBiom (0-1)  FInert (0-1)
            200             1.82          0.025        0.45
            100             1.47          0.025        0.6
            100             1.2           0.015        0.75
            100             1.03          0.01         0.9
            100             0.47          0.01         0.96
            100             0.47          0.01         0.96
            100             0.47          0.01         0.96
            100             0.47          0.01         0.96
            100             0.47          0.01         0.96
            100             0.47          0.01         0.96
            100             0.47          0.01         0.96
            100             0.47          0.01         0.96
            100             0.47          0.01         0.96
            100             0.47          0.01         0.96
            100             0.47          0.01         0.96
            100             0.47          0.01         0.96
            100             0.47          0.01         0.96
            100             0.47          0.01         0.96
            100             0.47          0.01         0.96
            100             0.47          0.01         0.96
            100             0.47          0.01         0.96
            100             0.47          0.01         0.96
        Analysis
          Layer:
            Thickness (mm)  PH (1:5 water)
            200             6.6
            100             6.2
            100             5.7
            100             5.5
            100             5.5
            100             5.5
            100             5.5
            100             5.5
            100             5.5
            100             5.5
            100             5.5
            100             5.5
            100             5.5
            100             5.5
            100             5.5
            100             5.5
            100             5.5
            100             5.5
            100             5.5
            100             5.5
            100             5.5
            100             5.5
        Sample Initial nitrogen
          Layer:
            Thickness (mm)  NO3 (ppm)  NH4 (ppm)
            200             0.709961   0.999889
            100             0.339991   0.999889
            100             0.259997   0.999889
            100             0.229991   0.999927
            100             0.229998   0.499978
            100             0.259992   0.499985
            100             0.269991   0.499985
            100             0.299988   0.500002
            100             0.299987   0.499997
            100             0.299987   0.500007
            100             0.299987   0.499993
            100             0.299987   0.49998
            100             0.299986   0.499968
            100             0.299986   0.499972
            100             0.299985   0.499976
            100             0.299985   0.499979
            100             0.299985   0.499983
            100             0.299984   0.499986
            100             0.300001   0.499989
            100             0.299985   0.499992
            100             0.3        0.499995
            100             0.299985   0.499997
  simulation Lincoln 1996-01 Kaituna Irrigated
    metfile met: filename=ivf9601.met
    clock
      start_date = 31/10/1996  # Enter the start date of the simulation
      end_date = 6/01/2002  # Enter the end date of the simulation
    summaryfile
    area paddock
      irrigation
      folder Manager folder
        manager Lincoln
          on init:
```
reduce_status = 0
```
          on start_of_day:
```
if (crop_class = 'regrowth' and day = 120 and reduce_status = 0) then
      lucerne reduce
      reduce_status = 1
endif

if (day = 150 and crop_class = 'reduced') then
     lucerne spring
     reduce_status = 0
endif

! Simulation info
site='Lincoln'
season='1996-2001'
treat=2
```
      operations
        31/10/1996  lucerne sow plants = 450, sowing_depth = 20, cultivar = kaituna !sets plant number at 850
        21/02/1997  lucerne harvest height = 1(mm) , remove = 0.98, plants = 850  ()   !21 Feb
        5/06/1997  lucerne harvest height = 1(mm) , remove = 0.98       !0.98 ()    ! 5 June
        6/10/1997  lucerne harvest height = 1(mm) , remove = 0.98 () ! 6 Oct
        31/10/1997  irrigation apply amount = 30 (mm) !31 Oct
        18/11/1997  lucerne harvest height = 1(mm) , remove = 0.99 () !18 Nov
        1/12/1997  irrigation apply amount = 24 (mm) ! 1 Dec
        6/12/1997  irrigation apply amount = 32 (mm) ! 6 Dec
        16/12/1997  irrigation apply amount = 41 (mm) !16 Dec
        23/12/1997  lucerne harvest height = 1(mm) , remove = 0.98 () !23 Dec
        7/01/1998  irrigation apply amount = 14 (mm) ! 7 Jul
        15/01/1998  irrigation apply amount = 30 (mm) !15 Jul
        23/01/1998  irrigation apply amount = 26 (mm) !23 Jul
        31/01/1998  irrigation apply amount = 23 (mm) !31 Jul
        3/02/1998  lucerne harvest height = 1(mm) , remove = 0.98 () ! 3 Feb
        18/02/1998  irrigation apply amount = 62 (mm) !18 Feb
        6/03/1998  irrigation apply amount = 23 (mm) ! 6 Mar
        12/03/1998  lucerne harvest height = 1(mm) , remove = 0.98 () !12 Mar
        30/03/1998  irrigation apply amount = 31 (mm) !30 Mar
        6/05/1998  lucerne kill_stem                                 ! 5 May
        29/05/1998  lucerne harvest height = 1(mm) , remove = 0.98 () !29 May
        9/09/1998  irrigation apply amount = 30 (mm) ! 9 Sep
        11/09/1998  irrigation apply amount = 30 (mm) !11 Sep
        14/09/1998  irrigation apply amount = 30 (mm) !14 Sep
        29/09/1998  lucerne harvest height  = 1(mm) , remove = 0.98 (), plants = 600 !29 Sep
        12/11/1998  lucerne harvest height  = 1(mm) , remove = 0.98 () !12 Nov
        12/11/1998  irrigation apply amount = 20 (mm) !12 Nov
        13/11/1998  irrigation apply amount = 20 (mm) !12 Nov
        14/11/1998  irrigation apply amount = 20 (mm) !14 Nov
        15/12/1998  lucerne harvest height  = 1(mm) , remove = 0.98 () !15 Dec
        23/12/1998  irrigation apply amount = 20 (mm) !15 Nov
        24/12/1998  irrigation apply amount = 20 (mm) !16 Nov
        25/12/1998  irrigation apply amount = 20 (mm) !17 Nov
        26/12/1998  irrigation apply amount = 15 (mm) !18 Nov
        27/12/1998  irrigation apply amount = 15 (mm) !19 Nov
        13/01/1999  lucerne harvest height  = 1(mm) , remove = 0.98 () !13 Jan
        20/01/1999  irrigation apply amount = 20 (mm) !20 Jan
        21/01/1999  irrigation apply amount = 20 (mm) !21 Jan
        22/01/1999  irrigation apply amount = 20 (mm) !22 Jan
        23/01/1999  irrigation apply amount = 20 (mm) !23 Jan
        24/01/1999  irrigation apply amount = 20 (mm) !24 Jan
        25/01/1999  irrigation apply amount = 27 (mm) !25 Jan
        18/02/1999  lucerne harvest height  = 1(mm) , remove = 0.98 () !18 Feb
        25/02/1999  irrigation apply amount = 10 (mm) !25 Feb
        26/02/1999  irrigation apply amount = 10 (mm) !26 Feb
        27/02/1999  irrigation apply amount = 10 (mm) !27 Feb
        28/02/1999  irrigation apply amount = 20 (mm) !28 Feb
        1/03/1999  irrigation apply amount = 20 (mm) !29 Feb
        15/04/1999  lucerne harvest height =  1(mm) , remove = 0.98 () !15 Apr
        2/07/1999  lucerne harvest height =  1(mm) , remove = 0.98 () ! 2 Jul
        29/09/1999  lucerne harvest height = 1(mm) , remove = 0.98 () !29 Sep
        11/11/1999  lucerne harvest height = 1(mm) , remove = 0.98 () !11 Nov
        12/12/1999  irrigation apply amount = 30 (mm) !12 Dec
        20/12/1999  lucerne harvest height = 1(mm) , remove = 0.98 () !20 Dec
        22/01/2000  irrigation apply amount = 50 (mm) !22 Jan
        24/01/2000  lucerne harvest height = 1(mm) , remove = 0.98 () !24 Jan
        12/03/2000  lucerne harvest height = 1(mm) , remove = 0.98 () !14 Mar
        17/05/2000  lucerne kill_stem                                 !17 May
        25/05/2000  lucerne harvest height = 1(mm) , remove = 0.98 () !25 May
        22/09/2000  lucerne harvest height = 1(mm) , remove = 0.98 () !22 Sep
        10/11/2000  lucerne harvest height = 1(mm) , remove = 0.98 () !10 Nov
        22/12/2000  lucerne harvest height = 1(mm) , remove = 0.98 () !22 Dec
        27/12/2000  irrigation apply amount = 30 (mm) !27 Dec
        28/12/2000  irrigation apply amount = 30 (mm) !28 Dec
        29/12/2000  irrigation apply amount = 15 (mm) !29 Dec
        24/01/2001  lucerne harvest height = 1(mm) , remove = 0.98 () !25 Jan
        1/02/2001  irrigation apply amount = 35 (mm) ! 1 Feb
        2/02/2001  irrigation apply amount = 30 (mm) ! 2 Feb
        3/02/2001  irrigation apply amount = 30 (mm) ! 3 Feb
        12/03/2001  lucerne harvest height = 1(mm) , remove = 0.98 () !12 mar
        20/03/2001  irrigation apply amount = 25 (mm) !20 Mar
        21/03/2001  irrigation apply amount = 25 (mm) !21 Mar
        22/03/2001  irrigation apply amount = 15 (mm) !22 Mar
        26/04/2001  irrigation apply amount = 25 (mm) !26 Apr
        27/04/2001  irrigation apply amount = 20 (mm) !27 Apr
        2/05/2001  Lucerne harvest height = 1(mm) , remove = 0.98 () ! 2 May
        2/07/2001  lucerne harvest height = 1(mm) , remove = 0.98 () ! 2 Jul
        5/10/2001  lucerne harvest height = 1(mm) , remove = 0.98 () ! 5 Oct
        20/11/2001  lucerne harvest height = 1(mm) , remove = 0.98 () !20 Nov
        21/12/2001  irrigation apply amount = 20 (mm) !21 Dec
        22/12/2001  irrigation apply amount = 25 (mm) !22 Dec
        23/12/2001  irrigation apply amount = 20 (mm) !23 Dec
        24/12/2001  lucerne harvest height = 1(mm) , remove = 0.98 () !23 Dec
      lucerne
      surfaceom Surface Organic Matter
        PoolName = wheat  # Organic Matter pool name
        type = wheat  # Organic Matter type
        mass = 500  # Initial surface residue (kg/ha)
        cnr = 100  # C:N ratio of initial residue
        standing_fraction = 1  # Fraction of residue standing
      outputfile: filename=Lincoln 1996-01 Kaituna Irrigated.out; title=Lincoln 1996-01 Kaituna Irrigated
        variables -> /simulations/Gatton 1994-95 Hunter River/paddock/Outputfile/Variables
        events Reporting Frequency -> /simulations/Gatton 1994-95 Hunter River/paddock/Outputfile/Reporting Frequency
      soil IVF96_99_irrigated
        InitWater Initial water
          PercentMethod: Percent=1.00; Distributed=Filled from top
        Water
          Layer:
            Thickness (mm)  BD (g/cc)  AirDry (mm/mm)  LL15 (mm/mm)  DUL (mm/mm)  SAT (mm/mm)
            200             1.13       0.1             0.139         0.353        0.549
            100             1.28       0.1             0.139         0.325        0.496
            100             1.46       0.1             0.137         0.29         0.432
            100             1.58       0.1             0.127         0.27         0.389
            100             1.49       0.086           0.094         0.28         0.42
            100             1.4        0.07            0.072         0.28         0.451
            100             1.37       0.06            0.064         0.28         0.464
            100             1.41       0.07            0.073         0.304        0.448
            100             1.38       0.1             0.105         0.31         0.462
            100             1.43       0.1             0.134         0.295        0.455
            100             1.43       0.1             0.139         0.28         0.455
            100             1.43       0.1             0.135         0.29         0.455
            100             1.39       0.1             0.142         0.3          0.456
            100             1.39       0.1             0.15          0.33         0.455
            100             1.39       0.1             0.184         0.34         0.455
            100             1.39       0.1             0.235         0.34         0.455
            100             1.39       0.1             0.229         0.33         0.455
            100             1.39       0.1             0.232         0.34         0.455
            100             1.39       0.1             0.231         0.32         0.455
            100             1.39       0.1             0.184         0.3          0.455
            100             1.39       0.1             0.149         0.335        0.455
            100             1.39       0.1             0.17          0.34         0.455
          SoilCrop lucerne: same as Lincoln 1996-01 Kaituna Dryland.paddock.IVF96_99_dryland.Water.lucerne
        SoilWat: same as Lincoln 1996-01 Kaituna Dryland.paddock.IVF96_99_dryland.SoilWat
        SoilOrganicMatter: same as Lincoln 1996-01 Kaituna Dryland.paddock.IVF96_99_dryland.SoilOrganicMatter
        Analysis: same as Lincoln 1996-01 Kaituna Dryland.paddock.IVF96_99_dryland.Analysis
        Sample Initial nitrogen
          Layer:
            Thickness (mm)  NO3 (ppm)  NH4 (ppm)
            200             0.70989    0.999992
            100             0.339965   0.999897
            100             0.25998    0.999858
            100             0.22997    0.999903
            100             0.229983   0.499972
            100             0.259969   0.499983
            100             0.269967   0.499982
            100             0.299957   0.500014
            100             0.299956   0.500004
            100             0.299955   0.500023
            100             0.299953   0.499996
            100             0.299951   0.49997
            100             0.29995    0.499945
            100             0.299948   0.499951
            100             0.299945   0.499957
            100             0.299943   0.499962
            100             0.29994    0.499968
            100             0.299937   0.499974
            100             0.29997    0.499979
            100             0.29997    0.499984
            100             0.300001   0.49999
            100             0.299971   0.499995
  simulation Warra 1988-92 Trifecta T4 - undersown into wheat
    metfile met: filename=warra.met
    clock
      start_date = 24/05/1988  # Enter the start date of the simulation
      end_date = 6/11/1992  # Enter the end date of the simulation
    summaryfile
    area paddock
      folder Manager folder
        manager Warra
          on init:
```
reduce_status = 0
```
          on start_of_day:
```
if (lucerne.crop_class = 'regrowth' and day = 120 and reduce_status = 0) then
      lucerne reduce
      reduce_status = 1
endif

if (day = 150 and lucerne.crop_class = 'reduced') then
     lucerne spring
     reduce_status = 0
endif

! Simulation info
site='Warra'
season='1988-92'
treat=4
```
      operations
        26/05/1988  lucerne sow plants = 60, sowing_depth = 10, cultivar = trifecta
        26/05/1988  wheat sow plants = 100, sowing_depth = 50, cultivar = hartog
        15/10/1988  wheat harvest
        15/06/1989  lucerne harvest height = 100 (mm), remove = 0.95
        15/09/1989  lucerne harvest height = 100 (mm), remove = 0.95
        15/12/1989  lucerne harvest height = 100 (mm), remove = 0.95
        15/03/1990  lucerne harvest height = 100 (mm), remove = 0.95
        15/06/1990  lucerne harvest height = 100 (mm), remove = 0.95
        15/09/1990  lucerne harvest height = 100 (mm), remove = 0.95
        15/12/1990  lucerne harvest height = 100 (mm), remove = 0.95
        15/03/1991  lucerne harvest height = 100 (mm), remove = 0.95
        15/06/1991  lucerne harvest height = 100 (mm), remove = 0.95
        15/09/1991  lucerne harvest height = 100 (mm), remove = 0.95
        15/12/1991  lucerne harvest height = 100 (mm), remove = 0.95
        15/03/1992  lucerne harvest height = 100 (mm), remove = 0.95
        15/06/1992  lucerne harvest height = 100 (mm), remove = 0.95
        15/09/1992  lucerne harvest height = 100 (mm), remove = 0.95
        3/10/1992  lucerne kill_crop
        3/10/1992  lucerne end_crop
      lucerne
      wheat
      canopy
        intercrop = lucerne wheat  # Enter crop names to intercrop
      surfaceom Surface Organic Matter
        PoolName = wheat  # Organic Matter pool name
        type = wheat  # Organic Matter type
        mass = 200  # Initial surface residue (kg/ha)
        cnr = 100  # C:N ratio of initial residue
        standing_fraction = 1  # Fraction of residue standing
      outputfile: filename=Warra 1988-92 Trifecta T4 - undersown into wheat.out; title=Warra 1988-92 Trifecta T4 - undersown into wheat
        variables
          variable:
            site
            season
            treat
            dd/mm/yyyy as Date  # Date (dd/mm/yyyy)
            year  # Year
            day  # Day
            daysafteremergence  # emergence - days spent in this phase
            lai  # Leaf area index
            biomass  # Biomass
            leafgreenwt  # Green leaf dry matter
            leaftotalwt  # Total leaf dry matter
            stemgreenwt  # Green Stem dry matter
            stemtotalwt  # Total Stem dry matter
            n_uptake  # N uptake
            rootgreenwt  # Green Root dry matter
            roottotalwt  # Total Root dry matter
            node_no  # Number of mainstem nodes per plant
            sw_dep() as total_sw
            no3() as total_no3
            n_conc_stover
            height
            swdef_photo
            nfact_photo
            wheat.yield as wheat.yield
        events Reporting Frequency -> /simulations/Gatton 1994-95 Hunter River/paddock/Outputfile/Reporting Frequency
      soil warra88_96_T4
        Water
          Layer:
            Thickness (mm)  BD (g/cc)  AirDry (mm/mm)  LL15 (mm/mm)  DUL (mm/mm)  SAT (mm/mm)
            100             1.3        0.1             0.21          0.425        0.5
            100             1.3        0.2             0.21          0.465        0.509
            100             1.29       0.2             0.21          0.473        0.51
            300             1.31       0.2             0.225         0.468        0.505
            300             1.35       0.2             0.265         0.418        0.49
            300             1.36       0.2             0.289         0.364        0.48
            300             1.36       0.2             0.327         0.363        0.48
          SoilCrop lucerne
            Layer:
              Thickness (mm)  LL (mm/mm)  KL (/day)  XF (0-1)
              100             0.21        0.08       1
              100             0.21        0.08       1
              100             0.21        0.08       1
              300             0.225       0.08       1
              300             0.265       0.08       1
              300             0.289       0.08       1
              300             0.327       0.08       1
          SoilCrop wheat
            Layer:
              Thickness (mm)  LL (mm/mm)  KL (/day)  XF (0-1)
              100             0.21        0.06       1
              100             0.21        0.06       1
              100             0.21        0.06       1
              300             0.225       0.04       1
              300             0.24        0.04       1
              300             0.285       0.04       1
              300             0.33        0.02       1
        SoilWat: SummerCona=3.5; SummerU=6; SummerDate=1-Nov; WinterCona=3.5; WinterU=6; WinterDate=1-Apr; DiffusConst=40; DiffusSlope=16; Salb=0.13; CN2Bare=80; CNRed=20; CNCov=0.8
          Layer:
            Thickness (mm)  SWCON (0-1)
            100             0.2
            100             0.2
            100             0.2
            300             0.2
            300             0.2
            300             0.2
            300             0.2
        SoilOrganicMatter: RootCN=40; RootWT=10; SoilCN=14.5; EnrACoeff=7.4; EnrBCoeff=0.2
          Layer:
            Thickness (mm)  OC (Total %)  FBiom (0-1)  FInert (0-1)
            100             1             0.024        0.3
            100             0.84          0.02         0.5
            100             0.77          0.015        0.75
            300             0.65          0.01         0.9
            300             0.54          0.01         0.95
            300             0.48          0.01         0.99
            300             0.43          0.01         0.99
        Analysis
          Layer:
            Thickness (mm)  PH (1:5 water)
            100             8.2
            100             8.5
            100             8.6
            300             8.6
            300             7.4
            300             5.3
            300             5
        Sample Initial nitrogen
          Layer:
            Thickness (mm)  NO3 (ppm)  NH4 (ppm)
            100             5.6        0.3
            100             4.5        0.3
            100             5.5        0.3
            300             18.6       0.3
            300             11.8       0.3
            300             6.3        0.5
            300             4.5        0.5
        Sample Initial water
          Layer:
            Thickness (mm)  SW (mm/mm)
            100             0.393
            100             0.439
            100             0.446
            300             0.429
            300             0.396
            300             0.386
            300             0.414
  simulation Warra 1989-93 Trifecta T8 - undersown into wheat
    metfile met: filename=warra.met
    clock
      start_date = 21/05/1989  # Enter the start date of the simulation
      end_date = 17/11/1993  # Enter the end date of the simulation
    summaryfile
    area paddock
      folder Manager folder
        manager Warra
          on init:
```
reduce_status = 0
```
          on start_of_day:
```
if (lucerne.crop_class = 'regrowth' and day = 120 and reduce_status = 0) then
      lucerne reduce
      reduce_status = 1
endif

if (day = 150 and lucerne.crop_class = 'reduced') then
     lucerne spring
     reduce_status = 0
endif

! Simulation info
site='Warra'
season='1989-93'
treat=8
```
      operations
        20/06/1989  lucerne sow plants = 60, sowing_depth = 10, cultivar = trifecta
        20/06/1989  wheat sow plants = 100, sowing_depth = 50, cultivar = hartog
        7/11/1989  wheat harvest
        15/12/1990  lucerne harvest height = 100 (mm), remove = 0.95
        15/03/1991  lucerne harvest height = 100 (mm), remove = 0.95
        15/06/1991  lucerne harvest height = 100 (mm), remove = 0.95
        15/09/1991  lucerne harvest height = 100 (mm), remove = 0.95
        15/12/1991  lucerne harvest height = 100 (mm), remove = 0.95
        15/03/1992  lucerne harvest height = 100 (mm), remove = 0.95
        15/06/1992  lucerne harvest height = 100 (mm), remove = 0.95
        15/09/1992  lucerne harvest height = 100 (mm), remove = 0.95
        15/12/1992  lucerne harvest height = 100 (mm), remove = 0.95
        15/03/1993  lucerne harvest height = 100 (mm), remove = 0.95
        15/06/1993  lucerne harvest height = 100 (mm), remove = 0.95
        15/09/1993  lucerne harvest height = 100 (mm), remove = 0.95
        3/10/1993  lucerne kill_crop
        3/10/1993  lucerne end_crop
      lucerne
      wheat
      canopy
        intercrop = lucerne wheat  # Enter crop names to intercrop
      surfaceom Surface Organic Matter
        PoolName = wheat  # Organic Matter pool name
        type = wheat  # Organic Matter type
        mass = 200  # Initial surface residue (kg/ha)
        cnr = 100  # C:N ratio of initial residue
        standing_fraction = 1  # Fraction of residue standing
      outputfile: filename=Warra 1989-93 Trifecta T8 - undersown into wheat.out; title=Warra 1989-93 Trifecta T8 - undersown into wheat
        variables: same as Warra 1988-92 Trifecta T4 - undersown into wheat.paddock.Outputfile.Variables
        events Reporting Frequency -> /simulations/Gatton 1994-95 Hunter River/paddock/Outputfile/Reporting Frequency
      soil warra88_96_T8
        Water: same as Warra 1988-92 Trifecta T4 - undersown into wheat.paddock.warra88_96_T4.Water
        SoilWat: same as Warra 1988-92 Trifecta T4 - undersown into wheat.paddock.warra88_96_T4.SoilWat
        SoilOrganicMatter: same as Warra 1988-92 Trifecta T4 - undersown into wheat.paddock.warra88_96_T4.SoilOrganicMatter
        Analysis: same as Warra 1988-92 Trifecta T4 - undersown into wheat.paddock.warra88_96_T4.Analysis
        Sample Initial nitrogen
          Layer:
            Thickness (mm)  NO3 (ppm)  NH4 (ppm)
            100             1.8        0.3
            100             4.6        0.3
            100             5.9        0.3
            300             12.3       0.3
            300             6.1        0.3
            300             4          0.5
            300             4.9        0.5
        Sample Initial water
          Layer:
            Thickness (mm)  SW (mm/mm)
            100             0.437
            100             0.434
            100             0.43
            300             0.431
            300             0.422
            300             0.416
            300             0.417
  simulation Quairading 1998-01 Trifecta
    metfile met: filename=Qu98_01.met
    clock
      start_date = 1/06/1998  # Enter the start date of the simulation
      end_date = 30/04/2001  # Enter the end date of the simulation
    summaryfile
    area paddock
      folder Manager folder
        manager Quairading man
          on init:
```
reduce_status = 0
```
          on start_of_day:
```
if (crop_class = 'regrowth' and day = 120 and reduce_status = 0) then
      lucerne reduce
      reduce_status = 1
endif

if (day = 150 and crop_class = 'reduced') then
     lucerne spring
     reduce_status = 0
endif

! Simulation info
site='Quairading'
season='1998-2001'
treat=1
```
      operations
        9/06/1998  lucerne sow plants = 38, sowing_depth = 40, cultivar = trifecta
        24/06/1998  'quairading water' set sw = 0.12 0.12 0.17 0.18 0.19 0.20 0.20 0.20 0.20
        11/11/1998  lucerne harvest height = 20 (mm), plants = 152 (/m2)
        16/12/1998  lucerne harvest height = 20 (mm), plants = 190 (/m2)
        17/03/1999  lucerne harvest height = 20 (mm), plants = 204 (/m2)
        28/04/1999  lucerne harvest height = 20 (mm), plants = 238 (/m2)
        1/07/1999  lucerne harvest height = 20 (mm), plants = 272 (/m2)
        20/08/1999  lucerne harvest height = 20 (mm), plants = 306 (/m2)
        28/09/1999  lucerne harvest height = 20 (mm), plants = 340 (/m2)
        16/11/1999  lucerne harvest height = 20 (mm), plants = 374 (/m2)
        17/01/2000  lucerne harvest height = 20 (mm), plants = 374 (/m2)
        29/02/2000  lucerne harvest height = 20 (mm), plants = 374 (/m2)
        8/05/2000  lucerne harvest height = 20 (mm), plants = 374 (/m2)
        8/08/2000  lucerne harvest height = 20 (mm), plants = 374 (/m2)
        5/10/2000  lucerne harvest height = 20 (mm), plants = 374 (/m2)
        22/11/2000  lucerne harvest height = 20 (mm), plants = 374 (/m2)
      lucerne
      surfaceom Surface Organic Matter
        PoolName = wheat  # Organic Matter pool name
        type = wheat  # Organic Matter type
        mass = 500  # Initial surface residue (kg/ha)
        cnr = 80  # C:N ratio of initial residue
        standing_fraction = 1  # Fraction of residue standing
      outputfile: filename=Quairading 1998-01 Trifecta.out; title=Quairading 1998-01 Trifecta
        variables -> /simulations/Gatton 1994-95 Hunter River/paddock/Outputfile/Variables
        events Reporting Frequency -> /simulations/Gatton 1994-95 Hunter River/paddock/Outputfile/Reporting Frequency
      soil quairading
        Water
          Layer:
            Thickness (mm)  BD (g/cc)  AirDry (mm/mm)  LL15 (mm/mm)  DUL (mm/mm)  SAT (mm/mm)
            100             1.4        0.01            0.02          0.13         0.45
            100             1.4        0.01            0.02          0.13         0.45
            200             1.6        0.085           0.09          0.18         0.38
            200             1.6        0.095           0.11          0.19         0.38
            200             1.6        0.1             0.13          0.2          0.38
            200             1.6        0.1             0.13          0.2          0.38
            200             1.6        0.1             0.13          0.2          0.38
            200             1.6        0.1             0.15          0.19         0.38
            200             1.6        0.1             0.16          0.19         0.38
          SoilCrop lucerne
            Layer:
              Thickness (mm)  LL (mm/mm)  KL (/day)  XF (0-1)
              100             0.02        0.06       0.2
              100             0.02        0.06       0.2
              200             0.09        0.04       0.6
              200             0.11        0.04       0.6
              200             0.13        0.04       0.3
              200             0.13        0.03       0.2
              200             0.13        0.01       0.2
              200             0.15        0.01       0.2
              200             0.16        0.01       0.2
        SoilWat: SummerCona=2; SummerU=6; SummerDate=1-Nov; WinterCona=2; WinterU=6; WinterDate=1-Apr; DiffusConst=88; DiffusSlope=35; Salb=0.13; CN2Bare=60; CNRed=20; CNCov=0.8
          Layer:
            Thickness (mm)  SWCON (0-1)
            100             0.9
            100             0.9
            200             0.65
            200             0.65
            200             0.65
            200             0.65
            200             0.65
            200             0.65
            200             0.65
        SoilOrganicMatter: RootCN=40; RootWT=1000; SoilCN=13; EnrACoeff=7.4; EnrBCoeff=0.2
          Layer:
            Thickness (mm)  OC (Total %)  FBiom (0-1)  FInert (0-1)
            100             1.23          0.04         0.1
            100             1.23          0.04         0.1
            200             0.43          0.02         0.2
            200             0.37          0.01         0.8
            200             0.26          0.01         0.9
            200             0.26          0.01         0.9
            200             0.21          0.01         0.9
            200             0.21          0.01         0.9
            200             0.2           0.01         0.9
        Analysis
          Layer:
            Thickness (mm)  PH (1:5 water)
            100             4.7
            100             4.7
            200             5.1
            200             5.1
            200             5.1
            200             6
            200             6
            200             6
            200             6
        Sample Initial nitrogen
          Layer:
            Thickness (mm)  NO3 (ppm)  NH4 (ppm)
            100             3          4
            100             3          4
            200             2          0
            200             2          0
            200             2          0
            200             2          0
            200             2          0
            200             2          0
            200             2          0
        Sample Initial water
          Layer:
            Thickness (mm)  SW (mm/mm)
            100             0.08
            100             0.08
            200             0.12
            200             0.14
            200             0.18
            200             0.18
            200             0.19
            200             0.19
            200             0.19
  simulation Tamworth 1979-83 Hunter River
    metfile met: filename=tamworth.met
    clock
      start_date = 1/01/1979  # Enter the start date of the simulation
      end_date = 9/07/1983  # Enter the end date of the simulation
    summaryfile
    area paddock
      folder Manager folder
        manager Tamworth
          on init:
```
reduce_status = 0
```
          on start_of_day:
```
if (crop_class = 'regrowth' and day = 120 and reduce_status = 0) then
      lucerne reduce
      reduce_status = 1
endif

if (day = 150 and crop_class = 'reduced') then
     lucerne spring
     reduce_status = 0
endif

! Simulation info
site='Tamworth'
season='1979-83'
treat=1
```
      operations
        30/04/1979  lucerne sow plants = 100, sowing_depth = 20, cultivar = hunter_river ! note fictitious sowing date to get stand established
        27/10/1979  lucerne harvest height = 30 (mm) , remove = 0.95 ()
        3/12/1979  lucerne harvest height = 30 (mm) , remove = 0.95 ()
        21/01/1980  lucerne harvest height = 30 (mm) , remove = 0.95 ()
        25/02/1980  lucerne harvest height = 30 (mm) , remove = 0.95 ()
        18/05/1980  lucerne harvest height = 30 (mm) , remove = 0.95 ()
        8/09/1980  lucerne harvest height = 30 (mm) , remove = 0.95 ()
        19/10/1980  lucerne harvest height = 30 (mm) , remove = 0.95 ()
        23/11/1980  lucerne harvest height = 30 (mm) , remove = 0.95 ()
        23/12/1980  lucerne harvest height = 30 (mm) , remove = 0.95 ()
        19/01/1981  lucerne harvest height = 30 (mm) , remove = 0.95 ()
        3/03/1981  lucerne harvest height = 30 (mm) , remove = 0.95 ()
        19/10/1980  lucerne harvest height = 30 (mm) , remove = 0.95 ()
        21/04/1981  lucerne harvest height = 30 (mm) , remove = 0.95 ()
        8/09/1981  lucerne harvest height = 30 (mm) , remove = 0.95 ()
        23/10/1981  lucerne harvest height = 30 (mm) , remove = 0.95 ()
        27/11/1981  lucerne harvest height = 30 (mm) , remove = 0.95 ()
        30/12/1981  lucerne harvest height = 30 (mm) , remove = 0.95 ()
        29/01/1982  lucerne harvest height = 30 (mm) , remove = 0.95 ()
        8/03/1982  lucerne harvest height = 30 (mm) , remove = 0.95 ()
        8/04/1982  lucerne harvest height = 30 (mm) , remove = 0.95 ()
        28/05/1982  lucerne harvest height = 30 (mm) , remove = 0.95 ()
        27/10/1982  lucerne harvest height = 30 (mm) , remove = 0.95 ()
        21/12/1982  lucerne harvest height = 30 (mm) , remove = 0.95 ()
        1/02/1983  lucerne harvest height = 30 (mm) , remove = 0.95 ()
        14/03/1983  lucerne harvest height = 30 (mm) , remove = 0.95 ()
      lucerne
      surfaceom Surface Organic Matter
        PoolName = wheat  # Organic Matter pool name
        type = wheat  # Organic Matter type
        mass = 500  # Initial surface residue (kg/ha)
        cnr = 100  # C:N ratio of initial residue
        standing_fraction = 1  # Fraction of residue standing
      outputfile: filename=Tamworth 1979-83 Hunter River.out; title=Tamworth 1979-83 Hunter River
        variables -> /simulations/Gatton 1994-95 Hunter River/paddock/Outputfile/Variables
        events Reporting Frequency -> /simulations/Gatton 1994-95 Hunter River/paddock/Outputfile/Reporting Frequency
      soil Tamworth_Holford
        Water
          Layer:
            Thickness (mm)  BD (g/cc)  AirDry (mm/mm)  LL15 (mm/mm)  DUL (mm/mm)  SAT (mm/mm)
            150             1.2        0.1             0.292         0.46         0.51
            150             1.3        0.273           0.293         0.455        0.505
            200             1.3        0.273           0.293         0.455        0.505
            300             1.3        0.273           0.3           0.455        0.505
            300             1.32       0.273           0.3           0.45         0.5
            300             1.32       0.273           0.3           0.435        0.485
            300             1.36       0.273           0.3           0.43         0.48
            300             1.45       0.273           0.32          0.406        0.45
            300             1.45       0.273           0.34          0.406        0.45
            300             1.45       0.273           0.36          0.406        0.45
            300             1.45       0.273           0.38          0.406        0.45
          SoilCrop lucerne
            Layer:
              Thickness (mm)  LL (mm/mm)  KL (/day)  XF (0-1)
              150             0.292       0.08       1
              150             0.293       0.08       1
              200             0.293       0.08       1
              300             0.3         0.06       1
              300             0.3         0.04       1
              300             0.3         0.03       1
              300             0.3         0.03       1
              300             0.32        0.03       1
              300             0.34        0.02       0
              300             0.36        0.01       1
              300             0.38        0.01       1
        SoilWat: SummerCona=3.5; SummerU=6; SummerDate=1-Nov; WinterCona=3.5; WinterU=6; WinterDate=1-Apr; DiffusConst=40; DiffusSlope=16; Salb=0.13; CN2Bare=72; CNRed=20; CNCov=0.8
          Layer:
            Thickness (mm)  SWCON (0-1)
            150             0.3
            150             0.3
            200             0.3
            300             0.3
            300             0.3
            300             0.3
            300             0.3
            300             0.3
            300             0.3
            300             0.3
            300             0.3
        SoilOrganicMatter: RootCN=50; RootWT=2000; SoilCN=11; EnrACoeff=7.4; EnrBCoeff=0.2
          Layer:
            Thickness (mm)  OC (Total %)  FBiom (0-1)  FInert (0-1)
            150             1.469         0.045        0.25
            150             1.04          0.025        0.4
            200             0.65          0.015        0.6
            300             0.39          0.01         0.8
            300             0.39          0.01         0.96
            300             0.26          0.01         0.96
            300             0.26          0.01         0.96
            300             0.13          0.01         0.96
            300             0.1           0.01         0.96
            300             0.1           0.01         0.96
            300             0.1           0.01         0.96
        Analysis
          Layer:
            Thickness (mm)  PH (1:5 water)
            150             5.5
            150             6.7
            200             6.7
            300             7
            300             7.2
            300             7.7
            300             7.7
            300             7.7
            300             7.7
            300             7.7
            300             7.7
        Sample Initial nitrogen
          Layer:
            Thickness (mm)  NO3 (ppm)  NH4 (ppm)
            150             2          0.0500343
            150             1.5        0.0500343
            200             1          0.0500343
            300             1          0.0300206
            300             1          0.0100069
            300             1          0.0100069
            300             0.7        0.0100069
            300             0.5        0.0100069
            300             0.5        0.0100069
            300             0.5        0.0100069
            300             0.5        0.0100069
        Sample Initial water
          Layer:
            Thickness (mm)  SW (mm/mm)
            150             0.3
            150             0.3
            200             0.3
            300             0.3
            300             0.3
            300             0.3
            300             0.3
            300             0.3
            300             0.3
            300             0.3
            300             0.3
  simulation Jimbour 1997-2000 Trifecta Grant-strip7
    metfile met: filename=grant.met
    clock
      start_date = 30/05/1997  # Enter the start date of the simulation
      end_date = 16/05/2000  # Enter the end date of the simulation
    summaryfile
    area paddock
      folder Manager folder
        fertiliser
        manager Grant man
          on init:
```
reduce_status = 0
```
          on start_of_day:
```
if (crop_class = 'regrowth' and day = 120 and reduce_status = 0) then
      lucerne reduce
      reduce_status = 1
endif

if (day = 150 and crop_class = 'reduced') then
     lucerne spring
     reduce_status = 0
endif

! Simulation info
site='Jimbour'
season='1997-2000'
treat=1
```
      operations
        12/06/1997  'Surface Organic Matter' tillage type = planter
        12/06/1997  lucerne sow plants = 100, sowing_depth = 10, cultivar = trifecta
        12/06/1997  fertiliser apply amount = 4 (kg/ha), depth = 50 (mm), type = nh4_n ! 40 kg/ha Starter Z
        27/10/1997  lucerne harvest height = 10 (mm), remove = 0.90, plants = 350
        2/12/1997  lucerne harvest height = 10 (mm), remove = 0.90
        11/03/1998  lucerne harvest height = 10 (mm), remove = 0.90
        14/03/1998  fertiliser apply amount = 10 (kg/ha), depth = 50 (mm), type = nh4_n ! 50 kg/ha ammonium sulphate
        22/05/1998  lucerne harvest height = 10 (mm), remove = 0.90
        7/10/1998  lucerne harvest height = 10 (mm), remove = 0.90
        24/12/1998  lucerne harvest height = 10 (mm), remove = 0.90
        21/01/1999  lucerne harvest height = 10 (mm), remove = 0.90
        20/02/1999  lucerne harvest height = 10 (mm), remove = 0.90
        15/04/1999  lucerne harvest height = 10 (mm), remove = 0.90
        6/01/2000  lucerne harvest height = 10 (mm), remove = 0.90
        7/02/2000  lucerne harvest height = 10 (mm), remove = 0.90
        6/05/2000  lucerne harvest height = 10 (mm), remove = 0.90
      lucerne
      surfaceom Surface Organic Matter
        PoolName = wheat  # Organic Matter pool name
        type = wheat  # Organic Matter type
        mass = 200  # Initial surface residue (kg/ha)
        cnr = 100  # C:N ratio of initial residue
        standing_fraction = 1  # Fraction of residue standing
      outputfile: filename=Jimbour 1997-2000 Trifecta Grant-strip7.out; title=Jimbour 1997-2000 Trifecta Grant-strip7
        variables -> /simulations/Gatton 1994-95 Hunter River/paddock/Outputfile/Variables
        events Reporting Frequency -> /simulations/Gatton 1994-95 Hunter River/paddock/Outputfile/Reporting Frequency
      soil Grant
        Water
          Layer:
            Thickness (mm)  BD (g/cc)  AirDry (mm/mm)  LL15 (mm/mm)  DUL (mm/mm)  SAT (mm/mm)
            150             1.02       0.15            0.27          0.54         0.58
            150             1.03       0.22            0.27          0.53         0.58
            300             1.02       0.22            0.28          0.54         0.59
            300             1.02       0.22            0.26          0.54         0.58
            300             1.06       0.22            0.31          0.52         0.57
            300             1.11       0.22            0.32          0.5          0.55
            300             1.12       0.22            0.33          0.5          0.55
            300             1.15       0.22            0.33          0.48         0.53
            300             1.18       0.22            0.34          0.47         0.52
            300             1.2        0.22            0.33          0.46         0.51
            300             1.25       0.22            0.36          0.46         0.49
          SoilCrop lucerne
            Layer:
              Thickness (mm)  LL (mm/mm)  KL (/day)  XF (0-1)
              150             0.27        0.08       1
              150             0.27        0.08       1
              300             0.28        0.08       1
              300             0.26        0.08       1
              300             0.31        0.08       1
              300             0.32        0.08       1
              300             0.33        0.06       1
              300             0.33        0.06       1
              300             0.34        0.06       1
              300             0.33        0.06       1
              300             0.36        0.06       1
        SoilWat: SummerCona=4; SummerU=6; SummerDate=1-Nov; WinterCona=4; WinterU=6; WinterDate=1-Apr; DiffusConst=40; DiffusSlope=16; Salb=0.13; CN2Bare=70; CNRed=20; CNCov=0.8
          Layer:
            Thickness (mm)  SWCON (0-1)
            150             0.2
            150             0.2
            300             0.2
            300             0.2
            300             0.2
            300             0.2
            300             0.2
            300             0.2
            300             0.2
            300             0.2
            300             0.2
        SoilOrganicMatter: RootCN=40; RootWT=100; SoilCN=14; EnrACoeff=7.4; EnrBCoeff=0.2
          Layer:
            Thickness (mm)  OC (Total %)  FBiom (0-1)  FInert (0-1)
            150             1.04          0.03         0.4
            150             0.9           0.025        0.5
            300             0.89          0.015        0.75
            300             0.89          0.01         0.9
            300             0.77          0.01         0.95
            300             0.45          0.01         0.99
            300             0.27          0.01         0.99
            300             0.22          0.01         0.99
            300             0.16          0.01         0.99
            300             0.13          0.01         0.99
            300             0.12          0.01         0.99
        Analysis
          Layer:
            Thickness (mm)  PH (1:5 water)
            150             8.4
            150             8.7
            300             8.9
            300             9
            300             9
            300             9
            300             9
            300             9
            300             8.9
            300             8.9
            300             8.9
        Sample Initial nitrogen
          Layer:
            Thickness (mm)  NO3 (ppm)  NH4 (ppm)
            150             21.3       0.300015
            150             22.2       0.300015
            300             20.3       0.300015
            300             15.9       0.300015
            300             8.2        0.300015
            300             2.6        0.300015
            300             1          0.300015
            300             0.9        0.300015
            300             0.8        0.300015
            300             0.9        0.300015
            300             1          0.300015
        Sample Initial water
          Layer:
            Thickness (mm)  SW (mm/mm)
            150             0.51
            150             0.51
            300             0.51
            300             0.505
            300             0.452
            300             0.42
            300             0.41
            300             0.44
            300             0.45
            300             0.45
            300             0.46
  simulation Jimbour 1997-2000 Trifecta Grant-strip8
    metfile met: filename=grant.met
    clock
      start_date = 30/05/1997  # Enter the start date of the simulation
      end_date = 16/05/2000  # Enter the end date of the simulation
    summaryfile
    area paddock
      fertiliser
      folder Manager folder
        manager Grant man
          on init:
```
reduce_status = 0
```
          on start_of_day:
```
if (crop_class = 'regrowth' and day = 120 and reduce_status = 0) then
      lucerne reduce
      reduce_status = 1
endif

if (day = 150 and crop_class = 'reduced') then
     lucerne spring
     reduce_status = 0
endif

! Simulation info
site='Jimbour'
season='1997-2000'
treat=2
```
      operations
        12/06/1997  'Surface Organic Matter' tillage type = planter
        12/06/1997  lucerne sow plants = 100, sowing_depth = 10, cultivar = trifecta
        12/06/1997  fertiliser apply amount = 4 (kg/ha), depth = 50 (mm), type = nh4_n ! 40 kg/ha Starter Z
        27/10/1997  lucerne harvest height = 10 (mm), remove = 0.90, plants = 200
        2/12/1997  lucerne harvest height = 10 (mm), remove = 0.90
        11/03/1998  lucerne harvest height = 10 (mm), remove = 0.90
        14/03/1998  fertiliser apply amount = 10 (kg/ha), depth = 50 (mm), type = nh4_n ! 50 kg/ha ammonium sulphate
        22/05/1998  lucerne harvest height = 10 (mm), remove = 0.90
        7/10/1998  lucerne harvest height = 10 (mm), remove = 0.90
        24/12/1998  lucerne harvest height = 10 (mm), remove = 0.90
        21/01/1999  lucerne harvest height = 10 (mm), remove = 0.90
        20/02/1999  lucerne harvest height = 10 (mm), remove = 0.90
        15/04/1999  lucerne harvest height = 10 (mm), remove = 0.90
        22/06/1999  'Grant water' set sw = 0.304 0.315 0.324 0.329 0.347 0.364 0.372 0.383 0.389 0.384 0.428
        13/07/1999  lucerne kill_crop
        13/07/1999  lucerne end_crop
      lucerne
      surfaceom Surface Organic Matter
        PoolName = wheat  # Organic Matter pool name
        type = wheat  # Organic Matter type
        mass = 200  # Initial surface residue (kg/ha)
        cnr = 100  # C:N ratio of initial residue
        standing_fraction = 1  # Fraction of residue standing
      outputfile: filename=Jimbour 1997-2000 Trifecta Grant-strip8.out; title=Jimbour 1997-2000 Trifecta Grant-strip8
        variables -> /simulations/Gatton 1994-95 Hunter River/paddock/Outputfile/Variables
        events Reporting Frequency -> /simulations/Gatton 1994-95 Hunter River/paddock/Outputfile/Reporting Frequency
      soil Grant: same as Jimbour 1997-2000 Trifecta Grant-strip7.paddock.Grant
  simulation Jimbour 1999-2000 Trifecta Grant-strip3a
    metfile met: filename=grant.met
    clock
      start_date = 21/06/1999  # Enter the start date of the simulation
      end_date = 16/05/2000  # Enter the end date of the simulation
    summaryfile
    area paddock
      fertiliser
      folder Manager folder
        manager Grant man
          on init:
```
reduce_status = 0
```
          on start_of_day:
```
if (crop_class = 'regrowth' and day = 120 and reduce_status = 0) then
      lucerne reduce
      reduce_status = 1
endif

if (day = 150 and crop_class = 'reduced') then
     lucerne spring
     reduce_status = 0
endif

! Simulation info
site='Jimbour'
season='1999-2000'
treat=3
```
      operations
        6/08/1999  'Surface Organic Matter' tillage type = planter
        6/08/1999  lucerne sow plants = 50, sowing_depth = 10, cultivar = trifecta
        6/08/1999  fertiliser apply amount = 4 (kg/ha), depth = 50 (mm), type = nh4_n ! 40 kg/ha Starter Z
      lucerne
      surfaceom Surface Organic Matter
        PoolName = wheat  # Organic Matter pool name
        type = wheat  # Organic Matter type
        mass = 200  # Initial surface residue (kg/ha)
        cnr = 100  # C:N ratio of initial residue
        standing_fraction = 1  # Fraction of residue standing
      outputfile: filename=Jimbour 1999-2000 Trifecta Grant-strip3a.out; title=Jimbour 1999-2000 Trifecta Grant-strip3a
        variables -> /simulations/Gatton 1994-95 Hunter River/paddock/Outputfile/Variables
        events Reporting Frequency -> /simulations/Gatton 1994-95 Hunter River/paddock/Outputfile/Reporting Frequency
      soil Grant
        Water: same as Jimbour 1997-2000 Trifecta Grant-strip7.paddock.Grant.Water
        SoilWat: same as Jimbour 1997-2000 Trifecta Grant-strip7.paddock.Grant.SoilWat
        SoilOrganicMatter: same as Jimbour 1997-2000 Trifecta Grant-strip7.paddock.Grant.SoilOrganicMatter
        Analysis: same as Jimbour 1997-2000 Trifecta Grant-strip7.paddock.Grant.Analysis
        Sample Initial nitrogen: same as Jimbour 1997-2000 Trifecta Grant-strip7.paddock.Grant.Initial nitrogen
        Sample Initial water
          Layer:
            Thickness (mm)  SW (mm/mm)
            150             0.462
            150             0.503
            300             0.457
            300             0.494
            300             0.483
            300             0.496
            300             0.467
            300             0.449
            300             0.466
            300             0.469
            300             0.476
  simulation Jimbour 1997-99 Trifecta Taylor-strip6
    metfile met: filename=grant.met
    clock
      start_date = 30/05/1997  # Enter the start date of the simulation
      end_date = 22/03/1999  # Enter the end date of the simulation
    summaryfile
    area paddock
      fertiliser
      folder Manager folder
        manager Grant man
          on init:
```
reduce_status = 0
```
          on start_of_day:
```
if (crop_class = 'regrowth' and day = 120 and reduce_status = 0) then
      lucerne reduce
      reduce_status = 1
endif

if (day = 150 and crop_class = 'reduced') then
     lucerne spring
     reduce_status = 0
endif

! Simulation info
site='Jimbour'
season='1997-99'
treat=4
```
      operations
        12/06/1997  'Surface Organic Matter' tillage type = planter
        12/06/1997  lucerne sow plants = 80, sowing_depth = 10, cultivar = trifecta
        12/06/1997  fertiliser apply amount = 4 (kg/ha), depth = 50 (mm), type = nh4_n ! 40 kg/ha Starter Z
        14/11/1997  lucerne harvest height = 10 (mm), remove = 0.90, plants = 350
        4/03/1998  lucerne harvest height = 10 (mm), remove = 0.90
        14/03/1998  fertiliser apply amount = 10 (kg/ha), depth = 50 (mm), type = nh4_n ! 50 kg/ha ammonium sulphate
        7/06/1998  lucerne harvest height = 10 (mm), remove = 0.90
        22/10/1998  lucerne harvest height = 10 (mm), remove = 0.90
        20/01/1999  lucerne harvest height = 10 (mm), remove = 0.90
        22/02/1999  lucerne harvest height = 10 (mm), remove = 0.90
      lucerne
      surfaceom Surface Organic Matter
        PoolName = wheat  # Organic Matter pool name
        type = wheat  # Organic Matter type
        mass = 200  # Initial surface residue (kg/ha)
        cnr = 100  # C:N ratio of initial residue
        standing_fraction = 1  # Fraction of residue standing
      outputfile: filename=Jimbour 1997-99 Trifecta Taylor-strip6.out; title=Jimbour 1997-99 Trifecta Taylor-strip6
        variables -> /simulations/Gatton 1994-95 Hunter River/paddock/Outputfile/Variables
        events Reporting Frequency -> /simulations/Gatton 1994-95 Hunter River/paddock/Outputfile/Reporting Frequency
      soil Grant: same as Jimbour 1997-2000 Trifecta Grant-strip7.paddock.Grant
  simulation Roseworthy 1998-2001 Sceptre Rainfed
    metfile met: filename=rose01.met
    clock
      start_date = 4/06/1998  # Enter the start date of the simulation
      end_date = 20/09/2001  # Enter the end date of the simulation
    summaryfile
    area paddock
      folder Manager folder
        manager Roseworthy man
          on init:
```
reduce_status = 0
```
          on start_of_day:
```
if (crop_class = 'regrowth' and day = 120 and reduce_status = 0) then
      lucerne reduce
      reduce_status = 1
endif

if (day = 150 and crop_class = 'reduced') then
     lucerne spring
     reduce_status = 0
endif

! Simulation info
site='Roseworthy'
season='1998-2001'
treat=1
```
      operations
        17/08/1998  lucerne sow plants = 300, sowing_depth = 40, cultivar = sceptre
        15/12/1998  lucerne harvest height = 50 (mm), plants = 290
        10/04/1999  lucerne harvest height = 50 (mm), plants = 290
        14/06/1999  lucerne harvest height = 50 (mm), plants = 290
        14/09/1999  lucerne harvest height = 50 (mm), plants = 290
        6/11/1999  lucerne harvest height = 50 (mm), plants = 290
        19/01/2000  lucerne harvest height = 50 (mm), plants = 390
        26/02/2000  lucerne harvest height = 50 (mm), plants = 391
        30/03/2000  lucerne harvest height = 50 (mm), plants = 423
        22/05/2000  lucerne harvest height = 50 (mm), plants = 423
        29/07/2000  lucerne harvest height = 50 (mm), plants = 406
        28/09/2000  lucerne harvest height = 50 (mm), plants = 250
        22/11/2000  lucerne harvest height = 50 (mm), plants = 150
        11/02/2001  lucerne harvest height = 50 (mm), plants = 180
        7/03/2001  lucerne harvest height = 50 (mm), plants = 177
        18/04/2001  lucerne harvest height = 50 (mm), plants = 294
        11/07/2001  lucerne harvest height = 50 (mm), plants = 293
        19/09/2001  lucerne harvest height = 50 (mm), plants = 293
        19/09/2001  lucerne end_crop
      lucerne
      surfaceom Surface Organic Matter
        PoolName = wheat  # Organic Matter pool name
        type = wheat  # Organic Matter type
        mass = 100  # Initial surface residue (kg/ha)
        cnr = 80  # C:N ratio of initial residue
        standing_fraction = 1  # Fraction of residue standing
      outputfile: filename=Roseworthy 1998-2001 Sceptre Rainfed.out; title=Roseworthy 1998-2001 Sceptre Rainfed
        variables -> /simulations/Gatton 1994-95 Hunter River/paddock/Outputfile/Variables
        events Reporting Frequency -> /simulations/Gatton 1994-95 Hunter River/paddock/Outputfile/Reporting Frequency
      soil Roseworthy
        Water
          Layer:
            Thickness (mm)  BD (g/cc)  AirDry (mm/mm)  LL15 (mm/mm)  DUL (mm/mm)  SAT (mm/mm)
            200             1.3        0.09            0.11          0.25         0.49
            200             1.23       0.09            0.11          0.25         0.48
            200             1.24       0.1             0.13          0.25         0.47
            200             1.26       0.1             0.15          0.26         0.42
            200             1.41       0.1             0.18          0.27         0.43
            200             1.42       0.1             0.2           0.28         0.44
            400             1.41       0.1             0.25          0.3          0.44
            400             1.41       0.1             0.31          0.33         0.44
            400             1.41       0.1             0.37          0.39         0.44
            400             1.41       0.1             0.38          0.39         0.44
          SoilCrop lucerne
            Layer:
              Thickness (mm)  LL (mm/mm)  KL (/day)  XF (0-1)
              200             0.11        0.08       1
              200             0.11        0.08       0.8
              200             0.13        0.08       0.7
              200             0.15        0.08       0.5
              200             0.18        0.05       0.1
              200             0.2         0.03       0.1
              400             0.25        0.01       0.1
              400             0.31        0.01       0.1
              400             0.37        0.01       0.1
              400             0.38        0.01       0.1
        SoilWat: SummerCona=2; SummerU=4.2; SummerDate=1-Nov; WinterCona=2; WinterU=4.2; WinterDate=1-Apr; DiffusConst=44; DiffusSlope=16; Salb=0.14; CN2Bare=76; CNRed=20; CNCov=0.8
          Layer:
            Thickness (mm)  SWCON (0-1)
            200             0.5
            200             0.4
            200             0.3
            200             0.3
            200             0.2
            200             0.2
            400             0.1
            400             0.1
            400             0.1
            400             0.1
        SoilOrganicMatter: RootCN=45; RootWT=400; SoilCN=14.2; EnrACoeff=7.4; EnrBCoeff=0.2
          Layer:
            Thickness (mm)  OC (Total %)  FBiom (0-1)  FInert (0-1)
            200             1.48          0.05         0.1
            200             0.9           0.05         0.1
            200             0.47          0.02         0.4
            200             0.32          0.015        0.9
            200             0.22          0.01         0.95
            200             0.15          0.01         0.97
            400             0.1           0.01         0.98
            400             0.07          0.01         0.98
            400             0.05          0.01         0.99
            400             0.03          0.01         0.99
        Analysis
          Layer:
            Thickness (mm)  PH (1:5 water)
            200             7.86
            200             8.23
            200             8.6
            200             9
            200             9
            200             9
            400             9
            400             9
            400             9
            400             9
        Sample Initial nitrogen
          Layer:
            Thickness (mm)  NO3 (ppm)  NH4 (ppm)
            200             6.84003    0.5
            200             3.52001    0.5
            200             1.54001    0.5
            200             1.12       0.4
            200             1.1        0.1
            200             0.680003   0.1
            400             0.650003   0.05
            400             0.310001   0.05
            400             0.310001   0.05
            400             0.300001   0.05
        Sample Initial water
          Layer:
            Thickness (mm)  SW (mm/mm)
            200             0.2
            200             0.2
            200             0.2
            200             0.22
            200             0.22
            200             0.27
            400             0.27
            400             0.32
            400             0.38
            400             0.38
  simulation Roseworthy 1998-2001 Sceptre Irrigated
    metfile met: filename=rose01.met
    clock
      start_date = 4/06/1998  # Enter the start date of the simulation
      end_date = 19/09/2001  # Enter the end date of the simulation
    summaryfile
    area paddock
      irrigation
      folder Manager folder
        manager Roseworthy man
          on init:
```
reduce_status = 0
```
          on start_of_day:
```
if (crop_class = 'regrowth' and day = 120 and reduce_status = 0) then
      lucerne reduce
      reduce_status = 1
endif

if (day = 150 and crop_class = 'reduced') then
     lucerne spring
     reduce_status = 0
endif

! Simulation info
site='Roseworthy'
season='1998-2001'
treat=2
```
      operations
        17/08/1998  lucerne sow plants = 300, sowing_depth = 40, cultivar = sceptre
        15/12/1998  lucerne harvest height = 50 (mm), plants = 290
        10/04/1999  lucerne harvest height = 50 (mm), plants = 290
        14/06/1999  lucerne harvest height = 50 (mm), plants = 290
        14/09/1999  lucerne harvest height = 50 (mm), plants = 290
        6/11/1999  lucerne harvest height = 50 (mm), plants = 290
        20/12/1999  irrigation apply amount = 16.5 (mm)
        23/12/1999  irrigation apply amount = 16.75 (mm)
        24/12/1999  irrigation apply amount = 16.5 (mm)
        25/12/1999  irrigation apply amount = 16.75 (mm)
        29/12/1999  irrigation apply amount = 16.75 (mm)
        2/01/2000  irrigation apply amount = 16.75 (mm)
        6/01/2000  irrigation apply amount = 16.5 (mm)
        9/01/2000  irrigation apply amount = 16.5 (mm)
        12/01/2000  irrigation apply amount = 16.75 (mm)
        15/01/2000  irrigation apply amount = 16.5 (mm)
        18/01/2000  irrigation apply amount = 16.5 (mm)
        19/01/2000  lucerne harvest height = 50 (mm), plants = 390
        25/01/2000  irrigation apply amount = 20.5 (mm)
        27/01/2000  irrigation apply amount = 20.5 (mm)
        31/01/2000  irrigation apply amount = 20.5 (mm)
        2/02/2000  irrigation apply amount = 23.5 (mm)
        5/02/2000  irrigation apply amount = 23.5 (mm)
        7/02/2000  irrigation apply amount = 23.5 (mm)
        9/02/2000  irrigation apply amount = 11.5 (mm)
        10/02/2000  irrigation apply amount = 9 (mm)
        11/02/2000  irrigation apply amount = 8.5 (mm)
        12/02/2000  irrigation apply amount = 9.25 (mm)
        13/02/2000  irrigation apply amount = 9 (mm)
        14/02/2000  irrigation apply amount = 9.5 (mm)
        15/02/2000  irrigation apply amount = 11.5 (mm)
        16/02/2000  irrigation apply amount = 9 (mm)
        17/02/2000  irrigation apply amount = 9.25 (mm)
        18/02/2000  irrigation apply amount = 9.75 (mm)
        19/02/2000  irrigation apply amount = 9 (mm)
        20/02/2000  irrigation apply amount = 9.75 (mm)
        21/02/2000  irrigation apply amount = 9.75 (mm)
        26/02/2000  lucerne harvest height = 50 (mm), plants = 391
        3/03/2000  irrigation apply amount = 23.5 (mm)
        4/03/2000  irrigation apply amount = 11.5 (mm)
        5/03/2000  irrigation apply amount = 9 (mm)
        6/03/2000  irrigation apply amount = 9 (mm)
        7/03/2000  irrigation apply amount = 23.5 (mm)
        8/03/2000  irrigation apply amount = 9 (mm)
        9/03/2000  irrigation apply amount = 23.5 (mm)
        10/03/2000  irrigation apply amount = 11.5 (mm)
        11/03/2000  irrigation apply amount = 23.5 (mm)
        12/03/2000  irrigation apply amount = 5 (mm)
        30/03/2000  lucerne harvest height = 50 (mm), plants = 423
        22/05/2000  lucerne harvest height = 50 (mm), plants = 423
        29/07/2000  lucerne harvest height = 50 (mm), plants = 406
        28/09/2000  lucerne harvest height = 50 (mm), plants = 250
        22/11/2000  lucerne harvest height = 50 (mm), plants = 150
        16/01/2001  irrigation apply amount = 20 (mm)
        17/01/2001  irrigation apply amount = 20 (mm)
        18/01/2001  irrigation apply amount = 20 (mm)
        11/02/2001  lucerne harvest height = 50 (mm), plants = 180
        12/02/2001  irrigation apply amount = 20 (mm)
        13/02/2001  irrigation apply amount = 20 (mm)
        14/02/2001  irrigation apply amount = 20 (mm)
        7/03/2001  lucerne harvest height = 50 (mm), plants = 177
        12/03/2001  irrigation apply amount = 20 (mm)
        13/03/2001  irrigation apply amount = 20 (mm)
        14/03/2001  irrigation apply amount = 20 (mm)
        18/04/2001  lucerne harvest height = 50 (mm), plants = 294
        11/07/2001  lucerne harvest height = 50 (mm), plants = 293
        19/09/2001  lucerne harvest height = 50 (mm), plants = 293
        19/09/2001  lucerne end_crop
      lucerne
      surfaceom Surface Organic Matter
        PoolName = wheat  # Organic Matter pool name
        type = wheat  # Organic Matter type
        mass = 100  # Initial surface residue (kg/ha)
        cnr = 80  # C:N ratio of initial residue
        standing_fraction = 1  # Fraction of residue standing
      outputfile: filename=Roseworthy 1998-2001 Sceptre Irrigated.out; title=Roseworthy 1998-2001 Sceptre Irrigated
        variables -> /simulations/Gatton 1994-95 Hunter River/paddock/Outputfile/Variables
        events Reporting Frequency -> /simulations/Gatton 1994-95 Hunter River/paddock/Outputfile/Reporting Frequency
      soil Roseworthy: same as Roseworthy 1998-2001 Sceptre Rainfed.paddock.Roseworthy
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