folder simulations: version=36; creator=Apsim 7.6-r3337
  memo
    File naming:

    Location: lincoln (Lincoln University paddock at Field Service Centre)

    Year: 2002-02 (simulation starts at sowing on 2000)

    Paddock: Iversen 9 (this was called Iversen 7 until 2001)

    Treatments: refer to the length of grazing cycle.

    Grasslands Kaituna Lucerne

    Grazing cycle length treatments - as in publications and simulations:

    (i) LL (graze each 42 days all year round) - 42days

    (ii) LS (42 days until 4th Feb and 28 days after) - 42_28days

    (iii) SL (28 days until 4th Feb and 42 days after) - 28_42days

    (iv) LL (28 days all year) - 28days

    Publications:

    Teixeira EI, Moot DJ, Mickelbart MV (2007a). Seasonal patterns of root C and N reserves of lucerne crops (Medicago sativa L.) grown in a temperate climate were affected by defoliation regime. European Journal of Agronomy 26 (1), 10-20.

    Teixeira EI, Moot DJ, Pollock KJ, Brown HE (2007b). How does defoliation management affect yield, canopy forming processes and light interception in lucerne (Medicago sativa L.) crops? European Journal of Agronomy 27 (1), 154-164.

    Pre-2002 data (seedling and first regrowth season):

    Brown HE, Moot DJ, Teixeira EI (2005). The components of lucerne (Medicago sativa) leaf area index respond to temperature and photoperiod in a temperate climate. European Journal of Agronomy 23(4), 348-358.

    OBSERVATION:

    I had to move oserved data 2 days before real to avoid datapoints colelcted after the grazing date

    Lincoln University site (Iversen 9 at Field Service Centre)

    Regrowth crops (2002-2004) -  Data since seedling stage for this padock was added from Brown

    OBS: For some raeson teh lucerne release does not produce ANY biomass !!!!!
  simulation Lincoln2000-04(LL)
    clock
      start_date = 24/10/2000  # Enter the start date of the simulation
      end_date = 01/11/2004  # Enter the end date of the simulation
    summaryfile
    metfile met: filename=%apsim%\Examples\MetFiles\lincoln.met
    area paddock
      surfaceom surface organic matter
        PoolName = wheat  # Organic Matter pool name
        type = wheat  # Organic Matter type
        mass = 1000  # Initial surface residue (kg/ha)
        cnr = 80  # C:N ratio of initial residue
        standing_fraction = 0  # Fraction of residue standing
      fertiliser
      folder Manager folder
        manager Sowing rule
          on start_of_day:
```
if today = date('24-oct-2000')  then
!lucerne2 sow plants = 850, crop_class = plant, sowing_depth = 20, cultivar = kaituna !sets plant number at 850
  lucerne2 sow population = 850, depth = 20, cultivar = kaituna, MaxCover = 1.0, BudNumber = 1, row_spacing = 150, crop_class = plant

endif
```
        operations grazingLL
          24/01/2001  lucerne2 cut
          7/03/2001  lucerne2 cut
          2/05/2001  lucerne2 cut
          4/07/2001  lucerne2 cut
          29/09/2001  lucerne2 cut
          14/11/2001  lucerne2 cut
          21/12/2001  lucerne2 cut
          31/01/2002  lucerne2 cut
          4/04/2002  lucerne2 cut
          14/06/2002  lucerne2 cut
          6/10/2002  lucerne2 cut
          17/11/2002  lucerne2 cut
          28/12/2002  lucerne2 cut
          11/02/2003  lucerne2 cut
          23/03/2003  lucerne2 cut
          5/05/2003  lucerne2 cut
          13/06/2003  lucerne2 cut
          6/10/2003  lucerne2 cut
          13/11/2003  lucerne2 cut
          29/12/2003  lucerne2 cut
          8/02/2004  lucerne2 cut
          20/03/2004  lucerne2 cut
          3/05/2004  lucerne2 cut
          12/06/2004  lucerne2 cut
          3/10/2004  lucerne2 cut
        irrigation
          automatic_irrigation = off
          asw_depth = 600  # Depth to which ASW is calculated. (mm)
          crit_fr_asw = 0.5  # Fraction of ASW below which irrigation is applied (0-1.0)
          irrigation_efficiency = 1  # Efficiency of the irrigation. (0-1.0)
          irrigation_allocation = off  # Allocation limits
          allocation = 0  # Allocation in mm
          default_no3_conc = 0  # Nitrate concentration (ppm N)
          default_nh4_conc = 0  # Ammonium concentration (ppm N)
          default_cl_conc = 0  # Chloride concentration (ppm Cl)
        operations irrigation_applic
          20/12/2000  irrigation apply amount= 25 (mm)
          29/12/2000  irrigation apply amount= 30 (mm)
          28/01/2001  irrigation apply amount= 36 (mm)
          17/02/2001  irrigation apply amount= 45 (mm)
          7/03/2001  irrigation apply amount= 55 (mm)
          30/03/2001  irrigation apply amount= 80 (mm)
          29/04/2001  irrigation apply amount= 52 (mm)
          6/10/2001  irrigation apply amount= 70 (mm)
          6/12/2001  irrigation apply amount= 70 (mm)
          20/12/2001  irrigation apply amount= 80 (mm)
          12/09/2002  irrigation apply amount= 42 (mm)
          11/10/2002  irrigation apply amount= 40 (mm)
          31/12/2002  irrigation apply amount= 47 (mm)
          19/01/2003  irrigation apply amount= 40 (mm)
          12/02/2003  irrigation apply amount= 45 (mm)
          28/02/2003  irrigation apply amount= 45 (mm)
          14/03/2003  irrigation apply amount= 50 (mm)
          27/03/2003  irrigation apply amount= 40 (mm)
          27/11/2003  irrigation apply amount= 35 (mm)
          2/01/2004  irrigation apply amount= 40 (mm)
          14/01/2004  irrigation apply amount= 40 (mm)
          15/02/2004  irrigation apply amount= 40 (mm)
        manager SupportVariables
          on init:
```
ShootDM = 0 ! kg/ha
LeafDM = 0 ! kg/ha
StemDM = 0 ! kg/ha
RootDM = 0 ! kg/ha
```
          on start_of_day:
```
ShootDM = lucerne2.AboveGroundWt * 10
LeafDM = lucerne2.LeafLiveWt * 10
StemDM = lucerne2.StemLiveWt * 10
RootDM = lucerne2.RootLiveWt * 10
```
      Soil Iversen 7 Wakanui silt loam: SoilType=Sedementary; Region=Generic soil types; State=Canterbury; Latitude=999999; Longitude=999999; DataSource=From soil measurements made in field
        Analysis: PHUnits=Water; BoronUnits=HotWater
          Thickness  Rocks  PH
          200        0      5.8
          100        0      5.8
          100        0      5.8
          100        0      5.8
          100        0      5.8
          100        0      5.8
          100        0      5.8
          100        0      5.8
          100        0      5.8
          100        0      5.8
          100        0      5.8
          100        0      5.8
          100        0      5.8
          100        0      5.8
          100        0      5.8
          100        0      5.8
          100        0      5.8
          100        0      5.8
          100        0      5.8
          100        0      5.8
          100        0      5.8
          100        0      5.8
        Water
          Thickness  KS     BD     AirDry  LL15   DUL    SAT
          200        58.99  1.334  0.05    0.1    0.343  0.47
          100        58.99  1.334  0.05    0.1    0.333  0.47
          100        6.41   1.526  0.1     0.1    0.279  0.4
          100        6.41   1.526  0.1     0.1    0.272  0.4
          100        6.23   1.566  0.086   0.086  0.292  0.38
          100        6.23   1.566  0.06    0.06   0.288  0.38
          100        9.49   1.441  0.03    0.03   0.272  0.43
          100        9.49   1.441  0.03    0.03   0.284  0.43
          100        33.26  1.372  0.06    0.06   0.3    0.45
          100        33.26  1.372  0.1     0.1    0.32   0.45
          100        33.26  1.372  0.1     0.1    0.316  0.45
          100        33.26  1.372  0.1     0.1    0.341  0.45
          100        33.26  1.372  0.1     0.1    0.348  0.45
          100        33.26  1.372  0.1     0.1    0.343  0.45
          100        33.26  1.372  0.1     0.1    0.345  0.45
          100        33.26  1.372  0.1     0.1    0.333  0.45
          100        33.26  1.372  0.1     0.1    0.326  0.45
          100        33.26  1.372  0.1     0.1    0.341  0.45
          100        33.26  1.372  0.1     0.1    0.343  0.45
          100        33.26  1.372  0.1     0.1    0.345  0.45
          100        33.26  1.372  0.1     0.1    0.357  0.45
          100        33.26  1.372  0.1     0.1    0.358  0.45
          SoilCrop Barley
            LL=[0.1, 0.1, 0.1, 0.1, 0.086, 0.06, 0.03, 0.03, 0.06, 0.1, 0.1, 0.1, 0.1, 0.1, 0.1, 0.1, 0.1, 0.1, 0.1, 0.1, 0.1, 0.1]
            KL=[0.088, 0.088, 0.079, 0.079, 0.044, 0.044, 0.035, 0.035, 0.07, 0.07, 0.07, 0.07, 0.07, 0.07, 0.07, 0.07, 0.07, 0.07, 0.07, 0.07, 0.07, 0.07]
            XF=[1, 1, 1, 1, 1, 1, 1, 1, 1, 1, 1, 1, 1, 1, 1, 1, 1, 1, 1, 1, 1, 1]
          SoilCrop Canola
            LL=[0.1, 0.1, 0.1, 0.1, 0.086, 0.06, 0.03, 0.03, 0.06, 0.1, 0.1, 0.1, 0.1, 0.1, 0.1, 0.1, 0.1, 0.1, 0.1, 0.1, 0.1, 0.1]
            KL=[0.075, 0.075, 0.068, 0.068, 0.038, 0.038, 0.03, 0.03, 0.06, 0.06, 0.06, 0.06, 0.06, 0.06, 0.06, 0.06, 0.06, 0.06, 0.06, 0.06, 0.06, 0.06]
            XF=[1, 1, 0.83, 0.83, 0.51, 0.51, 0.32, 0.32, 0.51, 0.51, 0.51, 0.51, 0.51, 0.51, 0.51, 0.51, 0.51, 0.51, 0.51, 0.51, 0.51, 0.51]
          SoilCrop Cloverseed
            LL=[0.1, 0.1, 0.1, 0.1, 0.086, 0.06, 0.03, 0.03, 0.06, 0.1, 0.1, 0.1, 0.1, 0.1, 0.1, 0.1, 0.1, 0.1, 0.1, 0.1, 0.1, 0.1]
            KL=[0.05, 0.05, 0.045, 0.045, 0.025, 0.025, 0.02, 0.02, 0.04, 0.04, 0.04, 0.04, 0.04, 0.04, 0.04, 0.04, 0.04, 0.04, 0.04, 0.04, 0.04, 0.04]
            XF=[1, 1, 1, 1, 0.73, 0.73, 0.44, 0.44, 0.73, 0.73, 0.73, 0.73, 0.73, 0.73, 0.73, 0.73, 0.73, 0.73, 0.73, 0.73, 0.73, 0.73]
          SoilCrop Fieldpea
            LL=[0.1, 0.1, 0.1, 0.1, 0.086, 0.06, 0.03, 0.03, 0.06, 0.1, 0.1, 0.1, 0.1, 0.1, 0.1, 0.1, 0.1, 0.1, 0.1, 0.1, 0.1, 0.1]
            KL=[0.1, 0.1, 0.09, 0.09, 0.05, 0.05, 0.04, 0.04, 0.08, 0.08, 0.08, 0.08, 0.08, 0.08, 0.08, 0.08, 0.08, 0.08, 0.08, 0.08, 0.08, 0.08]
            XF=[1, 1, 0.45, 0.45, 0.3, 0.3, 0.2, 0.2, 0.3, 0.3, 0.3, 0.3, 0.3, 0.3, 0.3, 0.3, 0.3, 0.3, 0.3, 0.3, 0.3, 0.3]
          SoilCrop Fababean
            LL=[0.1, 0.1, 0.1, 0.1, 0.086, 0.06, 0.03, 0.03, 0.06, 0.1, 0.1, 0.1, 0.1, 0.1, 0.1, 0.1, 0.1, 0.1, 0.1, 0.1, 0.1, 0.1]
            KL=[0.1, 0.1, 0.09, 0.09, 0.05, 0.05, 0.04, 0.04, 0.08, 0.08, 0.08, 0.08, 0.08, 0.08, 0.08, 0.08, 0.08, 0.08, 0.08, 0.08, 0.08, 0.08]
            XF=[1, 1, 0.83, 0.83, 0.51, 0.51, 0.32, 0.32, 0.51, 0.51, 0.51, 0.51, 0.51, 0.51, 0.51, 0.51, 0.51, 0.51, 0.51, 0.51, 0.51, 0.51]
          SoilCrop Foragebrassica: same as Lincoln2000-04(LL).paddock.Iversen 7 Wakanui silt loam.Water.Canola
          SoilCrop Itallianryegrass: same as Lincoln2000-04(LL).paddock.Iversen 7 Wakanui silt loam.Water.Canola
          SoilCrop lucerne2
            LL=[0.1, 0.1, 0.1, 0.1, 0.086, 0.06, 0.03, 0.03, 0.06, 0.1, 0.1, 0.1, 0.1, 0.1, 0.1, 0.1, 0.1, 0.1, 0.1, 0.1, 0.1, 0.1]
            KL=[0.038, 0.038, 0.034, 0.034, 0.019, 0.019, 0.015, 0.015, 0.03, 0.03, 0.03, 0.03, 0.03, 0.03, 0.03, 0.03, 0.03, 0.03, 0.03, 0.03, 0.03, 0.03]
            XF=[1, 1, 1, 1, 1, 1, 1, 1, 1, 1, 1, 1, 1, 1, 1, 1, 1, 1, 1, 1, 1, 1]
          SoilCrop Maize: same as Lincoln2000-04(LL).paddock.Iversen 7 Wakanui silt loam.Water.Canola
          SoilCrop Oats
            LL=[0.1, 0.1, 0.1, 0.1, 0.086, 0.06, 0.03, 0.03, 0.06, 0.1, 0.1, 0.1, 0.1, 0.1, 0.1, 0.1, 0.1, 0.1, 0.1, 0.1, 0.1, 0.1]
            KL=[0.075, 0.075, 0.068, 0.068, 0.038, 0.038, 0.03, 0.03, 0.06, 0.06, 0.06, 0.06, 0.06, 0.06, 0.06, 0.06, 0.06, 0.06, 0.06, 0.06, 0.06, 0.06]
            XF=[1, 1, 1, 1, 0.73, 0.73, 0.44, 0.44, 0.73, 0.73, 0.73, 0.73, 0.73, 0.73, 0.73, 0.73, 0.73, 0.73, 0.73, 0.73, 0.73, 0.73]
          SoilCrop Potato: same as Lincoln2000-04(LL).paddock.Iversen 7 Wakanui silt loam.Water.Fieldpea
          SoilCrop Grassseed
            LL=[0.1, 0.1, 0.1, 0.1, 0.086, 0.06, 0.03, 0.03, 0.06, 0.1, 0.1, 0.1, 0.1, 0.1, 0.1, 0.1, 0.1, 0.1, 0.1, 0.1, 0.1, 0.1]
            KL=[0.05, 0.05, 0.045, 0.045, 0.025, 0.025, 0.02, 0.02, 0.04, 0.04, 0.04, 0.04, 0.04, 0.04, 0.04, 0.04, 0.04, 0.04, 0.04, 0.04, 0.04, 0.04]
            XF=[1, 1, 0.83, 0.83, 0.51, 0.51, 0.32, 0.32, 0.51, 0.51, 0.51, 0.51, 0.51, 0.51, 0.51, 0.51, 0.51, 0.51, 0.51, 0.51, 0.51, 0.51]
          SoilCrop Triticale
            LL=[0.1, 0.1, 0.1, 0.1, 0.086, 0.06, 0.03, 0.03, 0.06, 0.1, 0.1, 0.1, 0.1, 0.1, 0.1, 0.1, 0.1, 0.1, 0.1, 0.1, 0.1, 0.1]
            KL=[0.088, 0.088, 0.079, 0.079, 0.044, 0.044, 0.035, 0.035, 0.07, 0.07, 0.07, 0.07, 0.07, 0.07, 0.07, 0.07, 0.07, 0.07, 0.07, 0.07, 0.07, 0.07]
            XF=[1, 1, 1, 1, 0.73, 0.73, 0.44, 0.44, 0.73, 0.73, 0.73, 0.73, 0.73, 0.73, 0.73, 0.73, 0.73, 0.73, 0.73, 0.73, 0.73, 0.73]
          SoilCrop Wheat: same as Lincoln2000-04(LL).paddock.Iversen 7 Wakanui silt loam.Water.Oats
          SoilCrop lucerne22: same as Lincoln2000-04(LL).paddock.Iversen 7 Wakanui silt loam.Water.lucerne2
        SoilWater: SummerCona=4.4; SummerU=9; SummerDate=1-Nov; WinterCona=3; WinterU=6; WinterDate=1-Apr; DiffusConst=88; DiffusSlope=35; Salb=0.13; CN2Bare=73; CNRed=20; CNCov=0.8
          Thickness=[200, 100, 100, 100, 100, 100, 100, 100, 100, 100, 100, 100, 100, 100, 100, 100, 100, 100, 100, 100, 100, 100]
          SWCON=[0.49, 0.49, 0.34, 0.34, 0.37, 0.37, 0.1, 0.1, 0.39, 0.39, 0.39, 0.39, 0.39, 0.39, 0.39, 0.39, 0.39, 0.39, 0.39, 0.39, 0.39, 0.39]
        SoilOrganicMatter: RootCN=40; RootWt=1000; SoilCN=11; EnrACoeff=7.4; EnrBCoeff=0.2
          Thickness  OC    FBiom  FInert
          200        2.7   0.03   0.4
          100        1     0.02   0.6
          100        0.45  0.01   0.7
          100        0.3   0.01   0.8
          100        0.2   0.01   0.9
          100        0.2   0.01   0.9
          100        0.2   0.01   0.9
          100        0.2   0.01   0.9
          100        0.2   0.01   1
          100        0.2   0.01   1
          100        0.2   0.01   1
          100        0.2   0.01   1
          100        0.2   0.01   1
          100        0.2   0.01   1
          100        0.2   0.01   0.9
          100        0.2   0.01   1
          100        0.2   0.01   1
          100        0.2   0.01   1
          100        0.2   0.01   1
          100        0.2   0.01   1
          100        0.2   0.01   1
          100        0.2   0.01   1
        Sample Initial nitrogen
          Thickness  NO3      NH4
          200        15.4914  0.0929483
          100        15.4914  0.0929483
          100        15.4914  0.0929483
          100        15.4914  0.0929483
          100        15.4914  0.0929483
          100        15.4914  0.0929483
          100        15.4914  0.0929483
          100        15.4914  0.0929483
          100        15.4914  0.0929483
          100        15.4914  0.0929483
          100        15.4914  0.0929483
          100        15.4914  0.0929483
          100        15.4914  0.0929483
          100        15.4914  0.0929483
          100        15.4914  0.0929483
          100        15.4914  0.0929483
          100        15.4914  0.0929483
          100        15.4914  0.0929483
          100        15.4914  0.0929483
          100        15.4914  0.0929483
          100        15.4914  0.0929483
          100        15.4914  0.0929483
        InitialWater Initial water: FractionFull=1.00; PercentMethod=FilledFromTop
      lucerne2
      micromet: soilalbedo=0.23; a_interception=0.0; b_interception=0.0; c_interception=0.0; d_interception=0.0
      outputfile: filename=Lincoln2000-04(LL).out; title=Lincoln2000-04(LL)
        variables
          variable:
            dd/mm/yyyy as date
            ShootDM
            LeafLAI
            LeafDM
            StemDM
            RootDM
            Cover_tot
            Height
            RootPartitionFractionValue
            AboveGroundWt
            RootSenescenceRateValue
            PhenologyPhotoperiodValue
            Cover_green
            LeafDMDemandFunctionPartitionFractionValue
            RootSenescenceRateRespMaxAt20CValue
            RootSenescenceRateQ10AdjValue
            RootSenescenceRateSeasAdjValue
            TotalDeadWt
            StageCodeValue
        events Reporting Frequency: event=end_day
    memo
      This includes changes to Plant (1) in phenology parameterization (e.g. photoperiod at start of phase) and phyllochron changes also.
  factorial Factorials: active=0
    settings
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