folder Maize: version=37; creator=Apsim 7.10-r0
  folder Shared
    variables My Variables
      variable:
        dd/mm/yyyy as Date
        DaysAfterSowing
        Stage
        Biomass
        GreenWt
        Biomass units g/m^2 as BiomassWt
        RootGreenWt
        LeafGreenWt
        StemGreenWt
        RachisGreenWt
        GrainGreenWt
        biomass_n
        RootGreenN
        LeafGreenN
        StemGreenN
        RachisGreenN
        GrainGreenN
        GrainGreenNConc
        GrainNo
        GrainSize
        LeafNo
        LAI
        SLAI
        esw_profile as ESW
        SLN
        WaterSD
        HI
        TPLA
        SPLA
        Height
        cover_green
        cover_tot
        sw_supply
        RootDepth
        no3() as NO3
        nfact_photo
        Yield
        GrainYield
    events My Variables Events
    manager DoOutput
      on end_of_day:
```
if (paddock_is_fallow() = 0) then
   GrainYield = GrainGreenWt * 10
   outputfile do_output
endif
```
  simulation Maize_Exp1 2ND Yr3_1
    metfile met: filename=Exp1 2ND Yr3.met
    clock
      start_date = 4/1/2001  # Enter the start date of the simulation
      end_date = 31/5/2001  # Enter the end date of the simulation
    summaryfile
    area paddock
      Soil GattonField: LocalName=UQ Lawes; Site=UQ Lawes; Region=Lockyer
        SoilType = Gatton  # Soil description
        NearestTown = Unknown
        NaturalVegetation = Unknown
        InitialWater Initial water: FractionFull=1; PercentMethod=FilledFromTop
        Water
          Thickness  BD    AirDry  LL15  DUL   SAT
          150        1.32  0.13    0.26  0.41  0.47
          150        1.3   0.23    0.26  0.43  0.48
          300        1.23  0.26    0.26  0.46  0.51
          300        1.27  0.26    0.26  0.44  0.49
          300        1.37  0.25    0.25  0.4   0.45
          300        1.35  0.28    0.28  0.41  0.46
          300        1.35  0.31    0.31  0.38  0.46
          SoilCrop Maize: LL=[0.26, 0.26, 0.26, 0.26, 0.25, 0.28, 0.31]; KL=[0.1, 0.1, 0.1, 0.08, 0.06, 0.04, 0.02]; XF=[1, 1, 1, 1, 1, 1, 1]
        SoilWater: SummerCona=3.5; SummerU=6; SummerDate=1-Nov; WinterCona=3.5; WinterU=6; WinterDate=1-Apr; DiffusConst=40; DiffusSlope=16; Salb=0.11; CN2Bare=73; CNRed=20; CNCov=0.8; Thickness=[150, 150, 300, 300, 300, 300, 300]; SWCON=[0.3, 0.3, 0.3, 0.3, 0.3, 0.3, 0.3]
        SoilOrganicMatter: RootCN=40; RootWt=200; SoilCN=12.5; EnrACoeff=7.4; EnrBCoeff=0.2
          Thickness  OC    FBiom  FInert
          150        1.24  0.03   0.95
          150        1.24  0.02   0.95
          300        0.8   0.01   0.95
          300        0.75  0.01   0.95
          300        0.71  0.01   0.95
          300        0.34  0.01   0.95
          300        0.26  0.01   0.95
        Analysis: Thickness=[150, 150, 300, 300, 300, 300, 300]; PH=[7, 7, 7, 7, 7, 7, 7]
        Sample Initial nitrogen
          Thickness  NO3      NH4
          150        9.99998  0.1
          150        4.99999  0.1
          300        3.68997  0.1
          300        3.80997  0.1
          300        2.46598  0.1
          300        2.42998  0.1
          300        2.42998  0.1
      surfaceom surface organic matter
        PoolName = wheat  # Organic Matter pool name
        type = wheat  # Organic Matter type
        mass = 1000  # Initial surface residue (kg/ha)
        cnr = 80  # C:N ratio of initial residue
        standing_fraction = 0  # Fraction of residue standing
      fertiliser
      folder Manager folder
        manager Sow on a fixed date
          # Sowing criteria
          date = 4/01/2001  # Enter sowing date (dd-mmm)
          # Sowing parameters
          crop = Maize  # Enter name of crop to sow
          density = 7  # Enter sowing density (plants/m2)
          depth = 50  # Enter sowing depth (mm)
          cultivar = Hycorn53  # Enter cultivar
          row_spacing = 0.75  # Enter row spacing (mm)
          on start_of_day:
```
if (today = date('[date]') then
   [crop] sow plants =[density], sowing_depth = [depth], cultivar = [cultivar], row_spacing = [row_spacing]
endif
```
        manager Harvesting rule
          # Harvesting criteria
          crop = maize  # Enter name of crop to harvest when ripe
          on end_of_day:
```
if (paddock_is_fallow() = 0) then
   GrainYield = GrainGreenWt * 10
   outputfile do_output
endif

           if [crop].StageName = 'harvest_ripe' or [crop].plant_status = 'dead' then
              [crop]  harvest
              [crop]  end_crop
           endif
```
        manager DoOutput -> /Maize/Shared/DoOutput
      operations
      irrigation
        automatic_irrigation = on
        asw_depth = 600  # Depth to which ASW is calculated. (mm)
        crit_fr_asw = 0.5  # Fraction of ASW below which irrigation is applied (0-1.0)
        irrigation_efficiency = 1  # Efficiency of the irrigation. (0-1.0)
        irrigation_allocation = off  # Allocation limits
        allocation = 0  # Allocation in mm
        default_no3_conc = 0  # Nitrate concentration (ppm N)
        default_nh4_conc = 0  # Ammonium concentration (ppm N)
        default_cl_conc = 0  # Chloride concentration (ppm Cl)
      outputfile: filename=Maize_Exp1 2ND Yr3_1.out; title=Maize_Exp1 2ND Yr3_1
        variables My Variables -> /Maize/Shared/My Variables
        events My Variables Events -> /Maize/Shared/My Variables Events
      maize
  simulation Maize_Exp1 2ND Yr3_2
    metfile met: filename=Exp1 2ND Yr3.met
    clock
      start_date = 4/01/2001  # Enter the start date of the simulation
      end_date = 31/05/2001  # Enter the end date of the simulation
    summaryfile
    area paddock
      Soil GattonField: SoilType=Gatton; LocalName=UQ Lawes; Site=UQ Lawes; NearestTown=Unknown; Region=Lockyer; NaturalVegetation=Unknown; Latitude=0; Longitude=0; YearOfSampling=0
        InitialWater Initial water: FractionFull=1; PercentMethod=FilledFromTop
        Water: same as Maize_Exp1 2ND Yr3_1.paddock.GattonField.Water
        SoilWater: same as Maize_Exp1 2ND Yr3_1.paddock.GattonField.SoilWater
        SoilOrganicMatter: same as Maize_Exp1 2ND Yr3_1.paddock.GattonField.SoilOrganicMatter
        Analysis: Thickness=[150, 150, 300, 300, 300, 300, 300]; PH=[7, 7, 7, 7, 7, 7, 7]
        Sample Initial nitrogen
          Thickness  NO3      NH4
          150        9.99996  0.1
          150        4.99998  0.1
          300        3.68998  0.1
          300        3.80998  0.1
          300        2.46598  0.1
          300        2.42999  0.1
          300        2.42999  0.1
      surfaceom surface organic matter
        PoolName = wheat  # Organic Matter pool name
        type = wheat  # Organic Matter type
        mass = 1000  # Initial surface residue (kg/ha)
        cnr = 80  # C:N ratio of initial residue
        standing_fraction = 0  # Fraction of residue standing
      fertiliser
      folder Manager folder
        manager Sow on a fixed date
          # Sowing criteria
          date = 4/01/2001  # Enter sowing date (dd-mmm)
          # Sowing parameters
          crop = maize  # Enter name of crop to sow
          density = 7  # Enter sowing density (plants/m2)
          depth = 50  # Enter sowing depth (mm)
          cultivar = Hycorn53  # Enter cultivar
          row_spacing = 0.75  # Enter row spacing (mm)
          on start_of_day:
          script: same as in Maize_Exp1 2ND Yr3_1.paddock.Manager folder.Sow on a fixed date
        manager Harvesting rule
          # Harvesting criteria
          crop = maize  # Enter name of crop to harvest when ripe
          on end_of_day:
```
           if [crop].StageName = 'harvest_ripe' or [crop].plant_status = 'dead' then
              [crop]  harvest
              [crop]  end_crop
           endif
```
        manager DoOutput -> /Maize/Shared/DoOutput
      operations
        13/02/2001  fertiliser apply amount = 150, depth = 30, type = urea_n
      irrigation: same as Maize_Exp1 2ND Yr3_1.paddock.Irrigation
      outputfile: filename=Maize_Exp1 2ND Yr3_2.out; title=Maize_Exp1 2ND Yr3_2
        variables My Variables -> /Maize/Shared/My Variables
        events My Variables Events -> /Maize/Shared/My Variables Events
      maize
  simulation Maize_Exp1 2ND Yr3_3
    metfile met: filename=Exp1 2ND Yr3.met
    clock
      start_date = 4/01/2001  # Enter the start date of the simulation
      end_date = 31/05/2001  # Enter the end date of the simulation
    summaryfile
    area paddock
      Soil GattonField: SoilType=Gatton; LocalName=UQ Lawes; Site=UQ Lawes; NearestTown=Unknown; Region=Lockyer; NaturalVegetation=Unknown; Latitude=0; Longitude=0; YearOfSampling=0
        InitialWater Initial water: FractionFull=1; PercentMethod=FilledFromTop
        Water: same as Maize_Exp1 2ND Yr3_1.paddock.GattonField.Water
        SoilWater: same as Maize_Exp1 2ND Yr3_1.paddock.GattonField.SoilWater
        SoilOrganicMatter: same as Maize_Exp1 2ND Yr3_1.paddock.GattonField.SoilOrganicMatter
        Analysis: Thickness=[150, 150, 300, 300, 300, 300, 300]; PH=[7, 7, 7, 7, 7, 7, 7]
        Sample Initial nitrogen
          Thickness  NO3      NH4
          150        9.99996  0.1
          150        4.99998  0.1
          300        3.68998  0.1
          300        3.80998  0.1
          300        2.46598  0.1
          300        2.42999  0.1
          300        2.42999  0.1
      surfaceom surface organic matter
        PoolName = wheat  # Organic Matter pool name
        type = wheat  # Organic Matter type
        mass = 1000  # Initial surface residue (kg/ha)
        cnr = 80  # C:N ratio of initial residue
        standing_fraction = 0  # Fraction of residue standing
      fertiliser
      folder Manager folder
        manager Sow on a fixed date
          # Sowing criteria
          date = 4/01/2001  # Enter sowing date (dd-mmm)
          # Sowing parameters
          crop = maize  # Enter name of crop to sow
          density = 7  # Enter sowing density (plants/m2)
          depth = 50  # Enter sowing depth (mm)
          cultivar = Hycorn53  # Enter cultivar
          row_spacing = 0.75  # Enter row spacing (mm)
          on start_of_day:
          script: same as in Maize_Exp1 2ND Yr3_1.paddock.Manager folder.Sow on a fixed date
        manager Harvesting rule
          # Harvesting criteria
          crop = maize  # Enter name of crop to harvest when ripe
          on end_of_day:
          script: same as in Maize_Exp1 2ND Yr3_2.paddock.Manager folder.Harvesting rule
        manager DoOutput -> /Maize/Shared/DoOutput
      operations
        4/01/2001  fertiliser apply amount = 100, depth = 30, type = urea_n
        13/02/2001  fertiliser apply amount = 150, depth = 30, type = urea_n
      irrigation: same as Maize_Exp1 2ND Yr3_1.paddock.Irrigation
      outputfile: filename=Maize_Exp1 2ND Yr3_3.out; title=Maize_Exp1 2ND Yr3_3
        variables My Variables -> /Maize/Shared/My Variables
        events My Variables Events -> /Maize/Shared/My Variables Events
      maize
