folder Maize: version=37; creator=Apsim 7.10-r4158
  folder shared
    Maize
      MaizeConstants standard: crop_type=maize; default_crop_class=plant; rue=1.85; row_spacing_default=1.0; retransRate=0.15; ratio_root_shoot=0   0   1    1     0.33  0.33  0.087 0    0     0    0    0; PGRt0=130; PGRt1=260; PGRbase=1.2; GNk=0.83; GrainTempWindow=-150 50; x_lai=0.1    4; initial_tpla (mm^2/plant)=380; specific_root_length (mm/g)=100000; y_rel_root_rate (0-1)=0.02  0.10  1.0; transp_eff_cf (kpa)=0.009; no3_diffn_const (days)=2.0; maxUptakeRate=0.029; initialRootNConc=0.020; targetRootNConc=0.002; initialLeafSLN=1.7; targetLeafSLN=1.7; newLeafSLN=1.1; senescedLeafSLN=0.3; leafDilnNSlope=0.0037; leafDilnNInt=-0.0015; initialStemNConc=0.01; x_stem_n=3         5       7         10; targetStemNConc=0.04   0.04   0.01      0.005; structStemNConc=0.0045  0.0045   0.0021   0.0021; stemDilnNSlope=0.005; stemDilnNInt=-0.00052; initialRachisNConc=0.000; targetRachisNConc=0.01; structRachisNConc=0.0021; rachisDilnNSlope=0.005; rachisDilnNInt=-0.00052; grainNFillRate (mg/grain/dd)=0.01; targetGrainNConc=0.0143; nUptakeCease=523; nSupplyFrac=5; leaf_no_dead_slope=0.00035; pfact_expansion_slope=2.5; pfact_grain_slope=20; x_p_stage_code=3       4      5      6      7      8      10; y_p_conc_max_leaf=0.0045  0.0045 0.004  0.0025 0.0025 0.0024 0.0024; y_p_conc_min_leaf=0.003   0.003  0.0029 0.0011 0.0011 0.0008 0.0006; y_p_conc_sen_leaf=0.0005  0.0005 0.0005 0.0005 0.0005 0.0005 0.0005; y_p_conc_max_stem=0.0045   0.0045 0.003  0.0011  0.001  0.0007 0.0007; y_p_conc_min_stem=0.003    0.003  0.002  0.0006 0.0006 0.0002 0.0002; y_p_conc_sen_stem=0.0002  0.0002 0.0002 0.0002 0.0002 0.0002 0.0002; y_p_conc_min_root=0.0010  0.0010 0.0010 0.0010 0.0010 0.0010 0.0010; y_p_conc_sen_root=0.0010  0.0010 0.0010 0.0010 0.0010 0.0010 0.0010; y_p_conc_min_flower=0.003   0.003   0.002  0.0006 0.0006 0.0002 0.0002; y_p_conc_sen_flower=0.0002  0.0002 0.0002 0.0002 0.0002 0.0002 0.0002; y_p_conc_sen_grain=0.001   0.001  0.001  0.001  0.001  0.0015  0.0015; p_conc_init_leaf=0.0045; p_conc_init_stem=0.0045; p_conc_init_flower=0.0045; p_conc_init_grain=0.0030; x_co2_te_modifier (ppm co2)=0  350  700   1000; y_co2_te_modifier=0  1.0  1.37  1.69; GNmaxCoef=170
        stage_names=sowing germination emergence end_of_juvenile floral_initiation flag_leaf flowering start_grain_fill end_grain_fill maturity harvest_ripe end_crop
        root_depth_rate=0 33    33    33     33    33    33   0      0       0    0    0
        pesw_germ (mm/mm) = 0.0  # plant extractable soil water in seedling layer inadequate for germination (mm/mm)
        shoot_lag (oCd) = 15.0  # Time lag before linear coleoptile growth starts (deg days)
        shoot_rate (oCd/mm) = 0.60  # Growing deg day increase with depth for coleoptile (deg day/mm depth)
        twilight (o) = -6.0  # Twilight is defined as the interval between sunrise or sunset and the time when the true
        x_temp (oC) = 0  18.0 26.0 34.0 44.0  # cardinal temps.
        y_tt (oC) = 0  10.0 18.0 26.0  0.0  # thermal time
        leaf_no_at_emerg = 0.5  # (expanded) leaf number at emergence ()
        leaf_no_seed = 6.0  # number of leaf primordia present in seed
        leaf_no_min = 5.0  # minimum leaf number
        leaf_no_max = 40.0  # maximum leaf number
        leaf_init_rate (oCd) = 23.2  # degree days to initiate each leaf primordium until floral init (deg day)
        leaf_app_rate1 = 65.0
        leaf_app_rate2 = 36.0
        leaf_app_rate3 = 36.0
        leaf_no_rate_change1 = 8
        leaf_no_rate_change2 = 3
        x_row_spacing (m) = 0.20   0.50   1.00  # Row spacing
        y_extinct_coef = 0.70   0.50   0.50  # extinction coefficient for green leaf
        x_ave_temp (oC) = 8 15 35 50  # mean daily temperature
        y_stress_photo = 0  1  1  0  # multiplier on RUE
        dm_leaf_init (g/plant) = 0.01  # leaf weight at emergence (g/plant)
        dm_root_init (g/plant) = 0.01  # root weight at emergence (g/plant)
        dm_stem_init (g/plant) = 0.01  # stem weight at emergence (g/plant)
        stem_trans_frac = 0.20  # fraction of stem used in translocation to grain - not used for i_wheat option
        leaf_trans_frac = 0.15  # fraction of leaf used in translocation to grain
        partition_rate_leaf = 0.0182  # coefficient of sigmoidal function between leaf partition fraction and internode no**2 (0-1)
        frac_stem2flower = 0.17  # fraction of dm allocated to stem that goes to developing head
        grn_water_cont (g/g) = 0.155  # water content of grain g/g
        aX0 = 0.67  # Largest leaf position multiplier
        largestLeafParams = 1000  -1.17 0.047  # Largest Leaf Area Params
        bellCurveParams = -0.009 -0.2 0.0006 -0.43  # Leaf Curve Params
        leaf_no_correction = 2.0  # Correction for other growing leaves
        y_lai_sla_max = 50000 25000  # maximum specific leaf area for delta LAI
        lai_sla_min = 8000  8000  # minimum specific leaf area for delta LAI
        x_sw_ratio = 0.1 0.5  # water availability for effects on root depth growth
        y_sw_fac_root = 0   1  # stress factor for root depth growth, This may be probably the same for all crops
        x_plant_rld (mm/mm3/plant) = 0   0.0001  0.0003  # root branching
        svp_fract = 0.75  # (0-1)
        x_sw_demand_ratio = 0.5 1.1  # water availability
        y_swdef_leaf = 0   1  # stress indices
        x_sw_avail_ratio = 0 0.16  # water availability
        y_swdef_pheno = 0 1  # stress index for phenology
        dm_root_sen_frac = 0.002  # fraction of root dry matter senesced each day
        leaf_no_dead_const = -0.025  # coefficients for rate of leaf number senescence following flowering
        sen_light_time_const (days) = 10.0  # delay factor for light senescence
        sen_radn_crit (Mj/m^2) = 2  # radiation level for onset of light senescence
        frost_kill (oC) = -3.0  # temperature threshold for leaf death
        sen_water_time_const (days) = 10.0  # delay factor for water senescence
        sen_threshold = 0.25  # supply:demand ratio for onset of water senescence
        tt_emerg_limit (oCd) = 150.0  # maximum degree days allowed for emergence to take place
        pfact_photo_slope = 2.5  # 2.0 !1.0
        pfact_pheno_slope = 6  # 10 !20
        p_uptake_factor = 1.5  # factor to calc total P uptake from demand for today's growth
        y_p_conc_max_root = 0.0010  0.0010 0.0010 0.0010 0.0010 0.0010 0.0010  # assume P conc in roots non-varying
        y_p_conc_max_flower = 0.0045  0.0045  0.003  0.0011  0.001  0.0007 0.0007  # assumed same as stem
        y_p_conc_max_grain = 0.001   0.001  0.001  0.001  0.001  0.0030  0.0030  # based on Mallarino (1996)
        y_p_conc_min_grain = 0.001   0.001  0.001  0.001  0.001  0.0015  0.0015  # based on Kenya data
        p_conc_init_root = 0.0010  # 0.0014
        minsw = 0.00001  # lowest acceptable value for ll
        x_stem_wt (g/stem) = 0    80  # look up table for canopy height
        y_height (mm) = 0  2000  # plant canopy height
      MaizeGenotype Barker
        tt_emerg_to_endjuv = 100
        tt_endjuv_to_init = 210.0
        photoperiod_crit1 = 12.5
        photoperiod_crit2 = 20.0
        photoperiod_slope = 27.3
        tt_flag_to_flower = 50
        tt_flower_to_start_grain = 170
        tt_flower_to_maturity = 990
        tt_maturity_to_ripe = 1
        GNmax = 550
        potKernelWt = 350
        rue = 1.60
        leaf_no_dead_const = -0.025
        leaf_no_dead_slope = 0.0002
      MaizeGenotype Pioneer_6875
        tt_emerg_to_endjuv = 100
        tt_endjuv_to_init = 220
        photoperiod_crit1 = 12.5
        photoperiod_crit2 = 20.0
        photoperiod_slope = 0
        tt_flag_to_flower = 50
        tt_flower_to_start_grain = 170
        tt_flower_to_maturity = 840
        tt_maturity_to_ripe = 1
        GNmax = 550
        potKernelWt = 350
        rue = 1.60
        leaf_no_dead_const = -0.025
        leaf_no_dead_slope = 0.0002
      MaizeGenotype katumani
        tt_emerg_to_endjuv = 100
        tt_endjuv_to_init = 150
        photoperiod_crit1 = 12.5
        photoperiod_crit2 = 24.0
        photoperiod_slope = 15.0
        tt_flag_to_flower = 10
        tt_flower_to_start_grain = 120
        tt_flower_to_maturity = 890
        tt_maturity_to_ripe = 1
        GNmax = 420
        potKernelWt = 300
        rue = 1.60
        aX0 = 0.72  # Largest leaf multiplier
        largestLeafParams = 1200  -1.17 0.047  # Largest Leaf Area Params
        bellCurveParams = -0.0126 -0.2071 0.000365 -0.4381  # Leaf Curve Params
        GNmaxCoef = 120
        PGRbase = 1.8
      MaizeGenotype dekalb_xl82
        tt_emerg_to_endjuv = 100
        tt_endjuv_to_init = 100
        photoperiod_crit1 = 12.5
        photoperiod_crit2 = 20.0
        photoperiod_slope = 41.0
        tt_flag_to_flower = 101
        tt_flower_to_start_grain = 170
        tt_flower_to_maturity = 900
        tt_maturity_to_ripe = 1
        GNmax = 600
        potKernelWt = 300
        rue = 1.60
        largestLeafParams = 1000  -1.17 0.047  # Largest Leaf Area Params
        bellCurveParams = -0.006 -0.2 0.0014 -0.43  # Leaf Curve Params
      MaizeGenotype gh_5009
        tt_emerg_to_endjuv = 100
        tt_endjuv_to_init = 150
        photoperiod_crit1 = 12.5
        photoperiod_crit2 = 20.0
        photoperiod_slope = 0.0
        tt_flag_to_flower = 50
        tt_flower_to_start_grain = 170
        tt_flower_to_maturity = 890
        tt_maturity_to_ripe = 1
        GNmax = 580
        potKernelWt = 300
        rue = 1.60
      MaizeGenotype hycorn_40
        tt_emerg_to_endjuv = 100
        tt_endjuv_to_init = 150
        photoperiod_crit1 = 12.5
        photoperiod_crit2 = 20.0
        photoperiod_slope = 0.0
        tt_flag_to_flower = 50
        tt_flower_to_start_grain = 170
        tt_flower_to_maturity = 765
        tt_maturity_to_ripe = 1
        GNmax = 500
        potKernelWt = 300
        rue = 1.60
        leaf_no_dead_const = -0.025
        leaf_no_dead_slope = 0.00042
      MaizeGenotype hycorn_50
        tt_emerg_to_endjuv = 100
        tt_endjuv_to_init = 130
        photoperiod_crit1 = 12.5
        photoperiod_crit2 = 20.0
        photoperiod_slope = 0.0
        tt_flag_to_flower = 50
        tt_flower_to_start_grain = 170
        tt_flower_to_maturity = 960
        tt_maturity_to_ripe = 1
        GNmax = 580
        potKernelWt = 260
        rue = 1.60
      MaizeGenotype gh_5019wx
        tt_emerg_to_endjuv = 100
        tt_endjuv_to_init = 165
        photoperiod_crit1 = 12.5
        photoperiod_crit2 = 20.0
        photoperiod_slope = 5.0
        tt_flag_to_flower = 50
        tt_flower_to_start_grain = 170
        tt_flower_to_maturity = 890
        tt_maturity_to_ripe = 1
        GNmax = 500
        potKernelWt = 280
        rue = 1.60
  simulation Maize_UQG_UQG6875
    metfile met: filename=UQG .met
    clock
      start_date = 26/10/1988  # Enter the start date of the simulation
      end_date = 16/3/1989  # Enter the end date of the simulation
    summaryfile
    area paddock
      Soil Field 04: SoilType=QACGatton; LocalName=UQG; Site=UQG; NearestTown=Unknown; Region=UQG; NaturalVegetation=Unknown; Latitude=0; Longitude=0; YearOfSampling=0
        Water
          Thickness  BD   AirDry  LL15  DUL   SAT
          150        1.2  0.1     0.1   0.41  0.45
          150        1.2  0.29    0.29  0.42  0.5
          150        1.2  0.38    0.38  0.5   0.55
          150        1.2  0.39    0.39  0.48  0.55
          150        1.3  0.32    0.32  0.49  0.5
          150        1.3  0.25    0.25  0.44  0.46
          300        1.3  0.24    0.24  0.4   0.44
          300        1.3  0.33    0.33  0.42  0.44
          300        1.3  0.41    0.41  0.42  0.44
          SoilCrop Maize: LL=[0.29, 0.29, 0.38, 0.39, 0.32, 0.25, 0.24, 0.33, 0.41]; KL=[0.12, 0.12, 0.12, 0.12, 0.09, 0.09, 0.06, 0.05, 0.03]; XF=[1, 1, 1, 1, 1, 1, 1, 1, 1]
        SoilWater: SummerCona=3.5; SummerU=6; SummerDate=1-Nov; WinterCona=3.5; WinterU=6; WinterDate=1-Apr; DiffusConst=88; DiffusSlope=35.4; Salb=0.13; CN2Bare=75; CNRed=20; CNCov=0.8; Thickness=[150, 150, 150, 150, 150, 150, 300, 300, 300]; SWCON=[0.1, 0.1, 0.1, 0.1, 0.1, 0.1, 0.1, 0.1, 0.1]
        SoilOrganicMatter: RootCN=50; RootWt=1000; SoilCN=14.5; EnrACoeff=7.4; EnrBCoeff=0.2
          Thickness  OC    FBiom  FInert
          150        1     0.05   0.39
          150        0.64  0.02   0.47
          150        0.64  0.01   0.52
          150        0.47  0.01   0.62
          150        0.47  0.01   0.74
          150        0.35  0.01   0.83
          300        0.26  0.01   0.93
          300        0.19  0.01   0.93
          300        0.21  0.01   0.93
        Analysis: Thickness=[150, 150, 150, 150, 150, 150, 300, 300, 300]; PH=[6.5, 6.2, 6.2, 6.3, 6.3, 6.4, 6.5, 6.6, 6.5]; PHUnits=Water; BoronUnits=HotWater
        Sample Initial nitrogen: NO3Units=ppm; NH4Units=ppm; SWUnits=Volumetric; OCUnits=Total; PHUnits=Water
          Thickness  NO3  NH4
          150        3.3  0.1
          150        3.3  0.1
          150        2.8  0.1
          150        2.8  0.1
          150        1.6  0.1
          150        0.6  0.1
          300        0.5  0.1
          300        0.2  0.1
          300        0.1  0.1
        Sample Initial water: Thickness=[150, 150, 150, 150, 150, 150, 300, 300, 300]; NO3Units=ppm; NH4Units=ppm; SWUnits=Volumetric; OCUnits=Total; PHUnits=Water
          SW=[0.413, 0.422, 0.498, 0.484, 0.488, 0.444, 0.404, 0.419, 0.419]
      surfaceom surface organic matter
        PoolName = wheat  # Organic Matter pool name
        type = wheat  # Organic Matter type
        mass = 1000  # Initial surface residue (kg/ha)
        cnr = 80  # C:N ratio of initial residue
        standing_fraction = 0  # Fraction of residue standing
      fertiliser
      folder Manager folder
        manager Sow on a fixed date
          # Sowing criteria
          date = 8/11/1988  # Enter sowing date (dd-mmm)
          # Sowing parameters
          crop = Maize  # Enter name of crop to sow
          density = 6.9  # Enter sowing density (plants/m2)
          depth = 70  # Enter sowing depth (mm)
          cultivar = Pioneer_6875  # Enter cultivar
          row_spacing = 0.75  # Enter row spacing (mm)
          on start_of_day:
```
if (today = date('[date]') then
   [crop] sow plants =[density], sowing_depth = [depth], cultivar = [cultivar], row_spacing = [row_spacing]
endif
```
        manager Harvesting rule
          # Harvesting criteria
          crop = Maize  # Enter name of crop to harvest when ripe
          on end_of_day:
```
            if (paddock_is_fallow() = 0) then
   GrainYield = GrainGreenWt * 10
   outputfile do_output
endif

           if [crop].StageName = 'harvest_ripe' or [crop].plant_status = 'dead' then
              [crop]  harvest
              [crop]  end_crop
           endif
```
      operations
        8/11/1988  Irrigation apply amount = 0
        3/11/1988  fertiliser apply amount = 120, depth = 5, type = urea_n
        13/12/1988  fertiliser apply amount = 27, depth = 1, type = urea_n
        17/01/1989  fertiliser apply amount = 27, depth = 1, type = urea_n
      outputfile: filename=Maize_UQG_UQG6875.out; title=Maize_UQG_UQG6875
        variables My Variables
          variable:
            dd/mm/yyyy as Date
            DaysAfterSowing
            Stage
            Biomass
            GrainYield
            GreenWt
            Biomass units g/m^2 as BiomassWt
            RootGreenWt
            LeafGreenWt
            StemGreenWt
            RachisGreenWt
            GrainGreenWt
            biomass_n
            RootGreenN
            LeafGreenN
            StemGreenN
            RachisGreenN
            GrainGreenN
            GrainGreenNConc
            GrainNo
            GrainSize
            LeafNo
            LAI
            SLAI
            esw_profile as ESW
            no3() as NO3
            SLN
            WaterSD
            sw()
            HI
            TPLA
            SPLA
            Height
      irrigation
        automatic_irrigation = on
        asw_depth = 600  # Depth to which ASW is calculated. (mm)
        crit_fr_asw = 0.9  # Fraction of ASW below which irrigation is applied (0-1.0)
        irrigation_efficiency = 1  # Efficiency of the irrigation. (0-1.0)
        irrigation_allocation = off  # Allocation limits
        allocation = 0  # Allocation in mm
        default_no3_conc = 0  # Nitrate concentration (ppm N)
        default_nh4_conc = 0  # Ammonium concentration (ppm N)
        default_cl_conc = 0  # Chloride concentration (ppm Cl)
      Maize -> /Maize/shared/maize
  simulation Maize_UQG_UQGBARKR
    metfile met: filename=UQG .met
    clock
      start_date = 26/10/1988  # Enter the start date of the simulation
      end_date = 20/3/1989  # Enter the end date of the simulation
    summaryfile
    area paddock
      Soil Field 04: LocalName=UQG; Site=UQG; Region=UQG
        SoilType = QACGatton  # Soil description
        NearestTown = Unknown
        NaturalVegetation = Unknown
        Water: same as Maize_UQG_UQG6875.paddock.Field 04.Water
        SoilWater: SummerCona=3.5; SummerU=6; SummerDate=1-Nov; WinterCona=3.5; WinterU=6; WinterDate=1-Apr; DiffusConst=88; DiffusSlope=35.4; Salb=0.13; CN2Bare=75; CNRed=20; CNCov=0.8; Thickness=[150, 150, 150, 150, 150, 150, 300, 300, 300]; SWCON=[0.1, 0.1, 0.1, 0.1, 0.1, 0.1, 0.1, 0.1, 0.1]
        SoilOrganicMatter: same as Maize_UQG_UQG6875.paddock.Field 04.SoilOrganicMatter
        Analysis: Thickness=[150, 150, 150, 150, 150, 150, 300, 300, 300]; PH=[6.5, 6.2, 6.2, 6.3, 6.3, 6.4, 6.5, 6.6, 6.5]
        Sample Initial nitrogen
          Thickness  NO3       NH4
          150        11.1652   0.1
          150        11.1652   0.1
          150        9.47348   0.1
          150        9.47348   0.1
          150        5.41342   0.1
          150        2.03003   0.1
          300        1.69169   0.1
          300        0.676677  0.1
          300        0.338338  0.1
        Sample Initial water: Thickness=[150, 150, 150, 150, 150, 150, 300, 300, 300]
          SW=[0.413, 0.422, 0.498, 0.484, 0.488, 0.444, 0.404, 0.419, 0.419]
      surfaceom surface organic matter
        PoolName = wheat  # Organic Matter pool name
        type = wheat  # Organic Matter type
        mass = 1000  # Initial surface residue (kg/ha)
        cnr = 80  # C:N ratio of initial residue
        standing_fraction = 0  # Fraction of residue standing
      fertiliser
      folder Manager folder
        manager Sow on a fixed date
          # Sowing criteria
          date = 8/11/1988  # Enter sowing date (dd-mmm)
          # Sowing parameters
          crop = Maize  # Enter name of crop to sow
          density = 6.9  # Enter sowing density (plants/m2)
          depth = 70  # Enter sowing depth (mm)
          cultivar = Barker  # Enter cultivar
          row_spacing = 0.75  # Enter row spacing (mm)
          on start_of_day:
          script: same as in Maize_UQG_UQG6875.paddock.Manager folder.Sow on a fixed date
        manager Harvesting rule: same as Maize_UQG_UQG6875.paddock.Manager folder.Harvesting rule
      operations
        8/11/1988  Irrigation apply amount = 0
        3/11/1988  fertiliser apply amount = 120, depth = 5, type = urea_n
        13/12/1988  fertiliser apply amount = 27, depth = 1, type = urea_n
        17/01/1989  fertiliser apply amount = 57, depth = 1, type = urea_n
      outputfile: filename=Maize_UQG_UQGBARKR.out; title=Maize_UQG_UQGBARKR
        variables My Variables
          variable:
            dd/mm/yyyy as Date  # Date (dd/mm/yyyy)
            DaysAfterSowing
            Stage
            Biomass
            GrainYield
            GreenWt
            Biomass units g/m^2 as BiomassWt
            RootGreenWt
            LeafGreenWt
            StemGreenWt
            RachisGreenWt
            GrainGreenWt
            biomass_n
            RootGreenN
            LeafGreenN
            StemGreenN
            RachisGreenN
            GrainGreenN
            GrainGreenNConc
            GrainNo
            GrainSize
            LeafNo
            LAI
            SLAI
            esw_profile as ESW
            no3() as NO3
            SLN
            WaterSD
            sw()
            HI
            TPLA
            SPLA
            Height
      irrigation: same as Maize_UQG_UQG6875.paddock.Irrigation
      Maize -> /Maize/shared/maize
  simulation Maize_UQG_UQGKCB
    metfile met: filename=UQG .met
    clock
      start_date = 26/10/1988  # Enter the start date of the simulation
      end_date = 16/03/1989  # Enter the end date of the simulation
    summaryfile
    area paddock
      Soil Field 04: LocalName=UQG; Site=UQG; Region=UQG
        SoilType = QACGatton  # Soil description
        NearestTown = Unknown
        NaturalVegetation = Unknown
        Water: same as Maize_UQG_UQG6875.paddock.Field 04.Water
        SoilWater: same as Maize_UQG_UQGBARKR.paddock.Field 04.SoilWater
        SoilOrganicMatter: same as Maize_UQG_UQG6875.paddock.Field 04.SoilOrganicMatter
        Analysis: Thickness=[150, 150, 150, 150, 150, 150, 300, 300, 300]; PH=[6.5, 6.2, 6.2, 6.3, 6.3, 6.4, 6.5, 6.6, 6.5]
        Sample Initial nitrogen
          Thickness  NO3  NH4
          150        3.3  0.1
          150        3.3  0.1
          150        2.8  0.1
          150        2.8  0.1
          150        1.6  0.1
          150        0.6  0.1
          300        0.5  0.1
          300        0.2  0.1
          300        0.1  0.1
        Sample Initial water: Thickness=[150, 150, 150, 150, 150, 150, 300, 300, 300]
          SW=[0.413, 0.422, 0.498, 0.484, 0.488, 0.444, 0.404, 0.419, 0.419]
      fertiliser
      folder Manager folder
        manager Sow on a fixed date
          # Sowing criteria
          date = 8/11/1988  # Enter sowing date (dd-mmm)
          # Sowing parameters
          crop = Maize  # Enter name of crop to sow
          density = 6.9  # Enter sowing density (plants/m2)
          depth = 70  # Enter sowing depth (mm)
          cultivar = katumani  # Enter cultivar
          row_spacing = 0.75  # Enter row spacing (mm)
          on start_of_day:
          script: same as in Maize_UQG_UQG6875.paddock.Manager folder.Sow on a fixed date
        manager Harvesting rule: same as Maize_UQG_UQG6875.paddock.Manager folder.Harvesting rule
      operations: same as Maize_UQG_UQG6875.paddock.operations
      outputfile: filename=Maize_UQG_UQGKCB.out; title=Maize_UQG_UQGKCB
        variables My Variables: same as Maize_UQG_UQGBARKR.paddock.Outputfile.My Variables
      irrigation: same as Maize_UQG_UQG6875.paddock.Irrigation
      surfaceom surface organic matter
        PoolName = wheat  # Organic Matter pool name
        type = wheat  # Organic Matter type
        mass = 1000  # Initial surface residue (kg/ha)
        cnr = 80  # C:N ratio of initial residue
        standing_fraction = 0  # Fraction of residue standing
      Maize -> /Maize/shared/maize
  simulation Maize_UQG_UQGXL82
    metfile met: filename=UQG .met
    clock
      start_date = 26/10/1988  # Enter the start date of the simulation
      end_date = 16/03/1989  # Enter the end date of the simulation
    summaryfile
    area paddock
      Soil Field 04: same as Maize_UQG_UQGKCB.paddock.Field 04
      surfaceom surface organic matter
        PoolName = wheat  # Organic Matter pool name
        type = wheat  # Organic Matter type
        mass = 1000  # Initial surface residue (kg/ha)
        cnr = 80  # C:N ratio of initial residue
        standing_fraction = 0  # Fraction of residue standing
      fertiliser
      folder Manager folder
        manager Sow on a fixed date
          # Sowing criteria
          date = 8/11/1988  # Enter sowing date (dd-mmm)
          # Sowing parameters
          crop = Maize  # Enter name of crop to sow
          density = 6.9  # Enter sowing density (plants/m2)
          depth = 70  # Enter sowing depth (mm)
          cultivar = Dekalb_XL82  # Enter cultivar
          row_spacing = 0.75  # Enter row spacing (mm)
          on start_of_day:
          script: same as in Maize_UQG_UQG6875.paddock.Manager folder.Sow on a fixed date
        manager Harvesting rule: same as Maize_UQG_UQG6875.paddock.Manager folder.Harvesting rule
      operations: same as Maize_UQG_UQG6875.paddock.operations
      outputfile: filename=Maize_UQG_UQGXL82.out; title=Maize_UQG_UQGXL82
        variables My Variables: same as Maize_UQG_UQGBARKR.paddock.Outputfile.My Variables
      irrigation: same as Maize_UQG_UQG6875.paddock.Irrigation
      Maize -> /Maize/shared/maize
  simulation Maize_DRK_DRKA09
    metfile met: filename=DRK.met
    clock
      start_date = 1/01/1991  # Enter the start date of the simulation
      end_date = 30/04/1992  # Enter the end date of the simulation
    summaryfile
    area paddock
      Soil Field 05: LocalName=Gatton- Soutter; Site=Gatton- Soutter; Region=Gatton
        SoilType = QACGatton  # Soil description
        NearestTown = Unknown
        NaturalVegetation = Unknown
        Water: same as Maize_UQG_UQG6875.paddock.Field 04.Water
        SoilWater: same as Maize_UQG_UQGBARKR.paddock.Field 04.SoilWater
        SoilOrganicMatter: same as Maize_UQG_UQG6875.paddock.Field 04.SoilOrganicMatter
        Analysis: Thickness=[150, 150, 150, 150, 150, 150, 300, 300, 300]; PH=[6.5, 6.2, 6.2, 6.3, 6.3, 6.4, 6.5, 6.6, 6.5]
        Sample Initial nitrogen
          Thickness  NO3  NH4
          150        3.3  0.1
          150        3.3  0.1
          150        2.8  0.1
          150        2.8  0.1
          150        1.6  0.1
          150        0.6  0.1
          300        0.5  0.1
          300        0.2  0.1
          300        0.1  0.1
        Sample Initial water: Thickness=[150, 150, 150, 150, 150, 150, 300, 300, 300]
          SW=[0.413, 0.422, 0.498, 0.484, 0.488, 0.444, 0.404, 0.419, 0.419]
      surfaceom surface organic matter
        PoolName = wheat  # Organic Matter pool name
        type = wheat  # Organic Matter type
        mass = 1000  # Initial surface residue (kg/ha)
        cnr = 80  # C:N ratio of initial residue
        standing_fraction = 0  # Fraction of residue standing
      fertiliser
      folder Manager folder
        manager Sow on a fixed date
          # Sowing criteria
          date = 14/08/1991  # Enter sowing date (dd-mmm)
          # Sowing parameters
          crop = Maize  # Enter name of crop to sow
          density = 6.7  # Enter sowing density (plants/m2)
          depth = 70  # Enter sowing depth (mm)
          cultivar = gh_5009  # Enter cultivar
          row_spacing = 0.75  # Enter row spacing (mm)
          on start_of_day:
          script: same as in Maize_UQG_UQG6875.paddock.Manager folder.Sow on a fixed date
        manager Harvesting rule: same as Maize_UQG_UQG6875.paddock.Manager folder.Harvesting rule
      operations
        14/08/1991  Irrigation apply amount = 0
        14/08/1991  fertiliser apply amount = 250, depth = 50, type = urea_n
      outputfile: filename=Maize_DRK_DRKA09.out; title=Maize_DRK_DRKA09
        variables My Variables: same as Maize_UQG_UQGBARKR.paddock.Outputfile.My Variables
      irrigation: same as Maize_UQG_UQG6875.paddock.Irrigation
      Maize
  simulation Maize_DRK_DRKAH40
    metfile met: filename=DRK.met
    clock
      start_date = 1/01/1991  # Enter the start date of the simulation
      end_date = 30/04/1992  # Enter the end date of the simulation
    summaryfile
    area paddock
      Soil Field 05: same as Maize_DRK_DRKA09.paddock.Field 05
      surfaceom surface organic matter
        PoolName = wheat  # Organic Matter pool name
        type = wheat  # Organic Matter type
        mass = 1000  # Initial surface residue (kg/ha)
        cnr = 80  # C:N ratio of initial residue
        standing_fraction = 0  # Fraction of residue standing
      fertiliser
      Maize
      folder Manager folder
        manager Sow on a fixed date
          # Sowing criteria
          date = 14/08/1991  # Enter sowing date (dd-mmm)
          # Sowing parameters
          crop = Maize  # Enter name of crop to sow
          density = 6.7  # Enter sowing density (plants/m2)
          depth = 70  # Enter sowing depth (mm)
          cultivar = hycorn_40  # Enter cultivar
          row_spacing = 0.75  # Enter row spacing (mm)
          on start_of_day:
          script: same as in Maize_UQG_UQG6875.paddock.Manager folder.Sow on a fixed date
        manager Harvesting rule: same as Maize_UQG_UQG6875.paddock.Manager folder.Harvesting rule
      operations
        14/08/1991  Irrigation apply amount = 0
        14/08/1991  fertiliser apply amount = 200, depth = 50, type = urea_n
      outputfile: filename=Maize_DRK_DRKAH40.out; title=Maize_DRK_DRKAH40
        variables My Variables: same as Maize_UQG_UQGBARKR.paddock.Outputfile.My Variables
      irrigation: same as Maize_UQG_UQG6875.paddock.Irrigation
  simulation Maize_DRK_DRKAWX
    metfile met: filename=DRK.met
    clock
      start_date = 1/01/1991  # Enter the start date of the simulation
      end_date = 30/04/1992  # Enter the end date of the simulation
    summaryfile
    area paddock
      Soil Field 05: same as Maize_DRK_DRKA09.paddock.Field 05
      surfaceom surface organic matter
        PoolName = wheat  # Organic Matter pool name
        type = wheat  # Organic Matter type
        mass = 1000  # Initial surface residue (kg/ha)
        cnr = 80  # C:N ratio of initial residue
        standing_fraction = 0  # Fraction of residue standing
      fertiliser
      Maize
      folder Manager folder
        manager Sow on a fixed date
          # Sowing criteria
          date = 14/08/1991  # Enter sowing date (dd-mmm)
          # Sowing parameters
          crop = Maize  # Enter name of crop to sow
          density = 6.7  # Enter sowing density (plants/m2)
          depth = 70  # Enter sowing depth (mm)
          cultivar = gh_5019wx  # Enter cultivar
          row_spacing = 0.75  # Enter row spacing (mm)
          on start_of_day:
          script: same as in Maize_UQG_UQG6875.paddock.Manager folder.Sow on a fixed date
        manager Harvesting rule: same as Maize_UQG_UQG6875.paddock.Manager folder.Harvesting rule
      operations
        14/08/1991  Irrigation apply amount = 0
        14/08/1991  fertiliser apply amount = 250, depth = 50, type = urea_n
      outputfile: filename=Maize_DRK_DRKAWX.out; title=Maize_DRK_DRKAWX
        variables My Variables: same as Maize_UQG_UQGBARKR.paddock.Outputfile.My Variables
      irrigation: same as Maize_UQG_UQG6875.paddock.Irrigation
  simulation Maize_DRK_DRKD09
    metfile met: filename=DRK.met
    clock
      start_date = 1/01/1991  # Enter the start date of the simulation
      end_date = 30/04/1992  # Enter the end date of the simulation
    summaryfile
    area paddock
      Soil Field 05: same as Maize_DRK_DRKA09.paddock.Field 05
      surfaceom surface organic matter
        PoolName = wheat  # Organic Matter pool name
        type = wheat  # Organic Matter type
        mass = 1000  # Initial surface residue (kg/ha)
        cnr = 80  # C:N ratio of initial residue
        standing_fraction = 0  # Fraction of residue standing
      fertiliser
      Maize
      folder Manager folder
        manager Sow on a fixed date
          # Sowing criteria
          date = 11/12/1991  # Enter sowing date (dd-mmm)
          # Sowing parameters
          crop = Maize  # Enter name of crop to sow
          density = 6.7  # Enter sowing density (plants/m2)
          depth = 70  # Enter sowing depth (mm)
          cultivar = gh_5009  # Enter cultivar
          row_spacing = 0.75  # Enter row spacing (mm)
          on start_of_day:
          script: same as in Maize_UQG_UQG6875.paddock.Manager folder.Sow on a fixed date
        manager Harvesting rule: same as Maize_UQG_UQG6875.paddock.Manager folder.Harvesting rule
      operations
        11/12/1991  Irrigation apply amount = 0
        11/12/1991  fertiliser apply amount = 300, depth = 50, type = urea_n
      outputfile: filename=Maize_DRK_DRKD09.out; title=Maize_DRK_DRKD09
        variables My Variables: same as Maize_UQG_UQGBARKR.paddock.Outputfile.My Variables
      irrigation: same as Maize_UQG_UQG6875.paddock.Irrigation
  simulation Maize_DRK_DRKDH40
    metfile met: filename=DRK.met
    clock
      start_date = 1/01/1991  # Enter the start date of the simulation
      end_date = 30/04/1992  # Enter the end date of the simulation
    summaryfile
    area paddock
      Soil Field 05: same as Maize_DRK_DRKA09.paddock.Field 05
      surfaceom surface organic matter
        PoolName = wheat  # Organic Matter pool name
        type = wheat  # Organic Matter type
        mass = 1000  # Initial surface residue (kg/ha)
        cnr = 80  # C:N ratio of initial residue
        standing_fraction = 0  # Fraction of residue standing
      fertiliser
      Maize
      folder Manager folder
        manager Sow on a fixed date
          # Sowing criteria
          date = 11/12/1991  # Enter sowing date (dd-mmm)
          # Sowing parameters
          crop = Maize  # Enter name of crop to sow
          density = 6.7  # Enter sowing density (plants/m2)
          depth = 70  # Enter sowing depth (mm)
          cultivar = Hycorn_40  # Enter cultivar
          row_spacing = 0.75  # Enter row spacing (mm)
          on start_of_day:
          script: same as in Maize_UQG_UQG6875.paddock.Manager folder.Sow on a fixed date
        manager Harvesting rule: same as Maize_UQG_UQG6875.paddock.Manager folder.Harvesting rule
      operations
        11/12/1991  Irrigation apply amount = 0
        11/12/1991  fertiliser apply amount = 300, depth = 50, type = urea_n
      outputfile: filename=Maize_DRK_DRKDH40.out; title=Maize_DRK_DRKDH40
        variables My Variables: same as Maize_UQG_UQGBARKR.paddock.Outputfile.My Variables
      irrigation: same as Maize_UQG_UQG6875.paddock.Irrigation
  simulation Maize_DRK_DRKDWX
    metfile met: filename=DRK.met
    clock
      start_date = 1/01/1991  # Enter the start date of the simulation
      end_date = 30/04/1992  # Enter the end date of the simulation
    summaryfile
    area paddock
      Soil Field 05: same as Maize_DRK_DRKA09.paddock.Field 05
      surfaceom surface organic matter
        PoolName = wheat  # Organic Matter pool name
        type = wheat  # Organic Matter type
        mass = 1000  # Initial surface residue (kg/ha)
        cnr = 80  # C:N ratio of initial residue
        standing_fraction = 0  # Fraction of residue standing
      fertiliser
      Maize
      folder Manager folder
        manager Sow on a fixed date
          # Sowing criteria
          date = 11/12/1991  # Enter sowing date (dd-mmm)
          # Sowing parameters
          crop = Maize  # Enter name of crop to sow
          density = 6.7  # Enter sowing density (plants/m2)
          depth = 70  # Enter sowing depth (mm)
          cultivar = gh_5019wx  # Enter cultivar
          row_spacing = 0.75  # Enter row spacing (mm)
          on start_of_day:
          script: same as in Maize_UQG_UQG6875.paddock.Manager folder.Sow on a fixed date
        manager Harvesting rule: same as Maize_UQG_UQG6875.paddock.Manager folder.Harvesting rule
      operations
        11/12/1991  Irrigation apply amount = 0
        11/12/1991  fertiliser apply amount = 300, depth = 50, type = urea_n
      outputfile: filename=Maize_DRK_DRKDWX.out; title=Maize_DRK_DRKDWX
        variables My Variables: same as Maize_UQG_UQGBARKR.paddock.Outputfile.My Variables
      irrigation: same as Maize_UQG_UQG6875.paddock.Irrigation
  simulation Maize_DRK_DRKF09
    metfile met: filename=DRK.met
    clock
      start_date = 1/01/1991  # Enter the start date of the simulation
      end_date = 30/04/1992  # Enter the end date of the simulation
    summaryfile
    area paddock
      Soil Field 05: LocalName=Gatton- Soutter; Site=Gatton- Soutter; Region=Gatton
        SoilType = QACGatton  # Soil description
        NearestTown = Unknown
        NaturalVegetation = Unknown
        InitialWater Initial water: FractionFull=0.50; PercentMethod=FilledFromTop
        Water: same as Maize_UQG_UQG6875.paddock.Field 04.Water
        SoilWater: same as Maize_UQG_UQGBARKR.paddock.Field 04.SoilWater
        SoilOrganicMatter: same as Maize_UQG_UQG6875.paddock.Field 04.SoilOrganicMatter
        Analysis: Thickness=[150, 150, 150, 150, 150, 150, 300, 300, 300]; PH=[6.5, 6.2, 6.2, 6.3, 6.3, 6.4, 6.5, 6.6, 6.5]
        Sample Initial nitrogen
          Thickness  NO3  NH4
          150        3.3  0.1
          150        3.3  0.1
          150        2.8  0.1
          150        2.8  0.1
          150        1.6  0.1
          150        0.6  0.1
          300        0.5  0.1
          300        0.2  0.1
          300        0.1  0.1
      surfaceom surface organic matter
        PoolName = wheat  # Organic Matter pool name
        type = wheat  # Organic Matter type
        mass = 1000  # Initial surface residue (kg/ha)
        cnr = 80  # C:N ratio of initial residue
        standing_fraction = 0  # Fraction of residue standing
      fertiliser
      folder Manager folder
        manager Sow on a fixed date
          # Sowing criteria
          date = 20/02/1991  # Enter sowing date (dd-mmm)
          # Sowing parameters
          crop = Maize  # Enter name of crop to sow
          density = 6.7  # Enter sowing density (plants/m2)
          depth = 70  # Enter sowing depth (mm)
          cultivar = GH_5009  # Enter cultivar
          row_spacing = 0.75  # Enter row spacing (mm)
          on start_of_day:
          script: same as in Maize_UQG_UQG6875.paddock.Manager folder.Sow on a fixed date
        manager Harvesting rule: same as Maize_UQG_UQG6875.paddock.Manager folder.Harvesting rule
      operations
        20/02/1991  Irrigation apply amount = 0
        20/02/1991  fertiliser apply amount = 300, depth = 50, type = urea_n
      outputfile: filename=Maize_DRK_DRKF09.out; title=Maize_DRK_DRKF09
        variables My Variables
          variable:
            dd/mm/yyyy as Date
            DaysAfterSowing
            Stage
            Biomass
            yield
            GreenWt
            Biomass units g/m^2 as BiomassWt
            RootGreenWt
            LeafGreenWt
            StemGreenWt
            RachisGreenWt
            GrainGreenWt
            biomass_n
            RootGreenN
            LeafGreenN
            StemGreenN
            RachisGreenN
            GrainGreenN
            GrainGreenNConc
            GrainNo
            GrainSize
            LeafNo
            LAI
            SLAI
            esw_profile as ESW
            no3() as NO3
            SLN
            WaterSD
            sw()
            HI
            TPLA
            SPLA
            Height
      irrigation -> /Maize/Maize_DRK_DRKFWX/paddock/Irrigation
      Maize -> /Maize/shared/maize
  simulation Maize_DRK_DRKFH40
    metfile met: filename=DRK.met
    clock
      start_date = 1/01/1991  # Enter the start date of the simulation
      end_date = 30/04/1992  # Enter the end date of the simulation
    summaryfile
    area paddock
      Soil Field 05: same as Maize_DRK_DRKA09.paddock.Field 05
      surfaceom surface organic matter
        PoolName = wheat  # Organic Matter pool name
        type = wheat  # Organic Matter type
        mass = 1000  # Initial surface residue (kg/ha)
        cnr = 80  # C:N ratio of initial residue
        standing_fraction = 0  # Fraction of residue standing
      fertiliser
      folder Manager folder
        manager Sow on a fixed date
          # Sowing criteria
          date = 20/02/1991  # Enter sowing date (dd-mmm)
          # Sowing parameters
          crop = Maize  # Enter name of crop to sow
          density = 6.7  # Enter sowing density (plants/m2)
          depth = 70  # Enter sowing depth (mm)
          cultivar = Hycorn_40  # Enter cultivar
          row_spacing = .75  # Enter row spacing (mm)
          on start_of_day:
          script: same as in Maize_UQG_UQG6875.paddock.Manager folder.Sow on a fixed date
        manager Harvesting rule: same as Maize_UQG_UQG6875.paddock.Manager folder.Harvesting rule
      operations
        20/02/1991  Irrigation apply amount = 0
        20/02/1991  fertiliser apply amount = 300, depth = 50, type = urea_n
      outputfile: filename=Maize_DRK_DRKFH40.out; title=Maize_DRK_DRKFH40
        variables My Variables: same as Maize_UQG_UQGBARKR.paddock.Outputfile.My Variables
      irrigation -> /Maize/Maize_DRK_DRKFWX/paddock/Irrigation
      Maize -> /Maize/shared/maize
  simulation Maize_DRK_DRKFH50
    metfile met: filename=DRK.met
    clock
      start_date = 1/01/1991  # Enter the start date of the simulation
      end_date = 30/04/1992  # Enter the end date of the simulation
    summaryfile
    area paddock
      Soil Field 05: same as Maize_DRK_DRKF09.paddock.Field 05
      surfaceom surface organic matter
        PoolName = wheat  # Organic Matter pool name
        type = wheat  # Organic Matter type
        mass = 1000  # Initial surface residue (kg/ha)
        cnr = 80  # C:N ratio of initial residue
        standing_fraction = 0  # Fraction of residue standing
      fertiliser
      folder Manager folder
        manager Sow on a fixed date
          # Sowing criteria
          date = 20/02/1991  # Enter sowing date (dd-mmm)
          # Sowing parameters
          crop = Maize  # Enter name of crop to sow
          density = 6.7  # Enter sowing density (plants/m2)
          depth = 70  # Enter sowing depth (mm)
          cultivar = Hycorn_50  # Enter cultivar
          row_spacing = 0.75  # Enter row spacing (mm)
          on start_of_day:
          script: same as in Maize_UQG_UQG6875.paddock.Manager folder.Sow on a fixed date
        manager Harvesting rule: same as Maize_UQG_UQG6875.paddock.Manager folder.Harvesting rule
      operations
        20/02/1991  Irrigation apply amount = 0
        20/02/1991  fertiliser apply amount = 300, depth = 50, type = urea_n
      outputfile: filename=Maize_DRK_DRKFH50.out; title=Maize_DRK_DRKFH50
        variables My Variables: same as Maize_UQG_UQGBARKR.paddock.Outputfile.My Variables
      irrigation -> /Maize/Maize_DRK_DRKFWX/paddock/Irrigation
      Maize -> /Maize/shared/maize
  simulation Maize_DRK_DRKFWX
    metfile met: filename=DRK.met
    clock
      start_date = 1/01/1991  # Enter the start date of the simulation
      end_date = 30/04/1992  # Enter the end date of the simulation
    summaryfile
    area paddock
      Soil Field 05: same as Maize_DRK_DRKF09.paddock.Field 05
      surfaceom surface organic matter
        PoolName = wheat  # Organic Matter pool name
        type = wheat  # Organic Matter type
        mass = 1000  # Initial surface residue (kg/ha)
        cnr = 80  # C:N ratio of initial residue
        standing_fraction = 0  # Fraction of residue standing
      fertiliser
      folder Manager folder
        manager Sow on a fixed date
          # Sowing criteria
          date = 20/02/1991  # Enter sowing date (dd-mmm)
          # Sowing parameters
          crop = Maize  # Enter name of crop to sow
          density = 6.7  # Enter sowing density (plants/m2)
          depth = 70  # Enter sowing depth (mm)
          cultivar = GH_5019WX  # Enter cultivar
          row_spacing = .75  # Enter row spacing (mm)
          on start_of_day:
          script: same as in Maize_UQG_UQG6875.paddock.Manager folder.Sow on a fixed date
        manager Harvesting rule: same as Maize_UQG_UQG6875.paddock.Manager folder.Harvesting rule
      operations
        20/02/1991  Irrigation apply amount = 0
        20/02/1991  fertiliser apply amount = 300, depth = 50, type = urea_n
      outputfile: filename=Maize_DRK_DRKFWX.out; title=Maize_DRK_DRKFWX
        variables My Variables: same as Maize_UQG_UQGBARKR.paddock.Outputfile.My Variables
      irrigation
        automatic_irrigation = on
        asw_depth = 1800  # Depth to which ASW is calculated. (mm)
        crit_fr_asw = 0.75  # Fraction of ASW below which irrigation is applied (0-1.0)
        irrigation_efficiency = 1  # Efficiency of the irrigation. (0-1.0)
        irrigation_allocation = off  # Allocation limits
        allocation = 0  # Allocation in mm
        default_no3_conc = 0  # Nitrate concentration (ppm N)
        default_nh4_conc = 0  # Ammonium concentration (ppm N)
        default_cl_conc = 0  # Chloride concentration (ppm Cl)
      Maize -> /Maize/shared/maize
  simulation Maize_DRK_DRKJ09
    metfile met: filename=DRK.met
    clock
      start_date = 1/01/1991  # Enter the start date of the simulation
      end_date = 30/04/1992  # Enter the end date of the simulation
    summaryfile
    area paddock
      Soil Field 05: same as Maize_DRK_DRKA09.paddock.Field 05
      surfaceom surface organic matter
        PoolName = wheat  # Organic Matter pool name
        type = wheat  # Organic Matter type
        mass = 1000  # Initial surface residue (kg/ha)
        cnr = 80  # C:N ratio of initial residue
        standing_fraction = 0  # Fraction of residue standing
      fertiliser
      folder Manager folder
        manager Sow on a fixed date
          # Sowing criteria
          date = 31/01/1991  # Enter sowing date (dd-mmm)
          # Sowing parameters
          crop = Maize  # Enter name of crop to sow
          density = 6.7  # Enter sowing density (plants/m2)
          depth = 70  # Enter sowing depth (mm)
          cultivar = GH_5009  # Enter cultivar
          row_spacing = .75  # Enter row spacing (mm)
          on start_of_day:
          script: same as in Maize_UQG_UQG6875.paddock.Manager folder.Sow on a fixed date
        manager Harvesting rule: same as Maize_UQG_UQG6875.paddock.Manager folder.Harvesting rule
      operations
        31/01/1991  Irrigation apply amount = 0
        31/01/1991  fertiliser apply amount = 300, depth = 50, type = urea_n
      outputfile: filename=Maize_DRK_DRKJ09.out; title=Maize_DRK_DRKJ09
        variables My Variables: same as Maize_UQG_UQGBARKR.paddock.Outputfile.My Variables
      irrigation: same as Maize_UQG_UQG6875.paddock.Irrigation
      Maize
        MaizeGenotype gh_5009
          tt_emerg_to_endjuv = 100
          tt_endjuv_to_init = 165
          photoperiod_crit1 = 12.5
          photoperiod_crit2 = 20.0
          photoperiod_slope = 0.0
          tt_flag_to_flower = 50
          tt_flower_to_start_grain = 170
          tt_flower_to_maturity = 950
          tt_maturity_to_ripe = 1
          GNmax = 580
          potKernelWt = 300
          rue = 1.60
        MaizeConstants standard -> /Maize/shared/maize/standard
  simulation Maize_DRK_DRKJH40
    metfile met: filename=DRK.met
    clock
      start_date = 1/01/1991  # Enter the start date of the simulation
      end_date = 30/04/1992  # Enter the end date of the simulation
    summaryfile
    area paddock
      Soil Field 05: same as Maize_DRK_DRKA09.paddock.Field 05
      surfaceom surface organic matter
        PoolName = wheat  # Organic Matter pool name
        type = wheat  # Organic Matter type
        mass = 1000  # Initial surface residue (kg/ha)
        cnr = 80  # C:N ratio of initial residue
        standing_fraction = 0  # Fraction of residue standing
      fertiliser
      folder Manager folder
        manager Sow on a fixed date
          # Sowing criteria
          date = 31/01/1991  # Enter sowing date (dd-mmm)
          # Sowing parameters
          crop = Maize  # Enter name of crop to sow
          density = 6.7  # Enter sowing density (plants/m2)
          depth = 70  # Enter sowing depth (mm)
          cultivar = Hycorn_40  # Enter cultivar
          row_spacing = .75  # Enter row spacing (mm)
          on start_of_day:
          script: same as in Maize_UQG_UQG6875.paddock.Manager folder.Sow on a fixed date
        manager Harvesting rule: same as Maize_UQG_UQG6875.paddock.Manager folder.Harvesting rule
      operations
        31/01/1991  Irrigation apply amount = 0
        31/01/1991  fertiliser apply amount = 300, depth = 50, type = urea_n
      outputfile: filename=Maize_DRK_DRKJH40.out; title=Maize_DRK_DRKJH40
        variables My Variables: same as Maize_UQG_UQGBARKR.paddock.Outputfile.My Variables
      irrigation: same as Maize_UQG_UQG6875.paddock.Irrigation
      Maize
        MaizeGenotype hycorn_40
          tt_emerg_to_endjuv = 100
          tt_endjuv_to_init = 150
          photoperiod_crit1 = 12.5
          photoperiod_crit2 = 20.0
          photoperiod_slope = 0.0
          tt_flag_to_flower = 50
          tt_flower_to_start_grain = 170
          tt_flower_to_maturity = 835
          tt_maturity_to_ripe = 1
          GNmax = 500
          potKernelWt = 300
          rue = 1.60
          leaf_no_dead_const = -0.025
          leaf_no_dead_slope = 0.00042
        MaizeConstants standard -> /Maize/shared/maize/standard
  simulation Maize_DRK_DRKJH50
    metfile met: filename=DRK.met
    clock
      start_date = 1/01/1991  # Enter the start date of the simulation
      end_date = 30/04/1992  # Enter the end date of the simulation
    summaryfile
    area paddock
      Soil Field 05: same as Maize_DRK_DRKA09.paddock.Field 05
      surfaceom surface organic matter
        PoolName = wheat  # Organic Matter pool name
        type = wheat  # Organic Matter type
        mass = 1000  # Initial surface residue (kg/ha)
        cnr = 80  # C:N ratio of initial residue
        standing_fraction = 0  # Fraction of residue standing
      fertiliser
      folder Manager folder
        manager Sow on a fixed date
          # Sowing criteria
          date = 31/01/1991  # Enter sowing date (dd-mmm)
          # Sowing parameters
          crop = Maize  # Enter name of crop to sow
          density = 6.7  # Enter sowing density (plants/m2)
          depth = 70  # Enter sowing depth (mm)
          cultivar = Hycorn_50  # Enter cultivar
          row_spacing = .75  # Enter row spacing (mm)
          on start_of_day:
          script: same as in Maize_UQG_UQG6875.paddock.Manager folder.Sow on a fixed date
        manager Harvesting rule: same as Maize_UQG_UQG6875.paddock.Manager folder.Harvesting rule
      operations
        31/01/1991  Irrigation apply amount = 0
        31/01/1991  fertiliser apply amount = 300, depth = 50, type = urea_n
      outputfile: filename=Maize_DRK_DRKJH50.out; title=Maize_DRK_DRKJH50
        variables My Variables: same as Maize_UQG_UQGBARKR.paddock.Outputfile.My Variables
      irrigation: same as Maize_UQG_UQG6875.paddock.Irrigation
      Maize
        MaizeGenotype hycorn_50
          tt_emerg_to_endjuv = 100
          tt_endjuv_to_init = 130
          photoperiod_crit1 = 12.5
          photoperiod_crit2 = 20.0
          photoperiod_slope = 0.0
          tt_flag_to_flower = 50
          tt_flower_to_start_grain = 170
          tt_flower_to_maturity = 1040
          tt_maturity_to_ripe = 1
          GNmax = 580
          potKernelWt = 260
          rue = 1.60
        MaizeConstants standard -> /Maize/shared/maize/standard
  simulation Maize_DRK_DRKJWX
    metfile met: filename=DRK.met
    clock
      start_date = 1/01/1991  # Enter the start date of the simulation
      end_date = 30/04/1992  # Enter the end date of the simulation
    summaryfile
    area paddock
      Soil Field 05: same as Maize_DRK_DRKA09.paddock.Field 05
      surfaceom surface organic matter
        PoolName = wheat  # Organic Matter pool name
        type = wheat  # Organic Matter type
        mass = 1000  # Initial surface residue (kg/ha)
        cnr = 80  # C:N ratio of initial residue
        standing_fraction = 0  # Fraction of residue standing
      fertiliser
      folder Manager folder
        manager Sow on a fixed date
          # Sowing criteria
          date = 31/01/1991  # Enter sowing date (dd-mmm)
          # Sowing parameters
          crop = Maize  # Enter name of crop to sow
          density = 6.7  # Enter sowing density (plants/m2)
          depth = 70  # Enter sowing depth (mm)
          cultivar = GH_5019WX  # Enter cultivar
          row_spacing = .75  # Enter row spacing (mm)
          on start_of_day:
          script: same as in Maize_UQG_UQG6875.paddock.Manager folder.Sow on a fixed date
        manager Harvesting rule: same as Maize_UQG_UQG6875.paddock.Manager folder.Harvesting rule
      operations
        31/01/1991  Irrigation apply amount = 0
        31/01/1991  fertiliser apply amount = 300, depth = 50, type = urea_n
      outputfile: filename=Maize_DRK_DRKJWX.out; title=Maize_DRK_DRKJWX
        variables My Variables: same as Maize_UQG_UQGBARKR.paddock.Outputfile.My Variables
      irrigation: same as Maize_UQG_UQG6875.paddock.Irrigation
      Maize
        MaizeGenotype gh_5019wx
          tt_emerg_to_endjuv = 100
          tt_endjuv_to_init = 165
          photoperiod_crit1 = 12.5
          photoperiod_crit2 = 20.0
          photoperiod_slope = 5.0
          tt_flag_to_flower = 50
          tt_flower_to_start_grain = 170
          tt_flower_to_maturity = 1020
          tt_maturity_to_ripe = 1
          GNmax = 500
          potKernelWt = 280
          rue = 1.60
        MaizeConstants standard -> /Maize/shared/maize/standard
  simulation Maize_DRK_DRKM09
    metfile met: filename=DRK.met
    clock
      start_date = 1/01/1991  # Enter the start date of the simulation
      end_date = 30/04/1992  # Enter the end date of the simulation
    summaryfile
    area paddock
      Soil Field 05: same as Maize_DRK_DRKF09.paddock.Field 05
      surfaceom surface organic matter
        PoolName = wheat  # Organic Matter pool name
        type = wheat  # Organic Matter type
        mass = 1000  # Initial surface residue (kg/ha)
        cnr = 80  # C:N ratio of initial residue
        standing_fraction = 0  # Fraction of residue standing
      fertiliser
      folder Manager folder
        manager Sow on a fixed date
          # Sowing criteria
          date = 12/03/1991  # Enter sowing date (dd-mmm)
          # Sowing parameters
          crop = Maize  # Enter name of crop to sow
          density = 6.7  # Enter sowing density (plants/m2)
          depth = 30  # Enter sowing depth (mm)
          cultivar = gh_5009  # Enter cultivar
          row_spacing = 750  # Enter row spacing (mm)
          on start_of_day:
          script: same as in Maize_UQG_UQG6875.paddock.Manager folder.Sow on a fixed date
        manager Harvesting rule: same as Maize_UQG_UQG6875.paddock.Manager folder.Harvesting rule
      operations
        12/03/1991  Irrigation apply amount = 0
        12/03/1991  fertiliser apply amount = 300, depth = 50, type = urea_n
      outputfile: filename=Maize_DRK_DRKM09.out; title=Maize_DRK_DRKM09
        variables My Variables: same as Maize_UQG_UQGBARKR.paddock.Outputfile.My Variables
      irrigation: same as Maize_DRK_DRKFWX.paddock.Irrigation
      Maize -> /Maize/shared/maize
  simulation Maize_DRK_DRKMH40
    metfile met: filename=DRK.met
    clock
      start_date = 1/01/1991  # Enter the start date of the simulation
      end_date = 30/04/1992  # Enter the end date of the simulation
    summaryfile
    area paddock
      Soil Field 05: same as Maize_DRK_DRKF09.paddock.Field 05
      surfaceom surface organic matter
        PoolName = wheat  # Organic Matter pool name
        type = wheat  # Organic Matter type
        mass = 1000  # Initial surface residue (kg/ha)
        cnr = 80  # C:N ratio of initial residue
        standing_fraction = 0  # Fraction of residue standing
      fertiliser
      folder Manager folder
        manager Sow on a fixed date
          # Sowing criteria
          date = 12/03/1991  # Enter sowing date (dd-mmm)
          # Sowing parameters
          crop = Maize  # Enter name of crop to sow
          density = 6.7  # Enter sowing density (plants/m2)
          depth = 70  # Enter sowing depth (mm)
          cultivar = Hycorn_40  # Enter cultivar
          row_spacing = .75  # Enter row spacing (mm)
          on start_of_day:
          script: same as in Maize_UQG_UQG6875.paddock.Manager folder.Sow on a fixed date
        manager Harvesting rule: same as Maize_UQG_UQG6875.paddock.Manager folder.Harvesting rule
      operations
        12/03/1991  Irrigation apply amount = 0
        12/03/1991  fertiliser apply amount = 300, depth = 50, type = urea_n
      outputfile: filename=Maize_DRK_DRKMH40.out; title=Maize_DRK_DRKMH40
        variables My Variables: same as Maize_UQG_UQGBARKR.paddock.Outputfile.My Variables
      irrigation: same as Maize_UQG_UQG6875.paddock.Irrigation
      Maize
        MaizeGenotype hycorn_40
          tt_emerg_to_endjuv = 100
          tt_endjuv_to_init = 150
          photoperiod_crit1 = 12.5
          photoperiod_crit2 = 20.0
          photoperiod_slope = 0.0
          tt_flag_to_flower = 50
          tt_flower_to_start_grain = 170
          tt_flower_to_maturity = 790
          tt_maturity_to_ripe = 1
          GNmax = 500
          potKernelWt = 300
          rue = 1.60
          leaf_no_dead_const = -0.025
          leaf_no_dead_slope = 0.00042
        MaizeConstants standard -> /Maize/shared/maize/standard
  simulation Maize_DRK_DRKMH50
    metfile met: filename=DRK.met
    clock
      start_date = 1/01/1991  # Enter the start date of the simulation
      end_date = 30/04/1992  # Enter the end date of the simulation
    summaryfile
    area paddock
      Soil Field 05: same as Maize_DRK_DRKF09.paddock.Field 05
      surfaceom surface organic matter
        PoolName = wheat  # Organic Matter pool name
        type = wheat  # Organic Matter type
        mass = 1000  # Initial surface residue (kg/ha)
        cnr = 80  # C:N ratio of initial residue
        standing_fraction = 0  # Fraction of residue standing
      fertiliser
      folder Manager folder
        manager Sow on a fixed date
          # Sowing criteria
          date = 12/03/1991  # Enter sowing date (dd-mmm)
          # Sowing parameters
          crop = Maize  # Enter name of crop to sow
          density = 6.7  # Enter sowing density (plants/m2)
          depth = 70  # Enter sowing depth (mm)
          cultivar = Hycorn_50  # Enter cultivar
          row_spacing = .75  # Enter row spacing (mm)
          on start_of_day:
          script: same as in Maize_UQG_UQG6875.paddock.Manager folder.Sow on a fixed date
        manager Harvesting rule: same as Maize_UQG_UQG6875.paddock.Manager folder.Harvesting rule
      operations
        12/03/1991  Irrigation apply amount = 0
        12/03/1991  fertiliser apply amount = 300, depth = 50, type = urea_n
      outputfile: filename=Maize_DRK_DRKMH50.out; title=Maize_DRK_DRKMH50
        variables My Variables: same as Maize_UQG_UQGBARKR.paddock.Outputfile.My Variables
      irrigation: same as Maize_UQG_UQG6875.paddock.Irrigation
      Maize
        MaizeGenotype hycorn_50
          tt_emerg_to_endjuv = 100
          tt_endjuv_to_init = 130
          photoperiod_crit1 = 12.5
          photoperiod_crit2 = 20.0
          photoperiod_slope = 0.0
          tt_flag_to_flower = 50
          tt_flower_to_start_grain = 170
          tt_flower_to_maturity = 850
          tt_maturity_to_ripe = 1
          GNmax = 580
          potKernelWt = 260
          rue = 1.60
        MaizeConstants standard -> /Maize/shared/maize/standard
  simulation Maize_DRK_DRKMWX
    metfile met: filename=DRK.met
    clock
      start_date = 1/01/1991  # Enter the start date of the simulation
      end_date = 30/04/1992  # Enter the end date of the simulation
    summaryfile
    area paddock
      Soil Field 05: SoilType=QACGatton; LocalName=Gatton- Soutter; Site=Gatton- Soutter; NearestTown=Unknown; Region=Gatton; NaturalVegetation=Unknown; Latitude=0; Longitude=0; YearOfSampling=0
        InitialWater Initial water: FractionFull=0.50; PercentMethod=FilledFromTop
        Water: same as Maize_UQG_UQG6875.paddock.Field 04.Water
        SoilWater: same as Maize_UQG_UQGBARKR.paddock.Field 04.SoilWater
        SoilOrganicMatter: same as Maize_UQG_UQG6875.paddock.Field 04.SoilOrganicMatter
        Analysis: Thickness=[150, 150, 150, 150, 150, 150, 300, 300, 300]; PH=[6.5, 6.2, 6.2, 6.3, 6.3, 6.4, 6.5, 6.6, 6.5]
        Sample Initial nitrogen
          Thickness  NO3  NH4
          150        3.3  0.1
          150        3.3  0.1
          150        2.8  0.1
          150        2.8  0.1
          150        1.6  0.1
          150        0.6  0.1
          300        0.5  0.1
          300        0.2  0.1
          300        0.1  0.1
      surfaceom surface organic matter
        PoolName = wheat  # Organic Matter pool name
        type = wheat  # Organic Matter type
        mass = 1000  # Initial surface residue (kg/ha)
        cnr = 80  # C:N ratio of initial residue
        standing_fraction = 0  # Fraction of residue standing
      fertiliser
      folder Manager folder
        manager Sow on a fixed date
          # Sowing criteria
          date = 12/03/1991  # Enter sowing date (dd-mmm)
          # Sowing parameters
          crop = Maize  # Enter name of crop to sow
          density = 6.7  # Enter sowing density (plants/m2)
          depth = 70  # Enter sowing depth (mm)
          cultivar = GH_5019WX  # Enter cultivar
          row_spacing = 0.75  # Enter row spacing (mm)
          on start_of_day:
          script: same as in Maize_UQG_UQG6875.paddock.Manager folder.Sow on a fixed date
        manager Harvesting rule: same as Maize_UQG_UQG6875.paddock.Manager folder.Harvesting rule
      operations
        12/03/1991  Irrigation apply amount = 0
        12/03/1991  fertiliser apply amount = 300, depth = 50, type = urea_n
      outputfile: filename=Maize_DRK_DRKMWX.out; title=Maize_DRK_DRKMWX
        variables My Variables: same as Maize_UQG_UQGBARKR.paddock.Outputfile.My Variables
      irrigation: same as Maize_UQG_UQG6875.paddock.Irrigation
      Maize
        MaizeGenotype gh_5019wx
          tt_emerg_to_endjuv = 100
          tt_endjuv_to_init = 165
          photoperiod_crit1 = 12.5
          photoperiod_crit2 = 20.0
          photoperiod_slope = 5.0
          tt_flag_to_flower = 50
          tt_flower_to_start_grain = 170
          tt_flower_to_maturity = 920
          tt_maturity_to_ripe = 1
          GNmax = 500
          potKernelWt = 280
          rue = 1.60
        MaizeConstants standard -> /Maize/shared/maize/standard
  simulation Maize_DRK_DRKN09
    metfile met: filename=DRK.met
    clock
      start_date = 1/01/1991  # Enter the start date of the simulation
      end_date = 30/04/1992  # Enter the end date of the simulation
    summaryfile
    area paddock
      Soil Field 054: SoilType=QACGatton; LocalName=Gatton- Soutter; Site=Gatton- Soutter; NearestTown=Unknown; Region=Gatton; NaturalVegetation=Unknown; Latitude=0; Longitude=0; YearOfSampling=0
        Water: same as Maize_UQG_UQG6875.paddock.Field 04.Water
        SoilWater: same as Maize_UQG_UQG6875.paddock.Field 04.SoilWater
        SoilOrganicMatter: RootCN=50; RootWt=1000; SoilCN=14.5; EnrACoeff=7.4; EnrBCoeff=0.2; OCUnits=Total
          Thickness  OC    FBiom  FInert
          150        1     0.05   0.39
          150        0.64  0.02   0.47
          150        0.64  0.01   0.52
          150        0.47  0.01   0.62
          150        0.47  0.01   0.74
          150        0.35  0.01   0.83
          300        0.26  0.01   0.93
          300        0.19  0.01   0.93
          300        0.21  0.01   0.93
        Analysis: Thickness=[150, 150, 150, 150, 150, 150, 300, 300, 300]; PH=[6.5, 6.2, 6.2, 6.3, 6.3, 6.4, 6.5, 6.6, 6.5]; PHUnits=Water; BoronUnits=HotWater
        Sample Initial nitrogen: NO3Units=ppm; NH4Units=ppm; SWUnits=Volumetric; OCUnits=Total; PHUnits=Water
          Thickness  NO3  NH4
          150        3.3  0.1
          150        3.3  0.1
          150        2.8  0.1
          150        2.8  0.1
          150        1.6  0.1
          150        0.6  0.1
          300        0.5  0.1
          300        0.2  0.1
          300        0.1  0.1
        Sample Initial water: Thickness=[150, 150, 150, 150, 150, 150, 300, 300, 300]; NO3Units=ppm; NH4Units=ppm; SWUnits=Volumetric; OCUnits=Total; PHUnits=Water
          SW=[0.413, 0.422, 0.498, 0.484, 0.488, 0.444, 0.404, 0.419, 0.419]
      surfaceom surface organic matter
        PoolName = wheat  # Organic Matter pool name
        type = wheat  # Organic Matter type
        mass = 1000  # Initial surface residue (kg/ha)
        cnr = 80  # C:N ratio of initial residue
        standing_fraction = 0  # Fraction of residue standing
      fertiliser
      folder Manager folder
        manager Sow on a fixed date
          # Sowing criteria
          date = 7/11/1991  # Enter sowing date (dd-mmm)
          # Sowing parameters
          crop = Maize  # Enter name of crop to sow
          density = 6.7  # Enter sowing density (plants/m2)
          depth = 70  # Enter sowing depth (mm)
          cultivar = gh_5009  # Enter cultivar
          row_spacing = 0.75  # Enter row spacing (mm)
          on start_of_day:
          script: same as in Maize_UQG_UQG6875.paddock.Manager folder.Sow on a fixed date
        manager Harvesting rule: same as Maize_UQG_UQG6875.paddock.Manager folder.Harvesting rule
      operations
        7/11/1991  Irrigation apply amount = 0
        7/11/1991  fertiliser apply amount = 300, depth = 50, type = urea_n
      outputfile: filename=Maize_DRK_DRKN09.out; title=Maize_DRK_DRKN09
        variables My Variables: same as Maize_UQG_UQG6875.paddock.Outputfile.My Variables
      irrigation: same as Maize_UQG_UQG6875.paddock.Irrigation
      Maize -> /Maize/shared/maize
  simulation Maize_DRK_DRKNH40
    metfile met: filename=DRK.met
    clock
      start_date = 1/01/1991  # Enter the start date of the simulation
      end_date = 30/04/1992  # Enter the end date of the simulation
    summaryfile
    area paddock
      Soil Field 05: same as Maize_DRK_DRKN09.paddock.Field 054
      surfaceom surface organic matter
        PoolName = wheat  # Organic Matter pool name
        type = wheat  # Organic Matter type
        mass = 1000  # Initial surface residue (kg/ha)
        cnr = 80  # C:N ratio of initial residue
        standing_fraction = 0  # Fraction of residue standing
      fertiliser
      folder Manager folder
        manager Sow on a fixed date
          # Sowing criteria
          date = 7/11/1991  # Enter sowing date (dd-mmm)
          # Sowing parameters
          crop = Maize  # Enter name of crop to sow
          density = 6.7  # Enter sowing density (plants/m2)
          depth = 70  # Enter sowing depth (mm)
          cultivar = Hycorn_40  # Enter cultivar
          row_spacing = 0.75  # Enter row spacing (mm)
          on start_of_day:
          script: same as in Maize_UQG_UQG6875.paddock.Manager folder.Sow on a fixed date
        manager Harvesting rule: same as Maize_UQG_UQG6875.paddock.Manager folder.Harvesting rule
      operations
        7/11/1991  Irrigation apply amount = 0
        7/11/1991  fertiliser apply amount = 300, depth = 50, type = urea_n
      outputfile: filename=Maize_DRK_DRKNH40.out; title=Maize_DRK_DRKNH40
        variables My Variables: same as Maize_UQG_UQGBARKR.paddock.Outputfile.My Variables
      irrigation: same as Maize_UQG_UQG6875.paddock.Irrigation
      Maize -> /Maize/shared/maize
  simulation Maize_DRK_DRKNWX
    metfile met: filename=DRK.met
    clock
      start_date = 1/01/1991  # Enter the start date of the simulation
      end_date = 30/04/1992  # Enter the end date of the simulation
    summaryfile
    area paddock
      Soil Field 05: same as Maize_DRK_DRKN09.paddock.Field 054
      surfaceom surface organic matter
        PoolName = wheat  # Organic Matter pool name
        type = wheat  # Organic Matter type
        mass = 1000  # Initial surface residue (kg/ha)
        cnr = 80  # C:N ratio of initial residue
        standing_fraction = 0  # Fraction of residue standing
      fertiliser
      folder Manager folder
        manager Sow on a fixed date
          # Sowing criteria
          date = 7/11/1991  # Enter sowing date (dd-mmm)
          # Sowing parameters
          crop = Maize  # Enter name of crop to sow
          density = 6.7  # Enter sowing density (plants/m2)
          depth = 70  # Enter sowing depth (mm)
          cultivar = gh_5019wx  # Enter cultivar
          row_spacing = 0.75  # Enter row spacing (mm)
          on start_of_day:
          script: same as in Maize_UQG_UQG6875.paddock.Manager folder.Sow on a fixed date
        manager Harvesting rule: same as Maize_UQG_UQG6875.paddock.Manager folder.Harvesting rule
      operations
        7/11/1991  Irrigation apply amount = 0
        7/11/1991  fertiliser apply amount = 300, depth = 50, type = urea_n
      outputfile: filename=Maize_DRK_DRKNWX.out; title=Maize_DRK_DRKNWX
        variables My Variables: same as Maize_UQG_UQGBARKR.paddock.Outputfile.My Variables
      irrigation: same as Maize_UQG_UQG6875.paddock.Irrigation
      Maize -> /Maize/shared/maize
  simulation Maize_DRK_DRKO09
    metfile met: filename=DRK.met
    clock
      start_date = 1/01/1991  # Enter the start date of the simulation
      end_date = 30/04/1992  # Enter the end date of the simulation
    summaryfile
    area paddock
      Soil Field 05: same as Maize_DRK_DRKA09.paddock.Field 05
      surfaceom surface organic matter
        PoolName = wheat  # Organic Matter pool name
        type = wheat  # Organic Matter type
        mass = 1000  # Initial surface residue (kg/ha)
        cnr = 80  # C:N ratio of initial residue
        standing_fraction = 0  # Fraction of residue standing
      fertiliser
      folder Manager folder
        manager Sow on a fixed date
          # Sowing criteria
          date = 10/10/1991  # Enter sowing date (dd-mmm)
          # Sowing parameters
          crop = Maize  # Enter name of crop to sow
          density = 6.7  # Enter sowing density (plants/m2)
          depth = 70  # Enter sowing depth (mm)
          cultivar = GH_5009  # Enter cultivar
          row_spacing = 0.75  # Enter row spacing (mm)
          on start_of_day:
          script: same as in Maize_UQG_UQG6875.paddock.Manager folder.Sow on a fixed date
        manager Harvesting rule: same as Maize_UQG_UQG6875.paddock.Manager folder.Harvesting rule
      operations
        10/10/1991  Irrigation apply amount = 0
        10/10/1991  fertiliser apply amount = 300, depth = 50, type = urea_n
      outputfile: filename=Maize_DRK_DRKO09.out; title=Maize_DRK_DRKO09
        variables My Variables: same as Maize_UQG_UQGBARKR.paddock.Outputfile.My Variables
      irrigation: same as Maize_UQG_UQG6875.paddock.Irrigation
      Maize
        MaizeGenotype gh_5009
          tt_emerg_to_endjuv = 100
          tt_endjuv_to_init = 165
          photoperiod_crit1 = 12.5
          photoperiod_crit2 = 20.0
          photoperiod_slope = 0.0
          tt_flag_to_flower = 50
          tt_flower_to_start_grain = 170
          tt_flower_to_maturity = 890
          tt_maturity_to_ripe = 1
          GNmax = 580
          potKernelWt = 300
          rue = 1.60
        MaizeConstants standard -> /Maize/shared/maize/standard
  simulation Maize_DRK_DRKOH40
    metfile met: filename=DRK.met
    clock
      start_date = 1/01/1991  # Enter the start date of the simulation
      end_date = 30/04/1992  # Enter the end date of the simulation
    summaryfile
    area paddock
      Soil Field 05: same as Maize_DRK_DRKA09.paddock.Field 05
      surfaceom surface organic matter
        PoolName = wheat  # Organic Matter pool name
        type = wheat  # Organic Matter type
        mass = 1000  # Initial surface residue (kg/ha)
        cnr = 80  # C:N ratio of initial residue
        standing_fraction = 0  # Fraction of residue standing
      fertiliser
      folder Manager folder
        manager Sow on a fixed date
          # Sowing criteria
          date = 10/10/1991  # Enter sowing date (dd-mmm)
          # Sowing parameters
          crop = Maize  # Enter name of crop to sow
          density = 6.7  # Enter sowing density (plants/m2)
          depth = 70  # Enter sowing depth (mm)
          cultivar = Hycorn_40  # Enter cultivar
          row_spacing = 0.75  # Enter row spacing (mm)
          on start_of_day:
          script: same as in Maize_UQG_UQG6875.paddock.Manager folder.Sow on a fixed date
        manager Harvesting rule: same as Maize_UQG_UQG6875.paddock.Manager folder.Harvesting rule
      operations
        10/10/1991  Irrigation apply amount = 0
        10/10/1991  fertiliser apply amount = 300, depth = 50, type = urea_n
      outputfile: filename=Maize_DRK_DRKOH40.out; title=Maize_DRK_DRKOH40
        variables My Variables: same as Maize_UQG_UQGBARKR.paddock.Outputfile.My Variables
      irrigation: same as Maize_UQG_UQG6875.paddock.Irrigation
      Maize -> /Maize/shared/maize
  simulation Maize_DRK_DRKOWX
    metfile met: filename=DRK.met
    clock
      start_date = 1/01/1991  # Enter the start date of the simulation
      end_date = 30/04/1992  # Enter the end date of the simulation
    summaryfile
    area paddock
      Soil Field 05: same as Maize_DRK_DRKA09.paddock.Field 05
      surfaceom surface organic matter
        PoolName = wheat  # Organic Matter pool name
        type = wheat  # Organic Matter type
        mass = 1000  # Initial surface residue (kg/ha)
        cnr = 80  # C:N ratio of initial residue
        standing_fraction = 0  # Fraction of residue standing
      fertiliser
      folder Manager folder
        manager Sow on a fixed date
          # Sowing criteria
          date = 10/10/1991  # Enter sowing date (dd-mmm)
          # Sowing parameters
          crop = Maize  # Enter name of crop to sow
          density = 6.7  # Enter sowing density (plants/m2)
          depth = 70  # Enter sowing depth (mm)
          cultivar = GH_5019WX  # Enter cultivar
          row_spacing = 0.75  # Enter row spacing (mm)
          on start_of_day:
          script: same as in Maize_UQG_UQG6875.paddock.Manager folder.Sow on a fixed date
        manager Harvesting rule: same as Maize_UQG_UQG6875.paddock.Manager folder.Harvesting rule
      operations
        10/10/1991  Irrigation apply amount = 0
        10/10/1991  fertiliser apply amount = 300, depth = 50, type = urea_n
      outputfile: filename=Maize_DRK_DRKOWX.out; title=Maize_DRK_DRKOWX
        variables My Variables: same as Maize_UQG_UQGBARKR.paddock.Outputfile.My Variables
      irrigation: same as Maize_UQG_UQG6875.paddock.Irrigation
      Maize -> /Maize/shared/maize
  simulation Maize_DRK_DRKS09
    metfile met: filename=DRK.met
    clock
      start_date = 1/01/1991  # Enter the start date of the simulation
      end_date = 30/04/1992  # Enter the end date of the simulation
    summaryfile
    area paddock
      Soil Field 05: same as Maize_DRK_DRKA09.paddock.Field 05
      surfaceom surface organic matter
        PoolName = wheat  # Organic Matter pool name
        type = wheat  # Organic Matter type
        mass = 1000  # Initial surface residue (kg/ha)
        cnr = 80  # C:N ratio of initial residue
        standing_fraction = 0  # Fraction of residue standing
      fertiliser
      folder Manager folder
        manager Sow on a fixed date
          # Sowing criteria
          date = 19/09/1991  # Enter sowing date (dd-mmm)
          # Sowing parameters
          crop = Maize  # Enter name of crop to sow
          density = 6.7  # Enter sowing density (plants/m2)
          depth = 70  # Enter sowing depth (mm)
          cultivar = GH_5009  # Enter cultivar
          row_spacing = 0.75  # Enter row spacing (mm)
          on start_of_day:
          script: same as in Maize_UQG_UQG6875.paddock.Manager folder.Sow on a fixed date
        manager Harvesting rule: same as Maize_UQG_UQG6875.paddock.Manager folder.Harvesting rule
      operations
        19/09/1991  Irrigation apply amount = 0
        19/09/1991  fertiliser apply amount = 300, depth = 50, type = urea_n
      outputfile: filename=Maize_DRK_DRKS09.out; title=Maize_DRK_DRKS09
        variables My Variables: same as Maize_UQG_UQGBARKR.paddock.Outputfile.My Variables
      irrigation: same as Maize_UQG_UQG6875.paddock.Irrigation
      Maize: same as Maize_DRK_DRKO09.paddock.Maize
  simulation Maize_DRK_DRKSH40
    metfile met: filename=DRK.met
    clock
      start_date = 1/01/1991  # Enter the start date of the simulation
      end_date = 30/04/1992  # Enter the end date of the simulation
    summaryfile
    area paddock
      Soil Field 05: same as Maize_DRK_DRKA09.paddock.Field 05
      surfaceom surface organic matter
        PoolName = wheat  # Organic Matter pool name
        type = wheat  # Organic Matter type
        mass = 1000  # Initial surface residue (kg/ha)
        cnr = 80  # C:N ratio of initial residue
        standing_fraction = 0  # Fraction of residue standing
      fertiliser
      folder Manager folder
        manager Sow on a fixed date
          # Sowing criteria
          date = 19/09/1991  # Enter sowing date (dd-mmm)
          # Sowing parameters
          crop = Maize  # Enter name of crop to sow
          density = 6.7  # Enter sowing density (plants/m2)
          depth = 70  # Enter sowing depth (mm)
          cultivar = Hycorn_40  # Enter cultivar
          row_spacing = .75  # Enter row spacing (mm)
          on start_of_day:
          script: same as in Maize_UQG_UQG6875.paddock.Manager folder.Sow on a fixed date
        manager Harvesting rule: same as Maize_UQG_UQG6875.paddock.Manager folder.Harvesting rule
      operations
        19/09/1991  Irrigation apply amount = 0
        19/09/1991  fertiliser apply amount = 300, depth = 50, type = urea_n
      outputfile: filename=Maize_DRK_DRKSH40.out; title=Maize_DRK_DRKSH40
        variables My Variables: same as Maize_UQG_UQGBARKR.paddock.Outputfile.My Variables
      irrigation: same as Maize_UQG_UQG6875.paddock.Irrigation
      Maize -> /Maize/shared/maize
  simulation Maize_DRK_DRKSWX
    metfile met: filename=DRK.met
    clock
      start_date = 1/01/1991  # Enter the start date of the simulation
      end_date = 30/04/1992  # Enter the end date of the simulation
    summaryfile
    area paddock
      Soil Field 05: same as Maize_DRK_DRKA09.paddock.Field 05
      surfaceom surface organic matter
        PoolName = wheat  # Organic Matter pool name
        type = wheat  # Organic Matter type
        mass = 1000  # Initial surface residue (kg/ha)
        cnr = 80  # C:N ratio of initial residue
        standing_fraction = 0  # Fraction of residue standing
      fertiliser
      folder Manager folder
        manager Sow on a fixed date
          # Sowing criteria
          date = 19/09/1991  # Enter sowing date (dd-mmm)
          # Sowing parameters
          crop = Maize  # Enter name of crop to sow
          density = 6.7  # Enter sowing density (plants/m2)
          depth = 70  # Enter sowing depth (mm)
          cultivar = gh_5019wx  # Enter cultivar
          row_spacing = .75  # Enter row spacing (mm)
          on start_of_day:
          script: same as in Maize_UQG_UQG6875.paddock.Manager folder.Sow on a fixed date
        manager Harvesting rule: same as Maize_UQG_UQG6875.paddock.Manager folder.Harvesting rule
      operations
        19/09/1991  Irrigation apply amount = 0
        19/09/1991  fertiliser apply amount = 300, depth = 50, type = urea_n
      outputfile: filename=Maize_DRK_DRKSWX.out; title=Maize_DRK_DRKSWX
        variables My Variables: same as Maize_UQG_UQGBARKR.paddock.Outputfile.My Variables
      irrigation: same as Maize_UQG_UQG6875.paddock.Irrigation
      Maize -> /Maize/shared/maize
