folder Maize: version=37; creator=Apsim 7.10-r0
  folder Shared
    variables My Variables
      variable:
        dd/mm/yyyy as Date
        DaysAfterSowing
        Stage
        Biomass
        GreenWt
        Biomass units g/m^2 as BiomassWt
        RootGreenWt
        LeafGreenWt
        StemGreenWt
        RachisGreenWt
        GrainGreenWt
        biomass_n
        RootGreenN
        LeafGreenN
        StemGreenN
        RachisGreenN
        GrainGreenN
        GrainGreenNConc
        GrainNo
        GrainSize
        LeafNo
        LAI
        SLAI
        esw_profile as ESW
        SLN
        WaterSD
        HI
        TPLA
        SPLA
        Height
        cover_green
        cover_tot
        sw_supply
        RootDepth
        no3() as NO3
        nfact_photo
        Yield
        GrainYield
    events My Variables Events
    manager DoOutput
      on end_of_day:
```
if (paddock_is_fallow() = 0) then
   GrainYield = GrainGreenWt * 10
   outputfile do_output
endif
```
  simulation Gains82
    clock
      start_date = 26/02/1982  # Enter the start date of the simulation
      end_date = 10/07/1982  # Enter the end date of the simulation
    summaryfile
    metfile met: filename=Gains82IB.met
    area paddock
      Soil Field01: Latitude=0; Longitude=0; YearOfSampling=0
        Water
          Thickness  BD   AirDry  LL15  DUL   SAT
          150        1.2  0.1     0.1   0.41  0.45
          150        1.2  0.29    0.29  0.42  0.5
          150        1.2  0.38    0.38  0.5   0.55
          150        1.2  0.39    0.39  0.48  0.55
          150        1.3  0.32    0.32  0.49  0.5
          150        1.3  0.25    0.25  0.44  0.46
          300        1.3  0.24    0.24  0.4   0.44
          300        1.3  0.33    0.33  0.42  0.44
          300        1.3  0.41    0.41  0.42  0.44
          SoilCrop Maize: LL=[0.29, 0.29, 0.38, 0.39, 0.32, 0.25, 0.24, 0.33, 0.41]; KL=[0.12, 0.12, 0.12, 0.12, 0.09, 0.09, 0.06, 0.05, 0.03]; XF=[1, 1, 1, 1, 1, 1, 1, 1, 1]
        SoilWater: SummerCona=3.5; SummerU=6; SummerDate=1-Apr; WinterCona=3.5; WinterU=6; WinterDate=1-Nov; DiffusConst=88; DiffusSlope=35.4; Salb=0.13; CN2Bare=75; CNRed=20; CNCov=0.8; Thickness=[150, 150, 150, 150, 150, 150, 300, 300, 300]; SWCON=[0.1, 0.1, 0.1, 0.1, 0.1, 0.1, 0.1, 0.1, 0.1]
        SoilOrganicMatter
          Thickness  OC    FBiom  FInert
          150        1     0.05   0.39
          150        0.64  0.02   0.47
          150        0.64  0.01   0.52
          150        0.47  0.01   0.62
          150        0.47  0.01   0.74
          150        0.35  0.01   0.83
          300        0.26  0.01   0.93
          300        0.19  0.01   0.93
          300        0.21  0.01   0.93
          RootCN = 50
          RootWt = 1000
          SoilCN = 14.5
          EnrACoeff = 7.4
          EnrBCoeff = 0.2
        Analysis: Thickness=[150, 150, 150, 150, 150, 150, 300, 300, 300]; PH=[6.5, 6.2, 6.2, 6.3, 6.3, 6.4, 6.5, 6.6, 6.5]
        Sample Initial nitrogen: NO3Units=ppm; NH4Units=ppm; SWUnits=Volumetric; OCUnits=Total; PHUnits=Water
          Thickness  NO3  NH4   SW
          150        3.3  0.6   0.413
          150        3.3  0.1   0.422
          150        2.8  0.14  0.498
          150        2.8  0.1   0.484
          150        1.6  0.1   0.488
          150        0.6  0.1   0.444
          300        0.5  0.1   0.404
          300        0.2  0.1   0.419
          300        0.1  0.1   0.419
      surfaceom SurfaceOrganicMatter
        PoolName = wheat  # Organic Matter pool name
        type = wheat  # Organic Matter type
        mass = 4000  # Initial surface residue (kg/ha)
        cnr = 33.0  # C:N ratio of initial residue
        standing_fraction = 0.0  # Fraction of residue standing
      fertiliser
      Maize
      folder Manager folder
        manager Sow on a fixed date
          # Sowing criteria
          date = 26-feb  # Enter sowing date (dd-mmm)
          # Sowing parameters
          crop = Maize  # Enter name of crop to sow
          density = 7.2  # Enter sowing density (plants/m2)
          depth = 50  # Enter sowing depth (mm)
          cultivar = usa_18leaf  # Enter cultivar
          class = plant  # Enter crop growth class
          row_spacing = 1000  # Enter row spacing (mm)
          on start_of_day:
```
        if (today = date('[date]') then
              [crop] sow plants =[density], sowing_depth = [depth], cultivar = [cultivar], row_spacing = [row_spacing], crop_class = [class]
         endif
```
        manager Fertilise at sowing
          # When should fertiliser be applied
          modulename = Maize  # On which module should the event come from
          eventname = sowing  # On which event should fertiliser be applied
          # Fertiliser application details
          fertmodule = fertiliser  # Module used to apply the fertiliser
          fert_amount_sow = 300  # Amount of starter fertiliser at sowing (kg/ha)
          fert_type_sow = urea_N  # Sowing fertiliser type
          on [modulename].[eventname]:
```
        [fertmodule] apply amount = [fert_amount_sow] (kg/ha), depth = 50 (mm), type = [fert_type_sow]
```
        manager Harvesting rule
          # Harvesting criteria
          crop = Maize  # Enter name of crop to harvest when ripe
          on end_of_day:
```
          if ([crop].StageName = 'harvest_ripe' or [crop].plant_status = 'dead') then
              [crop]  harvest
              [crop]  end_crop
           endif
```
        manager DoOutput -> /Maize/Shared/DoOutput
      outputfile: filename=Gains82.out; title=Gains82
        variables My Variables -> /Maize/Shared/My Variables
          variable:
            dd/mm/yyyy as Date
            DaysAfterSowing
            Stage
            Biomass
            GreenWt
            Biomass units g/m^2 as BiomassWt
            RootGreenWt
            LeafGreenWt
            StemGreenWt
            RachisGreenWt
            GrainGreenWt
            biomass_n
            RootGreenN
            LeafGreenN
            StemGreenN
            RachisGreenN
            GrainGreenN
            GrainGreenNConc
            GrainNo
            GrainSize
            LeafNo
            LAI
            SLAI
            esw_profile as ESW
            no3() as NO3
            SLN
            WaterSD
            sw
            HI
            TPLA
            SPLA
            accTT
            Height
        events My Variables Events -> /Maize/Shared/My Variables Events
      irrigation
        automatic_irrigation = on
        asw_depth = 1000  # Depth to which ASW is calculated. (mm)
        crit_fr_asw = 0.8  # Fraction of ASW below which irrigation is applied (0-1.0)
        irrigation_efficiency = 1  # Efficiency of the irrigation. (0-1.0)
        irrigation_allocation = off  # Allocation limits
        allocation = 0  # Allocation in mm
        default_no3_conc = 0.0  # Nitrate concentration (ppm N)
        default_nh4_conc = 0.0  # Ammonium concentration (ppm N)
        default_cl_conc = 0.0  # Chloride concentration (ppm Cl)
  simulation Gains83
    clock
      start_date = 23/04/1983  # Enter the start date of the simulation
      end_date = 21/08/1983  # Enter the end date of the simulation
    summaryfile
    metfile met: filename=Gains83IB.met
    area paddock
      Soil Field02
        Water: same as Gains82.paddock.Field01.Water
        SoilWater: Thickness=[150, 150, 150, 150, 150, 150, 300, 300, 300]; SWCON=[0.1, 0.1, 0.1, 0.1, 0.1, 0.1, 0.1, 0.1, 0.1]
          SummerCona = 3.5
          SummerU = 6
          SummerDate = 1-Apr
          WinterCona = 3.5
          WinterU = 6
          WinterDate = 1-Nov
          DiffusConst = 88
          DiffusSlope = 35.4
          Salb = 0.13
          CN2Bare = 75
          CNRed = 20
          CNCov = 0.8
        SoilOrganicMatter: same as Gains82.paddock.Field01.SoilOrganicMatter
        Analysis: Thickness=[150, 150, 150, 150, 150, 150, 300, 300, 300]; PH=[6.5, 6.2, 6.2, 6.3, 6.3, 6.4, 6.5, 6.6, 6.5]
        Sample Initial nitrogen
          Thickness  NO3  NH4   SW
          150        3.3  0.6   0.413
          150        3.3  0.1   0.422
          150        2.8  0.14  0.498
          150        2.8  0.1   0.484
          150        1.6  0.1   0.488
          150        0.6  0.1   0.444
          300        0.5  0.1   0.404
          300        0.2  0.1   0.419
          300        0.1  0.1   0.419
      surfaceom SurfaceOrganicMatter
        PoolName = wheat  # Organic Matter pool name
        type = wheat  # Organic Matter type
        mass = 4000  # Initial surface residue (kg/ha)
        cnr = 33  # C:N ratio of initial residue
        standing_fraction = 0.0  # Fraction of residue standing
      fertiliser
      Maize
      folder Manager folder
        manager Sow on a fixed date
          # Sowing criteria
          date = 23-apr  # Enter sowing date (dd-mmm)
          # Sowing parameters
          crop = Maize  # Enter name of crop to sow
          density = 7.2  # Enter sowing density (plants/m2)
          depth = 50  # Enter sowing depth (mm)
          cultivar = usa_18leaf  # Enter cultivar
          class = plant  # Enter crop growth class
          row_spacing = 1000  # Enter row spacing (mm)
          on start_of_day:
          script: same as in Gains82.paddock.Manager folder.Sow on a fixed date
        manager Fertilise at sowing: same as Gains82.paddock.Manager folder.Fertilise at sowing
        manager Harvesting rule
          # Harvesting criteria
          crop = Maize  # Enter name of crop to harvest when ripe
          on end_of_day:
          script: same as in Gains82.paddock.Manager folder.Harvesting rule
        manager DoOutput -> /Maize/Shared/DoOutput
      outputfile: filename=Gains83.out; title=Gains83
        variables My Variables -> /Maize/Shared/My Variables: same as Gains82.paddock.outputfile.My Variables
        events My Variables Events -> /Maize/Shared/My Variables Events
      operations Operations Schedule
      irrigation
        automatic_irrigation = on
        asw_depth = 1000  # Depth to which ASW is calculated. (mm)
        crit_fr_asw = 0.80  # Fraction of ASW below which irrigation is applied (0-1.0)
        irrigation_efficiency = 1  # Efficiency of the irrigation. (0-1.0)
        irrigation_allocation = off  # Allocation limits
        allocation = 0  # Allocation in mm
        default_no3_conc = 0.0  # Nitrate concentration (ppm N)
        default_nh4_conc = 0.0  # Ammonium concentration (ppm N)
        default_cl_conc = 0.0  # Chloride concentration (ppm Cl)
  simulation Quincy776
    clock
      start_date = 24/03/1977  # Enter the start date of the simulation
      end_date = 29/07/1977  # Enter the end date of the simulation
    summaryfile
    metfile met: filename=Quincy776IB.met
    area paddock
      Soil Field03
        Water: same as Gains82.paddock.Field01.Water
        SoilWater: same as Gains83.paddock.Field02.SoilWater
        SoilOrganicMatter: same as Gains82.paddock.Field01.SoilOrganicMatter
        Analysis: Thickness=[150, 150, 150, 150, 150, 150, 300, 300, 300]; PH=[6.5, 6.2, 6.2, 6.3, 6.3, 6.4, 6.5, 6.6, 6.5]
        Sample Initial nitrogen
          Thickness  NO3  NH4  SW
          150        3.3  0.1  0.413
          150        3.3  0.6  0.422
          150        2.8  0.1  0.498
          150        2.8  0.1  0.484
          150        1.6  0.1  0.488
          150        0.6  0.1  0.444
          300        0.5  0.1  0.404
          300        0.2  0.1  0.419
          300        0.1  0.1  0.419
      surfaceom SurfaceOrganicMatter
        PoolName = wheat  # Organic Matter pool name
        type = wheat  # Organic Matter type
        mass = 4000  # Initial surface residue (kg/ha)
        cnr = 33  # C:N ratio of initial residue
        standing_fraction = 0.0  # Fraction of residue standing
      fertiliser
      Maize
      folder Manager folder
        manager Sow on a fixed date
          # Sowing criteria
          date = 24-Mar  # Enter sowing date (dd-mmm)
          # Sowing parameters
          crop = Maize  # Enter name of crop to sow
          density = 6  # Enter sowing density (plants/m2)
          depth = 50  # Enter sowing depth (mm)
          cultivar = usa_18leaf  # Enter cultivar
          class = plant  # Enter crop growth class
          row_spacing = 1000  # Enter row spacing (mm)
          on start_of_day:
          script: same as in Gains82.paddock.Manager folder.Sow on a fixed date
        manager Fertilise at sowing: same as Gains82.paddock.Manager folder.Fertilise at sowing
        manager Harvesting rule
          # Harvesting criteria
          crop = Maize  # Enter name of crop to harvest when ripe
          on end_of_day:
          script: same as in Gains82.paddock.Manager folder.Harvesting rule
        manager DoOutput -> /Maize/Shared/DoOutput
      outputfile: filename=Quincy776.out; title=Quincy776
        variables My Variables -> /Maize/Shared/My Variables: same as Gains82.paddock.outputfile.My Variables
        events My Variables Events -> /Maize/Shared/My Variables Events
      operations Operations Schedule
      irrigation: same as Gains83.paddock.Irrigation
  simulation Quincy779
    clock
      start_date = 24/03/1977  # Enter the start date of the simulation
      end_date = 29/07/1977  # Enter the end date of the simulation
    summaryfile
    metfile met: filename=Quincy779IB.met
    area paddock
      Soil Field04
        Water: same as Gains82.paddock.Field01.Water
        SoilWater: same as Gains83.paddock.Field02.SoilWater
        SoilOrganicMatter: same as Gains82.paddock.Field01.SoilOrganicMatter
        Analysis: Thickness=[150, 150, 150, 150, 150, 150, 300, 300, 300]; PH=[6.5, 6.2, 6.2, 6.3, 6.3, 6.4, 6.5, 6.6, 6.5]
        Sample Initial nitrogen
          Thickness  NO3   NH4  SW
          150        14.8  0.6  0.413
          150        3.3   0.1  0.422
          150        2.8   0.1  0.498
          150        2.8   0.1  0.484
          150        1.6   0.1  0.488
          150        0.6   0.1  0.444
          300        0.5   0.1  0.404
          300        0.2   0.1  0.419
          300        0.1   0.1  0.419
      surfaceom SurfaceOrganicMatter
        PoolName = wheat  # Organic Matter pool name
        type = wheat  # Organic Matter type
        mass = 4000  # Initial surface residue (kg/ha)
        cnr = 33  # C:N ratio of initial residue
        standing_fraction = 0.0  # Fraction of residue standing
      fertiliser
      Maize
      folder Manager folder
        manager Sow on a fixed date
          # Sowing criteria
          date = 24-Mar  # Enter sowing date (dd-mmm)
          # Sowing parameters
          crop = Maize  # Enter name of crop to sow
          density = 9  # Enter sowing density (plants/m2)
          depth = 50  # Enter sowing depth (mm)
          cultivar = usa_18leaf  # Enter cultivar
          class = plant  # Enter crop growth class
          row_spacing = 1000  # Enter row spacing (mm)
          on start_of_day:
          script: same as in Gains82.paddock.Manager folder.Sow on a fixed date
        manager Fertilise at sowing: same as Gains82.paddock.Manager folder.Fertilise at sowing
        manager Harvesting rule
          # Harvesting criteria
          crop = Maize  # Enter name of crop to harvest when ripe
          on end_of_day:
          script: same as in Gains82.paddock.Manager folder.Harvesting rule
        manager DoOutput -> /Maize/Shared/DoOutput
      outputfile: filename=Quincy779.out; title=Quincy779
        variables My Variables -> /Maize/Shared/My Variables: same as Gains82.paddock.outputfile.My Variables
        events My Variables Events -> /Maize/Shared/My Variables Events
      operations Operations Schedule
      irrigation: same as Gains82.paddock.Irrigation
  simulation Quincy786
    clock
      start_date = 30/03/1978  # Enter the start date of the simulation
      end_date = 04/08/1978  # Enter the end date of the simulation
    summaryfile
    metfile met: filename=talah78.met
    area paddock
      Soil Field05
        Water
          Thickness  BD    AirDry  LL15  DUL   SAT
          150        1.35  0.1     0.21  0.41  0.46
          150        1.54  0.1     0.19  0.37  0.39
          300        1.54  0.1     0.26  0.34  0.39
          300        1.53  0.1     0.26  0.35  0.39
          300        1.56  0.1     0.26  0.38  0.39
          300        1.54  0.1     0.26  0.36  0.39
          300        1.54  0.1     0.26  0.33  0.39
          SoilCrop Maize: LL=[0.22, 0.19, 0.26, 0.28, 0.3, 0.32, 0.32]; KL=[0.12, 0.08, 0.08, 0.06, 0.04, 0.02, 0.01]; XF=[1, 1, 1, 1, 1, 1, 1]
        SoilWater: same as Gains83.paddock.Field02.SoilWater
        SoilOrganicMatter
          Thickness  OC   FBiom  FInert
          150        0.8  0.05   0.39
          150        0.6  0.02   0.47
          300        0.5  0.01   0.52
          300        0.3  0.01   0.62
          300        0.2  0.01   0.74
          300        0.2  0.01   0.83
          300        0.1  0.01   0.93
          RootCN = 50
          RootWt = 1000
          SoilCN = 14.5
          EnrACoeff = 7.4
          EnrBCoeff = 0.2
        Analysis: Thickness=[150, 150, 300, 300, 300, 300, 300]; PH=[8.9, 8.9, 9, 9, 9, 9, 9]
        Sample Initial soil
          Thickness  NO3  NH4  SW
          150        1    0.6  0.321
          150        1    0.1  0.374
          300        0.5  0.1  0.314
          300        0.3  0.1  0.355
          300        0.2  0.1  0.382
          300        0.1  0.1  0.36
          300        0.1  0.1  0.331
      surfaceom SurfaceOrganicMatter
        PoolName = wheat  # Organic Matter pool name
        type = wheat  # Organic Matter type
        mass = 4000  # Initial surface residue (kg/ha)
        cnr = 33  # C:N ratio of initial residue
        standing_fraction = 0.0  # Fraction of residue standing
      fertiliser
      Maize
      folder Manager folder
        manager Sow on a fixed date
          # Sowing criteria
          date = 30-mar  # Enter sowing date (dd-mmm)
          # Sowing parameters
          crop = Maize  # Enter name of crop to sow
          density = 6  # Enter sowing density (plants/m2)
          depth = 50  # Enter sowing depth (mm)
          cultivar = usa_18leaf  # Enter cultivar
          class = plant  # Enter crop growth class
          row_spacing = 1000  # Enter row spacing (mm)
          on start_of_day:
          script: same as in Gains82.paddock.Manager folder.Sow on a fixed date
        manager Fertilise at sowing: same as Gains82.paddock.Manager folder.Fertilise at sowing
        manager Harvesting rule
          # Harvesting criteria
          crop = Maize  # Enter name of crop to harvest when ripe
          on end_of_day:
          script: same as in Gains82.paddock.Manager folder.Harvesting rule
        manager DoOutput -> /Maize/Shared/DoOutput
      outputfile: filename=Quincy786.out; title=Quincy786
        variables My Variables -> /Maize/Shared/My Variables: same as Gains82.paddock.outputfile.My Variables
        events My Variables Events -> /Maize/Shared/My Variables Events
      operations Operations Schedule
      irrigation: same as Gains82.paddock.Irrigation
  simulation Quincy789
    clock
      start_date = 30/03/1978  # Enter the start date of the simulation
      end_date = 04/08/1978  # Enter the end date of the simulation
    summaryfile
    metfile met: filename=Quincy789IB.met
    area paddock
      Soil Field06
        Water
          Thickness  BD    AirDry  LL15  DUL   SAT
          150        1.28  0.1     0.2   0.44  0.49
          150        1.26  0.1     0.21  0.45  0.5
          300        1.32  0.1     0.22  0.42  0.47
          300        1.34  0.1     0.25  0.41  0.46
          300        1.36  0.1     0.35  0.41  0.46
          300        1.35  0.1     0.38  0.41  0.46
          300        1.34  0.1     0.39  0.42  0.47
          SoilCrop Maize: LL=[0.2, 0.21, 0.22, 0.25, 0.35, 0.38, 0.39]; KL=[0.12, 0.08, 0.08, 0.06, 0.04, 0.02, 0.01]; XF=[1, 1, 1, 1, 1, 1, 1]
        SoilWater: same as Gains83.paddock.Field02.SoilWater
        SoilOrganicMatter: same as Quincy786.paddock.Field05.SoilOrganicMatter
        Analysis: Thickness=[150, 150, 300, 300, 300, 300, 300]; PH=[8.9, 8.9, 9, 9, 9, 9, 9]
        Sample Initial soil
          Thickness  NO3  NH4  SW
          150        1    0.6  0.36
          150        1    0.1  0.37
          300        0.5  0.1  0.39
          300        0.3  0.1  0.34
          300        0.2  0.1  0.34
          300        0.1  0.1  0.32
          300        0.1  0.1  0.31
      surfaceom SurfaceOrganicMatter
        PoolName = wheat  # Organic Matter pool name
        type = wheat  # Organic Matter type
        mass = 4000  # Initial surface residue (kg/ha)
        cnr = 33  # C:N ratio of initial residue
        standing_fraction = 0.0  # Fraction of residue standing
      fertiliser
      Maize
      folder Manager folder
        manager Sow on a fixed date
          # Sowing criteria
          date = 30-mar  # Enter sowing date (dd-mmm)
          # Sowing parameters
          crop = Maize  # Enter name of crop to sow
          density = 9  # Enter sowing density (plants/m2)
          depth = 50  # Enter sowing depth (mm)
          cultivar = usa_18leaf  # Enter cultivar
          class = plant  # Enter crop growth class
          row_spacing = 1000  # Enter row spacing (mm)
          on start_of_day:
          script: same as in Gains82.paddock.Manager folder.Sow on a fixed date
        manager Fertilise at sowing: same as Gains82.paddock.Manager folder.Fertilise at sowing
        manager Harvesting rule
          # Harvesting criteria
          crop = Maize  # Enter name of crop to harvest when ripe
          on end_of_day:
          script: same as in Gains82.paddock.Manager folder.Harvesting rule
        manager DoOutput -> /Maize/Shared/DoOutput
      outputfile: filename=Quincy789.out; title=Quincy789
        variables My Variables -> /Maize/Shared/My Variables: same as Gains82.paddock.outputfile.My Variables
        events My Variables Events -> /Maize/Shared/My Variables Events
      operations Operations Schedule
      irrigation: same as Gains82.paddock.Irrigation
  simulation Champ83
    clock
      start_date = 12/05/1983  # Enter the start date of the simulation
      end_date = 21/09/1983  # Enter the end date of the simulation
    summaryfile
    metfile met: filename=Champ83IB.met
    area paddock
      Soil Field08
        Water
          Thickness  BD    AirDry  LL15  DUL   SAT
          150        1.02  0.15    0.29  0.54  0.62
          150        1.03  0.15    0.29  0.53  0.61
          300        1.02  0.15    0.34  0.54  0.62
          300        1.02  0.15    0.28  0.54  0.62
          300        1.06  0.15    0.44  0.52  0.6
          600        1.11  0.15    0.47  0.5   0.58
          SoilCrop Maize: LL=[0.29, 0.29, 0.34, 0.38, 0.44, 0.47]; KL=[0.12, 0.1, 0.1, 0.08, 0.06, 0.04]; XF=[1, 0.8, 0.6, 0.4, 0.2, 0.1]
        SoilWater: same as Gains83.paddock.Field02.SoilWater
        SoilOrganicMatter
          Thickness  OC   FBiom  FInert
          150        0.8  0.05   0.39
          150        0.6  0.02   0.47
          300        0.5  0.01   0.52
          300        0.3  0.01   0.62
          300        0.2  0.01   0.74
          600        0.2  0.01   0.74
          RootCN = 50
          RootWt = 1000
          SoilCN = 14.5
          EnrACoeff = 7.4
          EnrBCoeff = 0.2
        Analysis: Thickness=[150, 150, 300, 300, 300, 600]; PH=[8.9, 8.9, 9, 9, 9, 9]
        Sample Initial soil
          Thickness  NO3  NH4  SW
          150        1    0.6  0.48
          150        1    0.1  0.51
          300        0.5  0.1  0.5
          300        0.3  0.1  0.5
          300        0.2  0.1  0.46
          600        0.1  0.1  0.44
      surfaceom SurfaceOrganicMatter
        PoolName = wheat  # Organic Matter pool name
        type = wheat  # Organic Matter type
        mass = 4000  # Initial surface residue (kg/ha)
        cnr = 33  # C:N ratio of initial residue
        standing_fraction = 0.0  # Fraction of residue standing
      fertiliser
      Maize
      folder Manager folder
        manager Sow on a fixed date
          # Sowing criteria
          date = 12-may  # Enter sowing date (dd-mmm)
          # Sowing parameters
          crop = Maize  # Enter name of crop to sow
          density = 8.9  # Enter sowing density (plants/m2)
          depth = 50  # Enter sowing depth (mm)
          cultivar = usa_18leaf  # Enter cultivar
          class = plant  # Enter crop growth class
          row_spacing = 1000  # Enter row spacing (mm)
          on start_of_day:
          script: same as in Gains82.paddock.Manager folder.Sow on a fixed date
        manager Fertilise at sowing: same as Gains82.paddock.Manager folder.Fertilise at sowing
        manager Harvesting rule
          # Harvesting criteria
          crop = Maize  # Enter name of crop to harvest when ripe
          on end_of_day:
          script: same as in Gains82.paddock.Manager folder.Harvesting rule
        manager DoOutput -> /Maize/Shared/DoOutput
      outputfile: filename=Champ83.out; title=Champ83
        variables My Variables -> /Maize/Shared/My Variables: same as Gains82.paddock.outputfile.My Variables
        events My Variables Events -> /Maize/Shared/My Variables Events
      operations Operations Schedule
      irrigation: same as Gains82.paddock.Irrigation
  simulation Gjunct82
    clock
      start_date = 24/04/1982  # Enter the start date of the simulation
      end_date = 20/10/1982  # Enter the end date of the simulation
    summaryfile
    metfile met: filename=Gjunct82IB.met
    area paddock
      Soil Field09
        Water: same as Gains82.paddock.Field01.Water
        SoilWater: same as Gains83.paddock.Field02.SoilWater
        SoilOrganicMatter: same as Gains82.paddock.Field01.SoilOrganicMatter
        Analysis: Thickness=[150, 150, 150, 150, 150, 150, 300, 300, 300]; PH=[6.5, 6.2, 6.2, 6.3, 6.3, 6.4, 6.5, 6.6, 6.5]
        Sample Initial Soil
          Thickness  NO3  NH4  SW
          150        10   0.6  0.41
          150        10   0.1  0.42
          150        5    0.1  0.5
          150        5    0.1  0.48
          150        5    0.1  0.49
          150        5    0.1  0.44
          300        5    0.1  0.4
          300        5    0.1  0.42
          300        5    0.1  0.42
      surfaceom SurfaceOrganicMatter
        PoolName = wheat  # Organic Matter pool name
        type = wheat  # Organic Matter type
        mass = 4000  # Initial surface residue (kg/ha)
        cnr = 33  # C:N ratio of initial residue
        standing_fraction = 0.0  # Fraction of residue standing
      fertiliser
      Maize
      folder Manager folder
        manager Sow on a fixed date
          # Sowing criteria
          date = 24-apr  # Enter sowing date (dd-mmm)
          # Sowing parameters
          crop = Maize  # Enter name of crop to sow
          density = 10.5  # Enter sowing density (plants/m2)
          depth = 50  # Enter sowing depth (mm)
          cultivar = usa_18leaf  # Enter cultivar
          class = plant  # Enter crop growth class
          row_spacing = 610  # Enter row spacing (mm)
          on start_of_day:
          script: same as in Gains82.paddock.Manager folder.Sow on a fixed date
        manager Fertilise at sowing: same as Gains82.paddock.Manager folder.Fertilise at sowing
        manager Harvesting rule
          # Harvesting criteria
          crop = Maize  # Enter name of crop to harvest when ripe
          on end_of_day:
          script: same as in Gains82.paddock.Manager folder.Harvesting rule
        manager DoOutput -> /Maize/Shared/DoOutput
      outputfile: filename=Gjunct82.out; title=Gjunct82
        variables My Variables -> /Maize/Shared/My Variables: same as Gains82.paddock.outputfile.My Variables
        events My Variables Events -> /Maize/Shared/My Variables Events
      operations Operations Schedule
      irrigation: same as Gains82.paddock.Irrigation
  simulation Gjunct83
    clock
      start_date = 07/05/1983  # Enter the start date of the simulation
      end_date = 28/10/1983  # Enter the end date of the simulation
    summaryfile
    metfile met: filename=Gjunct83IB.met
    area paddock
      Soil Field10: same as Gjunct82.paddock.Field09
      surfaceom SurfaceOrganicMatter
        PoolName = wheat  # Organic Matter pool name
        type = wheat  # Organic Matter type
        mass = 4000  # Initial surface residue (kg/ha)
        cnr = 33  # C:N ratio of initial residue
        standing_fraction = 0.0  # Fraction of residue standing
      fertiliser
      Maize
      folder Manager folder
        manager Sow on a fixed date
          # Sowing criteria
          date = 7-may  # Enter sowing date (dd-mmm)
          # Sowing parameters
          crop = Maize  # Enter name of crop to sow
          density = 10.5  # Enter sowing density (plants/m2)
          depth = 50  # Enter sowing depth (mm)
          cultivar = usa_18leaf  # Enter cultivar
          class = plant  # Enter crop growth class
          row_spacing = 610  # Enter row spacing (mm)
          on start_of_day:
          script: same as in Gains82.paddock.Manager folder.Sow on a fixed date
        manager Fertilise at sowing: same as Gains82.paddock.Manager folder.Fertilise at sowing
        manager Harvesting rule
          # Harvesting criteria
          crop = Maize  # Enter name of crop to harvest when ripe
          on end_of_day:
          script: same as in Gains82.paddock.Manager folder.Harvesting rule
        manager DoOutput -> /Maize/Shared/DoOutput
      outputfile: filename=Gjunct83.out; title=Gjunct83
        variables My Variables -> /Maize/Shared/My Variables: same as Gains82.paddock.outputfile.My Variables
        events My Variables Events -> /Maize/Shared/My Variables Events
      operations Operations Schedule
      irrigation: same as Gains82.paddock.Irrigation
  simulation Gjunct84
    clock
      start_date = 07/05/1984  # Enter the start date of the simulation
      end_date = 12/10/1984  # Enter the end date of the simulation
    summaryfile
    metfile met: filename=Gjunct84IB.met
    area paddock
      Soil Field11: same as Gjunct82.paddock.Field09
      surfaceom SurfaceOrganicMatter
        PoolName = wheat  # Organic Matter pool name
        type = wheat  # Organic Matter type
        mass = 4000  # Initial surface residue (kg/ha)
        cnr = 33  # C:N ratio of initial residue
        standing_fraction = 0.0  # Fraction of residue standing
      fertiliser
      Maize
      folder Manager folder
        manager Sow on a fixed date
          # Sowing criteria
          date = 7-may  # Enter sowing date (dd-mmm)
          # Sowing parameters
          crop = Maize  # Enter name of crop to sow
          density = 10.5  # Enter sowing density (plants/m2)
          depth = 50  # Enter sowing depth (mm)
          cultivar = usa_18leaf  # Enter cultivar
          class = plant  # Enter crop growth class
          row_spacing = 610  # Enter row spacing (mm)
          on start_of_day:
          script: same as in Gains82.paddock.Manager folder.Sow on a fixed date
        manager Fertilise at sowing: same as Gains82.paddock.Manager folder.Fertilise at sowing
        manager Harvesting rule
          # Harvesting criteria
          crop = Maize  # Enter name of crop to harvest when ripe
          on end_of_day:
          script: same as in Gains82.paddock.Manager folder.Harvesting rule
        manager DoOutput -> /Maize/Shared/DoOutput
      outputfile: filename=Gjunct84.out; title=Gjunct84
        variables My Variables -> /Maize/Shared/My Variables: same as Gains82.paddock.outputfile.My Variables
        events My Variables Events -> /Maize/Shared/My Variables Events
      operations Operations Schedule
      irrigation: same as Gains82.paddock.Irrigation
  simulation Gjunct85
    clock
      start_date = 07/05/1985  # Enter the start date of the simulation
      end_date = 06/11/1985  # Enter the end date of the simulation
    summaryfile
    metfile met: filename=Gjunct85IB.met
    area paddock
      Soil Field12: same as Gjunct82.paddock.Field09
      surfaceom SurfaceOrganicMatter
        PoolName = wheat  # Organic Matter pool name
        type = wheat  # Organic Matter type
        mass = 4000  # Initial surface residue (kg/ha)
        cnr = 33  # C:N ratio of initial residue
        standing_fraction = 0.0  # Fraction of residue standing
      fertiliser
      Maize
      folder Manager folder: same as Gjunct83.paddock.Manager folder
      outputfile: filename=Gjunct85.out; title=Gjunct85
        variables My Variables -> /Maize/Shared/My Variables: same as Gains82.paddock.outputfile.My Variables
        events My Variables Events -> /Maize/Shared/My Variables Events
      operations Operations Schedule
      irrigation: same as Gains82.paddock.Irrigation
  simulation Gjunct86
    clock
      start_date = 30/04/1986  # Enter the start date of the simulation
      end_date = 29/10/1986  # Enter the end date of the simulation
    summaryfile
    metfile met: filename=Gjunct86IB.met
    area paddock
      Soil Field13: same as Gjunct82.paddock.Field09
      surfaceom SurfaceOrganicMatter
        PoolName = wheat  # Organic Matter pool name
        type = wheat  # Organic Matter type
        mass = 4000  # Initial surface residue (kg/ha)
        cnr = 33  # C:N ratio of initial residue
        standing_fraction = 0.0  # Fraction of residue standing
      fertiliser
      Maize
      folder Manager folder
        manager Sow on a fixed date
          # Sowing criteria
          date = 30-apr  # Enter sowing date (dd-mmm)
          # Sowing parameters
          crop = Maize  # Enter name of crop to sow
          density = 10.5  # Enter sowing density (plants/m2)
          depth = 50  # Enter sowing depth (mm)
          cultivar = usa_18leaf  # Enter cultivar
          class = plant  # Enter crop growth class
          row_spacing = 610  # Enter row spacing (mm)
          on start_of_day:
          script: same as in Gains82.paddock.Manager folder.Sow on a fixed date
        manager Fertilise at sowing: same as Gains82.paddock.Manager folder.Fertilise at sowing
        manager Harvesting rule
          # Harvesting criteria
          crop = Maize  # Enter name of crop to harvest when ripe
          on end_of_day:
          script: same as in Gains82.paddock.Manager folder.Harvesting rule
        manager DoOutput -> /Maize/Shared/DoOutput
      outputfile: filename=Gjunct86.out; title=Gjunct86
        variables My Variables -> /Maize/Shared/My Variables
        events My Variables Events -> /Maize/Shared/My Variables Events
      operations Operations Schedule
      irrigation: same as Gains82.paddock.Irrigation
