folder Mungbean: version=37; creator=Apsim 7.10-r4171
  factorial Factorials: active=0
    settings: fn=1; tl=1
    factor
      targets
      factor
  factorial Factorials1: active=0
    settings
  folder Mungbean_REMS
    folder aps20
      simulation Emerald_high_Dec17
        clock
          start_date = 16/12/1993
          end_date = 31/05/1994
        summaryfile
        metfile met: filename=MetFiles\mans9394.met
        area paddock
          outputfile report: filename=Emerald_high_Dec17 report.out; title=Emerald_high_Dec17 report
            variables
              variables: dd/mm/yyyy as Date, DaysAftersowing, yield, biomass, flowering_das, harvestindex, maturity_das, id
            events: event=harvesting
          operations
            17/12/1993  mungbean sow plants = 30.8, sowing_depth = 40, cultivar = emerald,crop_class = plant, row_spacing = 230
          fertiliser
          irrigation
            automatic_irrigation = off
            asw_depth = 600  # Depth to which ASW is calculated. (mm)
            crit_fr_asw = 0.5  # Fraction of ASW below which irrigation is applied (0-1.0)
            irrigation_efficiency = 1  # Efficiency of the irrigation. (0-1.0)
            irrigation_allocation = off  # Allocation limits
            allocation = 0  # Allocation in mm
            default_no3_conc = 0.0  # Nitrate concentration (ppm N)
            default_nh4_conc = 0.0  # Ammonium concentration (ppm N)
            default_cl_conc = 0.0  # Chloride concentration (ppm Cl)
          manager
            on init:
```
                 dateset = 0
                 emer_date = 0
                 endjuv_date = 0
                 anth_date = 0
                 mat_date = 0
```
            on end_of_day:
```
                 if mungbean.stage = 3 and dateset = 0 then
                    emer_date = daysaftersowing
                    dateset = 1
                 endif
                 if mungbean.stage = 4 and dateset = 1 then
                    endjuv_date = daysaftersowing
                    dateset = 2
                 endif
                 if mungbean.stage = 6 and dateset = 2 then
                    anth_date = daysaftersowing
                    dateset = 3
                 endif
                 if mungbean.stage = 9 and dateset = 3 then
                    mat_date = daysaftersowing
                    dateset = 4
                 endif
            if (mungbean.stagename = 'maturity' or mungbean.plant_status = 'dead') then
               outputfile do_output
               mungbean harvest 
               mungbean kill_crop 
               mungbean end_crop
               dateset = 0
            endif
```
          Soil: Latitude=0; Longitude=0; YearOfSampling=0
            InitialWater Initial water: FractionFull=1; PercentMethod=EvenlyDistributed
            Water
              Thickness  BD    AirDry  LL15   DUL    SAT
              150        1.39  0.1     0.182  0.428  0.47
              150        1.41  0.24    0.24   0.427  0.467
              300        1.42  0.3     0.3    0.424  0.46
              300        1.46  0.297   0.297  0.439  0.449
              300        1.45  0.265   0.265  0.437  0.452
              300        1.5   0.368   0.368  0.428  0.433
              300        1.49  0.368   0.368  0.402  0.43
              SoilCrop mungbean: LL=[0.272, 0.311, 0.315, 0.297, 0.345, 0.41, 0.39]; KL=[0.12, 0.12, 0.12, 0.09, 0.06, 0.05, 0.01]; XF=[1, 1, 1, 1, 1, 1, 1]
            SoilWater: SummerCona=3.5; SummerU=6; SummerDate=1-Nov; WinterCona=3.5; WinterU=6; WinterDate=1-Apr; DiffusConst=40; DiffusSlope=16; Salb=0.13; CN2Bare=75; CNRed=20; CNCov=0.8; Thickness=[150, 150, 300, 300, 300, 300, 300]; SWCON=[0.4, 0.4, 0.4, 0.4, 0.265, 0.368, 0.368]
            SoilOrganicMatter: RootCN=33; RootWt=0; SoilCN=14.5; EnrACoeff=7.4; EnrBCoeff=0.2; OCUnits=Total
              Thickness  OC   FBiom  FInert
              150        0.8  0.05   0.39
              150        0.6  0.02   0.47
              300        0.5  0.015  0.52
              300        0.3  0.01   0.62
              300        0.2  0.01   0.74
              300        0.2  0.01   0.83
              300        0.1  0.01   0.93
            Analysis: Thickness=[150, 150, 300, 300, 300, 300, 300]; PH=[8.9, 8.9, 9, 9, 9, 9, 9]; PHUnits=Water; BoronUnits=HotWater
            Sample Initial nitrogen: NO3Units=kgha; NH4Units=ppm; SWUnits=Volumetric; OCUnits=Total; PHUnits=Water
              Thickness  NO3   NH4
              150        18.5  1
              150        11.5  1
              300        21.4  1
              300        18.4  1
              300        6.7   1
              300        1     1
              300        1     1
          surfaceom
            PoolName = wheat  # Organic Matter pool name
            type = wheat  # Organic Matter type
            mass = 500  # Initial surface residue (kg/ha)
            cnr = 40  # C:N ratio of initial residue
            standing_fraction = 0.0  # Fraction of residue standing
          mungbean
          manager Empty manager1
            on start_of_day:
```
if leafGreenWt>0 then
SLA=leaf_area/leafGreenWt
endif

if biomass>0 then
HarvestIndex=yield/biomass
endif

id=1
```
          outputfile -> /Mungbean/Mungbean_REMS/aps20/Emerald_high_Dec17/paddock/report: filename=Emerald_high_Dec17.out; title=Emerald_high_Dec17
            variables -> /Mungbean/Mungbean_REMS/aps20/Emerald_high_Dec17/paddock/report/variables
      simulation Emerald_low_Dec28
        clock
          start_date = 16/12/1993
          end_date = 31/05/1994
        summaryfile
        metfile met: filename=MetFiles\mans9394.met
        area paddock
          fertiliser
          irrigation: same as Mungbean_REMS.aps20.Emerald_high_Dec17.paddock.irrigation
          manager: same as Mungbean_REMS.aps20.Emerald_high_Dec17.paddock.manager
          Soil: Latitude=0; Longitude=0; YearOfSampling=0
            InitialWater Initial water: FractionFull=1; PercentMethod=EvenlyDistributed
            Water: same as Mungbean_REMS.aps20.Emerald_high_Dec17.paddock.soil.Water
            SoilOrganicMatter: same as Mungbean_REMS.aps20.Emerald_high_Dec17.paddock.soil.SoilOrganicMatter
            Analysis: Thickness=[150, 150, 300, 300, 300, 300, 300]; PH=[8.9, 8.9, 9, 9, 9, 9, 9]; PHUnits=Water; BoronUnits=HotWater
            SoilWater: SummerCona=3.5; SummerU=6; SummerDate=1-Nov; WinterCona=3.5; WinterU=6; WinterDate=1-Apr; DiffusConst=40; DiffusSlope=16; Salb=0.13; CN2Bare=75; CNRed=20; CNCov=0.8; Thickness=[150, 150, 300, 300, 300, 300, 300]; SWCON=[0.389, 0.368, 0.396, 0.385, 0.393, 0.368, 0.368]
            Sample Initial nitrogen: NO3Units=kgha; NH4Units=ppm; SWUnits=Volumetric; OCUnits=Total; PHUnits=Water
              Thickness  NO3   NH4
              150        13.1  1
              150        8     1
              300        5.9   1
              300        2.4   1
              300        1.3   1
              300        1     1
              300        1     1
          surfaceom
            PoolName = wheat  # Organic Matter pool name
            type = wheat  # Organic Matter type
            mass = 500  # Initial surface residue (kg/ha)
            cnr = 40  # C:N ratio of initial residue
            standing_fraction = 0.0  # Fraction of residue standing
          mungbean
          operations
            28/12/1993  mungbean sow plants = 19.6, sowing_depth = 40, cultivar = emerald,crop_class = plant, row_spacing = 180
          manager Empty manager2
            on start_of_day:
```
if leafGreenWt>0 then
SLA=leaf_area/leafGreenWt
endif

if biomass>0 then
HarvestIndex=yield/biomass
endif

id=2
```
          outputfile -> /Mungbean/Mungbean_REMS/aps20/Emerald_high_Dec17/paddock/report: filename=Emerald_low_Dec28.out; title=Emerald_low_Dec28
            variables -> /Mungbean/Mungbean_REMS/aps20/Emerald_high_Dec17/paddock/report/variables
      simulation Emerald_low_Dec18
        clock
          start_date = 16/12/1993
          end_date = 31/05/1994
        summaryfile
        metfile met: filename=MetFiles\mans9394.met
        area paddock
          fertiliser
          irrigation: same as Mungbean_REMS.aps20.Emerald_high_Dec17.paddock.irrigation
          manager: same as Mungbean_REMS.aps20.Emerald_high_Dec17.paddock.manager
          Soil: Latitude=0; Longitude=0; YearOfSampling=0
            InitialWater Initial water: FractionFull=1; PercentMethod=EvenlyDistributed
            Water: same as Mungbean_REMS.aps20.Emerald_high_Dec17.paddock.soil.Water
            SoilOrganicMatter: same as Mungbean_REMS.aps20.Emerald_high_Dec17.paddock.soil.SoilOrganicMatter
            Analysis: Thickness=[150, 150, 300, 300, 300, 300, 300]; PH=[8.9, 8.9, 9, 9, 9, 9, 9]; PHUnits=Water; BoronUnits=HotWater
            SoilWater: SummerCona=3.5; SummerU=6; SummerDate=1-Nov; WinterCona=3.5; WinterU=6; WinterDate=1-Apr; DiffusConst=40; DiffusSlope=16; Salb=0.13; CN2Bare=75; CNRed=20; CNCov=0.8; Thickness=[150, 150, 300, 300, 300, 300, 300]; SWCON=[0.428, 0.407, 0.268, 0.298, 0.328, 0.352, 0.361]
            Sample Initial nitrogen: NO3Units=kgha; NH4Units=ppm; SWUnits=Volumetric; OCUnits=Total; PHUnits=Water
              Thickness  NO3  NH4
              150        7.7  1
              150        8.7  1
              300        7.1  1
              300        2.5  1
              300        1.9  1
              300        1    1
              300        1    1
          surfaceom
            PoolName = wheat  # Organic Matter pool name
            type = wheat  # Organic Matter type
            mass = 500  # Initial surface residue (kg/ha)
            cnr = 40  # C:N ratio of initial residue
            standing_fraction = 0.0  # Fraction of residue standing
          mungbean
          operations
            18/12/1993  mungbean sow plants = 19.3, sowing_depth = 40, cultivar = emerald,crop_class = plant, row_spacing = 460
          manager Empty manager2
            on start_of_day:
```
if leafGreenWt>0 then
SLA=leaf_area/leafGreenWt
endif

if biomass>0 then
HarvestIndex=yield/biomass
endif

id=3
```
          outputfile -> /Mungbean/Mungbean_REMS/aps20/Emerald_high_Dec17/paddock/report: filename=Emerald_low_Dec18.out; title=Emerald_low_Dec18
            variables -> /Mungbean/Mungbean_REMS/aps20/Emerald_high_Dec17/paddock/report/variables
      simulation Shangtung_low_Dec27
        clock
          start_date = 16/12/1993
          end_date = 31/05/1994
        summaryfile
        metfile met: filename=MetFiles\mans9394.met
        area paddock
          fertiliser
          irrigation: same as Mungbean_REMS.aps20.Emerald_high_Dec17.paddock.irrigation
          manager: same as Mungbean_REMS.aps20.Emerald_high_Dec17.paddock.manager
          Soil: Latitude=0; Longitude=0; YearOfSampling=0
            InitialWater Initial water: FractionFull=1; PercentMethod=EvenlyDistributed
            Water: same as Mungbean_REMS.aps20.Emerald_high_Dec17.paddock.soil.Water
            SoilOrganicMatter: same as Mungbean_REMS.aps20.Emerald_high_Dec17.paddock.soil.SoilOrganicMatter
            Analysis: Thickness=[150, 150, 300, 300, 300, 300, 300]; PH=[8.9, 8.9, 9, 9, 9, 9, 9]; PHUnits=Water; BoronUnits=HotWater
            SoilWater: SummerCona=3.5; SummerU=6; SummerDate=1-Nov; WinterCona=3.5; WinterU=6; WinterDate=1-Apr; DiffusConst=40; DiffusSlope=16; Salb=0.13; CN2Bare=75; CNRed=20; CNCov=0.8; Thickness=[150, 150, 300, 300, 300, 300, 300]; SWCON=[0.42, 0.42, 0.42, 0.299, 0.305, 0.368, 0.368]
            Sample Initial nitrogen: NO3Units=kgha; NH4Units=ppm; SWUnits=Volumetric; OCUnits=Total; PHUnits=Water
              Thickness  NO3   NH4
              150        10.1  1
              150        18.7  1
              300        55.8  1
              300        17.5  1
              300        8.4   1
              300        1     1
              300        1     1
          surfaceom
            PoolName = wheat  # Organic Matter pool name
            type = wheat  # Organic Matter type
            mass = 500  # Initial surface residue (kg/ha)
            cnr = 40  # C:N ratio of initial residue
            standing_fraction = 0.0  # Fraction of residue standing
          mungbean
          operations
            27/12/1993  mungbean sow plants = 16.3, sowing_depth = 40, cultivar = shangtung,crop_class = plant, row_spacing = 450
          manager Empty manager2
            on start_of_day:
```
if leafGreenWt>0 then
SLA=leaf_area/leafGreenWt
endif

if biomass>0 then
HarvestIndex=yield/biomass
endif

id=4
```
          outputfile -> /Mungbean/Mungbean_REMS/aps20/Emerald_high_Dec17/paddock/report: filename=Shangtung_low_Dec27.out; title=Shangtung_low_Dec27
            variables -> /Mungbean/Mungbean_REMS/aps20/Emerald_high_Dec17/paddock/report/variables
      simulation Shangtung_high_Dec18
        clock
          start_date = 16/12/1993
          end_date = 31/05/1994
        summaryfile
        metfile met: filename=MetFiles\mans9394.met
        area paddock
          fertiliser
          irrigation: same as Mungbean_REMS.aps20.Emerald_high_Dec17.paddock.irrigation
          manager: same as Mungbean_REMS.aps20.Emerald_high_Dec17.paddock.manager
          Soil: Latitude=0; Longitude=0; YearOfSampling=0
            InitialWater Initial water: FractionFull=1; PercentMethod=EvenlyDistributed
            Water: same as Mungbean_REMS.aps20.Emerald_high_Dec17.paddock.soil.Water
            SoilOrganicMatter: same as Mungbean_REMS.aps20.Emerald_high_Dec17.paddock.soil.SoilOrganicMatter
            Analysis: Thickness=[150, 150, 300, 300, 300, 300, 300]; PH=[8.9, 8.9, 9, 9, 9, 9, 9]; PHUnits=Water; BoronUnits=HotWater
            SoilWater: SummerCona=3.5; SummerU=6; SummerDate=1-Nov; WinterCona=3.5; WinterU=6; WinterDate=1-Apr; DiffusConst=40; DiffusSlope=16; Salb=0.13; CN2Bare=75; CNRed=20; CNCov=0.8; Thickness=[150, 150, 300, 300, 300, 300, 300]; SWCON=[0.327, 0.403, 0.398, 0.356, 0.362, 0.368, 0.368]
            Sample Initial nitrogen: NO3Units=kgha; NH4Units=ppm; SWUnits=Volumetric; OCUnits=Total; PHUnits=Water
              Thickness  NO3   NH4
              150        23.8  1
              150        25    1
              300        46.7  1
              300        28.2  1
              300        18.5  1
              300        1     1
              300        1     1
          surfaceom
            PoolName = wheat  # Organic Matter pool name
            type = wheat  # Organic Matter type
            mass = 500  # Initial surface residue (kg/ha)
            cnr = 40  # C:N ratio of initial residue
            standing_fraction = 0.0  # Fraction of residue standing
          mungbean
          operations
            18/12/1993  mungbean sow plants = 23.5, sowing_depth = 40, cultivar = shangtung,crop_class = plant, row_spacing = 200
          manager Empty manager2
            on start_of_day:
```
if leafGreenWt>0 then
SLA=leaf_area/leafGreenWt
endif

if biomass>0 then
HarvestIndex=yield/biomass
endif

id=5
```
          outputfile -> /Mungbean/Mungbean_REMS/aps20/Emerald_high_Dec17/paddock/report: filename=Shangtung_high_Dec18.out; title=Shangtung_high_Dec18
            variables -> /Mungbean/Mungbean_REMS/aps20/Emerald_high_Dec17/paddock/report/variables
      simulation Celera_high_Dec17
        clock
          start_date = 16/12/1993
          end_date = 31/05/1994
        summaryfile
        metfile met: filename=MetFiles\mans9394.met
        area paddock
          fertiliser
          irrigation: same as Mungbean_REMS.aps20.Emerald_high_Dec17.paddock.irrigation
          manager: same as Mungbean_REMS.aps20.Emerald_high_Dec17.paddock.manager
          Soil: Latitude=0; Longitude=0; YearOfSampling=0
            InitialWater Initial water: FractionFull=1; PercentMethod=EvenlyDistributed
            Water: same as Mungbean_REMS.aps20.Emerald_high_Dec17.paddock.soil.Water
            SoilOrganicMatter: same as Mungbean_REMS.aps20.Emerald_high_Dec17.paddock.soil.SoilOrganicMatter
            Analysis: Thickness=[150, 150, 300, 300, 300, 300, 300]; PH=[8.9, 8.9, 9, 9, 9, 9, 9]; PHUnits=Water; BoronUnits=HotWater
            SoilWater: SummerCona=3.5; SummerU=6; SummerDate=1-Nov; WinterCona=3.5; WinterU=6; WinterDate=1-Apr; DiffusConst=40; DiffusSlope=16; Salb=0.13; CN2Bare=75; CNRed=20; CNCov=0.8; Thickness=[150, 150, 300, 300, 300, 300, 300]; SWCON=[0.309, 0.333, 0.276, 0.287, 0.325, 0.4, 0.42]
            Sample Initial nitrogen: NO3Units=kgha; NH4Units=ppm; SWUnits=Volumetric; OCUnits=Total; PHUnits=Water
              Thickness  NO3  NH4
              150        11   1
              150        3.4  1
              300        2.6  1
              300        2.6  1
              300        3.2  1
              300        1    1
              300        1    1
          surfaceom
            PoolName = wheat  # Organic Matter pool name
            type = wheat  # Organic Matter type
            mass = 500  # Initial surface residue (kg/ha)
            cnr = 40  # C:N ratio of initial residue
            standing_fraction = 0.0  # Fraction of residue standing
          mungbean
          operations
            17/12/1993  mungbean sow plants = 29.0, sowing_depth = 40, cultivar = celera,crop_class = plant, row_spacing = 350
          manager Empty manager2
            on start_of_day:
```
if leafGreenWt>0 then
SLA=leaf_area/leafGreenWt
endif

if biomass>0 then
HarvestIndex=yield/biomass
endif

id=6
```
          outputfile -> /Mungbean/Mungbean_REMS/aps20/Emerald_high_Dec17/paddock/report: filename=Celera_high_Dec17.out; title=Celera_high_Dec17
            variables -> /Mungbean/Mungbean_REMS/aps20/Emerald_high_Dec17/paddock/report/variables
      simulation Satin_low_Dec20
        clock
          start_date = 16/12/1993
          end_date = 31/05/1994
        summaryfile
        metfile met: filename=MetFiles\mans9394.met
        area paddock
          fertiliser
          irrigation: same as Mungbean_REMS.aps20.Emerald_high_Dec17.paddock.irrigation
          manager: same as Mungbean_REMS.aps20.Emerald_high_Dec17.paddock.manager
          Soil: Latitude=0; Longitude=0; YearOfSampling=0
            InitialWater Initial water: FractionFull=1; PercentMethod=EvenlyDistributed
            Water: same as Mungbean_REMS.aps20.Emerald_high_Dec17.paddock.soil.Water
            SoilOrganicMatter: same as Mungbean_REMS.aps20.Emerald_high_Dec17.paddock.soil.SoilOrganicMatter
            Analysis: Thickness=[150, 150, 300, 300, 300, 300, 300]; PH=[8.9, 8.9, 9, 9, 9, 9, 9]; PHUnits=Water; BoronUnits=HotWater
            SoilWater: SummerCona=3.5; SummerU=6; SummerDate=1-Nov; WinterCona=3.5; WinterU=6; WinterDate=1-Apr; DiffusConst=40; DiffusSlope=16; Salb=0.13; CN2Bare=75; CNRed=20; CNCov=0.8; Thickness=[150, 150, 300, 300, 300, 300, 300]; SWCON=[0.522, 0.522, 0.446, 0.371, 0.383, 0.43, 0.43]
            Sample Initial nitrogen: NO3Units=kgha; NH4Units=ppm; SWUnits=Volumetric; OCUnits=Total; PHUnits=Water
              Thickness  NO3   NH4
              150        2.9   1
              150        11.7  1
              300        26    1
              300        7.7   1
              300        0.7   1
              300        1     1
              300        1     1
          surfaceom
            PoolName = wheat  # Organic Matter pool name
            type = wheat  # Organic Matter type
            mass = 500  # Initial surface residue (kg/ha)
            cnr = 40  # C:N ratio of initial residue
            standing_fraction = 0.0  # Fraction of residue standing
          mungbean
          operations
            20/12/1993  mungbean sow plants = 18.5, sowing_depth = 40, cultivar = satin,crop_class = plant, row_spacing = 760
          manager Empty manager2
            on start_of_day:
```
if leafGreenWt>0 then
SLA=leaf_area/leafGreenWt
endif

if biomass>0 then
HarvestIndex=yield/biomass
endif

id=7
```
          outputfile -> /Mungbean/Mungbean_REMS/aps20/Emerald_high_Dec17/paddock/report: filename=Satin_low_Dec20.out; title=Satin_low_Dec20
            variables -> /Mungbean/Mungbean_REMS/aps20/Emerald_high_Dec17/paddock/report/variables
      simulation Satin_high_Dec18
        clock
          start_date = 16/12/1993
          end_date = 31/05/1994
        summaryfile
        metfile met: filename=MetFiles\mans9394.met
        area paddock
          fertiliser
          irrigation: same as Mungbean_REMS.aps20.Emerald_high_Dec17.paddock.irrigation
          manager: same as Mungbean_REMS.aps20.Emerald_high_Dec17.paddock.manager
          Soil: Latitude=0; Longitude=0; YearOfSampling=0
            InitialWater Initial water: FractionFull=1; PercentMethod=EvenlyDistributed
            Water: same as Mungbean_REMS.aps20.Emerald_high_Dec17.paddock.soil.Water
            SoilOrganicMatter: same as Mungbean_REMS.aps20.Emerald_high_Dec17.paddock.soil.SoilOrganicMatter
            Analysis: Thickness=[150, 150, 300, 300, 300, 300, 300]; PH=[8.9, 8.9, 9, 9, 9, 9, 9]; PHUnits=Water; BoronUnits=HotWater
            SoilWater: SummerCona=3.5; SummerU=6; SummerDate=1-Nov; WinterCona=3.5; WinterU=6; WinterDate=1-Apr; DiffusConst=40; DiffusSlope=16; Salb=0.13; CN2Bare=75; CNRed=20; CNCov=0.8; Thickness=[150, 150, 300, 300, 300, 300, 300]; SWCON=[0.389, 0.484, 0.465, 0.396, 0.358, 0.4, 0.42]
            Sample Initial nitrogen: NO3Units=kgha; NH4Units=ppm; SWUnits=Volumetric; OCUnits=Total; PHUnits=Water
              Thickness  NO3   NH4
              150        23.3  1
              150        34.4  1
              300        86.3  1
              300        28.7  1
              300        5.9   1
              300        1     1
              300        1     1
          surfaceom
            PoolName = wheat  # Organic Matter pool name
            type = wheat  # Organic Matter type
            mass = 500  # Initial surface residue (kg/ha)
            cnr = 40  # C:N ratio of initial residue
            standing_fraction = 0.0  # Fraction of residue standing
          mungbean
          operations
            18/12/1993  mungbean sow plants = 22.4, sowing_depth = 40, cultivar = satin,crop_class = plant, row_spacing = 970
          manager Empty manager2
            on start_of_day:
```
if leafGreenWt>0 then
SLA=leaf_area/leafGreenWt
endif

if biomass>0 then
HarvestIndex=yield/biomass
endif

id=8
```
          outputfile -> /Mungbean/Mungbean_REMS/aps20/Emerald_high_Dec17/paddock/report: filename=Satin_high_Dec18.out; title=Satin_high_Dec18
            variables -> /Mungbean/Mungbean_REMS/aps20/Emerald_high_Dec17/paddock/report/variables
    folder aps18
      simulation aps18_Nov4_Berken
        clock
          start_date = 27/10/1993
          end_date = 30/04/1994
        summaryfile
        metfile met: filename=MetFiles\aps18.met
        area paddock
          outputfile: filename=aps18_Nov4_Berken.out; title=aps18_Nov4_Berken
            variables
              variables: dd/mm/yyyy as Date, DaysAftersowing, yield, biomass, flowering_das, harvestindex, maturity_das, id
          operations
            04/11/1993  mungbean sow plants = 38.2,crop_class = plant, row_spacing = 500, sowing_depth = 50, cultivar = berken
          fertiliser
          irrigation: same as Mungbean_REMS.aps20.Emerald_high_Dec17.paddock.irrigation
          manager: same as Mungbean_REMS.aps20.Emerald_high_Dec17.paddock.manager
          mungbean
          manager2 Irrigate on date
            # Irrigation will be applied on the date(s) below
            sameDays = yes  # Apply Irrigation on the same day(s) each year? (yes/no) - if "no" then must include the year of application below
            irrigDatesStr = 27-oct  # Dates for one or more Irrigation applications (dd-mmm or dd-mmm-yyyy) as a list with a space between dates
            # Irrigation parameters
            amount = 42  # Amount of irrigation to apply (mm)
            eff = 1.0  # Irrigation efficiency (0-1)
```csharp
using System;
using ModelFramework;
using CSGeneral;

public class Script
{     
   [Link] Irrigation Irrigation;
   [Input] DateTime today;
   [Param] string[] irrigDatesStr;  //a string array holding the dates as text
   [Param] string sameDays;         //if yes, we ignore the year component
   [Param] float amount;           //amount of irrigation to apply (mm)
   [Param] float eff;              //irrigation efficiency

   private DateTime[] irrigDates;   //an array to hold the converted dates
   private bool irrigToday = false; //a variable to hold whether or not we irrigate today
   private int year;
   private string[] split;

   [EventHandler] public void OnInitialised()
   {
      //convert the date strings to APSIM dates
      irrigDates = new DateTime[irrigDatesStr.Length];
      for (int i = 0; i < irrigDates.Length ; i++)
      {
         split = irrigDatesStr[i].Split('-');
         if (split.Length == 3)
         {
            year = Convert.ToInt32(split[2]);
            irrigDates[i] = DateUtility.GetDate(irrigDatesStr[i], year);
         }
         else
            irrigDates[i] = DateUtility.GetDate(irrigDatesStr[i]);
      }
   }

   // The following event handler will be called each day at the start of the day
   [EventHandler] public void OnPrepare()
   {
      irrigToday = false;

      //for every date in our date array
      foreach (DateTime day in irrigDates)
      {
         if (sameDays.ToLower().Equals("yes") && day.Day.Equals(today.Day) && day.Month.Equals(today.Month))
            irrigToday = true;
         else if (day.Day.Equals(today.Day) && day.Month.Equals(today.Month) && day.Year.Equals(today.Year))
            irrigToday = true;  
      }

      if (irrigToday)
      {
         IrrigationApplicationType data = new IrrigationApplicationType();
         data.Amount = amount;
         Irrigation.Set("irrigation_efficiency", eff);
         Irrigation.Apply(data);
      }
   } 
}
```
          manager2 Irrigate on date1
            # Irrigation will be applied on the date(s) below
            sameDays = yes  # Apply Irrigation on the same day(s) each year? (yes/no) - if "no" then must include the year of application below
            irrigDatesStr = 10-nov  # Dates for one or more Irrigation applications (dd-mmm or dd-mmm-yyyy) as a list with a space between dates
            # Irrigation parameters
            amount = 15  # Amount of irrigation to apply (mm)
            eff = 1.0  # Irrigation efficiency (0-1)
            script: same as in Mungbean_REMS.aps18.aps18_Nov4_Berken.paddock.Irrigate on date
          manager2 Irrigate on date2
            # Irrigation will be applied on the date(s) below
            sameDays = yes  # Apply Irrigation on the same day(s) each year? (yes/no) - if "no" then must include the year of application below
            irrigDatesStr = 22-nov  # Dates for one or more Irrigation applications (dd-mmm or dd-mmm-yyyy) as a list with a space between dates
            # Irrigation parameters
            amount = 28  # Amount of irrigation to apply (mm)
            eff = 1.0  # Irrigation efficiency (0-1)
            script: same as in Mungbean_REMS.aps18.aps18_Nov4_Berken.paddock.Irrigate on date
          manager2 Irrigate on date3
            # Irrigation will be applied on the date(s) below
            sameDays = yes  # Apply Irrigation on the same day(s) each year? (yes/no) - if "no" then must include the year of application below
            irrigDatesStr = 01-dec,15-dec,29-dec  # Dates for one or more Irrigation applications (dd-mmm or dd-mmm-yyyy) as a list with a space between dates
            # Irrigation parameters
            amount = 14  # Amount of irrigation to apply (mm)
            eff = 1.0  # Irrigation efficiency (0-1)
            script: same as in Mungbean_REMS.aps18.aps18_Nov4_Berken.paddock.Irrigate on date
          manager2 Irrigate on date4
            # Irrigation will be applied on the date(s) below
            sameDays = yes  # Apply Irrigation on the same day(s) each year? (yes/no) - if "no" then must include the year of application below
            irrigDatesStr = 29-dec  # Dates for one or more Irrigation applications (dd-mmm or dd-mmm-yyyy) as a list with a space between dates
            # Irrigation parameters
            amount = 21  # Amount of irrigation to apply (mm)
            eff = 1.0  # Irrigation efficiency (0-1)
            script: same as in Mungbean_REMS.aps18.aps18_Nov4_Berken.paddock.Irrigate on date
          manager2 Irrigate on date5
            # Irrigation will be applied on the date(s) below
            sameDays = yes  # Apply Irrigation on the same day(s) each year? (yes/no) - if "no" then must include the year of application below
            irrigDatesStr = 04-jan  # Dates for one or more Irrigation applications (dd-mmm or dd-mmm-yyyy) as a list with a space between dates
            # Irrigation parameters
            amount = 18  # Amount of irrigation to apply (mm)
            eff = 1.0  # Irrigation efficiency (0-1)
            script: same as in Mungbean_REMS.aps18.aps18_Nov4_Berken.paddock.Irrigate on date
          surfaceom
            PoolName = wheat  # Organic Matter pool name
            type = wheat  # Organic Matter type
            mass = 500  # Initial surface residue (kg/ha)
            cnr = 40  # C:N ratio of initial residue
            standing_fraction = 0.0  # Fraction of residue standing
          Soil: Latitude=0; Longitude=0; YearOfSampling=0
            Analysis: Thickness=[150, 150, 150, 150, 300, 300, 300, 300]; PH=[7.5, 8, 8, 8, 8, 8, 8, 8]; PHUnits=Water; BoronUnits=HotWater
            Water
              Thickness  BD    AirDry  LL15  DUL    SAT
              150        1.38  0.05    0.18  0.38   0.43
              150        1.34  0.19    0.19  0.38   0.43
              150        1.31  0.22    0.22  0.395  0.45
              150        1.4   0.19    0.19  0.41   0.45
              300        1.45  0.22    0.22  0.4    0.45
              300        1.46  0.19    0.19  0.39   0.44
              300        1.46  0.17    0.17  0.38   0.4
              300        1.46  0.17    0.17  0.38   0.4
              SoilCrop mungbean: LL=[0.2, 0.201, 0.237, 0.192, 0.22, 0.191, 0.249, 0.249]; KL=[0.08, 0.08, 0.08, 0.08, 0.06, 0.04, 0.02, 0.01]; XF=[1, 1, 1, 1, 1, 1, 1, 1]
            InitialWater: FractionFull=1; PercentMethod=EvenlyDistributed; RelativeTo=ll15
            Sample Soil sample: NO3Units=ppm; NH4Units=ppm; SWUnits=Volumetric; OCUnits=Total; PHUnits=Water
              Thickness  NO3  NH4  SW     OC    PH
              150        2    1    0.255  2.2   7.5
              150        2    1    0.322  1.6   8
              150        2    1    0.321  1.35  8
              150        2    1    0.321  0.95  8
              300        2    1    0.243  1     8
              300        2    1    0.211  0.8   8
              300        2    1    0.17   0.45  8
              300        2    1    0.17   0.45  8
            SoilOrganicMatter: RootCN=33; RootWt=0; SoilCN=14.5; EnrACoeff=7.4; EnrBCoeff=0.2; OCUnits=Total
              Thickness  OC    FBiom  FInert
              150        2.2   0.02   0.36
              150        1.6   0.015  0.5
              150        1.35  0.01   0.59
              150        0.95  0.01   0.84
              300        1     0.01   0.8
              300        0.8   0.01   0.99
              300        0.45  0.01   0.99
              300        0.45  0.01   0.99
            SoilWater: SummerCona=3.5; SummerU=6; SummerDate=1-Nov; WinterCona=3.5; WinterU=6; WinterDate=1-Apr; DiffusConst=88; DiffusSlope=35.4; Salb=0.13; CN2Bare=72; CNRed=20; CNCov=0.8; Thickness=[150, 150, 150, 150, 300, 300, 300, 300]; SWCON=[0.4, 0.4, 0.4, 0.4, 0.4, 0.4, 0.4, 0.4]
          manager Empty manager1
            on start_of_day:
            script: same as in Mungbean_REMS.aps20.Emerald_high_Dec17.paddock.Empty manager1
      simulation aps18_Nov4_King
        clock
          start_date = 27/10/1993
          end_date = 30/04/1994
        summaryfile
        metfile met: filename=MetFiles\aps18.met
        area paddock
          fertiliser
          irrigation: same as Mungbean_REMS.aps20.Emerald_high_Dec17.paddock.irrigation
          manager: same as Mungbean_REMS.aps20.Emerald_high_Dec17.paddock.manager
          mungbean
          manager2 Irrigate on date: same as Mungbean_REMS.aps18.aps18_Nov4_Berken.paddock.Irrigate on date
          manager2 Irrigate on date1: same as Mungbean_REMS.aps18.aps18_Nov4_Berken.paddock.Irrigate on date1
          manager2 Irrigate on date2: same as Mungbean_REMS.aps18.aps18_Nov4_Berken.paddock.Irrigate on date2
          manager2 Irrigate on date3: same as Mungbean_REMS.aps18.aps18_Nov4_Berken.paddock.Irrigate on date3
          manager2 Irrigate on date4: same as Mungbean_REMS.aps18.aps18_Nov4_Berken.paddock.Irrigate on date4
          manager2 Irrigate on date5: same as Mungbean_REMS.aps18.aps18_Nov4_Berken.paddock.Irrigate on date5
          surfaceom
            PoolName = wheat  # Organic Matter pool name
            type = wheat  # Organic Matter type
            mass = 500  # Initial surface residue (kg/ha)
            cnr = 40  # C:N ratio of initial residue
            standing_fraction = 0.0  # Fraction of residue standing
          Soil: same as Mungbean_REMS.aps18.aps18_Nov4_Berken.paddock.Soil
          operations
            04/11/1993  mungbean sow plants = 26.0,crop_class = plant, row_spacing = 500, sowing_depth = 50, cultivar = king
          outputfile -> /Mungbean/Mungbean_REMS/aps18/aps18_Nov4_Berken/paddock/outputfile: filename=aps18_Nov4_King.out; title=aps18_Nov4_King
            variables -> /Mungbean/Mungbean_REMS/aps18/aps18_Nov4_Berken/paddock/outputfile/variables
          manager Empty manager2
            on start_of_day:
            script: same as in Mungbean_REMS.aps20.Emerald_low_Dec28.paddock.Empty manager2
      simulation aps18_Nov18_Berken
        clock
          start_date = 27/10/1993
          end_date = 30/04/1994
        summaryfile
        metfile met: filename=MetFiles\aps18.met
        area paddock
          fertiliser
          irrigation: same as Mungbean_REMS.aps20.Emerald_high_Dec17.paddock.irrigation
          manager: same as Mungbean_REMS.aps20.Emerald_high_Dec17.paddock.manager
          mungbean
          manager2 Irrigate on date: same as Mungbean_REMS.aps18.aps18_Nov4_Berken.paddock.Irrigate on date
          manager2 Irrigate on date1: same as Mungbean_REMS.aps18.aps18_Nov4_Berken.paddock.Irrigate on date1
          manager2 Irrigate on date2: same as Mungbean_REMS.aps18.aps18_Nov4_Berken.paddock.Irrigate on date2
          manager2 Irrigate on date3: same as Mungbean_REMS.aps18.aps18_Nov4_Berken.paddock.Irrigate on date3
          manager2 Irrigate on date4: same as Mungbean_REMS.aps18.aps18_Nov4_Berken.paddock.Irrigate on date4
          manager2 Irrigate on date5: same as Mungbean_REMS.aps18.aps18_Nov4_Berken.paddock.Irrigate on date5
          surfaceom
            PoolName = wheat  # Organic Matter pool name
            type = wheat  # Organic Matter type
            mass = 500  # Initial surface residue (kg/ha)
            cnr = 40  # C:N ratio of initial residue
            standing_fraction = 0.0  # Fraction of residue standing
          Soil: same as Mungbean_REMS.aps18.aps18_Nov4_Berken.paddock.Soil
          operations
            18/11/1993  mungbean sow plants = 43.2,crop_class = plant, row_spacing = 500, sowing_depth = 50, cultivar = berken
          outputfile -> /Mungbean/Mungbean_REMS/aps18/aps18_Nov4_Berken/paddock/outputfile: filename=aps18_Nov18_Berken.out; title=aps18_Nov18_Berken
            variables -> /Mungbean/Mungbean_REMS/aps18/aps18_Nov4_Berken/paddock/outputfile/variables
          manager Empty manager2
            on start_of_day:
            script: same as in Mungbean_REMS.aps20.Emerald_low_Dec18.paddock.Empty manager2
      simulation aps18_Nov18_King
        clock
          start_date = 27/10/1993
          end_date = 30/04/1994
        summaryfile
        metfile met: filename=MetFiles\aps18.met
        area paddock
          fertiliser
          irrigation: same as Mungbean_REMS.aps20.Emerald_high_Dec17.paddock.irrigation
          manager: same as Mungbean_REMS.aps20.Emerald_high_Dec17.paddock.manager
          mungbean
          manager2 Irrigate on date: same as Mungbean_REMS.aps18.aps18_Nov4_Berken.paddock.Irrigate on date
          manager2 Irrigate on date1: same as Mungbean_REMS.aps18.aps18_Nov4_Berken.paddock.Irrigate on date1
          manager2 Irrigate on date2: same as Mungbean_REMS.aps18.aps18_Nov4_Berken.paddock.Irrigate on date2
          manager2 Irrigate on date3: same as Mungbean_REMS.aps18.aps18_Nov4_Berken.paddock.Irrigate on date3
          manager2 Irrigate on date4: same as Mungbean_REMS.aps18.aps18_Nov4_Berken.paddock.Irrigate on date4
          manager2 Irrigate on date5: same as Mungbean_REMS.aps18.aps18_Nov4_Berken.paddock.Irrigate on date5
          surfaceom
            PoolName = wheat  # Organic Matter pool name
            type = wheat  # Organic Matter type
            mass = 500  # Initial surface residue (kg/ha)
            cnr = 40  # C:N ratio of initial residue
            standing_fraction = 0.0  # Fraction of residue standing
          Soil: same as Mungbean_REMS.aps18.aps18_Nov4_Berken.paddock.Soil
          operations
            18/11/1993  mungbean sow plants = 12.7,crop_class = plant, row_spacing = 500, sowing_depth = 50, cultivar = king
          outputfile -> /Mungbean/Mungbean_REMS/aps18/aps18_Nov4_Berken/paddock/outputfile: filename=aps18_Nov18_King.out; title=aps18_Nov18_King
            variables -> /Mungbean/Mungbean_REMS/aps18/aps18_Nov4_Berken/paddock/outputfile/variables
          manager Empty manager2
            on start_of_day:
            script: same as in Mungbean_REMS.aps20.Shangtung_low_Dec27.paddock.Empty manager2
      simulation aps18_Dec14_Berken
        clock
          start_date = 27/10/1993
          end_date = 30/04/1994
        summaryfile
        metfile met: filename=MetFiles\aps18.met
        area paddock
          fertiliser
          irrigation: same as Mungbean_REMS.aps20.Emerald_high_Dec17.paddock.irrigation
          manager: same as Mungbean_REMS.aps20.Emerald_high_Dec17.paddock.manager
          mungbean
          manager2 Irrigate on date: same as Mungbean_REMS.aps18.aps18_Nov4_Berken.paddock.Irrigate on date
          manager2 Irrigate on date1: same as Mungbean_REMS.aps18.aps18_Nov4_Berken.paddock.Irrigate on date1
          manager2 Irrigate on date2: same as Mungbean_REMS.aps18.aps18_Nov4_Berken.paddock.Irrigate on date2
          manager2 Irrigate on date3: same as Mungbean_REMS.aps18.aps18_Nov4_Berken.paddock.Irrigate on date3
          manager2 Irrigate on date4: same as Mungbean_REMS.aps18.aps18_Nov4_Berken.paddock.Irrigate on date4
          manager2 Irrigate on date5: same as Mungbean_REMS.aps18.aps18_Nov4_Berken.paddock.Irrigate on date5
          surfaceom
            PoolName = wheat  # Organic Matter pool name
            type = wheat  # Organic Matter type
            mass = 500  # Initial surface residue (kg/ha)
            cnr = 40  # C:N ratio of initial residue
            standing_fraction = 0.0  # Fraction of residue standing
          Soil: same as Mungbean_REMS.aps18.aps18_Nov4_Berken.paddock.Soil
          operations
            14/12/1993  mungbean sow plants = 39.6,crop_class = plant, row_spacing = 500, sowing_depth = 50, cultivar = berken
          outputfile -> /Mungbean/Mungbean_REMS/aps18/aps18_Nov4_Berken/paddock/outputfile: filename=aps18_Dec14_Berken.out; title=aps18_Dec14_Berken
            variables -> /Mungbean/Mungbean_REMS/aps18/aps18_Nov4_Berken/paddock/outputfile/variables
          manager Empty manager2
            on start_of_day:
            script: same as in Mungbean_REMS.aps20.Shangtung_high_Dec18.paddock.Empty manager2
      simulation aps18_Dec14_King
        clock
          start_date = 27/10/1993
          end_date = 30/04/1994
        summaryfile
        metfile met: filename=MetFiles\aps18.met
        area paddock
          fertiliser
          irrigation: same as Mungbean_REMS.aps20.Emerald_high_Dec17.paddock.irrigation
          manager: same as Mungbean_REMS.aps20.Emerald_high_Dec17.paddock.manager
          mungbean
          manager2 Irrigate on date: same as Mungbean_REMS.aps18.aps18_Nov4_Berken.paddock.Irrigate on date
          manager2 Irrigate on date1: same as Mungbean_REMS.aps18.aps18_Nov4_Berken.paddock.Irrigate on date1
          manager2 Irrigate on date2: same as Mungbean_REMS.aps18.aps18_Nov4_Berken.paddock.Irrigate on date2
          manager2 Irrigate on date3: same as Mungbean_REMS.aps18.aps18_Nov4_Berken.paddock.Irrigate on date3
          manager2 Irrigate on date4: same as Mungbean_REMS.aps18.aps18_Nov4_Berken.paddock.Irrigate on date4
          manager2 Irrigate on date5: same as Mungbean_REMS.aps18.aps18_Nov4_Berken.paddock.Irrigate on date5
          surfaceom
            PoolName = wheat  # Organic Matter pool name
            type = wheat  # Organic Matter type
            mass = 500  # Initial surface residue (kg/ha)
            cnr = 40  # C:N ratio of initial residue
            standing_fraction = 0.0  # Fraction of residue standing
          Soil: same as Mungbean_REMS.aps18.aps18_Nov4_Berken.paddock.Soil
          operations
            14/12/1993  mungbean sow plants = 38.7,crop_class = plant, row_spacing = 500, sowing_depth = 50, cultivar = king
          outputfile -> /Mungbean/Mungbean_REMS/aps18/aps18_Nov4_Berken/paddock/outputfile: filename=aps18_Dec14_King.out; title=aps18_Dec14_King
            variables -> /Mungbean/Mungbean_REMS/aps18/aps18_Nov4_Berken/paddock/outputfile/variables
          manager Empty manager2
            on start_of_day:
            script: same as in Mungbean_REMS.aps20.Celera_high_Dec17.paddock.Empty manager2
      simulation aps18_Jan4_Berken
        clock
          start_date = 27/10/1993
          end_date = 30/04/1994
        summaryfile
        metfile met: filename=MetFiles\aps18.met
        area paddock
          fertiliser
          irrigation: same as Mungbean_REMS.aps20.Emerald_high_Dec17.paddock.irrigation
          manager: same as Mungbean_REMS.aps20.Emerald_high_Dec17.paddock.manager
          mungbean
          manager2 Irrigate on date: same as Mungbean_REMS.aps18.aps18_Nov4_Berken.paddock.Irrigate on date
          manager2 Irrigate on date1: same as Mungbean_REMS.aps18.aps18_Nov4_Berken.paddock.Irrigate on date1
          manager2 Irrigate on date2: same as Mungbean_REMS.aps18.aps18_Nov4_Berken.paddock.Irrigate on date2
          manager2 Irrigate on date3: same as Mungbean_REMS.aps18.aps18_Nov4_Berken.paddock.Irrigate on date3
          manager2 Irrigate on date4: same as Mungbean_REMS.aps18.aps18_Nov4_Berken.paddock.Irrigate on date4
          manager2 Irrigate on date5: same as Mungbean_REMS.aps18.aps18_Nov4_Berken.paddock.Irrigate on date5
          surfaceom
            PoolName = wheat  # Organic Matter pool name
            type = wheat  # Organic Matter type
            mass = 500  # Initial surface residue (kg/ha)
            cnr = 40  # C:N ratio of initial residue
            standing_fraction = 0.0  # Fraction of residue standing
          Soil: same as Mungbean_REMS.aps18.aps18_Nov4_Berken.paddock.Soil
          operations
            04/01/1994  mungbean sow plants = 39.6,crop_class = plant, row_spacing = 500, sowing_depth = 50, cultivar = berken
          outputfile -> /Mungbean/Mungbean_REMS/aps18/aps18_Nov4_Berken/paddock/outputfile: filename=aps18_Jan4_Berken.out; title=aps18_Jan4_Berken
            variables -> /Mungbean/Mungbean_REMS/aps18/aps18_Nov4_Berken/paddock/outputfile/variables
          manager Empty manager2
            on start_of_day:
            script: same as in Mungbean_REMS.aps20.Satin_low_Dec20.paddock.Empty manager2
      simulation aps18_Jan4_King
        clock
          start_date = 27/10/1993
          end_date = 30/04/1994
        summaryfile
        metfile met: filename=MetFiles\aps18.met
        area paddock
          fertiliser
          irrigation: same as Mungbean_REMS.aps20.Emerald_high_Dec17.paddock.irrigation
          manager: same as Mungbean_REMS.aps20.Emerald_high_Dec17.paddock.manager
          mungbean
          manager2 Irrigate on date: same as Mungbean_REMS.aps18.aps18_Nov4_Berken.paddock.Irrigate on date
          manager2 Irrigate on date1: same as Mungbean_REMS.aps18.aps18_Nov4_Berken.paddock.Irrigate on date1
          manager2 Irrigate on date2: same as Mungbean_REMS.aps18.aps18_Nov4_Berken.paddock.Irrigate on date2
          manager2 Irrigate on date3: same as Mungbean_REMS.aps18.aps18_Nov4_Berken.paddock.Irrigate on date3
          manager2 Irrigate on date4: same as Mungbean_REMS.aps18.aps18_Nov4_Berken.paddock.Irrigate on date4
          manager2 Irrigate on date5: same as Mungbean_REMS.aps18.aps18_Nov4_Berken.paddock.Irrigate on date5
          surfaceom
            PoolName = wheat  # Organic Matter pool name
            type = wheat  # Organic Matter type
            mass = 500  # Initial surface residue (kg/ha)
            cnr = 40  # C:N ratio of initial residue
            standing_fraction = 0.0  # Fraction of residue standing
          Soil: same as Mungbean_REMS.aps18.aps18_Nov4_Berken.paddock.Soil
          operations
            04/01/1994  mungbean sow plants = 28.6,crop_class = plant, row_spacing = 500, sowing_depth = 50, cultivar = king
          outputfile -> /Mungbean/Mungbean_REMS/aps18/aps18_Nov4_Berken/paddock/outputfile: filename=aps18_Jan4_King.out; title=aps18_Jan4_King
            variables -> /Mungbean/Mungbean_REMS/aps18/aps18_Nov4_Berken/paddock/outputfile/variables
          manager Empty manager2
            on start_of_day:
            script: same as in Mungbean_REMS.aps20.Satin_high_Dec18.paddock.Empty manager2
      simulation aps18_Jan17_King
        clock
          start_date = 27/10/1993
          end_date = 30/04/1994
        summaryfile
        metfile met: filename=MetFiles\aps18.met
        area paddock
          fertiliser
          irrigation: same as Mungbean_REMS.aps20.Emerald_high_Dec17.paddock.irrigation
          manager: same as Mungbean_REMS.aps20.Emerald_high_Dec17.paddock.manager
          mungbean
          manager2 Irrigate on date: same as Mungbean_REMS.aps18.aps18_Nov4_Berken.paddock.Irrigate on date
          manager2 Irrigate on date1: same as Mungbean_REMS.aps18.aps18_Nov4_Berken.paddock.Irrigate on date1
          manager2 Irrigate on date2: same as Mungbean_REMS.aps18.aps18_Nov4_Berken.paddock.Irrigate on date2
          manager2 Irrigate on date3: same as Mungbean_REMS.aps18.aps18_Nov4_Berken.paddock.Irrigate on date3
          manager2 Irrigate on date4: same as Mungbean_REMS.aps18.aps18_Nov4_Berken.paddock.Irrigate on date4
          manager2 Irrigate on date5: same as Mungbean_REMS.aps18.aps18_Nov4_Berken.paddock.Irrigate on date5
          surfaceom
            PoolName = wheat  # Organic Matter pool name
            type = wheat  # Organic Matter type
            mass = 500  # Initial surface residue (kg/ha)
            cnr = 40  # C:N ratio of initial residue
            standing_fraction = 0.0  # Fraction of residue standing
          Soil: same as Mungbean_REMS.aps18.aps18_Nov4_Berken.paddock.Soil
          operations
            17/01/1994  mungbean sow plants = 27.6,crop_class = plant, row_spacing = 500, sowing_depth = 50, cultivar = king
          outputfile -> /Mungbean/Mungbean_REMS/aps18/aps18_Nov4_Berken/paddock/outputfile: filename=aps18_Jan17_King.out; title=aps18_Jan17_King
            variables -> /Mungbean/Mungbean_REMS/aps18/aps18_Nov4_Berken/paddock/outputfile/variables
          manager Empty manager2
            on start_of_day:
```
if leafGreenWt>0 then
SLA=leaf_area/leafGreenWt
endif

if biomass>0 then
HarvestIndex=yield/biomass
endif

id=9
```
      simulation aps18_Feb1_King
        clock
          start_date = 27/10/1993
          end_date = 30/04/1994
        summaryfile
        metfile met: filename=MetFiles\aps18.met
        area paddock
          fertiliser
          irrigation: same as Mungbean_REMS.aps20.Emerald_high_Dec17.paddock.irrigation
          manager: same as Mungbean_REMS.aps20.Emerald_high_Dec17.paddock.manager
          mungbean
          manager2 Irrigate on date: same as Mungbean_REMS.aps18.aps18_Nov4_Berken.paddock.Irrigate on date
          manager2 Irrigate on date1: same as Mungbean_REMS.aps18.aps18_Nov4_Berken.paddock.Irrigate on date1
          manager2 Irrigate on date2: same as Mungbean_REMS.aps18.aps18_Nov4_Berken.paddock.Irrigate on date2
          manager2 Irrigate on date3: same as Mungbean_REMS.aps18.aps18_Nov4_Berken.paddock.Irrigate on date3
          manager2 Irrigate on date4: same as Mungbean_REMS.aps18.aps18_Nov4_Berken.paddock.Irrigate on date4
          manager2 Irrigate on date5: same as Mungbean_REMS.aps18.aps18_Nov4_Berken.paddock.Irrigate on date5
          surfaceom
            PoolName = wheat  # Organic Matter pool name
            type = wheat  # Organic Matter type
            mass = 500  # Initial surface residue (kg/ha)
            cnr = 40  # C:N ratio of initial residue
            standing_fraction = 0.0  # Fraction of residue standing
          Soil: same as Mungbean_REMS.aps18.aps18_Nov4_Berken.paddock.Soil
          operations
            01/02/1994  mungbean sow plants = 32.7,crop_class = plant, row_spacing = 500, sowing_depth = 50, cultivar = king
          outputfile -> /Mungbean/Mungbean_REMS/aps18/aps18_Nov4_Berken/paddock/outputfile: filename=aps18_Feb1_King.out; title=aps18_Feb1_King
            variables -> /Mungbean/Mungbean_REMS/aps18/aps18_Nov4_Berken/paddock/outputfile/variables
          manager Empty manager2
            on start_of_day:
```
if leafGreenWt>0 then
SLA=leaf_area/leafGreenWt
endif

if biomass>0 then
HarvestIndex=yield/biomass
endif

id=10
```
    folder aps1
      simulation aps1_High
        clock: start_date=25/1/1991; end_date=20/4/1991
        summaryfile
        metfile met: filename=MetFiles\GAT9091.met
        area paddock
          outputfile: filename=aps1_High.out; title=aps1_High
            variables
              variables: dd/mm/yyyy as Date, DaysAftersowing, yield, biomass, lai, leafGreenWt, StemTotalWt, PodTotalWt, flowering_das, harvestindex, SLA, leafGreennconc, StemGreenN, StemGreennconc, Grainnconc, leafGreenN, grain_n, biomass_n, SLN, id
          operations
            01/02/1991  mungbean sow plants = 36.2,crop_class = plant, row_spacing = 320, sowing_depth = 50, cultivar = berken
          fertiliser
          irrigation: same as Mungbean_REMS.aps20.Emerald_high_Dec17.paddock.irrigation
          manager
            on init:
```
                 dateset = 0
                 emer_date = 0
                 endjuv_date = 0
                 anth_date = 0
                 mat_date = 0
```
            on end_of_day:
            script: same as in Mungbean_REMS.aps20.Emerald_high_Dec17.paddock.manager
          Soil: Latitude=0; Longitude=0; YearOfSampling=0
            InitialWater Initial water: FractionFull=1; PercentMethod=EvenlyDistributed
            Water: same as Mungbean_REMS.aps18.aps18_Nov4_Berken.paddock.Soil.Water
            SoilWater: SummerCona=3.5; SummerU=6; SummerDate=1-Nov; WinterCona=3.5; WinterU=6; WinterDate=1-Apr; DiffusConst=88; DiffusSlope=35.4; Salb=0.13; CN2Bare=72; CNRed=20; CNCov=0.8; Thickness=[150, 150, 150, 150, 300, 300, 300, 300]; SWCON=[0.38, 0.38, 0.395, 0.41, 0.4, 0.39, 0.38, 0.38]
            SoilOrganicMatter: same as Mungbean_REMS.aps18.aps18_Nov4_Berken.paddock.Soil.SoilOrganicMatter
            Analysis: Thickness=[150, 150, 150, 150, 300, 300, 300, 300]; PH=[7.5, 8, 8, 8, 8, 8, 8, 8]; PHUnits=Water; BoronUnits=HotWater
            Sample Initial nitrogen: NO3Units=ppm; NH4Units=ppm; SWUnits=Volumetric; OCUnits=Total; PHUnits=Water
              Thickness  NO3  NH4
              150        2    1
              150        2    1
              150        2    1
              150        2    1
              300        2    1
              300        2    1
              300        2    1
              300        2    1
          surfaceom
            PoolName = wheat  # Organic Matter pool name
            type = wheat  # Organic Matter type
            mass = 500  # Initial surface residue (kg/ha)
            cnr = 40  # C:N ratio of initial residue
            standing_fraction = 0.0  # Fraction of residue standing
          mungbean
          manager2 Irrigate on date
            # Irrigation will be applied on the date(s) below
            sameDays = yes  # Apply Irrigation on the same day(s) each year? (yes/no) - if "no" then must include the year of application below
            irrigDatesStr = 01-feb, 07-apr  # Dates for one or more Irrigation applications (dd-mmm or dd-mmm-yyyy) as a list with a space between dates
            # Irrigation parameters
            amount = 6  # Amount of irrigation to apply (mm)
            eff = 1.0  # Irrigation efficiency (0-1)
            script: same as in Mungbean_REMS.aps18.aps18_Nov4_Berken.paddock.Irrigate on date
          manager2 Irrigate on date1
            # Irrigation will be applied on the date(s) below
            sameDays = yes  # Apply Irrigation on the same day(s) each year? (yes/no) - if "no" then must include the year of application below
            irrigDatesStr = 05-feb, 19-apr  # Dates for one or more Irrigation applications (dd-mmm or dd-mmm-yyyy) as a list with a space between dates
            # Irrigation parameters
            amount = 10  # Amount of irrigation to apply (mm)
            eff = 1.0  # Irrigation efficiency (0-1)
            script: same as in Mungbean_REMS.aps18.aps18_Nov4_Berken.paddock.Irrigate on date
          manager2 Irrigate on date2
            # Irrigation will be applied on the date(s) below
            sameDays = yes  # Apply Irrigation on the same day(s) each year? (yes/no) - if "no" then must include the year of application below
            irrigDatesStr = 21-feb, 26-feb, 08-mar, 15-may  # Dates for one or more Irrigation applications (dd-mmm or dd-mmm-yyyy) as a list with a space between dates
            # Irrigation parameters
            amount = 15  # Amount of irrigation to apply (mm)
            eff = 1.0  # Irrigation efficiency (0-1)
            script: same as in Mungbean_REMS.aps18.aps18_Nov4_Berken.paddock.Irrigate on date
          manager2 Irrigate on date3
            # Irrigation will be applied on the date(s) below
            sameDays = yes  # Apply Irrigation on the same day(s) each year? (yes/no) - if "no" then must include the year of application below
            irrigDatesStr = 01-mar  # Dates for one or more Irrigation applications (dd-mmm or dd-mmm-yyyy) as a list with a space between dates
            # Irrigation parameters
            amount = 20  # Amount of irrigation to apply (mm)
            eff = 1.0  # Irrigation efficiency (0-1)
            script: same as in Mungbean_REMS.aps18.aps18_Nov4_Berken.paddock.Irrigate on date
          manager2 Irrigate on date4
            # Irrigation will be applied on the date(s) below
            sameDays = yes  # Apply Irrigation on the same day(s) each year? (yes/no) - if "no" then must include the year of application below
            irrigDatesStr = 12-mar  # Dates for one or more Irrigation applications (dd-mmm or dd-mmm-yyyy) as a list with a space between dates
            # Irrigation parameters
            amount = 37  # Amount of irrigation to apply (mm)
            eff = 1.0  # Irrigation efficiency (0-1)
            script: same as in Mungbean_REMS.aps18.aps18_Nov4_Berken.paddock.Irrigate on date
          manager2 Irrigate on date5
            # Irrigation will be applied on the date(s) below
            sameDays = yes  # Apply Irrigation on the same day(s) each year? (yes/no) - if "no" then must include the year of application below
            irrigDatesStr = 15-mar  # Dates for one or more Irrigation applications (dd-mmm or dd-mmm-yyyy) as a list with a space between dates
            # Irrigation parameters
            amount = 18  # Amount of irrigation to apply (mm)
            eff = 1.0  # Irrigation efficiency (0-1)
            script: same as in Mungbean_REMS.aps18.aps18_Nov4_Berken.paddock.Irrigate on date
          manager2 Irrigate on date6
            # Irrigation will be applied on the date(s) below
            sameDays = yes  # Apply Irrigation on the same day(s) each year? (yes/no) - if "no" then must include the year of application below
            irrigDatesStr = 19-mar  # Dates for one or more Irrigation applications (dd-mmm or dd-mmm-yyyy) as a list with a space between dates
            # Irrigation parameters
            amount = 17  # Amount of irrigation to apply (mm)
            eff = 1.0  # Irrigation efficiency (0-1)
            script: same as in Mungbean_REMS.aps18.aps18_Nov4_Berken.paddock.Irrigate on date
          manager2 Irrigate on date7
            # Irrigation will be applied on the date(s) below
            sameDays = yes  # Apply Irrigation on the same day(s) each year? (yes/no) - if "no" then must include the year of application below
            irrigDatesStr = 21-mar, 12-apr  # Dates for one or more Irrigation applications (dd-mmm or dd-mmm-yyyy) as a list with a space between dates
            # Irrigation parameters
            amount = 16  # Amount of irrigation to apply (mm)
            eff = 1.0  # Irrigation efficiency (0-1)
            script: same as in Mungbean_REMS.aps18.aps18_Nov4_Berken.paddock.Irrigate on date
          manager2 Irrigate on date8
            # Irrigation will be applied on the date(s) below
            sameDays = yes  # Apply Irrigation on the same day(s) each year? (yes/no) - if "no" then must include the year of application below
            irrigDatesStr = 27-mar 05-may  # Dates for one or more Irrigation applications (dd-mmm or dd-mmm-yyyy) as a list with a space between dates
            # Irrigation parameters
            amount = 35  # Amount of irrigation to apply (mm)
            eff = 1.0  # Irrigation efficiency (0-1)
            script: same as in Mungbean_REMS.aps18.aps18_Nov4_Berken.paddock.Irrigate on date
          manager2 Irrigate on date9
            # Irrigation will be applied on the date(s) below
            sameDays = yes  # Apply Irrigation on the same day(s) each year? (yes/no) - if "no" then must include the year of application below
            irrigDatesStr = 03-apr  # Dates for one or more Irrigation applications (dd-mmm or dd-mmm-yyyy) as a list with a space between dates
            # Irrigation parameters
            amount = 12  # Amount of irrigation to apply (mm)
            eff = 1.0  # Irrigation efficiency (0-1)
            script: same as in Mungbean_REMS.aps18.aps18_Nov4_Berken.paddock.Irrigate on date
          manager2 Irrigate on date10
            # Irrigation will be applied on the date(s) below
            sameDays = yes  # Apply Irrigation on the same day(s) each year? (yes/no) - if "no" then must include the year of application below
            irrigDatesStr = 12-apr  # Dates for one or more Irrigation applications (dd-mmm or dd-mmm-yyyy) as a list with a space between dates
            # Irrigation parameters
            amount = 16  # Amount of irrigation to apply (mm)
            eff = 1.0  # Irrigation efficiency (0-1)
            script: same as in Mungbean_REMS.aps18.aps18_Nov4_Berken.paddock.Irrigate on date
          manager2 Irrigate on date11
            # Irrigation will be applied on the date(s) below
            sameDays = yes  # Apply Irrigation on the same day(s) each year? (yes/no) - if "no" then must include the year of application below
            irrigDatesStr = 15-apr  # Dates for one or more Irrigation applications (dd-mmm or dd-mmm-yyyy) as a list with a space between dates
            # Irrigation parameters
            amount = 8  # Amount of irrigation to apply (mm)
            eff = 1.0  # Irrigation efficiency (0-1)
            script: same as in Mungbean_REMS.aps18.aps18_Nov4_Berken.paddock.Irrigate on date
          manager2 Irrigate on date12
            # Irrigation will be applied on the date(s) below
            sameDays = yes  # Apply Irrigation on the same day(s) each year? (yes/no) - if "no" then must include the year of application below
            irrigDatesStr = 22-apr  # Dates for one or more Irrigation applications (dd-mmm or dd-mmm-yyyy) as a list with a space between dates
            # Irrigation parameters
            amount = 5  # Amount of irrigation to apply (mm)
            eff = 1.0  # Irrigation efficiency (0-1)
            script: same as in Mungbean_REMS.aps18.aps18_Nov4_Berken.paddock.Irrigate on date
          manager Empty manager1
            on start_of_day:
            script: same as in Mungbean_REMS.aps20.Emerald_high_Dec17.paddock.Empty manager1
      simulation aps1_Low
        clock: start_date=25/1/1991; end_date=20/4/1991
        summaryfile
        metfile met: filename=MetFiles\GAT9091.met
        area paddock
          outputfile: filename=aps1_Low.out; title=aps1_Low
            variables -> /Mungbean/Mungbean_REMS/aps1/aps1_High/paddock/outputfile/variables
          fertiliser
          irrigation: same as Mungbean_REMS.aps20.Emerald_high_Dec17.paddock.irrigation
          manager: same as Mungbean_REMS.aps20.Emerald_high_Dec17.paddock.manager
          Soil: same as Mungbean_REMS.aps1.aps1_High.paddock.soil
          surfaceom
            PoolName = wheat  # Organic Matter pool name
            type = wheat  # Organic Matter type
            mass = 500  # Initial surface residue (kg/ha)
            cnr = 40  # C:N ratio of initial residue
            standing_fraction = 0.0  # Fraction of residue standing
          mungbean
          manager2 Irrigate on date: same as Mungbean_REMS.aps1.aps1_High.paddock.Irrigate on date
          manager2 Irrigate on date1: same as Mungbean_REMS.aps1.aps1_High.paddock.Irrigate on date1
          manager2 Irrigate on date2: same as Mungbean_REMS.aps1.aps1_High.paddock.Irrigate on date2
          manager2 Irrigate on date3: same as Mungbean_REMS.aps1.aps1_High.paddock.Irrigate on date3
          manager2 Irrigate on date4: same as Mungbean_REMS.aps1.aps1_High.paddock.Irrigate on date4
          manager2 Irrigate on date5: same as Mungbean_REMS.aps1.aps1_High.paddock.Irrigate on date5
          manager2 Irrigate on date6: same as Mungbean_REMS.aps1.aps1_High.paddock.Irrigate on date6
          manager2 Irrigate on date7: same as Mungbean_REMS.aps1.aps1_High.paddock.Irrigate on date7
          manager2 Irrigate on date8: same as Mungbean_REMS.aps1.aps1_High.paddock.Irrigate on date8
          manager2 Irrigate on date9: same as Mungbean_REMS.aps1.aps1_High.paddock.Irrigate on date9
          manager2 Irrigate on date10: same as Mungbean_REMS.aps1.aps1_High.paddock.Irrigate on date10
          manager2 Irrigate on date11: same as Mungbean_REMS.aps1.aps1_High.paddock.Irrigate on date11
          manager2 Irrigate on date12: same as Mungbean_REMS.aps1.aps1_High.paddock.Irrigate on date12
          operations
            01/02/1991  mungbean sow plants = 10.7,crop_class = plant, row_spacing = 320, sowing_depth = 50, cultivar = berken
          manager Empty manager1
            on start_of_day:
            script: same as in Mungbean_REMS.aps20.Emerald_low_Dec28.paddock.Empty manager2
    folder NT10
      simulation NT10SowKing_low_Jan1
        clock: start_date=7/9/1987; end_date=29/5/1988
        summaryfile
        metfile met: filename=MetFiles\krs8788.met
        area paddock
          operations
            01/01/1988  mungbean sow plants = 10, sowing_depth = 30,crop_class = plant, row_spacing = 360, cultivar = king
          fertiliser
          irrigation: same as Mungbean_REMS.aps20.Emerald_high_Dec17.paddock.irrigation
          manager: same as Mungbean_REMS.aps20.Emerald_high_Dec17.paddock.manager
          Soil
            InitialWater Initial water: FractionFull=1; PercentMethod=EvenlyDistributed
            Water
              Thickness  BD     AirDry  LL15   DUL    SAT
              150.0      1.560  0.053   0.19   0.304  0.315
              150.0      1.520  0.08    0.21   0.31   0.330
              150.0      1.460  0.21    0.21   0.31   0.337
              150.0      1.460  0.223   0.223  0.324  0.340
              150.0      1.420  0.219   0.219  0.328  0.340
              150.0      1.420  0.219   0.219  0.328  0.341
              300.0      1.460  0.219   0.219  0.325  0.344
              300.0      1.500  0.229   0.229  0.337  0.346
              300.0      1.530  0.237   0.237  0.35   0.370
              SoilCrop mungbean
                LL=[0.19, 0.21, 0.21, 0.235, 0.233, 0.242, 0.248, 0.277, 0.285]
                KL=[0.16, 0.16, 0.12, 0.10, 0.10, 0.08, 0.06, 0.04, 0.03]
                XF=[1.0, 1.0, 1.0, 1.0, 1.0, 1.0, 1.0, 0.0, 0.0]
            SoilWater: SummerCona=6.6; SummerU=1.5; SummerDate=1-Nov; WinterCona=6.6; WinterU=1.5; WinterDate=1-Apr; DiffusConst=88; DiffusSlope=35.4; Salb=0.2; CN2Bare=70; CNRed=20; CNCov=0.8; Thickness=[150, 150, 150, 150, 150, 150, 300, 300, 300]
              SWCON=[0.19, 0.21, 0.21, 0.223, 0.219, 0.219, 0.219, 0.229, 0.237]
            SoilOrganicMatter: RootCN=33; RootWt=0; SoilCN=14.5; EnrACoeff=7.4; EnrBCoeff=0.2; OCUnits=Total
              Thickness  OC    FBiom  FInert
              150        1.27  0.05   0.39
              150        0.59  0.02   0.47
              150        0.34  0.015  0.52
              150        0.34  0.01   0.62
              150        0.26  0.01   0.74
              150        0.26  0.01   0.83
              300        0.25  0.01   0.93
              300        0.19  0.01   0.93
              300        0.21  0.01   0.93
            Analysis
              Thickness=[150.0, 150.0, 150.0, 150.0, 150.0, 150.0, 300.0, 300.0, 300.0]
              PH=[6.500, 6.200, 6.300, 6.400, 6.500, 6.600, 6.600, 6.500, 6.500]
            Sample Initial nitrogen: NO3Units=ppm; NH4Units=ppm; SWUnits=Volumetric; OCUnits=Total; PHUnits=Water
              Thickness  NO3  NH4
              150        2    1
              150        2    1
              150        2    1
              150        2    1
              150        2    1
              150        2    1
              300        2    1
              300        2    1
          surfaceom
            PoolName = wheat  # Organic Matter pool name
            type = wheat  # Organic Matter type
            mass = 500  # Initial surface residue (kg/ha)
            cnr = 40  # C:N ratio of initial residue
            standing_fraction = 0.0  # Fraction of residue standing
          mungbean
          manager Empty manager1
            on start_of_day:
            script: same as in Mungbean_REMS.aps20.Emerald_high_Dec17.paddock.Empty manager1
          outputfile: filename=NT10SowKing_low_Jan1.out; title=NT10SowKing_low_Jan1
            variables
              variables: dd/mm/yyyy as Date, DaysAftersowing, yield, biomass, flowering_das, harvestindex, maturity_das, id
      simulation NT10SowKing_medium_Jan1
        clock: start_date=7/9/1987; end_date=29/5/1988
        summaryfile
        metfile met: filename=MetFiles\krs8788.met
        area paddock
          fertiliser
          irrigation: same as Mungbean_REMS.aps20.Emerald_high_Dec17.paddock.irrigation
          manager: same as Mungbean_REMS.aps20.Emerald_high_Dec17.paddock.manager
          Soil: same as Mungbean_REMS.NT10.NT10SowKing_low_Jan1.paddock.soil
          surfaceom
            PoolName = wheat  # Organic Matter pool name
            type = wheat  # Organic Matter type
            mass = 500  # Initial surface residue (kg/ha)
            cnr = 40  # C:N ratio of initial residue
            standing_fraction = 0.0  # Fraction of residue standing
          mungbean
          operations
            01/01/1988  mungbean sow plants = 20, sowing_depth = 30,crop_class = plant, row_spacing = 360, cultivar = king
          manager Empty manager2
            on start_of_day:
            script: same as in Mungbean_REMS.aps20.Emerald_low_Dec28.paddock.Empty manager2
          outputfile -> /Mungbean/Mungbean_REMS/NT10/NT10SowKing_low_Jan1/paddock/outputfile: filename=NT10SowKing_medium_Jan1.out; title=NT10SowKing_medium_Jan1
            variables -> /Mungbean/Mungbean_REMS/NT10/NT10SowKing_low_Jan1/paddock/outputfile/variables
      simulation NT10SowKing_high_Jan1
        clock: start_date=7/9/1987; end_date=29/5/1988
        summaryfile
        metfile met: filename=MetFiles\krs8788.met
        area paddock
          fertiliser
          irrigation: same as Mungbean_REMS.aps20.Emerald_high_Dec17.paddock.irrigation
          manager: same as Mungbean_REMS.aps20.Emerald_high_Dec17.paddock.manager
          Soil: same as Mungbean_REMS.NT10.NT10SowKing_low_Jan1.paddock.soil
          surfaceom
            PoolName = wheat  # Organic Matter pool name
            type = wheat  # Organic Matter type
            mass = 500  # Initial surface residue (kg/ha)
            cnr = 40  # C:N ratio of initial residue
            standing_fraction = 0.0  # Fraction of residue standing
          mungbean
          operations
            01/01/1988  mungbean sow plants = 40, sowing_depth = 30,crop_class = plant, row_spacing = 360, cultivar = king
          manager Empty manager2
            on start_of_day:
            script: same as in Mungbean_REMS.aps20.Emerald_low_Dec18.paddock.Empty manager2
          outputfile -> /Mungbean/Mungbean_REMS/NT10/NT10SowKing_low_Jan1/paddock/outputfile: filename=NT10SowKing_high_Jan1.out; title=NT10SowKing_high_Jan1
            variables -> /Mungbean/Mungbean_REMS/NT10/NT10SowKing_low_Jan1/paddock/outputfile/variables
      simulation NT10SowKing_low_Jan17
        clock: start_date=7/9/1987; end_date=29/5/1988
        summaryfile
        metfile met: filename=MetFiles\krs8788.met
        area paddock
          fertiliser
          irrigation: same as Mungbean_REMS.aps20.Emerald_high_Dec17.paddock.irrigation
          manager: same as Mungbean_REMS.aps20.Emerald_high_Dec17.paddock.manager
          Soil: same as Mungbean_REMS.NT10.NT10SowKing_low_Jan1.paddock.soil
          surfaceom
            PoolName = wheat  # Organic Matter pool name
            type = wheat  # Organic Matter type
            mass = 500  # Initial surface residue (kg/ha)
            cnr = 40  # C:N ratio of initial residue
            standing_fraction = 0.0  # Fraction of residue standing
          mungbean
          operations
            17/01/1988  mungbean sow plants = 10, sowing_depth = 30,crop_class = plant, row_spacing = 360, cultivar = king
          manager Empty manager2
            on start_of_day:
            script: same as in Mungbean_REMS.aps20.Shangtung_low_Dec27.paddock.Empty manager2
          outputfile -> /Mungbean/Mungbean_REMS/NT10/NT10SowKing_low_Jan1/paddock/outputfile: filename=NT10SowKing_low_Jan17.out; title=NT10SowKing_low_Jan17
            variables -> /Mungbean/Mungbean_REMS/NT10/NT10SowKing_low_Jan1/paddock/outputfile/variables
      simulation NT10SowKing_medium_Jan17
        clock: start_date=7/9/1987; end_date=29/5/1988
        summaryfile
        metfile met: filename=MetFiles\krs8788.met
        area paddock
          fertiliser
          irrigation: same as Mungbean_REMS.aps20.Emerald_high_Dec17.paddock.irrigation
          manager: same as Mungbean_REMS.aps20.Emerald_high_Dec17.paddock.manager
          Soil: same as Mungbean_REMS.NT10.NT10SowKing_low_Jan1.paddock.soil
          surfaceom
            PoolName = wheat  # Organic Matter pool name
            type = wheat  # Organic Matter type
            mass = 500  # Initial surface residue (kg/ha)
            cnr = 40  # C:N ratio of initial residue
            standing_fraction = 0.0  # Fraction of residue standing
          mungbean
          operations
            17/01/1988  mungbean sow plants = 20, sowing_depth = 30,crop_class = plant, row_spacing = 360, cultivar = king
          manager Empty manager2
            on start_of_day:
            script: same as in Mungbean_REMS.aps20.Shangtung_high_Dec18.paddock.Empty manager2
          outputfile -> /Mungbean/Mungbean_REMS/NT10/NT10SowKing_low_Jan1/paddock/outputfile: filename=NT10SowKing_medium_Jan17.out; title=NT10SowKing_medium_Jan17
            variables -> /Mungbean/Mungbean_REMS/NT10/NT10SowKing_low_Jan1/paddock/outputfile/variables
      simulation NT10SowKing_high_Jan17
        clock: start_date=7/9/1987; end_date=29/5/1988
        summaryfile
        metfile met: filename=MetFiles\krs8788.met
        area paddock
          fertiliser
          irrigation: same as Mungbean_REMS.aps20.Emerald_high_Dec17.paddock.irrigation
          manager: same as Mungbean_REMS.aps20.Emerald_high_Dec17.paddock.manager
          Soil: same as Mungbean_REMS.NT10.NT10SowKing_low_Jan1.paddock.soil
          surfaceom
            PoolName = wheat  # Organic Matter pool name
            type = wheat  # Organic Matter type
            mass = 500  # Initial surface residue (kg/ha)
            cnr = 40  # C:N ratio of initial residue
            standing_fraction = 0.0  # Fraction of residue standing
          mungbean
          operations
            17/01/1988  mungbean sow plants = 40, sowing_depth = 30,crop_class = plant, row_spacing = 360, cultivar = king
          manager Empty manager2
            on start_of_day:
            script: same as in Mungbean_REMS.aps20.Celera_high_Dec17.paddock.Empty manager2
          outputfile -> /Mungbean/Mungbean_REMS/NT10/NT10SowKing_low_Jan1/paddock/outputfile: filename=NT10SowKing_high_Jan17.out; title=NT10SowKing_high_Jan17
            variables -> /Mungbean/Mungbean_REMS/NT10/NT10SowKing_low_Jan1/paddock/outputfile/variables
      simulation NT10SowPutland_low_Jan17
        clock: start_date=7/9/1987; end_date=29/5/1988
        summaryfile
        metfile met: filename=MetFiles\krs8788.met
        area paddock
          fertiliser
          irrigation: same as Mungbean_REMS.aps20.Emerald_high_Dec17.paddock.irrigation
          manager: same as Mungbean_REMS.aps20.Emerald_high_Dec17.paddock.manager
          Soil: Latitude=0; Longitude=0; YearOfSampling=0
            InitialWater Initial water: FractionFull=1; PercentMethod=EvenlyDistributed
            Water: same as Mungbean_REMS.NT10.NT10SowKing_low_Jan1.paddock.soil.Water
            SoilWater: same as Mungbean_REMS.NT10.NT10SowKing_low_Jan1.paddock.soil.SoilWater
            SoilOrganicMatter: same as Mungbean_REMS.NT10.NT10SowKing_low_Jan1.paddock.soil.SoilOrganicMatter
            Analysis
              Thickness=[150.0, 150.0, 150.0, 150.0, 150.0, 150.0, 300.0, 300.0, 300.0]
              PH=[6.500, 6.200, 6.300, 6.400, 6.500, 6.600, 6.600, 6.500, 6.500]
            Sample Initial nitrogen: NO3Units=ppm; NH4Units=ppm; SWUnits=Volumetric; OCUnits=Total; PHUnits=Water
              Thickness  NO3  NH4
              150        2    1
              150        2    1
              150        2    1
              150        2    1
              150        2    1
              150        2    1
              300        2    1
              300        2    1
          surfaceom
            PoolName = wheat  # Organic Matter pool name
            type = wheat  # Organic Matter type
            mass = 500  # Initial surface residue (kg/ha)
            cnr = 40  # C:N ratio of initial residue
            standing_fraction = 0.0  # Fraction of residue standing
          mungbean
          operations
            17/01/1988  mungbean sow plants = 10, sowing_depth = 30,crop_class = plant, row_spacing = 360, cultivar = putland
          manager Empty manager2
            on start_of_day:
            script: same as in Mungbean_REMS.aps20.Satin_low_Dec20.paddock.Empty manager2
          outputfile -> /Mungbean/Mungbean_REMS/NT10/NT10SowKing_low_Jan1/paddock/outputfile: filename=NT10SowPutland_low_Jan17.out; title=NT10SowPutland_low_Jan17
            variables -> /Mungbean/Mungbean_REMS/NT10/NT10SowKing_low_Jan1/paddock/outputfile/variables
      simulation NT10SowPutland_medium_Jan17
        clock: start_date=7/9/1987; end_date=29/5/1988
        summaryfile
        metfile met: filename=MetFiles\krs8788.met
        area paddock
          fertiliser
          irrigation: same as Mungbean_REMS.aps20.Emerald_high_Dec17.paddock.irrigation
          manager: same as Mungbean_REMS.aps20.Emerald_high_Dec17.paddock.manager
          Soil: same as Mungbean_REMS.NT10.NT10SowPutland_low_Jan17.paddock.soil
          surfaceom
            PoolName = wheat  # Organic Matter pool name
            type = wheat  # Organic Matter type
            mass = 500  # Initial surface residue (kg/ha)
            cnr = 40  # C:N ratio of initial residue
            standing_fraction = 0.0  # Fraction of residue standing
          mungbean
          operations
            17/01/1988  mungbean sow plants = 20, sowing_depth = 30,crop_class = plant, row_spacing = 360, cultivar = putland
          manager Empty manager2
            on start_of_day:
            script: same as in Mungbean_REMS.aps20.Satin_high_Dec18.paddock.Empty manager2
          outputfile -> /Mungbean/Mungbean_REMS/NT10/NT10SowKing_low_Jan1/paddock/outputfile: filename=NT10SowPutland_medium_Jan17.out; title=NT10SowPutland_medium_Jan17
            variables -> /Mungbean/Mungbean_REMS/NT10/NT10SowKing_low_Jan1/paddock/outputfile/variables
      simulation NT10SowPutland_high_Jan17
        clock: start_date=7/9/1987; end_date=29/5/1988
        summaryfile
        metfile met: filename=MetFiles\krs8788.met
        area paddock
          fertiliser
          irrigation: same as Mungbean_REMS.aps20.Emerald_high_Dec17.paddock.irrigation
          manager: same as Mungbean_REMS.aps20.Emerald_high_Dec17.paddock.manager
          Soil: same as Mungbean_REMS.NT10.NT10SowPutland_low_Jan17.paddock.soil
          surfaceom
            PoolName = wheat  # Organic Matter pool name
            type = wheat  # Organic Matter type
            mass = 500  # Initial surface residue (kg/ha)
            cnr = 40  # C:N ratio of initial residue
            standing_fraction = 0.0  # Fraction of residue standing
          mungbean
          operations
            17/01/1988  mungbean sow plants = 40, sowing_depth = 30,crop_class = plant, row_spacing = 360, cultivar = putland
          manager Empty manager2
            on start_of_day:
            script: same as in Mungbean_REMS.aps18.aps18_Jan17_King.paddock.Empty manager2
          outputfile -> /Mungbean/Mungbean_REMS/NT10/NT10SowKing_low_Jan1/paddock/outputfile: filename=NT10SowPutland_high_Jan17.out; title=NT10SowPutland_high_Jan17
            variables -> /Mungbean/Mungbean_REMS/NT10/NT10SowKing_low_Jan1/paddock/outputfile/variables
    folder NT4
      simulation NT4King_Jan4
        clock: start_date=7/9/1989; end_date=30/5/1990
        summaryfile
        metfile met: filename=MetFiles\krs8990.met
        area paddock
          operations
            04/01/1990  mungbean sow plants = 40, sowing_depth = 30, cultivar = king ,crop_class = plant
          fertiliser
          irrigation
            automatic_irrigation = on
            asw_depth = 1000  # Depth to which ASW is calculated. (mm)
            crit_fr_asw = 0.70  # Fraction of ASW below which irrigation is applied (0-1.0)
            irrigation_efficiency = 1  # Efficiency of the irrigation. (0-1.0)
            irrigation_allocation = off  # Allocation limits
            allocation = 0  # Allocation in mm
            default_no3_conc = 0.0  # Nitrate concentration (ppm N)
            default_nh4_conc = 0.0  # Ammonium concentration (ppm N)
            default_cl_conc = 0.0  # Chloride concentration (ppm Cl)
          manager: same as Mungbean_REMS.aps20.Emerald_high_Dec17.paddock.manager
          Soil
            InitialWater Initial water: FractionFull=1; PercentMethod=EvenlyDistributed
            Water
              Thickness  BD    AirDry  LL15   DUL    SAT
              150        1.56  0.053   0.19   0.304  0.315
              150        1.52  0.08    0.21   0.31   0.33
              150        1.46  0.21    0.21   0.31   0.337
              150        1.46  0.223   0.223  0.324  0.34
              150        1.42  0.219   0.219  0.328  0.34
              150        1.42  0.219   0.219  0.328  0.341
              300        1.46  0.219   0.219  0.325  0.344
              300        1.5   0.229   0.229  0.337  0.346
              300        1.53  0.237   0.237  0.35   0.37
              SoilCrop mungbean
                LL=[0.19, 0.21, 0.21, 0.235, 0.233, 0.242, 0.248, 0.277, 0.285]
                KL=[0.16, 0.16, 0.12, 0.1, 0.1, 0.08, 0.06, 0.04, 0.03]
                XF=[1, 1, 1, 1, 1, 1, 1, 0, 0]
            SoilWater: SummerCona=6.6; SummerU=1.5; SummerDate=1-Nov; WinterCona=6.6; WinterU=1.5; WinterDate=1-Apr; DiffusConst=88; DiffusSlope=35.4; Salb=0.2; CN2Bare=70; CNRed=20; CNCov=0.8; Thickness=[150, 150, 150, 150, 150, 150, 300, 300, 300]; SWCON=[0.19, 0.21, 0.21, 0.223, 0.219, 0.219, 0.219, 0.229, 0.7]
            SoilOrganicMatter: same as Mungbean_REMS.NT10.NT10SowKing_low_Jan1.paddock.soil.SoilOrganicMatter
            Analysis
              Thickness=[150.0, 150.0, 150.0, 150.0, 150.0, 150.0, 300.0, 300.0, 300.0]
              PH=[6.500, 6.200, 6.300, 6.400, 6.500, 6.600, 6.600, 6.500, 6.500]
            Sample Initial nitrogen
              Thickness  NO3  NH4
              150.0      2    1
              150.0      2    1
              150.0      2    1
              150.0      2    1
              150.0      2    1
              150.0      2    1
              300.0      2    1
              300.0      2    1
              300.0      -    -
          surfaceom
            PoolName = wheat  # Organic Matter pool name
            type = wheat  # Organic Matter type
            mass = 4000  # Initial surface residue (kg/ha)
            cnr = 40  # C:N ratio of initial residue
            standing_fraction = 0.0  # Fraction of residue standing
          mungbean
          manager2 Irrigate on date
            # Irrigation will be applied on the date(s) below
            sameDays = yes  # Apply Irrigation on the same day(s) each year? (yes/no) - if "no" then must include the year of application below
            irrigDatesStr = 22-dec  # Dates for one or more Irrigation applications (dd-mmm or dd-mmm-yyyy) as a list with a space between dates
            # Irrigation parameters
            amount = 37  # Amount of irrigation to apply (mm)
            eff = 1.0  # Irrigation efficiency (0-1)
            script: same as in Mungbean_REMS.aps18.aps18_Nov4_Berken.paddock.Irrigate on date
          manager2 Irrigate on date1
            # Irrigation will be applied on the date(s) below
            sameDays = yes  # Apply Irrigation on the same day(s) each year? (yes/no) - if "no" then must include the year of application below
            irrigDatesStr = 24-dec  # Dates for one or more Irrigation applications (dd-mmm or dd-mmm-yyyy) as a list with a space between dates
            # Irrigation parameters
            amount = 25  # Amount of irrigation to apply (mm)
            eff = 1.0  # Irrigation efficiency (0-1)
            script: same as in Mungbean_REMS.aps18.aps18_Nov4_Berken.paddock.Irrigate on date
          manager2 Irrigate on date2
            # Irrigation will be applied on the date(s) below
            sameDays = yes  # Apply Irrigation on the same day(s) each year? (yes/no) - if "no" then must include the year of application below
            irrigDatesStr = 27-dec  # Dates for one or more Irrigation applications (dd-mmm or dd-mmm-yyyy) as a list with a space between dates
            # Irrigation parameters
            amount = 35  # Amount of irrigation to apply (mm)
            eff = 1.0  # Irrigation efficiency (0-1)
            script: same as in Mungbean_REMS.aps18.aps18_Nov4_Berken.paddock.Irrigate on date
          manager2 Irrigate on date3
            # Irrigation will be applied on the date(s) below
            sameDays = yes  # Apply Irrigation on the same day(s) each year? (yes/no) - if "no" then must include the year of application below
            irrigDatesStr = 03-jan,04-jan,13-feb  # Dates for one or more Irrigation applications (dd-mmm or dd-mmm-yyyy) as a list with a space between dates
            # Irrigation parameters
            amount = 15  # Amount of irrigation to apply (mm)
            eff = 1.0  # Irrigation efficiency (0-1)
            script: same as in Mungbean_REMS.aps18.aps18_Nov4_Berken.paddock.Irrigate on date
          manager2 Irrigate on date4
            # Irrigation will be applied on the date(s) below
            sameDays = yes  # Apply Irrigation on the same day(s) each year? (yes/no) - if "no" then must include the year of application below
            irrigDatesStr = 06-jan  # Dates for one or more Irrigation applications (dd-mmm or dd-mmm-yyyy) as a list with a space between dates
            # Irrigation parameters
            amount = 8  # Amount of irrigation to apply (mm)
            eff = 1.0  # Irrigation efficiency (0-1)
            script: same as in Mungbean_REMS.aps18.aps18_Nov4_Berken.paddock.Irrigate on date
          manager2 Irrigate on date5
            # Irrigation will be applied on the date(s) below
            sameDays = yes  # Apply Irrigation on the same day(s) each year? (yes/no) - if "no" then must include the year of application below
            irrigDatesStr = 17-jan  # Dates for one or more Irrigation applications (dd-mmm or dd-mmm-yyyy) as a list with a space between dates
            # Irrigation parameters
            amount = 10  # Amount of irrigation to apply (mm)
            eff = 1.0  # Irrigation efficiency (0-1)
            script: same as in Mungbean_REMS.aps18.aps18_Nov4_Berken.paddock.Irrigate on date
          manager2 Irrigate on date6
            # Irrigation will be applied on the date(s) below
            sameDays = yes  # Apply Irrigation on the same day(s) each year? (yes/no) - if "no" then must include the year of application below
            irrigDatesStr = 20-jan  # Dates for one or more Irrigation applications (dd-mmm or dd-mmm-yyyy) as a list with a space between dates
            # Irrigation parameters
            amount = 23  # Amount of irrigation to apply (mm)
            eff = 1.0  # Irrigation efficiency (0-1)
            script: same as in Mungbean_REMS.aps18.aps18_Nov4_Berken.paddock.Irrigate on date
          manager2 Irrigate on date7
            # Irrigation will be applied on the date(s) below
            sameDays = yes  # Apply Irrigation on the same day(s) each year? (yes/no) - if "no" then must include the year of application below
            irrigDatesStr = 26-jan  # Dates for one or more Irrigation applications (dd-mmm or dd-mmm-yyyy) as a list with a space between dates
            # Irrigation parameters
            amount = 23  # Amount of irrigation to apply (mm)
            eff = 1.0  # Irrigation efficiency (0-1)
            script: same as in Mungbean_REMS.aps18.aps18_Nov4_Berken.paddock.Irrigate on date
          manager2 Irrigate on date8
            # Irrigation will be applied on the date(s) below
            sameDays = yes  # Apply Irrigation on the same day(s) each year? (yes/no) - if "no" then must include the year of application below
            irrigDatesStr = 26-jan  # Dates for one or more Irrigation applications (dd-mmm or dd-mmm-yyyy) as a list with a space between dates
            # Irrigation parameters
            amount = 6  # Amount of irrigation to apply (mm)
            eff = 1.0  # Irrigation efficiency (0-1)
            script: same as in Mungbean_REMS.aps18.aps18_Nov4_Berken.paddock.Irrigate on date
          manager2 Irrigate on date9
            # Irrigation will be applied on the date(s) below
            sameDays = yes  # Apply Irrigation on the same day(s) each year? (yes/no) - if "no" then must include the year of application below
            irrigDatesStr = 30-jan  # Dates for one or more Irrigation applications (dd-mmm or dd-mmm-yyyy) as a list with a space between dates
            # Irrigation parameters
            amount = 7  # Amount of irrigation to apply (mm)
            eff = 1.0  # Irrigation efficiency (0-1)
            script: same as in Mungbean_REMS.aps18.aps18_Nov4_Berken.paddock.Irrigate on date
          manager2 Irrigate on date10
            # Irrigation will be applied on the date(s) below
            sameDays = yes  # Apply Irrigation on the same day(s) each year? (yes/no) - if "no" then must include the year of application below
            irrigDatesStr = 06-feb  # Dates for one or more Irrigation applications (dd-mmm or dd-mmm-yyyy) as a list with a space between dates
            # Irrigation parameters
            amount = 21  # Amount of irrigation to apply (mm)
            eff = 1.0  # Irrigation efficiency (0-1)
            script: same as in Mungbean_REMS.aps18.aps18_Nov4_Berken.paddock.Irrigate on date
          manager2 Irrigate on date101
            # Irrigation will be applied on the date(s) below
            sameDays = yes  # Apply Irrigation on the same day(s) each year? (yes/no) - if "no" then must include the year of application below
            irrigDatesStr = 09-feb  # Dates for one or more Irrigation applications (dd-mmm or dd-mmm-yyyy) as a list with a space between dates
            # Irrigation parameters
            amount = 16  # Amount of irrigation to apply (mm)
            eff = 1.0  # Irrigation efficiency (0-1)
            script: same as in Mungbean_REMS.aps18.aps18_Nov4_Berken.paddock.Irrigate on date
          manager Empty manager1
            on start_of_day:
            script: same as in Mungbean_REMS.aps20.Emerald_high_Dec17.paddock.Empty manager1
          outputfile: filename=NT4King_Jan4.out; title=NT4King_Jan4
            variables
              variables: dd/mm/yyyy as Date, DaysAftersowing, yield, biomass, flowering_das, harvestindex, maturity_das, id
      simulation NT4King_Jan17
        clock: start_date=7/9/1989; end_date=30/5/1990
        summaryfile
        metfile met: filename=MetFiles\krs8990.met
        area paddock
          fertiliser
          irrigation: same as Mungbean_REMS.NT4.NT4King_Jan4.paddock.irrigation
          manager: same as Mungbean_REMS.aps20.Emerald_high_Dec17.paddock.manager
          Soil: same as Mungbean_REMS.NT4.NT4King_Jan4.paddock.soil
          surfaceom
            PoolName = wheat  # Organic Matter pool name
            type = wheat  # Organic Matter type
            mass = 4000  # Initial surface residue (kg/ha)
            cnr = 40  # C:N ratio of initial residue
            standing_fraction = 0.0  # Fraction of residue standing
          mungbean
          manager2 Irrigate on date: same as Mungbean_REMS.NT4.NT4King_Jan4.paddock.Irrigate on date
          manager2 Irrigate on date1: same as Mungbean_REMS.NT4.NT4King_Jan4.paddock.Irrigate on date1
          manager2 Irrigate on date2: same as Mungbean_REMS.NT4.NT4King_Jan4.paddock.Irrigate on date2
          manager2 Irrigate on date3: same as Mungbean_REMS.NT4.NT4King_Jan4.paddock.Irrigate on date3
          manager2 Irrigate on date4: same as Mungbean_REMS.NT4.NT4King_Jan4.paddock.Irrigate on date4
          manager2 Irrigate on date5: same as Mungbean_REMS.NT4.NT4King_Jan4.paddock.Irrigate on date5
          manager2 Irrigate on date6: same as Mungbean_REMS.NT4.NT4King_Jan4.paddock.Irrigate on date6
          manager2 Irrigate on date7: same as Mungbean_REMS.NT4.NT4King_Jan4.paddock.Irrigate on date7
          manager2 Irrigate on date8: same as Mungbean_REMS.NT4.NT4King_Jan4.paddock.Irrigate on date8
          manager2 Irrigate on date9: same as Mungbean_REMS.NT4.NT4King_Jan4.paddock.Irrigate on date9
          manager2 Irrigate on date10: same as Mungbean_REMS.NT4.NT4King_Jan4.paddock.Irrigate on date10
          manager2 Irrigate on date101: same as Mungbean_REMS.NT4.NT4King_Jan4.paddock.Irrigate on date101
          operations
            17/01/1990  mungbean sow plants = 40, sowing_depth = 30, cultivar = king ,crop_class = plant
          manager Empty manager2
            on start_of_day:
            script: same as in Mungbean_REMS.aps20.Emerald_low_Dec28.paddock.Empty manager2
          outputfile -> /Mungbean/Mungbean_REMS/NT4/NT4King_Jan4/paddock/outputfile: filename=NT4King_Jan17.out; title=NT4King_Jan17
            variables -> /Mungbean/Mungbean_REMS/NT4/NT4King_Jan4/paddock/outputfile/variables
    folder NT5
      simulation NT5CultivarKing
        clock: start_date=7/9/1990; end_date=30/5/1991
        summaryfile
        metfile met: filename=MetFiles\krs9091.met
        area paddock
          operations
            15/01/1991  mungbean sow plants = 38, sowing_depth = 30, cultivar = king,crop_class = plant
          fertiliser
          irrigation: same as Mungbean_REMS.aps20.Emerald_high_Dec17.paddock.irrigation
          manager: same as Mungbean_REMS.aps20.Emerald_high_Dec17.paddock.manager
          Soil
            InitialWater Initial water: FractionFull=1; PercentMethod=FilledFromTop; RelativeTo=ll15
            Water: same as Mungbean_REMS.NT4.NT4King_Jan4.paddock.soil.Water
            SoilWater: same as Mungbean_REMS.NT10.NT10SowKing_low_Jan1.paddock.soil.SoilWater
            SoilOrganicMatter: same as Mungbean_REMS.NT10.NT10SowKing_low_Jan1.paddock.soil.SoilOrganicMatter
            Analysis: Thickness=[150, 150, 150, 150, 150, 150, 300, 300, 300]; PH=[6.5, 6.2, 6.3, 6.4, 6.5, 6.6, 6.6, 6.5, 6.5]; PHUnits=Water; BoronUnits=HotWater
            Sample Initial nitrogen: NO3Units=ppm; NH4Units=ppm; SWUnits=Volumetric; OCUnits=Total; PHUnits=Water
              Thickness  NO3  NH4
              150        2    1
              150        2    1
              150        2    1
              150        2    1
              150        2    1
              150        2    1
              300        2    1
              300        2    1
              300        2    1
          surfaceom
            PoolName = wheat  # Organic Matter pool name
            type = wheat  # Organic Matter type
            mass = 500  # Initial surface residue (kg/ha)
            cnr = 40  # C:N ratio of initial residue
            standing_fraction = 0.0  # Fraction of residue standing
          mungbean
          manager Empty manager1
            on start_of_day:
            script: same as in Mungbean_REMS.aps20.Emerald_high_Dec17.paddock.Empty manager1
          outputfile: filename=NT5CultivarKing.out; title=NT5CultivarKing
            variables
              variables: dd/mm/yyyy as Date, DaysAftersowing, yield, biomass, flowering_das, harvestindex, maturity_das, id
      simulation NT5CultivarPutland
        clock: start_date=7/9/1990; end_date=30/5/1991
        summaryfile
        metfile met: filename=MetFiles\krs9091.met
        area paddock
          operations
            15/01/1991  mungbean sow plants = 26, sowing_depth = 30, cultivar = putland,crop_class = plant
          fertiliser
          irrigation: same as Mungbean_REMS.aps20.Emerald_high_Dec17.paddock.irrigation
          manager: same as Mungbean_REMS.aps20.Emerald_high_Dec17.paddock.manager
          Soil: same as Mungbean_REMS.NT5.NT5CultivarKing.paddock.soil
          surfaceom
            PoolName = wheat  # Organic Matter pool name
            type = wheat  # Organic Matter type
            mass = 500  # Initial surface residue (kg/ha)
            cnr = 40  # C:N ratio of initial residue
            standing_fraction = 0.0  # Fraction of residue standing
          mungbean
          manager Empty manager2
            on start_of_day:
            script: same as in Mungbean_REMS.aps20.Emerald_low_Dec28.paddock.Empty manager2
          outputfile -> /Mungbean/Mungbean_REMS/NT5/NT5CultivarKing/paddock/outputfile: filename=NT5CultivarPutland.out; title=NT5CultivarPutland
            variables -> /Mungbean/Mungbean_REMS/NT5/NT5CultivarKing/paddock/outputfile/variables
    folder NT9
      simulation NT9King_Jan15
        clock: start_date=7/9/1987; end_date=29/5/1988
        summaryfile
        metfile met: filename=MetFiles\dd8788.met
        area paddock
          operations
            15/01/1988  mungbean sow plants = 40, sowing_depth = 30, cultivar = king,crop_class = plant
          fertiliser
          irrigation: same as Mungbean_REMS.aps20.Emerald_high_Dec17.paddock.irrigation
          manager: same as Mungbean_REMS.aps20.Emerald_high_Dec17.paddock.manager
          Soil
            InitialWater Initial water: FractionFull=1; PercentMethod=FilledFromTop; RelativeTo=ll15
            Water
              Thickness  BD     AirDry  LL15   DUL    SAT
              150.0      1.560  0.053   0.19   0.304  0.315
              150.0      1.520  0.08    0.21   0.31   0.330
              150.0      1.460  0.21    0.21   0.31   0.337
              150.0      1.460  0.223   0.223  0.324  0.340
              150.0      1.420  0.219   0.219  0.328  0.340
              150.0      1.420  0.219   0.219  0.328  0.341
              300.0      1.460  0.219   0.219  0.325  0.344
              300.0      1.500  0.229   0.229  0.337  0.346
              300.0      1.530  0.237   0.237  0.35   0.370
              SoilCrop mungbean
                LL=[0.19, 0.21, 0.21, 0.235, 0.233, 0.242, 0.248, 0.277, 0.285]
                KL=[0.08, 0.08, 0.08, 0.08, 0.06, 0.04, 0.02, 0.01, 0.01]
                XF=[1.0, 1.0, 1.0, 1.0, 1.0, 1.0, 1.0, 1.0, 1.0]
            SoilWater: SummerCona=6.6; SummerU=1.5; SummerDate=1-Nov; WinterCona=6.6; WinterU=1.5; WinterDate=1-Apr; DiffusConst=88; DiffusSlope=35.4; Salb=0.2; CN2Bare=85; CNRed=20; CNCov=0.8; Thickness=[150, 150, 150, 150, 150, 150, 300, 300, 300]
              SWCON=[0.19, 0.21, 0.21, 0.223, 0.219, 0.219, 0.219, 0.229, 0.237]
            SoilOrganicMatter: RootCN=33; RootWt=0; SoilCN=14.5; EnrACoeff=7.4; EnrBCoeff=0.2
              Thickness  OC     FBiom  FInert
              150.0      1.270  0.05   0.39
              150.0      0.590  0.02   0.47
              150.0      0.340  0.015  0.52
              150.0      0.340  0.01   0.62
              150.0      0.260  0.01   0.74
              150.0      0.260  0.01   0.83
              300.0      0.250  0.01   0.93
              300.0      0.190  0.01   0.93
              300.0      0.210  0.01   0.93
            Analysis
              Thickness=[150.0, 150.0, 150.0, 150.0, 150.0, 150.0, 300.0, 300.0, 300.0]
              PH=[6.500, 6.200, 6.300, 6.400, 6.500, 6.600, 6.600, 6.500, 6.500]
            Sample Initial nitrogen
              Thickness  NO3  NH4
              150.0      2    1
              150.0      2    1
              150.0      2    1
              150.0      2    1
              150.0      2    1
              150.0      2    1
              300.0      2    1
              300.0      2    1
              300.0      -    -
          surfaceom
            PoolName = wheat  # Organic Matter pool name
            type = wheat  # Organic Matter type
            mass = 500  # Initial surface residue (kg/ha)
            cnr = 40  # C:N ratio of initial residue
            standing_fraction = 0.0  # Fraction of residue standing
          mungbean
          manager Empty manager1
            on start_of_day:
            script: same as in Mungbean_REMS.aps20.Emerald_high_Dec17.paddock.Empty manager1
          outputfile: filename=NT9King_Jan15.out; title=NT9King_Jan15
            variables
              variables: dd/mm/yyyy as Date, DaysAftersowing, yield, biomass, flowering_das, harvestindex, maturity_das, id
      simulation NT9King_Feb2
        clock: start_date=7/9/1987; end_date=29/5/1988
        summaryfile
        metfile met: filename=MetFiles\dd8788.met
        area paddock
          operations
            02/02/1988  mungbean sow plants = 40, sowing_depth = 30, cultivar = king,crop_class = plant
          fertiliser
          irrigation: same as Mungbean_REMS.aps20.Emerald_high_Dec17.paddock.irrigation
          manager: same as Mungbean_REMS.aps20.Emerald_high_Dec17.paddock.manager
          Soil: same as Mungbean_REMS.NT9.NT9King_Jan15.paddock.soil
          surfaceom
            PoolName = wheat  # Organic Matter pool name
            type = wheat  # Organic Matter type
            mass = 500  # Initial surface residue (kg/ha)
            cnr = 40  # C:N ratio of initial residue
            standing_fraction = 0.0  # Fraction of residue standing
          mungbean
          manager Empty manager2
            on start_of_day:
            script: same as in Mungbean_REMS.aps20.Emerald_low_Dec28.paddock.Empty manager2
          outputfile -> /Mungbean/Mungbean_REMS/NT9/NT9King_Jan15/paddock/outputfile: filename=NT9King_Feb2.out; title=NT9King_Feb2
            variables -> /Mungbean/Mungbean_REMS/NT9/NT9King_Jan15/paddock/outputfile/variables
      simulation NT9King_Feb16
        clock: start_date=7/9/1987; end_date=29/5/1988
        summaryfile
        metfile met: filename=MetFiles\dd8788.met
        area paddock
          operations
            16/02/1988  mungbean sow plants = 40, sowing_depth = 30, cultivar = king,crop_class = plant
          fertiliser
          irrigation: same as Mungbean_REMS.aps20.Emerald_high_Dec17.paddock.irrigation
          manager: same as Mungbean_REMS.aps20.Emerald_high_Dec17.paddock.manager
          Soil: same as Mungbean_REMS.NT9.NT9King_Jan15.paddock.soil
          surfaceom
            PoolName = wheat  # Organic Matter pool name
            type = wheat  # Organic Matter type
            mass = 500  # Initial surface residue (kg/ha)
            cnr = 40  # C:N ratio of initial residue
            standing_fraction = 0.0  # Fraction of residue standing
          mungbean
          manager Empty manager2
            on start_of_day:
            script: same as in Mungbean_REMS.aps20.Emerald_low_Dec18.paddock.Empty manager2
          outputfile -> /Mungbean/Mungbean_REMS/NT9/NT9King_Jan15/paddock/outputfile: filename=NT9King_Feb16.out; title=NT9King_Feb16
            variables -> /Mungbean/Mungbean_REMS/NT9/NT9King_Jan15/paddock/outputfile/variables
      simulation NT9Satin_Feb2
        clock: start_date=7/9/1987; end_date=29/5/1988
        summaryfile
        metfile met: filename=MetFiles\dd8788.met
        area paddock
          operations
            02/02/1988  mungbean sow plants = 40, sowing_depth = 30, cultivar = satin,crop_class = plant
          fertiliser
          irrigation: same as Mungbean_REMS.aps20.Emerald_high_Dec17.paddock.irrigation
          manager: same as Mungbean_REMS.aps20.Emerald_high_Dec17.paddock.manager
          Soil: same as Mungbean_REMS.NT9.NT9King_Jan15.paddock.soil
          surfaceom
            PoolName = wheat  # Organic Matter pool name
            type = wheat  # Organic Matter type
            mass = 500  # Initial surface residue (kg/ha)
            cnr = 40  # C:N ratio of initial residue
            standing_fraction = 0.0  # Fraction of residue standing
          mungbean
          manager Empty manager2
            on start_of_day:
            script: same as in Mungbean_REMS.aps20.Shangtung_low_Dec27.paddock.Empty manager2
          outputfile -> /Mungbean/Mungbean_REMS/NT9/NT9King_Jan15/paddock/outputfile: filename=NT9Satin_Feb2.out; title=NT9Satin_Feb2
            variables -> /Mungbean/Mungbean_REMS/NT9/NT9King_Jan15/paddock/outputfile/variables
      simulation NT9Satin_Feb16
        clock: start_date=7/9/1987; end_date=29/5/1988
        summaryfile
        metfile met: filename=MetFiles\dd8788.met
        area paddock
          operations
            16/02/1988  mungbean sow plants = 40, sowing_depth = 30, cultivar = satin,crop_class = plant
          fertiliser
          irrigation: same as Mungbean_REMS.aps20.Emerald_high_Dec17.paddock.irrigation
          manager: same as Mungbean_REMS.aps20.Emerald_high_Dec17.paddock.manager
          Soil: same as Mungbean_REMS.NT9.NT9King_Jan15.paddock.soil
          surfaceom
            PoolName = wheat  # Organic Matter pool name
            type = wheat  # Organic Matter type
            mass = 500  # Initial surface residue (kg/ha)
            cnr = 40  # C:N ratio of initial residue
            standing_fraction = 0.0  # Fraction of residue standing
          mungbean
          manager Empty manager2
            on start_of_day:
            script: same as in Mungbean_REMS.aps20.Shangtung_high_Dec18.paddock.Empty manager2
          outputfile -> /Mungbean/Mungbean_REMS/NT9/NT9King_Jan15/paddock/outputfile: filename=NT9Satin_Feb16.out; title=NT9Satin_Feb16
            variables -> /Mungbean/Mungbean_REMS/NT9/NT9King_Jan15/paddock/outputfile/variables
      simulation NT9Putland_Jan15
        clock: start_date=7/9/1987; end_date=29/5/1988
        summaryfile
        metfile met: filename=MetFiles\dd8788.met
        area paddock
          operations
            15/01/1988  mungbean sow plants = 40, sowing_depth = 30, cultivar = putland,crop_class = plant
          fertiliser
          irrigation: same as Mungbean_REMS.aps20.Emerald_high_Dec17.paddock.irrigation
          manager: same as Mungbean_REMS.aps20.Emerald_high_Dec17.paddock.manager
          Soil: same as Mungbean_REMS.NT9.NT9King_Jan15.paddock.soil
          surfaceom
            PoolName = wheat  # Organic Matter pool name
            type = wheat  # Organic Matter type
            mass = 500  # Initial surface residue (kg/ha)
            cnr = 40  # C:N ratio of initial residue
            standing_fraction = 0.0  # Fraction of residue standing
          mungbean
          manager Empty manager2
            on start_of_day:
            script: same as in Mungbean_REMS.aps20.Celera_high_Dec17.paddock.Empty manager2
          outputfile -> /Mungbean/Mungbean_REMS/NT9/NT9King_Jan15/paddock/outputfile: filename=NT9Putland_Jan15.out; title=NT9Putland_Jan15
            variables -> /Mungbean/Mungbean_REMS/NT9/NT9King_Jan15/paddock/outputfile/variables
      simulation NT9Putland_Feb2
        clock: start_date=7/9/1987; end_date=29/5/1988
        summaryfile
        metfile met: filename=MetFiles\dd8788.met
        area paddock
          fertiliser
          irrigation: same as Mungbean_REMS.aps20.Emerald_high_Dec17.paddock.irrigation
          manager: same as Mungbean_REMS.aps20.Emerald_high_Dec17.paddock.manager
          Soil: same as Mungbean_REMS.NT9.NT9King_Jan15.paddock.soil
          surfaceom
            PoolName = wheat  # Organic Matter pool name
            type = wheat  # Organic Matter type
            mass = 500  # Initial surface residue (kg/ha)
            cnr = 40  # C:N ratio of initial residue
            standing_fraction = 0.0  # Fraction of residue standing
          mungbean
          operations
            02/02/1988  mungbean sow plants = 40, sowing_depth = 30, cultivar = putland,crop_class = plant
          manager Empty manager2
            on start_of_day:
            script: same as in Mungbean_REMS.aps20.Satin_low_Dec20.paddock.Empty manager2
          outputfile -> /Mungbean/Mungbean_REMS/NT9/NT9King_Jan15/paddock/outputfile: filename=NT9Putland_Feb2.out; title=NT9Putland_Feb2
            variables -> /Mungbean/Mungbean_REMS/NT9/NT9King_Jan15/paddock/outputfile/variables
      simulation NT9Putland_Feb16
        clock: start_date=7/9/1987; end_date=29/5/1988
        summaryfile
        metfile met: filename=MetFiles\dd8788.met
        area paddock
          fertiliser
          irrigation: same as Mungbean_REMS.aps20.Emerald_high_Dec17.paddock.irrigation
          manager: same as Mungbean_REMS.aps20.Emerald_high_Dec17.paddock.manager
          Soil: same as Mungbean_REMS.NT9.NT9King_Jan15.paddock.soil
          surfaceom
            PoolName = wheat  # Organic Matter pool name
            type = wheat  # Organic Matter type
            mass = 500  # Initial surface residue (kg/ha)
            cnr = 40  # C:N ratio of initial residue
            standing_fraction = 0.0  # Fraction of residue standing
          mungbean
          operations
            16/02/1988  mungbean sow plants = 40, sowing_depth = 30, cultivar = putland,crop_class = plant
          manager Empty manager2
            on start_of_day:
            script: same as in Mungbean_REMS.aps20.Satin_high_Dec18.paddock.Empty manager2
          outputfile -> /Mungbean/Mungbean_REMS/NT9/NT9King_Jan15/paddock/outputfile: filename=NT9Putland_Feb16.out; title=NT9Putland_Feb16
            variables -> /Mungbean/Mungbean_REMS/NT9/NT9King_Jan15/paddock/outputfile/variables
    folder RCM1
      simulation RCM1Irrig3
        clock: start_date=31/3/1980; end_date=18/6/1980
        summaryfile
        metfile met: filename=MetFiles\kunucli.met
        area paddock
          operations
            31/03/1980  mungbean sow plants = 35, sowing_depth = 40, cultivar = berken,crop_class = plant, row_spacing = 250
          fertiliser
          irrigation: same as Mungbean_REMS.NT4.NT4King_Jan4.paddock.irrigation
          manager: same as Mungbean_REMS.aps20.Emerald_high_Dec17.paddock.manager
          Soil
            InitialWater Initial water: FractionFull=1; PercentMethod=EvenlyDistributed
            Water: same as Mungbean_REMS.NT10.NT10SowKing_low_Jan1.paddock.soil.Water
            SoilWater: SummerCona=6.6; SummerU=1.5; SummerDate=1-Nov; WinterCona=6.6; WinterU=1.5; WinterDate=1-Apr; DiffusConst=88.0; DiffusSlope=35.4; Salb=0.2; CN2Bare=70; CNRed=20; CNCov=0.8; SWCON=[0.7, 0.7, 0.7, 0.7, 0.7, 0.7, 0.7, 0.7, 0.7]
              Thickness=[150.0, 150.0, 150.0, 150.0, 150.0, 150.0, 300.0, 300.0, 300.0]
            SoilOrganicMatter: same as Mungbean_REMS.NT9.NT9King_Jan15.paddock.soil.SoilOrganicMatter
            Analysis
              Thickness=[150.0, 150.0, 150.0, 150.0, 150.0, 150.0, 300.0, 300.0, 300.0]
              PH=[6.500, 6.200, 6.300, 6.400, 6.500, 6.600, 6.600, 6.500, 6.500]
            Sample Initial nitrogen
              Thickness  NO3  NH4
              150.0      2    1
              150.0      2    1
              150.0      2    1
              150.0      2    1
              150.0      2    1
              150.0      2    1
              300.0      2    1
              300.0      2    1
              300.0      -    -
          surfaceom
            PoolName = wheat  # Organic Matter pool name
            type = wheat  # Organic Matter type
            mass = 500  # Initial surface residue (kg/ha)
            cnr = 40  # C:N ratio of initial residue
            standing_fraction = 0.0  # Fraction of residue standing
          mungbean
          manager Empty manager1
            on start_of_day:
            script: same as in Mungbean_REMS.aps20.Emerald_high_Dec17.paddock.Empty manager1
          outputfile: filename=RCM1Irrig3.out; title=RCM1Irrig3
            variables
              variables: dd/mm/yyyy as Date, DaysAftersowing, yield, biomass, flowering_das, harvestindex, maturity_das, id
      simulation RCM1Irrig1
        clock: start_date=31/3/1980; end_date=18/6/1980
        summaryfile
        metfile met: filename=MetFiles\kunucli.met
        area paddock
          operations
            31/03/1980  mungbean sow plants = 35, sowing_depth = 40, cultivar = berken,crop_class = plant, row_spacing = 250
          fertiliser
          irrigation: same as Mungbean_REMS.NT4.NT4King_Jan4.paddock.irrigation
          manager: same as Mungbean_REMS.aps20.Emerald_high_Dec17.paddock.manager
          Soil: same as Mungbean_REMS.RCM1.RCM1Irrig3.paddock.soil
          surfaceom
            PoolName = wheat  # Organic Matter pool name
            type = wheat  # Organic Matter type
            mass = 500  # Initial surface residue (kg/ha)
            cnr = 40  # C:N ratio of initial residue
            standing_fraction = 0.0  # Fraction of residue standing
          mungbean
          manager2 Irrigate on date
            # Irrigation will be applied on the date(s) below
            sameDays = yes  # Apply Irrigation on the same day(s) each year? (yes/no) - if "no" then must include the year of application below
            irrigDatesStr = 07-apr 14-apr  # Dates for one or more Irrigation applications (dd-mmm or dd-mmm-yyyy) as a list with a space between dates
            # Irrigation parameters
            amount = 50  # Amount of irrigation to apply (mm)
            eff = 1.0  # Irrigation efficiency (0-1)
            script: same as in Mungbean_REMS.aps18.aps18_Nov4_Berken.paddock.Irrigate on date
          manager Empty manager2
            on start_of_day:
            script: same as in Mungbean_REMS.aps20.Emerald_low_Dec28.paddock.Empty manager2
          outputfile -> /Mungbean/Mungbean_REMS/RCM1/RCM1Irrig3/paddock/outputfile: filename=RCM1Irrig1.out; title=RCM1Irrig1
            variables -> /Mungbean/Mungbean_REMS/RCM1/RCM1Irrig3/paddock/outputfile/variables
      simulation RCM1Irrig2
        clock: start_date=31/3/1980; end_date=18/6/1980
        summaryfile
        metfile met: filename=MetFiles\kunucli.met
        area paddock
          operations
            31/03/1980  mungbean sow plants = 35, sowing_depth = 40, cultivar = berken,crop_class = plant, row_spacing = 250
          fertiliser
          irrigation: same as Mungbean_REMS.NT4.NT4King_Jan4.paddock.irrigation
          manager: same as Mungbean_REMS.aps20.Emerald_high_Dec17.paddock.manager
          Soil: same as Mungbean_REMS.RCM1.RCM1Irrig3.paddock.soil
          surfaceom
            PoolName = wheat  # Organic Matter pool name
            type = wheat  # Organic Matter type
            mass = 500  # Initial surface residue (kg/ha)
            cnr = 40  # C:N ratio of initial residue
            standing_fraction = 0.0  # Fraction of residue standing
          mungbean
          manager2 Irrigate on date
            # Irrigation will be applied on the date(s) below
            sameDays = yes  # Apply Irrigation on the same day(s) each year? (yes/no) - if "no" then must include the year of application below
            irrigDatesStr = 07-apr 14-apr 28-apr 05-may  # Dates for one or more Irrigation applications (dd-mmm or dd-mmm-yyyy) as a list with a space between dates
            # Irrigation parameters
            amount = 50  # Amount of irrigation to apply (mm)
            eff = 1.0  # Irrigation efficiency (0-1)
            script: same as in Mungbean_REMS.aps18.aps18_Nov4_Berken.paddock.Irrigate on date
          manager Empty manager2
            on start_of_day:
            script: same as in Mungbean_REMS.aps20.Emerald_low_Dec18.paddock.Empty manager2
          outputfile -> /Mungbean/Mungbean_REMS/RCM1/RCM1Irrig3/paddock/outputfile: filename=RCM1Irrig2.out; title=RCM1Irrig2
            variables -> /Mungbean/Mungbean_REMS/RCM1/RCM1Irrig3/paddock/outputfile/variables
    folder RCM2
      simulation RCM2Sow10
        clock: start_date=11/1/1980; end_date=30/3/1980
        summaryfile
        metfile met: filename=MetFiles\kunucli.met
        area paddock
          operations
            11/01/1980  mungbean sow plants = 10, sowing_depth = 40, cultivar = berken,crop_class = plant, row_spacing = 250
          fertiliser
          irrigation: same as Mungbean_REMS.NT4.NT4King_Jan4.paddock.irrigation
          manager: same as Mungbean_REMS.aps20.Emerald_high_Dec17.paddock.manager
          Soil: Latitude=0; Longitude=0; YearOfSampling=0
            InitialWater Initial water: FractionFull=1; PercentMethod=EvenlyDistributed
            Water
              Thickness  BD     AirDry  LL15   DUL    SAT
              150.0      1.380  0.050   0.180  0.380  0.430
              150.0      1.340  0.190   0.190  0.380  0.430
              150.0      1.310  0.220   0.220  0.395  0.450
              150.0      1.400  0.190   0.190  0.410  0.450
              300.0      1.450  0.220   0.220  0.400  0.450
              300.0      1.460  0.190   0.190  0.390  0.440
              300.0      1.460  0.170   0.170  0.380  0.400
              300.0      1.460  0.170   0.170  0.380  0.400
              SoilCrop mungbean: LL=[0.200, 0.201, 0.237, 0.192, 0.220, 0.191, 0.249, 0.249]; KL=[0.08, 0.08, 0.08, 0.08, 0.06, 0.04, 0.02, 0.01]; XF=[1.0, 1.0, 1.0, 1.0, 1.0, 1.0, 1.0, 1.0]
            SoilWater: SummerCona=3.5; SummerU=6.0; SummerDate=1-Nov; WinterCona=3.5; WinterU=6.0; WinterDate=1-Apr; DiffusConst=88.0; DiffusSlope=35.4; Salb=0.13; CN2Bare=72; CNRed=20; CNCov=0.8; Thickness=[150.0, 150.0, 150.0, 150.0, 300.0, 300.0, 300.0, 300.0]; SWCON=[0.400, 0.400, 0.400, 0.400, 0.400, 0.400, 0.400, 0.400]
            SoilOrganicMatter: RootCN=33; RootWt=0; SoilCN=14.5; EnrACoeff=7.4; EnrBCoeff=0.2
              Thickness  OC    FBiom  FInert
              150.0      2.20  0.02   0.36
              150.0      1.60  0.015  0.50
              150.0      1.35  0.01   0.59
              150.0      0.95  0.01   0.84
              300.0      1.00  0.01   0.80
              300.0      0.80  0.01   0.99
              300.0      0.45  0.01   0.99
              300.0      0.45  0.01   0.99
            Analysis: Thickness=[150.0, 150.0, 150.0, 150.0, 300.0, 300.0, 300.0, 300.0]; PH=[7.50, 8.00, 8.00, 8.00, 8.00, 8.00, 8.00, 8.00]
            Sample Initial nitrogen
              Thickness  NO3  NH4
              150.0      2    1
              150.0      2    1
              150.0      2    1
              150.0      2    1
              300.0      2    1
              300.0      2    1
              300.0      2    1
              300.0      2    1
          surfaceom
            PoolName = wheat  # Organic Matter pool name
            type = wheat  # Organic Matter type
            mass = 500  # Initial surface residue (kg/ha)
            cnr = 40  # C:N ratio of initial residue
            standing_fraction = 0.0  # Fraction of residue standing
          mungbean
          manager Empty manager1
            on start_of_day:
            script: same as in Mungbean_REMS.aps20.Emerald_high_Dec17.paddock.Empty manager1
          outputfile: filename=RCM2Sow10.out; title=RCM2Sow10
            variables
              variables: dd/mm/yyyy as Date, DaysAftersowing, yield, biomass, flowering_das, harvestindex, maturity_das, id
      simulation RCM2Sow19
        clock: start_date=11/1/1980; end_date=30/3/1980
        summaryfile
        metfile met: filename=MetFiles\kunucli.met
        area paddock
          operations
            11/01/1980  mungbean sow plants = 19, sowing_depth = 40, cultivar = berken,crop_class = plant, row_spacing = 250
          fertiliser
          irrigation: same as Mungbean_REMS.NT4.NT4King_Jan4.paddock.irrigation
          manager: same as Mungbean_REMS.aps20.Emerald_high_Dec17.paddock.manager
          Soil
            InitialWater Initial water: FractionFull=1; PercentMethod=EvenlyDistributed
            Water: same as Mungbean_REMS.RCM2.RCM2Sow10.paddock.soil.Water
            SoilWater: same as Mungbean_REMS.RCM2.RCM2Sow10.paddock.soil.SoilWater
            SoilOrganicMatter: same as Mungbean_REMS.RCM2.RCM2Sow10.paddock.soil.SoilOrganicMatter
            Analysis: Thickness=[150.0, 150.0, 150.0, 150.0, 300.0, 300.0, 300.0, 300.0]; PH=[7.50, 8.00, 8.00, 8.00, 8.00, 8.00, 8.00, 8.00]
            Sample Initial nitrogen
              Thickness  NO3  NH4
              150.0      2    1
              150.0      2    1
              150.0      2    1
              150.0      2    1
              300.0      2    1
              300.0      2    1
              300.0      2    1
              300.0      2    1
          surfaceom
            PoolName = wheat  # Organic Matter pool name
            type = wheat  # Organic Matter type
            mass = 500  # Initial surface residue (kg/ha)
            cnr = 40  # C:N ratio of initial residue
            standing_fraction = 0.0  # Fraction of residue standing
          mungbean
          manager Empty manager2
            on start_of_day:
            script: same as in Mungbean_REMS.aps20.Emerald_low_Dec28.paddock.Empty manager2
          outputfile -> /Mungbean/Mungbean_REMS/RCM2/RCM2Sow10/paddock/outputfile: filename=RCM2Sow19.out; title=RCM2Sow19
            variables -> /Mungbean/Mungbean_REMS/RCM2/RCM2Sow10/paddock/outputfile/variables
      simulation RCM2Sow27
        clock: start_date=11/1/1980; end_date=30/3/1980
        summaryfile
        metfile met: filename=MetFiles\kunucli.met
        area paddock
          operations
            11/01/1980  mungbean sow plants = 27, sowing_depth = 40, cultivar = berken,crop_class = plant, row_spacing = 250
          fertiliser
          irrigation: same as Mungbean_REMS.NT4.NT4King_Jan4.paddock.irrigation
          manager: same as Mungbean_REMS.aps20.Emerald_high_Dec17.paddock.manager
          Soil: same as Mungbean_REMS.RCM2.RCM2Sow19.paddock.soil
          surfaceom
            PoolName = wheat  # Organic Matter pool name
            type = wheat  # Organic Matter type
            mass = 500  # Initial surface residue (kg/ha)
            cnr = 40  # C:N ratio of initial residue
            standing_fraction = 0.0  # Fraction of residue standing
          mungbean
          manager Empty manager2
            on start_of_day:
            script: same as in Mungbean_REMS.aps20.Emerald_low_Dec18.paddock.Empty manager2
          outputfile -> /Mungbean/Mungbean_REMS/RCM2/RCM2Sow10/paddock/outputfile: filename=RCM2Sow27.out; title=RCM2Sow27
            variables -> /Mungbean/Mungbean_REMS/RCM2/RCM2Sow10/paddock/outputfile/variables
      simulation RCMSow39
        clock: start_date=11/1/1980; end_date=30/3/1980
        summaryfile
        metfile met: filename=MetFiles\kunucli.met
        area paddock
          operations
            11/01/1980  mungbean sow plants = 39, sowing_depth = 40, cultivar = berken,crop_class = plant, row_spacing = 250
          fertiliser
          irrigation: same as Mungbean_REMS.NT4.NT4King_Jan4.paddock.irrigation
          manager: same as Mungbean_REMS.aps20.Emerald_high_Dec17.paddock.manager
          Soil: same as Mungbean_REMS.RCM2.RCM2Sow19.paddock.soil
          surfaceom
            PoolName = wheat  # Organic Matter pool name
            type = wheat  # Organic Matter type
            mass = 500  # Initial surface residue (kg/ha)
            cnr = 40  # C:N ratio of initial residue
            standing_fraction = 0.0  # Fraction of residue standing
          mungbean
          manager Empty manager2
            on start_of_day:
            script: same as in Mungbean_REMS.aps20.Shangtung_low_Dec27.paddock.Empty manager2
          outputfile -> /Mungbean/Mungbean_REMS/RCM2/RCM2Sow10/paddock/outputfile: filename=RCMSow39.out; title=RCMSow39
            variables -> /Mungbean/Mungbean_REMS/RCM2/RCM2Sow10/paddock/outputfile/variables
      simulation RCMSow50
        clock: start_date=11/1/1980; end_date=30/3/1980
        summaryfile
        metfile met: filename=MetFiles\kunucli.met
        area paddock
          operations
            11/01/1980  mungbean sow plants = 50, sowing_depth = 40, cultivar = berken,crop_class = plant, row_spacing = 250
          fertiliser
          irrigation: same as Mungbean_REMS.NT4.NT4King_Jan4.paddock.irrigation
          manager: same as Mungbean_REMS.aps20.Emerald_high_Dec17.paddock.manager
          Soil: same as Mungbean_REMS.RCM2.RCM2Sow19.paddock.soil
          surfaceom
            PoolName = wheat  # Organic Matter pool name
            type = wheat  # Organic Matter type
            mass = 500  # Initial surface residue (kg/ha)
            cnr = 40  # C:N ratio of initial residue
            standing_fraction = 0.0  # Fraction of residue standing
          mungbean
          manager Empty manager2
            on start_of_day:
            script: same as in Mungbean_REMS.aps20.Shangtung_high_Dec18.paddock.Empty manager2
          outputfile -> /Mungbean/Mungbean_REMS/RCM2/RCM2Sow10/paddock/outputfile: filename=RCMSow50.out; title=RCMSow50
            variables -> /Mungbean/Mungbean_REMS/RCM2/RCM2Sow10/paddock/outputfile/variables
    folder RCM_Gatton
      simulation RCM_Gatton
        clock: start_date=9/1/1990; end_date=5/4/1990
        summaryfile
        metfile met: filename=MetFiles\gatt90.met
        area paddock
          operations
            09/01/1990  mungbean sow plants = 35, sowing_depth = 40, cultivar = king,crop_class = plant, row_spacing = 360
          fertiliser
          irrigation: same as Mungbean_REMS.aps20.Emerald_high_Dec17.paddock.irrigation
          manager: same as Mungbean_REMS.aps20.Emerald_high_Dec17.paddock.manager
          Soil
            InitialWater Initial water: FractionFull=1; PercentMethod=EvenlyDistributed
            Water
              Thickness  BD     AirDry  LL15   DUL    SAT
              150.0      1.200  0.100   0.200  0.413  0.453
              150.0      1.200  0.260   0.280  0.454  0.504
              300.0      1.200  0.320   0.340  0.495  0.545
              300.0      1.200  0.300   0.320  0.495  0.545
              300.0      1.300  0.270   0.290  0.418  0.468
              300.0      1.300  0.240   0.260  0.406  0.457
              300.0      1.300  0.310   0.330  0.385  0.435
              SoilCrop mungbean: LL=[0.200, 0.280, 0.340, 0.340, 0.340, 0.400, 0.380]; KL=[0.08, 0.06, 0.04, 0.08, 0.06, 0.04, 0.02]; XF=[1.0, 1.0, 1.0, 0.0, 0.0, 0.0, 0.0]
            SoilWater: SummerCona=3.5; SummerU=6.0; SummerDate=1-Nov; WinterCona=3.5; WinterU=6.0; WinterDate=1-Apr; DiffusConst=40.0; DiffusSlope=16.0; Salb=0.13; CN2Bare=75; CNRed=20; CNCov=0.8; Thickness=[150.0, 150.0, 300.0, 300.0, 300.0, 300.0, 300.0]; SWCON=[0.300, 0.300, 0.300, 0.300, 0.300, 0.300, 0.300]
            SoilOrganicMatter: RootCN=33; RootWt=0; SoilCN=14.5; EnrACoeff=7.4; EnrBCoeff=0.2
              Thickness  OC    FBiom  FInert
              150.0      1.00  0.05   0.39
              150.0      0.64  0.02   0.47
              300.0      0.64  0.015  0.60
              300.0      0.47  0.01   0.83
              300.0      0.47  0.01   0.93
              300.0      0.35  0.01   0.93
              300.0      0.26  0.01   0.93
            Analysis: Thickness=[150.0, 150.0, 300.0, 300.0, 300.0, 300.0, 300.0]; PH=[6.50, 6.20, 6.20, 6.30, 6.30, 6.40, 6.50]
            Sample Initial nitrogen
              Thickness  NO3  NH4
              150.0      2    1
              150.0      2    1
              300.0      2    1
              300.0      2    1
              300.0      2    1
              300.0      2    1
              300.0      2    1
          surfaceom
            PoolName = wheat  # Organic Matter pool name
            type = wheat  # Organic Matter type
            mass = 500  # Initial surface residue (kg/ha)
            cnr = 40  # C:N ratio of initial residue
            standing_fraction = 0.0  # Fraction of residue standing
          mungbean
          manager2 Irrigate on date
            # Irrigation will be applied on the date(s) below
            sameDays = yes  # Apply Irrigation on the same day(s) each year? (yes/no) - if "no" then must include the year of application below
            irrigDatesStr = 10-jan  # Dates for one or more Irrigation applications (dd-mmm or dd-mmm-yyyy) as a list with a space between dates
            # Irrigation parameters
            amount = 18  # Amount of irrigation to apply (mm)
            eff = 1.0  # Irrigation efficiency (0-1)
            script: same as in Mungbean_REMS.aps18.aps18_Nov4_Berken.paddock.Irrigate on date
          manager2 Irrigate on date1
            # Irrigation will be applied on the date(s) below
            sameDays = yes  # Apply Irrigation on the same day(s) each year? (yes/no) - if "no" then must include the year of application below
            irrigDatesStr = 12-jan 23-mar  # Dates for one or more Irrigation applications (dd-mmm or dd-mmm-yyyy) as a list with a space between dates
            # Irrigation parameters
            amount = 25  # Amount of irrigation to apply (mm)
            eff = 1.0  # Irrigation efficiency (0-1)
            script: same as in Mungbean_REMS.aps18.aps18_Nov4_Berken.paddock.Irrigate on date
          manager2 Irrigate on date2
            # Irrigation will be applied on the date(s) below
            sameDays = yes  # Apply Irrigation on the same day(s) each year? (yes/no) - if "no" then must include the year of application below
            irrigDatesStr = 23-jan 21-mar  # Dates for one or more Irrigation applications (dd-mmm or dd-mmm-yyyy) as a list with a space between dates
            # Irrigation parameters
            amount = 10  # Amount of irrigation to apply (mm)
            eff = 1.0  # Irrigation efficiency (0-1)
            script: same as in Mungbean_REMS.aps18.aps18_Nov4_Berken.paddock.Irrigate on date
          manager2 Irrigate on date3
            # Irrigation will be applied on the date(s) below
            sameDays = yes  # Apply Irrigation on the same day(s) each year? (yes/no) - if "no" then must include the year of application below
            irrigDatesStr = 24-jan  # Dates for one or more Irrigation applications (dd-mmm or dd-mmm-yyyy) as a list with a space between dates
            # Irrigation parameters
            amount = 11  # Amount of irrigation to apply (mm)
            eff = 1.0  # Irrigation efficiency (0-1)
            script: same as in Mungbean_REMS.aps18.aps18_Nov4_Berken.paddock.Irrigate on date
          manager2 Irrigate on date4
            # Irrigation will be applied on the date(s) below
            sameDays = yes  # Apply Irrigation on the same day(s) each year? (yes/no) - if "no" then must include the year of application below
            irrigDatesStr = 26-jan  # Dates for one or more Irrigation applications (dd-mmm or dd-mmm-yyyy) as a list with a space between dates
            # Irrigation parameters
            amount = 16  # Amount of irrigation to apply (mm)
            eff = 1.0  # Irrigation efficiency (0-1)
            script: same as in Mungbean_REMS.aps18.aps18_Nov4_Berken.paddock.Irrigate on date
          manager2 Irrigate on date5
            # Irrigation will be applied on the date(s) below
            sameDays = yes  # Apply Irrigation on the same day(s) each year? (yes/no) - if "no" then must include the year of application below
            irrigDatesStr = 31-jan  # Dates for one or more Irrigation applications (dd-mmm or dd-mmm-yyyy) as a list with a space between dates
            # Irrigation parameters
            amount = 14  # Amount of irrigation to apply (mm)
            eff = 1.0  # Irrigation efficiency (0-1)
            script: same as in Mungbean_REMS.aps18.aps18_Nov4_Berken.paddock.Irrigate on date
          manager2 Irrigate on date6
            # Irrigation will be applied on the date(s) below
            sameDays = yes  # Apply Irrigation on the same day(s) each year? (yes/no) - if "no" then must include the year of application below
            irrigDatesStr = 02-feb  # Dates for one or more Irrigation applications (dd-mmm or dd-mmm-yyyy) as a list with a space between dates
            # Irrigation parameters
            amount = 23  # Amount of irrigation to apply (mm)
            eff = 1.0  # Irrigation efficiency (0-1)
            script: same as in Mungbean_REMS.aps18.aps18_Nov4_Berken.paddock.Irrigate on date
          manager2 Irrigate on date7
            # Irrigation will be applied on the date(s) below
            sameDays = yes  # Apply Irrigation on the same day(s) each year? (yes/no) - if "no" then must include the year of application below
            irrigDatesStr = 16-feb 12-mar  # Dates for one or more Irrigation applications (dd-mmm or dd-mmm-yyyy) as a list with a space between dates
            # Irrigation parameters
            amount = 26  # Amount of irrigation to apply (mm)
            eff = 1.0  # Irrigation efficiency (0-1)
            script: same as in Mungbean_REMS.aps18.aps18_Nov4_Berken.paddock.Irrigate on date
          manager2 Irrigate on date8
            # Irrigation will be applied on the date(s) below
            sameDays = yes  # Apply Irrigation on the same day(s) each year? (yes/no) - if "no" then must include the year of application below
            irrigDatesStr = 01-mar  # Dates for one or more Irrigation applications (dd-mmm or dd-mmm-yyyy) as a list with a space between dates
            # Irrigation parameters
            amount = 31  # Amount of irrigation to apply (mm)
            eff = 1.0  # Irrigation efficiency (0-1)
            script: same as in Mungbean_REMS.aps18.aps18_Nov4_Berken.paddock.Irrigate on date
          manager2 Irrigate on date9
            # Irrigation will be applied on the date(s) below
            sameDays = yes  # Apply Irrigation on the same day(s) each year? (yes/no) - if "no" then must include the year of application below
            irrigDatesStr = 08-mar  # Dates for one or more Irrigation applications (dd-mmm or dd-mmm-yyyy) as a list with a space between dates
            # Irrigation parameters
            amount = 21  # Amount of irrigation to apply (mm)
            eff = 1.0  # Irrigation efficiency (0-1)
            script: same as in Mungbean_REMS.aps18.aps18_Nov4_Berken.paddock.Irrigate on date
          manager2 Irrigate on date10
            # Irrigation will be applied on the date(s) below
            sameDays = yes  # Apply Irrigation on the same day(s) each year? (yes/no) - if "no" then must include the year of application below
            irrigDatesStr = 12-mar  # Dates for one or more Irrigation applications (dd-mmm or dd-mmm-yyyy) as a list with a space between dates
            # Irrigation parameters
            amount = 26  # Amount of irrigation to apply (mm)
            eff = 1.0  # Irrigation efficiency (0-1)
            script: same as in Mungbean_REMS.aps18.aps18_Nov4_Berken.paddock.Irrigate on date
          manager2 Irrigate on date11
            # Irrigation will be applied on the date(s) below
            sameDays = yes  # Apply Irrigation on the same day(s) each year? (yes/no) - if "no" then must include the year of application below
            irrigDatesStr = 16-mar  # Dates for one or more Irrigation applications (dd-mmm or dd-mmm-yyyy) as a list with a space between dates
            # Irrigation parameters
            amount = 24  # Amount of irrigation to apply (mm)
            eff = 1.0  # Irrigation efficiency (0-1)
            script: same as in Mungbean_REMS.aps18.aps18_Nov4_Berken.paddock.Irrigate on date
          manager Empty manager1
            on start_of_day:
```
if leafGreenWt>0 then
SLA=leaf_area/leafGreenWt
endif

if biomass>0 then
HarvestIndex=yield/biomass
endif
```
          outputfile: filename=RCM_Gatton.out; title=RCM_Gatton
            variables
              variables: dd/mm/yyyy as Date, DaysAftersowing, yield, biomass, flowering_das, harvestindex, maturity_das, lai, leafgreenwt, stemgreenwt, podgreenwt, sla, leafgreennconc, stemgreennconc, grainnconc, biomass_n, SLN
    folder RJL1
      simulation RJL1_Dalby_doub_76IrrYes
        clock
          start_date = 25/09/1976
          end_date = 31/05/1977
        summaryfile
        metfile met: filename=MetFiles\dalby25.met
        area paddock
          operations
            09/12/1976  mungbean sow plants = 18.5, sowing_depth = 40, cultivar = berken,crop_class = plant, row_spacing = 600
          fertiliser
          irrigation: same as Mungbean_REMS.aps20.Emerald_high_Dec17.paddock.irrigation
          manager: same as Mungbean_REMS.aps20.Emerald_high_Dec17.paddock.manager
          Soil: Latitude=0; Longitude=0; YearOfSampling=0
            InitialWater Initial water: FractionFull=1; PercentMethod=FilledFromTop; RelativeTo=ll15
            Water
              Thickness  BD    AirDry  LL15   DUL    SAT
              150        1     0.1     0.231  0.518  0.53
              150        1.01  0.209   0.209  0.534  0.55
              300        1.02  0.32    0.323  0.538  0.55
              300        1.07  0.32    0.349  0.578  0.59
              300        1.15  0.32    0.378  0.56   0.566
              300        1.33  0.32    0.43   0.47   0.498
              300        1.33  0.32    0.43   0.47   0.498
              SoilCrop mungbean: LL=[0.22, 0.342, 0.385, 0.386, 0.429, 0.43, 0.43]; KL=[0.08, 0.08, 0.08, 0.06, 0.04, 0.02, 0.01]; XF=[1, 1, 1, 1, 1, 1, 1]
            SoilWater: SummerCona=3.5; SummerU=6; SummerDate=1-Nov; WinterCona=3.5; WinterU=6; WinterDate=1-Apr; DiffusConst=40; DiffusSlope=16; Salb=0.13; CN2Bare=75; CNRed=20; CNCov=0.8; Thickness=[150, 150, 300, 300, 300, 300, 300]; SWCON=[0.22, 0.342, 0.385, 0.386, 0.429, 0.43, 0.43]
            SoilOrganicMatter: RootCN=33; RootWt=0; SoilCN=14.5; EnrACoeff=7.4; EnrBCoeff=0.2
              Thickness  OC     FBiom  FInert
              150.0      0.800  0.05   0.39
              150.0      0.600  0.02   0.47
              300.0      0.500  0.015  0.52
              300.0      0.300  0.01   0.62
              300.0      0.200  0.01   0.74
              300.0      0.200  0.01   0.83
              300.0      0.100  0.01   0.93
            Analysis: Thickness=[150.0, 150.0, 300.0, 300.0, 300.0, 300.0, 300.0]; PH=[8.900, 8.900, 9.000, 9.000, 9.000, 9.000, 9.000]
            Sample Initial nitrogen
              Thickness  NO3  NH4
              150.0      2    1
              150.0      2    1
              300.0      2    1
              300.0      2    1
              300.0      2    1
              300.0      2    1
              300.0      2    1
          surfaceom
            PoolName = wheat  # Organic Matter pool name
            type = wheat  # Organic Matter type
            mass = 1500  # Initial surface residue (kg/ha)
            cnr = 70  # C:N ratio of initial residue
            standing_fraction = 0.0  # Fraction of residue standing
          mungbean
          manager2 Irrigate on date1
            # Irrigation will be applied on the date(s) below
            sameDays = yes  # Apply Irrigation on the same day(s) each year? (yes/no) - if "no" then must include the year of application below
            irrigDatesStr = 14-dec 5-jan 28-jan 3-feb 19-feb  # Dates for one or more Irrigation applications (dd-mmm or dd-mmm-yyyy) as a list with a space between dates
            # Irrigation parameters
            amount = 30  # Amount of irrigation to apply (mm)
            eff = 1.0  # Irrigation efficiency (0-1)
            script: same as in Mungbean_REMS.aps18.aps18_Nov4_Berken.paddock.Irrigate on date
          manager Empty manager1
            on start_of_day:
            script: same as in Mungbean_REMS.aps20.Emerald_high_Dec17.paddock.Empty manager1
          outputfile: filename=RJL1_Dalby_doub_76IrrYes.out; title=RJL1_Dalby_doub_76IrrYes
            variables
              variables: dd/mm/yyyy as Date, DaysAftersowing, yield, biomass, flowering_das, harvestindex, maturity_das, id
      simulation RJL1_Dalby_doub_76IrrNo
        clock
          start_date = 25/09/1976
          end_date = 31/05/1977
        summaryfile
        metfile met: filename=MetFiles\dalby25.met
        area paddock
          operations: same as Mungbean_REMS.RJL1.RJL1_Dalby_doub_76IrrYes.paddock.Operations
          fertiliser
          irrigation: same as Mungbean_REMS.aps20.Emerald_high_Dec17.paddock.irrigation
          manager: same as Mungbean_REMS.aps20.Emerald_high_Dec17.paddock.manager
          Soil: same as Mungbean_REMS.RJL1.RJL1_Dalby_doub_76IrrYes.paddock.soil
          surfaceom
            PoolName = wheat  # Organic Matter pool name
            type = wheat  # Organic Matter type
            mass = 1500  # Initial surface residue (kg/ha)
            cnr = 70  # C:N ratio of initial residue
            standing_fraction = 0.0  # Fraction of residue standing
          mungbean
          manager Empty manager2
            on start_of_day:
            script: same as in Mungbean_REMS.aps20.Emerald_low_Dec28.paddock.Empty manager2
          outputfile -> /Mungbean/Mungbean_REMS/RJL1/RJL1_Dalby_doub_76IrrYes/paddock/outputfile: filename=RJL1_Dalby_doub_76IrrNo.out; title=RJL1_Dalby_doub_76IrrNo
            variables -> /Mungbean/Mungbean_REMS/RJL1/RJL1_Dalby_doub_76IrrYes/paddock/outputfile/variables
      simulation RJL1_Dalby_fall_rain_76IrrNo
        clock
          start_date = 25/09/1976
          end_date = 31/05/1977
        summaryfile
        metfile met: filename=MetFiles\dalby25.met
        area paddock
          operations: same as Mungbean_REMS.RJL1.RJL1_Dalby_doub_76IrrYes.paddock.Operations
          fertiliser
          irrigation: same as Mungbean_REMS.aps20.Emerald_high_Dec17.paddock.irrigation
          manager: same as Mungbean_REMS.aps20.Emerald_high_Dec17.paddock.manager
          Soil: same as Mungbean_REMS.RJL1.RJL1_Dalby_doub_76IrrYes.paddock.soil
          surfaceom
            PoolName = sorghum  # Organic Matter pool name
            type = sorghum  # Organic Matter type
            mass = 5000  # Initial surface residue (kg/ha)
            cnr = 70  # C:N ratio of initial residue
            standing_fraction = 0.0  # Fraction of residue standing
          mungbean
          manager Empty manager2
            on start_of_day:
            script: same as in Mungbean_REMS.aps20.Shangtung_high_Dec18.paddock.Empty manager2
          outputfile -> /Mungbean/Mungbean_REMS/RJL1/RJL1_Dalby_doub_76IrrYes/paddock/outputfile: filename=RJL1_Dalby_fall_rain_76IrrNo.out; title=RJL1_Dalby_fall_rain_76IrrNo
            variables -> /Mungbean/Mungbean_REMS/RJL1/RJL1_Dalby_doub_76IrrYes/paddock/outputfile/variables
      simulation RJL1_Dalby_fall_rain_78IrrNo
        clock
          start_date = 01/01/1978
          end_date = 31/05/1979
        summaryfile
        metfile met: filename=MetFiles\dalby25.met
        area paddock
          operations
            10/01/1978  mungbean sow plants = 10, sowing_depth = 40, cultivar = berken,crop_class = plant, row_spacing = 600
          fertiliser
          irrigation: same as Mungbean_REMS.aps20.Emerald_high_Dec17.paddock.irrigation
          manager: same as Mungbean_REMS.aps20.Emerald_high_Dec17.paddock.manager
          Soil: same as Mungbean_REMS.RJL1.RJL1_Dalby_doub_76IrrYes.paddock.soil
          mungbean
          manager2 Irrigate on date
            # Irrigation will be applied on the date(s) below
            sameDays = yes  # Apply Irrigation on the same day(s) each year? (yes/no) - if "no" then must include the year of application below
            irrigDatesStr = 10-jan  # Dates for one or more Irrigation applications (dd-mmm or dd-mmm-yyyy) as a list with a space between dates
            # Irrigation parameters
            amount = 50  # Amount of irrigation to apply (mm)
            eff = 1.0  # Irrigation efficiency (0-1)
            script: same as in Mungbean_REMS.aps18.aps18_Nov4_Berken.paddock.Irrigate on date
          surfaceom
            PoolName = sorghum  # Organic Matter pool name
            type = sorghum  # Organic Matter type
            mass = 5000  # Initial surface residue (kg/ha)
            cnr = 70  # C:N ratio of initial residue
            standing_fraction = 0.0  # Fraction of residue standing
          manager Empty manager2
            on start_of_day:
            script: same as in Mungbean_REMS.aps20.Celera_high_Dec17.paddock.Empty manager2
          outputfile -> /Mungbean/Mungbean_REMS/RJL1/RJL1_Dalby_doub_76IrrYes/paddock/outputfile: filename=RJL1_Dalby_fall_rain_78IrrNo.out; title=RJL1_Dalby_fall_rain_78IrrNo
            variables -> /Mungbean/Mungbean_REMS/RJL1/RJL1_Dalby_doub_76IrrYes/paddock/outputfile/variables
      folder 1978
        simulation RJL_Dalby_doub_78IrrYes
          clock
            start_date = 01/01/1978
            end_date = 31/05/1979
          summaryfile
          area paddock
            operations
              10/01/1978  mungbean sow plants = 10, sowing_depth = 40, cultivar = berken,crop_class = plant, row_spacing = 600
            fertiliser
            irrigation: same as Mungbean_REMS.aps20.Emerald_high_Dec17.paddock.irrigation
            manager: same as Mungbean_REMS.aps20.Emerald_high_Dec17.paddock.manager
            Soil: same as Mungbean_REMS.RJL1.RJL1_Dalby_doub_76IrrYes.paddock.soil
            surfaceom
              PoolName = wheat  # Organic Matter pool name
              type = wheat  # Organic Matter type
              mass = 1500  # Initial surface residue (kg/ha)
              cnr = 70  # C:N ratio of initial residue
              standing_fraction = 0.0  # Fraction of residue standing
            mungbean
            manager2 Irrigate on date: same as Mungbean_REMS.RJL1.RJL1_Dalby_fall_rain_78IrrNo.paddock.Irrigate on date
            manager2 Irrigate on date1
              # Irrigation will be applied on the date(s) below
              sameDays = yes  # Apply Irrigation on the same day(s) each year? (yes/no) - if "no" then must include the year of application below
              irrigDatesStr = 08-feb 20-feb 09-mar 24-mar  # Dates for one or more Irrigation applications (dd-mmm or dd-mmm-yyyy) as a list with a space between dates
              # Irrigation parameters
              amount = 30  # Amount of irrigation to apply (mm)
              eff = 1.0  # Irrigation efficiency (0-1)
              script: same as in Mungbean_REMS.aps18.aps18_Nov4_Berken.paddock.Irrigate on date
            manager Empty manager2
              on start_of_day:
              script: same as in Mungbean_REMS.aps20.Emerald_low_Dec18.paddock.Empty manager2
            outputfile -> /Mungbean/Mungbean_REMS/RJL1/RJL1_Dalby_doub_76IrrYes/paddock/outputfile: filename=RJL_Dalby_doub_78IrrYes.out; title=RJL_Dalby_doub_78IrrYes
              variables -> /Mungbean/Mungbean_REMS/RJL1/RJL1_Dalby_doub_76IrrYes/paddock/outputfile/variables
          metfile met: filename=MetFiles\dalby25.met
        simulation RJL_Dalby_doub_78IrrNo
          clock
            start_date = 01/01/1978
            end_date = 31/05/1979
          summaryfile
          metfile met: filename=MetFiles\dalby25.met
          area paddock
            fertiliser
            irrigation: same as Mungbean_REMS.aps20.Emerald_high_Dec17.paddock.irrigation
            manager: same as Mungbean_REMS.aps20.Emerald_high_Dec17.paddock.manager
            Soil: same as Mungbean_REMS.RJL1.RJL1_Dalby_doub_76IrrYes.paddock.soil
            surfaceom
              PoolName = wheat  # Organic Matter pool name
              type = wheat  # Organic Matter type
              mass = 1500  # Initial surface residue (kg/ha)
              cnr = 70  # C:N ratio of initial residue
              standing_fraction = 0.0  # Fraction of residue standing
            mungbean
            operations: same as Mungbean_REMS.RJL1.1978.RJL_Dalby_doub_78IrrYes.paddock.Operations
            manager Empty manager2
              on start_of_day:
              script: same as in Mungbean_REMS.aps20.Shangtung_low_Dec27.paddock.Empty manager2
            outputfile -> /Mungbean/Mungbean_REMS/RJL1/RJL1_Dalby_doub_76IrrYes/paddock/outputfile: filename=RJL_Dalby_doub_78IrrNo.out; title=RJL_Dalby_doub_78IrrNo
              variables -> /Mungbean/Mungbean_REMS/RJL1/RJL1_Dalby_doub_76IrrYes/paddock/outputfile/variables
    folder RJL2
      simulation RJL2Sow20p_100cm_Nov18
        clock: start_date=18/11/1976; end_date=11/3/1977
        summaryfile
        metfile met: filename=MetFiles\cooper.met
        area paddock
          operations
            18/11/1976  mungbean sow plants = 20, sowing_depth = 40, cultivar = berken,crop_class = plant, row_spacing = 1000
          fertiliser
          irrigation: same as Mungbean_REMS.NT4.NT4King_Jan4.paddock.irrigation
          manager: same as Mungbean_REMS.aps20.Emerald_high_Dec17.paddock.manager
          Soil: same as Mungbean_REMS.RCM_Gatton.RCM_Gatton.paddock.soil
          surfaceom
            PoolName = wheat  # Organic Matter pool name
            type = wheat  # Organic Matter type
            mass = 500  # Initial surface residue (kg/ha)
            cnr = 40  # C:N ratio of initial residue
            standing_fraction = 0.0  # Fraction of residue standing
          mungbean
          manager Empty manager1
            on start_of_day:
            script: same as in Mungbean_REMS.aps20.Emerald_high_Dec17.paddock.Empty manager1
          outputfile: filename=RJL2Sow20p_100cm_Nov18.out; title=RJL2Sow20p_100cm_Nov18
            variables
              variables: dd/mm/yyyy as Date, DaysAftersowing, yield, biomass, flowering_das, harvestindex, maturity_das, id
      simulation RJL2Sow27p_75cm_Jan24
        clock
          start_date = 18/11/1976
          end_date = 11/05/1977
        summaryfile
        metfile met: filename=MetFiles\cooper.met
        area paddock
          operations
            24/01/1977  mungbean sow plants = 27, sowing_depth = 40, cultivar = berken,crop_class = plant, row_spacing = 750
          fertiliser
          irrigation: same as Mungbean_REMS.NT4.NT4King_Jan4.paddock.irrigation
          manager: same as Mungbean_REMS.aps20.Emerald_high_Dec17.paddock.manager
          Soil: same as Mungbean_REMS.RCM_Gatton.RCM_Gatton.paddock.soil
          surfaceom
            PoolName = wheat  # Organic Matter pool name
            type = wheat  # Organic Matter type
            mass = 500  # Initial surface residue (kg/ha)
            cnr = 40  # C:N ratio of initial residue
            standing_fraction = 0.0  # Fraction of residue standing
          mungbean
          manager Empty manager2
            on start_of_day:
            script: same as in Mungbean_REMS.aps20.Emerald_low_Dec28.paddock.Empty manager2
          outputfile -> /Mungbean/Mungbean_REMS/RJL2/RJL2Sow20p_100cm_Nov18/paddock/outputfile: filename=RJL2Sow27p_75cm_Jan24.out; title=RJL2Sow27p_75cm_Jan24
            variables -> /Mungbean/Mungbean_REMS/RJL2/RJL2Sow20p_100cm_Nov18/paddock/outputfile/variables
      simulation RJL2Sow40p_50cm_Jan24
        clock
          start_date = 18/11/1976
          end_date = 11/05/1977
        summaryfile
        metfile met: filename=MetFiles\cooper.met
        area paddock
          operations
            24/01/1977  mungbean sow plants = 40, sowing_depth = 40, cultivar = berken,crop_class = plant, row_spacing = 500
          fertiliser
          irrigation: same as Mungbean_REMS.NT4.NT4King_Jan4.paddock.irrigation
          manager: same as Mungbean_REMS.aps20.Emerald_high_Dec17.paddock.manager
          Soil: same as Mungbean_REMS.RCM_Gatton.RCM_Gatton.paddock.soil
          surfaceom
            PoolName = wheat  # Organic Matter pool name
            type = wheat  # Organic Matter type
            mass = 500  # Initial surface residue (kg/ha)
            cnr = 40  # C:N ratio of initial residue
            standing_fraction = 0.0  # Fraction of residue standing
          mungbean
          manager Empty manager2
            on start_of_day:
            script: same as in Mungbean_REMS.aps20.Emerald_low_Dec18.paddock.Empty manager2
          outputfile -> /Mungbean/Mungbean_REMS/RJL2/RJL2Sow20p_100cm_Nov18/paddock/outputfile: filename=RJL2Sow40p_50cm_Jan24.out; title=RJL2Sow40p_50cm_Jan24
            variables -> /Mungbean/Mungbean_REMS/RJL2/RJL2Sow20p_100cm_Nov18/paddock/outputfile/variables
      simulation RJL2Sow80p_25cm_Jan24
        clock
          start_date = 18/11/1976
          end_date = 11/05/1977
        summaryfile
        metfile met: filename=MetFiles\cooper.met
        area paddock
          operations
            24/01/1977  mungbean sow plants = 80, sowing_depth = 40, cultivar = berken,crop_class = plant, row_spacing = 250
          fertiliser
          irrigation: same as Mungbean_REMS.NT4.NT4King_Jan4.paddock.irrigation
          manager: same as Mungbean_REMS.aps20.Emerald_high_Dec17.paddock.manager
          Soil: same as Mungbean_REMS.RCM_Gatton.RCM_Gatton.paddock.soil
          surfaceom
            PoolName = wheat  # Organic Matter pool name
            type = wheat  # Organic Matter type
            mass = 500  # Initial surface residue (kg/ha)
            cnr = 40  # C:N ratio of initial residue
            standing_fraction = 0.0  # Fraction of residue standing
          mungbean
          manager Empty manager2
            on start_of_day:
            script: same as in Mungbean_REMS.aps20.Shangtung_low_Dec27.paddock.Empty manager2
          outputfile -> /Mungbean/Mungbean_REMS/RJL2/RJL2Sow20p_100cm_Nov18/paddock/outputfile: filename=RJL2Sow80p_25cm_Jan24.out; title=RJL2Sow80p_25cm_Jan24
            variables -> /Mungbean/Mungbean_REMS/RJL2/RJL2Sow20p_100cm_Nov18/paddock/outputfile/variables
      simulation RJL2Sow27p_75cm_Nov18
        clock
          start_date = 18/11/1976
          end_date = 11/05/1977
        summaryfile
        metfile met: filename=MetFiles\cooper.met
        area paddock
          operations
            18/11/1976  mungbean sow plants = 27, sowing_depth = 40, cultivar = berken,crop_class = plant, row_spacing = 750
          fertiliser
          irrigation: same as Mungbean_REMS.NT4.NT4King_Jan4.paddock.irrigation
          manager: same as Mungbean_REMS.aps20.Emerald_high_Dec17.paddock.manager
          Soil: same as Mungbean_REMS.RCM_Gatton.RCM_Gatton.paddock.soil
          surfaceom
            PoolName = wheat  # Organic Matter pool name
            type = wheat  # Organic Matter type
            mass = 500  # Initial surface residue (kg/ha)
            cnr = 40  # C:N ratio of initial residue
            standing_fraction = 0.0  # Fraction of residue standing
          mungbean
          manager Empty manager2
            on start_of_day:
            script: same as in Mungbean_REMS.aps20.Shangtung_high_Dec18.paddock.Empty manager2
          outputfile -> /Mungbean/Mungbean_REMS/RJL2/RJL2Sow20p_100cm_Nov18/paddock/outputfile: filename=RJL2Sow27p_75cm_Nov18.out; title=RJL2Sow27p_75cm_Nov18
            variables -> /Mungbean/Mungbean_REMS/RJL2/RJL2Sow20p_100cm_Nov18/paddock/outputfile/variables
      simulation RJL2Sow40p_50cm_Nov18
        clock
          start_date = 18/11/1976
          end_date = 11/05/1977
        summaryfile
        metfile met: filename=MetFiles\cooper.met
        area paddock
          operations
            18/11/1976  mungbean sow plants = 40, sowing_depth = 40, cultivar = berken,crop_class = plant, row_spacing = 500
          fertiliser
          irrigation: same as Mungbean_REMS.NT4.NT4King_Jan4.paddock.irrigation
          manager: same as Mungbean_REMS.aps20.Emerald_high_Dec17.paddock.manager
          Soil: same as Mungbean_REMS.RCM_Gatton.RCM_Gatton.paddock.soil
          surfaceom
            PoolName = wheat  # Organic Matter pool name
            type = wheat  # Organic Matter type
            mass = 500  # Initial surface residue (kg/ha)
            cnr = 40  # C:N ratio of initial residue
            standing_fraction = 0.0  # Fraction of residue standing
          mungbean
          manager Empty manager2
            on start_of_day:
            script: same as in Mungbean_REMS.aps20.Celera_high_Dec17.paddock.Empty manager2
          outputfile -> /Mungbean/Mungbean_REMS/RJL2/RJL2Sow20p_100cm_Nov18/paddock/outputfile: filename=RJL2Sow40p_50cm_Nov18.out; title=RJL2Sow40p_50cm_Nov18
            variables -> /Mungbean/Mungbean_REMS/RJL2/RJL2Sow20p_100cm_Nov18/paddock/outputfile/variables
      simulation RJL2Sow80p_25cm_Nov18
        clock
          start_date = 18/11/1976
          end_date = 11/05/1977
        summaryfile
        metfile met: filename=MetFiles\cooper.met
        area paddock
          operations
            18/11/1976  mungbean sow plants = 80, sowing_depth = 40, cultivar = berken,crop_class = plant, row_spacing = 250
          fertiliser
          irrigation: same as Mungbean_REMS.NT4.NT4King_Jan4.paddock.irrigation
          manager: same as Mungbean_REMS.aps20.Emerald_high_Dec17.paddock.manager
          Soil: same as Mungbean_REMS.RCM_Gatton.RCM_Gatton.paddock.soil
          surfaceom
            PoolName = wheat  # Organic Matter pool name
            type = wheat  # Organic Matter type
            mass = 500  # Initial surface residue (kg/ha)
            cnr = 40  # C:N ratio of initial residue
            standing_fraction = 0.0  # Fraction of residue standing
          mungbean
          manager Empty manager2
            on start_of_day:
            script: same as in Mungbean_REMS.aps20.Satin_low_Dec20.paddock.Empty manager2
          outputfile -> /Mungbean/Mungbean_REMS/RJL2/RJL2Sow20p_100cm_Nov18/paddock/outputfile: filename=RJL2Sow80p_25cm_Nov18.out; title=RJL2Sow80p_25cm_Nov18
            variables -> /Mungbean/Mungbean_REMS/RJL2/RJL2Sow20p_100cm_Nov18/paddock/outputfile/variables
      simulation RJL2Sow20p_100cm_Dec20
        clock
          start_date = 18/11/1976
          end_date = 11/05/1977
        summaryfile
        metfile met: filename=MetFiles\cooper.met
        area paddock
          operations
            20/12/1976  mungbean sow plants = 20, sowing_depth = 40, cultivar = berken,crop_class = plant, row_spacing = 1000
          fertiliser
          irrigation: same as Mungbean_REMS.NT4.NT4King_Jan4.paddock.irrigation
          manager: same as Mungbean_REMS.aps20.Emerald_high_Dec17.paddock.manager
          Soil: same as Mungbean_REMS.RCM_Gatton.RCM_Gatton.paddock.soil
          surfaceom
            PoolName = wheat  # Organic Matter pool name
            type = wheat  # Organic Matter type
            mass = 500  # Initial surface residue (kg/ha)
            cnr = 40  # C:N ratio of initial residue
            standing_fraction = 0.0  # Fraction of residue standing
          mungbean
          manager Empty manager2
            on start_of_day:
            script: same as in Mungbean_REMS.aps20.Satin_high_Dec18.paddock.Empty manager2
          outputfile -> /Mungbean/Mungbean_REMS/RJL2/RJL2Sow20p_100cm_Nov18/paddock/outputfile: filename=RJL2Sow20p_100cm_Dec20.out; title=RJL2Sow20p_100cm_Dec20
            variables -> /Mungbean/Mungbean_REMS/RJL2/RJL2Sow20p_100cm_Nov18/paddock/outputfile/variables
      simulation RJL2Sow27p_75cm_Dec20
        clock
          start_date = 18/11/1976
          end_date = 11/05/1977
        summaryfile
        metfile met: filename=MetFiles\cooper.met
        area paddock
          operations
            20/12/1976  mungbean sow plants = 27, sowing_depth = 40, cultivar = berken,crop_class = plant, row_spacing = 750
          fertiliser
          irrigation: same as Mungbean_REMS.NT4.NT4King_Jan4.paddock.irrigation
          manager: same as Mungbean_REMS.aps20.Emerald_high_Dec17.paddock.manager
          Soil: same as Mungbean_REMS.RCM_Gatton.RCM_Gatton.paddock.soil
          surfaceom
            PoolName = wheat  # Organic Matter pool name
            type = wheat  # Organic Matter type
            mass = 500  # Initial surface residue (kg/ha)
            cnr = 40  # C:N ratio of initial residue
            standing_fraction = 0.0  # Fraction of residue standing
          mungbean
          manager Empty manager2
            on start_of_day:
            script: same as in Mungbean_REMS.aps18.aps18_Jan17_King.paddock.Empty manager2
          outputfile -> /Mungbean/Mungbean_REMS/RJL2/RJL2Sow20p_100cm_Nov18/paddock/outputfile: filename=RJL2Sow27p_75cm_Dec20.out; title=RJL2Sow27p_75cm_Dec20
            variables -> /Mungbean/Mungbean_REMS/RJL2/RJL2Sow20p_100cm_Nov18/paddock/outputfile/variables
      simulation RJL2Sow40p_50cm_Dec20
        clock
          start_date = 18/11/1976
          end_date = 11/05/1977
        summaryfile
        metfile met: filename=MetFiles\cooper.met
        area paddock
          operations
            20/12/1976  mungbean sow plants = 40, sowing_depth = 40, cultivar = berken,crop_class = plant, row_spacing = 500
          fertiliser
          irrigation: same as Mungbean_REMS.NT4.NT4King_Jan4.paddock.irrigation
          manager: same as Mungbean_REMS.aps20.Emerald_high_Dec17.paddock.manager
          Soil: same as Mungbean_REMS.RCM_Gatton.RCM_Gatton.paddock.soil
          surfaceom
            PoolName = wheat  # Organic Matter pool name
            type = wheat  # Organic Matter type
            mass = 500  # Initial surface residue (kg/ha)
            cnr = 40  # C:N ratio of initial residue
            standing_fraction = 0.0  # Fraction of residue standing
          mungbean
          manager Empty manager2
            on start_of_day:
            script: same as in Mungbean_REMS.aps18.aps18_Feb1_King.paddock.Empty manager2
          outputfile -> /Mungbean/Mungbean_REMS/RJL2/RJL2Sow20p_100cm_Nov18/paddock/outputfile: filename=RJL2Sow40p_50cm_Dec20.out; title=RJL2Sow40p_50cm_Dec20
            variables -> /Mungbean/Mungbean_REMS/RJL2/RJL2Sow20p_100cm_Nov18/paddock/outputfile/variables
      simulation RJL2Sow80p_25cm_Dec20
        clock
          start_date = 18/11/1976
          end_date = 11/05/1977
        summaryfile
        metfile met: filename=MetFiles\cooper.met
        area paddock
          operations
            20/12/1976  mungbean sow plants = 80, sowing_depth = 40, cultivar = berken,crop_class = plant, row_spacing = 250
          fertiliser
          irrigation: same as Mungbean_REMS.NT4.NT4King_Jan4.paddock.irrigation
          manager: same as Mungbean_REMS.aps20.Emerald_high_Dec17.paddock.manager
          Soil: same as Mungbean_REMS.RCM_Gatton.RCM_Gatton.paddock.soil
          surfaceom
            PoolName = wheat  # Organic Matter pool name
            type = wheat  # Organic Matter type
            mass = 500  # Initial surface residue (kg/ha)
            cnr = 40  # C:N ratio of initial residue
            standing_fraction = 0.0  # Fraction of residue standing
          mungbean
          manager Empty manager2
            on start_of_day:
```
if leafGreenWt>0 then
SLA=leaf_area/leafGreenWt
endif

if biomass>0 then
HarvestIndex=yield/biomass
endif

id=11
```
          outputfile -> /Mungbean/Mungbean_REMS/RJL2/RJL2Sow20p_100cm_Nov18/paddock/outputfile: filename=RJL2Sow80p_25cm_Dec20.out; title=RJL2Sow80p_25cm_Dec20
            variables -> /Mungbean/Mungbean_REMS/RJL2/RJL2Sow20p_100cm_Nov18/paddock/outputfile/variables
      simulation RJL2Sow20p_100cm_Jan24
        clock
          start_date = 18/11/1976
          end_date = 11/05/1977
        summaryfile
        metfile met: filename=MetFiles\cooper.met
        area paddock
          operations
            24/01/1977  mungbean sow plants = 20, sowing_depth = 40, cultivar = berken,crop_class = plant, row_spacing = 1000
          fertiliser
          irrigation: same as Mungbean_REMS.NT4.NT4King_Jan4.paddock.irrigation
          manager: same as Mungbean_REMS.aps20.Emerald_high_Dec17.paddock.manager
          Soil
            InitialWater Initial water: FractionFull=1; PercentMethod=EvenlyDistributed
            Water: same as Mungbean_REMS.RCM_Gatton.RCM_Gatton.paddock.soil.Water
            SoilWater: same as Mungbean_REMS.RCM_Gatton.RCM_Gatton.paddock.soil.SoilWater
            SoilOrganicMatter: same as Mungbean_REMS.RCM_Gatton.RCM_Gatton.paddock.soil.SoilOrganicMatter
            Analysis: Thickness=[150.0, 150.0, 300.0, 300.0, 300.0, 300.0, 300.0]; PH=[6.50, 6.20, 6.20, 6.30, 6.30, 6.40, 6.50]
            Sample Initial nitrogen: NO3Units=ppm; NH4Units=ppm; SWUnits=Volumetric; OCUnits=Total; PHUnits=Water
              Thickness  NO3  NH4
              150        2    1
              150        2    1
              300        2    1
              300        2    1
              300        2    1
              300        2    1
              300        2    1
          surfaceom
            PoolName = wheat  # Organic Matter pool name
            type = wheat  # Organic Matter type
            mass = 500  # Initial surface residue (kg/ha)
            cnr = 40  # C:N ratio of initial residue
            standing_fraction = 0.0  # Fraction of residue standing
          mungbean
          manager Empty manager2
            on start_of_day:
```
if leafGreenWt>0 then
SLA=leaf_area/leafGreenWt
endif

if biomass>0 then
HarvestIndex=yield/biomass
endif

id=12
```
          outputfile -> /Mungbean/Mungbean_REMS/RJL2/RJL2Sow20p_100cm_Nov18/paddock/outputfile: filename=RJL2Sow20p_100cm_Jan24.out; title=RJL2Sow20p_100cm_Jan24
            variables -> /Mungbean/Mungbean_REMS/RJL2/RJL2Sow20p_100cm_Nov18/paddock/outputfile/variables
  folder Mungbean_jngh
    folder Irr
      simulation Mungbean_jnghIrr_Dec4
        clock: start_date=4/12/1997; end_date=30/4/1998
        summaryfile
        metfile met: filename=MetFiles\Gat34.met
        area paddock
          operations
            04/12/1997  mungbean sow plants = 40.0,crop_class = plant, row_spacing = 400, sowing_depth = 50, cultivar = emerald
          fertiliser
          irrigation: same as Mungbean_REMS.aps20.Emerald_high_Dec17.paddock.irrigation
          manager
            on init:
```
                 dateset = 0
                 emer_date = 0
                 endjuv_date = 0
                 anth_date = 0
                 mat_date = 0
```
            on end_of_day:
```
                 !outputfile do_output
                 if mungbean.stage = 3 and dateset = 0 then
                    emer_date = daysaftersowing
                    dateset = 1
                 endif
                 if mungbean.stage = 4 and dateset = 1 then
                    endjuv_date = daysaftersowing
                    dateset = 2
                 endif
                 if mungbean.stage = 6 and dateset = 2 then
                    anth_date = daysaftersowing
                    dateset = 3
                 endif
                 if mungbean.stage = 9 and dateset = 3 then
                    mat_date = daysaftersowing
                    dateset = 4
                 endif
            if (mungbean.stagename = 'maturity' or mungbean.plant_status = 'dead') then
               outputfile do_output
               mungbean harvest 
               mungbean kill_crop 
               mungbean end_crop
               dateset = 0
            endif
            !second flush!!!!!!!!!!!!!
            ![standard.manager.init]       
             !dateset = 0
              !   anth_date = 0
              !   mat_date = 0
             ![standard.manager.end_of_day]
              !  report do_output
               !  if mungbean.stage = 6 and dateset = 0 then
                !    anth_date = daysaftersowing
                 !   dateset = 1
                 !endif
                 !if mungbean.tt_tot(7)>600 and dateset = 1 then
                  !  mat_date1=daysaftersowing
                  !  report do_output
                  !  dataset = 2
                 !endif
                 !if mungbean.stage = 8 and dateset = 2 then
                  !  mat_date2 = daysaftersowing
                   ! dateset = 3
                 !endif
            !if (mungbean.stagename = 'harvest_ripe' or mungbean.plant_status = 'dead') then
             !  report do_output
             !  mungbean harvest 
             !  mungbean kill_crop 
             !  mungbean end_crop
             !  dateset = 0
            !endif
```
          Soil
            Water
              Thickness  BD    AirDry  LL15  DUL   SAT
              200        1.37  0.05    0.18  0.41  0.43
              200        1.27  0.19    0.19  0.47  0.48
              200        1.28  0.22    0.22  0.41  0.45
              200        1.33  0.19    0.19  0.41  0.45
              200        1.37  0.22    0.22  0.37  0.45
              200        1.42  0.19    0.19  0.37  0.44
              200        1.36  0.17    0.17  0.37  0.4
              200        1.35  0.17    0.17  0.37  0.4
              SoilCrop mungbean: LL=[0.2, 0.273, 0.271, 0.273, 0.294, 0.275, 0.29, 0.306]; KL=[0.08, 0.08, 0.08, 0.08, 0.06, 0.04, 0.02, 0.01]; XF=[1, 1, 1, 1, 1, 1, 1, 1]
            SoilWater: SummerCona=3.5; SummerU=6; SummerDate=1-Nov; WinterCona=3.5; WinterU=6; WinterDate=1-Apr; DiffusConst=88; DiffusSlope=35.4; Salb=0.13; CN2Bare=72; CNRed=20; CNCov=0.8; Thickness=[200, 200, 200, 200, 200, 200, 200, 200]; SWCON=[0.391, 0.416, 0.397, 0.377, 0.369, 0.34, 0.309, 0.304]
            SoilOrganicMatter: RootCN=33; RootWt=0; SoilCN=14.5; EnrACoeff=7.4; EnrBCoeff=0.2; OCUnits=Total
              Thickness  OC    FBiom  FInert
              200        2.2   0.02   0.36
              200        1.6   0.015  0.5
              200        1.35  0.01   0.59
              200        0.95  0.01   0.84
              200        1     0.01   0.8
              200        0.8   0.01   0.99
              200        0.45  0.01   0.99
              200        0.45  0.01   0.99
            Analysis: Thickness=[200.0, 200.0, 200.0, 200.0, 200.0, 200.0, 200.0, 200.0]; PH=[7.50, 8.00, 8.00, 8.00, 8.00, 8.00, 8.00, 8.00]
            Sample Initial nitrogen
              Thickness  NO3   NH4
              200.0      0.14  1
              200.0      0.32  1
              200.0      0.30  1
              200.0      0.15  1
              200.0      0.17  1
              200.0      0.08  1
              200.0      0.08  1
              200.0      0.09  1
            Sample Initial water: Thickness=[200, 200, 200, 200, 200, 200, 200, 200]; SW=[0.391, 0.416, 0.397, 0.377, 0.369, 0.34, 0.309, 0.304]; NO3Units=ppm; NH4Units=ppm; SWUnits=Volumetric; OCUnits=Total; PHUnits=Water
          surfaceom
            PoolName = wheat  # Organic Matter pool name
            type = wheat  # Organic Matter type
            mass = 500  # Initial surface residue (kg/ha)
            cnr = 40  # C:N ratio of initial residue
            standing_fraction = 0.0  # Fraction of residue standing
          mungbean
          manager2 Irrigate on date
            # Irrigation will be applied on the date(s) below
            sameDays = yes  # Apply Irrigation on the same day(s) each year? (yes/no) - if "no" then must include the year of application below
            irrigDatesStr = 04-dec  # Dates for one or more Irrigation applications (dd-mmm or dd-mmm-yyyy) as a list with a space between dates
            # Irrigation parameters
            amount = 40  # Amount of irrigation to apply (mm)
            eff = 1.0  # Irrigation efficiency (0-1)
            script: same as in Mungbean_REMS.aps18.aps18_Nov4_Berken.paddock.Irrigate on date
          manager2 Irrigate on date1
            # Irrigation will be applied on the date(s) below
            sameDays = yes  # Apply Irrigation on the same day(s) each year? (yes/no) - if "no" then must include the year of application below
            irrigDatesStr = 18-dec 02-jan 06-feb 18-mar  # Dates for one or more Irrigation applications (dd-mmm or dd-mmm-yyyy) as a list with a space between dates
            # Irrigation parameters
            amount = 20  # Amount of irrigation to apply (mm)
            eff = 1.0  # Irrigation efficiency (0-1)
            script: same as in Mungbean_REMS.aps18.aps18_Nov4_Berken.paddock.Irrigate on date
          manager2 Irrigate on date2
            # Irrigation will be applied on the date(s) below
            sameDays = yes  # Apply Irrigation on the same day(s) each year? (yes/no) - if "no" then must include the year of application below
            irrigDatesStr = 06-jan 13-jan 27-jan 13-mar 27-mar  # Dates for one or more Irrigation applications (dd-mmm or dd-mmm-yyyy) as a list with a space between dates
            # Irrigation parameters
            amount = 25  # Amount of irrigation to apply (mm)
            eff = 1.0  # Irrigation efficiency (0-1)
            script: same as in Mungbean_REMS.aps18.aps18_Nov4_Berken.paddock.Irrigate on date
          manager2 Irrigate on date3
            # Irrigation will be applied on the date(s) below
            sameDays = yes  # Apply Irrigation on the same day(s) each year? (yes/no) - if "no" then must include the year of application below
            irrigDatesStr = 19-jan  # Dates for one or more Irrigation applications (dd-mmm or dd-mmm-yyyy) as a list with a space between dates
            # Irrigation parameters
            amount = 30  # Amount of irrigation to apply (mm)
            eff = 1.0  # Irrigation efficiency (0-1)
            script: same as in Mungbean_REMS.aps18.aps18_Nov4_Berken.paddock.Irrigate on date
          manager2 Irrigate on date4
            # Irrigation will be applied on the date(s) below
            sameDays = yes  # Apply Irrigation on the same day(s) each year? (yes/no) - if "no" then must include the year of application below
            irrigDatesStr = 27-feb  # Dates for one or more Irrigation applications (dd-mmm or dd-mmm-yyyy) as a list with a space between dates
            # Irrigation parameters
            amount = 15  # Amount of irrigation to apply (mm)
            eff = 1.0  # Irrigation efficiency (0-1)
            script: same as in Mungbean_REMS.aps18.aps18_Nov4_Berken.paddock.Irrigate on date
          manager2 Irrigate on date5
            # Irrigation will be applied on the date(s) below
            sameDays = yes  # Apply Irrigation on the same day(s) each year? (yes/no) - if "no" then must include the year of application below
            irrigDatesStr = 06-mar  # Dates for one or more Irrigation applications (dd-mmm or dd-mmm-yyyy) as a list with a space between dates
            # Irrigation parameters
            amount = 33  # Amount of irrigation to apply (mm)
            eff = 1.0  # Irrigation efficiency (0-1)
            script: same as in Mungbean_REMS.aps18.aps18_Nov4_Berken.paddock.Irrigate on date
          manager Empty manager1
            on start_of_day:
```
if leafGreenWt>0 then
SLA=leaf_area/leafGreenWt
endif

if biomass>0 then
HarvestIndex=yield/biomass
endif

if biomass>0 then
VegBiomass=biomass-yield
endif

id=1
```
          outputfile: filename=Mungbean_jnghIrr_Dec4.out; title=Mungbean_jnghIrr_Dec4
            variables
              variables: dd/mm/yyyy as Date, DaysAftersowing, yield, biomass, flowering_das, harvestindex, maturity_das, id, lai, leafgreenwt, stemgreenwt, podgreenwt, biomass_n
      simulation Mungbean_jnghIrr_Dec18
        clock: start_date=4/12/1997; end_date=30/4/1998
        summaryfile
        metfile met: filename=MetFiles\Gat34.met
        area paddock
          operations
            18/12/1997  mungbean sow plants = 40.0,crop_class = plant, row_spacing = 400, sowing_depth = 50, cultivar = emerald
          fertiliser
          irrigation: same as Mungbean_REMS.aps20.Emerald_high_Dec17.paddock.irrigation
          manager: same as Mungbean_jngh.Irr.Mungbean_jnghIrr_Dec4.paddock.manager
          Soil
            Water: same as Mungbean_jngh.Irr.Mungbean_jnghIrr_Dec4.paddock.soil.Water
            SoilWater: SummerCona=3.5; SummerU=6; SummerDate=1-Nov; WinterCona=3.5; WinterU=6; WinterDate=1-Apr; DiffusConst=88; DiffusSlope=35.4; Salb=0.13; CN2Bare=72; CNRed=20; CNCov=0.8; Thickness=[200, 200, 200, 200, 200, 200, 200, 200]; SWCON=[0.401, 0.411, 0.399, 0.379, 0.362, 0.305, 0.298, 0.306]
            SoilOrganicMatter: same as Mungbean_jngh.Irr.Mungbean_jnghIrr_Dec4.paddock.soil.SoilOrganicMatter
            Analysis: Thickness=[200.0, 200.0, 200.0, 200.0, 200.0, 200.0, 200.0, 200.0]; PH=[7.50, 8.00, 8.00, 8.00, 8.00, 8.00, 8.00, 8.00]
            Sample Initial nitrogen
              Thickness  NO3   NH4
              200.0      0.14  1
              200.0      0.32  1
              200.0      0.30  1
              200.0      0.15  1
              200.0      0.17  1
              200.0      0.08  1
              200.0      0.08  1
              200.0      0.09  1
            Sample Initial water: Thickness=[200, 200, 200, 200, 200, 200, 200, 200]; SW=[0.401, 0.411, 0.399, 0.379, 0.362, 0.305, 0.298, 0.306]; NO3Units=ppm; NH4Units=ppm; SWUnits=Volumetric; OCUnits=Total; PHUnits=Water
          surfaceom
            PoolName = wheat  # Organic Matter pool name
            type = wheat  # Organic Matter type
            mass = 500  # Initial surface residue (kg/ha)
            cnr = 40  # C:N ratio of initial residue
            standing_fraction = 0.0  # Fraction of residue standing
          mungbean
          manager2 Irrigate on date: same as Mungbean_jngh.Irr.Mungbean_jnghIrr_Dec4.paddock.Irrigate on date
          manager2 Irrigate on date1: same as Mungbean_jngh.Irr.Mungbean_jnghIrr_Dec4.paddock.Irrigate on date1
          manager2 Irrigate on date2: same as Mungbean_jngh.Irr.Mungbean_jnghIrr_Dec4.paddock.Irrigate on date2
          manager2 Irrigate on date3: same as Mungbean_jngh.Irr.Mungbean_jnghIrr_Dec4.paddock.Irrigate on date3
          manager2 Irrigate on date4: same as Mungbean_jngh.Irr.Mungbean_jnghIrr_Dec4.paddock.Irrigate on date4
          manager2 Irrigate on date5: same as Mungbean_jngh.Irr.Mungbean_jnghIrr_Dec4.paddock.Irrigate on date5
          manager Empty manager2
            on start_of_day:
```
if leafGreenWt>0 then
SLA=leaf_area/leafGreenWt
endif

if biomass>0 then
HarvestIndex=yield/biomass
endif

if biomass>0 then
VegBiomass=biomass-yield
endif

id=2
```
          outputfile -> /Mungbean/Mungbean_jngh/Irr/Mungbean_jnghIrr_Dec4/paddock/outputfile: filename=Mungbean_jnghIrr_Dec18.out; title=Mungbean_jnghIrr_Dec18
            variables -> /Mungbean/Mungbean_jngh/Irr/Mungbean_jnghIrr_Dec4/paddock/outputfile/variables
      simulation Mungbean_jnghIrr_Dec31
        clock: start_date=4/12/1997; end_date=30/4/1998
        summaryfile
        metfile met: filename=MetFiles\Gat34.met
        area paddock
          operations
            31/12/1997  mungbean sow plants = 40.0,crop_class = plant, row_spacing = 400, sowing_depth = 50, cultivar = emerald
          fertiliser
          irrigation: same as Mungbean_REMS.aps20.Emerald_high_Dec17.paddock.irrigation
          manager: same as Mungbean_jngh.Irr.Mungbean_jnghIrr_Dec4.paddock.manager
          Soil
            Water: same as Mungbean_jngh.Irr.Mungbean_jnghIrr_Dec4.paddock.soil.Water
            SoilWater: SummerCona=3.5; SummerU=6; SummerDate=1-Nov; WinterCona=3.5; WinterU=6; WinterDate=1-Apr; DiffusConst=88; DiffusSlope=35.4; Salb=0.13; CN2Bare=72; CNRed=20; CNCov=0.8; Thickness=[200, 200, 200, 200, 200, 200, 200, 200]; SWCON=[0.417, 0.418, 0.4, 0.384, 0.371, 0.345, 0.334, 0.327]
            SoilOrganicMatter: same as Mungbean_jngh.Irr.Mungbean_jnghIrr_Dec4.paddock.soil.SoilOrganicMatter
            Analysis: Thickness=[200.0, 200.0, 200.0, 200.0, 200.0, 200.0, 200.0, 200.0]; PH=[7.50, 8.00, 8.00, 8.00, 8.00, 8.00, 8.00, 8.00]
            Sample Initial nitrogen
              Thickness  NO3   NH4
              200.0      0.14  1
              200.0      0.32  1
              200.0      0.30  1
              200.0      0.15  1
              200.0      0.17  1
              200.0      0.08  1
              200.0      0.08  1
              200.0      0.09  1
            Sample Initial water: Thickness=[200, 200, 200, 200, 200, 200, 200, 200]; SW=[0.417, 0.418, 0.4, 0.384, 0.371, 0.345, 0.334, 0.327]; NO3Units=ppm; NH4Units=ppm; SWUnits=Volumetric; OCUnits=Total; PHUnits=Water
          surfaceom
            PoolName = wheat  # Organic Matter pool name
            type = wheat  # Organic Matter type
            mass = 500  # Initial surface residue (kg/ha)
            cnr = 40  # C:N ratio of initial residue
            standing_fraction = 0.0  # Fraction of residue standing
          mungbean
          manager2 Irrigate on date: same as Mungbean_jngh.Irr.Mungbean_jnghIrr_Dec4.paddock.Irrigate on date
          manager2 Irrigate on date1: same as Mungbean_jngh.Irr.Mungbean_jnghIrr_Dec4.paddock.Irrigate on date1
          manager2 Irrigate on date2: same as Mungbean_jngh.Irr.Mungbean_jnghIrr_Dec4.paddock.Irrigate on date2
          manager2 Irrigate on date3: same as Mungbean_jngh.Irr.Mungbean_jnghIrr_Dec4.paddock.Irrigate on date3
          manager2 Irrigate on date4: same as Mungbean_jngh.Irr.Mungbean_jnghIrr_Dec4.paddock.Irrigate on date4
          manager2 Irrigate on date5: same as Mungbean_jngh.Irr.Mungbean_jnghIrr_Dec4.paddock.Irrigate on date5
          manager Empty manager2
            on start_of_day:
```
if leafGreenWt>0 then
SLA=leaf_area/leafGreenWt
endif

if biomass>0 then
HarvestIndex=yield/biomass
endif

if biomass>0 then
VegBiomass=biomass-yield
endif

id=3
```
          outputfile -> /Mungbean/Mungbean_jngh/Irr/Mungbean_jnghIrr_Dec4/paddock/outputfile: filename=Mungbean_jnghIrr_Dec31.out; title=Mungbean_jnghIrr_Dec31
            variables -> /Mungbean/Mungbean_jngh/Irr/Mungbean_jnghIrr_Dec4/paddock/outputfile/variables
    folder RF
      simulation Mungbean_jnghRF_Dec4
        clock: start_date=4/12/1997; end_date=30/4/1998
        summaryfile
        metfile met: filename=MetFiles\Gat34.met
        area paddock
          operations: same as Mungbean_jngh.Irr.Mungbean_jnghIrr_Dec4.paddock.Operations
          fertiliser
          irrigation: same as Mungbean_REMS.aps20.Emerald_high_Dec17.paddock.irrigation
          manager: same as Mungbean_jngh.Irr.Mungbean_jnghIrr_Dec4.paddock.manager
          Soil
            Water: same as Mungbean_jngh.Irr.Mungbean_jnghIrr_Dec4.paddock.soil.Water
            SoilWater: SummerCona=3.5; SummerU=6; SummerDate=1-Nov; WinterCona=3.5; WinterU=6; WinterDate=1-Apr; DiffusConst=88; DiffusSlope=35.4; Salb=0.13; CN2Bare=72; CNRed=20; CNCov=0.8; Thickness=[200, 200, 200, 200, 200, 200, 200, 200]; SWCON=[0.392, 0.4, 0.397, 0.375, 0.371, 0.335, 0.326, 0.316]
            SoilOrganicMatter: same as Mungbean_jngh.Irr.Mungbean_jnghIrr_Dec4.paddock.soil.SoilOrganicMatter
            Analysis: Thickness=[200.0, 200.0, 200.0, 200.0, 200.0, 200.0, 200.0, 200.0]; PH=[7.50, 8.00, 8.00, 8.00, 8.00, 8.00, 8.00, 8.00]
            Sample Initial nitrogen
              Thickness  NO3   NH4
              200.0      0.14  1
              200.0      0.32  1
              200.0      0.30  1
              200.0      0.15  1
              200.0      0.17  1
              200.0      0.08  1
              200.0      0.08  1
              200.0      0.09  1
            Sample Initial water: Thickness=[200, 200, 200, 200, 200, 200, 200, 200]; SW=[0.392, 0.4, 0.397, 0.375, 0.371, 0.335, 0.326, 0.316]; NO3Units=ppm; NH4Units=ppm; SWUnits=Volumetric; OCUnits=Total; PHUnits=Water
          surfaceom
            PoolName = wheat  # Organic Matter pool name
            type = wheat  # Organic Matter type
            mass = 500  # Initial surface residue (kg/ha)
            cnr = 40  # C:N ratio of initial residue
            standing_fraction = 0.0  # Fraction of residue standing
          mungbean
          manager2 Irrigate on date: same as Mungbean_jngh.Irr.Mungbean_jnghIrr_Dec4.paddock.Irrigate on date
          manager2 Irrigate on date1
            # Irrigation will be applied on the date(s) below
            sameDays = yes  # Apply Irrigation on the same day(s) each year? (yes/no) - if "no" then must include the year of application below
            irrigDatesStr = 18-dec 2-jan  # Dates for one or more Irrigation applications (dd-mmm or dd-mmm-yyyy) as a list with a space between dates
            # Irrigation parameters
            amount = 20  # Amount of irrigation to apply (mm)
            eff = 1.0  # Irrigation efficiency (0-1)
            script: same as in Mungbean_REMS.aps18.aps18_Nov4_Berken.paddock.Irrigate on date
          manager2 Irrigate on date2
            # Irrigation will be applied on the date(s) below
            sameDays = yes  # Apply Irrigation on the same day(s) each year? (yes/no) - if "no" then must include the year of application below
            irrigDatesStr = 06-jan 13-jan  # Dates for one or more Irrigation applications (dd-mmm or dd-mmm-yyyy) as a list with a space between dates
            # Irrigation parameters
            amount = 25  # Amount of irrigation to apply (mm)
            eff = 1.0  # Irrigation efficiency (0-1)
            script: same as in Mungbean_REMS.aps18.aps18_Nov4_Berken.paddock.Irrigate on date
          manager2 Irrigate on date3: same as Mungbean_jngh.Irr.Mungbean_jnghIrr_Dec4.paddock.Irrigate on date3
          manager Empty manager2
            on start_of_day:
            script: same as in Mungbean_jngh.Irr.Mungbean_jnghIrr_Dec4.paddock.Empty manager1
          outputfile -> /Mungbean/Mungbean_jngh/Irr/Mungbean_jnghIrr_Dec4/paddock/outputfile: filename=Mungbean_jnghRF_Dec4.out; title=Mungbean_jnghRF_Dec4
            variables -> /Mungbean/Mungbean_jngh/Irr/Mungbean_jnghIrr_Dec4/paddock/outputfile/variables
      simulation Mungbean_jnghRF_Dec18
        clock: start_date=4/12/1997; end_date=30/4/1998
        summaryfile
        metfile met: filename=MetFiles\Gat34.met
        area paddock
          operations: same as Mungbean_jngh.Irr.Mungbean_jnghIrr_Dec18.paddock.Operations
          fertiliser
          irrigation: same as Mungbean_REMS.aps20.Emerald_high_Dec17.paddock.irrigation
          manager: same as Mungbean_jngh.Irr.Mungbean_jnghIrr_Dec4.paddock.manager
          Soil: same as Mungbean_jngh.Irr.Mungbean_jnghIrr_Dec4.paddock.soil
          surfaceom
            PoolName = wheat  # Organic Matter pool name
            type = wheat  # Organic Matter type
            mass = 500  # Initial surface residue (kg/ha)
            cnr = 40  # C:N ratio of initial residue
            standing_fraction = 0.0  # Fraction of residue standing
          mungbean
          manager2 Irrigate on date: same as Mungbean_jngh.Irr.Mungbean_jnghIrr_Dec4.paddock.Irrigate on date
          manager2 Irrigate on date1: same as Mungbean_jngh.RF.Mungbean_jnghRF_Dec4.paddock.Irrigate on date1
          manager2 Irrigate on date2: same as Mungbean_jngh.RF.Mungbean_jnghRF_Dec4.paddock.Irrigate on date2
          manager2 Irrigate on date3: same as Mungbean_jngh.Irr.Mungbean_jnghIrr_Dec4.paddock.Irrigate on date3
          manager Empty manager2
            on start_of_day:
            script: same as in Mungbean_jngh.Irr.Mungbean_jnghIrr_Dec18.paddock.Empty manager2
          outputfile -> /Mungbean/Mungbean_jngh/Irr/Mungbean_jnghIrr_Dec4/paddock/outputfile: filename=Mungbean_jnghRF_Dec18.out; title=Mungbean_jnghRF_Dec18
            variables -> /Mungbean/Mungbean_jngh/Irr/Mungbean_jnghIrr_Dec4/paddock/outputfile/variables
      simulation Mungbean_jnghRF_Dec31
        clock: start_date=4/12/1997; end_date=30/4/1998
        summaryfile
        metfile met: filename=MetFiles\Gat34.met
        area paddock
          operations: same as Mungbean_jngh.Irr.Mungbean_jnghIrr_Dec31.paddock.Operations
          fertiliser
          irrigation: same as Mungbean_REMS.aps20.Emerald_high_Dec17.paddock.irrigation
          manager: same as Mungbean_jngh.Irr.Mungbean_jnghIrr_Dec4.paddock.manager
          Soil: same as Mungbean_jngh.Irr.Mungbean_jnghIrr_Dec4.paddock.soil
          surfaceom
            PoolName = wheat  # Organic Matter pool name
            type = wheat  # Organic Matter type
            mass = 500  # Initial surface residue (kg/ha)
            cnr = 40  # C:N ratio of initial residue
            standing_fraction = 0.0  # Fraction of residue standing
          mungbean
          manager2 Irrigate on date: same as Mungbean_jngh.Irr.Mungbean_jnghIrr_Dec4.paddock.Irrigate on date
          manager2 Irrigate on date1: same as Mungbean_jngh.RF.Mungbean_jnghRF_Dec4.paddock.Irrigate on date1
          manager2 Irrigate on date2: same as Mungbean_jngh.RF.Mungbean_jnghRF_Dec4.paddock.Irrigate on date2
          manager2 Irrigate on date3: same as Mungbean_jngh.Irr.Mungbean_jnghIrr_Dec4.paddock.Irrigate on date3
          manager Empty manager2
            on start_of_day:
            script: same as in Mungbean_jngh.Irr.Mungbean_jnghIrr_Dec31.paddock.Empty manager2
          outputfile -> /Mungbean/Mungbean_jngh/Irr/Mungbean_jnghIrr_Dec4/paddock/outputfile: filename=Mungbean_jnghRF_Dec31.out; title=Mungbean_jnghRF_Dec31
            variables -> /Mungbean/Mungbean_jngh/Irr/Mungbean_jnghIrr_Dec4/paddock/outputfile/variables
    folder RO
      simulation Mungbean_jnghRO_Dec4
        clock: start_date=4/12/1997; end_date=30/4/1998
        summaryfile
        metfile met: filename=MetFiles\Gat34rs.met
        area paddock
          operations: same as Mungbean_jngh.Irr.Mungbean_jnghIrr_Dec4.paddock.Operations
          fertiliser
          irrigation: same as Mungbean_REMS.aps20.Emerald_high_Dec17.paddock.irrigation
          manager: same as Mungbean_jngh.Irr.Mungbean_jnghIrr_Dec4.paddock.manager
          Soil
            Water: same as Mungbean_jngh.Irr.Mungbean_jnghIrr_Dec4.paddock.soil.Water
            SoilWater: SummerCona=3.5; SummerU=6; SummerDate=1-Nov; WinterCona=3.5; WinterU=6; WinterDate=1-Apr; DiffusConst=88; DiffusSlope=35.4; Salb=0.13; CN2Bare=72; CNRed=20; CNCov=0.8; Thickness=[200, 200, 200, 200, 200, 200, 200, 200]; SWCON=[0.331, 0.346, 0.331, 0.317, 0.335, 0.317, 0.296, 0.32]
            SoilOrganicMatter: same as Mungbean_jngh.Irr.Mungbean_jnghIrr_Dec4.paddock.soil.SoilOrganicMatter
            Analysis: Thickness=[200.0, 200.0, 200.0, 200.0, 200.0, 200.0, 200.0, 200.0]; PH=[7.50, 8.00, 8.00, 8.00, 8.00, 8.00, 8.00, 8.00]
            Sample Initial nitrogen
              Thickness  NO3   NH4
              200.0      0.14  1
              200.0      0.32  1
              200.0      0.30  1
              200.0      0.15  1
              200.0      0.17  1
              200.0      0.08  1
              200.0      0.08  1
              200.0      0.09  1
            Sample Initial water: Thickness=[200, 200, 200, 200, 200, 200, 200, 200]; SW=[0.331, 0.346, 0.331, 0.317, 0.335, 0.317, 0.296, 0.32]; NO3Units=ppm; NH4Units=ppm; SWUnits=Volumetric; OCUnits=Total; PHUnits=Water
          surfaceom
            PoolName = wheat  # Organic Matter pool name
            type = wheat  # Organic Matter type
            mass = 500  # Initial surface residue (kg/ha)
            cnr = 40  # C:N ratio of initial residue
            standing_fraction = 0.0  # Fraction of residue standing
          mungbean
          manager Empty manager2
            on start_of_day:
            script: same as in Mungbean_jngh.Irr.Mungbean_jnghIrr_Dec4.paddock.Empty manager1
          outputfile -> /Mungbean/Mungbean_jngh/Irr/Mungbean_jnghIrr_Dec4/paddock/outputfile: filename=Mungbean_jnghRO_Dec4.out; title=Mungbean_jnghRO_Dec4
            variables -> /Mungbean/Mungbean_jngh/Irr/Mungbean_jnghIrr_Dec4/paddock/outputfile/variables
      simulation Mungbean_jnghRO_Dec18
        clock: start_date=4/12/1997; end_date=30/4/1998
        summaryfile
        metfile met: filename=MetFiles\Gat34rs.met
        area paddock
          operations: same as Mungbean_jngh.Irr.Mungbean_jnghIrr_Dec18.paddock.Operations
          fertiliser
          irrigation: same as Mungbean_REMS.aps20.Emerald_high_Dec17.paddock.irrigation
          manager: same as Mungbean_jngh.Irr.Mungbean_jnghIrr_Dec4.paddock.manager
          Soil: Latitude=0; Longitude=0; YearOfSampling=0
            Water: same as Mungbean_jngh.Irr.Mungbean_jnghIrr_Dec4.paddock.soil.Water
            SoilWater: SummerCona=3.5; SummerU=6; SummerDate=1-Nov; WinterCona=3.5; WinterU=6; WinterDate=1-Apr; DiffusConst=88; DiffusSlope=35.4; Salb=0.13; CN2Bare=72; CNRed=20; CNCov=0.8; Thickness=[200, 200, 200, 200, 200, 200, 200, 200]; SWCON=[0.296, 0.364, 0.357, 0.351, 0.318, 0.306, 0.296, 0.316]
            SoilOrganicMatter: same as Mungbean_jngh.Irr.Mungbean_jnghIrr_Dec4.paddock.soil.SoilOrganicMatter
            Analysis: Thickness=[200.0, 200.0, 200.0, 200.0, 200.0, 200.0, 200.0, 200.0]; PH=[7.50, 8.00, 8.00, 8.00, 8.00, 8.00, 8.00, 8.00]
            Sample Initial nitrogen
              Thickness  NO3   NH4
              200.0      0.14  1
              200.0      0.32  1
              200.0      0.30  1
              200.0      0.15  1
              200.0      0.17  1
              200.0      0.08  1
              200.0      0.08  1
              200.0      0.09  1
            Sample Initial water: Thickness=[200, 200, 200, 200, 200, 200, 200, 200]; SW=[0.296, 0.364, 0.357, 0.351, 0.318, 0.306, 0.296, 0.316]; NO3Units=ppm; NH4Units=ppm; SWUnits=Volumetric; OCUnits=Total; PHUnits=Water
          surfaceom
            PoolName = wheat  # Organic Matter pool name
            type = wheat  # Organic Matter type
            mass = 500  # Initial surface residue (kg/ha)
            cnr = 40  # C:N ratio of initial residue
            standing_fraction = 0.0  # Fraction of residue standing
          mungbean
          manager Empty manager2
            on start_of_day:
            script: same as in Mungbean_jngh.Irr.Mungbean_jnghIrr_Dec18.paddock.Empty manager2
          outputfile -> /Mungbean/Mungbean_jngh/Irr/Mungbean_jnghIrr_Dec4/paddock/outputfile: filename=Mungbean_jnghRO_Dec18.out; title=Mungbean_jnghRO_Dec18
            variables -> /Mungbean/Mungbean_jngh/Irr/Mungbean_jnghIrr_Dec4/paddock/outputfile/variables
      simulation Mungbean_jnghRO_Dec31
        clock: start_date=4/12/1997; end_date=30/4/1998
        summaryfile
        metfile met: filename=MetFiles\Gat34rs.met
        area paddock
          operations: same as Mungbean_jngh.Irr.Mungbean_jnghIrr_Dec31.paddock.Operations
          fertiliser
          irrigation: same as Mungbean_REMS.aps20.Emerald_high_Dec17.paddock.irrigation
          manager: same as Mungbean_jngh.Irr.Mungbean_jnghIrr_Dec4.paddock.manager
          Soil
            Water: same as Mungbean_jngh.Irr.Mungbean_jnghIrr_Dec4.paddock.soil.Water
            SoilWater: SummerCona=3.5; SummerU=6; SummerDate=1-Nov; WinterCona=3.5; WinterU=6; WinterDate=1-Apr; DiffusConst=88; DiffusSlope=35.4; Salb=0.13; CN2Bare=72; CNRed=20; CNCov=0.8; Thickness=[200, 200, 200, 200, 200, 200, 200, 200]; SWCON=[0.285, 0.402, 0.346, 0.301, 0.315, 0.299, 0.303, 0.322]
            SoilOrganicMatter: same as Mungbean_jngh.Irr.Mungbean_jnghIrr_Dec4.paddock.soil.SoilOrganicMatter
            Analysis: Thickness=[200.0, 200.0, 200.0, 200.0, 200.0, 200.0, 200.0, 200.0]; PH=[7.50, 8.00, 8.00, 8.00, 8.00, 8.00, 8.00, 8.00]
            Sample Initial nitrogen
              Thickness  NO3   NH4
              200.0      0.14  1
              200.0      0.32  1
              200.0      0.30  1
              200.0      0.15  1
              200.0      0.17  1
              200.0      0.08  1
              200.0      0.08  1
              200.0      0.09  1
            Sample Initial water: Thickness=[200, 200, 200, 200, 200, 200, 200, 200]; SW=[0.285, 0.402, 0.346, 0.301, 0.315, 0.299, 0.303, 0.322]; NO3Units=ppm; NH4Units=ppm; SWUnits=Volumetric; OCUnits=Total; PHUnits=Water
          surfaceom
            PoolName = wheat  # Organic Matter pool name
            type = wheat  # Organic Matter type
            mass = 500  # Initial surface residue (kg/ha)
            cnr = 40  # C:N ratio of initial residue
            standing_fraction = 0.0  # Fraction of residue standing
          mungbean
          manager Empty manager2
            on start_of_day:
            script: same as in Mungbean_jngh.Irr.Mungbean_jnghIrr_Dec31.paddock.Empty manager2
          outputfile -> /Mungbean/Mungbean_jngh/Irr/Mungbean_jnghIrr_Dec4/paddock/outputfile: filename=Mungbean_jnghRO_Dec31.out; title=Mungbean_jnghRO_Dec31
            variables -> /Mungbean/Mungbean_jngh/Irr/Mungbean_jnghIrr_Dec4/paddock/outputfile/variables
  memo
    	Note: If you have Observered data for some samplings but not others, then in the .out file (for the observations) you can use * or ?  for those missing values instead of using 0

    	This allows you to tell the difference between data you did not collect, and data that actually had a value of 0

    	Data with a * or ? is not plotted on the graph (hence neither is its predicted value) whereas data with 0 is.

    	Note: You can add error bars to your Observed data by adding an extra column with the same name but with the word "Error" appended to the column name.
              eg. If you have a column called "yield" you would add an extra column called "yieldError" to your Observed data output file.
                  (It is very important you don't put any spaces between the "yield" and "Error")
  memo: same as memo
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