folder FromConFile: version=37; creator=Apsim 7.10-r4157
  simulation expt3 irrigated, s1 emerald - mungbean  40 plants-m2
    clock: start_date=4/12/1997; end_date=30/4/1998
    summaryfile
    metfile met: filename=Gat34.met
    area paddock
      outputfile report: title=expt3 irrigated, s1 emerald - mungbean  40 plants-m2 report
        filename=expt3 irrigated, s1 emerald - mungbean  40 plants-m2 report.out
        variables
          variable:
            year
            mungbean.plant_status
            mungbean.daysaftersowing
            mungbean.ttaftersowing
            mungbean.yield
            mungbean.biomass
            mungbean.plants
            mungbean.dlt_dm
            mungbean.rootgreenwt
            mungbean.leafgreenwt
            mungbean.stemgreenwt
            mungbean.podgreenwt
            mungbean.grain_wt
            mungbean.stage
            mungbean.lai
            mungbean.tlai
            mungbean.slai
            mungbean.leaf_no() as leaf_no
            mungbean.leaf_no_dead()
            mungbean.root_depth
            tracker1.avg@mungbean_swdef_pheno
            tracker1.avg@mungbean_swdef_photo
            tracker1.avg@mungbean_swdef_expan
            tracker1.avg@mungbean_nfact_photo
            tracker1.avg@mungbean_nfact_grain
            mungbean.n_demand
            mungbean.n_supply_soil
            mungbean.n_uptake
            mungbean.dlt_n_fixed
            mungbean.n_fixed_tops
            no3()
            sw_dep()
            mungbean.ep()
            es
            tracker1.sum@soilwat2_runoff
            tracker1.sum@soilwat2_drain
            surfaceom.surfaceom_wt
            mungbean.sw_demand
            mungbean.sw_supply
            mungbean.esw_layr()
            eo
            maxt
            mint
            radn
            rain
            mungbean.height
            mungbean.biomass_wt
            mungbean.node_no()
            mungbean.flowering_date
            mungbean.maturity_date
            mungbean.cover_green
            mungbean.green_biomass_wt as green_biomass
            mungbean.green_biomass_n as green_n
            mungbean.leafgreenn
            mungbean.stemgreenn
            mungbean.grain_n
            mungbean.podgreenn
            dd/mm/yyyy as date
            no3()
            esw
            sw
      operations
        20/01/1998  soilwat2 set sw = 0.391 0.416 0.397 0.377 0.369 0.340 0.309 0.304
        04/12/1997  mungbean sow plants = 40.0,crop_class = plant, row_spacing = 400, sowing_depth = 50, cultivar = emerald
        04/12/1997  irrigate apply amount = 40.0
        18/12/1997  irrigate apply amount = 20.0
        02/01/1998  irrigate apply amount = 20.0
        06/01/1998  irrigate apply amount = 25.0
        13/01/1998  irrigate apply amount = 25.0
        19/01/1998  irrigate apply amount = 30.0
        27/01/1998  irrigate apply amount = 25.0
        06/02/1998  irrigate apply amount = 20.0
        27/02/1998  irrigate apply amount = 15.0
        06/03/1998  irrigate apply amount = 33.0
        13/03/1998  irrigate apply amount = 25.0
        19/03/1998  irrigate apply amount = 20.0
        27/03/1998  irrigate apply amount = 25.0
      fertiliser
      irrigation
        automatic_irrigation = off
        asw_depth = 600  # Depth to which ASW is calculated. (mm)
        crit_fr_asw = 0.5  # Fraction of ASW below which irrigation is applied (0-1.0)
        irrigation_efficiency = 1  # Efficiency of the irrigation. (0-1.0)
        irrigation_allocation = off  # Allocation limits
        allocation = 0  # Allocation in mm
        default_no3_conc = 0.0  # Nitrate concentration (ppm N)
        default_nh4_conc = 0.0  # Ammonium concentration (ppm N)
        default_cl_conc = 0.0  # Chloride concentration (ppm Cl)
      manager
        on init:
```
                 dateset = 0
                 emer_date = 0
                 endjuv_date = 0
                 anth_date = 0
                 mat_date = 0
```
        on end_of_day:
```
                 report do_output
                 if mungbean.stage = 3 and dateset = 0 then
                    emer_date = daysaftersowing
                    dateset = 1
                 endif
                 if mungbean.stage = 4 and dateset = 1 then
                    endjuv_date = daysaftersowing
                    dateset = 2
                 endif
                 if mungbean.stage = 6 and dateset = 2 then
                    anth_date = daysaftersowing
                    dateset = 3
                 endif
                 if mungbean.stage = 9 and dateset = 3 then
                    mat_date = daysaftersowing
                    dateset = 4
                 endif
            if (mungbean.stagename = 'maturity' or mungbean.plant_status = 'dead') then
               report do_output
               mungbean harvest 
               mungbean kill_crop 
               mungbean end_crop
               dateset = 0
            endif
            !second flush!!!!!!!!!!!!!
            ![standard.manager.init]       
             !dateset = 0
              !   anth_date = 0
              !   mat_date = 0
             ![standard.manager.end_of_day]
              !  report do_output
               !  if mungbean.stage = 6 and dateset = 0 then
                !    anth_date = daysaftersowing
                 !   dateset = 1
                 !endif
                 !if mungbean.tt_tot(7)>600 and dateset = 1 then
                  !  mat_date1=daysaftersowing
                  !  report do_output
                  !  dataset = 2
                 !endif
                 !if mungbean.stage = 8 and dateset = 2 then
                  !  mat_date2 = daysaftersowing
                   ! dateset = 3
                 !endif
            !if (mungbean.stagename = 'harvest_ripe' or mungbean.plant_status = 'dead') then
             !  report do_output
             !  mungbean harvest 
             !  mungbean kill_crop 
             !  mungbean end_crop
             !  dateset = 0
            !endif
```
      Soil
        Water
          Thickness  BD     AirDry  LL15   DUL    SAT
          200.0      1.370  0.050   0.180  0.410  0.430
          200.0      1.270  0.190   0.190  0.470  0.480
          200.0      1.280  0.220   0.220  0.410  0.450
          200.0      1.330  0.190   0.190  0.410  0.450
          200.0      1.370  0.220   0.220  0.370  0.450
          200.0      1.420  0.190   0.190  0.370  0.440
          200.0      1.360  0.170   0.170  0.370  0.400
          200.0      1.350  0.170   0.170  0.370  0.400
          SoilCrop mungbean: LL=[0.200, 0.273, 0.271, 0.273, 0.294, 0.275, 0.290, 0.306]; KL=[0.08, 0.08, 0.08, 0.08, 0.06, 0.04, 0.02, 0.01]; XF=[1.0, 1.0, 1.0, 1.0, 1.0, 1.0, 1.0, 1.0]
        SoilWater: SummerCona=3.5; SummerU=6.0; SummerDate=1-Nov; WinterCona=3.5; WinterU=6.0; WinterDate=1-Apr; DiffusConst=88.0; DiffusSlope=35.4; Salb=0.13; CN2Bare=72; CNRed=20; CNCov=0.8; Thickness=[200.0, 200.0, 200.0, 200.0, 200.0, 200.0, 200.0, 200.0]; SWCON=[0.400, 0.400, 0.400, 0.400, 0.400, 0.400, 0.400, 0.400]
        SoilOrganicMatter: RootCN=33; RootWt=0; SoilCN=14.5; EnrACoeff=7.4; EnrBCoeff=0.2
          Thickness  OC    FBiom  FInert
          200.0      2.20  0.02   0.36
          200.0      1.60  0.015  0.50
          200.0      1.35  0.01   0.59
          200.0      0.95  0.01   0.84
          200.0      1.00  0.01   0.80
          200.0      0.80  0.01   0.99
          200.0      0.45  0.01   0.99
          200.0      0.45  0.01   0.99
        Analysis: Thickness=[200.0, 200.0, 200.0, 200.0, 200.0, 200.0, 200.0, 200.0]; PH=[7.50, 8.00, 8.00, 8.00, 8.00, 8.00, 8.00, 8.00]
        Sample Initial nitrogen
          Thickness  NO3   NH4
          200.0      0.14  1
          200.0      0.32  1
          200.0      0.30  1
          200.0      0.15  1
          200.0      0.17  1
          200.0      0.08  1
          200.0      0.08  1
          200.0      0.09  1
        Sample Initial water: Thickness=[200.0, 200.0, 200.0, 200.0, 200.0, 200.0, 200.0, 200.0]; SW=[0.338, 0.426, 0.388, 0.367, 0.343, 0.313, 0.269, 0.266]
      surfaceom
        PoolName = wheat  # Organic Matter pool name
        type = wheat  # Organic Matter type
        mass = 500  # Initial surface residue (kg/ha)
        cnr = 40  # C:N ratio of initial residue
        standing_fraction = 0.0  # Fraction of residue standing
      mungbean
      tracker tracker1
        variable:
          average of mungbean.swdef_pheno on end_of_day from report.reported to now as avg@mungbean_swdef_pheno
          average of mungbean.swdef_photo on end_of_day from report.reported to now as avg@mungbean_swdef_photo
          average of mungbean.swdef_expan on end_of_day from report.reported to now as avg@mungbean_swdef_expan
          average of mungbean.nfact_photo on end_of_day from report.reported to now as avg@mungbean_nfact_photo
          average of mungbean.nfact_grain on end_of_day from report.reported to now as avg@mungbean_nfact_grain
          sum of runoff on end_of_day from report.reported to now as sum@soilwat2_runoff
          sum of drain on end_of_day from report.reported to now as sum@soilwat2_drain
  simulation expt3 irrigated, s1 emerald - mungbean  40 plants-m21
    clock: start_date=4/12/1997; end_date=30/4/1998
    summaryfile
    metfile met: filename=Gat34.met
    area paddock
      outputfile report
        filename=expt3 irrigated, s1 emerald - mungbean  40 plants-m21 report.out
        title=expt3 irrigated, s1 emerald - mungbean  40 plants-m21 report
        variables: same as expt3 irrigated, s1 emerald - mungbean  40 plants-m2.paddock.report.variables
      operations
        20/01/1998  soilwat2 set sw = 0.391 0.416 0.397 0.377 0.369 0.340 0.309 0.304
        04/12/1997  mungbean sow plants = 40.0,crop_class = plant, row_spacing = 400, sowing_depth = 50, cultivar = emerald_sf
        04/12/1997  irrigate apply amount = 40.0
        18/12/1997  irrigate apply amount = 20.0
        02/01/1998  irrigate apply amount = 20.0
        06/01/1998  irrigate apply amount = 25.0
        13/01/1998  irrigate apply amount = 25.0
        19/01/1998  irrigate apply amount = 30.0
        27/01/1998  irrigate apply amount = 25.0
        06/02/1998  irrigate apply amount = 20.0
        27/02/1998  irrigate apply amount = 15.0
        06/03/1998  irrigate apply amount = 33.0
        13/03/1998  irrigate apply amount = 25.0
        19/03/1998  irrigate apply amount = 20.0
        27/03/1998  irrigate apply amount = 25.0
      fertiliser
      irrigation: same as expt3 irrigated, s1 emerald - mungbean  40 plants-m2.paddock.irrigation
      manager: same as expt3 irrigated, s1 emerald - mungbean  40 plants-m2.paddock.manager
      Soil: same as expt3 irrigated, s1 emerald - mungbean  40 plants-m2.paddock.soil
      surfaceom
        PoolName = wheat  # Organic Matter pool name
        type = wheat  # Organic Matter type
        mass = 500  # Initial surface residue (kg/ha)
        cnr = 40  # C:N ratio of initial residue
        standing_fraction = 0.0  # Fraction of residue standing
      mungbean
  simulation expt3,irrigated, s2 emerald - mungbean  40 plants-m2
    clock: start_date=4/12/1997; end_date=30/4/1998
    summaryfile
    metfile met: filename=Gat34.met
    area paddock
      outputfile report: title=expt3,irrigated, s2 emerald - mungbean  40 plants-m2 report
        filename=expt3,irrigated, s2 emerald - mungbean  40 plants-m2 report.out
        variables: same as expt3 irrigated, s1 emerald - mungbean  40 plants-m2.paddock.report.variables
      operations
        20/01/1998  soilwat2 set sw = 0.401 0.411 0.399 0.379 0.362 0.305 0.298 0.306
        18/12/1997  mungbean sow plants = 40.0,crop_class = plant, row_spacing = 400, sowing_depth = 50, cultivar = emerald
        04/12/1997  irrigate apply amount = 40.0
        18/12/1997  irrigate apply amount = 20.0
        02/01/1998  irrigate apply amount = 20.0
        06/01/1998  irrigate apply amount = 25.0
        13/01/1998  irrigate apply amount = 25.0
        19/01/1998  irrigate apply amount = 30.0
        27/01/1998  irrigate apply amount = 25.0
        06/02/1998  irrigate apply amount = 20.0
        27/02/1998  irrigate apply amount = 15.0
        06/03/1998  irrigate apply amount = 33.0
        13/03/1998  irrigate apply amount = 25.0
        19/03/1998  irrigate apply amount = 20.0
        27/03/1998  irrigate apply amount = 25.0
      fertiliser
      irrigation: same as expt3 irrigated, s1 emerald - mungbean  40 plants-m2.paddock.irrigation
      manager: same as expt3 irrigated, s1 emerald - mungbean  40 plants-m2.paddock.manager
      Soil
        Water: same as expt3 irrigated, s1 emerald - mungbean  40 plants-m2.paddock.soil.Water
        SoilWater: same as expt3 irrigated, s1 emerald - mungbean  40 plants-m2.paddock.soil.SoilWater
        SoilOrganicMatter: same as expt3 irrigated, s1 emerald - mungbean  40 plants-m2.paddock.soil.SoilOrganicMatter
        Analysis: Thickness=[200.0, 200.0, 200.0, 200.0, 200.0, 200.0, 200.0, 200.0]; PH=[7.50, 8.00, 8.00, 8.00, 8.00, 8.00, 8.00, 8.00]
        Sample Initial nitrogen
          Thickness  NO3   NH4
          200.0      0.50  1
          200.0      0.26  1
          200.0      0.26  1
          200.0      0.21  1
          200.0      0.09  1
          200.0      0.11  1
          200.0      0.14  1
          200.0      0.11  1
        Sample Initial water: Thickness=[200.0, 200.0, 200.0, 200.0, 200.0, 200.0, 200.0, 200.0]; SW=[0.338, 0.426, 0.388, 0.367, 0.343, 0.313, 0.269, 0.266]
      surfaceom
        PoolName = wheat  # Organic Matter pool name
        type = wheat  # Organic Matter type
        mass = 500  # Initial surface residue (kg/ha)
        cnr = 40  # C:N ratio of initial residue
        standing_fraction = 0.0  # Fraction of residue standing
      mungbean
  simulation expt3,irrigated, s2 emerald - mungbean  40 plants-m21
    clock: start_date=4/12/1997; end_date=30/4/1998
    summaryfile
    metfile met: filename=Gat34.met
    area paddock
      outputfile report
        filename=expt3,irrigated, s2 emerald - mungbean  40 plants-m21 report.out
        title=expt3,irrigated, s2 emerald - mungbean  40 plants-m21 report
        variables: same as expt3 irrigated, s1 emerald - mungbean  40 plants-m2.paddock.report.variables
      operations
        20/01/1998  soilwat2 set sw = 0.401 0.411 0.399 0.379 0.362 0.305 0.298 0.306
        18/12/1997  mungbean sow plants = 40.0,crop_class = plant, row_spacing = 400, sowing_depth = 50, cultivar = emerald_sf
        04/12/1997  irrigate apply amount = 40.0
        18/12/1997  irrigate apply amount = 20.0
        02/01/1998  irrigate apply amount = 20.0
        06/01/1998  irrigate apply amount = 25.0
        13/01/1998  irrigate apply amount = 25.0
        19/01/1998  irrigate apply amount = 30.0
        27/01/1998  irrigate apply amount = 25.0
        06/02/1998  irrigate apply amount = 20.0
        27/02/1998  irrigate apply amount = 15.0
        06/03/1998  irrigate apply amount = 33.0
        13/03/1998  irrigate apply amount = 25.0
        19/03/1998  irrigate apply amount = 20.0
        27/03/1998  irrigate apply amount = 25.0
      fertiliser
      irrigation: same as expt3 irrigated, s1 emerald - mungbean  40 plants-m2.paddock.irrigation
      manager: same as expt3 irrigated, s1 emerald - mungbean  40 plants-m2.paddock.manager
      Soil: same as expt3,irrigated, s2 emerald - mungbean  40 plants-m2.paddock.soil
      surfaceom
        PoolName = wheat  # Organic Matter pool name
        type = wheat  # Organic Matter type
        mass = 500  # Initial surface residue (kg/ha)
        cnr = 40  # C:N ratio of initial residue
        standing_fraction = 0.0  # Fraction of residue standing
      mungbean
  simulation expt3 irrigated, s3 emerald - mungbean  40 plants-m2
    clock: start_date=4/12/1997; end_date=20/5/1998
    summaryfile
    metfile met: filename=Gat34.met
    area paddock
      outputfile report: title=expt3 irrigated, s3 emerald - mungbean  40 plants-m2 report
        filename=expt3 irrigated, s3 emerald - mungbean  40 plants-m2 report.out
        variables: same as expt3 irrigated, s1 emerald - mungbean  40 plants-m2.paddock.report.variables
      operations
        20/01/1998  soilwat2 set sw = 0.417 0.418 0.400 0.384 0.371 0.345 0.334 0.327
        31/12/1997  mungbean sow plants = 40.0,crop_class = plant, row_spacing = 400, sowing_depth = 50, cultivar = emerald
        31/12/1997  irrigate apply amount = 25.0
        04/12/1997  irrigate apply amount = 40.0
        18/12/1997  irrigate apply amount = 20.0
        02/01/1998  irrigate apply amount = 20.0
        06/01/1998  irrigate apply amount = 25.0
        13/01/1998  irrigate apply amount = 25.0
        19/01/1998  irrigate apply amount = 30.0
        27/01/1998  irrigate apply amount = 25.0
        06/02/1998  irrigate apply amount = 20.0
        27/02/1998  irrigate apply amount = 15.0
        06/03/1998  irrigate apply amount = 33.0
        13/03/1998  irrigate apply amount = 25.0
        19/03/1998  irrigate apply amount = 20.0
        27/03/1998  irrigate apply amount = 25.0
      fertiliser
      irrigation: same as expt3 irrigated, s1 emerald - mungbean  40 plants-m2.paddock.irrigation
      manager: same as expt3 irrigated, s1 emerald - mungbean  40 plants-m2.paddock.manager
      Soil
        Water: same as expt3 irrigated, s1 emerald - mungbean  40 plants-m2.paddock.soil.Water
        SoilWater: same as expt3 irrigated, s1 emerald - mungbean  40 plants-m2.paddock.soil.SoilWater
        SoilOrganicMatter: same as expt3 irrigated, s1 emerald - mungbean  40 plants-m2.paddock.soil.SoilOrganicMatter
        Analysis: Thickness=[200.0, 200.0, 200.0, 200.0, 200.0, 200.0, 200.0, 200.0]; PH=[7.50, 8.00, 8.00, 8.00, 8.00, 8.00, 8.00, 8.00]
        Sample Initial nitrogen
          Thickness  NO3   NH4
          200.0      0.20  1
          200.0      0.24  1
          200.0      0.20  1
          200.0      0.10  1
          200.0      0.04  1
          200.0      0.09  1
          200.0      0.05  1
          200.0      0.10  1
        Sample Initial water: Thickness=[200.0, 200.0, 200.0, 200.0, 200.0, 200.0, 200.0, 200.0]; SW=[0.338, 0.426, 0.388, 0.367, 0.343, 0.313, 0.269, 0.266]
      surfaceom
        PoolName = wheat  # Organic Matter pool name
        type = wheat  # Organic Matter type
        mass = 500  # Initial surface residue (kg/ha)
        cnr = 40  # C:N ratio of initial residue
        standing_fraction = 0.0  # Fraction of residue standing
      mungbean
  simulation expt3 irrigated, s3 emerald - mungbean  40 plants-m21
    clock: start_date=4/12/1997; end_date=20/5/1998
    summaryfile
    metfile met: filename=Gat34.met
    area paddock
      outputfile report
        filename=expt3 irrigated, s3 emerald - mungbean  40 plants-m21 report.out
        title=expt3 irrigated, s3 emerald - mungbean  40 plants-m21 report
        variables: same as expt3 irrigated, s1 emerald - mungbean  40 plants-m2.paddock.report.variables
      operations
        20/01/1998  soilwat2 set sw = 0.417 0.418 0.400 0.384 0.371 0.345 0.334 0.327
        31/12/1997  mungbean sow plants = 40.0,crop_class = plant, row_spacing = 400, sowing_depth = 50, cultivar = emerald_sf
        31/12/1997  irrigate apply amount = 25.0
        04/12/1997  irrigate apply amount = 40.0
        18/12/1997  irrigate apply amount = 20.0
        02/01/1998  irrigate apply amount = 20.0
        06/01/1998  irrigate apply amount = 25.0
        13/01/1998  irrigate apply amount = 25.0
        19/01/1998  irrigate apply amount = 30.0
        27/01/1998  irrigate apply amount = 25.0
        06/02/1998  irrigate apply amount = 20.0
        27/02/1998  irrigate apply amount = 15.0
        06/03/1998  irrigate apply amount = 33.0
        13/03/1998  irrigate apply amount = 25.0
        19/03/1998  irrigate apply amount = 20.0
        27/03/1998  irrigate apply amount = 25.0
      fertiliser
      irrigation: same as expt3 irrigated, s1 emerald - mungbean  40 plants-m2.paddock.irrigation
      manager: same as expt3 irrigated, s1 emerald - mungbean  40 plants-m2.paddock.manager
      Soil: same as expt3 irrigated, s3 emerald - mungbean  40 plants-m2.paddock.soil
      surfaceom
        PoolName = wheat  # Organic Matter pool name
        type = wheat  # Organic Matter type
        mass = 500  # Initial surface residue (kg/ha)
        cnr = 40  # C:N ratio of initial residue
        standing_fraction = 0.0  # Fraction of residue standing
      mungbean
  simulation expt3 rainfed, s1 emerald - mungbean  40 plants-m2
    clock: start_date=4/12/1997; end_date=30/4/1998
    summaryfile
    metfile met: filename=Gat34.met
    area paddock
      outputfile report: title=expt3 rainfed, s1 emerald - mungbean  40 plants-m2 report
        filename=expt3 rainfed, s1 emerald - mungbean  40 plants-m2 report.out
        variables: same as expt3 irrigated, s1 emerald - mungbean  40 plants-m2.paddock.report.variables
      operations
        20/01/1998  soilwat2 set sw = 0.392 0.400 0.397 0.375 0.371 0.335 0.326 0.316
        04/12/1997  mungbean sow plants = 40.0,crop_class = plant, row_spacing = 400, sowing_depth = 50, cultivar = emerald
        04/12/1997  irrigate apply amount = 40.0
        18/12/1997  irrigate apply amount = 20.0
        02/01/1998  irrigate apply amount = 20.0
        06/01/1998  irrigate apply amount = 25.0
        13/01/1998  irrigate apply amount = 25.0
        19/01/1998  irrigate apply amount = 30.0
      fertiliser
      irrigation: same as expt3 irrigated, s1 emerald - mungbean  40 plants-m2.paddock.irrigation
      manager: same as expt3 irrigated, s1 emerald - mungbean  40 plants-m2.paddock.manager
      Soil
        Water: same as expt3 irrigated, s1 emerald - mungbean  40 plants-m2.paddock.soil.Water
        SoilWater: same as expt3 irrigated, s1 emerald - mungbean  40 plants-m2.paddock.soil.SoilWater
        SoilOrganicMatter: same as expt3 irrigated, s1 emerald - mungbean  40 plants-m2.paddock.soil.SoilOrganicMatter
        Analysis: Thickness=[200.0, 200.0, 200.0, 200.0, 200.0, 200.0, 200.0, 200.0]; PH=[7.50, 8.00, 8.00, 8.00, 8.00, 8.00, 8.00, 8.00]
        Sample Initial nitrogen
          Thickness  NO3   NH4
          200.0      0.47  1
          200.0      0.39  1
          200.0      0.33  1
          200.0      0.19  1
          200.0      0.15  1
          200.0      0.15  1
          200.0      0.10  1
          200.0      0.18  1
        Sample Initial water: Thickness=[200.0, 200.0, 200.0, 200.0, 200.0, 200.0, 200.0, 200.0]; SW=[0.329, 0.369, 0.388, 0.306, 0.274, 0.292, 0.312, 0.299]
      surfaceom
        PoolName = wheat  # Organic Matter pool name
        type = wheat  # Organic Matter type
        mass = 500  # Initial surface residue (kg/ha)
        cnr = 40  # C:N ratio of initial residue
        standing_fraction = 0.0  # Fraction of residue standing
      mungbean
  simulation expt3 rainfed, s1 emerald - mungbean  40 plants-m21
    clock: start_date=4/12/1997; end_date=30/4/1998
    summaryfile
    metfile met: filename=Gat34.met
    area paddock
      outputfile report: title=expt3 rainfed, s1 emerald - mungbean  40 plants-m21 report
        filename=expt3 rainfed, s1 emerald - mungbean  40 plants-m21 report.out
        variables: same as expt3 irrigated, s1 emerald - mungbean  40 plants-m2.paddock.report.variables
      operations
        20/01/1998  soilwat2 set sw = 0.392 0.400 0.397 0.375 0.371 0.335 0.326 0.316
        04/12/1997  mungbean sow plants = 40.0,crop_class = plant, row_spacing = 400, sowing_depth = 50, cultivar = emerald_sf
        04/12/1997  irrigate apply amount = 40.0
        18/12/1997  irrigate apply amount = 20.0
        02/01/1998  irrigate apply amount = 20.0
        06/01/1998  irrigate apply amount = 25.0
        13/01/1998  irrigate apply amount = 25.0
        19/01/1998  irrigate apply amount = 30.0
      fertiliser
      irrigation: same as expt3 irrigated, s1 emerald - mungbean  40 plants-m2.paddock.irrigation
      manager: same as expt3 irrigated, s1 emerald - mungbean  40 plants-m2.paddock.manager
      Soil: same as expt3 rainfed, s1 emerald - mungbean  40 plants-m2.paddock.soil
      surfaceom
        PoolName = wheat  # Organic Matter pool name
        type = wheat  # Organic Matter type
        mass = 500  # Initial surface residue (kg/ha)
        cnr = 40  # C:N ratio of initial residue
        standing_fraction = 0.0  # Fraction of residue standing
      mungbean
  simulation expt3 rainfed, s2 emerald - mungbean  40 plants-m2
    clock: start_date=4/12/1997; end_date=20/5/1998
    summaryfile
    metfile met: filename=Gat34.met
    area paddock
      outputfile report: title=expt3 rainfed, s2 emerald - mungbean  40 plants-m2 report
        filename=expt3 rainfed, s2 emerald - mungbean  40 plants-m2 report.out
        variables: same as expt3 irrigated, s1 emerald - mungbean  40 plants-m2.paddock.report.variables
      operations
        20/01/1998  soilwat2 set sw = 0.402 0.411 0.402 0.382 0.374 0.350 0.322 0.295
        18/12/1997  mungbean sow plants = 40.0,crop_class = plant, row_spacing = 400, sowing_depth = 50, cultivar = emerald
        04/12/1997  irrigate apply amount = 40.0
        18/12/1997  irrigate apply amount = 20.0
        02/01/1998  irrigate apply amount = 20.0
        06/01/1998  irrigate apply amount = 25.0
        13/01/1998  irrigate apply amount = 25.0
        19/01/1998  irrigate apply amount = 30.0
      fertiliser
      irrigation: same as expt3 irrigated, s1 emerald - mungbean  40 plants-m2.paddock.irrigation
      manager: same as expt3 irrigated, s1 emerald - mungbean  40 plants-m2.paddock.manager
      Soil
        Water: same as expt3 irrigated, s1 emerald - mungbean  40 plants-m2.paddock.soil.Water
        SoilWater: same as expt3 irrigated, s1 emerald - mungbean  40 plants-m2.paddock.soil.SoilWater
        SoilOrganicMatter: same as expt3 irrigated, s1 emerald - mungbean  40 plants-m2.paddock.soil.SoilOrganicMatter
        Analysis: Thickness=[200.0, 200.0, 200.0, 200.0, 200.0, 200.0, 200.0, 200.0]; PH=[7.50, 8.00, 8.00, 8.00, 8.00, 8.00, 8.00, 8.00]
        Sample Initial nitrogen
          Thickness  NO3   NH4
          200.0      0.86  1
          200.0      0.33  1
          200.0      0.42  1
          200.0      0.36  1
          200.0      0.20  1
          200.0      0.09  1
          200.0      0.14  1
          200.0      0.15  1
        Sample Initial water: Thickness=[200.0, 200.0, 200.0, 200.0, 200.0, 200.0, 200.0, 200.0]; SW=[0.329, 0.369, 0.388, 0.306, 0.274, 0.292, 0.312, 0.299]
      surfaceom
        PoolName = wheat  # Organic Matter pool name
        type = wheat  # Organic Matter type
        mass = 500  # Initial surface residue (kg/ha)
        cnr = 40  # C:N ratio of initial residue
        standing_fraction = 0.0  # Fraction of residue standing
      mungbean
  simulation expt3 rainfed, s2 emerald - mungbean  40 plants-m21
    clock: start_date=4/12/1997; end_date=20/5/1998
    summaryfile
    metfile met: filename=Gat34.met
    area paddock
      outputfile report: title=expt3 rainfed, s2 emerald - mungbean  40 plants-m21 report
        filename=expt3 rainfed, s2 emerald - mungbean  40 plants-m21 report.out
        variables: same as expt3 irrigated, s1 emerald - mungbean  40 plants-m2.paddock.report.variables
      operations
        20/01/1998  soilwat2 set sw = 0.402 0.411 0.402 0.382 0.374 0.350 0.322 0.295
        18/12/1997  mungbean sow plants = 40.0,crop_class = plant, row_spacing = 400, sowing_depth = 50, cultivar = emerald_sf
        04/12/1997  irrigate apply amount = 40.0
        18/12/1997  irrigate apply amount = 20.0
        02/01/1998  irrigate apply amount = 20.0
        06/01/1998  irrigate apply amount = 25.0
        13/01/1998  irrigate apply amount = 25.0
        19/01/1998  irrigate apply amount = 30.0
      fertiliser
      irrigation: same as expt3 irrigated, s1 emerald - mungbean  40 plants-m2.paddock.irrigation
      manager: same as expt3 irrigated, s1 emerald - mungbean  40 plants-m2.paddock.manager
      Soil: same as expt3 rainfed, s2 emerald - mungbean  40 plants-m2.paddock.soil
      surfaceom
        PoolName = wheat  # Organic Matter pool name
        type = wheat  # Organic Matter type
        mass = 500  # Initial surface residue (kg/ha)
        cnr = 40  # C:N ratio of initial residue
        standing_fraction = 0.0  # Fraction of residue standing
      mungbean
  simulation expt3 irrigated, s3 emerald - mungbean  40 plants-m22
    clock: start_date=4/12/1997; end_date=20/5/1998
    summaryfile
    metfile met: filename=Gat34.met
    area paddock
      outputfile report
        filename=expt3 irrigated, s3 emerald - mungbean  40 plants-m22 report.out
        title=expt3 irrigated, s3 emerald - mungbean  40 plants-m22 report
        variables: same as expt3 irrigated, s1 emerald - mungbean  40 plants-m2.paddock.report.variables
      operations
        20/01/1998  soilwat2 set sw = 0.418 0.417 0.403 0.391 0.379 0.361 0.327 0.333
        31/12/1997  mungbean sow plants = 40.0,crop_class = plant, row_spacing = 400, sowing_depth = 50, cultivar = emerald
        31/12/1997  irrigate apply amount = 20.0
        04/12/1997  irrigate apply amount = 40.0
        18/12/1997  irrigate apply amount = 20.0
        02/01/1998  irrigate apply amount = 20.0
        06/01/1998  irrigate apply amount = 25.0
        13/01/1998  irrigate apply amount = 25.0
        19/01/1998  irrigate apply amount = 30.0
      fertiliser
      irrigation: same as expt3 irrigated, s1 emerald - mungbean  40 plants-m2.paddock.irrigation
      manager: same as expt3 irrigated, s1 emerald - mungbean  40 plants-m2.paddock.manager
      Soil
        Water: same as expt3 irrigated, s1 emerald - mungbean  40 plants-m2.paddock.soil.Water
        SoilWater: same as expt3 irrigated, s1 emerald - mungbean  40 plants-m2.paddock.soil.SoilWater
        SoilOrganicMatter: same as expt3 irrigated, s1 emerald - mungbean  40 plants-m2.paddock.soil.SoilOrganicMatter
        Analysis: Thickness=[200.0, 200.0, 200.0, 200.0, 200.0, 200.0, 200.0, 200.0]; PH=[7.50, 8.00, 8.00, 8.00, 8.00, 8.00, 8.00, 8.00]
        Sample Initial nitrogen
          Thickness  NO3   NH4
          200.0      3.84  1
          200.0      3.07  1
          200.0      3.82  1
          200.0      0.77  1
          200.0      0.25  1
          200.0      0.31  1
          200.0      0.24  1
          200.0      0.20  1
        Sample Initial water: Thickness=[200.0, 200.0, 200.0, 200.0, 200.0, 200.0, 200.0, 200.0]; SW=[0.329, 0.369, 0.388, 0.306, 0.274, 0.292, 0.312, 0.299]
      surfaceom
        PoolName = wheat  # Organic Matter pool name
        type = wheat  # Organic Matter type
        mass = 500  # Initial surface residue (kg/ha)
        cnr = 40  # C:N ratio of initial residue
        standing_fraction = 0.0  # Fraction of residue standing
      mungbean
  simulation expt3 irrigated, s3 emerald - mungbean  40 plants-m23
    clock: start_date=4/12/1997; end_date=20/5/1998
    summaryfile
    metfile met: filename=Gat34.met
    area paddock
      outputfile report
        filename=expt3 irrigated, s3 emerald - mungbean  40 plants-m23 report.out
        title=expt3 irrigated, s3 emerald - mungbean  40 plants-m23 report
        variables: same as expt3 irrigated, s1 emerald - mungbean  40 plants-m2.paddock.report.variables
      operations
        20/01/1998  soilwat2 set sw = 0.418 0.417 0.403 0.391 0.379 0.361 0.327 0.333
        31/12/1997  mungbean sow plants = 40.0,crop_class = plant, row_spacing = 400, sowing_depth = 50, cultivar = emerald_sf
        31/12/1997  irrigate apply amount = 20.0
        04/12/1997  irrigate apply amount = 40.0
        18/12/1997  irrigate apply amount = 20.0
        02/01/1998  irrigate apply amount = 20.0
        06/01/1998  irrigate apply amount = 25.0
        13/01/1998  irrigate apply amount = 25.0
        19/01/1998  irrigate apply amount = 30.0
      fertiliser
      irrigation: same as expt3 irrigated, s1 emerald - mungbean  40 plants-m2.paddock.irrigation
      manager: same as expt3 irrigated, s1 emerald - mungbean  40 plants-m2.paddock.manager
      Soil: same as expt3 irrigated, s3 emerald - mungbean  40 plants-m22.paddock.soil
      surfaceom
        PoolName = wheat  # Organic Matter pool name
        type = wheat  # Organic Matter type
        mass = 500  # Initial surface residue (kg/ha)
        cnr = 40  # C:N ratio of initial residue
        standing_fraction = 0.0  # Fraction of residue standing
      mungbean
  simulation expt3 rainout shelter, s1 emerald - mungbean  40 plants-m2
    clock: start_date=4/12/1997; end_date=30/4/1998
    summaryfile
    metfile met: filename=Gat34rs.met
    area paddock
      outputfile report
        filename=expt3 rainout shelter, s1 emerald - mungbean  40 plants-m2 report.out
        title=expt3 rainout shelter, s1 emerald - mungbean  40 plants-m2 report
        variables: same as expt3 irrigated, s1 emerald - mungbean  40 plants-m2.paddock.report.variables
      operations
        20/01/1998  soilwat2 set sw = 0.331 0.346 0.331 0.317 0.335 0.317 0.296 0.320
        04/12/1997  mungbean sow plants = 40.0,crop_class = plant, row_spacing = 400, sowing_depth = 50, cultivar = emerald
        04/12/1997  irrigate apply amount = 40.0
        08/12/1997  irrigate apply amount = 20.0
        12/12/1997  irrigate apply amount = 40.0
        15/12/1997  irrigate apply amount = 20.0
        18/12/1997  irrigate apply amount = 33.0
        23/12/1997  irrigate apply amount = 20.0
        26/12/1997  irrigate apply amount = 13.0
        02/01/1998  irrigate apply amount = 6.6
        06/01/1998  irrigate apply amount = 26.0
        13/01/1998  irrigate apply amount = 13.0
        19/01/1998  irrigate apply amount = 20.0
        18/02/1998  irrigate apply amount = 16.0
        19/02/1998  irrigate apply amount = 59.0
        20/02/1998  irrigate apply amount = 25.0
        24/02/1998  irrigate apply amount = 33.0
        06/03/1998  irrigate apply amount = 33.0
        11/03/1998  irrigate apply amount = 33.0
        19/03/1998  irrigate apply amount = 33.0
      fertiliser
      irrigation: same as expt3 irrigated, s1 emerald - mungbean  40 plants-m2.paddock.irrigation
      manager: same as expt3 irrigated, s1 emerald - mungbean  40 plants-m2.paddock.manager
      Soil
        Water: same as expt3 irrigated, s1 emerald - mungbean  40 plants-m2.paddock.soil.Water
        SoilWater: same as expt3 irrigated, s1 emerald - mungbean  40 plants-m2.paddock.soil.SoilWater
        SoilOrganicMatter: same as expt3 irrigated, s1 emerald - mungbean  40 plants-m2.paddock.soil.SoilOrganicMatter
        Analysis: Thickness=[200.0, 200.0, 200.0, 200.0, 200.0, 200.0, 200.0, 200.0]; PH=[7.50, 8.00, 8.00, 8.00, 8.00, 8.00, 8.00, 8.00]
        Sample Initial nitrogen
          Thickness  NO3   NH4
          200.0      1.89  1
          200.0      1.79  1
          200.0      0.81  1
          200.0      0.34  1
          200.0      0.22  1
          200.0      0.26  1
          200.0      0.29  1
          200.0      0.32  1
        Sample Initial water: Thickness=[200.0, 200.0, 200.0, 200.0, 200.0, 200.0, 200.0, 200.0]; SW=[0.329, 0.369, 0.306, 0.274, 0.291, 0.312, 0.299, 0.322]
      surfaceom
        PoolName = wheat  # Organic Matter pool name
        type = wheat  # Organic Matter type
        mass = 500  # Initial surface residue (kg/ha)
        cnr = 40  # C:N ratio of initial residue
        standing_fraction = 0.0  # Fraction of residue standing
      mungbean
  simulation expt3 rainout shelter, s1 emerald - mungbean  40 plants-m21
    clock: start_date=4/12/1997; end_date=30/4/1998
    summaryfile
    metfile met: filename=Gat34rs.met
    area paddock
      outputfile report
        filename=expt3 rainout shelter, s1 emerald - mungbean  40 plants-m21 report.out
        title=expt3 rainout shelter, s1 emerald - mungbean  40 plants-m21 report
        variables: same as expt3 irrigated, s1 emerald - mungbean  40 plants-m2.paddock.report.variables
      operations
        20/01/1998  soilwat2 set sw = 0.331 0.346 0.331 0.317 0.335 0.317 0.296 0.320
        04/12/1997  mungbean sow plants = 40.0,crop_class = plant, row_spacing = 400, sowing_depth = 50, cultivar = emerald_sf
        04/12/1997  irrigate apply amount = 40.0
        08/12/1997  irrigate apply amount = 20.0
        12/12/1997  irrigate apply amount = 40.0
        15/12/1997  irrigate apply amount = 20.0
        18/12/1997  irrigate apply amount = 33.0
        23/12/1997  irrigate apply amount = 20.0
        26/12/1997  irrigate apply amount = 13.0
        02/01/1998  irrigate apply amount = 6.6
        06/01/1998  irrigate apply amount = 26.0
        13/01/1998  irrigate apply amount = 13.0
        19/01/1998  irrigate apply amount = 20.0
        18/02/1998  irrigate apply amount = 16.0
        19/02/1998  irrigate apply amount = 59.0
        20/02/1998  irrigate apply amount = 25.0
        24/02/1998  irrigate apply amount = 33.0
        06/03/1998  irrigate apply amount = 33.0
        11/03/1998  irrigate apply amount = 33.0
        19/03/1998  irrigate apply amount = 33.0
      fertiliser
      irrigation: same as expt3 irrigated, s1 emerald - mungbean  40 plants-m2.paddock.irrigation
      manager: same as expt3 irrigated, s1 emerald - mungbean  40 plants-m2.paddock.manager
      Soil: same as expt3 rainout shelter, s1 emerald - mungbean  40 plants-m2.paddock.soil
      surfaceom
        PoolName = wheat  # Organic Matter pool name
        type = wheat  # Organic Matter type
        mass = 500  # Initial surface residue (kg/ha)
        cnr = 40  # C:N ratio of initial residue
        standing_fraction = 0.0  # Fraction of residue standing
      mungbean
  simulation expt3, rainout shelter, s2 emerald - mungbean  40 plants-m2
    clock: start_date=4/12/1997; end_date=30/4/1998
    summaryfile
    metfile met: filename=Gat34rs.met
    area paddock
      outputfile report
        filename=expt3, rainout shelter, s2 emerald - mungbean  40 plants-m2 report.out
        title=expt3, rainout shelter, s2 emerald - mungbean  40 plants-m2 report
        variables: same as expt3 irrigated, s1 emerald - mungbean  40 plants-m2.paddock.report.variables
      operations
        20/01/1998  soilwat2 set sw = 0.296 0.364 0.357 0.351 0.318 0.306 0.296 0.316
        18/12/1997  mungbean sow plants = 40.0,crop_class = plant, row_spacing = 400, sowing_depth = 50, cultivar = emerald
        18/12/1997  irrigate apply amount = 66.0
        23/12/1997  irrigate apply amount = 20.0
        26/12/1997  irrigate apply amount = 13.0
        02/01/1998  irrigate apply amount = 6.6
        06/01/1998  irrigate apply amount = 26.0
        13/01/1998  irrigate apply amount = 13.0
        19/01/1998  irrigate apply amount = 20.0
        18/02/1998  irrigate apply amount = 16.0
        19/02/1998  irrigate apply amount = 59.0
        20/02/1998  irrigate apply amount = 25.0
        24/02/1998  irrigate apply amount = 33.0
        06/03/1998  irrigate apply amount = 33.0
        11/03/1998  irrigate apply amount = 33.0
        19/03/1998  irrigate apply amount = 33.0
      fertiliser
      irrigation: same as expt3 irrigated, s1 emerald - mungbean  40 plants-m2.paddock.irrigation
      manager: same as expt3 irrigated, s1 emerald - mungbean  40 plants-m2.paddock.manager
      Soil
        Water: same as expt3 irrigated, s1 emerald - mungbean  40 plants-m2.paddock.soil.Water
        SoilWater: same as expt3 irrigated, s1 emerald - mungbean  40 plants-m2.paddock.soil.SoilWater
        SoilOrganicMatter: same as expt3 irrigated, s1 emerald - mungbean  40 plants-m2.paddock.soil.SoilOrganicMatter
        Analysis: Thickness=[200.0, 200.0, 200.0, 200.0, 200.0, 200.0, 200.0, 200.0]; PH=[7.50, 8.00, 8.00, 8.00, 8.00, 8.00, 8.00, 8.00]
        Sample Initial nitrogen
          Thickness  NO3   NH4
          200.0      1.70  1
          200.0      0.61  1
          200.0      0.37  1
          200.0      0.37  1
          200.0      0.46  1
          200.0      0.42  1
          200.0      0.32  1
          200.0      0.49  1
        Sample Initial water: Thickness=[200.0, 200.0, 200.0, 200.0, 200.0, 200.0, 200.0, 200.0]; SW=[0.329, 0.369, 0.306, 0.274, 0.291, 0.312, 0.299, 0.322]
      surfaceom
        PoolName = wheat  # Organic Matter pool name
        type = wheat  # Organic Matter type
        mass = 500  # Initial surface residue (kg/ha)
        cnr = 40  # C:N ratio of initial residue
        standing_fraction = 0.0  # Fraction of residue standing
      mungbean
  simulation expt3, rainout shelter, s2 emerald - mungbean  40 plants-m21
    clock: start_date=4/12/1997; end_date=30/4/1998
    summaryfile
    metfile met: filename=Gat34rs.met
    area paddock
      outputfile report
        filename=expt3, rainout shelter, s2 emerald - mungbean  40 plants-m21 report.out
        title=expt3, rainout shelter, s2 emerald - mungbean  40 plants-m21 report
        variables: same as expt3 irrigated, s1 emerald - mungbean  40 plants-m2.paddock.report.variables
      operations
        20/01/1998  soilwat2 set sw = 0.296 0.364 0.357 0.351 0.318 0.306 0.296 0.316
        18/12/1997  mungbean sow plants = 40.0,crop_class = plant, row_spacing = 400, sowing_depth = 50, cultivar = emerald_sf
        18/12/1997  irrigate apply amount = 66.0
        23/12/1997  irrigate apply amount = 20.0
        26/12/1997  irrigate apply amount = 13.0
        02/01/1998  irrigate apply amount = 6.6
        06/01/1998  irrigate apply amount = 26.0
        13/01/1998  irrigate apply amount = 13.0
        19/01/1998  irrigate apply amount = 20.0
        18/02/1998  irrigate apply amount = 16.0
        19/02/1998  irrigate apply amount = 59.0
        20/02/1998  irrigate apply amount = 25.0
        24/02/1998  irrigate apply amount = 33.0
        06/03/1998  irrigate apply amount = 33.0
        11/03/1998  irrigate apply amount = 33.0
        19/03/1998  irrigate apply amount = 33.0
      fertiliser
      irrigation: same as expt3 irrigated, s1 emerald - mungbean  40 plants-m2.paddock.irrigation
      manager: same as expt3 irrigated, s1 emerald - mungbean  40 plants-m2.paddock.manager
      Soil: same as expt3, rainout shelter, s2 emerald - mungbean  40 plants-m2.paddock.soil
      surfaceom
        PoolName = wheat  # Organic Matter pool name
        type = wheat  # Organic Matter type
        mass = 500  # Initial surface residue (kg/ha)
        cnr = 40  # C:N ratio of initial residue
        standing_fraction = 0.0  # Fraction of residue standing
      mungbean
  simulation expt3 rainout shelter, s3 emerald - mungbean  40 plants-m2
    clock: start_date=4/12/1997; end_date=20/5/1998
    summaryfile
    metfile met: filename=Gat34rs.met
    area paddock
      outputfile report
        filename=expt3 rainout shelter, s3 emerald - mungbean  40 plants-m2 report.out
        title=expt3 rainout shelter, s3 emerald - mungbean  40 plants-m2 report
        variables: same as expt3 irrigated, s1 emerald - mungbean  40 plants-m2.paddock.report.variables
      operations
        20/01/1998  soilwat2 set sw = 0.285 0.402 0.346 0.301 0.315 0.299 0.303 0.322
        31/12/1997  mungbean sow plants = 40.0,crop_class = plant, row_spacing = 400, sowing_depth = 50, cultivar = emerald
        31/12/1997  irrigate apply amount = 17.0
        01/01/1998  irrigate apply amount = 33.0
        02/01/1998  irrigate apply amount = 30.0
        06/01/1998  irrigate apply amount = 26.0
        13/01/1998  irrigate apply amount = 13.0
        19/01/1998  irrigate apply amount = 20.0
        18/02/1998  irrigate apply amount = 16.0
        19/02/1998  irrigate apply amount = 59.0
        20/02/1998  irrigate apply amount = 25.0
        24/02/1998  irrigate apply amount = 33.0
        06/03/1998  irrigate apply amount = 33.0
        11/03/1998  irrigate apply amount = 33.0
        19/03/1998  irrigate apply amount = 33.0
      fertiliser
      irrigation: same as expt3 irrigated, s1 emerald - mungbean  40 plants-m2.paddock.irrigation
      manager: same as expt3 irrigated, s1 emerald - mungbean  40 plants-m2.paddock.manager
      Soil
        Water: same as expt3 irrigated, s1 emerald - mungbean  40 plants-m2.paddock.soil.Water
        SoilWater: same as expt3 irrigated, s1 emerald - mungbean  40 plants-m2.paddock.soil.SoilWater
        SoilOrganicMatter: same as expt3 irrigated, s1 emerald - mungbean  40 plants-m2.paddock.soil.SoilOrganicMatter
        Analysis: Thickness=[200.0, 200.0, 200.0, 200.0, 200.0, 200.0, 200.0, 200.0]; PH=[7.50, 8.00, 8.00, 8.00, 8.00, 8.00, 8.00, 8.00]
        Sample Initial nitrogen
          Thickness  NO3   NH4
          200.0      2.86  1
          200.0      1.28  1
          200.0      0.74  1
          200.0      0.71  1
          200.0      0.48  1
          200.0      0.37  1
          200.0      0.35  1
          200.0      0.43  1
        Sample Initial water: Thickness=[200.0, 200.0, 200.0, 200.0, 200.0, 200.0, 200.0, 200.0]; SW=[0.329, 0.369, 0.306, 0.274, 0.291, 0.312, 0.299, 0.322]
      surfaceom
        PoolName = wheat  # Organic Matter pool name
        type = wheat  # Organic Matter type
        mass = 500  # Initial surface residue (kg/ha)
        cnr = 40  # C:N ratio of initial residue
        standing_fraction = 0.0  # Fraction of residue standing
      mungbean
  simulation expt3 rainout shelter, s3 emerald - mungbean  40 plants-m21
    clock: start_date=4/12/1997; end_date=20/5/1998
    summaryfile
    metfile met: filename=Gat34rs.met
    area paddock
      outputfile report
        filename=expt3 rainout shelter, s3 emerald - mungbean  40 plants-m21 report.out
        title=expt3 rainout shelter, s3 emerald - mungbean  40 plants-m21 report
        variables: same as expt3 irrigated, s1 emerald - mungbean  40 plants-m2.paddock.report.variables
      operations
        20/01/1998  soilwat2 set sw = 0.285 0.402 0.346 0.301 0.315 0.299 0.303 0.322
        31/12/1997  mungbean sow plants = 40.0,crop_class = plant, row_spacing = 400, sowing_depth = 50, cultivar = emerald_sf
        31/12/1997  irrigate apply amount = 17.0
        01/01/1998  irrigate apply amount = 33.0
        02/01/1998  irrigate apply amount = 30.0
        06/01/1998  irrigate apply amount = 26.0
        13/01/1998  irrigate apply amount = 13.0
        19/01/1998  irrigate apply amount = 20.0
        18/02/1998  irrigate apply amount = 16.0
        19/02/1998  irrigate apply amount = 59.0
        20/02/1998  irrigate apply amount = 25.0
        24/02/1998  irrigate apply amount = 33.0
        06/03/1998  irrigate apply amount = 33.0
        11/03/1998  irrigate apply amount = 33.0
        19/03/1998  irrigate apply amount = 33.0
      fertiliser
      irrigation: same as expt3 irrigated, s1 emerald - mungbean  40 plants-m2.paddock.irrigation
      manager: same as expt3 irrigated, s1 emerald - mungbean  40 plants-m2.paddock.manager
      Soil: same as expt3 rainout shelter, s3 emerald - mungbean  40 plants-m2.paddock.soil
      surfaceom
        PoolName = wheat  # Organic Matter pool name
        type = wheat  # Organic Matter type
        mass = 500  # Initial surface residue (kg/ha)
        cnr = 40  # C:N ratio of initial residue
        standing_fraction = 0.0  # Fraction of residue standing
      mungbean
