Simulations: Version=126
  Simulation expt3 irrigated, s1 emerald - mungbean  40 plants-m2
    Clock: Start=1997-12-04; End=1998-04-30
    Summary summaryfile
    Weather: FileName=Gat34.met
    Zone paddock: Area=1; Slope=0; AspectAngle=0; Altitude=50
      Report
        VariableNames:
          year
          mungbean.plant_status
          mungbean.daysaftersowing
          mungbean.ttaftersowing
          mungbean.yield
          mungbean.biomass
          mungbean.plants
          mungbean.dlt_dm
          mungbean.rootgreenwt
          mungbean.leafgreenwt
          mungbean.stemgreenwt
          mungbean.podgreenwt
          mungbean.grain_wt
          mungbean.stage
          mungbean.lai
          mungbean.tlai
          mungbean.slai
          mungbean.leaf_no() as leaf_no
          mungbean.leaf_no_dead()
          mungbean.root_depth
          tracker1.avg@mungbean_swdef_pheno
          tracker1.avg@mungbean_swdef_photo
          tracker1.avg@mungbean_swdef_expan
          tracker1.avg@mungbean_nfact_photo
          tracker1.avg@mungbean_nfact_grain
          mungbean.n_demand
          mungbean.n_supply_soil
          mungbean.n_uptake
          mungbean.dlt_n_fixed
          mungbean.n_fixed_tops
          no3()
          sw_dep()
          mungbean.ep()
          es
          tracker1.sum@soilwat2_runoff
          tracker1.sum@soilwat2_drain
          surfaceom.surfaceom_wt
          mungbean.sw_demand
          mungbean.sw_supply
          mungbean.esw_layr()
          eo
          maxt
          mint
          radn
          rain
          mungbean.height
          mungbean.biomass_wt
          mungbean.node_no()
          mungbean.flowering_date
          mungbean.maturity_date
          mungbean.cover_green
          mungbean.green_biomass_wt as green_biomass
          mungbean.green_biomass_n as green_n
          mungbean.leafgreenn
          mungbean.stemgreenn
          mungbean.grain_n
          mungbean.podgreenn
          [Clock].Today
          no3()
          esw
          sw
      Operations
        1998-01-20  // soilwat2 set sw = 0.391 0.416 0.397 0.377 0.369 0.340 0.309 0.304
        1997-12-04  // mungbean sow plants = 40.0,crop_class = plant, row_spacing = 400, sowing_depth = 50, cultivar = emerald
        1997-12-04  // irrigate apply amount = 40.0
        1997-12-18  // irrigate apply amount = 20.0
        1998-01-02  // irrigate apply amount = 20.0
        1998-01-06  // irrigate apply amount = 25.0
        1998-01-13  // irrigate apply amount = 25.0
        1998-01-19  // irrigate apply amount = 30.0
        1998-01-27  // irrigate apply amount = 25.0
        1998-02-06  // irrigate apply amount = 20.0
        1998-02-27  // irrigate apply amount = 15.0
        1998-03-06  // irrigate apply amount = 33.0
        1998-03-13  // irrigate apply amount = 25.0
        1998-03-19  // irrigate apply amount = 20.0
        1998-03-27  // irrigate apply amount = 25.0
      Fertiliser
      Irrigation
      Manager
```csharp
using Models.PMF;
using Models.Core;
using System;
namespace Models
{
    [Serializable]
    [System.Xml.Serialization.XmlInclude(typeof(Model))]
    public class Script : Model
    {
        [Link] Clock Clock;

        [EventSubscribe("StartOfSimulation")]
        private void OnSimulationCommencing(object sender, EventArgs e)
        {
            /*
                
                 dateset = 0
                 emer_date = 0
                 endjuv_date = 0
                 anth_date = 0
                 mat_date = 0
            
            */
        }
        [EventSubscribe("DoCalculations")]
        private void OnDoCalculations(object sender, EventArgs e)
        {
            /*
                
                 report do_output
                 if mungbean.stage = 3 and dateset = 0 then
                    emer_date = daysaftersowing
                    dateset = 1
                 endif
                 if mungbean.stage = 4 and dateset = 1 then
                    endjuv_date = daysaftersowing
                    dateset = 2
                 endif
                 if mungbean.stage = 6 and dateset = 2 then
                    anth_date = daysaftersowing
                    dateset = 3
                 endif
                 if mungbean.stage = 9 and dateset = 3 then
                    mat_date = daysaftersowing
                    dateset = 4
                 endif
            if (mungbean.stagename = 'maturity' or mungbean.plant_status = 'dead') then
               report do_output
               mungbean harvest 
               mungbean kill_crop 
               mungbean end_crop
               dateset = 0
            endif
            !second flush!!!!!!!!!!!!!
            ![standard.manager.init]       
             !dateset = 0
              !   anth_date = 0
              !   mat_date = 0
             ![standard.manager.end_of_day]
              !  report do_output
               !  if mungbean.stage = 6 and dateset = 0 then
                !    anth_date = daysaftersowing
                 !   dateset = 1
                 !endif
                 !if mungbean.tt_tot(7)>600 and dateset = 1 then
                  !  mat_date1=daysaftersowing
                  !  report do_output
                  !  dataset = 2
                 !endif
                 !if mungbean.stage = 8 and dateset = 2 then
                  !  mat_date2 = daysaftersowing
                   ! dateset = 3
                 !endif
            !if (mungbean.stagename = 'harvest_ripe' or mungbean.plant_status = 'dead') then
             !  report do_output
             !  mungbean harvest 
             !  mungbean kill_crop 
             !  mungbean end_crop
             !  dateset = 0
            !endif
            
            */
        }
    }
}
```
      Soil: Latitude=0; Longitude=0
        Physical
          Thickness  BD    AirDry  LL15  DUL   SAT
          200        1.37  0.05    0.18  0.41  0.43
          200        1.27  0.19    0.19  0.47  0.48
          200        1.28  0.22    0.22  0.41  0.45
          200        1.33  0.19    0.19  0.41  0.45
          200        1.37  0.22    0.22  0.37  0.45
          200        1.42  0.19    0.19  0.37  0.44
          200        1.36  0.17    0.17  0.37  0.4
          200        1.35  0.17    0.17  0.37  0.4
          SoilCrop MungbeanSoil: LL=[0.2, 0.273, 0.271, 0.273, 0.294, 0.275, 0.29, 0.306]; KL=[0.08, 0.08, 0.08, 0.08, 0.06, 0.04, 0.02, 0.01]; XF=[1, 1, 1, 1, 1, 1, 1, 1]
        WaterBalance SoilWater: SummerDate=1-Nov; SummerU=6; SummerCona=3.5; WinterDate=1-Apr; WinterU=6; WinterCona=3.5; DiffusConst=88; DiffusSlope=35.4; Salb=0.13; CN2Bare=72; CNRed=20; CNCov=0.8; DischargeWidth=5; CatchmentArea=10; Thickness=[200, 200, 200, 200, 200, 200, 200, 200]; SWCON=[0.4, 0.4, 0.4, 0.4, 0.4, 0.4, 0.4, 0.4]
        SoilNitrogen: fom_types=[default, manure, mucuna, lablab, shemp, stable]; fract_carb=[0.2, 0.3, 0.54, 0.57, 0.45, 0]; fract_cell=[0.7, 0.3, 0.37, 0.37, 0.47, 0.1]; fract_lign=[0.1, 0.4, 0.09, 0.06, 0.08, 0.9]; NPartitionApproach=0
          SoilNitrogenNO3 NO3
          SoilNitrogenNH4 NH4
          SoilNitrogenUrea Urea
          SoilNitrogenPlantAvailableNO3 PlantAvailableNO3
          SoilNitrogenPlantAvailableNH4 PlantAvailableNH4
        CERESSoilTemperature Temperature
        Organic: FOMCNRatio=33
          Thickness  Carbon  SoilCNRatio  FBiom  FInert  FOM
          200        2.2     14.5         0.02   0.36    0
          200        1.6     14.5         0.015  0.5     0
          200        1.35    14.5         0.01   0.59    0
          200        0.95    14.5         0.01   0.84    0
          200        1       14.5         0.01   0.8     0
          200        0.8     14.5         0.01   0.99    0
          200        0.45    14.5         0.01   0.99    0
          200        0.45    14.5         0.01   0.99    0
        Chemical
          Thickness  NO3N  NH4N  PH
          200        0.14  1     7.5
          200        0.32  1     8
          200        0.3   1     8
          200        0.15  1     8
          200        0.17  1     8
          200        0.08  1     8
          200        0.08  1     8
          200        0.09  1     8
        Sample Initial water: Thickness=[200, 200, 200, 200, 200, 200, 200, 200]; SW=[0.338, 0.426, 0.388, 0.367, 0.343, 0.313, 0.269, 0.266]; SWUnits=Volumetric; OCUnits=Total; PHUnits=Water
      SurfaceOrganicMatter: InitialResidueName=wheat; InitialResidueType=wheat; InitialResidueMass=500; InitialStandingFraction=0; InitialCPR=0; InitialCNR=40
      Plant mungbean: ResourceName=Mungbean
      MicroClimate: a_interception=0; b_interception=1; c_interception=0; d_interception=0; soil_albedo=0.3; SoilHeatFluxFraction=0; MinimumHeightDiffForNewLayer=0; NightInterceptionFraction=0; ReferenceHeight=0
    SoilArbitrator
  Simulation expt3 irrigated, s1 emerald - mungbean  40 plants-m21
    Clock: Start=1997-12-04; End=1998-04-30
    Summary summaryfile
    Weather: FileName=Gat34.met
    Zone paddock: Area=1; Slope=0; AspectAngle=0; Altitude=50
      Report: same as expt3 irrigated, s1 emerald - mungbean  40 plants-m2.paddock.report
      Operations
        1998-01-20  // soilwat2 set sw = 0.391 0.416 0.397 0.377 0.369 0.340 0.309 0.304
        1997-12-04  // mungbean sow plants = 40.0,crop_class = plant, row_spacing = 400, sowing_depth = 50, cultivar = emerald_sf
        1997-12-04  // irrigate apply amount = 40.0
        1997-12-18  // irrigate apply amount = 20.0
        1998-01-02  // irrigate apply amount = 20.0
        1998-01-06  // irrigate apply amount = 25.0
        1998-01-13  // irrigate apply amount = 25.0
        1998-01-19  // irrigate apply amount = 30.0
        1998-01-27  // irrigate apply amount = 25.0
        1998-02-06  // irrigate apply amount = 20.0
        1998-02-27  // irrigate apply amount = 15.0
        1998-03-06  // irrigate apply amount = 33.0
        1998-03-13  // irrigate apply amount = 25.0
        1998-03-19  // irrigate apply amount = 20.0
        1998-03-27  // irrigate apply amount = 25.0
      Fertiliser
      Irrigation
      Manager: same as expt3 irrigated, s1 emerald - mungbean  40 plants-m2.paddock.manager
      Soil: same as expt3 irrigated, s1 emerald - mungbean  40 plants-m2.paddock.soil
      SurfaceOrganicMatter: InitialResidueName=wheat; InitialResidueType=wheat; InitialResidueMass=500; InitialStandingFraction=0; InitialCPR=0; InitialCNR=40
      Plant mungbean: ResourceName=Mungbean
      MicroClimate: a_interception=0; b_interception=1; c_interception=0; d_interception=0; soil_albedo=0.3; SoilHeatFluxFraction=0; MinimumHeightDiffForNewLayer=0; NightInterceptionFraction=0; ReferenceHeight=0
    SoilArbitrator
  Simulation expt3,irrigated, s2 emerald - mungbean  40 plants-m2
    Clock: Start=1997-12-04; End=1998-04-30
    Summary summaryfile
    Weather: FileName=Gat34.met
    Zone paddock: Area=1; Slope=0; AspectAngle=0; Altitude=50
      Report: same as expt3 irrigated, s1 emerald - mungbean  40 plants-m2.paddock.report
      Operations
        1998-01-20  // soilwat2 set sw = 0.401 0.411 0.399 0.379 0.362 0.305 0.298 0.306
        1997-12-18  // mungbean sow plants = 40.0,crop_class = plant, row_spacing = 400, sowing_depth = 50, cultivar = emerald
        1997-12-04  // irrigate apply amount = 40.0
        1997-12-18  // irrigate apply amount = 20.0
        1998-01-02  // irrigate apply amount = 20.0
        1998-01-06  // irrigate apply amount = 25.0
        1998-01-13  // irrigate apply amount = 25.0
        1998-01-19  // irrigate apply amount = 30.0
        1998-01-27  // irrigate apply amount = 25.0
        1998-02-06  // irrigate apply amount = 20.0
        1998-02-27  // irrigate apply amount = 15.0
        1998-03-06  // irrigate apply amount = 33.0
        1998-03-13  // irrigate apply amount = 25.0
        1998-03-19  // irrigate apply amount = 20.0
        1998-03-27  // irrigate apply amount = 25.0
      Fertiliser
      Irrigation
      Manager: same as expt3 irrigated, s1 emerald - mungbean  40 plants-m2.paddock.manager
      Soil: Latitude=0; Longitude=0
        Physical: same as expt3 irrigated, s1 emerald - mungbean  40 plants-m2.paddock.soil.Physical
        WaterBalance SoilWater: same as expt3 irrigated, s1 emerald - mungbean  40 plants-m2.paddock.soil.SoilWater
        SoilNitrogen: same as expt3 irrigated, s1 emerald - mungbean  40 plants-m2.paddock.soil.SoilNitrogen
        CERESSoilTemperature Temperature
        Organic: same as expt3 irrigated, s1 emerald - mungbean  40 plants-m2.paddock.soil.Organic
        Chemical
          Thickness  NO3N  NH4N  PH
          200        0.5   1     7.5
          200        0.26  1     8
          200        0.26  1     8
          200        0.21  1     8
          200        0.09  1     8
          200        0.11  1     8
          200        0.14  1     8
          200        0.11  1     8
        Sample Initial water: same as expt3 irrigated, s1 emerald - mungbean  40 plants-m2.paddock.soil.Initial water
      SurfaceOrganicMatter: InitialResidueName=wheat; InitialResidueType=wheat; InitialResidueMass=500; InitialStandingFraction=0; InitialCPR=0; InitialCNR=40
      Plant mungbean: ResourceName=Mungbean
      MicroClimate: a_interception=0; b_interception=1; c_interception=0; d_interception=0; soil_albedo=0.3; SoilHeatFluxFraction=0; MinimumHeightDiffForNewLayer=0; NightInterceptionFraction=0; ReferenceHeight=0
    SoilArbitrator
  Simulation expt3,irrigated, s2 emerald - mungbean  40 plants-m21
    Clock: Start=1997-12-04; End=1998-04-30
    Summary summaryfile
    Weather: FileName=Gat34.met
    Zone paddock: Area=1; Slope=0; AspectAngle=0; Altitude=50
      Report: same as expt3 irrigated, s1 emerald - mungbean  40 plants-m2.paddock.report
      Operations
        1998-01-20  // soilwat2 set sw = 0.401 0.411 0.399 0.379 0.362 0.305 0.298 0.306
        1997-12-18  // mungbean sow plants = 40.0,crop_class = plant, row_spacing = 400, sowing_depth = 50, cultivar = emerald_sf
        1997-12-04  // irrigate apply amount = 40.0
        1997-12-18  // irrigate apply amount = 20.0
        1998-01-02  // irrigate apply amount = 20.0
        1998-01-06  // irrigate apply amount = 25.0
        1998-01-13  // irrigate apply amount = 25.0
        1998-01-19  // irrigate apply amount = 30.0
        1998-01-27  // irrigate apply amount = 25.0
        1998-02-06  // irrigate apply amount = 20.0
        1998-02-27  // irrigate apply amount = 15.0
        1998-03-06  // irrigate apply amount = 33.0
        1998-03-13  // irrigate apply amount = 25.0
        1998-03-19  // irrigate apply amount = 20.0
        1998-03-27  // irrigate apply amount = 25.0
      Fertiliser
      Irrigation
      Manager: same as expt3 irrigated, s1 emerald - mungbean  40 plants-m2.paddock.manager
      Soil: same as expt3,irrigated, s2 emerald - mungbean  40 plants-m2.paddock.soil
      SurfaceOrganicMatter: InitialResidueName=wheat; InitialResidueType=wheat; InitialResidueMass=500; InitialStandingFraction=0; InitialCPR=0; InitialCNR=40
      Plant mungbean: ResourceName=Mungbean
      MicroClimate: a_interception=0; b_interception=1; c_interception=0; d_interception=0; soil_albedo=0.3; SoilHeatFluxFraction=0; MinimumHeightDiffForNewLayer=0; NightInterceptionFraction=0; ReferenceHeight=0
    SoilArbitrator
  Simulation expt3 irrigated, s3 emerald - mungbean  40 plants-m2
    Clock: Start=1997-12-04; End=1998-05-20
    Summary summaryfile
    Weather: FileName=Gat34.met
    Zone paddock: Area=1; Slope=0; AspectAngle=0; Altitude=50
      Report: same as expt3 irrigated, s1 emerald - mungbean  40 plants-m2.paddock.report
      Operations
        1998-01-20  // soilwat2 set sw = 0.417 0.418 0.400 0.384 0.371 0.345 0.334 0.327
        1997-12-31  // mungbean sow plants = 40.0,crop_class = plant, row_spacing = 400, sowing_depth = 50, cultivar = emerald
        1997-12-31  // irrigate apply amount = 25.0
        1997-12-04  // irrigate apply amount = 40.0
        1997-12-18  // irrigate apply amount = 20.0
        1998-01-02  // irrigate apply amount = 20.0
        1998-01-06  // irrigate apply amount = 25.0
        1998-01-13  // irrigate apply amount = 25.0
        1998-01-19  // irrigate apply amount = 30.0
        1998-01-27  // irrigate apply amount = 25.0
        1998-02-06  // irrigate apply amount = 20.0
        1998-02-27  // irrigate apply amount = 15.0
        1998-03-06  // irrigate apply amount = 33.0
        1998-03-13  // irrigate apply amount = 25.0
        1998-03-19  // irrigate apply amount = 20.0
        1998-03-27  // irrigate apply amount = 25.0
      Fertiliser
      Irrigation
      Manager: same as expt3 irrigated, s1 emerald - mungbean  40 plants-m2.paddock.manager
      Soil: Latitude=0; Longitude=0
        Physical: same as expt3 irrigated, s1 emerald - mungbean  40 plants-m2.paddock.soil.Physical
        WaterBalance SoilWater: same as expt3 irrigated, s1 emerald - mungbean  40 plants-m2.paddock.soil.SoilWater
        SoilNitrogen: same as expt3 irrigated, s1 emerald - mungbean  40 plants-m2.paddock.soil.SoilNitrogen
        CERESSoilTemperature Temperature
        Organic: same as expt3 irrigated, s1 emerald - mungbean  40 plants-m2.paddock.soil.Organic
        Chemical
          Thickness  NO3N  NH4N  PH
          200        0.2   1     7.5
          200        0.24  1     8
          200        0.2   1     8
          200        0.1   1     8
          200        0.04  1     8
          200        0.09  1     8
          200        0.05  1     8
          200        0.1   1     8
        Sample Initial water: same as expt3 irrigated, s1 emerald - mungbean  40 plants-m2.paddock.soil.Initial water
      SurfaceOrganicMatter: InitialResidueName=wheat; InitialResidueType=wheat; InitialResidueMass=500; InitialStandingFraction=0; InitialCPR=0; InitialCNR=40
      Plant mungbean: ResourceName=Mungbean
      MicroClimate: a_interception=0; b_interception=1; c_interception=0; d_interception=0; soil_albedo=0.3; SoilHeatFluxFraction=0; MinimumHeightDiffForNewLayer=0; NightInterceptionFraction=0; ReferenceHeight=0
    SoilArbitrator
  Simulation expt3 irrigated, s3 emerald - mungbean  40 plants-m21
    Clock: Start=1997-12-04; End=1998-05-20
    Summary summaryfile
    Weather: FileName=Gat34.met
    Zone paddock: Area=1; Slope=0; AspectAngle=0; Altitude=50
      Report: same as expt3 irrigated, s1 emerald - mungbean  40 plants-m2.paddock.report
      Operations
        1998-01-20  // soilwat2 set sw = 0.417 0.418 0.400 0.384 0.371 0.345 0.334 0.327
        1997-12-31  // mungbean sow plants = 40.0,crop_class = plant, row_spacing = 400, sowing_depth = 50, cultivar = emerald_sf
        1997-12-31  // irrigate apply amount = 25.0
        1997-12-04  // irrigate apply amount = 40.0
        1997-12-18  // irrigate apply amount = 20.0
        1998-01-02  // irrigate apply amount = 20.0
        1998-01-06  // irrigate apply amount = 25.0
        1998-01-13  // irrigate apply amount = 25.0
        1998-01-19  // irrigate apply amount = 30.0
        1998-01-27  // irrigate apply amount = 25.0
        1998-02-06  // irrigate apply amount = 20.0
        1998-02-27  // irrigate apply amount = 15.0
        1998-03-06  // irrigate apply amount = 33.0
        1998-03-13  // irrigate apply amount = 25.0
        1998-03-19  // irrigate apply amount = 20.0
        1998-03-27  // irrigate apply amount = 25.0
      Fertiliser
      Irrigation
      Manager: same as expt3 irrigated, s1 emerald - mungbean  40 plants-m2.paddock.manager
      Soil: same as expt3 irrigated, s3 emerald - mungbean  40 plants-m2.paddock.soil
      SurfaceOrganicMatter: InitialResidueName=wheat; InitialResidueType=wheat; InitialResidueMass=500; InitialStandingFraction=0; InitialCPR=0; InitialCNR=40
      Plant mungbean: ResourceName=Mungbean
      MicroClimate: a_interception=0; b_interception=1; c_interception=0; d_interception=0; soil_albedo=0.3; SoilHeatFluxFraction=0; MinimumHeightDiffForNewLayer=0; NightInterceptionFraction=0; ReferenceHeight=0
    SoilArbitrator
  Simulation expt3 rainfed, s1 emerald - mungbean  40 plants-m2
    Clock: Start=1997-12-04; End=1998-04-30
    Summary summaryfile
    Weather: FileName=Gat34.met
    Zone paddock: Area=1; Slope=0; AspectAngle=0; Altitude=50
      Report: same as expt3 irrigated, s1 emerald - mungbean  40 plants-m2.paddock.report
      Operations
        1998-01-20  // soilwat2 set sw = 0.392 0.400 0.397 0.375 0.371 0.335 0.326 0.316
        1997-12-04  // mungbean sow plants = 40.0,crop_class = plant, row_spacing = 400, sowing_depth = 50, cultivar = emerald
        1997-12-04  // irrigate apply amount = 40.0
        1997-12-18  // irrigate apply amount = 20.0
        1998-01-02  // irrigate apply amount = 20.0
        1998-01-06  // irrigate apply amount = 25.0
        1998-01-13  // irrigate apply amount = 25.0
        1998-01-19  // irrigate apply amount = 30.0
      Fertiliser
      Irrigation
      Manager: same as expt3 irrigated, s1 emerald - mungbean  40 plants-m2.paddock.manager
      Soil: Latitude=0; Longitude=0
        Physical: same as expt3 irrigated, s1 emerald - mungbean  40 plants-m2.paddock.soil.Physical
        WaterBalance SoilWater: same as expt3 irrigated, s1 emerald - mungbean  40 plants-m2.paddock.soil.SoilWater
        SoilNitrogen: same as expt3 irrigated, s1 emerald - mungbean  40 plants-m2.paddock.soil.SoilNitrogen
        CERESSoilTemperature Temperature
        Organic: same as expt3 irrigated, s1 emerald - mungbean  40 plants-m2.paddock.soil.Organic
        Chemical
          Thickness  NO3N  NH4N  PH
          200        0.47  1     7.5
          200        0.39  1     8
          200        0.33  1     8
          200        0.19  1     8
          200        0.15  1     8
          200        0.15  1     8
          200        0.1   1     8
          200        0.18  1     8
        Sample Initial water: Thickness=[200, 200, 200, 200, 200, 200, 200, 200]; SW=[0.329, 0.369, 0.388, 0.306, 0.274, 0.292, 0.312, 0.299]; SWUnits=Volumetric; OCUnits=Total; PHUnits=Water
      SurfaceOrganicMatter: InitialResidueName=wheat; InitialResidueType=wheat; InitialResidueMass=500; InitialStandingFraction=0; InitialCPR=0; InitialCNR=40
      Plant mungbean: ResourceName=Mungbean
      MicroClimate: a_interception=0; b_interception=1; c_interception=0; d_interception=0; soil_albedo=0.3; SoilHeatFluxFraction=0; MinimumHeightDiffForNewLayer=0; NightInterceptionFraction=0; ReferenceHeight=0
    SoilArbitrator
  Simulation expt3 rainfed, s1 emerald - mungbean  40 plants-m21
    Clock: Start=1997-12-04; End=1998-04-30
    Summary summaryfile
    Weather: FileName=Gat34.met
    Zone paddock: Area=1; Slope=0; AspectAngle=0; Altitude=50
      Report: same as expt3 irrigated, s1 emerald - mungbean  40 plants-m2.paddock.report
      Operations
        1998-01-20  // soilwat2 set sw = 0.392 0.400 0.397 0.375 0.371 0.335 0.326 0.316
        1997-12-04  // mungbean sow plants = 40.0,crop_class = plant, row_spacing = 400, sowing_depth = 50, cultivar = emerald_sf
        1997-12-04  // irrigate apply amount = 40.0
        1997-12-18  // irrigate apply amount = 20.0
        1998-01-02  // irrigate apply amount = 20.0
        1998-01-06  // irrigate apply amount = 25.0
        1998-01-13  // irrigate apply amount = 25.0
        1998-01-19  // irrigate apply amount = 30.0
      Fertiliser
      Irrigation
      Manager: same as expt3 irrigated, s1 emerald - mungbean  40 plants-m2.paddock.manager
      Soil: same as expt3 rainfed, s1 emerald - mungbean  40 plants-m2.paddock.soil
      SurfaceOrganicMatter: InitialResidueName=wheat; InitialResidueType=wheat; InitialResidueMass=500; InitialStandingFraction=0; InitialCPR=0; InitialCNR=40
      Plant mungbean: ResourceName=Mungbean
      MicroClimate: a_interception=0; b_interception=1; c_interception=0; d_interception=0; soil_albedo=0.3; SoilHeatFluxFraction=0; MinimumHeightDiffForNewLayer=0; NightInterceptionFraction=0; ReferenceHeight=0
    SoilArbitrator
  Simulation expt3 rainfed, s2 emerald - mungbean  40 plants-m2
    Clock: Start=1997-12-04; End=1998-05-20
    Summary summaryfile
    Weather: FileName=Gat34.met
    Zone paddock: Area=1; Slope=0; AspectAngle=0; Altitude=50
      Report: same as expt3 irrigated, s1 emerald - mungbean  40 plants-m2.paddock.report
      Operations
        1998-01-20  // soilwat2 set sw = 0.402 0.411 0.402 0.382 0.374 0.350 0.322 0.295
        1997-12-18  // mungbean sow plants = 40.0,crop_class = plant, row_spacing = 400, sowing_depth = 50, cultivar = emerald
        1997-12-04  // irrigate apply amount = 40.0
        1997-12-18  // irrigate apply amount = 20.0
        1998-01-02  // irrigate apply amount = 20.0
        1998-01-06  // irrigate apply amount = 25.0
        1998-01-13  // irrigate apply amount = 25.0
        1998-01-19  // irrigate apply amount = 30.0
      Fertiliser
      Irrigation
      Manager: same as expt3 irrigated, s1 emerald - mungbean  40 plants-m2.paddock.manager
      Soil: Latitude=0; Longitude=0
        Physical: same as expt3 irrigated, s1 emerald - mungbean  40 plants-m2.paddock.soil.Physical
        WaterBalance SoilWater: same as expt3 irrigated, s1 emerald - mungbean  40 plants-m2.paddock.soil.SoilWater
        SoilNitrogen: same as expt3 irrigated, s1 emerald - mungbean  40 plants-m2.paddock.soil.SoilNitrogen
        CERESSoilTemperature Temperature
        Organic: same as expt3 irrigated, s1 emerald - mungbean  40 plants-m2.paddock.soil.Organic
        Chemical
          Thickness  NO3N  NH4N  PH
          200        0.86  1     7.5
          200        0.33  1     8
          200        0.42  1     8
          200        0.36  1     8
          200        0.2   1     8
          200        0.09  1     8
          200        0.14  1     8
          200        0.15  1     8
        Sample Initial water: same as expt3 rainfed, s1 emerald - mungbean  40 plants-m2.paddock.soil.Initial water
      SurfaceOrganicMatter: InitialResidueName=wheat; InitialResidueType=wheat; InitialResidueMass=500; InitialStandingFraction=0; InitialCPR=0; InitialCNR=40
      Plant mungbean: ResourceName=Mungbean
      MicroClimate: a_interception=0; b_interception=1; c_interception=0; d_interception=0; soil_albedo=0.3; SoilHeatFluxFraction=0; MinimumHeightDiffForNewLayer=0; NightInterceptionFraction=0; ReferenceHeight=0
    SoilArbitrator
  Simulation expt3 rainfed, s2 emerald - mungbean  40 plants-m21
    Clock: Start=1997-12-04; End=1998-05-20
    Summary summaryfile
    Weather: FileName=Gat34.met
    Zone paddock: Area=1; Slope=0; AspectAngle=0; Altitude=50
      Report: same as expt3 irrigated, s1 emerald - mungbean  40 plants-m2.paddock.report
      Operations
        1998-01-20  // soilwat2 set sw = 0.402 0.411 0.402 0.382 0.374 0.350 0.322 0.295
        1997-12-18  // mungbean sow plants = 40.0,crop_class = plant, row_spacing = 400, sowing_depth = 50, cultivar = emerald_sf
        1997-12-04  // irrigate apply amount = 40.0
        1997-12-18  // irrigate apply amount = 20.0
        1998-01-02  // irrigate apply amount = 20.0
        1998-01-06  // irrigate apply amount = 25.0
        1998-01-13  // irrigate apply amount = 25.0
        1998-01-19  // irrigate apply amount = 30.0
      Fertiliser
      Irrigation
      Manager: same as expt3 irrigated, s1 emerald - mungbean  40 plants-m2.paddock.manager
      Soil: same as expt3 rainfed, s2 emerald - mungbean  40 plants-m2.paddock.soil
      SurfaceOrganicMatter: InitialResidueName=wheat; InitialResidueType=wheat; InitialResidueMass=500; InitialStandingFraction=0; InitialCPR=0; InitialCNR=40
      Plant mungbean: ResourceName=Mungbean
      MicroClimate: a_interception=0; b_interception=1; c_interception=0; d_interception=0; soil_albedo=0.3; SoilHeatFluxFraction=0; MinimumHeightDiffForNewLayer=0; NightInterceptionFraction=0; ReferenceHeight=0
    SoilArbitrator
  Simulation expt3 irrigated, s3 emerald - mungbean  40 plants-m22
    Clock: Start=1997-12-04; End=1998-05-20
    Summary summaryfile
    Weather: FileName=Gat34.met
    Zone paddock: Area=1; Slope=0; AspectAngle=0; Altitude=50
      Report: same as expt3 irrigated, s1 emerald - mungbean  40 plants-m2.paddock.report
      Operations
        1998-01-20  // soilwat2 set sw = 0.418 0.417 0.403 0.391 0.379 0.361 0.327 0.333
        1997-12-31  // mungbean sow plants = 40.0,crop_class = plant, row_spacing = 400, sowing_depth = 50, cultivar = emerald
        1997-12-31  // irrigate apply amount = 20.0
        1997-12-04  // irrigate apply amount = 40.0
        1997-12-18  // irrigate apply amount = 20.0
        1998-01-02  // irrigate apply amount = 20.0
        1998-01-06  // irrigate apply amount = 25.0
        1998-01-13  // irrigate apply amount = 25.0
        1998-01-19  // irrigate apply amount = 30.0
      Fertiliser
      Irrigation
      Manager: same as expt3 irrigated, s1 emerald - mungbean  40 plants-m2.paddock.manager
      Soil: Latitude=0; Longitude=0
        Physical: same as expt3 irrigated, s1 emerald - mungbean  40 plants-m2.paddock.soil.Physical
        WaterBalance SoilWater: same as expt3 irrigated, s1 emerald - mungbean  40 plants-m2.paddock.soil.SoilWater
        SoilNitrogen: same as expt3 irrigated, s1 emerald - mungbean  40 plants-m2.paddock.soil.SoilNitrogen
        CERESSoilTemperature Temperature
        Organic: same as expt3 irrigated, s1 emerald - mungbean  40 plants-m2.paddock.soil.Organic
        Chemical
          Thickness  NO3N  NH4N  PH
          200        3.84  1     7.5
          200        3.07  1     8
          200        3.82  1     8
          200        0.77  1     8
          200        0.25  1     8
          200        0.31  1     8
          200        0.24  1     8
          200        0.2   1     8
        Sample Initial water: same as expt3 rainfed, s1 emerald - mungbean  40 plants-m2.paddock.soil.Initial water
      SurfaceOrganicMatter: InitialResidueName=wheat; InitialResidueType=wheat; InitialResidueMass=500; InitialStandingFraction=0; InitialCPR=0; InitialCNR=40
      Plant mungbean: ResourceName=Mungbean
      MicroClimate: a_interception=0; b_interception=1; c_interception=0; d_interception=0; soil_albedo=0.3; SoilHeatFluxFraction=0; MinimumHeightDiffForNewLayer=0; NightInterceptionFraction=0; ReferenceHeight=0
    SoilArbitrator
  Simulation expt3 irrigated, s3 emerald - mungbean  40 plants-m23
    Clock: Start=1997-12-04; End=1998-05-20
    Summary summaryfile
    Weather: FileName=Gat34.met
    Zone paddock: Area=1; Slope=0; AspectAngle=0; Altitude=50
      Report: same as expt3 irrigated, s1 emerald - mungbean  40 plants-m2.paddock.report
      Operations
        1998-01-20  // soilwat2 set sw = 0.418 0.417 0.403 0.391 0.379 0.361 0.327 0.333
        1997-12-31  // mungbean sow plants = 40.0,crop_class = plant, row_spacing = 400, sowing_depth = 50, cultivar = emerald_sf
        1997-12-31  // irrigate apply amount = 20.0
        1997-12-04  // irrigate apply amount = 40.0
        1997-12-18  // irrigate apply amount = 20.0
        1998-01-02  // irrigate apply amount = 20.0
        1998-01-06  // irrigate apply amount = 25.0
        1998-01-13  // irrigate apply amount = 25.0
        1998-01-19  // irrigate apply amount = 30.0
      Fertiliser
      Irrigation
      Manager: same as expt3 irrigated, s1 emerald - mungbean  40 plants-m2.paddock.manager
      Soil: same as expt3 irrigated, s3 emerald - mungbean  40 plants-m22.paddock.soil
      SurfaceOrganicMatter: InitialResidueName=wheat; InitialResidueType=wheat; InitialResidueMass=500; InitialStandingFraction=0; InitialCPR=0; InitialCNR=40
      Plant mungbean: ResourceName=Mungbean
      MicroClimate: a_interception=0; b_interception=1; c_interception=0; d_interception=0; soil_albedo=0.3; SoilHeatFluxFraction=0; MinimumHeightDiffForNewLayer=0; NightInterceptionFraction=0; ReferenceHeight=0
    SoilArbitrator
  Simulation expt3 rainout shelter, s1 emerald - mungbean  40 plants-m2
    Clock: Start=1997-12-04; End=1998-04-30
    Summary summaryfile
    Weather: FileName=Gat34rs.met
    Zone paddock: Area=1; Slope=0; AspectAngle=0; Altitude=50
      Report: same as expt3 irrigated, s1 emerald - mungbean  40 plants-m2.paddock.report
      Operations
        1998-01-20  // soilwat2 set sw = 0.331 0.346 0.331 0.317 0.335 0.317 0.296 0.320
        1997-12-04  // mungbean sow plants = 40.0,crop_class = plant, row_spacing = 400, sowing_depth = 50, cultivar = emerald
        1997-12-04  // irrigate apply amount = 40.0
        1997-12-08  // irrigate apply amount = 20.0
        1997-12-12  // irrigate apply amount = 40.0
        1997-12-15  // irrigate apply amount = 20.0
        1997-12-18  // irrigate apply amount = 33.0
        1997-12-23  // irrigate apply amount = 20.0
        1997-12-26  // irrigate apply amount = 13.0
        1998-01-02  // irrigate apply amount = 6.6
        1998-01-06  // irrigate apply amount = 26.0
        1998-01-13  // irrigate apply amount = 13.0
        1998-01-19  // irrigate apply amount = 20.0
        1998-02-18  // irrigate apply amount = 16.0
        1998-02-19  // irrigate apply amount = 59.0
        1998-02-20  // irrigate apply amount = 25.0
        1998-02-24  // irrigate apply amount = 33.0
        1998-03-06  // irrigate apply amount = 33.0
        1998-03-11  // irrigate apply amount = 33.0
        1998-03-19  // irrigate apply amount = 33.0
      Fertiliser
      Irrigation
      Manager: same as expt3 irrigated, s1 emerald - mungbean  40 plants-m2.paddock.manager
      Soil: Latitude=0; Longitude=0
        Physical: same as expt3 irrigated, s1 emerald - mungbean  40 plants-m2.paddock.soil.Physical
        WaterBalance SoilWater: same as expt3 irrigated, s1 emerald - mungbean  40 plants-m2.paddock.soil.SoilWater
        SoilNitrogen: same as expt3 irrigated, s1 emerald - mungbean  40 plants-m2.paddock.soil.SoilNitrogen
        CERESSoilTemperature Temperature
        Organic: same as expt3 irrigated, s1 emerald - mungbean  40 plants-m2.paddock.soil.Organic
        Chemical
          Thickness  NO3N  NH4N  PH
          200        1.89  1     7.5
          200        1.79  1     8
          200        0.81  1     8
          200        0.34  1     8
          200        0.22  1     8
          200        0.26  1     8
          200        0.29  1     8
          200        0.32  1     8
        Sample Initial water: Thickness=[200, 200, 200, 200, 200, 200, 200, 200]; SW=[0.329, 0.369, 0.306, 0.274, 0.291, 0.312, 0.299, 0.322]; SWUnits=Volumetric; OCUnits=Total; PHUnits=Water
      SurfaceOrganicMatter: InitialResidueName=wheat; InitialResidueType=wheat; InitialResidueMass=500; InitialStandingFraction=0; InitialCPR=0; InitialCNR=40
      Plant mungbean: ResourceName=Mungbean
      MicroClimate: a_interception=0; b_interception=1; c_interception=0; d_interception=0; soil_albedo=0.3; SoilHeatFluxFraction=0; MinimumHeightDiffForNewLayer=0; NightInterceptionFraction=0; ReferenceHeight=0
    SoilArbitrator
  Simulation expt3 rainout shelter, s1 emerald - mungbean  40 plants-m21
    Clock: Start=1997-12-04; End=1998-04-30
    Summary summaryfile
    Weather: FileName=Gat34rs.met
    Zone paddock: Area=1; Slope=0; AspectAngle=0; Altitude=50
      Report: same as expt3 irrigated, s1 emerald - mungbean  40 plants-m2.paddock.report
      Operations
        1998-01-20  // soilwat2 set sw = 0.331 0.346 0.331 0.317 0.335 0.317 0.296 0.320
        1997-12-04  // mungbean sow plants = 40.0,crop_class = plant, row_spacing = 400, sowing_depth = 50, cultivar = emerald_sf
        1997-12-04  // irrigate apply amount = 40.0
        1997-12-08  // irrigate apply amount = 20.0
        1997-12-12  // irrigate apply amount = 40.0
        1997-12-15  // irrigate apply amount = 20.0
        1997-12-18  // irrigate apply amount = 33.0
        1997-12-23  // irrigate apply amount = 20.0
        1997-12-26  // irrigate apply amount = 13.0
        1998-01-02  // irrigate apply amount = 6.6
        1998-01-06  // irrigate apply amount = 26.0
        1998-01-13  // irrigate apply amount = 13.0
        1998-01-19  // irrigate apply amount = 20.0
        1998-02-18  // irrigate apply amount = 16.0
        1998-02-19  // irrigate apply amount = 59.0
        1998-02-20  // irrigate apply amount = 25.0
        1998-02-24  // irrigate apply amount = 33.0
        1998-03-06  // irrigate apply amount = 33.0
        1998-03-11  // irrigate apply amount = 33.0
        1998-03-19  // irrigate apply amount = 33.0
      Fertiliser
      Irrigation
      Manager: same as expt3 irrigated, s1 emerald - mungbean  40 plants-m2.paddock.manager
      Soil: same as expt3 rainout shelter, s1 emerald - mungbean  40 plants-m2.paddock.soil
      SurfaceOrganicMatter: InitialResidueName=wheat; InitialResidueType=wheat; InitialResidueMass=500; InitialStandingFraction=0; InitialCPR=0; InitialCNR=40
      Plant mungbean: ResourceName=Mungbean
      MicroClimate: a_interception=0; b_interception=1; c_interception=0; d_interception=0; soil_albedo=0.3; SoilHeatFluxFraction=0; MinimumHeightDiffForNewLayer=0; NightInterceptionFraction=0; ReferenceHeight=0
    SoilArbitrator
  Simulation expt3, rainout shelter, s2 emerald - mungbean  40 plants-m2
    Clock: Start=1997-12-04; End=1998-04-30
    Summary summaryfile
    Weather: FileName=Gat34rs.met
    Zone paddock: Area=1; Slope=0; AspectAngle=0; Altitude=50
      Report: same as expt3 irrigated, s1 emerald - mungbean  40 plants-m2.paddock.report
      Operations
        1998-01-20  // soilwat2 set sw = 0.296 0.364 0.357 0.351 0.318 0.306 0.296 0.316
        1997-12-18  // mungbean sow plants = 40.0,crop_class = plant, row_spacing = 400, sowing_depth = 50, cultivar = emerald
        1997-12-18  // irrigate apply amount = 66.0
        1997-12-23  // irrigate apply amount = 20.0
        1997-12-26  // irrigate apply amount = 13.0
        1998-01-02  // irrigate apply amount = 6.6
        1998-01-06  // irrigate apply amount = 26.0
        1998-01-13  // irrigate apply amount = 13.0
        1998-01-19  // irrigate apply amount = 20.0
        1998-02-18  // irrigate apply amount = 16.0
        1998-02-19  // irrigate apply amount = 59.0
        1998-02-20  // irrigate apply amount = 25.0
        1998-02-24  // irrigate apply amount = 33.0
        1998-03-06  // irrigate apply amount = 33.0
        1998-03-11  // irrigate apply amount = 33.0
        1998-03-19  // irrigate apply amount = 33.0
      Fertiliser
      Irrigation
      Manager: same as expt3 irrigated, s1 emerald - mungbean  40 plants-m2.paddock.manager
      Soil: Latitude=0; Longitude=0
        Physical: same as expt3 irrigated, s1 emerald - mungbean  40 plants-m2.paddock.soil.Physical
        WaterBalance SoilWater: same as expt3 irrigated, s1 emerald - mungbean  40 plants-m2.paddock.soil.SoilWater
        SoilNitrogen: same as expt3 irrigated, s1 emerald - mungbean  40 plants-m2.paddock.soil.SoilNitrogen
        CERESSoilTemperature Temperature
        Organic: same as expt3 irrigated, s1 emerald - mungbean  40 plants-m2.paddock.soil.Organic
        Chemical
          Thickness  NO3N  NH4N  PH
          200        1.7   1     7.5
          200        0.61  1     8
          200        0.37  1     8
          200        0.37  1     8
          200        0.46  1     8
          200        0.42  1     8
          200        0.32  1     8
          200        0.49  1     8
        Sample Initial water: same as expt3 rainout shelter, s1 emerald - mungbean  40 plants-m2.paddock.soil.Initial water
      SurfaceOrganicMatter: InitialResidueName=wheat; InitialResidueType=wheat; InitialResidueMass=500; InitialStandingFraction=0; InitialCPR=0; InitialCNR=40
      Plant mungbean: ResourceName=Mungbean
      MicroClimate: a_interception=0; b_interception=1; c_interception=0; d_interception=0; soil_albedo=0.3; SoilHeatFluxFraction=0; MinimumHeightDiffForNewLayer=0; NightInterceptionFraction=0; ReferenceHeight=0
    SoilArbitrator
  Simulation expt3, rainout shelter, s2 emerald - mungbean  40 plants-m21
    Clock: Start=1997-12-04; End=1998-04-30
    Summary summaryfile
    Weather: FileName=Gat34rs.met
    Zone paddock: Area=1; Slope=0; AspectAngle=0; Altitude=50
      Report: same as expt3 irrigated, s1 emerald - mungbean  40 plants-m2.paddock.report
      Operations
        1998-01-20  // soilwat2 set sw = 0.296 0.364 0.357 0.351 0.318 0.306 0.296 0.316
        1997-12-18  // mungbean sow plants = 40.0,crop_class = plant, row_spacing = 400, sowing_depth = 50, cultivar = emerald_sf
        1997-12-18  // irrigate apply amount = 66.0
        1997-12-23  // irrigate apply amount = 20.0
        1997-12-26  // irrigate apply amount = 13.0
        1998-01-02  // irrigate apply amount = 6.6
        1998-01-06  // irrigate apply amount = 26.0
        1998-01-13  // irrigate apply amount = 13.0
        1998-01-19  // irrigate apply amount = 20.0
        1998-02-18  // irrigate apply amount = 16.0
        1998-02-19  // irrigate apply amount = 59.0
        1998-02-20  // irrigate apply amount = 25.0
        1998-02-24  // irrigate apply amount = 33.0
        1998-03-06  // irrigate apply amount = 33.0
        1998-03-11  // irrigate apply amount = 33.0
        1998-03-19  // irrigate apply amount = 33.0
      Fertiliser
      Irrigation
      Manager: same as expt3 irrigated, s1 emerald - mungbean  40 plants-m2.paddock.manager
      Soil: same as expt3, rainout shelter, s2 emerald - mungbean  40 plants-m2.paddock.soil
      SurfaceOrganicMatter: InitialResidueName=wheat; InitialResidueType=wheat; InitialResidueMass=500; InitialStandingFraction=0; InitialCPR=0; InitialCNR=40
      Plant mungbean: ResourceName=Mungbean
      MicroClimate: a_interception=0; b_interception=1; c_interception=0; d_interception=0; soil_albedo=0.3; SoilHeatFluxFraction=0; MinimumHeightDiffForNewLayer=0; NightInterceptionFraction=0; ReferenceHeight=0
    SoilArbitrator
  Simulation expt3 rainout shelter, s3 emerald - mungbean  40 plants-m2
    Clock: Start=1997-12-04; End=1998-05-20
    Summary summaryfile
    Weather: FileName=Gat34rs.met
    Zone paddock: Area=1; Slope=0; AspectAngle=0; Altitude=50
      Report: same as expt3 irrigated, s1 emerald - mungbean  40 plants-m2.paddock.report
      Operations
        1998-01-20  // soilwat2 set sw = 0.285 0.402 0.346 0.301 0.315 0.299 0.303 0.322
        1997-12-31  // mungbean sow plants = 40.0,crop_class = plant, row_spacing = 400, sowing_depth = 50, cultivar = emerald
        1997-12-31  // irrigate apply amount = 17.0
        1998-01-01  // irrigate apply amount = 33.0
        1998-01-02  // irrigate apply amount = 30.0
        1998-01-06  // irrigate apply amount = 26.0
        1998-01-13  // irrigate apply amount = 13.0
        1998-01-19  // irrigate apply amount = 20.0
        1998-02-18  // irrigate apply amount = 16.0
        1998-02-19  // irrigate apply amount = 59.0
        1998-02-20  // irrigate apply amount = 25.0
        1998-02-24  // irrigate apply amount = 33.0
        1998-03-06  // irrigate apply amount = 33.0
        1998-03-11  // irrigate apply amount = 33.0
        1998-03-19  // irrigate apply amount = 33.0
      Fertiliser
      Irrigation
      Manager: same as expt3 irrigated, s1 emerald - mungbean  40 plants-m2.paddock.manager
      Soil: Latitude=0; Longitude=0
        Physical: same as expt3 irrigated, s1 emerald - mungbean  40 plants-m2.paddock.soil.Physical
        WaterBalance SoilWater: same as expt3 irrigated, s1 emerald - mungbean  40 plants-m2.paddock.soil.SoilWater
        SoilNitrogen: same as expt3 irrigated, s1 emerald - mungbean  40 plants-m2.paddock.soil.SoilNitrogen
        CERESSoilTemperature Temperature
        Organic: same as expt3 irrigated, s1 emerald - mungbean  40 plants-m2.paddock.soil.Organic
        Chemical
          Thickness  NO3N  NH4N  PH
          200        2.86  1     7.5
          200        1.28  1     8
          200        0.74  1     8
          200        0.71  1     8
          200        0.48  1     8
          200        0.37  1     8
          200        0.35  1     8
          200        0.43  1     8
        Sample Initial water: same as expt3 rainout shelter, s1 emerald - mungbean  40 plants-m2.paddock.soil.Initial water
      SurfaceOrganicMatter: InitialResidueName=wheat; InitialResidueType=wheat; InitialResidueMass=500; InitialStandingFraction=0; InitialCPR=0; InitialCNR=40
      Plant mungbean: ResourceName=Mungbean
      MicroClimate: a_interception=0; b_interception=1; c_interception=0; d_interception=0; soil_albedo=0.3; SoilHeatFluxFraction=0; MinimumHeightDiffForNewLayer=0; NightInterceptionFraction=0; ReferenceHeight=0
    SoilArbitrator
  Simulation expt3 rainout shelter, s3 emerald - mungbean  40 plants-m21
    Clock: Start=1997-12-04; End=1998-05-20
    Summary summaryfile
    Weather: FileName=Gat34rs.met
    Zone paddock: Area=1; Slope=0; AspectAngle=0; Altitude=50
      Report: same as expt3 irrigated, s1 emerald - mungbean  40 plants-m2.paddock.report
      Operations
        1998-01-20  // soilwat2 set sw = 0.285 0.402 0.346 0.301 0.315 0.299 0.303 0.322
        1997-12-31  // mungbean sow plants = 40.0,crop_class = plant, row_spacing = 400, sowing_depth = 50, cultivar = emerald_sf
        1997-12-31  // irrigate apply amount = 17.0
        1998-01-01  // irrigate apply amount = 33.0
        1998-01-02  // irrigate apply amount = 30.0
        1998-01-06  // irrigate apply amount = 26.0
        1998-01-13  // irrigate apply amount = 13.0
        1998-01-19  // irrigate apply amount = 20.0
        1998-02-18  // irrigate apply amount = 16.0
        1998-02-19  // irrigate apply amount = 59.0
        1998-02-20  // irrigate apply amount = 25.0
        1998-02-24  // irrigate apply amount = 33.0
        1998-03-06  // irrigate apply amount = 33.0
        1998-03-11  // irrigate apply amount = 33.0
        1998-03-19  // irrigate apply amount = 33.0
      Fertiliser
      Irrigation
      Manager: same as expt3 irrigated, s1 emerald - mungbean  40 plants-m2.paddock.manager
      Soil: same as expt3 rainout shelter, s3 emerald - mungbean  40 plants-m2.paddock.soil
      SurfaceOrganicMatter: InitialResidueName=wheat; InitialResidueType=wheat; InitialResidueMass=500; InitialStandingFraction=0; InitialCPR=0; InitialCNR=40
      Plant mungbean: ResourceName=Mungbean
      MicroClimate: a_interception=0; b_interception=1; c_interception=0; d_interception=0; soil_albedo=0.3; SoilHeatFluxFraction=0; MinimumHeightDiffForNewLayer=0; NightInterceptionFraction=0; ReferenceHeight=0
    SoilArbitrator
  DataStore
