Simulations: Version=126
  Simulation aps18 - berkin weathering -  planting 1
    Clock: Start=1993-10-27; End=1994-05-30
    Summary summaryfile
    Weather: FileName=aps18.met
    Zone paddock: Area=1; Slope=0; AspectAngle=0; Altitude=50
      Report
        VariableNames:
          [Clock].Today
          [mungbean].AboveGround
          [mungbean].AboveGroundHarvestable
      Operations
        1993-11-18  // soilwat2 set sw = 0.255 0.322 0.321 0.321 0.243 0.211 0.170 0.170
        1993-11-04  // mungbean sow plants = 38.2,crop_class = plant, row_spacing = 500, sowing_depth = 50, cultivar = berken
        1993-10-27  // irrigate apply amount = 42.0
        1993-11-10  // irrigate apply amount = 15.0
        1993-11-22  // irrigate apply amount = 28.0
        1993-12-01  // irrigate apply amount = 14.0
        1993-12-15  // irrigate apply amount = 14.0
        1993-12-23  // irrigate apply amount = 14.0
        1993-12-29  // irrigate apply amount = 21.0
        1994-01-04  // irrigate apply amount = 18.0
      Fertiliser
      Irrigation
      Manager
```csharp
using Models.PMF;
using Models.Core;
using System;
namespace Models
{
    [Serializable]
    [System.Xml.Serialization.XmlInclude(typeof(Model))]
    public class Script : Model
    {
        [Link] Clock Clock;

        [EventSubscribe("StartOfSimulation")]
        private void OnSimulationCommencing(object sender, EventArgs e)
        {
            /*
                
                 dateset = 0
                 emer_date = 0
                 endjuv_date = 0
                 anth_date = 0
                 mat_date = 0
            
            */
        }
        [EventSubscribe("DoCalculations")]
        private void OnDoCalculations(object sender, EventArgs e)
        {
            /*
                
                 if mungbean.stage = 3 and dateset = 0 then
                    emer_date = daysaftersowing
                    dateset = 1
                 endif
                 if mungbean.stage = 4 and dateset = 1 then
                    endjuv_date = daysaftersowing
                    dateset = 2
                 endif
                 if mungbean.stage = 6 and dateset = 2 then
                    anth_date = daysaftersowing
                    dateset = 3
                 endif
                 if mungbean.stage = 9 and dateset = 3 then
                    mat_date = daysaftersowing
                    dateset = 4
                 endif
            if (mungbean.stagename = 'maturity' or mungbean.plant_status = 'dead') then
               report do_output
               mungbean harvest 
               mungbean kill_crop 
               mungbean end_crop
               dateset = 0
            endif
            
            */
        }
    }
}
```
      Soil: Latitude=0; Longitude=0
        InitialWater Initial water: PercentMethod=1; FractionFull=1
        Physical
          Thickness  BD    AirDry  LL15  DUL    SAT
          150        1.38  0.05    0.18  0.38   0.43
          150        1.34  0.19    0.19  0.38   0.43
          150        1.31  0.22    0.22  0.395  0.45
          150        1.4   0.19    0.19  0.41   0.45
          300        1.45  0.22    0.22  0.4    0.45
          300        1.46  0.19    0.19  0.39   0.44
          300        1.46  0.17    0.17  0.38   0.4
          300        1.46  0.17    0.17  0.38   0.4
          SoilCrop MungbeanSoil: LL=[0.2, 0.201, 0.237, 0.192, 0.22, 0.191, 0.249, 0.249]; KL=[0.08, 0.08, 0.08, 0.08, 0.06, 0.04, 0.02, 0.01]; XF=[1, 1, 1, 1, 1, 1, 1, 1]
        WaterBalance SoilWater: SummerDate=1-Nov; SummerU=6; SummerCona=3.5; WinterDate=1-Apr; WinterU=6; WinterCona=3.5; DiffusConst=88; DiffusSlope=35.4; Salb=0.13; CN2Bare=72; CNRed=20; CNCov=0.8; Thickness=[150, 150, 150, 150, 300, 300, 300, 300]; SWCON=[0.4, 0.4, 0.4, 0.4, 0.4, 0.4, 0.4, 0.4]
        SoilNitrogen: fom_types=[default, manure, mucuna, lablab, shemp, stable]; fract_carb=[0.2, 0.3, 0.54, 0.57, 0.45, 0]; fract_cell=[0.7, 0.3, 0.37, 0.37, 0.47, 0.1]; fract_lign=[0.1, 0.4, 0.09, 0.06, 0.08, 0.9]; NPartitionApproach=0
          SoilNitrogenNO3 NO3
          SoilNitrogenNH4 NH4
          SoilNitrogenUrea Urea
          SoilNitrogenPlantAvailableNO3 PlantAvailableNO3
          SoilNitrogenPlantAvailableNH4 PlantAvailableNH4
        CERESSoilTemperature Temperature
        Organic: FOMCNRatio=33
          Thickness  Carbon  SoilCNRatio  FBiom  FInert  FOM
          150        2.2     14.5         0.02   0.36    0
          150        1.6     14.5         0.015  0.5     0
          150        1.35    14.5         0.01   0.59    0
          150        0.95    14.5         0.01   0.84    0
          300        1       14.5         0.01   0.8     0
          300        0.8     14.5         0.01   0.99    0
          300        0.45    14.5         0.01   0.99    0
          300        0.45    14.5         0.01   0.99    0
        Chemical
          Thickness  NO3N  NH4N  PH
          150        2     1     7.5
          150        2     1     8
          150        2     1     8
          150        2     1     8
          300        2     1     8
          300        2     1     8
          300        2     1     8
          300        2     1     8
      SurfaceOrganicMatter: InitialResidueName=wheat; InitialResidueType=wheat; InitialResidueMass=500; InitialStandingFraction=0; InitialCPR=0; InitialCNR=40
      Plant mungbean: ResourceName=Mungbean
      MicroClimate: a_interception=0; b_interception=1; c_interception=0; d_interception=0; soil_albedo=0.3; SoilHeatFluxFraction=0; MinimumHeightDiffForNewLayer=0; NightInterceptionFraction=0; ReferenceHeight=0
    SoilArbitrator
  Simulation aps18 - king weathering -  planting 1
    Clock: Start=1993-10-27; End=1994-05-30
    Summary summaryfile
    Weather: FileName=aps18.met
    Zone paddock: Area=1; Slope=0; AspectAngle=0; Altitude=50
      Report
      Operations
        1993-11-18  // soilwat2 set sw = 0.255 0.322 0.321 0.321 0.243 0.211 0.170 0.170
        1993-11-04  // mungbean sow plants = 26.0,crop_class = plant, row_spacing = 500, sowing_depth = 50, cultivar = king
        1993-10-27  // irrigate apply amount = 42.0
        1993-11-10  // irrigate apply amount = 15.0
        1993-11-22  // irrigate apply amount = 28.0
        1993-12-01  // irrigate apply amount = 14.0
        1993-12-15  // irrigate apply amount = 14.0
        1993-12-23  // irrigate apply amount = 14.0
        1993-12-29  // irrigate apply amount = 21.0
        1994-01-04  // irrigate apply amount = 18.0
      Fertiliser
      Irrigation
      Manager: same as aps18 - berkin weathering -  planting 1.paddock.manager
      Soil: Latitude=0; Longitude=0
        InitialWater Initial water: PercentMethod=1; FractionFull=1
        Physical: same as aps18 - berkin weathering -  planting 1.paddock.soil.Physical
        WaterBalance SoilWater: SummerDate=1-Nov; SummerU=6; SummerCona=3.5; WinterDate=1-Apr; WinterU=6; WinterCona=3.5; DiffusConst=88; DiffusSlope=35.4; Salb=0.13; CN2Bare=72; CNRed=20; CNCov=0.8; DischargeWidth=5; CatchmentArea=10; Thickness=[150, 150, 150, 150, 300, 300, 300, 300]; SWCON=[0.4, 0.4, 0.4, 0.4, 0.4, 0.4, 0.4, 0.4]
        SoilNitrogen: same as aps18 - berkin weathering -  planting 1.paddock.soil.SoilNitrogen
        CERESSoilTemperature Temperature
        Organic: same as aps18 - berkin weathering -  planting 1.paddock.soil.Organic
        Chemical: same as aps18 - berkin weathering -  planting 1.paddock.soil.Chemical
      SurfaceOrganicMatter: InitialResidueName=wheat; InitialResidueType=wheat; InitialResidueMass=500; InitialStandingFraction=0; InitialCPR=0; InitialCNR=40
      Plant mungbean: ResourceName=Mungbean
      MicroClimate: a_interception=0; b_interception=1; c_interception=0; d_interception=0; soil_albedo=0.3; SoilHeatFluxFraction=0; MinimumHeightDiffForNewLayer=0; NightInterceptionFraction=0; ReferenceHeight=0
    SoilArbitrator
  Simulation aps18 - berkin weathering -  planting 2
    Clock: Start=1993-10-27; End=1994-05-30
    Summary summaryfile
    Weather: FileName=aps18.met
    Zone paddock: Area=1; Slope=0; AspectAngle=0; Altitude=50
      Report
      Operations
        1993-11-18  // soilwat2 set sw = 0.273 0.332 0.372 0.372 0.340 0.359 0.170 0.170
        1993-11-18  // mungbean sow plants = 43.2,crop_class = plant, row_spacing = 500, sowing_depth = 50, cultivar = berken
        1993-10-27  // irrigate apply amount = 42.0
        1993-11-10  // irrigate apply amount = 15.0
        1993-11-22  // irrigate apply amount = 28.0
        1993-12-01  // irrigate apply amount = 14.0
        1993-12-15  // irrigate apply amount = 14.0
        1993-12-23  // irrigate apply amount = 14.0
        1993-12-29  // irrigate apply amount = 21.0
        1994-01-04  // irrigate apply amount = 18.0
      Fertiliser
      Irrigation
      Manager: same as aps18 - berkin weathering -  planting 1.paddock.manager
      Soil: same as aps18 - king weathering -  planting 1.paddock.soil
      SurfaceOrganicMatter: InitialResidueName=wheat; InitialResidueType=wheat; InitialResidueMass=500; InitialStandingFraction=0; InitialCPR=0; InitialCNR=40
      Plant mungbean: ResourceName=Mungbean
      MicroClimate: a_interception=0; b_interception=1; c_interception=0; d_interception=0; soil_albedo=0.3; SoilHeatFluxFraction=0; MinimumHeightDiffForNewLayer=0; NightInterceptionFraction=0; ReferenceHeight=0
    SoilArbitrator
  Simulation aps18 - king weathering -  planting 2
    Clock: Start=1993-10-27; End=1994-05-30
    Summary summaryfile
    Weather: FileName=aps18.met
    Zone paddock: Area=1; Slope=0; AspectAngle=0; Altitude=50
      Report
      Operations
        1993-11-18  // soilwat2 set sw = 0.273 0.332 0.372 0.372 0.340 0.359 0.170 0.170
        1993-11-18  // mungbean sow plants = 12.7,crop_class = plant, row_spacing = 500, sowing_depth = 50, cultivar = king
        1993-10-27  // irrigate apply amount = 42.0
        1993-11-10  // irrigate apply amount = 15.0
        1993-11-22  // irrigate apply amount = 28.0
        1993-12-01  // irrigate apply amount = 14.0
        1993-12-15  // irrigate apply amount = 14.0
        1993-12-23  // irrigate apply amount = 14.0
        1993-12-29  // irrigate apply amount = 21.0
        1994-01-04  // irrigate apply amount = 18.0
      Fertiliser
      Irrigation
      Manager: same as aps18 - berkin weathering -  planting 1.paddock.manager
      Soil: same as aps18 - king weathering -  planting 1.paddock.soil
      SurfaceOrganicMatter: InitialResidueName=wheat; InitialResidueType=wheat; InitialResidueMass=500; InitialStandingFraction=0; InitialCPR=0; InitialCNR=40
      Plant mungbean: ResourceName=Mungbean
      MicroClimate: a_interception=0; b_interception=1; c_interception=0; d_interception=0; soil_albedo=0.3; SoilHeatFluxFraction=0; MinimumHeightDiffForNewLayer=0; NightInterceptionFraction=0; ReferenceHeight=0
    SoilArbitrator
  Simulation aps18 - berkin weathering -  planting 3
    Clock: Start=1993-10-27; End=1994-05-30
    Summary summaryfile
    Weather: FileName=aps18.met
    Zone paddock: Area=1; Slope=0; AspectAngle=0; Altitude=50
      Report
      Operations
        1993-11-18  // soilwat2 set sw = 0.273 0.332 0.372 0.372 0.340 0.359 0.170 0.170
        1993-12-14  // mungbean sow plants = 39.6,crop_class = plant, row_spacing = 500, sowing_depth = 50, cultivar = berken
        1993-10-27  // irrigate apply amount = 42.0
        1993-11-10  // irrigate apply amount = 15.0
        1993-11-22  // irrigate apply amount = 28.0
        1993-12-01  // irrigate apply amount = 14.0
        1993-12-15  // irrigate apply amount = 14.0
        1993-12-23  // irrigate apply amount = 14.0
        1993-12-29  // irrigate apply amount = 21.0
        1994-01-04  // irrigate apply amount = 18.0
      Fertiliser
      Irrigation
      Manager: same as aps18 - berkin weathering -  planting 1.paddock.manager
      Soil: same as aps18 - king weathering -  planting 1.paddock.soil
      SurfaceOrganicMatter: InitialResidueName=wheat; InitialResidueType=wheat; InitialResidueMass=500; InitialStandingFraction=0; InitialCPR=0; InitialCNR=40
      Plant mungbean: ResourceName=Mungbean
      MicroClimate: a_interception=0; b_interception=1; c_interception=0; d_interception=0; soil_albedo=0.3; SoilHeatFluxFraction=0; MinimumHeightDiffForNewLayer=0; NightInterceptionFraction=0; ReferenceHeight=0
    SoilArbitrator
  Simulation aps18 - king weathering -  planting 3
    Clock: Start=1993-10-27; End=1994-05-30
    Summary summaryfile
    Weather: FileName=aps18.met
    Zone paddock: Area=1; Slope=0; AspectAngle=0; Altitude=50
      Report
      Operations
        1993-11-18  // soilwat2 set sw = 0.273 0.332 0.372 0.372 0.340 0.359 0.170 0.170
        1993-12-14  // mungbean sow plants = 38.7,crop_class = plant, row_spacing = 500, sowing_depth = 50, cultivar = king
        1993-10-27  // irrigate apply amount = 42.0
        1993-11-10  // irrigate apply amount = 15.0
        1993-11-22  // irrigate apply amount = 28.0
        1993-12-01  // irrigate apply amount = 14.0
        1993-12-15  // irrigate apply amount = 14.0
        1993-12-23  // irrigate apply amount = 14.0
        1993-12-29  // irrigate apply amount = 21.0
        1994-01-04  // irrigate apply amount = 18.0
      Fertiliser
      Irrigation
      Manager: same as aps18 - berkin weathering -  planting 1.paddock.manager
      Soil: same as aps18 - king weathering -  planting 1.paddock.soil
      SurfaceOrganicMatter: InitialResidueName=wheat; InitialResidueType=wheat; InitialResidueMass=500; InitialStandingFraction=0; InitialCPR=0; InitialCNR=40
      Plant mungbean: ResourceName=Mungbean
      MicroClimate: a_interception=0; b_interception=1; c_interception=0; d_interception=0; soil_albedo=0.3; SoilHeatFluxFraction=0; MinimumHeightDiffForNewLayer=0; NightInterceptionFraction=0; ReferenceHeight=0
    SoilArbitrator
  Simulation aps18 - berkin weathering -  planting 4
    Clock: Start=1993-10-27; End=1994-05-30
    Summary summaryfile
    Weather: FileName=aps18.met
    Zone paddock: Area=1; Slope=0; AspectAngle=0; Altitude=50
      Report
      Operations
        1993-11-18  // soilwat2 set sw = 0.273 0.332 0.372 0.372 0.340 0.359 0.170 0.170
        1994-01-04  // mungbean sow plants = 39.6,crop_class = plant, row_spacing = 500, sowing_depth = 50, cultivar = berken
        1993-10-27  // irrigate apply amount = 42.0
        1993-11-10  // irrigate apply amount = 15.0
        1993-11-22  // irrigate apply amount = 28.0
        1993-12-01  // irrigate apply amount = 14.0
        1993-12-15  // irrigate apply amount = 14.0
        1993-12-23  // irrigate apply amount = 14.0
        1993-12-29  // irrigate apply amount = 21.0
        1994-01-04  // irrigate apply amount = 18.0
      Fertiliser
      Irrigation
      Manager: same as aps18 - berkin weathering -  planting 1.paddock.manager
      Soil: same as aps18 - king weathering -  planting 1.paddock.soil
      SurfaceOrganicMatter: InitialResidueName=wheat; InitialResidueType=wheat; InitialResidueMass=500; InitialStandingFraction=0; InitialCPR=0; InitialCNR=40
      Plant mungbean: ResourceName=Mungbean
      MicroClimate: a_interception=0; b_interception=1; c_interception=0; d_interception=0; soil_albedo=0.3; SoilHeatFluxFraction=0; MinimumHeightDiffForNewLayer=0; NightInterceptionFraction=0; ReferenceHeight=0
    SoilArbitrator
  Simulation aps18 - king weathering -  planting 4
    Clock: Start=1993-10-27; End=1994-05-30
    Summary summaryfile
    Weather: FileName=aps18.met
    Zone paddock: Area=1; Slope=0; AspectAngle=0; Altitude=50
      Report
      Operations
        1993-11-18  // soilwat2 set sw = 0.273 0.332 0.372 0.372 0.340 0.359 0.170 0.170
        1994-01-04  // mungbean sow plants = 28.6,crop_class = plant, row_spacing = 500, sowing_depth = 50, cultivar = king
        1993-10-27  // irrigate apply amount = 42.0
        1993-11-10  // irrigate apply amount = 15.0
        1993-11-22  // irrigate apply amount = 28.0
        1993-12-01  // irrigate apply amount = 14.0
        1993-12-15  // irrigate apply amount = 14.0
        1993-12-23  // irrigate apply amount = 14.0
        1993-12-29  // irrigate apply amount = 21.0
        1994-01-04  // irrigate apply amount = 18.0
      Fertiliser
      Irrigation
      Manager: same as aps18 - berkin weathering -  planting 1.paddock.manager
      Soil: same as aps18 - king weathering -  planting 1.paddock.soil
      SurfaceOrganicMatter: InitialResidueName=wheat; InitialResidueType=wheat; InitialResidueMass=500; InitialStandingFraction=0; InitialCPR=0; InitialCNR=40
      Plant mungbean: ResourceName=Mungbean
      MicroClimate: a_interception=0; b_interception=1; c_interception=0; d_interception=0; soil_albedo=0.3; SoilHeatFluxFraction=0; MinimumHeightDiffForNewLayer=0; NightInterceptionFraction=0; ReferenceHeight=0
    SoilArbitrator
  Simulation aps18 - berkin weathering -  planting 5
    Clock: Start=1993-10-27; End=1994-05-30
    Summary summaryfile
    Weather: FileName=aps18.met
    Zone paddock: Area=1; Slope=0; AspectAngle=0; Altitude=50
      Report
      Operations
        1993-11-18  // soilwat2 set sw = 0.273 0.332 0.372 0.372 0.340 0.359 0.170 0.170
        1994-01-17  // mungbean sow plants = 35.4,crop_class = plant, row_spacing = 500, sowing_depth = 50, cultivar = berken
        1993-10-27  // irrigate apply amount = 42.0
        1993-11-10  // irrigate apply amount = 15.0
        1993-11-22  // irrigate apply amount = 28.0
        1993-12-01  // irrigate apply amount = 14.0
        1993-12-15  // irrigate apply amount = 14.0
        1993-12-23  // irrigate apply amount = 14.0
        1993-12-29  // irrigate apply amount = 21.0
        1994-01-04  // irrigate apply amount = 18.0
      Fertiliser
      Irrigation
      Manager: same as aps18 - berkin weathering -  planting 1.paddock.manager
      Soil: same as aps18 - king weathering -  planting 1.paddock.soil
      SurfaceOrganicMatter: InitialResidueName=wheat; InitialResidueType=wheat; InitialResidueMass=500; InitialStandingFraction=0; InitialCPR=0; InitialCNR=40
      Plant mungbean: ResourceName=Mungbean
      MicroClimate: a_interception=0; b_interception=1; c_interception=0; d_interception=0; soil_albedo=0.3; SoilHeatFluxFraction=0; MinimumHeightDiffForNewLayer=0; NightInterceptionFraction=0; ReferenceHeight=0
    SoilArbitrator
  Simulation aps18 - king weathering -  planting 5
    Clock: Start=1993-10-27; End=1994-05-30
    Summary summaryfile
    Weather: FileName=aps18.met
    Zone paddock: Area=1; Slope=0; AspectAngle=0; Altitude=50
      Report
      Operations
        1993-11-18  // soilwat2 set sw = 0.273 0.332 0.372 0.372 0.340 0.359 0.170 0.170
        1994-01-17  // mungbean sow plants = 27.6,crop_class = plant, row_spacing = 500, sowing_depth = 50, cultivar = king
        1993-10-27  // irrigate apply amount = 42.0
        1993-11-10  // irrigate apply amount = 15.0
        1993-11-22  // irrigate apply amount = 28.0
        1993-12-01  // irrigate apply amount = 14.0
        1993-12-15  // irrigate apply amount = 14.0
        1993-12-23  // irrigate apply amount = 14.0
        1993-12-29  // irrigate apply amount = 21.0
        1994-01-04  // irrigate apply amount = 18.0
      Fertiliser
      Irrigation
      Manager: same as aps18 - berkin weathering -  planting 1.paddock.manager
      Soil: same as aps18 - king weathering -  planting 1.paddock.soil
      SurfaceOrganicMatter: InitialResidueName=wheat; InitialResidueType=wheat; InitialResidueMass=500; InitialStandingFraction=0; InitialCPR=0; InitialCNR=40
      Plant mungbean: ResourceName=Mungbean
      MicroClimate: a_interception=0; b_interception=1; c_interception=0; d_interception=0; soil_albedo=0.3; SoilHeatFluxFraction=0; MinimumHeightDiffForNewLayer=0; NightInterceptionFraction=0; ReferenceHeight=0
    SoilArbitrator
  Simulation aps18 - berkin weathering -  planting 6
    Clock: Start=1993-10-27; End=1994-05-30
    Summary summaryfile
    Weather: FileName=aps18.met
    Zone paddock: Area=1; Slope=0; AspectAngle=0; Altitude=50
      Report
      Operations
        1993-11-18  // soilwat2 set sw = 0.273 0.332 0.372 0.372 0.340 0.359 0.170 0.170
        1994-02-01  // mungbean sow plants = 43.8,crop_class = plant, row_spacing = 500, sowing_depth = 50, cultivar = berken
        1993-10-27  // irrigate apply amount = 42.0
        1993-11-10  // irrigate apply amount = 15.0
        1993-11-22  // irrigate apply amount = 28.0
        1993-12-01  // irrigate apply amount = 14.0
        1993-12-15  // irrigate apply amount = 14.0
        1993-12-23  // irrigate apply amount = 14.0
        1993-12-29  // irrigate apply amount = 21.0
        1994-01-04  // irrigate apply amount = 18.0
      Fertiliser
      Irrigation
      Manager: same as aps18 - berkin weathering -  planting 1.paddock.manager
      Soil: same as aps18 - king weathering -  planting 1.paddock.soil
      SurfaceOrganicMatter: InitialResidueName=wheat; InitialResidueType=wheat; InitialResidueMass=500; InitialStandingFraction=0; InitialCPR=0; InitialCNR=40
      Plant mungbean: ResourceName=Mungbean
      MicroClimate: a_interception=0; b_interception=1; c_interception=0; d_interception=0; soil_albedo=0.3; SoilHeatFluxFraction=0; MinimumHeightDiffForNewLayer=0; NightInterceptionFraction=0; ReferenceHeight=0
    SoilArbitrator
  Simulation aps18 - king weathering -  planting 6
    Clock: Start=1993-10-27; End=1994-05-30
    Summary summaryfile
    Weather: FileName=aps18.met
    Zone paddock: Area=1; Slope=0; AspectAngle=0; Altitude=50
      Report
      Operations
        1993-11-18  // soilwat2 set sw = 0.273 0.332 0.372 0.372 0.340 0.359 0.170 0.170
        1994-02-01  // mungbean sow plants = 32.7,crop_class = plant, row_spacing = 500, sowing_depth = 50, cultivar = king
        1993-10-27  // irrigate apply amount = 42.0
        1993-11-10  // irrigate apply amount = 15.0
        1993-11-22  // irrigate apply amount = 28.0
        1993-12-01  // irrigate apply amount = 14.0
        1993-12-15  // irrigate apply amount = 14.0
        1993-12-23  // irrigate apply amount = 14.0
        1993-12-29  // irrigate apply amount = 21.0
        1994-01-04  // irrigate apply amount = 18.0
      Fertiliser
      Irrigation
      Manager: same as aps18 - berkin weathering -  planting 1.paddock.manager
      Soil: same as aps18 - king weathering -  planting 1.paddock.soil
      SurfaceOrganicMatter: InitialResidueName=wheat; InitialResidueType=wheat; InitialResidueMass=500; InitialStandingFraction=0; InitialCPR=0; InitialCNR=40
      Plant mungbean: ResourceName=Mungbean
      MicroClimate: a_interception=0; b_interception=1; c_interception=0; d_interception=0; soil_albedo=0.3; SoilHeatFluxFraction=0; MinimumHeightDiffForNewLayer=0; NightInterceptionFraction=0; ReferenceHeight=0
    SoilArbitrator
  Simulation aps1 - mungbean  36 plants-m2
    Clock: Start=1991-01-25; End=1991-04-20
    Summary summaryfile
    Weather: FileName=GAT9091.met
    Zone paddock: Area=1; Slope=0; AspectAngle=0; Altitude=50
      Report
      Operations
        1991-01-25  // soilwat2 set sw = 0.380 0.380 0.395 0.410 0.400 0.390 0.380 0.380
        1991-02-01  // mungbean sow plants = 36.2,crop_class = plant, row_spacing = 320, sowing_depth = 50, cultivar = berken
        1991-02-01  // irrigate apply amount = 6.0
        1991-02-05  // irrigate apply amount = 10.0
        1991-02-21  // irrigate apply amount = 15.0
        1991-02-26  // irrigate apply amount = 15.0
        1991-03-01  // irrigate apply amount = 20.0
        1991-03-08  // irrigate apply amount = 15.0
        1991-03-12  // irrigate apply amount = 37.0
        1991-03-15  // irrigate apply amount = 18.0
        1991-03-19  // irrigate apply amount = 17.0
        1991-03-21  // irrigate apply amount = 16.0
        1991-03-27  // irrigate apply amount = 35.0
        1991-04-03  // irrigate apply amount = 12.0
        1991-04-07  // irrigate apply amount = 6.0
        1991-04-12  // irrigate apply amount = 16.0
        1991-04-15  // irrigate apply amount = 8.0
        1991-04-19  // irrigate apply amount = 10.0
        1991-04-22  // irrigate apply amount = 5.0
        1991-05-05  // irrigate apply amount = 35.0
        1991-05-15  // irrigate apply amount = 15.0
      Fertiliser
      Irrigation
      Manager: same as aps18 - berkin weathering -  planting 1.paddock.manager
      Soil: same as aps18 - king weathering -  planting 1.paddock.soil
      SurfaceOrganicMatter: InitialResidueName=wheat; InitialResidueType=wheat; InitialResidueMass=500; InitialStandingFraction=0; InitialCPR=0; InitialCNR=40
      Plant mungbean: ResourceName=Mungbean
      MicroClimate: a_interception=0; b_interception=1; c_interception=0; d_interception=0; soil_albedo=0.3; SoilHeatFluxFraction=0; MinimumHeightDiffForNewLayer=0; NightInterceptionFraction=0; ReferenceHeight=0
    SoilArbitrator
  Simulation aps1 - mungbean  36 plants-m21
    Clock: Start=1991-01-25; End=1991-04-20
    Summary summaryfile
    Weather: FileName=GAT9091.met
    Zone paddock: Area=1; Slope=0; AspectAngle=0; Altitude=50
      Report
      Operations
        1991-01-25  // soilwat2 set sw = 0.380 0.380 0.395 0.410 0.400 0.390 0.380 0.380
        1991-02-01  // mungbean sow plants = 10.7,crop_class = plant, row_spacing = 320, sowing_depth = 50, cultivar = berken
        1991-02-01  // irrigate apply amount = 6.0
        1991-02-05  // irrigate apply amount = 10.0
        1991-02-21  // irrigate apply amount = 15.0
        1991-02-26  // irrigate apply amount = 15.0
        1991-03-01  // irrigate apply amount = 20.0
        1991-03-08  // irrigate apply amount = 15.0
        1991-03-12  // irrigate apply amount = 37.0
        1991-03-15  // irrigate apply amount = 18.0
        1991-03-19  // irrigate apply amount = 17.0
        1991-03-21  // irrigate apply amount = 16.0
        1991-03-27  // irrigate apply amount = 35.0
        1991-04-03  // irrigate apply amount = 12.0
        1991-04-07  // irrigate apply amount = 6.0
        1991-04-12  // irrigate apply amount = 16.0
        1991-04-15  // irrigate apply amount = 8.0
        1991-04-19  // irrigate apply amount = 10.0
        1991-04-22  // irrigate apply amount = 5.0
        1991-05-05  // irrigate apply amount = 35.0
        1991-05-15  // irrigate apply amount = 15.0
      Fertiliser
      Irrigation
      Manager: same as aps18 - berkin weathering -  planting 1.paddock.manager
      Soil: same as aps18 - king weathering -  planting 1.paddock.soil
      SurfaceOrganicMatter: InitialResidueName=wheat; InitialResidueType=wheat; InitialResidueMass=500; InitialStandingFraction=0; InitialCPR=0; InitialCNR=40
      Plant mungbean: ResourceName=Mungbean
      MicroClimate: a_interception=0; b_interception=1; c_interception=0; d_interception=0; soil_albedo=0.3; SoilHeatFluxFraction=0; MinimumHeightDiffForNewLayer=0; NightInterceptionFraction=0; ReferenceHeight=0
    SoilArbitrator
  Simulation aps20 - mungbean  emerald f1
    Clock: Start=1993-12-16; End=1994-03-21
    Summary summaryfile
    Weather: FileName=mans9394.met
    Zone paddock: Area=1; Slope=0; AspectAngle=0; Altitude=50
      Report
      Operations
        1993-12-17  // soilwat2 set sw = 0.400 0.400 0.400 0.400 0.265 0.368 0.368
        1993-12-17  // soiln2 set no3= 18.5 11.5 21.4 18.4 6.7 1.0 1.0
        1993-12-17  // mungbean sow plants = 30.8, sowing_depth = 40, cultivar = emerald,crop_class = plant, row_spacing = 230
      Fertiliser
      Irrigation
      Manager: same as aps18 - berkin weathering -  planting 1.paddock.manager
      Soil: Latitude=0; Longitude=0
        InitialWater Initial water: PercentMethod=1; FractionFull=1
        Physical
          Thickness  BD    AirDry  LL15   DUL    SAT
          150        1.39  0.1     0.182  0.428  0.47
          150        1.41  0.24    0.24   0.427  0.467
          300        1.42  0.3     0.3    0.424  0.46
          300        1.46  0.297   0.297  0.439  0.449
          300        1.45  0.265   0.265  0.437  0.452
          300        1.5   0.368   0.368  0.428  0.433
          300        1.49  0.368   0.368  0.402  0.43
          SoilCrop MungbeanSoil: LL=[0.272, 0.311, 0.315, 0.297, 0.345, 0.41, 0.39]; KL=[0.12, 0.12, 0.12, 0.09, 0.06, 0.05, 0.01]; XF=[1, 1, 1, 1, 1, 1, 1]
        WaterBalance SoilWater: SummerDate=1-Nov; SummerU=6; SummerCona=3.5; WinterDate=1-Apr; WinterU=6; WinterCona=3.5; DiffusConst=40; DiffusSlope=16; Salb=0.13; CN2Bare=75; CNRed=20; CNCov=0.8; DischargeWidth=5; CatchmentArea=10; Thickness=[150, 150, 300, 300, 300, 300, 300]; SWCON=[0.1, 0.1, 0.1, 0.1, 0.1, 0.1, 0.1]
        SoilNitrogen: same as aps18 - berkin weathering -  planting 1.paddock.soil.SoilNitrogen
        CERESSoilTemperature Temperature
        Organic: FOMCNRatio=33
          Thickness  Carbon  SoilCNRatio  FBiom  FInert  FOM
          150        0.8     14.5         0.05   0.39    0
          150        0.6     14.5         0.02   0.47    0
          300        0.5     14.5         0.015  0.52    0
          300        0.3     14.5         0.01   0.62    0
          300        0.2     14.5         0.01   0.74    0
          300        0.2     14.5         0.01   0.83    0
          300        0.1     14.5         0.01   0.93    0
        Chemical
          Thickness  NO3N  NH4N  PH
          150        2     1     8.9
          150        2     1     8.9
          300        2     1     9
          300        2     1     9
          300        2     1     9
          300        2     1     9
          300        2     1     9
      SurfaceOrganicMatter: InitialResidueName=wheat; InitialResidueType=wheat; InitialResidueMass=500; InitialStandingFraction=0; InitialCPR=0; InitialCNR=40
      Plant mungbean: ResourceName=Mungbean
      MicroClimate: a_interception=0; b_interception=1; c_interception=0; d_interception=0; soil_albedo=0.3; SoilHeatFluxFraction=0; MinimumHeightDiffForNewLayer=0; NightInterceptionFraction=0; ReferenceHeight=0
    SoilArbitrator
  Simulation aps20 - mungbean  shangtung f2
    Clock: Start=1993-12-16; End=1994-03-31
    Summary summaryfile
    Weather: FileName=muir9394.met
    Zone paddock: Area=1; Slope=0; AspectAngle=0; Altitude=50
      Report
      Operations
        1993-12-27  // soilwat2 set sw = 0.420 0.420 0.420 0.299 0.305 0.368 0.368
        1993-12-27  // soiln2 set no3= 10.1 18.7 55.8 17.5 8.4 1.0 1.0
        1993-12-27  // mungbean sow plants = 16.3, sowing_depth = 40, cultivar = shangtung,crop_class = plant, row_spacing = 450
      Fertiliser
      Irrigation
      Manager: same as aps18 - berkin weathering -  planting 1.paddock.manager
      Soil: same as aps20 - mungbean  emerald f1.paddock.soil
      SurfaceOrganicMatter: InitialResidueName=wheat; InitialResidueType=wheat; InitialResidueMass=500; InitialStandingFraction=0; InitialCPR=0; InitialCNR=40
      Plant mungbean: ResourceName=Mungbean
      MicroClimate: a_interception=0; b_interception=1; c_interception=0; d_interception=0; soil_albedo=0.3; SoilHeatFluxFraction=0; MinimumHeightDiffForNewLayer=0; NightInterceptionFraction=0; ReferenceHeight=0
    SoilArbitrator
  Simulation aps20 - mungbean   celera f3
    Clock: Start=1993-12-16; End=1994-04-30
    Summary summaryfile
    Weather: FileName=ande9394.met
    Zone paddock: Area=1; Slope=0; AspectAngle=0; Altitude=50
      Report
      Operations
        1993-12-17  // soilwat2 set sw = 0.309 0.333 0.276 0.287 0.325 0.400 0.420
        1993-12-17  // soiln2 set no3= 11.0 3.4 2.6 2.6 3.2 1.0 1.0
        1993-12-17  // mungbean sow plants = 29.0, sowing_depth = 40, cultivar = celera,crop_class = plant, row_spacing = 350
      Fertiliser
      Irrigation
      Manager: same as aps18 - berkin weathering -  planting 1.paddock.manager
      Soil: Latitude=0; Longitude=0
        InitialWater Initial water: PercentMethod=1; FractionFull=1
        Physical
          Thickness  BD    AirDry  LL15   DUL    SAT
          150        1.44  0.1     0.217  0.401  0.45
          150        1.3   0.233   0.245  0.424  0.484
          300        1.36  0.23    0.23   0.426  0.465
          300        1.47  0.287   0.287  0.437  0.445
          300        1.52  0.28    0.29   0.42   0.426
          300        1.52  0.28    0.3    0.42   0.426
          300        1.53  0.28    0.35   0.42   0.422
          SoilCrop MungbeanSoil: LL=[0.235, 0.233, 0.262, 0.3, 0.341, 0.4, 0.419]; KL=[0.08, 0.08, 0.06, 0.06, 0.04, 0.02, 0.01]; XF=[1, 1, 1, 1, 1, 1, 1]
        WaterBalance SoilWater: same as aps20 - mungbean  emerald f1.paddock.soil.SoilWater
        SoilNitrogen: same as aps18 - berkin weathering -  planting 1.paddock.soil.SoilNitrogen
        CERESSoilTemperature Temperature
        Organic: same as aps20 - mungbean  emerald f1.paddock.soil.Organic
        Chemical: same as aps20 - mungbean  emerald f1.paddock.soil.Chemical
      SurfaceOrganicMatter: InitialResidueName=wheat; InitialResidueType=wheat; InitialResidueMass=500; InitialStandingFraction=0; InitialCPR=0; InitialCNR=40
      Plant mungbean: ResourceName=Mungbean
      MicroClimate: a_interception=0; b_interception=1; c_interception=0; d_interception=0; soil_albedo=0.3; SoilHeatFluxFraction=0; MinimumHeightDiffForNewLayer=0; NightInterceptionFraction=0; ReferenceHeight=0
    SoilArbitrator
  Simulation aps20 - mungbean shangtung f4
    Clock: Start=1993-12-16; End=1994-04-25
    Summary summaryfile
    Weather: FileName=vaug9394.met
    Zone paddock: Area=1; Slope=0; AspectAngle=0; Altitude=50
      Report
      Operations
        1993-12-18  // soilwat2 set sw = 0.327 0.403 0.398 0.356 0.362 0.368 0.368
        1993-12-18  // soiln2 set no3= 23.8 25.0 46.7 28.2 18.5 1.0 1.0
        1993-12-18  // mungbean sow plants = 23.5, sowing_depth = 40, cultivar = shangtung,crop_class = plant, row_spacing = 200
      Fertiliser
      Irrigation
      Manager: same as aps18 - berkin weathering -  planting 1.paddock.manager
      Soil: same as aps20 - mungbean  emerald f1.paddock.soil
      SurfaceOrganicMatter: InitialResidueName=wheat; InitialResidueType=wheat; InitialResidueMass=500; InitialStandingFraction=0; InitialCPR=0; InitialCNR=40
      Plant mungbean: ResourceName=Mungbean
      MicroClimate: a_interception=0; b_interception=1; c_interception=0; d_interception=0; soil_albedo=0.3; SoilHeatFluxFraction=0; MinimumHeightDiffForNewLayer=0; NightInterceptionFraction=0; ReferenceHeight=0
    SoilArbitrator
  Simulation aps20 - mungbean satin f5
    Clock: Start=1993-12-16; End=1994-04-10
    Summary summaryfile
    Weather: FileName=sche9394.met
    Zone paddock: Area=1; Slope=0; AspectAngle=0; Altitude=50
      Report
      Operations
        1993-12-20  // soilwat2 set sw = 0.522 0.522 0.446 0.371 0.383 0.430 0.430
        1993-12-20  // soiln2 set no3= 2.9 11.7 26.0 7.7 0.7 1.0 1.0
        1993-12-20  // mungbean sow plants = 18.5, sowing_depth = 40, cultivar = satin,crop_class = plant, row_spacing = 760
      Fertiliser
      Irrigation
      Manager: same as aps18 - berkin weathering -  planting 1.paddock.manager
      Soil: Latitude=0; Longitude=0
        InitialWater Initial water: PercentMethod=1; FractionFull=1
        Physical
          Thickness  BD    AirDry  LL15   DUL    SAT
          150        1     0.1     0.231  0.518  0.53
          150        1.01  0.209   0.209  0.534  0.55
          300        1.02  0.32    0.323  0.538  0.55
          300        1.07  0.32    0.349  0.578  0.59
          300        1.15  0.32    0.378  0.56   0.566
          300        1.33  0.32    0.43   0.47   0.498
          300        1.33  0.32    0.43   0.47   0.498
          SoilCrop MungbeanSoil: LL=[0.22, 0.342, 0.385, 0.386, 0.429, 0.43, 0.43]; KL=[0.08, 0.08, 0.08, 0.06, 0.04, 0.02, 0.01]; XF=[1, 1, 1, 1, 1, 1, 1]
        WaterBalance SoilWater: same as aps20 - mungbean  emerald f1.paddock.soil.SoilWater
        SoilNitrogen: same as aps18 - berkin weathering -  planting 1.paddock.soil.SoilNitrogen
        CERESSoilTemperature Temperature
        Organic: same as aps20 - mungbean  emerald f1.paddock.soil.Organic
        Chemical: same as aps20 - mungbean  emerald f1.paddock.soil.Chemical
      SurfaceOrganicMatter: InitialResidueName=wheat; InitialResidueType=wheat; InitialResidueMass=500; InitialStandingFraction=0; InitialCPR=0; InitialCNR=40
      Plant mungbean: ResourceName=Mungbean
      MicroClimate: a_interception=0; b_interception=1; c_interception=0; d_interception=0; soil_albedo=0.3; SoilHeatFluxFraction=0; MinimumHeightDiffForNewLayer=0; NightInterceptionFraction=0; ReferenceHeight=0
    SoilArbitrator
  Simulation aps20 - mungbean berkin f6
    Clock: Start=1993-12-16; End=1994-04-22
    Summary summaryfile
    Weather: FileName=rbaz9394.met
    Zone paddock: Area=1; Slope=0; AspectAngle=0; Altitude=50
      Report
      Operations
        1993-12-21  // soilwat2 set sw = 0.392 0.388 0.347 0.340 0.346 0.352 0.361
        1993-12-21  // soiln2 set no3= 15.4 34.0 56.7 10.1 2.3 1.0 1.0
        1993-12-21  // mungbean sow plants = 32.0, sowing_depth = 40, cultivar = berken,crop_class = plant, row_spacing = 450
      Fertiliser
      Irrigation
      Manager: same as aps18 - berkin weathering -  planting 1.paddock.manager
      Soil: Latitude=0; Longitude=0
        InitialWater Initial water: PercentMethod=1; FractionFull=1
        Physical
          Thickness  BD    AirDry  LL15   DUL    SAT
          150        1.39  0.1     0.19   0.428  0.47
          150        1.41  0.193   0.193  0.407  0.46
          300        1.42  0.263   0.263  0.424  0.46
          300        1.46  0.291   0.291  0.439  0.449
          300        1.45  0.328   0.328  0.437  0.452
          300        1.5   0.347   0.347  0.428  0.433
          300        1.49  0.349   0.349  0.402  0.43
          SoilCrop MungbeanSoil: LL=[0.24, 0.267, 0.3, 0.35, 0.38, 0.4, 0.401]; KL=[0.08, 0.08, 0.08, 0.06, 0.04, 0.02, 0.01]; XF=[1, 1, 1, 1, 1, 1, 1]
        WaterBalance SoilWater: same as aps20 - mungbean  emerald f1.paddock.soil.SoilWater
        SoilNitrogen: same as aps18 - berkin weathering -  planting 1.paddock.soil.SoilNitrogen
        CERESSoilTemperature Temperature
        Organic: same as aps20 - mungbean  emerald f1.paddock.soil.Organic
        Chemical: same as aps20 - mungbean  emerald f1.paddock.soil.Chemical
      SurfaceOrganicMatter: InitialResidueName=wheat; InitialResidueType=wheat; InitialResidueMass=500; InitialStandingFraction=0; InitialCPR=0; InitialCNR=40
      Plant mungbean: ResourceName=Mungbean
      MicroClimate: a_interception=0; b_interception=1; c_interception=0; d_interception=0; soil_albedo=0.3; SoilHeatFluxFraction=0; MinimumHeightDiffForNewLayer=0; NightInterceptionFraction=0; ReferenceHeight=0
    SoilArbitrator
  Simulation aps20 - mungbean emerald f7
    Clock: Start=1993-12-16; End=1994-05-14
    Summary summaryfile
    Weather: FileName=mans9394.met
    Zone paddock: Area=1; Slope=0; AspectAngle=0; Altitude=50
      Report
      Operations
        1993-12-28  // soilwat2 set sw = 0.389 0.368 0.396 0.385 0.393 0.368 0.368
        1993-12-28  // soiln2 set no3= 13.1 8.0 5.9 2.4 1.3 1.0 1.0
        1993-12-28  // mungbean sow plants = 19.6, sowing_depth = 40, cultivar = emerald,crop_class = plant, row_spacing = 180
      Fertiliser
      Irrigation
      Manager: same as aps18 - berkin weathering -  planting 1.paddock.manager
      Soil: same as aps20 - mungbean  emerald f1.paddock.soil
      SurfaceOrganicMatter: InitialResidueName=wheat; InitialResidueType=wheat; InitialResidueMass=500; InitialStandingFraction=0; InitialCPR=0; InitialCNR=40
      Plant mungbean: ResourceName=Mungbean
      MicroClimate: a_interception=0; b_interception=1; c_interception=0; d_interception=0; soil_albedo=0.3; SoilHeatFluxFraction=0; MinimumHeightDiffForNewLayer=0; NightInterceptionFraction=0; ReferenceHeight=0
    SoilArbitrator
  Simulation aps20 - mungbean emerald f8
    Clock: Start=1993-12-16; End=1994-05-19
    Summary summaryfile
    Weather: FileName=abaz9394.met
    Zone paddock: Area=1; Slope=0; AspectAngle=0; Altitude=50
      Report
      Operations
        1993-12-18  // soilwat2 set sw = 0.428 0.407 0.268 0.298 0.328 0.352 0.361
        1993-12-18  // soiln2 set no3= 7.7 8.7 7.1 2.5 1.9 1.0 1.0
        1993-12-18  // mungbean sow plants = 19.3, sowing_depth = 40, cultivar = emerald,crop_class = plant, row_spacing = 460
      Fertiliser
      Irrigation
      Manager: same as aps18 - berkin weathering -  planting 1.paddock.manager
      Soil: same as aps20 - mungbean berkin f6.paddock.soil
      SurfaceOrganicMatter: InitialResidueName=wheat; InitialResidueType=wheat; InitialResidueMass=500; InitialStandingFraction=0; InitialCPR=0; InitialCNR=40
      Plant mungbean: ResourceName=Mungbean
      MicroClimate: a_interception=0; b_interception=1; c_interception=0; d_interception=0; soil_albedo=0.3; SoilHeatFluxFraction=0; MinimumHeightDiffForNewLayer=0; NightInterceptionFraction=0; ReferenceHeight=0
    SoilArbitrator
  Simulation aps20 - mungbean satin f9
    Clock: Start=1993-12-16; End=1994-04-26
    Summary summaryfile
    Weather: FileName=crof9394.met
    Zone paddock: Area=1; Slope=0; AspectAngle=0; Altitude=50
      Report
      Operations
        1993-12-18  // soilwat2 set sw = 0.389 0.484 0.465 0.396 0.358 0.400 0.420
        1993-12-18  // soiln2 set no3= 23.3 34.4 86.3 28.7 5.9 1.0 1.0
        1993-12-18  // mungbean sow plants = 22.4, sowing_depth = 40, cultivar = satin,crop_class = plant, row_spacing = 970
      Fertiliser
      Irrigation
      Manager: same as aps18 - berkin weathering -  planting 1.paddock.manager
      Soil: same as aps20 - mungbean   celera f3.paddock.soil
      SurfaceOrganicMatter: InitialResidueName=wheat; InitialResidueType=wheat; InitialResidueMass=500; InitialStandingFraction=0; InitialCPR=0; InitialCNR=40
      Plant mungbean: ResourceName=Mungbean
      MicroClimate: a_interception=0; b_interception=1; c_interception=0; d_interception=0; soil_albedo=0.3; SoilHeatFluxFraction=0; MinimumHeightDiffForNewLayer=0; NightInterceptionFraction=0; ReferenceHeight=0
    SoilArbitrator
  Simulation NT10 mungbean -  king planting 1
    Clock: Start=1987-09-07; End=1988-05-29
    Summary summaryfile
    Weather: FileName=krs8788.met
    Zone paddock: Area=1; Slope=0; AspectAngle=0; Altitude=50
      Report
      Operations
        1987-09-07  // soilwat2 set sw = 0.19 0.21 0.21 0.223 0.219 0.219 0.219 0.229 0.237
        1988-01-01  // mungbean sow plants = 10, sowing_depth = 30,crop_class = plant, row_spacing = 360, cultivar = king
      Fertiliser
      Irrigation
      Manager: same as aps18 - berkin weathering -  planting 1.paddock.manager
      Soil: Latitude=0; Longitude=0
        InitialWater Initial water: PercentMethod=1; FractionFull=1
        Physical
          Thickness  BD    AirDry  LL15   DUL    SAT
          150        1.56  0.053   0.19   0.304  0.315
          150        1.52  0.08    0.21   0.31   0.33
          150        1.46  0.21    0.21   0.31   0.337
          150        1.46  0.223   0.223  0.324  0.34
          150        1.42  0.219   0.219  0.328  0.34
          150        1.42  0.219   0.219  0.328  0.341
          300        1.46  0.219   0.219  0.325  0.344
          300        1.5   0.229   0.229  0.337  0.346
          300        1.53  0.237   0.237  0.35   0.37
          SoilCrop MungbeanSoil
            LL=[0.19, 0.21, 0.21, 0.235, 0.233, 0.242, 0.248, 0.277, 0.285]
            KL=[0.16, 0.16, 0.12, 0.1, 0.1, 0.08, 0.06, 0.04, 0.03]
            XF=[1, 1, 1, 1, 1, 1, 1, 0, 0]
        WaterBalance SoilWater: SummerDate=1-Nov; SummerU=1.5; SummerCona=6.6; WinterDate=1-Apr; WinterU=1.5; WinterCona=6.6; DiffusConst=88; DiffusSlope=35.4; Salb=0.2; CN2Bare=70; CNRed=20; CNCov=0.8; DischargeWidth=5; CatchmentArea=10; Thickness=[150, 150, 150, 150, 150, 150, 300, 300, 300]; SWCON=[0.7, 0.7, 0.7, 0.7, 0.7, 0.7, 0.7, 0.7, 0.7]
        SoilNitrogen: same as aps18 - berkin weathering -  planting 1.paddock.soil.SoilNitrogen
        CERESSoilTemperature Temperature
        Organic: FOMCNRatio=33
          Thickness  Carbon  SoilCNRatio  FBiom  FInert  FOM
          150        1.27    14.5         0.05   0.39    0
          150        0.59    14.5         0.02   0.47    0
          150        0.34    14.5         0.015  0.52    0
          150        0.34    14.5         0.01   0.62    0
          150        0.26    14.5         0.01   0.74    0
          150        0.26    14.5         0.01   0.83    0
          300        0.25    14.5         0.01   0.93    0
          300        0.19    14.5         0.01   0.93    0
          300        0.21    14.5         0.01   0.93    0
        Chemical
          Thickness  NO3N  NH4N  PH
          150        2     1     6.5
          150        2     1     6.2
          150        2     1     6.3
          150        2     1     6.4
          150        2     1     6.5
          150        2     1     6.6
          300        2     1     6.6
          300        2     1     6.5
          300        1     0.2   6.5
      SurfaceOrganicMatter: InitialResidueName=wheat; InitialResidueType=wheat; InitialResidueMass=500; InitialStandingFraction=0; InitialCPR=0; InitialCNR=40
      Plant mungbean: ResourceName=Mungbean
      MicroClimate: a_interception=0; b_interception=1; c_interception=0; d_interception=0; soil_albedo=0.3; SoilHeatFluxFraction=0; MinimumHeightDiffForNewLayer=0; NightInterceptionFraction=0; ReferenceHeight=0
    SoilArbitrator
  Simulation NT10 mungbean -  king planting 2
    Clock: Start=1987-09-07; End=1988-05-29
    Summary summaryfile
    Weather: FileName=krs8788.met
    Zone paddock: Area=1; Slope=0; AspectAngle=0; Altitude=50
      Report
      Operations
        1987-09-07  // soilwat2 set sw = 0.19 0.21 0.21 0.223 0.219 0.219 0.219 0.229 0.237
        1988-01-01  // mungbean sow plants = 20, sowing_depth = 30,crop_class = plant, row_spacing = 360, cultivar = king
      Fertiliser
      Irrigation
      Manager: same as aps18 - berkin weathering -  planting 1.paddock.manager
      Soil: same as NT10 mungbean -  king planting 1.paddock.soil
      SurfaceOrganicMatter: InitialResidueName=wheat; InitialResidueType=wheat; InitialResidueMass=500; InitialStandingFraction=0; InitialCPR=0; InitialCNR=40
      Plant mungbean: ResourceName=Mungbean
      MicroClimate: a_interception=0; b_interception=1; c_interception=0; d_interception=0; soil_albedo=0.3; SoilHeatFluxFraction=0; MinimumHeightDiffForNewLayer=0; NightInterceptionFraction=0; ReferenceHeight=0
    SoilArbitrator
  Simulation NT10 mungbean -  king planting 3
    Clock: Start=1987-09-07; End=1988-05-29
    Summary summaryfile
    Weather: FileName=krs8788.met
    Zone paddock: Area=1; Slope=0; AspectAngle=0; Altitude=50
      Report
      Operations
        1987-09-07  // soilwat2 set sw = 0.19 0.21 0.21 0.223 0.219 0.219 0.219 0.229 0.237
        1988-01-01  // mungbean sow plants = 40, sowing_depth = 30,crop_class = plant, row_spacing = 360, cultivar = king
      Fertiliser
      Irrigation
      Manager: same as aps18 - berkin weathering -  planting 1.paddock.manager
      Soil: same as NT10 mungbean -  king planting 1.paddock.soil
      SurfaceOrganicMatter: InitialResidueName=wheat; InitialResidueType=wheat; InitialResidueMass=500; InitialStandingFraction=0; InitialCPR=0; InitialCNR=40
      Plant mungbean: ResourceName=Mungbean
      MicroClimate: a_interception=0; b_interception=1; c_interception=0; d_interception=0; soil_albedo=0.3; SoilHeatFluxFraction=0; MinimumHeightDiffForNewLayer=0; NightInterceptionFraction=0; ReferenceHeight=0
    SoilArbitrator
  Simulation NT10 mungbean -  king planting 21
    Clock: Start=1987-09-07; End=1988-05-29
    Summary summaryfile
    Weather: FileName=krs8788.met
    Zone paddock: Area=1; Slope=0; AspectAngle=0; Altitude=50
      Report
      Operations
        1987-09-07  // soilwat2 set sw = 0.19 0.21 0.21 0.223 0.219 0.219 0.219 0.229 0.237
        1988-01-17  // mungbean sow plants = 10, sowing_depth = 30,crop_class = plant, row_spacing = 360, cultivar = king
      Fertiliser
      Irrigation
      Manager: same as aps18 - berkin weathering -  planting 1.paddock.manager
      Soil: same as NT10 mungbean -  king planting 1.paddock.soil
      SurfaceOrganicMatter: InitialResidueName=wheat; InitialResidueType=wheat; InitialResidueMass=500; InitialStandingFraction=0; InitialCPR=0; InitialCNR=40
      Plant mungbean: ResourceName=Mungbean
      MicroClimate: a_interception=0; b_interception=1; c_interception=0; d_interception=0; soil_albedo=0.3; SoilHeatFluxFraction=0; MinimumHeightDiffForNewLayer=0; NightInterceptionFraction=0; ReferenceHeight=0
    SoilArbitrator
  Simulation NT10 mungbean -  king planting 22
    Clock: Start=1987-09-07; End=1988-05-29
    Summary summaryfile
    Weather: FileName=krs8788.met
    Zone paddock: Area=1; Slope=0; AspectAngle=0; Altitude=50
      Report
      Operations
        1987-09-07  // soilwat2 set sw = 0.19 0.21 0.21 0.223 0.219 0.219 0.219 0.229 0.237
        1988-01-17  // mungbean sow plants = 20, sowing_depth = 30,crop_class = plant, row_spacing = 360, cultivar = king
      Fertiliser
      Irrigation
      Manager: same as aps18 - berkin weathering -  planting 1.paddock.manager
      Soil: same as NT10 mungbean -  king planting 1.paddock.soil
      SurfaceOrganicMatter: InitialResidueName=wheat; InitialResidueType=wheat; InitialResidueMass=500; InitialStandingFraction=0; InitialCPR=0; InitialCNR=40
      Plant mungbean: ResourceName=Mungbean
      MicroClimate: a_interception=0; b_interception=1; c_interception=0; d_interception=0; soil_albedo=0.3; SoilHeatFluxFraction=0; MinimumHeightDiffForNewLayer=0; NightInterceptionFraction=0; ReferenceHeight=0
    SoilArbitrator
  Simulation NT10 mungbean -  king planting 23
    Clock: Start=1987-09-07; End=1988-05-29
    Summary summaryfile
    Weather: FileName=krs8788.met
    Zone paddock: Area=1; Slope=0; AspectAngle=0; Altitude=50
      Report
      Operations
        1987-09-07  // soilwat2 set sw = 0.19 0.21 0.21 0.223 0.219 0.219 0.219 0.229 0.237
        1988-01-17  // mungbean sow plants = 40, sowing_depth = 30,crop_class = plant, row_spacing = 360, cultivar = king
      Fertiliser
      Irrigation
      Manager: same as aps18 - berkin weathering -  planting 1.paddock.manager
      Soil: same as NT10 mungbean -  king planting 1.paddock.soil
      SurfaceOrganicMatter: InitialResidueName=wheat; InitialResidueType=wheat; InitialResidueMass=500; InitialStandingFraction=0; InitialCPR=0; InitialCNR=40
      Plant mungbean: ResourceName=Mungbean
      MicroClimate: a_interception=0; b_interception=1; c_interception=0; d_interception=0; soil_albedo=0.3; SoilHeatFluxFraction=0; MinimumHeightDiffForNewLayer=0; NightInterceptionFraction=0; ReferenceHeight=0
    SoilArbitrator
  Simulation NT10 mungbean -  putland planting 1
    Clock: Start=1987-09-07; End=1988-05-29
    Summary summaryfile
    Weather: FileName=krs8788.met
    Zone paddock: Area=1; Slope=0; AspectAngle=0; Altitude=50
      Report
      Operations
      Fertiliser
      Irrigation
      Manager: same as aps18 - berkin weathering -  planting 1.paddock.manager
      Soil: same as NT10 mungbean -  king planting 1.paddock.soil
      SurfaceOrganicMatter: InitialResidueName=wheat; InitialResidueType=wheat; InitialResidueMass=500; InitialStandingFraction=0; InitialCPR=0; InitialCNR=40
      Plant mungbean: ResourceName=Mungbean
      MicroClimate: a_interception=0; b_interception=1; c_interception=0; d_interception=0; soil_albedo=0.3; SoilHeatFluxFraction=0; MinimumHeightDiffForNewLayer=0; NightInterceptionFraction=0; ReferenceHeight=0
    SoilArbitrator
  Simulation NT10 mungbean -  putland planting 2: same as NT10 mungbean -  putland planting 1
  Simulation NT10 mungbean -  putland planting 3: same as NT10 mungbean -  putland planting 1
  Simulation NT10 mungbean -  putland planting 21
    Clock: Start=1987-09-07; End=1988-05-29
    Summary summaryfile
    Weather: FileName=krs8788.met
    Zone paddock: Area=1; Slope=0; AspectAngle=0; Altitude=50
      Report
      Operations
        1987-09-07  // soilwat2 set sw = 0.19 0.21 0.21 0.223 0.219 0.219 0.219 0.229 0.237
        1988-01-17  // mungbean sow plants = 10, sowing_depth = 30,crop_class = plant, row_spacing = 360, cultivar = putland
      Fertiliser
      Irrigation
      Manager: same as aps18 - berkin weathering -  planting 1.paddock.manager
      Soil: same as NT10 mungbean -  king planting 1.paddock.soil
      SurfaceOrganicMatter: InitialResidueName=wheat; InitialResidueType=wheat; InitialResidueMass=500; InitialStandingFraction=0; InitialCPR=0; InitialCNR=40
      Plant mungbean: ResourceName=Mungbean
      MicroClimate: a_interception=0; b_interception=1; c_interception=0; d_interception=0; soil_albedo=0.3; SoilHeatFluxFraction=0; MinimumHeightDiffForNewLayer=0; NightInterceptionFraction=0; ReferenceHeight=0
    SoilArbitrator
  Simulation NT10 mungbean -  putland planting 22
    Clock: Start=1987-09-07; End=1988-05-29
    Summary summaryfile
    Weather: FileName=krs8788.met
    Zone paddock: Area=1; Slope=0; AspectAngle=0; Altitude=50
      Report
      Operations
        1987-09-07  // soilwat2 set sw = 0.19 0.21 0.21 0.223 0.219 0.219 0.219 0.229 0.237
        1988-01-17  // mungbean sow plants = 20, sowing_depth = 30,crop_class = plant, row_spacing = 360, cultivar = putland
      Fertiliser
      Irrigation
      Manager: same as aps18 - berkin weathering -  planting 1.paddock.manager
      Soil: same as NT10 mungbean -  king planting 1.paddock.soil
      SurfaceOrganicMatter: InitialResidueName=wheat; InitialResidueType=wheat; InitialResidueMass=500; InitialStandingFraction=0; InitialCPR=0; InitialCNR=40
      Plant mungbean: ResourceName=Mungbean
      MicroClimate: a_interception=0; b_interception=1; c_interception=0; d_interception=0; soil_albedo=0.3; SoilHeatFluxFraction=0; MinimumHeightDiffForNewLayer=0; NightInterceptionFraction=0; ReferenceHeight=0
    SoilArbitrator
  Simulation NT10 mungbean -  putland planting 23
    Clock: Start=1987-09-07; End=1988-05-29
    Summary summaryfile
    Weather: FileName=krs8788.met
    Zone paddock: Area=1; Slope=0; AspectAngle=0; Altitude=50
      Report
      Operations
        1987-09-07  // soilwat2 set sw = 0.19 0.21 0.21 0.223 0.219 0.219 0.219 0.229 0.237
        1988-01-17  // mungbean sow plants = 40, sowing_depth = 30,crop_class = plant, row_spacing = 360, cultivar = putland
      Fertiliser
      Irrigation
      Manager: same as aps18 - berkin weathering -  planting 1.paddock.manager
      Soil: same as NT10 mungbean -  king planting 1.paddock.soil
      SurfaceOrganicMatter: InitialResidueName=wheat; InitialResidueType=wheat; InitialResidueMass=500; InitialStandingFraction=0; InitialCPR=0; InitialCNR=40
      Plant mungbean: ResourceName=Mungbean
      MicroClimate: a_interception=0; b_interception=1; c_interception=0; d_interception=0; soil_albedo=0.3; SoilHeatFluxFraction=0; MinimumHeightDiffForNewLayer=0; NightInterceptionFraction=0; ReferenceHeight=0
    SoilArbitrator
  Simulation NT1 mungbean -  berkin planting 1
    Clock: Start=1986-09-07; End=1987-05-30
    Summary summaryfile
    Weather: FileName=krc8687.met
    Zone paddock: Area=1; Slope=0; AspectAngle=0; Altitude=50
      Report
      Operations
        1986-09-07  // soilwat2 set sw = 0.19 0.21 0.21 0.223 0.219 0.219 0.219 0.229 0.237
        1987-01-05  // mungbean sow plants = 38.0,crop_class = plant, row_spacing = 360, sowing_depth = 30, cultivar = berken
      Fertiliser
      Irrigation
      Manager: same as aps18 - berkin weathering -  planting 1.paddock.manager
      Soil: same as NT10 mungbean -  king planting 1.paddock.soil
      SurfaceOrganicMatter: InitialResidueName=wheat; InitialResidueType=wheat; InitialResidueMass=500; InitialStandingFraction=0; InitialCPR=0; InitialCNR=40
      Plant mungbean: ResourceName=Mungbean
      MicroClimate: a_interception=0; b_interception=1; c_interception=0; d_interception=0; soil_albedo=0.3; SoilHeatFluxFraction=0; MinimumHeightDiffForNewLayer=0; NightInterceptionFraction=0; ReferenceHeight=0
    SoilArbitrator
  Simulation NT1 mungbean -  berkin planting 2
    Clock: Start=1987-01-01; End=1987-05-30
    Summary summaryfile
    Weather: FileName=krc8687.met
    Zone paddock: Area=1; Slope=0; AspectAngle=0; Altitude=50
      Report
      Operations
        1987-01-01  // soilwat2 set sw = 0.19 0.21 0.21 0.223 0.219 0.219 0.219 0.229 0.237
        1987-01-30  // mungbean sow plants = 36.0,crop_class = plant, row_spacing = 360, sowing_depth = 30, cultivar = berken
      Fertiliser
      Irrigation
      Manager: same as aps18 - berkin weathering -  planting 1.paddock.manager
      Soil: same as NT10 mungbean -  king planting 1.paddock.soil
      SurfaceOrganicMatter: InitialResidueName=wheat; InitialResidueType=wheat; InitialResidueMass=500; InitialStandingFraction=0; InitialCPR=0; InitialCNR=40
      Plant mungbean: ResourceName=Mungbean
      MicroClimate: a_interception=0; b_interception=1; c_interception=0; d_interception=0; soil_albedo=0.3; SoilHeatFluxFraction=0; MinimumHeightDiffForNewLayer=0; NightInterceptionFraction=0; ReferenceHeight=0
    SoilArbitrator
  Simulation NT1 mungbean -  king planting 1
    Clock: Start=1986-09-07; End=1987-05-30
    Summary summaryfile
    Weather: FileName=krc8687.met
    Zone paddock: Area=1; Slope=0; AspectAngle=0; Altitude=50
      Report
      Operations
        1986-09-07  // soilwat2 set sw = 0.19 0.21 0.21 0.223 0.219 0.219 0.219 0.229 0.237
        1987-01-05  // mungbean sow plants = 33.5,crop_class = plant, row_spacing = 360, sowing_depth = 30, cultivar = king
      Fertiliser
      Irrigation
      Manager: same as aps18 - berkin weathering -  planting 1.paddock.manager
      Soil: same as NT10 mungbean -  king planting 1.paddock.soil
      SurfaceOrganicMatter: InitialResidueName=wheat; InitialResidueType=wheat; InitialResidueMass=500; InitialStandingFraction=0; InitialCPR=0; InitialCNR=40
      Plant mungbean: ResourceName=Mungbean
      MicroClimate: a_interception=0; b_interception=1; c_interception=0; d_interception=0; soil_albedo=0.3; SoilHeatFluxFraction=0; MinimumHeightDiffForNewLayer=0; NightInterceptionFraction=0; ReferenceHeight=0
    SoilArbitrator
  Simulation NT1 mungbean -  king planting 2
    Clock: Start=1986-09-07; End=1987-05-30
    Summary summaryfile
    Weather: FileName=krc8687.met
    Zone paddock: Area=1; Slope=0; AspectAngle=0; Altitude=50
      Report
      Operations
        1986-09-07  // soilwat2 set sw = 0.19 0.21 0.21 0.223 0.219 0.219 0.219 0.229 0.237
        1987-01-30  // mungbean sow plants = 36.0,crop_class = plant, row_spacing = 360, sowing_depth = 30, cultivar = king
      Fertiliser
      Irrigation
      Manager: same as aps18 - berkin weathering -  planting 1.paddock.manager
      Soil: same as NT10 mungbean -  king planting 1.paddock.soil
      SurfaceOrganicMatter: InitialResidueName=wheat; InitialResidueType=wheat; InitialResidueMass=500; InitialStandingFraction=0; InitialCPR=0; InitialCNR=40
      Plant mungbean: ResourceName=Mungbean
      MicroClimate: a_interception=0; b_interception=1; c_interception=0; d_interception=0; soil_albedo=0.3; SoilHeatFluxFraction=0; MinimumHeightDiffForNewLayer=0; NightInterceptionFraction=0; ReferenceHeight=0
    SoilArbitrator
  Simulation NT1 mungbean -  satin planting 1
    Clock: Start=1986-09-07; End=1987-05-30
    Summary summaryfile
    Weather: FileName=krc8687.met
    Zone paddock: Area=1; Slope=0; AspectAngle=0; Altitude=50
      Report
      Operations
        1986-09-07  // soilwat2 set sw = 0.19 0.21 0.21 0.223 0.219 0.219 0.219 0.229 0.237
        1987-01-05  // mungbean sow plants = 35.2,crop_class = plant, row_spacing = 360, sowing_depth = 30, cultivar = satin
      Fertiliser
      Irrigation
      Manager: same as aps18 - berkin weathering -  planting 1.paddock.manager
      Soil: same as NT10 mungbean -  king planting 1.paddock.soil
      SurfaceOrganicMatter: InitialResidueName=wheat; InitialResidueType=wheat; InitialResidueMass=500; InitialStandingFraction=0; InitialCPR=0; InitialCNR=40
      Plant mungbean: ResourceName=Mungbean
      MicroClimate: a_interception=0; b_interception=1; c_interception=0; d_interception=0; soil_albedo=0.3; SoilHeatFluxFraction=0; MinimumHeightDiffForNewLayer=0; NightInterceptionFraction=0; ReferenceHeight=0
    SoilArbitrator
  Simulation NT1 mungbean -  satin planting 2
    Clock: Start=1986-09-07; End=1987-05-30
    Summary summaryfile
    Weather: FileName=krc8687.met
    Zone paddock: Area=1; Slope=0; AspectAngle=0; Altitude=50
      Report
      Operations
        1986-09-07  // soilwat2 set sw = 0.19 0.21 0.21 0.223 0.219 0.219 0.219 0.229 0.237
        1987-01-30  // mungbean sow plants = 40.8,crop_class = plant, row_spacing = 360, sowing_depth = 30, cultivar = satin
      Fertiliser
      Irrigation
      Manager: same as aps18 - berkin weathering -  planting 1.paddock.manager
      Soil: same as NT10 mungbean -  king planting 1.paddock.soil
      SurfaceOrganicMatter: InitialResidueName=wheat; InitialResidueType=wheat; InitialResidueMass=500; InitialStandingFraction=0; InitialCPR=0; InitialCNR=40
      Plant mungbean: ResourceName=Mungbean
      MicroClimate: a_interception=0; b_interception=1; c_interception=0; d_interception=0; soil_albedo=0.3; SoilHeatFluxFraction=0; MinimumHeightDiffForNewLayer=0; NightInterceptionFraction=0; ReferenceHeight=0
    SoilArbitrator
  Simulation NT1 mungbean -  shantung planting 1
    Clock: Start=1986-09-07; End=1987-05-30
    Summary summaryfile
    Weather: FileName=krc8687.met
    Zone paddock: Area=1; Slope=0; AspectAngle=0; Altitude=50
      Report
      Operations
        1986-09-07  // soilwat2 set sw = 0.19 0.21 0.21 0.223 0.219 0.219 0.219 0.229 0.237
        1987-01-05  // mungbean sow plants = 33.9,crop_class = plant, row_spacing = 360, sowing_depth = 30, cultivar = shangtung
      Fertiliser
      Irrigation
      Manager: same as aps18 - berkin weathering -  planting 1.paddock.manager
      Soil: same as NT10 mungbean -  king planting 1.paddock.soil
      SurfaceOrganicMatter: InitialResidueName=wheat; InitialResidueType=wheat; InitialResidueMass=500; InitialStandingFraction=0; InitialCPR=0; InitialCNR=40
      Plant mungbean: ResourceName=Mungbean
      MicroClimate: a_interception=0; b_interception=1; c_interception=0; d_interception=0; soil_albedo=0.3; SoilHeatFluxFraction=0; MinimumHeightDiffForNewLayer=0; NightInterceptionFraction=0; ReferenceHeight=0
    SoilArbitrator
  Simulation NT1 mungbean -  shantung planting 2
    Clock: Start=1986-09-07; End=1987-05-30
    Summary summaryfile
    Weather: FileName=krc8687.met
    Zone paddock: Area=1; Slope=0; AspectAngle=0; Altitude=50
      Report
      Operations
        1986-09-07  // soilwat2 set sw = 0.19 0.21 0.21 0.223 0.219 0.219 0.219 0.229 0.237
        1987-01-30  // mungbean sow plants = 34.4,crop_class = plant, row_spacing = 360, sowing_depth = 30, cultivar = shangtung
      Fertiliser
      Irrigation
      Manager: same as aps18 - berkin weathering -  planting 1.paddock.manager
      Soil: same as NT10 mungbean -  king planting 1.paddock.soil
      SurfaceOrganicMatter: InitialResidueName=wheat; InitialResidueType=wheat; InitialResidueMass=500; InitialStandingFraction=0; InitialCPR=0; InitialCNR=40
      Plant mungbean: ResourceName=Mungbean
      MicroClimate: a_interception=0; b_interception=1; c_interception=0; d_interception=0; soil_albedo=0.3; SoilHeatFluxFraction=0; MinimumHeightDiffForNewLayer=0; NightInterceptionFraction=0; ReferenceHeight=0
    SoilArbitrator
  Simulation NT1 mungbean -  putland planting 1
    Clock: Start=1986-09-07; End=1987-05-30
    Summary summaryfile
    Weather: FileName=krc8687.met
    Zone paddock: Area=1; Slope=0; AspectAngle=0; Altitude=50
      Report
      Operations
        1986-09-07  // soilwat2 set sw = 0.19 0.21 0.21 0.223 0.219 0.219 0.219 0.229 0.237
        1987-01-05  // mungbean sow plants = 33.5,crop_class = plant, row_spacing = 360, sowing_depth = 30, cultivar = putland
      Fertiliser
      Irrigation
      Manager: same as aps18 - berkin weathering -  planting 1.paddock.manager
      Soil: same as NT10 mungbean -  king planting 1.paddock.soil
      SurfaceOrganicMatter: InitialResidueName=wheat; InitialResidueType=wheat; InitialResidueMass=500; InitialStandingFraction=0; InitialCPR=0; InitialCNR=40
      Plant mungbean: ResourceName=Mungbean
      MicroClimate: a_interception=0; b_interception=1; c_interception=0; d_interception=0; soil_albedo=0.3; SoilHeatFluxFraction=0; MinimumHeightDiffForNewLayer=0; NightInterceptionFraction=0; ReferenceHeight=0
    SoilArbitrator
  Simulation NT1 mungbean -  putland planting 2
    Clock: Start=1986-09-07; End=1987-05-30
    Summary summaryfile
    Weather: FileName=krc8687.met
    Zone paddock: Area=1; Slope=0; AspectAngle=0; Altitude=50
      Report
      Operations
        1986-09-07  // soilwat2 set sw = 0.19 0.21 0.21 0.223 0.219 0.219 0.219 0.229 0.237
        1987-01-30  // mungbean sow plants = 33.2,crop_class = plant, row_spacing = 360, sowing_depth = 30, cultivar = putland
      Fertiliser
      Irrigation
      Manager: same as aps18 - berkin weathering -  planting 1.paddock.manager
      Soil: same as NT10 mungbean -  king planting 1.paddock.soil
      SurfaceOrganicMatter: InitialResidueName=wheat; InitialResidueType=wheat; InitialResidueMass=500; InitialStandingFraction=0; InitialCPR=0; InitialCNR=40
      Plant mungbean: ResourceName=Mungbean
      MicroClimate: a_interception=0; b_interception=1; c_interception=0; d_interception=0; soil_albedo=0.3; SoilHeatFluxFraction=0; MinimumHeightDiffForNewLayer=0; NightInterceptionFraction=0; ReferenceHeight=0
    SoilArbitrator
  Simulation NT2 mungbean -  king planting 1
    Clock: Start=1987-01-01; End=1987-05-30
    Summary summaryfile
    Weather: FileName=dd8687.met
    Zone paddock: Area=1; Slope=0; AspectAngle=0; Altitude=50
      Report
      Operations
        1987-01-15  // mungbean sow plants = 38.9,crop_class = plant, row_spacing = 360, sowing_depth = 30, cultivar = king
      Fertiliser
      Irrigation
      Manager: same as aps18 - berkin weathering -  planting 1.paddock.manager
      Soil: Latitude=0; Longitude=0
        InitialWater Initial water: PercentMethod=1; FractionFull=1
        Physical
          Thickness  BD    AirDry  LL15   DUL    SAT
          150        1.56  0.053   0.19   0.304  0.315
          150        1.52  0.08    0.21   0.31   0.33
          150        1.46  0.21    0.21   0.31   0.337
          150        1.46  0.223   0.223  0.324  0.34
          150        1.42  0.219   0.219  0.328  0.34
          150        1.42  0.219   0.219  0.328  0.341
          300        1.46  0.219   0.219  0.325  0.344
          300        1.5   0.229   0.229  0.337  0.346
          300        1.53  0.237   0.237  0.35   0.37
          SoilCrop MungbeanSoil
            LL=[0.19, 0.21, 0.21, 0.235, 0.233, 0.242, 0.248, 0.277, 0.285]
            KL=[0.08, 0.08, 0.08, 0.08, 0.06, 0.04, 0.02, 0.01, 0.01]
            XF=[1, 1, 1, 1, 1, 1, 1, 1, 1]
        WaterBalance SoilWater: SummerDate=1-Nov; SummerU=1.5; SummerCona=6.6; WinterDate=1-Apr; WinterU=1.5; WinterCona=6.6; DiffusConst=88; DiffusSlope=35.4; Salb=0.2; CN2Bare=85; CNRed=20; CNCov=0.8; DischargeWidth=5; CatchmentArea=10; Thickness=[150, 150, 150, 150, 150, 150, 300, 300, 300]; SWCON=[0.7, 0.7, 0.7, 0.7, 0.7, 0.7, 0.7, 0.7, 0.7]
        SoilNitrogen: same as aps18 - berkin weathering -  planting 1.paddock.soil.SoilNitrogen
        CERESSoilTemperature Temperature
        Organic: same as NT10 mungbean -  king planting 1.paddock.soil.Organic
        Chemical: same as NT10 mungbean -  king planting 1.paddock.soil.Chemical
      SurfaceOrganicMatter: InitialResidueName=wheat; InitialResidueType=wheat; InitialResidueMass=500; InitialStandingFraction=0; InitialCPR=0; InitialCNR=40
      Plant mungbean: ResourceName=Mungbean
      MicroClimate: a_interception=0; b_interception=1; c_interception=0; d_interception=0; soil_albedo=0.3; SoilHeatFluxFraction=0; MinimumHeightDiffForNewLayer=0; NightInterceptionFraction=0; ReferenceHeight=0
    SoilArbitrator
  Simulation NT2 mungbean -  king planting 2
    Clock: Start=1987-01-01; End=1987-05-30
    Summary summaryfile
    Weather: FileName=dd8687.met
    Zone paddock: Area=1; Slope=0; AspectAngle=0; Altitude=50
      Report
      Operations
        1987-01-28  // mungbean sow plants = 33.4,crop_class = plant, row_spacing = 360, sowing_depth = 30, cultivar = king
      Fertiliser
      Irrigation
      Manager: same as aps18 - berkin weathering -  planting 1.paddock.manager
      Soil: same as NT2 mungbean -  king planting 1.paddock.soil
      SurfaceOrganicMatter: InitialResidueName=wheat; InitialResidueType=wheat; InitialResidueMass=500; InitialStandingFraction=0; InitialCPR=0; InitialCNR=40
      Plant mungbean: ResourceName=Mungbean
      MicroClimate: a_interception=0; b_interception=1; c_interception=0; d_interception=0; soil_albedo=0.3; SoilHeatFluxFraction=0; MinimumHeightDiffForNewLayer=0; NightInterceptionFraction=0; ReferenceHeight=0
    SoilArbitrator
  Simulation NT2 mungbean -  king planting 3
    Clock: Start=1987-01-01; End=1987-05-30
    Summary summaryfile
    Weather: FileName=dd8687.met
    Zone paddock: Area=1; Slope=0; AspectAngle=0; Altitude=50
      Report
      Operations
        1987-02-10  // mungbean sow plants = 31.7,crop_class = plant, row_spacing = 360, sowing_depth = 30, cultivar = king
      Fertiliser
      Irrigation
      Manager: same as aps18 - berkin weathering -  planting 1.paddock.manager
      Soil: same as NT2 mungbean -  king planting 1.paddock.soil
      SurfaceOrganicMatter: InitialResidueName=wheat; InitialResidueType=wheat; InitialResidueMass=500; InitialStandingFraction=0; InitialCPR=0; InitialCNR=40
      Plant mungbean: ResourceName=Mungbean
      MicroClimate: a_interception=0; b_interception=1; c_interception=0; d_interception=0; soil_albedo=0.3; SoilHeatFluxFraction=0; MinimumHeightDiffForNewLayer=0; NightInterceptionFraction=0; ReferenceHeight=0
    SoilArbitrator
  Simulation NT2 mungbean -  king planting 4
    Clock: Start=1987-01-01; End=1987-05-30
    Summary summaryfile
    Weather: FileName=dd8687.met
    Zone paddock: Area=1; Slope=0; AspectAngle=0; Altitude=50
      Report
      Operations
        1987-02-25  // mungbean sow plants = 32.9,crop_class = plant, row_spacing = 360, sowing_depth = 30, cultivar = king
      Fertiliser
      Irrigation
      Manager: same as aps18 - berkin weathering -  planting 1.paddock.manager
      Soil: same as NT2 mungbean -  king planting 1.paddock.soil
      SurfaceOrganicMatter: InitialResidueName=wheat; InitialResidueType=wheat; InitialResidueMass=500; InitialStandingFraction=0; InitialCPR=0; InitialCNR=40
      Plant mungbean: ResourceName=Mungbean
      MicroClimate: a_interception=0; b_interception=1; c_interception=0; d_interception=0; soil_albedo=0.3; SoilHeatFluxFraction=0; MinimumHeightDiffForNewLayer=0; NightInterceptionFraction=0; ReferenceHeight=0
    SoilArbitrator
  Simulation NT2 mungbean -  satin planting 1
    Clock: Start=1986-09-07; End=1987-05-30
    Summary summaryfile
    Weather: FileName=dd8687.met
    Zone paddock: Area=1; Slope=0; AspectAngle=0; Altitude=50
      Report
      Operations
        1987-01-15  // mungbean sow plants = 26.1,crop_class = plant, row_spacing = 360, sowing_depth = 30, cultivar = satin
      Fertiliser
      Irrigation
      Manager: same as aps18 - berkin weathering -  planting 1.paddock.manager
      Soil: same as NT2 mungbean -  king planting 1.paddock.soil
      SurfaceOrganicMatter: InitialResidueName=wheat; InitialResidueType=wheat; InitialResidueMass=500; InitialStandingFraction=0; InitialCPR=0; InitialCNR=40
      Plant mungbean: ResourceName=Mungbean
      MicroClimate: a_interception=0; b_interception=1; c_interception=0; d_interception=0; soil_albedo=0.3; SoilHeatFluxFraction=0; MinimumHeightDiffForNewLayer=0; NightInterceptionFraction=0; ReferenceHeight=0
    SoilArbitrator
  Simulation NT2 mungbean -  satin planting 2
    Clock: Start=1986-09-07; End=1987-05-30
    Summary summaryfile
    Weather: FileName=dd8687.met
    Zone paddock: Area=1; Slope=0; AspectAngle=0; Altitude=50
      Report
      Operations
        1987-01-28  // mungbean sow plants = 36.0,crop_class = plant, row_spacing = 360, sowing_depth = 30, cultivar = satin
      Fertiliser
      Irrigation
      Manager: same as aps18 - berkin weathering -  planting 1.paddock.manager
      Soil: same as NT2 mungbean -  king planting 1.paddock.soil
      SurfaceOrganicMatter: InitialResidueName=wheat; InitialResidueType=wheat; InitialResidueMass=500; InitialStandingFraction=0; InitialCPR=0; InitialCNR=40
      Plant mungbean: ResourceName=Mungbean
      MicroClimate: a_interception=0; b_interception=1; c_interception=0; d_interception=0; soil_albedo=0.3; SoilHeatFluxFraction=0; MinimumHeightDiffForNewLayer=0; NightInterceptionFraction=0; ReferenceHeight=0
    SoilArbitrator
  Simulation NT2 mungbean -  satin planting 3
    Clock: Start=1986-09-07; End=1987-05-30
    Summary summaryfile
    Weather: FileName=dd8687.met
    Zone paddock: Area=1; Slope=0; AspectAngle=0; Altitude=50
      Report
      Operations
        1987-02-10  // mungbean sow plants = 38.0,crop_class = plant, row_spacing = 360, sowing_depth = 30, cultivar = satin
      Fertiliser
      Irrigation
      Manager: same as aps18 - berkin weathering -  planting 1.paddock.manager
      Soil: same as NT2 mungbean -  king planting 1.paddock.soil
      SurfaceOrganicMatter: InitialResidueName=wheat; InitialResidueType=wheat; InitialResidueMass=500; InitialStandingFraction=0; InitialCPR=0; InitialCNR=40
      Plant mungbean: ResourceName=Mungbean
      MicroClimate: a_interception=0; b_interception=1; c_interception=0; d_interception=0; soil_albedo=0.3; SoilHeatFluxFraction=0; MinimumHeightDiffForNewLayer=0; NightInterceptionFraction=0; ReferenceHeight=0
    SoilArbitrator
  Simulation NT2 mungbean -  satin planting 4
    Clock: Start=1986-09-07; End=1987-05-30
    Summary summaryfile
    Weather: FileName=dd8687.met
    Zone paddock: Area=1; Slope=0; AspectAngle=0; Altitude=50
      Report
      Operations
        1987-02-25  // mungbean sow plants = 39.0,crop_class = plant, row_spacing = 360, sowing_depth = 30, cultivar = satin
      Fertiliser
      Irrigation
      Manager: same as aps18 - berkin weathering -  planting 1.paddock.manager
      Soil: same as NT2 mungbean -  king planting 1.paddock.soil
      SurfaceOrganicMatter: InitialResidueName=wheat; InitialResidueType=wheat; InitialResidueMass=500; InitialStandingFraction=0; InitialCPR=0; InitialCNR=40
      Plant mungbean: ResourceName=Mungbean
      MicroClimate: a_interception=0; b_interception=1; c_interception=0; d_interception=0; soil_albedo=0.3; SoilHeatFluxFraction=0; MinimumHeightDiffForNewLayer=0; NightInterceptionFraction=0; ReferenceHeight=0
    SoilArbitrator
  Simulation NT2 mungbean -  putland planting 1
    Clock: Start=1987-01-01; End=1987-05-30
    Summary summaryfile
    Weather: FileName=dd8687.met
    Zone paddock: Area=1; Slope=0; AspectAngle=0; Altitude=50
      Report
      Operations
        1987-01-15  // mungbean sow plants = 31.9,crop_class = plant, row_spacing = 360, sowing_depth = 30, cultivar = putland
      Fertiliser
      Irrigation
      Manager: same as aps18 - berkin weathering -  planting 1.paddock.manager
      Soil: same as NT2 mungbean -  king planting 1.paddock.soil
      SurfaceOrganicMatter: InitialResidueName=wheat; InitialResidueType=wheat; InitialResidueMass=500; InitialStandingFraction=0; InitialCPR=0; InitialCNR=40
      Plant mungbean: ResourceName=Mungbean
      MicroClimate: a_interception=0; b_interception=1; c_interception=0; d_interception=0; soil_albedo=0.3; SoilHeatFluxFraction=0; MinimumHeightDiffForNewLayer=0; NightInterceptionFraction=0; ReferenceHeight=0
    SoilArbitrator
  Simulation NT2 mungbean -  putland planting 2
    Clock: Start=1987-01-01; End=1987-05-30
    Summary summaryfile
    Weather: FileName=dd8687.met
    Zone paddock: Area=1; Slope=0; AspectAngle=0; Altitude=50
      Report
      Operations
        1987-01-28  // mungbean sow plants = 34.1,crop_class = plant, row_spacing = 360, sowing_depth = 30, cultivar = putland
      Fertiliser
      Irrigation
      Manager: same as aps18 - berkin weathering -  planting 1.paddock.manager
      Soil: same as NT2 mungbean -  king planting 1.paddock.soil
      SurfaceOrganicMatter: InitialResidueName=wheat; InitialResidueType=wheat; InitialResidueMass=500; InitialStandingFraction=0; InitialCPR=0; InitialCNR=40
      Plant mungbean: ResourceName=Mungbean
      MicroClimate: a_interception=0; b_interception=1; c_interception=0; d_interception=0; soil_albedo=0.3; SoilHeatFluxFraction=0; MinimumHeightDiffForNewLayer=0; NightInterceptionFraction=0; ReferenceHeight=0
    SoilArbitrator
  Simulation NT2 mungbean -  putland planting 3
    Clock: Start=1987-01-01; End=1987-05-30
    Summary summaryfile
    Weather: FileName=dd8687.met
    Zone paddock: Area=1; Slope=0; AspectAngle=0; Altitude=50
      Report
      Operations
        1987-02-10  // mungbean sow plants = 32.9,crop_class = plant, row_spacing = 360, sowing_depth = 30, cultivar = putland
      Fertiliser
      Irrigation
      Manager: same as aps18 - berkin weathering -  planting 1.paddock.manager
      Soil: same as NT2 mungbean -  king planting 1.paddock.soil
      SurfaceOrganicMatter: InitialResidueName=wheat; InitialResidueType=wheat; InitialResidueMass=500; InitialStandingFraction=0; InitialCPR=0; InitialCNR=40
      Plant mungbean: ResourceName=Mungbean
      MicroClimate: a_interception=0; b_interception=1; c_interception=0; d_interception=0; soil_albedo=0.3; SoilHeatFluxFraction=0; MinimumHeightDiffForNewLayer=0; NightInterceptionFraction=0; ReferenceHeight=0
    SoilArbitrator
  Simulation NT2 mungbean -  putland planting 4
    Clock: Start=1987-01-01; End=1987-06-01
    Summary summaryfile
    Weather: FileName=dd8687.met
    Zone paddock: Area=1; Slope=0; AspectAngle=0; Altitude=50
      Report
      Operations
        1987-02-25  // mungbean sow plants = 33.9,crop_class = plant, row_spacing = 360, sowing_depth = 30, cultivar = putland
      Fertiliser
      Irrigation
      Manager: same as aps18 - berkin weathering -  planting 1.paddock.manager
      Soil: same as NT2 mungbean -  king planting 1.paddock.soil
      SurfaceOrganicMatter: InitialResidueName=wheat; InitialResidueType=wheat; InitialResidueMass=500; InitialStandingFraction=0; InitialCPR=0; InitialCNR=40
      Plant mungbean: ResourceName=Mungbean
      MicroClimate: a_interception=0; b_interception=1; c_interception=0; d_interception=0; soil_albedo=0.3; SoilHeatFluxFraction=0; MinimumHeightDiffForNewLayer=0; NightInterceptionFraction=0; ReferenceHeight=0
    SoilArbitrator
  Simulation NT3 mungbean -  king planting 1
    Clock: Start=1986-09-07; End=1987-05-30
    Summary summaryfile
    Weather: FileName=krc8687.met
    Zone paddock: Area=1; Slope=0; AspectAngle=0; Altitude=50
      Report
      Operations
        1987-01-18  // soilwat2 set sw = 0.19 0.21 0.21 0.223 0.219 0.219 0.219 0.229 0.237
        1987-01-19  // mungbean sow plants = 40,crop_class = plant, row_spacing = 360, sowing_depth = 30, cultivar = king
      Fertiliser
      Irrigation
      Manager: same as aps18 - berkin weathering -  planting 1.paddock.manager
      Soil: same as NT10 mungbean -  king planting 1.paddock.soil
      SurfaceOrganicMatter: InitialResidueName=wheat; InitialResidueType=wheat; InitialResidueMass=500; InitialStandingFraction=0; InitialCPR=0; InitialCNR=40
      Plant mungbean: ResourceName=Mungbean
      MicroClimate: a_interception=0; b_interception=1; c_interception=0; d_interception=0; soil_albedo=0.3; SoilHeatFluxFraction=0; MinimumHeightDiffForNewLayer=0; NightInterceptionFraction=0; ReferenceHeight=0
    SoilArbitrator
  Simulation NT3 mungbean -  king planting 2
    Clock: Start=1986-09-07; End=1987-05-30
    Summary summaryfile
    Weather: FileName=krc8687.met
    Zone paddock: Area=1; Slope=0; AspectAngle=0; Altitude=50
      Report
      Operations
        1987-01-18  // soilwat2 set sw = 0.19 0.21 0.21 0.223 0.219 0.219 0.219 0.229 0.237
        1987-01-30  // mungbean sow plants = 40,crop_class = plant, row_spacing = 360, sowing_depth = 30, cultivar = king
      Fertiliser
      Irrigation
      Manager: same as aps18 - berkin weathering -  planting 1.paddock.manager
      Soil: same as NT10 mungbean -  king planting 1.paddock.soil
      SurfaceOrganicMatter: InitialResidueName=wheat; InitialResidueType=wheat; InitialResidueMass=500; InitialStandingFraction=0; InitialCPR=0; InitialCNR=40
      Plant mungbean: ResourceName=Mungbean
      MicroClimate: a_interception=0; b_interception=1; c_interception=0; d_interception=0; soil_albedo=0.3; SoilHeatFluxFraction=0; MinimumHeightDiffForNewLayer=0; NightInterceptionFraction=0; ReferenceHeight=0
    SoilArbitrator
  Simulation NT3 mungbean -  king planting 3
    Clock: Start=1986-09-07; End=1987-05-30
    Summary summaryfile
    Weather: FileName=krc8687.met
    Zone paddock: Area=1; Slope=0; AspectAngle=0; Altitude=50
      Report
      Operations
        1987-01-18  // soilwat2 set sw = 0.19 0.21 0.21 0.223 0.219 0.219 0.219 0.229 0.237
        1987-02-15  // mungbean sow plants = 40,crop_class = plant, row_spacing = 360, sowing_depth = 30, cultivar = king
      Fertiliser
      Irrigation
      Manager: same as aps18 - berkin weathering -  planting 1.paddock.manager
      Soil: same as NT10 mungbean -  king planting 1.paddock.soil
      SurfaceOrganicMatter: InitialResidueName=wheat; InitialResidueType=wheat; InitialResidueMass=500; InitialStandingFraction=0; InitialCPR=0; InitialCNR=40
      Plant mungbean: ResourceName=Mungbean
      MicroClimate: a_interception=0; b_interception=1; c_interception=0; d_interception=0; soil_albedo=0.3; SoilHeatFluxFraction=0; MinimumHeightDiffForNewLayer=0; NightInterceptionFraction=0; ReferenceHeight=0
    SoilArbitrator
  Simulation NT3 mungbean -  shantung planting 1
    Clock: Start=1986-09-07; End=1987-05-30
    Summary summaryfile
    Weather: FileName=krc8687.met
    Zone paddock: Area=1; Slope=0; AspectAngle=0; Altitude=50
      Report
      Operations
        1987-01-18  // soilwat2 set sw = 0.19 0.21 0.21 0.223 0.219 0.219 0.219 0.229 0.237
        1987-01-19  // mungbean sow plants = 40,crop_class = plant, row_spacing = 360, sowing_depth = 30, cultivar = shangtung
      Fertiliser
      Irrigation
      Manager: same as aps18 - berkin weathering -  planting 1.paddock.manager
      Soil: same as NT10 mungbean -  king planting 1.paddock.soil
      SurfaceOrganicMatter: InitialResidueName=wheat; InitialResidueType=wheat; InitialResidueMass=500; InitialStandingFraction=0; InitialCPR=0; InitialCNR=40
      Plant mungbean: ResourceName=Mungbean
      MicroClimate: a_interception=0; b_interception=1; c_interception=0; d_interception=0; soil_albedo=0.3; SoilHeatFluxFraction=0; MinimumHeightDiffForNewLayer=0; NightInterceptionFraction=0; ReferenceHeight=0
    SoilArbitrator
  Simulation NT3 mungbean -  shantung planting 2
    Clock: Start=1986-09-07; End=1987-05-30
    Summary summaryfile
    Weather: FileName=krc8687.met
    Zone paddock: Area=1; Slope=0; AspectAngle=0; Altitude=50
      Report
      Operations
        1987-01-18  // soilwat2 set sw = 0.19 0.21 0.21 0.223 0.219 0.219 0.219 0.229 0.237
        1987-01-30  // mungbean sow plants = 40,crop_class = plant, row_spacing = 360, sowing_depth = 30, cultivar = shangtung
      Fertiliser
      Irrigation
      Manager: same as aps18 - berkin weathering -  planting 1.paddock.manager
      Soil: same as NT10 mungbean -  king planting 1.paddock.soil
      SurfaceOrganicMatter: InitialResidueName=wheat; InitialResidueType=wheat; InitialResidueMass=500; InitialStandingFraction=0; InitialCPR=0; InitialCNR=40
      Plant mungbean: ResourceName=Mungbean
      MicroClimate: a_interception=0; b_interception=1; c_interception=0; d_interception=0; soil_albedo=0.3; SoilHeatFluxFraction=0; MinimumHeightDiffForNewLayer=0; NightInterceptionFraction=0; ReferenceHeight=0
    SoilArbitrator
  Simulation NT3 mungbean -  shantung planting 3
    Clock: Start=1986-09-07; End=1987-05-30
    Summary summaryfile
    Weather: FileName=krc8687.met
    Zone paddock: Area=1; Slope=0; AspectAngle=0; Altitude=50
      Report
      Operations
        1987-01-18  // soilwat2 set sw = 0.19 0.21 0.21 0.223 0.219 0.219 0.219 0.229 0.237
        1987-02-15  // mungbean sow plants = 40,crop_class = plant, row_spacing = 360, sowing_depth = 30, cultivar = shangtung
      Fertiliser
      Irrigation
      Manager: same as aps18 - berkin weathering -  planting 1.paddock.manager
      Soil: same as NT10 mungbean -  king planting 1.paddock.soil
      SurfaceOrganicMatter: InitialResidueName=wheat; InitialResidueType=wheat; InitialResidueMass=500; InitialStandingFraction=0; InitialCPR=0; InitialCNR=40
      Plant mungbean: ResourceName=Mungbean
      MicroClimate: a_interception=0; b_interception=1; c_interception=0; d_interception=0; soil_albedo=0.3; SoilHeatFluxFraction=0; MinimumHeightDiffForNewLayer=0; NightInterceptionFraction=0; ReferenceHeight=0
    SoilArbitrator
  Simulation NT4 mungbean -  king planting 1
    Clock: Start=1989-09-07; End=1990-05-30
    Summary summaryfile
    Weather: FileName=krs8990.met
    Zone paddock: Area=1; Slope=0; AspectAngle=0; Altitude=50
      Report
      Operations
        1989-09-07  // soilwat2 set sw = 0.19 0.21 0.21 0.223 0.219 0.219 0.219 0.229 0.237
        1990-01-01  // residue2 set residue_wt = 4000.0
        1990-01-04  // mungbean sow plants = 40, sowing_depth = 30, cultivar = king ,crop_class = plant
        1989-12-22  // irrigate apply amount = 37.0
        1989-12-24  // irrigate apply amount = 25.0
        1989-12-27  // irrigate apply amount = 35.0
        1990-01-03  // irrigate apply amount = 15.0
        1990-01-04  // irrigate apply amount = 15.0
        1990-01-06  // irrigate apply amount = 8.0
        1990-01-17  // irrigate apply amount = 10.0
        1990-01-20  // irrigate apply amount = 23.0
        1990-01-26  // irrigate apply amount = 6.0
        1990-01-30  // irrigate apply amount = 7.0
        1990-02-06  // irrigate apply amount = 21.0
        1990-02-09  // irrigate apply amount = 16.0
        1990-02-13  // irrigate apply amount = 15.0
      Fertiliser
      Irrigation
      Manager: same as aps18 - berkin weathering -  planting 1.paddock.manager
      Soil: same as NT10 mungbean -  king planting 1.paddock.soil
      SurfaceOrganicMatter: InitialResidueName=wheat; InitialResidueType=wheat; InitialResidueMass=500; InitialStandingFraction=0; InitialCPR=0; InitialCNR=40
      Plant mungbean: ResourceName=Mungbean
      MicroClimate: a_interception=0; b_interception=1; c_interception=0; d_interception=0; soil_albedo=0.3; SoilHeatFluxFraction=0; MinimumHeightDiffForNewLayer=0; NightInterceptionFraction=0; ReferenceHeight=0
    SoilArbitrator
  Simulation NT4 mungbean -  king planting 2
    Clock: Start=1989-09-07; End=1990-05-30
    Summary summaryfile
    Weather: FileName=krs8990.met
    Zone paddock: Area=1; Slope=0; AspectAngle=0; Altitude=50
      Report
      Operations
        1989-09-07  // soilwat2 set sw = 0.19 0.21 0.21 0.223 0.219 0.219 0.219 0.229 0.237
        1990-01-01  // residue2 set residue_wt = 4000.0
        1990-01-17  // mungbean sow plants = 40, sowing_depth = 30, cultivar = king ,crop_class = plant
        1989-12-22  // irrigate apply amount = 37.0
        1989-12-24  // irrigate apply amount = 25.0
        1989-12-27  // irrigate apply amount = 35.0
        1990-01-03  // irrigate apply amount = 15.0
        1990-01-04  // irrigate apply amount = 15.0
        1990-01-06  // irrigate apply amount = 8.0
        1990-01-17  // irrigate apply amount = 10.0
        1990-01-20  // irrigate apply amount = 23.0
        1990-01-26  // irrigate apply amount = 6.0
        1990-01-30  // irrigate apply amount = 7.0
        1990-02-06  // irrigate apply amount = 21.0
        1990-02-09  // irrigate apply amount = 16.0
        1990-02-13  // irrigate apply amount = 15.0
      Fertiliser
      Irrigation
      Manager: same as aps18 - berkin weathering -  planting 1.paddock.manager
      Soil: same as NT10 mungbean -  king planting 1.paddock.soil
      SurfaceOrganicMatter: InitialResidueName=wheat; InitialResidueType=wheat; InitialResidueMass=500; InitialStandingFraction=0; InitialCPR=0; InitialCNR=40
      Plant mungbean: ResourceName=Mungbean
      MicroClimate: a_interception=0; b_interception=1; c_interception=0; d_interception=0; soil_albedo=0.3; SoilHeatFluxFraction=0; MinimumHeightDiffForNewLayer=0; NightInterceptionFraction=0; ReferenceHeight=0
    SoilArbitrator
  Simulation NT5 mungbean -  king planting 1
    Clock: Start=1990-09-07; End=1991-05-30
    Summary summaryfile
    Weather: FileName=krs9091.met
    Zone paddock: Area=1; Slope=0; AspectAngle=0; Altitude=50
      Report
      Operations
        1990-09-07  // soilwat2 set sw = 0.19 0.21 0.21 0.223 0.219 0.219 0.219 0.229 0.237
        1991-01-15  // mungbean sow plants = 38, sowing_depth = 30, cultivar = king,crop_class = plant
      Fertiliser
      Irrigation
      Manager: same as aps18 - berkin weathering -  planting 1.paddock.manager
      Soil: same as NT10 mungbean -  king planting 1.paddock.soil
      SurfaceOrganicMatter: InitialResidueName=wheat; InitialResidueType=wheat; InitialResidueMass=500; InitialStandingFraction=0; InitialCPR=0; InitialCNR=40
      Plant mungbean: ResourceName=Mungbean
      MicroClimate: a_interception=0; b_interception=1; c_interception=0; d_interception=0; soil_albedo=0.3; SoilHeatFluxFraction=0; MinimumHeightDiffForNewLayer=0; NightInterceptionFraction=0; ReferenceHeight=0
    SoilArbitrator
  Simulation NT5 mungbean -  putland planting 1
    Clock: Start=1990-09-07; End=1991-05-30
    Summary summaryfile
    Weather: FileName=krs9091.met
    Zone paddock: Area=1; Slope=0; AspectAngle=0; Altitude=50
      Report
      Operations
        1990-09-07  // soilwat2 set sw = 0.19 0.21 0.21 0.223 0.219 0.219 0.219 0.229 0.237
        1991-01-15  // mungbean sow plants = 26, sowing_depth = 30, cultivar = putland,crop_class = plant
      Fertiliser
      Irrigation
      Manager: same as aps18 - berkin weathering -  planting 1.paddock.manager
      Soil: same as NT10 mungbean -  king planting 1.paddock.soil
      SurfaceOrganicMatter: InitialResidueName=wheat; InitialResidueType=wheat; InitialResidueMass=500; InitialStandingFraction=0; InitialCPR=0; InitialCNR=40
      Plant mungbean: ResourceName=Mungbean
      MicroClimate: a_interception=0; b_interception=1; c_interception=0; d_interception=0; soil_albedo=0.3; SoilHeatFluxFraction=0; MinimumHeightDiffForNewLayer=0; NightInterceptionFraction=0; ReferenceHeight=0
    SoilArbitrator
  Simulation NT7 mungbean -  king planting 1: same as NT10 mungbean -  putland planting 1
  Simulation NT7 mungbean -  satin planting 1: same as NT10 mungbean -  putland planting 1
  Simulation NT7 mungbean -  shangtung planting 1: same as NT10 mungbean -  putland planting 1
  Simulation NT7 mungbean -  putland planting 1: same as NT10 mungbean -  putland planting 1
  Simulation NT8 mungbean -  king planting 1
    Clock: Start=1987-09-07; End=1988-05-29
    Summary summaryfile
    Weather: FileName=kcc8788.met
    Zone paddock: same as NT10 mungbean -  putland planting 1.paddock
    SoilArbitrator
  Simulation NT8 mungbean -  satin planting 1: same as NT8 mungbean -  king planting 1
  Simulation NT8 mungbean -  shangtung planting 1: same as NT8 mungbean -  king planting 1
  Simulation NT8 mungbean -  putland planting 1: same as NT8 mungbean -  king planting 1
  Simulation NT9 mungbean -  king planting 1
    Clock: Start=1987-09-07; End=1988-05-29
    Summary summaryfile
    Weather: FileName=dd8788.met
    Zone paddock: Area=1; Slope=0; AspectAngle=0; Altitude=50
      Report
      Operations
        1987-09-07  // soilwat2 set sw = 0.19 0.21 0.21 0.223 0.219 0.219 0.219 0.229 0.237
        1988-01-15  // mungbean sow plants = 40, sowing_depth = 30, cultivar = king,crop_class = plant
      Fertiliser
      Irrigation
      Manager: same as aps18 - berkin weathering -  planting 1.paddock.manager
      Soil: same as NT2 mungbean -  king planting 1.paddock.soil
      SurfaceOrganicMatter: InitialResidueName=wheat; InitialResidueType=wheat; InitialResidueMass=500; InitialStandingFraction=0; InitialCPR=0; InitialCNR=40
      Plant mungbean: ResourceName=Mungbean
      MicroClimate: a_interception=0; b_interception=1; c_interception=0; d_interception=0; soil_albedo=0.3; SoilHeatFluxFraction=0; MinimumHeightDiffForNewLayer=0; NightInterceptionFraction=0; ReferenceHeight=0
    SoilArbitrator
  Simulation NT9 mungbean -  king planting 2
    Clock: Start=1987-09-07; End=1988-05-29
    Summary summaryfile
    Weather: FileName=dd8788.met
    Zone paddock: Area=1; Slope=0; AspectAngle=0; Altitude=50
      Report
      Operations
        1987-09-07  // soilwat2 set sw = 0.19 0.21 0.21 0.223 0.219 0.219 0.219 0.229 0.237
        1988-02-02  // mungbean sow plants = 40, sowing_depth = 30, cultivar = king,crop_class = plant
      Fertiliser
      Irrigation
      Manager: same as aps18 - berkin weathering -  planting 1.paddock.manager
      Soil: same as NT2 mungbean -  king planting 1.paddock.soil
      SurfaceOrganicMatter: InitialResidueName=wheat; InitialResidueType=wheat; InitialResidueMass=500; InitialStandingFraction=0; InitialCPR=0; InitialCNR=40
      Plant mungbean: ResourceName=Mungbean
      MicroClimate: a_interception=0; b_interception=1; c_interception=0; d_interception=0; soil_albedo=0.3; SoilHeatFluxFraction=0; MinimumHeightDiffForNewLayer=0; NightInterceptionFraction=0; ReferenceHeight=0
    SoilArbitrator
  Simulation NT9 mungbean -  king planting 3
    Clock: Start=1987-09-07; End=1988-05-29
    Summary summaryfile
    Weather: FileName=dd8788.met
    Zone paddock: Area=1; Slope=0; AspectAngle=0; Altitude=50
      Report
      Operations
        1987-09-07  // soilwat2 set sw = 0.19 0.21 0.21 0.223 0.219 0.219 0.219 0.229 0.237
        1988-02-16  // mungbean sow plants = 40, sowing_depth = 30, cultivar = king,crop_class = plant
      Fertiliser
      Irrigation
      Manager: same as aps18 - berkin weathering -  planting 1.paddock.manager
      Soil: same as NT2 mungbean -  king planting 1.paddock.soil
      SurfaceOrganicMatter: InitialResidueName=wheat; InitialResidueType=wheat; InitialResidueMass=500; InitialStandingFraction=0; InitialCPR=0; InitialCNR=40
      Plant mungbean: ResourceName=Mungbean
      MicroClimate: a_interception=0; b_interception=1; c_interception=0; d_interception=0; soil_albedo=0.3; SoilHeatFluxFraction=0; MinimumHeightDiffForNewLayer=0; NightInterceptionFraction=0; ReferenceHeight=0
    SoilArbitrator
  Simulation NT9 mungbean -  satin planting 1
    Clock: Start=1987-09-07; End=1988-05-29
    Summary summaryfile
    Weather: FileName=dd8788.met
    Zone paddock: Area=1; Slope=0; AspectAngle=0; Altitude=50
      Report
      Operations
      Fertiliser
      Irrigation
      Manager: same as aps18 - berkin weathering -  planting 1.paddock.manager
      Soil: same as NT2 mungbean -  king planting 1.paddock.soil
      SurfaceOrganicMatter: InitialResidueName=wheat; InitialResidueType=wheat; InitialResidueMass=500; InitialStandingFraction=0; InitialCPR=0; InitialCNR=40
      Plant mungbean: ResourceName=Mungbean
      MicroClimate: a_interception=0; b_interception=1; c_interception=0; d_interception=0; soil_albedo=0.3; SoilHeatFluxFraction=0; MinimumHeightDiffForNewLayer=0; NightInterceptionFraction=0; ReferenceHeight=0
    SoilArbitrator
  Simulation NT9 mungbean -  satin planting 2
    Clock: Start=1987-09-07; End=1988-05-29
    Summary summaryfile
    Weather: FileName=dd8788.met
    Zone paddock: Area=1; Slope=0; AspectAngle=0; Altitude=50
      Report
      Operations
        1987-09-07  // soilwat2 set sw = 0.19 0.21 0.21 0.223 0.219 0.219 0.219 0.229 0.237
        1988-02-02  // mungbean sow plants = 40, sowing_depth = 30, cultivar = satin,crop_class = plant
      Fertiliser
      Irrigation
      Manager: same as aps18 - berkin weathering -  planting 1.paddock.manager
      Soil: same as NT2 mungbean -  king planting 1.paddock.soil
      SurfaceOrganicMatter: InitialResidueName=wheat; InitialResidueType=wheat; InitialResidueMass=500; InitialStandingFraction=0; InitialCPR=0; InitialCNR=40
      Plant mungbean: ResourceName=Mungbean
      MicroClimate: a_interception=0; b_interception=1; c_interception=0; d_interception=0; soil_albedo=0.3; SoilHeatFluxFraction=0; MinimumHeightDiffForNewLayer=0; NightInterceptionFraction=0; ReferenceHeight=0
    SoilArbitrator
  Simulation NT9 mungbean -  satin planting 3
    Clock: Start=1987-09-07; End=1988-05-29
    Summary summaryfile
    Weather: FileName=dd8788.met
    Zone paddock: Area=1; Slope=0; AspectAngle=0; Altitude=50
      Report
      Operations
        1987-09-07  // soilwat2 set sw = 0.19 0.21 0.21 0.223 0.219 0.219 0.219 0.229 0.237
        1988-02-16  // mungbean sow plants = 40, sowing_depth = 30, cultivar = satin,crop_class = plant
      Fertiliser
      Irrigation
      Manager: same as aps18 - berkin weathering -  planting 1.paddock.manager
      Soil: same as NT2 mungbean -  king planting 1.paddock.soil
      SurfaceOrganicMatter: InitialResidueName=wheat; InitialResidueType=wheat; InitialResidueMass=500; InitialStandingFraction=0; InitialCPR=0; InitialCNR=40
      Plant mungbean: ResourceName=Mungbean
      MicroClimate: a_interception=0; b_interception=1; c_interception=0; d_interception=0; soil_albedo=0.3; SoilHeatFluxFraction=0; MinimumHeightDiffForNewLayer=0; NightInterceptionFraction=0; ReferenceHeight=0
    SoilArbitrator
  Simulation NT9 mungbean -  putland planting 1
    Clock: Start=1987-09-07; End=1988-05-29
    Summary summaryfile
    Weather: FileName=dd8788.met
    Zone paddock: Area=1; Slope=0; AspectAngle=0; Altitude=50
      Report
      Operations
        1987-09-07  // soilwat2 set sw = 0.19 0.21 0.21 0.223 0.219 0.219 0.219 0.229 0.237
        1988-01-15  // mungbean sow plants = 40, sowing_depth = 30, cultivar = putland,crop_class = plant
      Fertiliser
      Irrigation
      Manager: same as aps18 - berkin weathering -  planting 1.paddock.manager
      Soil: same as NT2 mungbean -  king planting 1.paddock.soil
      SurfaceOrganicMatter: InitialResidueName=wheat; InitialResidueType=wheat; InitialResidueMass=500; InitialStandingFraction=0; InitialCPR=0; InitialCNR=40
      Plant mungbean: ResourceName=Mungbean
      MicroClimate: a_interception=0; b_interception=1; c_interception=0; d_interception=0; soil_albedo=0.3; SoilHeatFluxFraction=0; MinimumHeightDiffForNewLayer=0; NightInterceptionFraction=0; ReferenceHeight=0
    SoilArbitrator
  Simulation NT9 mungbean -  putland planting 2
    Clock: Start=1987-09-07; End=1988-06-08
    Summary summaryfile
    Weather: FileName=dd8788.met
    Zone paddock: Area=1; Slope=0; AspectAngle=0; Altitude=50
      Report
      Operations
        1987-09-07  // soilwat2 set sw = 0.19 0.21 0.21 0.223 0.219 0.219 0.219 0.229 0.237
        1988-02-02  // mungbean sow plants = 40, sowing_depth = 30, cultivar = putland,crop_class = plant
      Fertiliser
      Irrigation
      Manager: same as aps18 - berkin weathering -  planting 1.paddock.manager
      Soil: same as NT2 mungbean -  king planting 1.paddock.soil
      SurfaceOrganicMatter: InitialResidueName=wheat; InitialResidueType=wheat; InitialResidueMass=500; InitialStandingFraction=0; InitialCPR=0; InitialCNR=40
      Plant mungbean: ResourceName=Mungbean
      MicroClimate: a_interception=0; b_interception=1; c_interception=0; d_interception=0; soil_albedo=0.3; SoilHeatFluxFraction=0; MinimumHeightDiffForNewLayer=0; NightInterceptionFraction=0; ReferenceHeight=0
    SoilArbitrator
  Simulation NT9 mungbean -  putland planting 3
    Clock: Start=1987-09-07; End=1988-06-18
    Summary summaryfile
    Weather: FileName=dd8788.met
    Zone paddock: Area=1; Slope=0; AspectAngle=0; Altitude=50
      Report
      Operations
        1987-09-07  // soilwat2 set sw = 0.19 0.21 0.21 0.223 0.219 0.219 0.219 0.229 0.237
        1988-02-16  // mungbean sow plants = 40, sowing_depth = 30, cultivar = putland,crop_class = plant
      Fertiliser
      Irrigation
      Manager: same as aps18 - berkin weathering -  planting 1.paddock.manager
      Soil: same as NT2 mungbean -  king planting 1.paddock.soil
      SurfaceOrganicMatter: InitialResidueName=wheat; InitialResidueType=wheat; InitialResidueMass=500; InitialStandingFraction=0; InitialCPR=0; InitialCNR=40
      Plant mungbean: ResourceName=Mungbean
      MicroClimate: a_interception=0; b_interception=1; c_interception=0; d_interception=0; soil_albedo=0.3; SoilHeatFluxFraction=0; MinimumHeightDiffForNewLayer=0; NightInterceptionFraction=0; ReferenceHeight=0
    SoilArbitrator
  Simulation RCM1_1: 1 April 1980 sowing 35 plants-m2, 25 cm rows
    Clock: Start=1980-03-31; End=1980-06-18
    Summary summaryfile
    Weather: FileName=kunucli.dat
    Zone paddock: Area=1; Slope=0; AspectAngle=0; Altitude=50
      Report
      Operations
        1980-03-31  // mungbean sow plants = 35, sowing_depth = 40, cultivar = berken,crop_class = plant, row_spacing = 250
      Fertiliser
      Irrigation
      Manager: same as aps18 - berkin weathering -  planting 1.paddock.manager
      Soil: same as NT10 mungbean -  king planting 1.paddock.soil
      SurfaceOrganicMatter: InitialResidueName=wheat; InitialResidueType=wheat; InitialResidueMass=500; InitialStandingFraction=0; InitialCPR=0; InitialCNR=40
      Plant mungbean: ResourceName=Mungbean
      MicroClimate: a_interception=0; b_interception=1; c_interception=0; d_interception=0; soil_albedo=0.3; SoilHeatFluxFraction=0; MinimumHeightDiffForNewLayer=0; NightInterceptionFraction=0; ReferenceHeight=0
    SoilArbitrator
  Simulation RCM1_2: 1 April 1980 sowing 35 plants-m2, 25 cm rows
    Clock: Start=1980-03-31; End=1980-06-18
    Summary summaryfile
    Weather: FileName=kunucli.dat
    Zone paddock: Area=1; Slope=0; AspectAngle=0; Altitude=50
      Report
      Operations
        1980-03-31  // mungbean sow plants = 35, sowing_depth = 40, cultivar = berken,crop_class = plant, row_spacing = 250
        1980-04-07  // irrigate apply amount = 50
        1980-04-14  // irrigate apply amount = 50
      Fertiliser
      Irrigation
      Manager: same as aps18 - berkin weathering -  planting 1.paddock.manager
      Soil: same as NT10 mungbean -  king planting 1.paddock.soil
      SurfaceOrganicMatter: InitialResidueName=wheat; InitialResidueType=wheat; InitialResidueMass=500; InitialStandingFraction=0; InitialCPR=0; InitialCNR=40
      Plant mungbean: ResourceName=Mungbean
      MicroClimate: a_interception=0; b_interception=1; c_interception=0; d_interception=0; soil_albedo=0.3; SoilHeatFluxFraction=0; MinimumHeightDiffForNewLayer=0; NightInterceptionFraction=0; ReferenceHeight=0
    SoilArbitrator
  Simulation RCM1_3: 1 April 1980 sowing 35 plants-m2, 25 cm rows
    Clock: Start=1980-03-31; End=1980-06-18
    Summary summaryfile
    Weather: FileName=kunucli.dat
    Zone paddock: Area=1; Slope=0; AspectAngle=0; Altitude=50
      Report
      Operations
        1980-03-31  // mungbean sow plants = 35, sowing_depth = 40, cultivar = berken,crop_class = plant, row_spacing = 250
        1980-04-07  // irrigate apply amount = 50
        1980-04-14  // irrigate apply amount = 50
        1980-04-21  // irrigate apply amount = 50
        1980-04-28  // irrigate apply amount = 50
        1980-05-05  // irrigate apply amount = 50
      Fertiliser
      Irrigation
      Manager: same as aps18 - berkin weathering -  planting 1.paddock.manager
      Soil: same as NT10 mungbean -  king planting 1.paddock.soil
      SurfaceOrganicMatter: InitialResidueName=wheat; InitialResidueType=wheat; InitialResidueMass=500; InitialStandingFraction=0; InitialCPR=0; InitialCNR=40
      Plant mungbean: ResourceName=Mungbean
      MicroClimate: a_interception=0; b_interception=1; c_interception=0; d_interception=0; soil_albedo=0.3; SoilHeatFluxFraction=0; MinimumHeightDiffForNewLayer=0; NightInterceptionFraction=0; ReferenceHeight=0
    SoilArbitrator
  Simulation RCM2_1: 11 January 1980 sowing 10 plants-m2, 25 cm rows
    Clock: Start=1980-01-11; End=1980-03-30
    Summary summaryfile
    Weather: FileName=kunucli.dat
    Zone paddock: Area=1; Slope=0; AspectAngle=0; Altitude=50
      Report
      Operations
        1980-01-11  // mungbean sow plants = 10, sowing_depth = 40, cultivar = berken,crop_class = plant, row_spacing = 250
      Fertiliser
      Irrigation
      Manager: same as aps18 - berkin weathering -  planting 1.paddock.manager
      Soil: same as aps18 - king weathering -  planting 1.paddock.soil
      SurfaceOrganicMatter: InitialResidueName=wheat; InitialResidueType=wheat; InitialResidueMass=500; InitialStandingFraction=0; InitialCPR=0; InitialCNR=40
      Plant mungbean: ResourceName=Mungbean
      MicroClimate: a_interception=0; b_interception=1; c_interception=0; d_interception=0; soil_albedo=0.3; SoilHeatFluxFraction=0; MinimumHeightDiffForNewLayer=0; NightInterceptionFraction=0; ReferenceHeight=0
    SoilArbitrator
  Simulation RCM2_2: 11 January 1980 sowing 19 plants-m2, 25 cm rows
    Clock: Start=1980-01-11; End=1980-03-30
    Summary summaryfile
    Weather: FileName=kunucli.dat
    Zone paddock: Area=1; Slope=0; AspectAngle=0; Altitude=50
      Report
      Operations
        1980-01-11  // mungbean sow plants = 19, sowing_depth = 40, cultivar = berken,crop_class = plant, row_spacing = 250
      Fertiliser
      Irrigation
      Manager: same as aps18 - berkin weathering -  planting 1.paddock.manager
      Soil: same as aps18 - king weathering -  planting 1.paddock.soil
      SurfaceOrganicMatter: InitialResidueName=wheat; InitialResidueType=wheat; InitialResidueMass=500; InitialStandingFraction=0; InitialCPR=0; InitialCNR=40
      Plant mungbean: ResourceName=Mungbean
      MicroClimate: a_interception=0; b_interception=1; c_interception=0; d_interception=0; soil_albedo=0.3; SoilHeatFluxFraction=0; MinimumHeightDiffForNewLayer=0; NightInterceptionFraction=0; ReferenceHeight=0
    SoilArbitrator
  Simulation RCM2_3: 11 January 1980 sowing 27 plants-m2, 25 cm rows
    Clock: Start=1980-01-11; End=1980-03-30
    Summary summaryfile
    Weather: FileName=kunucli.dat
    Zone paddock: Area=1; Slope=0; AspectAngle=0; Altitude=50
      Report
      Operations
        1980-01-11  // mungbean sow plants = 27, sowing_depth = 40, cultivar = berken,crop_class = plant, row_spacing = 250
      Fertiliser
      Irrigation
      Manager: same as aps18 - berkin weathering -  planting 1.paddock.manager
      Soil: same as aps18 - king weathering -  planting 1.paddock.soil
      SurfaceOrganicMatter: InitialResidueName=wheat; InitialResidueType=wheat; InitialResidueMass=500; InitialStandingFraction=0; InitialCPR=0; InitialCNR=40
      Plant mungbean: ResourceName=Mungbean
      MicroClimate: a_interception=0; b_interception=1; c_interception=0; d_interception=0; soil_albedo=0.3; SoilHeatFluxFraction=0; MinimumHeightDiffForNewLayer=0; NightInterceptionFraction=0; ReferenceHeight=0
    SoilArbitrator
  Simulation RCM2_4: 11 January 1980 sowing 39 plants-m2, 25 cm rows
    Clock: Start=1980-01-11; End=1980-03-30
    Summary summaryfile
    Weather: FileName=kunucli.dat
    Zone paddock: Area=1; Slope=0; AspectAngle=0; Altitude=50
      Report
      Operations
        1980-01-11  // mungbean sow plants = 39, sowing_depth = 40, cultivar = berken,crop_class = plant, row_spacing = 250
      Fertiliser
      Irrigation
      Manager: same as aps18 - berkin weathering -  planting 1.paddock.manager
      Soil: same as aps18 - king weathering -  planting 1.paddock.soil
      SurfaceOrganicMatter: InitialResidueName=wheat; InitialResidueType=wheat; InitialResidueMass=500; InitialStandingFraction=0; InitialCPR=0; InitialCNR=40
      Plant mungbean: ResourceName=Mungbean
      MicroClimate: a_interception=0; b_interception=1; c_interception=0; d_interception=0; soil_albedo=0.3; SoilHeatFluxFraction=0; MinimumHeightDiffForNewLayer=0; NightInterceptionFraction=0; ReferenceHeight=0
    SoilArbitrator
  Simulation RCM2_5: 11 January 1980 sowing 50 plants-m2, 25 cm rows
    Clock: Start=1980-01-11; End=1980-03-30
    Summary summaryfile
    Weather: FileName=kunucli.dat
    Zone paddock: Area=1; Slope=0; AspectAngle=0; Altitude=50
      Report
      Operations
        1980-01-11  // mungbean sow plants = 50, sowing_depth = 40, cultivar = berken,crop_class = plant, row_spacing = 250
      Fertiliser
      Irrigation
      Manager: same as aps18 - berkin weathering -  planting 1.paddock.manager
      Soil: same as aps18 - king weathering -  planting 1.paddock.soil
      SurfaceOrganicMatter: InitialResidueName=wheat; InitialResidueType=wheat; InitialResidueMass=500; InitialStandingFraction=0; InitialCPR=0; InitialCNR=40
      Plant mungbean: ResourceName=Mungbean
      MicroClimate: a_interception=0; b_interception=1; c_interception=0; d_interception=0; soil_albedo=0.3; SoilHeatFluxFraction=0; MinimumHeightDiffForNewLayer=0; NightInterceptionFraction=0; ReferenceHeight=0
    SoilArbitrator
  Simulation RCM - sowing 2 1987-88 at Katherine 1 Dec 1987
    Clock: Start=1987-12-01; End=1988-02-19
    Summary summaryfile
    Weather: FileName=kath8788.met
    Zone paddock: Area=1; Slope=0; AspectAngle=0; Altitude=50
      Report
      Operations
        1987-12-01  // mungbean sow plants = 18, sowing_depth = 40, cultivar = king,crop_class = plant, row_spacing = 500
        1987-12-07  // irrigate apply amount = 12
        1987-12-08  // irrigate apply amount = 15
        1987-12-10  // irrigate apply amount = 15
      Fertiliser
      Irrigation
      Manager: same as aps18 - berkin weathering -  planting 1.paddock.manager
      Soil: same as NT10 mungbean -  king planting 1.paddock.soil
      SurfaceOrganicMatter: InitialResidueName=wheat; InitialResidueType=wheat; InitialResidueMass=500; InitialStandingFraction=0; InitialCPR=0; InitialCNR=40
      Plant mungbean: ResourceName=Mungbean
      MicroClimate: a_interception=0; b_interception=1; c_interception=0; d_interception=0; soil_albedo=0.3; SoilHeatFluxFraction=0; MinimumHeightDiffForNewLayer=0; NightInterceptionFraction=0; ReferenceHeight=0
    SoilArbitrator
  Simulation RCM - sowing 3 1987-88 at Katherine 5 Jan 1988
    Clock: Start=1988-01-04; End=1988-03-25
    Summary summaryfile
    Weather: FileName=kath8788.met
    Zone paddock: Area=1; Slope=0; AspectAngle=0; Altitude=50
      Report
      Operations
        1988-01-05  // mungbean sow plants = 35, sowing_depth = 40, cultivar = king,crop_class = plant, row_spacing = 360
        1988-01-06  // irrigate apply amount = 11
        1988-01-08  // irrigate apply amount = 13
        1988-01-07  // irrigate apply amount = 12
        1988-01-13  // irrigate apply amount = 25
        1988-01-18  // irrigate apply amount = 33
      Fertiliser
      Irrigation
      Manager: same as aps18 - berkin weathering -  planting 1.paddock.manager
      Soil: same as NT10 mungbean -  king planting 1.paddock.soil
      SurfaceOrganicMatter: InitialResidueName=wheat; InitialResidueType=wheat; InitialResidueMass=500; InitialStandingFraction=0; InitialCPR=0; InitialCNR=40
      Plant mungbean: ResourceName=Mungbean
      MicroClimate: a_interception=0; b_interception=1; c_interception=0; d_interception=0; soil_albedo=0.3; SoilHeatFluxFraction=0; MinimumHeightDiffForNewLayer=0; NightInterceptionFraction=0; ReferenceHeight=0
    SoilArbitrator
  Simulation RCM - sowing 3 1987-88 at Katherine 5 Jan 19881
    Clock: Start=1988-01-04; End=1988-03-25
    Summary summaryfile
    Weather: FileName=kath8788.met
    Zone paddock: Area=1; Slope=0; AspectAngle=0; Altitude=50
      Report
      Operations
        1988-01-05  // mungbean sow plants = 35, sowing_depth = 40, cultivar = king,crop_class = plant, row_spacing = 360
        1988-01-06  // irrigate apply amount = 11
      Fertiliser
      Irrigation
      Manager: same as aps18 - berkin weathering -  planting 1.paddock.manager
      Soil: same as NT10 mungbean -  king planting 1.paddock.soil
      SurfaceOrganicMatter: InitialResidueName=wheat; InitialResidueType=wheat; InitialResidueMass=500; InitialStandingFraction=0; InitialCPR=0; InitialCNR=40
      Plant mungbean: ResourceName=Mungbean
      MicroClimate: a_interception=0; b_interception=1; c_interception=0; d_interception=0; soil_albedo=0.3; SoilHeatFluxFraction=0; MinimumHeightDiffForNewLayer=0; NightInterceptionFraction=0; ReferenceHeight=0
    SoilArbitrator
  Simulation RCM - sowing 1 1989 at Katherine 10 Jan 1989
    Clock: Start=1989-01-10; End=1989-04-20
    Summary summaryfile
    Weather: FileName=kath89.met
    Zone paddock: Area=1; Slope=0; AspectAngle=0; Altitude=50
      Report
      Operations
        1989-01-10  // mungbean sow plants = 35, sowing_depth = 40, cultivar = king,crop_class = plant, row_spacing = 360
        1989-01-15  // irrigate apply amount = 17
      Fertiliser
      Irrigation
      Manager: same as aps18 - berkin weathering -  planting 1.paddock.manager
      Soil: same as NT10 mungbean -  king planting 1.paddock.soil
      SurfaceOrganicMatter: InitialResidueName=wheat; InitialResidueType=wheat; InitialResidueMass=500; InitialStandingFraction=0; InitialCPR=0; InitialCNR=40
      Plant mungbean: ResourceName=Mungbean
      MicroClimate: a_interception=0; b_interception=1; c_interception=0; d_interception=0; soil_albedo=0.3; SoilHeatFluxFraction=0; MinimumHeightDiffForNewLayer=0; NightInterceptionFraction=0; ReferenceHeight=0
    SoilArbitrator
  Simulation RCM - sowing 2 1989 at Katherine 7 Feb 1989
    Clock: Start=1989-02-07; End=1989-04-22
    Summary summaryfile
    Weather: FileName=kath89.met
    Zone paddock: Area=1; Slope=0; AspectAngle=0; Altitude=50
      Report
      Operations
        1989-02-07  // mungbean sow plants = 35, sowing_depth = 40, cultivar = king,crop_class = plant, row_spacing = 360
      Fertiliser
      Irrigation
      Manager: same as aps18 - berkin weathering -  planting 1.paddock.manager
      Soil: same as NT10 mungbean -  king planting 1.paddock.soil
      SurfaceOrganicMatter: InitialResidueName=wheat; InitialResidueType=wheat; InitialResidueMass=500; InitialStandingFraction=0; InitialCPR=0; InitialCNR=40
      Plant mungbean: ResourceName=Mungbean
      MicroClimate: a_interception=0; b_interception=1; c_interception=0; d_interception=0; soil_albedo=0.3; SoilHeatFluxFraction=0; MinimumHeightDiffForNewLayer=0; NightInterceptionFraction=0; ReferenceHeight=0
    SoilArbitrator
  Simulation RCM - sowing 3 1989 at Katherine 28 Feb 1989 Irrigated
    Clock: Start=1989-02-28; End=1989-05-10
    Summary summaryfile
    Weather: FileName=kath89.met
    Zone paddock: Area=1; Slope=0; AspectAngle=0; Altitude=50
      Report
      Operations
        1989-02-28  // mungbean sow plants = 35, sowing_depth = 40, cultivar = king,crop_class = plant, row_spacing = 360
        1989-04-05  // irrigate apply amount = 26
        1989-04-07  // irrigate apply amount = 30
        1989-04-10  // irrigate apply amount = 14
        1989-04-12  // irrigate apply amount = 24
        1989-04-15  // irrigate apply amount = 42
        1989-04-19  // irrigate apply amount = 13
        1989-04-22  // irrigate apply amount = 27
        1989-04-26  // irrigate apply amount = 32
        1989-04-29  // irrigate apply amount = 43
        1989-05-06  // irrigate apply amount = 39
        1989-05-10  // irrigate apply amount = 35
        1989-05-13  // irrigate apply amount = 34
        1989-05-17  // irrigate apply amount = 33
        1989-05-20  // irrigate apply amount = 38
        1989-05-24  // irrigate apply amount = 34
        1989-05-27  // irrigate apply amount = 33
        1989-05-31  // irrigate apply amount = 34
        1989-06-03  // irrigate apply amount = 28
        1989-06-07  // irrigate apply amount = 27
        1989-06-10  // irrigate apply amount = 27
        1989-06-15  // irrigate apply amount = 28
        1989-06-17  // irrigate apply amount = 26
        1989-06-21  // irrigate apply amount = 23
        1989-06-24  // irrigate apply amount = 22
      Fertiliser
      Irrigation
      Manager: same as aps18 - berkin weathering -  planting 1.paddock.manager
      Soil: same as NT10 mungbean -  king planting 1.paddock.soil
      SurfaceOrganicMatter: InitialResidueName=wheat; InitialResidueType=wheat; InitialResidueMass=500; InitialStandingFraction=0; InitialCPR=0; InitialCNR=40
      Plant mungbean: ResourceName=Mungbean
      MicroClimate: a_interception=0; b_interception=1; c_interception=0; d_interception=0; soil_albedo=0.3; SoilHeatFluxFraction=0; MinimumHeightDiffForNewLayer=0; NightInterceptionFraction=0; ReferenceHeight=0
    SoilArbitrator
  Simulation RCM - sowing 3 1989 at Katherine 28 Feb 1989 Rainfed
    Clock: Start=1989-02-28; End=1989-05-10
    Summary summaryfile
    Weather: FileName=kath89.met
    Zone paddock: Area=1; Slope=0; AspectAngle=0; Altitude=50
      Report
      Operations
        1989-02-28  // mungbean sow plants = 35, sowing_depth = 40, cultivar = king,crop_class = plant, row_spacing = 360
        1989-04-19  // irrigate apply amount = 44
        1989-05-20  // irrigate apply amount = 38
      Fertiliser
      Irrigation
      Manager: same as aps18 - berkin weathering -  planting 1.paddock.manager
      Soil: same as NT10 mungbean -  king planting 1.paddock.soil
      SurfaceOrganicMatter: InitialResidueName=wheat; InitialResidueType=wheat; InitialResidueMass=500; InitialStandingFraction=0; InitialCPR=0; InitialCNR=40
      Plant mungbean: ResourceName=Mungbean
      MicroClimate: a_interception=0; b_interception=1; c_interception=0; d_interception=0; soil_albedo=0.3; SoilHeatFluxFraction=0; MinimumHeightDiffForNewLayer=0; NightInterceptionFraction=0; ReferenceHeight=0
    SoilArbitrator
  Simulation RCM - sowing 1990 at Gatton 9 Jan 1990
    Clock: Start=1990-01-09; End=1990-04-05
    Summary summaryfile
    Weather: FileName=gatt90.met
    Zone paddock: Area=1; Slope=0; AspectAngle=0; Altitude=50
      Report
      Operations
        1990-01-09  // mungbean sow plants = 35, sowing_depth = 40, cultivar = king,crop_class = plant, row_spacing = 360
        1990-01-10  // irrigate apply amount = 18
        1990-01-13  // irrigate apply amount = 25
        1990-01-23  // irrigate apply amount = 10
        1990-01-24  // irrigate apply amount = 11
        1990-01-26  // irrigate apply amount = 16
        1990-01-31  // irrigate apply amount = 14
        1990-02-02  // irrigate apply amount = 23
        1990-02-16  // irrigate apply amount = 26
        1990-03-01  // irrigate apply amount = 31
        1990-03-08  // irrigate apply amount = 21
        1990-03-12  // irrigate apply amount = 26
        1990-03-16  // irrigate apply amount = 24
        1990-03-21  // irrigate apply amount = 10
        1990-03-23  // irrigate apply amount = 25
      Fertiliser
      Irrigation
      Manager: same as aps18 - berkin weathering -  planting 1.paddock.manager
      Soil: Latitude=0; Longitude=0
        InitialWater Initial water: PercentMethod=1; FractionFull=1
        Physical
          Thickness  BD   AirDry  LL15  DUL    SAT
          150        1.2  0.1     0.2   0.413  0.453
          150        1.2  0.26    0.28  0.454  0.504
          300        1.2  0.32    0.34  0.495  0.545
          300        1.2  0.3     0.32  0.495  0.545
          300        1.3  0.27    0.29  0.418  0.468
          300        1.3  0.24    0.26  0.406  0.457
          300        1.3  0.31    0.33  0.385  0.435
          SoilCrop MungbeanSoil: LL=[0.2, 0.28, 0.34, 0.34, 0.34, 0.4, 0.38]; KL=[0.08, 0.06, 0.04, 0.08, 0.06, 0.04, 0.02]; XF=[1, 1, 1, 0, 0, 0, 0]
        WaterBalance SoilWater: SummerDate=1-Nov; SummerU=6; SummerCona=3.5; WinterDate=1-Apr; WinterU=6; WinterCona=3.5; DiffusConst=40; DiffusSlope=16; Salb=0.13; CN2Bare=75; CNRed=20; CNCov=0.8; DischargeWidth=5; CatchmentArea=10; Thickness=[150, 150, 300, 300, 300, 300, 300]; SWCON=[0.3, 0.3, 0.3, 0.3, 0.3, 0.3, 0.3]
        SoilNitrogen: same as aps18 - berkin weathering -  planting 1.paddock.soil.SoilNitrogen
        CERESSoilTemperature Temperature
        Organic: FOMCNRatio=33
          Thickness  Carbon  SoilCNRatio  FBiom  FInert  FOM
          150        1       14.5         0.05   0.39    0
          150        0.64    14.5         0.02   0.47    0
          300        0.64    14.5         0.015  0.6     0
          300        0.47    14.5         0.01   0.83    0
          300        0.47    14.5         0.01   0.93    0
          300        0.35    14.5         0.01   0.93    0
          300        0.26    14.5         0.01   0.93    0
        Chemical
          Thickness  NO3N  NH4N  PH
          150        2     1     6.5
          150        2     1     6.2
          300        2     1     6.2
          300        2     1     6.3
          300        2     1     6.3
          300        2     1     6.4
          300        2     1     6.5
      SurfaceOrganicMatter: InitialResidueName=wheat; InitialResidueType=wheat; InitialResidueMass=500; InitialStandingFraction=0; InitialCPR=0; InitialCNR=40
      Plant mungbean: ResourceName=Mungbean
      MicroClimate: a_interception=0; b_interception=1; c_interception=0; d_interception=0; soil_albedo=0.3; SoilHeatFluxFraction=0; MinimumHeightDiffForNewLayer=0; NightInterceptionFraction=0; ReferenceHeight=0
    SoilArbitrator
  Simulation RJL1_1: Irrigated sown 10 Dec 1976-77 Dalby after winter cereal
    Clock: Start=1976-09-25; End=1977-03-11
    Summary summaryfile
    Weather: FileName=dalby25.met
    Zone paddock: Area=1; Slope=0; AspectAngle=0; Altitude=50
      Report
      Operations
        1976-09-25  // soilwat2 set sw = 0.220 0.342 0.385 0.386 0.429 0.430 0.430
        1976-09-25  // surfaceom add_surfaceom dlt_residue_wt = 1500, dlt_residue_type = wheat, dlt_residue_cnr = 70
        1976-12-09  // mungbean sow plants = 18.5, sowing_depth = 40, cultivar = berken,crop_class = plant, row_spacing = 600
        1976-12-14  // irrigate apply amount = 30
        1977-01-05  // irrigate apply amount = 30
        1977-01-28  // irrigate apply amount = 30
        1977-02-03  // irrigate apply amount = 30
        1977-02-19  // irrigate apply amount = 30
      Fertiliser
      Irrigation
      Manager: same as aps18 - berkin weathering -  planting 1.paddock.manager
      Soil: same as aps20 - mungbean satin f5.paddock.soil
      SurfaceOrganicMatter: InitialResidueName=wheat; InitialResidueType=wheat; InitialResidueMass=500; InitialStandingFraction=0; InitialCPR=0; InitialCNR=40
      Plant mungbean: ResourceName=Mungbean
      MicroClimate: a_interception=0; b_interception=1; c_interception=0; d_interception=0; soil_albedo=0.3; SoilHeatFluxFraction=0; MinimumHeightDiffForNewLayer=0; NightInterceptionFraction=0; ReferenceHeight=0
    SoilArbitrator
  Simulation RJL1_2: Double-cropped sown 10 Dec 1976-77 Dalby after winter cereal
    Clock: Start=1976-09-25; End=1977-03-11
    Summary summaryfile
    Weather: FileName=dalby25.met
    Zone paddock: Area=1; Slope=0; AspectAngle=0; Altitude=50
      Report
      Operations
        1976-09-25  // soilwat2 set sw = 0.220 0.342 0.385 0.386 0.429 0.430 0.430
        1976-09-25  // surfaceom add_surfaceom dlt_residue_wt = 1500, dlt_residue_type = wheat, dlt_residue_cnr = 70
        1976-12-09  // mungbean sow plants = 18.5, sowing_depth = 40, cultivar = berken,crop_class = plant, row_spacing = 600
      Fertiliser
      Irrigation
      Manager: same as aps18 - berkin weathering -  planting 1.paddock.manager
      Soil: same as aps20 - mungbean satin f5.paddock.soil
      SurfaceOrganicMatter: InitialResidueName=wheat; InitialResidueType=wheat; InitialResidueMass=500; InitialStandingFraction=0; InitialCPR=0; InitialCNR=40
      Plant mungbean: ResourceName=Mungbean
      MicroClimate: a_interception=0; b_interception=1; c_interception=0; d_interception=0; soil_albedo=0.3; SoilHeatFluxFraction=0; MinimumHeightDiffForNewLayer=0; NightInterceptionFraction=0; ReferenceHeight=0
    SoilArbitrator
  Simulation RJL1_3: sown 10 Dec 1976-77 Dalby after winter fallow
    Clock: Start=1976-04-09; End=1977-03-11
    Summary summaryfile
    Weather: FileName=dalby25.met
    Zone paddock: Area=1; Slope=0; AspectAngle=0; Altitude=50
      Report
      Operations
        1976-04-09  // soilwat2 set sw = 0.220 0.342 0.385 0.386 0.429 0.430 0.430
        1976-04-09  // surfaceom add_surfaceom dlt_residue_wt = 5000, dlt_residue_type = sorghum, dlt_residue_cnr = 70
        1976-12-09  // mungbean sow plants = 18.5, sowing_depth = 40, cultivar = berken,crop_class = plant, row_spacing = 600
      Fertiliser
      Irrigation
      Manager: same as aps18 - berkin weathering -  planting 1.paddock.manager
      Soil: same as aps20 - mungbean satin f5.paddock.soil
      SurfaceOrganicMatter: InitialResidueName=wheat; InitialResidueType=wheat; InitialResidueMass=500; InitialStandingFraction=0; InitialCPR=0; InitialCNR=40
      Plant mungbean: ResourceName=Mungbean
      MicroClimate: a_interception=0; b_interception=1; c_interception=0; d_interception=0; soil_albedo=0.3; SoilHeatFluxFraction=0; MinimumHeightDiffForNewLayer=0; NightInterceptionFraction=0; ReferenceHeight=0
    SoilArbitrator
  Simulation RJL1_4: Irrigated sown 10 Jan 1978 Dalby after winter cereal
    Clock: Start=1977-10-17; End=1978-03-31
    Summary summaryfile
    Weather: FileName=dalby25.met
    Zone paddock: Area=1; Slope=0; AspectAngle=0; Altitude=50
      Report
      Operations
        1977-10-17  // soilwat2 set sw = 0.220 0.342 0.385 0.386 0.429 0.430 0.430
        1977-10-17  // surfaceom add_surfaceom dlt_residue_wt = 1500, dlt_residue_type = wheat, dlt_residue_cnr = 70
        1978-01-10  // mungbean sow plants = 10, sowing_depth = 40, cultivar = berken,crop_class = plant, row_spacing = 600
        1978-01-10  // irrigate apply amount = 50
        1978-02-08  // irrigate apply amount = 30
        1978-02-20  // irrigate apply amount = 30
        1978-03-09  // irrigate apply amount = 30
        1978-03-24  // irrigate apply amount = 30
      Fertiliser
      Irrigation
      Manager: same as aps18 - berkin weathering -  planting 1.paddock.manager
      Soil: same as aps20 - mungbean satin f5.paddock.soil
      SurfaceOrganicMatter: InitialResidueName=wheat; InitialResidueType=wheat; InitialResidueMass=500; InitialStandingFraction=0; InitialCPR=0; InitialCNR=40
      Plant mungbean: ResourceName=Mungbean
      MicroClimate: a_interception=0; b_interception=1; c_interception=0; d_interception=0; soil_albedo=0.3; SoilHeatFluxFraction=0; MinimumHeightDiffForNewLayer=0; NightInterceptionFraction=0; ReferenceHeight=0
    SoilArbitrator
  Simulation RJL1_5: Double-cropped sown 10 Jan 1978 Dalby after winter cereal
    Clock: Start=1977-10-17; End=1978-03-31
    Summary summaryfile
    Weather: FileName=dalby25.met
    Zone paddock: Area=1; Slope=0; AspectAngle=0; Altitude=50
      Report
      Operations
        1977-10-17  // surfaceom add_surfaceom dlt_residue_wt = 1500, dlt_residue_type = wheat, dlt_residue_cnr = 70
        1977-10-17  // soilwat2 set sw = 0.220 0.342 0.385 0.386 0.429 0.430 0.430
        1978-01-10  // mungbean sow plants = 10, sowing_depth = 40, cultivar = berken,crop_class = plant, row_spacing = 600
        1978-01-10  // irrigate apply amount = 50
      Fertiliser
      Irrigation
      Manager: same as aps18 - berkin weathering -  planting 1.paddock.manager
      Soil: same as aps20 - mungbean satin f5.paddock.soil
      SurfaceOrganicMatter: InitialResidueName=wheat; InitialResidueType=wheat; InitialResidueMass=500; InitialStandingFraction=0; InitialCPR=0; InitialCNR=40
      Plant mungbean: ResourceName=Mungbean
      MicroClimate: a_interception=0; b_interception=1; c_interception=0; d_interception=0; soil_albedo=0.3; SoilHeatFluxFraction=0; MinimumHeightDiffForNewLayer=0; NightInterceptionFraction=0; ReferenceHeight=0
    SoilArbitrator
  Simulation RJL1_6: sown 10 Jan 1978 Dalby after winter fallow
    Clock: Start=1977-04-10; End=1978-03-31
    Summary summaryfile
    Weather: FileName=dalby25.met
    Zone paddock: Area=1; Slope=0; AspectAngle=0; Altitude=50
      Report
      Operations
        1977-04-10  // soilwat2 set sw = 0.220 0.342 0.385 0.386 0.429 0.430 0.430
        1977-04-10  // surfaceom add_surfaceom dlt_residue_wt = 5000, dlt_residue_type = sorghum, dlt_residue_cnr = 70
        1978-01-10  // mungbean sow plants = 10, sowing_depth = 40, cultivar = berken,crop_class = plant, row_spacing = 600
        1978-01-10  // irrigate apply amount = 50
      Fertiliser
      Irrigation
      Manager: same as aps18 - berkin weathering -  planting 1.paddock.manager
      Soil: same as aps20 - mungbean satin f5.paddock.soil
      SurfaceOrganicMatter: InitialResidueName=wheat; InitialResidueType=wheat; InitialResidueMass=500; InitialStandingFraction=0; InitialCPR=0; InitialCNR=40
      Plant mungbean: ResourceName=Mungbean
      MicroClimate: a_interception=0; b_interception=1; c_interception=0; d_interception=0; soil_albedo=0.3; SoilHeatFluxFraction=0; MinimumHeightDiffForNewLayer=0; NightInterceptionFraction=0; ReferenceHeight=0
    SoilArbitrator
  Simulation RJL2_1: 18 Nov 1976 sowing 20 plants-m2, 100 cm rows
    Clock: Start=1976-11-18; End=1977-03-11
    Summary summaryfile
    Weather: FileName=cooper.aps
    Zone paddock: Area=1; Slope=0; AspectAngle=0; Altitude=50
      Report
      Operations
        1976-11-18  // mungbean sow plants = 20, sowing_depth = 40, cultivar = berken,crop_class = plant, row_spacing = 1000
      Fertiliser
      Irrigation
      Manager: same as aps18 - berkin weathering -  planting 1.paddock.manager
      Soil: same as RCM - sowing 1990 at Gatton 9 Jan 1990.paddock.soil
      SurfaceOrganicMatter: InitialResidueName=wheat; InitialResidueType=wheat; InitialResidueMass=500; InitialStandingFraction=0; InitialCPR=0; InitialCNR=40
      Plant mungbean: ResourceName=Mungbean
      MicroClimate: a_interception=0; b_interception=1; c_interception=0; d_interception=0; soil_albedo=0.3; SoilHeatFluxFraction=0; MinimumHeightDiffForNewLayer=0; NightInterceptionFraction=0; ReferenceHeight=0
    SoilArbitrator
  Simulation RJL2_10: 24 Jan 1977 sowing 27 plants-m2, 75 cm rows
    Clock: Start=1977-01-24; End=1977-04-30
    Summary summaryfile
    Weather: FileName=cooper.aps
    Zone paddock: Area=1; Slope=0; AspectAngle=0; Altitude=50
      Report
      Operations
        1977-01-24  // mungbean sow plants = 27, sowing_depth = 40, cultivar = berken,crop_class = plant, row_spacing = 750
      Fertiliser
      Irrigation
      Manager: same as aps18 - berkin weathering -  planting 1.paddock.manager
      Soil: same as RCM - sowing 1990 at Gatton 9 Jan 1990.paddock.soil
      SurfaceOrganicMatter: InitialResidueName=wheat; InitialResidueType=wheat; InitialResidueMass=500; InitialStandingFraction=0; InitialCPR=0; InitialCNR=40
      Plant mungbean: ResourceName=Mungbean
      MicroClimate: a_interception=0; b_interception=1; c_interception=0; d_interception=0; soil_albedo=0.3; SoilHeatFluxFraction=0; MinimumHeightDiffForNewLayer=0; NightInterceptionFraction=0; ReferenceHeight=0
    SoilArbitrator
  Simulation RJL2_11: 24 Jan 1977 sowing 40 plants-m2, 50 cm rows
    Clock: Start=1977-01-24; End=1977-04-30
    Summary summaryfile
    Weather: FileName=cooper.aps
    Zone paddock: Area=1; Slope=0; AspectAngle=0; Altitude=50
      Report
      Operations
        1977-01-24  // mungbean sow plants = 40, sowing_depth = 40, cultivar = berken,crop_class = plant, row_spacing = 500
      Fertiliser
      Irrigation
      Manager: same as aps18 - berkin weathering -  planting 1.paddock.manager
      Soil: same as RCM - sowing 1990 at Gatton 9 Jan 1990.paddock.soil
      SurfaceOrganicMatter: InitialResidueName=wheat; InitialResidueType=wheat; InitialResidueMass=500; InitialStandingFraction=0; InitialCPR=0; InitialCNR=40
      Plant mungbean: ResourceName=Mungbean
      MicroClimate: a_interception=0; b_interception=1; c_interception=0; d_interception=0; soil_albedo=0.3; SoilHeatFluxFraction=0; MinimumHeightDiffForNewLayer=0; NightInterceptionFraction=0; ReferenceHeight=0
    SoilArbitrator
  Simulation RJL2_12: 24 Jan 1977 sowing 80 plants-m2, 25 cm rows
    Clock: Start=1977-01-24; End=1977-04-30
    Summary summaryfile
    Weather: FileName=cooper.aps
    Zone paddock: Area=1; Slope=0; AspectAngle=0; Altitude=50
      Report
      Operations
        1977-01-24  // mungbean sow plants = 80, sowing_depth = 40, cultivar = berken,crop_class = plant, row_spacing = 250
      Fertiliser
      Irrigation
      Manager: same as aps18 - berkin weathering -  planting 1.paddock.manager
      Soil: same as RCM - sowing 1990 at Gatton 9 Jan 1990.paddock.soil
      SurfaceOrganicMatter: InitialResidueName=wheat; InitialResidueType=wheat; InitialResidueMass=500; InitialStandingFraction=0; InitialCPR=0; InitialCNR=40
      Plant mungbean: ResourceName=Mungbean
      MicroClimate: a_interception=0; b_interception=1; c_interception=0; d_interception=0; soil_albedo=0.3; SoilHeatFluxFraction=0; MinimumHeightDiffForNewLayer=0; NightInterceptionFraction=0; ReferenceHeight=0
    SoilArbitrator
  Simulation RJL2_2: 18 Nov 1976 sowing 27 plants-m2, 75 cm rows
    Clock: Start=1976-11-18; End=1977-03-11
    Summary summaryfile
    Weather: FileName=cooper.aps
    Zone paddock: Area=1; Slope=0; AspectAngle=0; Altitude=50
      Report
      Operations
        1976-11-18  // mungbean sow plants = 27, sowing_depth = 40, cultivar = berken,crop_class = plant, row_spacing = 750
      Fertiliser
      Irrigation
      Manager: same as aps18 - berkin weathering -  planting 1.paddock.manager
      Soil: same as RCM - sowing 1990 at Gatton 9 Jan 1990.paddock.soil
      SurfaceOrganicMatter: InitialResidueName=wheat; InitialResidueType=wheat; InitialResidueMass=500; InitialStandingFraction=0; InitialCPR=0; InitialCNR=40
      Plant mungbean: ResourceName=Mungbean
      MicroClimate: a_interception=0; b_interception=1; c_interception=0; d_interception=0; soil_albedo=0.3; SoilHeatFluxFraction=0; MinimumHeightDiffForNewLayer=0; NightInterceptionFraction=0; ReferenceHeight=0
    SoilArbitrator
  Simulation RJL2_3: 18 Nov 1976 sowing 40 plants-m2, 50 cm rows
    Clock: Start=1976-11-18; End=1977-03-11
    Summary summaryfile
    Weather: FileName=cooper.aps
    Zone paddock: Area=1; Slope=0; AspectAngle=0; Altitude=50
      Report
      Operations
        1976-11-18  // mungbean sow plants = 40, sowing_depth = 40, cultivar = berken,crop_class = plant, row_spacing = 500
      Fertiliser
      Irrigation
      Manager: same as aps18 - berkin weathering -  planting 1.paddock.manager
      Soil: same as RCM - sowing 1990 at Gatton 9 Jan 1990.paddock.soil
      SurfaceOrganicMatter: InitialResidueName=wheat; InitialResidueType=wheat; InitialResidueMass=500; InitialStandingFraction=0; InitialCPR=0; InitialCNR=40
      Plant mungbean: ResourceName=Mungbean
      MicroClimate: a_interception=0; b_interception=1; c_interception=0; d_interception=0; soil_albedo=0.3; SoilHeatFluxFraction=0; MinimumHeightDiffForNewLayer=0; NightInterceptionFraction=0; ReferenceHeight=0
    SoilArbitrator
  Simulation RJL2_4: 18 Nov 1976 sowing 80 plants-m2, 25 cm rows
    Clock: Start=1976-11-18; End=1977-03-11
    Summary summaryfile
    Weather: FileName=cooper.aps
    Zone paddock: Area=1; Slope=0; AspectAngle=0; Altitude=50
      Report
      Operations
        1976-11-18  // mungbean sow plants = 80, sowing_depth = 40, cultivar = berken,crop_class = plant, row_spacing = 250
      Fertiliser
      Irrigation
      Manager: same as aps18 - berkin weathering -  planting 1.paddock.manager
      Soil: same as RCM - sowing 1990 at Gatton 9 Jan 1990.paddock.soil
      SurfaceOrganicMatter: InitialResidueName=wheat; InitialResidueType=wheat; InitialResidueMass=500; InitialStandingFraction=0; InitialCPR=0; InitialCNR=40
      Plant mungbean: ResourceName=Mungbean
      MicroClimate: a_interception=0; b_interception=1; c_interception=0; d_interception=0; soil_albedo=0.3; SoilHeatFluxFraction=0; MinimumHeightDiffForNewLayer=0; NightInterceptionFraction=0; ReferenceHeight=0
    SoilArbitrator
  Simulation RJL2_5: 20 Dec 1976 sowing 20 plants-m2, 100 cm rows
    Clock: Start=1976-12-20; End=1977-03-21
    Summary summaryfile
    Weather: FileName=cooper.aps
    Zone paddock: Area=1; Slope=0; AspectAngle=0; Altitude=50
      Report
      Operations
        1976-12-20  // mungbean sow plants = 20, sowing_depth = 40, cultivar = berken,crop_class = plant, row_spacing = 1000
      Fertiliser
      Irrigation
      Manager: same as aps18 - berkin weathering -  planting 1.paddock.manager
      Soil: same as RCM - sowing 1990 at Gatton 9 Jan 1990.paddock.soil
      SurfaceOrganicMatter: InitialResidueName=wheat; InitialResidueType=wheat; InitialResidueMass=500; InitialStandingFraction=0; InitialCPR=0; InitialCNR=40
      Plant mungbean: ResourceName=Mungbean
      MicroClimate: a_interception=0; b_interception=1; c_interception=0; d_interception=0; soil_albedo=0.3; SoilHeatFluxFraction=0; MinimumHeightDiffForNewLayer=0; NightInterceptionFraction=0; ReferenceHeight=0
    SoilArbitrator
  Simulation RJL2_6: 20 Dec 1976 sowing 27 plants-m2, 75 cm rows
    Clock: Start=1976-12-20; End=1977-03-21
    Summary summaryfile
    Weather: FileName=cooper.aps
    Zone paddock: Area=1; Slope=0; AspectAngle=0; Altitude=50
      Report
      Operations
        1976-12-20  // mungbean sow plants = 27, sowing_depth = 40, cultivar = berken,crop_class = plant, row_spacing = 750
      Fertiliser
      Irrigation
      Manager: same as aps18 - berkin weathering -  planting 1.paddock.manager
      Soil: same as RCM - sowing 1990 at Gatton 9 Jan 1990.paddock.soil
      SurfaceOrganicMatter: InitialResidueName=wheat; InitialResidueType=wheat; InitialResidueMass=500; InitialStandingFraction=0; InitialCPR=0; InitialCNR=40
      Plant mungbean: ResourceName=Mungbean
      MicroClimate: a_interception=0; b_interception=1; c_interception=0; d_interception=0; soil_albedo=0.3; SoilHeatFluxFraction=0; MinimumHeightDiffForNewLayer=0; NightInterceptionFraction=0; ReferenceHeight=0
    SoilArbitrator
  Simulation RJL2_7: 20 Dec 1976 sowing 40 plants-m2, 50 cm rows
    Clock: Start=1976-12-20; End=1977-03-21
    Summary summaryfile
    Weather: FileName=cooper.aps
    Zone paddock: Area=1; Slope=0; AspectAngle=0; Altitude=50
      Report
      Operations
        1976-12-20  // mungbean sow plants = 40, sowing_depth = 40, cultivar = berken,crop_class = plant, row_spacing = 500
      Fertiliser
      Irrigation
      Manager: same as aps18 - berkin weathering -  planting 1.paddock.manager
      Soil: same as RCM - sowing 1990 at Gatton 9 Jan 1990.paddock.soil
      SurfaceOrganicMatter: InitialResidueName=wheat; InitialResidueType=wheat; InitialResidueMass=500; InitialStandingFraction=0; InitialCPR=0; InitialCNR=40
      Plant mungbean: ResourceName=Mungbean
      MicroClimate: a_interception=0; b_interception=1; c_interception=0; d_interception=0; soil_albedo=0.3; SoilHeatFluxFraction=0; MinimumHeightDiffForNewLayer=0; NightInterceptionFraction=0; ReferenceHeight=0
    SoilArbitrator
  Simulation RJL2_8: 20 Dec 1976 sowing 80 plants-m2, 25 cm rows
    Clock: Start=1976-12-20; End=1977-03-21
    Summary summaryfile
    Weather: FileName=cooper.aps
    Zone paddock: Area=1; Slope=0; AspectAngle=0; Altitude=50
      Report
      Operations
        1976-12-20  // mungbean sow plants = 80, sowing_depth = 40, cultivar = berken,crop_class = plant, row_spacing = 250
      Fertiliser
      Irrigation
      Manager: same as aps18 - berkin weathering -  planting 1.paddock.manager
      Soil: same as RCM - sowing 1990 at Gatton 9 Jan 1990.paddock.soil
      SurfaceOrganicMatter: InitialResidueName=wheat; InitialResidueType=wheat; InitialResidueMass=500; InitialStandingFraction=0; InitialCPR=0; InitialCNR=40
      Plant mungbean: ResourceName=Mungbean
      MicroClimate: a_interception=0; b_interception=1; c_interception=0; d_interception=0; soil_albedo=0.3; SoilHeatFluxFraction=0; MinimumHeightDiffForNewLayer=0; NightInterceptionFraction=0; ReferenceHeight=0
    SoilArbitrator
  Simulation RJL2_9: 24 Jan 1977 sowing 20 plants-m2, 100 cm rows
    Clock: Start=1977-01-24; End=1977-04-30
    Summary summaryfile
    Weather: FileName=cooper.aps
    Zone paddock: Area=1; Slope=0; AspectAngle=0; Altitude=50
      Report
      Operations
        1977-01-24  // mungbean sow plants = 20, sowing_depth = 40, cultivar = berken,crop_class = plant, row_spacing = 1000
      Fertiliser
      Irrigation
      Manager: same as aps18 - berkin weathering -  planting 1.paddock.manager
      Soil: same as RCM - sowing 1990 at Gatton 9 Jan 1990.paddock.soil
      SurfaceOrganicMatter: InitialResidueName=wheat; InitialResidueType=wheat; InitialResidueMass=500; InitialStandingFraction=0; InitialCPR=0; InitialCNR=40
      Plant mungbean: ResourceName=Mungbean
      MicroClimate: a_interception=0; b_interception=1; c_interception=0; d_interception=0; soil_albedo=0.3; SoilHeatFluxFraction=0; MinimumHeightDiffForNewLayer=0; NightInterceptionFraction=0; ReferenceHeight=0
    SoilArbitrator
  DataStore
