folder FromConFile: version=37; creator=Apsim 7.10-r4213
  simulation aps18 - berkin weathering -  planting 1
    clock: start_date=27/10/1993; end_date=30/5/1994
    summaryfile
    metfile met: filename=aps18.met
    area paddock
      outputfile report: filename=aps18 - berkin weathering -  planting 1 report.out; title=aps18 - berkin weathering -  planting 1 report
      operations
        18/11/1993  soilwat2 set sw = 0.255 0.322 0.321 0.321 0.243 0.211 0.170 0.170
        04/11/1993  mungbean sow plants = 38.2,crop_class = plant, row_spacing = 500, sowing_depth = 50, cultivar = berken
      fertiliser
      irrigation
        automatic_irrigation = off
        asw_depth = 600  # Depth to which ASW is calculated. (mm)
        crit_fr_asw = 0.5  # Fraction of ASW below which irrigation is applied (0-1.0)
        irrigation_efficiency = 1  # Efficiency of the irrigation. (0-1.0)
        irrigation_allocation = off  # Allocation limits
        allocation = 0  # Allocation in mm
        default_no3_conc = 0.0  # Nitrate concentration (ppm N)
        default_nh4_conc = 0.0  # Ammonium concentration (ppm N)
        default_cl_conc = 0.0  # Chloride concentration (ppm Cl)
      manager
        on init:
```
                 dateset = 0
                 emer_date = 0
                 endjuv_date = 0
                 anth_date = 0
                 mat_date = 0
```
        on end_of_day:
```
                 if mungbean.stage = 3 and dateset = 0 then
                    emer_date = daysaftersowing
                    dateset = 1
                 endif
                 if mungbean.stage = 4 and dateset = 1 then
                    endjuv_date = daysaftersowing
                    dateset = 2
                 endif
                 if mungbean.stage = 6 and dateset = 2 then
                    anth_date = daysaftersowing
                    dateset = 3
                 endif
                 if mungbean.stage = 9 and dateset = 3 then
                    mat_date = daysaftersowing
                    dateset = 4
                 endif
            if (mungbean.stagename = 'maturity' or mungbean.plant_status = 'dead') then
               report do_output
               mungbean harvest 
               mungbean kill_crop 
               mungbean end_crop
               dateset = 0
            endif
```
      Soil: Latitude=0; Longitude=0; YearOfSampling=0
        SoilWater: SummerCona=3.5; SummerU=6; SummerDate=1-Nov; WinterCona=3.5; WinterU=6; WinterDate=1-Apr; DiffusConst=88; DiffusSlope=35.4; Salb=0.13; CN2Bare=72; CNRed=20; CNCov=0.8; Thickness=[150, 150, 150, 150, 300, 300, 300, 300]; SWCON=[0.255, 0.322, 0.321, 0.321, 0.243, 0.211, 0.17, 0.17]
        SoilOrganicMatter: RootCN=33; RootWt=0; SoilCN=14.5; EnrACoeff=7.4; EnrBCoeff=0.2; OCUnits=Total
          Thickness  OC    FBiom  FInert
          150        2.2   0.02   0.36
          150        1.6   0.015  0.5
          150        1.35  0.01   0.59
          150        0.95  0.01   0.84
          300        1     0.01   0.8
          300        0.8   0.01   0.99
          300        0.45  0.01   0.99
          300        0.45  0.01   0.99
        Analysis: Thickness=[150, 150, 150, 150, 300, 300, 300, 300]; PH=[7.5, 8, 8, 8, 8, 8, 8, 8]; PHUnits=Water; BoronUnits=HotWater
        Sample Initial nitrogen: NO3Units=ppm; NH4Units=ppm; SWUnits=Volumetric; OCUnits=Total; PHUnits=Water
          Thickness  NO3  NH4
          150        2    1
          150        2    1
          150        2    1
          150        2    1
          300        2    1
          300        2    1
          300        2    1
          300        2    1
        Water
          Thickness  BD    AirDry  LL15  DUL    SAT
          150        1.38  0.05    0.18  0.38   0.43
          150        1.34  0.19    0.19  0.38   0.43
          150        1.31  0.22    0.22  0.395  0.45
          150        1.4   0.19    0.19  0.41   0.45
          300        1.45  0.22    0.22  0.4    0.45
          300        1.46  0.19    0.19  0.39   0.44
          300        1.46  0.17    0.17  0.38   0.4
          300        1.46  0.17    0.17  0.38   0.4
          SoilCrop mungbean: LL=[0.2, 0.201, 0.237, 0.192, 0.22, 0.191, 0.249, 0.249]; KL=[0.08, 0.08, 0.08, 0.08, 0.06, 0.04, 0.02, 0.01]; XF=[1, 1, 1, 1, 1, 1, 1, 1]
        InitialWater Initial water: FractionFull=1; PercentMethod=EvenlyDistributed
      surfaceom
        PoolName = wheat  # Organic Matter pool name
        type = wheat  # Organic Matter type
        mass = 500  # Initial surface residue (kg/ha)
        cnr = 40  # C:N ratio of initial residue
        standing_fraction = 0.0  # Fraction of residue standing
      mungbean
      manager2 Irrigate on date
        # Irrigation will be applied on the date(s) below
        sameDays = yes  # Apply Irrigation on the same day(s) each year? (yes/no) - if "no" then must include the year of application below
        irrigDatesStr = 27-oct  # Dates for one or more Irrigation applications (dd-mmm or dd-mmm-yyyy) as a list with a space between dates
        # Irrigation parameters
        amount = 42  # Amount of irrigation to apply (mm)
        eff = 1.0  # Irrigation efficiency (0-1)
```csharp
using System;
using ModelFramework;
using CSGeneral;

public class Script
{     
   [Link] Irrigation Irrigation;
   [Input] DateTime today;
   [Param] string[] irrigDatesStr;  //a string array holding the dates as text
   [Param] string sameDays;         //if yes, we ignore the year component
   [Param] float amount;           //amount of irrigation to apply (mm)
   [Param] float eff;              //irrigation efficiency

   private DateTime[] irrigDates;   //an array to hold the converted dates
   private bool irrigToday = false; //a variable to hold whether or not we irrigate today
   private int year;
   private string[] split;

   [EventHandler] public void OnInitialised()
   {
      //convert the date strings to APSIM dates
      irrigDates = new DateTime[irrigDatesStr.Length];
      for (int i = 0; i < irrigDates.Length ; i++)
      {
         split = irrigDatesStr[i].Split('-');
         if (split.Length == 3)
         {
            year = Convert.ToInt32(split[2]);
            irrigDates[i] = DateUtility.GetDate(irrigDatesStr[i], year);
         }
         else
            irrigDates[i] = DateUtility.GetDate(irrigDatesStr[i]);
      }
   }

   // The following event handler will be called each day at the start of the day
   [EventHandler] public void OnPrepare()
   {
      irrigToday = false;

      //for every date in our date array
      foreach (DateTime day in irrigDates)
      {
         if (sameDays.ToLower().Equals("yes") && day.Day.Equals(today.Day) && day.Month.Equals(today.Month))
            irrigToday = true;
         else if (day.Day.Equals(today.Day) && day.Month.Equals(today.Month) && day.Year.Equals(today.Year))
            irrigToday = true;  
      }

      if (irrigToday)
      {
         IrrigationApplicationType data = new IrrigationApplicationType();
         data.Amount = amount;
         Irrigation.Set("irrigation_efficiency", eff);
         Irrigation.Apply(data);
      }
   } 
}
```
      manager2 Irrigate on date1
        # Irrigation will be applied on the date(s) below
        sameDays = yes  # Apply Irrigation on the same day(s) each year? (yes/no) - if "no" then must include the year of application below
        irrigDatesStr = 10-nov  # Dates for one or more Irrigation applications (dd-mmm or dd-mmm-yyyy) as a list with a space between dates
        # Irrigation parameters
        amount = 15  # Amount of irrigation to apply (mm)
        eff = 1.0  # Irrigation efficiency (0-1)
        script: same as in aps18 - berkin weathering -  planting 1.paddock.Irrigate on date
      manager2 Irrigate on date2
        # Irrigation will be applied on the date(s) below
        sameDays = yes  # Apply Irrigation on the same day(s) each year? (yes/no) - if "no" then must include the year of application below
        irrigDatesStr = 22-nov  # Dates for one or more Irrigation applications (dd-mmm or dd-mmm-yyyy) as a list with a space between dates
        # Irrigation parameters
        amount = 28  # Amount of irrigation to apply (mm)
        eff = 1.0  # Irrigation efficiency (0-1)
        script: same as in aps18 - berkin weathering -  planting 1.paddock.Irrigate on date
      manager2 Irrigate on date3
        # Irrigation will be applied on the date(s) below
        sameDays = yes  # Apply Irrigation on the same day(s) each year? (yes/no) - if "no" then must include the year of application below
        irrigDatesStr = 01-dec 15-dec 29-dec  # Dates for one or more Irrigation applications (dd-mmm or dd-mmm-yyyy) as a list with a space between dates
        # Irrigation parameters
        amount = 14  # Amount of irrigation to apply (mm)
        eff = 1.0  # Irrigation efficiency (0-1)
        script: same as in aps18 - berkin weathering -  planting 1.paddock.Irrigate on date
      manager2 Irrigate on date4
        # Irrigation will be applied on the date(s) below
        sameDays = yes  # Apply Irrigation on the same day(s) each year? (yes/no) - if "no" then must include the year of application below
        irrigDatesStr = 29-dec  # Dates for one or more Irrigation applications (dd-mmm or dd-mmm-yyyy) as a list with a space between dates
        # Irrigation parameters
        amount = 21  # Amount of irrigation to apply (mm)
        eff = 1.0  # Irrigation efficiency (0-1)
        script: same as in aps18 - berkin weathering -  planting 1.paddock.Irrigate on date
      manager2 Irrigate on date5
        # Irrigation will be applied on the date(s) below
        sameDays = yes  # Apply Irrigation on the same day(s) each year? (yes/no) - if "no" then must include the year of application below
        irrigDatesStr = 04-jan  # Dates for one or more Irrigation applications (dd-mmm or dd-mmm-yyyy) as a list with a space between dates
        # Irrigation parameters
        amount = 18  # Amount of irrigation to apply (mm)
        eff = 1.0  # Irrigation efficiency (0-1)
        script: same as in aps18 - berkin weathering -  planting 1.paddock.Irrigate on date
  simulation aps18 - king weathering -  planting 1
    clock: start_date=27/10/1993; end_date=30/5/1994
    summaryfile
    metfile met: filename=aps18.met
    area paddock
      outputfile report: filename=aps18 - king weathering -  planting 1 report.out; title=aps18 - king weathering -  planting 1 report
      operations
        18/11/1993  soilwat2 set sw = 0.255 0.322 0.321 0.321 0.243 0.211 0.170 0.170
        04/11/1993  mungbean sow plants = 26.0,crop_class = plant, row_spacing = 500, sowing_depth = 50, cultivar = king
        27/10/1993  irrigate apply amount = 42.0
        10/11/1993  irrigate apply amount = 15.0
        22/11/1993  irrigate apply amount = 28.0
        01/12/1993  irrigate apply amount = 14.0
        15/12/1993  irrigate apply amount = 14.0
        23/12/1993  irrigate apply amount = 14.0
        29/12/1993  irrigate apply amount = 21.0
        04/01/1994  irrigate apply amount = 18.0
      fertiliser
      irrigation: same as aps18 - berkin weathering -  planting 1.paddock.irrigation
      manager: same as aps18 - berkin weathering -  planting 1.paddock.manager
      Soil: Latitude=0; Longitude=0; YearOfSampling=0
        InitialWater Initial water: FractionFull=1; PercentMethod=EvenlyDistributed
        Water: same as aps18 - berkin weathering -  planting 1.paddock.soil.Water
        SoilWater: SummerCona=3.5; SummerU=6.0; SummerDate=1-Nov; WinterCona=3.5; WinterU=6.0; WinterDate=1-Apr; DiffusConst=88.0; DiffusSlope=35.4; Salb=0.13; CN2Bare=72; CNRed=20; CNCov=0.8; Thickness=[150.0, 150.0, 150.0, 150.0, 300.0, 300.0, 300.0, 300.0]; SWCON=[0.400, 0.400, 0.400, 0.400, 0.400, 0.400, 0.400, 0.400]
        SoilOrganicMatter: RootCN=33; RootWt=0; SoilCN=14.5; EnrACoeff=7.4; EnrBCoeff=0.2
          Thickness  OC    FBiom  FInert
          150.0      2.20  0.02   0.36
          150.0      1.60  0.015  0.50
          150.0      1.35  0.01   0.59
          150.0      0.95  0.01   0.84
          300.0      1.00  0.01   0.80
          300.0      0.80  0.01   0.99
          300.0      0.45  0.01   0.99
          300.0      0.45  0.01   0.99
        Analysis: Thickness=[150.0, 150.0, 150.0, 150.0, 300.0, 300.0, 300.0, 300.0]; PH=[7.50, 8.00, 8.00, 8.00, 8.00, 8.00, 8.00, 8.00]
        Sample Initial nitrogen
          Thickness  NO3  NH4
          150.0      2    1
          150.0      2    1
          150.0      2    1
          150.0      2    1
          300.0      2    1
          300.0      2    1
          300.0      2    1
          300.0      2    1
      surfaceom
        PoolName = wheat  # Organic Matter pool name
        type = wheat  # Organic Matter type
        mass = 500  # Initial surface residue (kg/ha)
        cnr = 40  # C:N ratio of initial residue
        standing_fraction = 0.0  # Fraction of residue standing
      mungbean
  simulation aps18 - berkin weathering -  planting 2
    clock: start_date=27/10/1993; end_date=30/5/1994
    summaryfile
    metfile met: filename=aps18.met
    area paddock
      outputfile report: filename=aps18 - berkin weathering -  planting 2 report.out; title=aps18 - berkin weathering -  planting 2 report
      operations
        18/11/1993  soilwat2 set sw = 0.273 0.332 0.372 0.372 0.340 0.359 0.170 0.170
        18/11/1993  mungbean sow plants = 43.2,crop_class = plant, row_spacing = 500, sowing_depth = 50, cultivar = berken
        27/10/1993  irrigate apply amount = 42.0
        10/11/1993  irrigate apply amount = 15.0
        22/11/1993  irrigate apply amount = 28.0
        01/12/1993  irrigate apply amount = 14.0
        15/12/1993  irrigate apply amount = 14.0
        23/12/1993  irrigate apply amount = 14.0
        29/12/1993  irrigate apply amount = 21.0
        04/01/1994  irrigate apply amount = 18.0
      fertiliser
      irrigation: same as aps18 - berkin weathering -  planting 1.paddock.irrigation
      manager: same as aps18 - berkin weathering -  planting 1.paddock.manager
      Soil
        InitialWater Initial water: FractionFull=1; PercentMethod=EvenlyDistributed
        Water
          Thickness  BD     AirDry  LL15   DUL    SAT
          150.0      1.380  0.050   0.180  0.380  0.430
          150.0      1.340  0.190   0.190  0.380  0.430
          150.0      1.310  0.220   0.220  0.395  0.450
          150.0      1.400  0.190   0.190  0.410  0.450
          300.0      1.450  0.220   0.220  0.400  0.450
          300.0      1.460  0.190   0.190  0.390  0.440
          300.0      1.460  0.170   0.170  0.380  0.400
          300.0      1.460  0.170   0.170  0.380  0.400
          SoilCrop mungbean: LL=[0.200, 0.201, 0.237, 0.192, 0.220, 0.191, 0.249, 0.249]; KL=[0.08, 0.08, 0.08, 0.08, 0.06, 0.04, 0.02, 0.01]; XF=[1.0, 1.0, 1.0, 1.0, 1.0, 1.0, 1.0, 1.0]
        SoilWater: same as aps18 - king weathering -  planting 1.paddock.soil.SoilWater
        SoilOrganicMatter: same as aps18 - king weathering -  planting 1.paddock.soil.SoilOrganicMatter
        Analysis: Thickness=[150.0, 150.0, 150.0, 150.0, 300.0, 300.0, 300.0, 300.0]; PH=[7.50, 8.00, 8.00, 8.00, 8.00, 8.00, 8.00, 8.00]
        Sample Initial nitrogen
          Thickness  NO3  NH4
          150.0      2    1
          150.0      2    1
          150.0      2    1
          150.0      2    1
          300.0      2    1
          300.0      2    1
          300.0      2    1
          300.0      2    1
      surfaceom
        PoolName = wheat  # Organic Matter pool name
        type = wheat  # Organic Matter type
        mass = 500  # Initial surface residue (kg/ha)
        cnr = 40  # C:N ratio of initial residue
        standing_fraction = 0.0  # Fraction of residue standing
      mungbean
  simulation aps18 - king weathering -  planting 2
    clock: start_date=27/10/1993; end_date=30/5/1994
    summaryfile
    metfile met: filename=aps18.met
    area paddock
      outputfile report: filename=aps18 - king weathering -  planting 2 report.out; title=aps18 - king weathering -  planting 2 report
      operations
        18/11/1993  soilwat2 set sw = 0.273 0.332 0.372 0.372 0.340 0.359 0.170 0.170
        18/11/1993  mungbean sow plants = 12.7,crop_class = plant, row_spacing = 500, sowing_depth = 50, cultivar = king
        27/10/1993  irrigate apply amount = 42.0
        10/11/1993  irrigate apply amount = 15.0
        22/11/1993  irrigate apply amount = 28.0
        01/12/1993  irrigate apply amount = 14.0
        15/12/1993  irrigate apply amount = 14.0
        23/12/1993  irrigate apply amount = 14.0
        29/12/1993  irrigate apply amount = 21.0
        04/01/1994  irrigate apply amount = 18.0
      fertiliser
      irrigation: same as aps18 - berkin weathering -  planting 1.paddock.irrigation
      manager: same as aps18 - berkin weathering -  planting 1.paddock.manager
      Soil: same as aps18 - berkin weathering -  planting 2.paddock.soil
      surfaceom
        PoolName = wheat  # Organic Matter pool name
        type = wheat  # Organic Matter type
        mass = 500  # Initial surface residue (kg/ha)
        cnr = 40  # C:N ratio of initial residue
        standing_fraction = 0.0  # Fraction of residue standing
      mungbean
  simulation aps18 - berkin weathering -  planting 3
    clock: start_date=27/10/1993; end_date=30/5/1994
    summaryfile
    metfile met: filename=aps18.met
    area paddock
      outputfile report: filename=aps18 - berkin weathering -  planting 3 report.out; title=aps18 - berkin weathering -  planting 3 report
      operations
        18/11/1993  soilwat2 set sw = 0.273 0.332 0.372 0.372 0.340 0.359 0.170 0.170
        14/12/1993  mungbean sow plants = 39.6,crop_class = plant, row_spacing = 500, sowing_depth = 50, cultivar = berken
        27/10/1993  irrigate apply amount = 42.0
        10/11/1993  irrigate apply amount = 15.0
        22/11/1993  irrigate apply amount = 28.0
        01/12/1993  irrigate apply amount = 14.0
        15/12/1993  irrigate apply amount = 14.0
        23/12/1993  irrigate apply amount = 14.0
        29/12/1993  irrigate apply amount = 21.0
        04/01/1994  irrigate apply amount = 18.0
      fertiliser
      irrigation: same as aps18 - berkin weathering -  planting 1.paddock.irrigation
      manager: same as aps18 - berkin weathering -  planting 1.paddock.manager
      Soil: same as aps18 - berkin weathering -  planting 2.paddock.soil
      surfaceom
        PoolName = wheat  # Organic Matter pool name
        type = wheat  # Organic Matter type
        mass = 500  # Initial surface residue (kg/ha)
        cnr = 40  # C:N ratio of initial residue
        standing_fraction = 0.0  # Fraction of residue standing
      mungbean
  simulation aps18 - king weathering -  planting 3
    clock: start_date=27/10/1993; end_date=30/5/1994
    summaryfile
    metfile met: filename=aps18.met
    area paddock
      outputfile report: filename=aps18 - king weathering -  planting 3 report.out; title=aps18 - king weathering -  planting 3 report
      operations
        18/11/1993  soilwat2 set sw = 0.273 0.332 0.372 0.372 0.340 0.359 0.170 0.170
        14/12/1993  mungbean sow plants = 38.7,crop_class = plant, row_spacing = 500, sowing_depth = 50, cultivar = king
        27/10/1993  irrigate apply amount = 42.0
        10/11/1993  irrigate apply amount = 15.0
        22/11/1993  irrigate apply amount = 28.0
        01/12/1993  irrigate apply amount = 14.0
        15/12/1993  irrigate apply amount = 14.0
        23/12/1993  irrigate apply amount = 14.0
        29/12/1993  irrigate apply amount = 21.0
        04/01/1994  irrigate apply amount = 18.0
      fertiliser
      irrigation: same as aps18 - berkin weathering -  planting 1.paddock.irrigation
      manager: same as aps18 - berkin weathering -  planting 1.paddock.manager
      Soil: same as aps18 - berkin weathering -  planting 2.paddock.soil
      surfaceom
        PoolName = wheat  # Organic Matter pool name
        type = wheat  # Organic Matter type
        mass = 500  # Initial surface residue (kg/ha)
        cnr = 40  # C:N ratio of initial residue
        standing_fraction = 0.0  # Fraction of residue standing
      mungbean
  simulation aps18 - berkin weathering -  planting 4
    clock: start_date=27/10/1993; end_date=30/5/1994
    summaryfile
    metfile met: filename=aps18.met
    area paddock
      outputfile report: filename=aps18 - berkin weathering -  planting 4 report.out; title=aps18 - berkin weathering -  planting 4 report
      operations
        18/11/1993  soilwat2 set sw = 0.273 0.332 0.372 0.372 0.340 0.359 0.170 0.170
        04/01/1994  mungbean sow plants = 39.6,crop_class = plant, row_spacing = 500, sowing_depth = 50, cultivar = berken
        27/10/1993  irrigate apply amount = 42.0
        10/11/1993  irrigate apply amount = 15.0
        22/11/1993  irrigate apply amount = 28.0
        01/12/1993  irrigate apply amount = 14.0
        15/12/1993  irrigate apply amount = 14.0
        23/12/1993  irrigate apply amount = 14.0
        29/12/1993  irrigate apply amount = 21.0
        04/01/1994  irrigate apply amount = 18.0
      fertiliser
      irrigation: same as aps18 - berkin weathering -  planting 1.paddock.irrigation
      manager: same as aps18 - berkin weathering -  planting 1.paddock.manager
      Soil: same as aps18 - berkin weathering -  planting 2.paddock.soil
      surfaceom
        PoolName = wheat  # Organic Matter pool name
        type = wheat  # Organic Matter type
        mass = 500  # Initial surface residue (kg/ha)
        cnr = 40  # C:N ratio of initial residue
        standing_fraction = 0.0  # Fraction of residue standing
      mungbean
  simulation aps18 - king weathering -  planting 4
    clock: start_date=27/10/1993; end_date=30/5/1994
    summaryfile
    metfile met: filename=aps18.met
    area paddock
      outputfile report: filename=aps18 - king weathering -  planting 4 report.out; title=aps18 - king weathering -  planting 4 report
      operations
        18/11/1993  soilwat2 set sw = 0.273 0.332 0.372 0.372 0.340 0.359 0.170 0.170
        04/01/1994  mungbean sow plants = 28.6,crop_class = plant, row_spacing = 500, sowing_depth = 50, cultivar = king
        27/10/1993  irrigate apply amount = 42.0
        10/11/1993  irrigate apply amount = 15.0
        22/11/1993  irrigate apply amount = 28.0
        01/12/1993  irrigate apply amount = 14.0
        15/12/1993  irrigate apply amount = 14.0
        23/12/1993  irrigate apply amount = 14.0
        29/12/1993  irrigate apply amount = 21.0
        04/01/1994  irrigate apply amount = 18.0
      fertiliser
      irrigation: same as aps18 - berkin weathering -  planting 1.paddock.irrigation
      manager: same as aps18 - berkin weathering -  planting 1.paddock.manager
      Soil: same as aps18 - berkin weathering -  planting 2.paddock.soil
      surfaceom
        PoolName = wheat  # Organic Matter pool name
        type = wheat  # Organic Matter type
        mass = 500  # Initial surface residue (kg/ha)
        cnr = 40  # C:N ratio of initial residue
        standing_fraction = 0.0  # Fraction of residue standing
      mungbean
  simulation aps18 - berkin weathering -  planting 5
    clock: start_date=27/10/1993; end_date=30/5/1994
    summaryfile
    metfile met: filename=aps18.met
    area paddock
      outputfile report: filename=aps18 - berkin weathering -  planting 5 report.out; title=aps18 - berkin weathering -  planting 5 report
      operations
        18/11/1993  soilwat2 set sw = 0.273 0.332 0.372 0.372 0.340 0.359 0.170 0.170
        17/01/1994  mungbean sow plants = 35.4,crop_class = plant, row_spacing = 500, sowing_depth = 50, cultivar = berken
        27/10/1993  irrigate apply amount = 42.0
        10/11/1993  irrigate apply amount = 15.0
        22/11/1993  irrigate apply amount = 28.0
        01/12/1993  irrigate apply amount = 14.0
        15/12/1993  irrigate apply amount = 14.0
        23/12/1993  irrigate apply amount = 14.0
        29/12/1993  irrigate apply amount = 21.0
        04/01/1994  irrigate apply amount = 18.0
      fertiliser
      irrigation: same as aps18 - berkin weathering -  planting 1.paddock.irrigation
      manager: same as aps18 - berkin weathering -  planting 1.paddock.manager
      Soil: same as aps18 - berkin weathering -  planting 2.paddock.soil
      surfaceom
        PoolName = wheat  # Organic Matter pool name
        type = wheat  # Organic Matter type
        mass = 500  # Initial surface residue (kg/ha)
        cnr = 40  # C:N ratio of initial residue
        standing_fraction = 0.0  # Fraction of residue standing
      mungbean
  simulation aps18 - king weathering -  planting 5
    clock: start_date=27/10/1993; end_date=30/5/1994
    summaryfile
    metfile met: filename=aps18.met
    area paddock
      outputfile report: filename=aps18 - king weathering -  planting 5 report.out; title=aps18 - king weathering -  planting 5 report
      operations
        18/11/1993  soilwat2 set sw = 0.273 0.332 0.372 0.372 0.340 0.359 0.170 0.170
        17/01/1994  mungbean sow plants = 27.6,crop_class = plant, row_spacing = 500, sowing_depth = 50, cultivar = king
        27/10/1993  irrigate apply amount = 42.0
        10/11/1993  irrigate apply amount = 15.0
        22/11/1993  irrigate apply amount = 28.0
        01/12/1993  irrigate apply amount = 14.0
        15/12/1993  irrigate apply amount = 14.0
        23/12/1993  irrigate apply amount = 14.0
        29/12/1993  irrigate apply amount = 21.0
        04/01/1994  irrigate apply amount = 18.0
      fertiliser
      irrigation: same as aps18 - berkin weathering -  planting 1.paddock.irrigation
      manager: same as aps18 - berkin weathering -  planting 1.paddock.manager
      Soil: same as aps18 - berkin weathering -  planting 2.paddock.soil
      surfaceom
        PoolName = wheat  # Organic Matter pool name
        type = wheat  # Organic Matter type
        mass = 500  # Initial surface residue (kg/ha)
        cnr = 40  # C:N ratio of initial residue
        standing_fraction = 0.0  # Fraction of residue standing
      mungbean
  simulation aps18 - berkin weathering -  planting 6
    clock: start_date=27/10/1993; end_date=30/5/1994
    summaryfile
    metfile met: filename=aps18.met
    area paddock
      outputfile report: filename=aps18 - berkin weathering -  planting 6 report.out; title=aps18 - berkin weathering -  planting 6 report
      operations
        18/11/1993  soilwat2 set sw = 0.273 0.332 0.372 0.372 0.340 0.359 0.170 0.170
        01/02/1994  mungbean sow plants = 43.8,crop_class = plant, row_spacing = 500, sowing_depth = 50, cultivar = berken
        27/10/1993  irrigate apply amount = 42.0
        10/11/1993  irrigate apply amount = 15.0
        22/11/1993  irrigate apply amount = 28.0
        01/12/1993  irrigate apply amount = 14.0
        15/12/1993  irrigate apply amount = 14.0
        23/12/1993  irrigate apply amount = 14.0
        29/12/1993  irrigate apply amount = 21.0
        04/01/1994  irrigate apply amount = 18.0
      fertiliser
      irrigation: same as aps18 - berkin weathering -  planting 1.paddock.irrigation
      manager: same as aps18 - berkin weathering -  planting 1.paddock.manager
      Soil: same as aps18 - berkin weathering -  planting 2.paddock.soil
      surfaceom
        PoolName = wheat  # Organic Matter pool name
        type = wheat  # Organic Matter type
        mass = 500  # Initial surface residue (kg/ha)
        cnr = 40  # C:N ratio of initial residue
        standing_fraction = 0.0  # Fraction of residue standing
      mungbean
  simulation aps18 - king weathering -  planting 6
    clock: start_date=27/10/1993; end_date=30/5/1994
    summaryfile
    metfile met: filename=aps18.met
    area paddock
      outputfile report: filename=aps18 - king weathering -  planting 6 report.out; title=aps18 - king weathering -  planting 6 report
      operations
        18/11/1993  soilwat2 set sw = 0.273 0.332 0.372 0.372 0.340 0.359 0.170 0.170
        01/02/1994  mungbean sow plants = 32.7,crop_class = plant, row_spacing = 500, sowing_depth = 50, cultivar = king
        27/10/1993  irrigate apply amount = 42.0
        10/11/1993  irrigate apply amount = 15.0
        22/11/1993  irrigate apply amount = 28.0
        01/12/1993  irrigate apply amount = 14.0
        15/12/1993  irrigate apply amount = 14.0
        23/12/1993  irrigate apply amount = 14.0
        29/12/1993  irrigate apply amount = 21.0
        04/01/1994  irrigate apply amount = 18.0
      fertiliser
      irrigation: same as aps18 - berkin weathering -  planting 1.paddock.irrigation
      manager: same as aps18 - berkin weathering -  planting 1.paddock.manager
      Soil: same as aps18 - berkin weathering -  planting 2.paddock.soil
      surfaceom
        PoolName = wheat  # Organic Matter pool name
        type = wheat  # Organic Matter type
        mass = 500  # Initial surface residue (kg/ha)
        cnr = 40  # C:N ratio of initial residue
        standing_fraction = 0.0  # Fraction of residue standing
      mungbean
  simulation aps1 - mungbean  36 plants-m2
    clock: start_date=25/1/1991; end_date=20/4/1991
    summaryfile
    metfile met: filename=GAT9091.met
    area paddock
      outputfile report: filename=aps1 - mungbean  36 plants-m2 report.out; title=aps1 - mungbean  36 plants-m2 report
      operations
        25/01/1991  soilwat2 set sw = 0.380 0.380 0.395 0.410 0.400 0.390 0.380 0.380
        01/02/1991  mungbean sow plants = 36.2,crop_class = plant, row_spacing = 320, sowing_depth = 50, cultivar = berken
        01/02/1991  irrigate apply amount = 6.0
        05/02/1991  irrigate apply amount = 10.0
        21/02/1991  irrigate apply amount = 15.0
        26/02/1991  irrigate apply amount = 15.0
        01/03/1991  irrigate apply amount = 20.0
        08/03/1991  irrigate apply amount = 15.0
        12/03/1991  irrigate apply amount = 37.0
        15/03/1991  irrigate apply amount = 18.0
        19/03/1991  irrigate apply amount = 17.0
        21/03/1991  irrigate apply amount = 16.0
        27/03/1991  irrigate apply amount = 35.0
        03/04/1991  irrigate apply amount = 12.0
        07/04/1991  irrigate apply amount = 6.0
        12/04/1991  irrigate apply amount = 16.0
        15/04/1991  irrigate apply amount = 8.0
        19/04/1991  irrigate apply amount = 10.0
        22/04/1991  irrigate apply amount = 5.0
        05/05/1991  irrigate apply amount = 35.0
        15/05/1991  irrigate apply amount = 15.0
      fertiliser
      irrigation: same as aps18 - berkin weathering -  planting 1.paddock.irrigation
      manager: same as aps18 - berkin weathering -  planting 1.paddock.manager
      Soil: same as aps18 - berkin weathering -  planting 2.paddock.soil
      surfaceom
        PoolName = wheat  # Organic Matter pool name
        type = wheat  # Organic Matter type
        mass = 500  # Initial surface residue (kg/ha)
        cnr = 40  # C:N ratio of initial residue
        standing_fraction = 0.0  # Fraction of residue standing
      mungbean
  simulation aps1 - mungbean  36 plants-m21
    clock: start_date=25/1/1991; end_date=20/4/1991
    summaryfile
    metfile met: filename=GAT9091.met
    area paddock
      outputfile report: filename=aps1 - mungbean  36 plants-m21 report.out; title=aps1 - mungbean  36 plants-m21 report
      operations
        25/01/1991  soilwat2 set sw = 0.380 0.380 0.395 0.410 0.400 0.390 0.380 0.380
        01/02/1991  mungbean sow plants = 10.7,crop_class = plant, row_spacing = 320, sowing_depth = 50, cultivar = berken
        01/02/1991  irrigate apply amount = 6.0
        05/02/1991  irrigate apply amount = 10.0
        21/02/1991  irrigate apply amount = 15.0
        26/02/1991  irrigate apply amount = 15.0
        01/03/1991  irrigate apply amount = 20.0
        08/03/1991  irrigate apply amount = 15.0
        12/03/1991  irrigate apply amount = 37.0
        15/03/1991  irrigate apply amount = 18.0
        19/03/1991  irrigate apply amount = 17.0
        21/03/1991  irrigate apply amount = 16.0
        27/03/1991  irrigate apply amount = 35.0
        03/04/1991  irrigate apply amount = 12.0
        07/04/1991  irrigate apply amount = 6.0
        12/04/1991  irrigate apply amount = 16.0
        15/04/1991  irrigate apply amount = 8.0
        19/04/1991  irrigate apply amount = 10.0
        22/04/1991  irrigate apply amount = 5.0
        05/05/1991  irrigate apply amount = 35.0
        15/05/1991  irrigate apply amount = 15.0
      fertiliser
      irrigation: same as aps18 - berkin weathering -  planting 1.paddock.irrigation
      manager: same as aps18 - berkin weathering -  planting 1.paddock.manager
      Soil: same as aps18 - berkin weathering -  planting 2.paddock.soil
      surfaceom
        PoolName = wheat  # Organic Matter pool name
        type = wheat  # Organic Matter type
        mass = 500  # Initial surface residue (kg/ha)
        cnr = 40  # C:N ratio of initial residue
        standing_fraction = 0.0  # Fraction of residue standing
      mungbean
  simulation aps20 - mungbean  emerald f1
    clock: start_date=16/12/1993; end_date=21/3/1994
    summaryfile
    metfile met: filename=mans9394.met
    area paddock
      outputfile report: filename=aps20 - mungbean  emerald f1 report.out; title=aps20 - mungbean  emerald f1 report
      operations
        17/12/1993  soilwat2 set sw = 0.400 0.400 0.400 0.400 0.265 0.368 0.368
        17/12/1993  soiln2 set no3= 18.5 11.5 21.4 18.4 6.7 1.0 1.0
        17/12/1993  mungbean sow plants = 30.8, sowing_depth = 40, cultivar = emerald,crop_class = plant, row_spacing = 230
      fertiliser
      irrigation: same as aps18 - berkin weathering -  planting 1.paddock.irrigation
      manager: same as aps18 - berkin weathering -  planting 1.paddock.manager
      Soil
        InitialWater Initial water: FractionFull=1; PercentMethod=EvenlyDistributed
        Water
          Thickness  BD    AirDry  LL15   DUL    SAT
          150.0      1.39  0.100   0.182  0.428  0.470
          150.0      1.41  0.240   0.240  0.427  0.467
          300.0      1.42  0.300   0.300  0.424  0.460
          300.0      1.46  0.297   0.297  0.439  0.449
          300.0      1.45  0.265   0.265  0.437  0.452
          300.0      1.5   0.368   0.368  0.428  0.433
          300.0      1.49  0.368   0.368  0.402  0.430
          SoilCrop mungbean: LL=[0.272, 0.311, 0.315, 0.297, 0.345, 0.410, 0.390]; KL=[0.12, 0.12, 0.12, 0.09, 0.06, 0.05, 0.01]; XF=[1.0, 1.0, 1.0, 1.0, 1.0, 1.0, 1.0]
        SoilWater: SummerCona=3.5; SummerU=6; SummerDate=1-Nov; WinterCona=3.5; WinterU=6; WinterDate=1-Apr; DiffusConst=40.0; DiffusSlope=16.0; Salb=0.13; CN2Bare=75; CNRed=20; CNCov=0.8; Thickness=[150.0, 150.0, 300.0, 300.0, 300.0, 300.0, 300.0]; SWCON=[0.1, 0.1, 0.1, 0.1, 0.1, 0.1, 0.1]
        SoilOrganicMatter: RootCN=33; RootWt=0; SoilCN=14.5; EnrACoeff=7.4; EnrBCoeff=0.2
          Thickness  OC     FBiom  FInert
          150.0      0.800  0.05   0.39
          150.0      0.600  0.02   0.47
          300.0      0.500  0.015  0.52
          300.0      0.300  0.01   0.62
          300.0      0.200  0.01   0.74
          300.0      0.200  0.01   0.83
          300.0      0.100  0.01   0.93
        Analysis: Thickness=[150.0, 150.0, 300.0, 300.0, 300.0, 300.0, 300.0]; PH=[8.900, 8.900, 9.000, 9.000, 9.000, 9.000, 9.000]
        Sample Initial nitrogen
          Thickness  NO3  NH4
          150.0      2    1
          150.0      2    1
          300.0      2    1
          300.0      2    1
          300.0      2    1
          300.0      2    1
          300.0      2    1
      surfaceom
        PoolName = wheat  # Organic Matter pool name
        type = wheat  # Organic Matter type
        mass = 500  # Initial surface residue (kg/ha)
        cnr = 40  # C:N ratio of initial residue
        standing_fraction = 0.0  # Fraction of residue standing
      mungbean
  simulation aps20 - mungbean  shangtung f2
    clock: start_date=16/12/1993; end_date=31/3/1994
    summaryfile
    metfile met: filename=muir9394.met
    area paddock
      outputfile report: filename=aps20 - mungbean  shangtung f2 report.out; title=aps20 - mungbean  shangtung f2 report
      operations
        27/12/1993  soilwat2 set sw = 0.420 0.420 0.420 0.299 0.305 0.368 0.368
        27/12/1993  soiln2 set no3= 10.1 18.7 55.8 17.5 8.4 1.0 1.0
        27/12/1993  mungbean sow plants = 16.3, sowing_depth = 40, cultivar = shangtung,crop_class = plant, row_spacing = 450
      fertiliser
      irrigation: same as aps18 - berkin weathering -  planting 1.paddock.irrigation
      manager: same as aps18 - berkin weathering -  planting 1.paddock.manager
      Soil: same as aps20 - mungbean  emerald f1.paddock.soil
      surfaceom
        PoolName = wheat  # Organic Matter pool name
        type = wheat  # Organic Matter type
        mass = 500  # Initial surface residue (kg/ha)
        cnr = 40  # C:N ratio of initial residue
        standing_fraction = 0.0  # Fraction of residue standing
      mungbean
  simulation aps20 - mungbean   celera f3
    clock: start_date=16/12/1993; end_date=30/4/1994
    summaryfile
    metfile met: filename=ande9394.met
    area paddock
      outputfile report: filename=aps20 - mungbean   celera f3 report.out; title=aps20 - mungbean   celera f3 report
      operations
        17/12/1993  soilwat2 set sw = 0.309 0.333 0.276 0.287 0.325 0.400 0.420
        17/12/1993  soiln2 set no3= 11.0 3.4 2.6 2.6 3.2 1.0 1.0
        17/12/1993  mungbean sow plants = 29.0, sowing_depth = 40, cultivar = celera,crop_class = plant, row_spacing = 350
      fertiliser
      irrigation: same as aps18 - berkin weathering -  planting 1.paddock.irrigation
      manager: same as aps18 - berkin weathering -  planting 1.paddock.manager
      Soil
        InitialWater Initial water: FractionFull=1; PercentMethod=EvenlyDistributed
        Water
          Thickness  BD    AirDry  LL15   DUL    SAT
          150.0      1.44  0.100   0.217  0.401  0.450
          150.0      1.3   0.233   0.245  0.424  0.484
          300.0      1.36  0.23    0.23   0.426  0.465
          300.0      1.47  0.287   0.287  0.437  0.445
          300.0      1.52  0.280   0.290  0.420  0.426
          300.0      1.52  0.280   0.300  0.420  0.426
          300.0      1.53  0.280   0.350  0.420  0.422
          SoilCrop mungbean: LL=[0.235, 0.233, 0.262, 0.300, 0.341, 0.400, 0.419]; KL=[0.08, 0.08, 0.06, 0.06, 0.04, 0.02, 0.01]; XF=[1.0, 1.0, 1.0, 1.0, 1.0, 1.0, 1.0]
        SoilWater: same as aps20 - mungbean  emerald f1.paddock.soil.SoilWater
        SoilOrganicMatter: same as aps20 - mungbean  emerald f1.paddock.soil.SoilOrganicMatter
        Analysis: Thickness=[150.0, 150.0, 300.0, 300.0, 300.0, 300.0, 300.0]; PH=[8.900, 8.900, 9.000, 9.000, 9.000, 9.000, 9.000]
        Sample Initial nitrogen
          Thickness  NO3  NH4
          150.0      2    1
          150.0      2    1
          300.0      2    1
          300.0      2    1
          300.0      2    1
          300.0      2    1
          300.0      2    1
      surfaceom
        PoolName = wheat  # Organic Matter pool name
        type = wheat  # Organic Matter type
        mass = 500  # Initial surface residue (kg/ha)
        cnr = 40  # C:N ratio of initial residue
        standing_fraction = 0.0  # Fraction of residue standing
      mungbean
  simulation aps20 - mungbean shangtung f4
    clock: start_date=16/12/1993; end_date=25/4/1994
    summaryfile
    metfile met: filename=vaug9394.met
    area paddock
      outputfile report: filename=aps20 - mungbean shangtung f4 report.out; title=aps20 - mungbean shangtung f4 report
      operations
        18/12/1993  soilwat2 set sw = 0.327 0.403 0.398 0.356 0.362 0.368 0.368
        18/12/1993  soiln2 set no3= 23.8 25.0 46.7 28.2 18.5 1.0 1.0
        18/12/1993  mungbean sow plants = 23.5, sowing_depth = 40, cultivar = shangtung,crop_class = plant, row_spacing = 200
      fertiliser
      irrigation: same as aps18 - berkin weathering -  planting 1.paddock.irrigation
      manager: same as aps18 - berkin weathering -  planting 1.paddock.manager
      Soil
        InitialWater Initial water: FractionFull=1; PercentMethod=EvenlyDistributed
        Water: same as aps20 - mungbean  emerald f1.paddock.soil.Water
        SoilWater: same as aps20 - mungbean  emerald f1.paddock.soil.SoilWater
        SoilOrganicMatter: same as aps20 - mungbean  emerald f1.paddock.soil.SoilOrganicMatter
        Analysis: Thickness=[150.0, 150.0, 300.0, 300.0, 300.0, 300.0, 300.0]; PH=[8.900, 8.900, 9.000, 9.000, 9.000, 9.000, 9.000]
        Sample Initial nitrogen
          Thickness  NO3  NH4
          150.0      2    1
          150.0      2    1
          300.0      2    1
          300.0      2    1
          300.0      2    1
          300.0      2    1
          300.0      2    1
      surfaceom
        PoolName = wheat  # Organic Matter pool name
        type = wheat  # Organic Matter type
        mass = 500  # Initial surface residue (kg/ha)
        cnr = 40  # C:N ratio of initial residue
        standing_fraction = 0.0  # Fraction of residue standing
      mungbean
  simulation aps20 - mungbean satin f5
    clock: start_date=16/12/1993; end_date=10/4/1994
    summaryfile
    metfile met: filename=sche9394.met
    area paddock
      outputfile report: filename=aps20 - mungbean satin f5 report.out; title=aps20 - mungbean satin f5 report
      operations
        20/12/1993  soilwat2 set sw = 0.522 0.522 0.446 0.371 0.383 0.430 0.430
        20/12/1993  soiln2 set no3= 2.9 11.7 26.0 7.7 0.7 1.0 1.0
        20/12/1993  mungbean sow plants = 18.5, sowing_depth = 40, cultivar = satin,crop_class = plant, row_spacing = 760
      fertiliser
      irrigation: same as aps18 - berkin weathering -  planting 1.paddock.irrigation
      manager: same as aps18 - berkin weathering -  planting 1.paddock.manager
      Soil
        InitialWater Initial water: FractionFull=1; PercentMethod=EvenlyDistributed
        Water
          Thickness  BD     AirDry  LL15   DUL    SAT
          150.0      1.000  0.100   0.231  0.518  0.530
          150.0      1.010  0.209   0.209  0.534  0.550
          300.0      1.020  0.320   0.323  0.538  0.550
          300.0      1.070  0.320   0.349  0.578  0.590
          300.0      1.150  0.320   0.378  0.560  0.566
          300.0      1.330  0.320   0.430  0.470  0.498
          300.0      1.330  0.320   0.430  0.470  0.498
          SoilCrop mungbean: LL=[0.220, 0.342, 0.385, 0.386, 0.429, 0.430, 0.430]; KL=[0.08, 0.08, 0.08, 0.06, 0.04, 0.02, 0.01]; XF=[1.0, 1.0, 1.0, 1.0, 1.0, 1.0, 1.0]
        SoilWater: same as aps20 - mungbean  emerald f1.paddock.soil.SoilWater
        SoilOrganicMatter: same as aps20 - mungbean  emerald f1.paddock.soil.SoilOrganicMatter
        Analysis: Thickness=[150.0, 150.0, 300.0, 300.0, 300.0, 300.0, 300.0]; PH=[8.900, 8.900, 9.000, 9.000, 9.000, 9.000, 9.000]
        Sample Initial nitrogen
          Thickness  NO3  NH4
          150.0      2    1
          150.0      2    1
          300.0      2    1
          300.0      2    1
          300.0      2    1
          300.0      2    1
          300.0      2    1
      surfaceom
        PoolName = wheat  # Organic Matter pool name
        type = wheat  # Organic Matter type
        mass = 500  # Initial surface residue (kg/ha)
        cnr = 40  # C:N ratio of initial residue
        standing_fraction = 0.0  # Fraction of residue standing
      mungbean
  simulation aps20 - mungbean berkin f6
    clock: start_date=16/12/1993; end_date=22/4/1994
    summaryfile
    metfile met: filename=rbaz9394.met
    area paddock
      outputfile report: filename=aps20 - mungbean berkin f6 report.out; title=aps20 - mungbean berkin f6 report
      operations
        21/12/1993  soilwat2 set sw = 0.392 0.388 0.347 0.340 0.346 0.352 0.361
        21/12/1993  soiln2 set no3= 15.4 34.0 56.7 10.1 2.3 1.0 1.0
        21/12/1993  mungbean sow plants = 32.0, sowing_depth = 40, cultivar = berken,crop_class = plant, row_spacing = 450
      fertiliser
      irrigation: same as aps18 - berkin weathering -  planting 1.paddock.irrigation
      manager: same as aps18 - berkin weathering -  planting 1.paddock.manager
      Soil
        InitialWater Initial water: FractionFull=1; PercentMethod=EvenlyDistributed
        Water
          Thickness  BD    AirDry  LL15   DUL    SAT
          150.0      1.39  0.100   0.190  0.428  0.470
          150.0      1.41  0.193   0.193  0.407  0.460
          300.0      1.42  0.263   0.263  0.424  0.460
          300.0      1.46  0.291   0.291  0.439  0.449
          300.0      1.45  0.328   0.328  0.437  0.452
          300.0      1.5   0.347   0.347  0.428  0.433
          300.0      1.49  0.349   0.349  0.402  0.430
          SoilCrop mungbean: LL=[0.240, 0.267, 0.300, 0.350, 0.380, 0.400, 0.401]; KL=[0.08, 0.08, 0.08, 0.06, 0.04, 0.02, 0.01]; XF=[1.0, 1.0, 1.0, 1.0, 1.0, 1.0, 1.0]
        SoilWater: same as aps20 - mungbean  emerald f1.paddock.soil.SoilWater
        SoilOrganicMatter: same as aps20 - mungbean  emerald f1.paddock.soil.SoilOrganicMatter
        Analysis: Thickness=[150.0, 150.0, 300.0, 300.0, 300.0, 300.0, 300.0]; PH=[8.900, 8.900, 9.000, 9.000, 9.000, 9.000, 9.000]
        Sample Initial nitrogen
          Thickness  NO3  NH4
          150.0      2    1
          150.0      2    1
          300.0      2    1
          300.0      2    1
          300.0      2    1
          300.0      2    1
          300.0      2    1
      surfaceom
        PoolName = wheat  # Organic Matter pool name
        type = wheat  # Organic Matter type
        mass = 500  # Initial surface residue (kg/ha)
        cnr = 40  # C:N ratio of initial residue
        standing_fraction = 0.0  # Fraction of residue standing
      mungbean
  simulation aps20 - mungbean emerald f7
    clock: start_date=16/12/1993; end_date=14/5/1994
    summaryfile
    metfile met: filename=mans9394.met
    area paddock
      outputfile report: filename=aps20 - mungbean emerald f7 report.out; title=aps20 - mungbean emerald f7 report
      operations
        28/12/1993  soilwat2 set sw = 0.389 0.368 0.396 0.385 0.393 0.368 0.368
        28/12/1993  soiln2 set no3= 13.1 8.0 5.9 2.4 1.3 1.0 1.0
        28/12/1993  mungbean sow plants = 19.6, sowing_depth = 40, cultivar = emerald,crop_class = plant, row_spacing = 180
      fertiliser
      irrigation: same as aps18 - berkin weathering -  planting 1.paddock.irrigation
      manager: same as aps18 - berkin weathering -  planting 1.paddock.manager
      Soil: same as aps20 - mungbean  emerald f1.paddock.soil
      surfaceom
        PoolName = wheat  # Organic Matter pool name
        type = wheat  # Organic Matter type
        mass = 500  # Initial surface residue (kg/ha)
        cnr = 40  # C:N ratio of initial residue
        standing_fraction = 0.0  # Fraction of residue standing
      mungbean
  simulation aps20 - mungbean emerald f8
    clock: start_date=16/12/1993; end_date=19/5/1994
    summaryfile
    metfile met: filename=abaz9394.met
    area paddock
      outputfile report: filename=aps20 - mungbean emerald f8 report.out; title=aps20 - mungbean emerald f8 report
      operations
        18/12/1993  soilwat2 set sw = 0.428 0.407 0.268 0.298 0.328 0.352 0.361
        18/12/1993  soiln2 set no3= 7.7 8.7 7.1 2.5 1.9 1.0 1.0
        18/12/1993  mungbean sow plants = 19.3, sowing_depth = 40, cultivar = emerald,crop_class = plant, row_spacing = 460
      fertiliser
      irrigation: same as aps18 - berkin weathering -  planting 1.paddock.irrigation
      manager: same as aps18 - berkin weathering -  planting 1.paddock.manager
      Soil: same as aps20 - mungbean berkin f6.paddock.soil
      surfaceom
        PoolName = wheat  # Organic Matter pool name
        type = wheat  # Organic Matter type
        mass = 500  # Initial surface residue (kg/ha)
        cnr = 40  # C:N ratio of initial residue
        standing_fraction = 0.0  # Fraction of residue standing
      mungbean
  simulation aps20 - mungbean satin f9
    clock: start_date=16/12/1993; end_date=26/4/1994
    summaryfile
    metfile met: filename=crof9394.met
    area paddock
      outputfile report: filename=aps20 - mungbean satin f9 report.out; title=aps20 - mungbean satin f9 report
      operations
        18/12/1993  soilwat2 set sw = 0.389 0.484 0.465 0.396 0.358 0.400 0.420
        18/12/1993  soiln2 set no3= 23.3 34.4 86.3 28.7 5.9 1.0 1.0
        18/12/1993  mungbean sow plants = 22.4, sowing_depth = 40, cultivar = satin,crop_class = plant, row_spacing = 970
      fertiliser
      irrigation: same as aps18 - berkin weathering -  planting 1.paddock.irrigation
      manager: same as aps18 - berkin weathering -  planting 1.paddock.manager
      Soil: same as aps20 - mungbean   celera f3.paddock.soil
      surfaceom
        PoolName = wheat  # Organic Matter pool name
        type = wheat  # Organic Matter type
        mass = 500  # Initial surface residue (kg/ha)
        cnr = 40  # C:N ratio of initial residue
        standing_fraction = 0.0  # Fraction of residue standing
      mungbean
  simulation NT10 mungbean -  king planting 1
    clock: start_date=7/9/1987; end_date=29/5/1988
    summaryfile
    metfile met: filename=krs8788.met
    area paddock
      outputfile report: filename=NT10 mungbean -  king planting 1 report.out; title=NT10 mungbean -  king planting 1 report
      operations
        07/09/1987  soilwat2 set sw = 0.19 0.21 0.21 0.223 0.219 0.219 0.219 0.229 0.237
        01/01/1988  mungbean sow plants = 10, sowing_depth = 30,crop_class = plant, row_spacing = 360, cultivar = king
      fertiliser
      irrigation: same as aps18 - berkin weathering -  planting 1.paddock.irrigation
      manager: same as aps18 - berkin weathering -  planting 1.paddock.manager
      Soil
        InitialWater Initial water: FractionFull=1; PercentMethod=EvenlyDistributed
        Water
          Thickness  BD     AirDry  LL15   DUL    SAT
          150.0      1.560  0.053   0.19   0.304  0.315
          150.0      1.520  0.08    0.21   0.31   0.330
          150.0      1.460  0.21    0.21   0.31   0.337
          150.0      1.460  0.223   0.223  0.324  0.340
          150.0      1.420  0.219   0.219  0.328  0.340
          150.0      1.420  0.219   0.219  0.328  0.341
          300.0      1.460  0.219   0.219  0.325  0.344
          300.0      1.500  0.229   0.229  0.337  0.346
          300.0      1.530  0.237   0.237  0.35   0.370
          SoilCrop mungbean
            LL=[0.19, 0.21, 0.21, 0.235, 0.233, 0.242, 0.248, 0.277, 0.285]
            KL=[0.16, 0.16, 0.12, 0.10, 0.10, 0.08, 0.06, 0.04, 0.03]
            XF=[1.0, 1.0, 1.0, 1.0, 1.0, 1.0, 1.0, 0.0, 0.0]
        SoilWater: SummerCona=6.6; SummerU=1.5; SummerDate=1-Nov; WinterCona=6.6; WinterU=1.5; WinterDate=1-Apr; DiffusConst=88.0; DiffusSlope=35.4; Salb=0.2; CN2Bare=70; CNRed=20; CNCov=0.8; SWCON=[0.7, 0.7, 0.7, 0.7, 0.7, 0.7, 0.7, 0.7, 0.7]
          Thickness=[150.0, 150.0, 150.0, 150.0, 150.0, 150.0, 300.0, 300.0, 300.0]
        SoilOrganicMatter: RootCN=33; RootWt=0; SoilCN=14.5; EnrACoeff=7.4; EnrBCoeff=0.2
          Thickness  OC     FBiom  FInert
          150.0      1.270  0.05   0.39
          150.0      0.590  0.02   0.47
          150.0      0.340  0.015  0.52
          150.0      0.340  0.01   0.62
          150.0      0.260  0.01   0.74
          150.0      0.260  0.01   0.83
          300.0      0.250  0.01   0.93
          300.0      0.190  0.01   0.93
          300.0      0.210  0.01   0.93
        Analysis
          Thickness=[150.0, 150.0, 150.0, 150.0, 150.0, 150.0, 300.0, 300.0, 300.0]
          PH=[6.500, 6.200, 6.300, 6.400, 6.500, 6.600, 6.600, 6.500, 6.500]
        Sample Initial nitrogen: NO3Units=ppm; NH4Units=ppm; SWUnits=Volumetric; OCUnits=Total; PHUnits=Water
          Thickness  NO3  NH4
          150        2    1
          150        2    1
          150        2    1
          150        2    1
          150        2    1
          150        2    1
          300        2    1
          300        2    1
      surfaceom
        PoolName = wheat  # Organic Matter pool name
        type = wheat  # Organic Matter type
        mass = 500  # Initial surface residue (kg/ha)
        cnr = 40  # C:N ratio of initial residue
        standing_fraction = 0.0  # Fraction of residue standing
      mungbean
  simulation NT10 mungbean -  king planting 2
    clock: start_date=7/9/1987; end_date=29/5/1988
    summaryfile
    metfile met: filename=krs8788.met
    area paddock
      outputfile report: filename=NT10 mungbean -  king planting 2 report.out; title=NT10 mungbean -  king planting 2 report
      operations
        07/09/1987  soilwat2 set sw = 0.19 0.21 0.21 0.223 0.219 0.219 0.219 0.229 0.237
        01/01/1988  mungbean sow plants = 20, sowing_depth = 30,crop_class = plant, row_spacing = 360, cultivar = king
      fertiliser
      irrigation: same as aps18 - berkin weathering -  planting 1.paddock.irrigation
      manager: same as aps18 - berkin weathering -  planting 1.paddock.manager
      Soil: same as NT10 mungbean -  king planting 1.paddock.soil
      surfaceom
        PoolName = wheat  # Organic Matter pool name
        type = wheat  # Organic Matter type
        mass = 500  # Initial surface residue (kg/ha)
        cnr = 40  # C:N ratio of initial residue
        standing_fraction = 0.0  # Fraction of residue standing
      mungbean
  simulation NT10 mungbean -  king planting 3
    clock: start_date=7/9/1987; end_date=29/5/1988
    summaryfile
    metfile met: filename=krs8788.met
    area paddock
      outputfile report: filename=NT10 mungbean -  king planting 3 report.out; title=NT10 mungbean -  king planting 3 report
      operations
        07/09/1987  soilwat2 set sw = 0.19 0.21 0.21 0.223 0.219 0.219 0.219 0.229 0.237
        01/01/1988  mungbean sow plants = 40, sowing_depth = 30,crop_class = plant, row_spacing = 360, cultivar = king
      fertiliser
      irrigation: same as aps18 - berkin weathering -  planting 1.paddock.irrigation
      manager: same as aps18 - berkin weathering -  planting 1.paddock.manager
      Soil: same as NT10 mungbean -  king planting 1.paddock.soil
      surfaceom
        PoolName = wheat  # Organic Matter pool name
        type = wheat  # Organic Matter type
        mass = 500  # Initial surface residue (kg/ha)
        cnr = 40  # C:N ratio of initial residue
        standing_fraction = 0.0  # Fraction of residue standing
      mungbean
  simulation NT10 mungbean -  king planting 21
    clock: start_date=7/9/1987; end_date=29/5/1988
    summaryfile
    metfile met: filename=krs8788.met
    area paddock
      outputfile report: filename=NT10 mungbean -  king planting 21 report.out; title=NT10 mungbean -  king planting 21 report
      operations
        07/09/1987  soilwat2 set sw = 0.19 0.21 0.21 0.223 0.219 0.219 0.219 0.229 0.237
        17/01/1988  mungbean sow plants = 10, sowing_depth = 30,crop_class = plant, row_spacing = 360, cultivar = king
      fertiliser
      irrigation: same as aps18 - berkin weathering -  planting 1.paddock.irrigation
      manager: same as aps18 - berkin weathering -  planting 1.paddock.manager
      Soil: same as NT10 mungbean -  king planting 1.paddock.soil
      surfaceom
        PoolName = wheat  # Organic Matter pool name
        type = wheat  # Organic Matter type
        mass = 500  # Initial surface residue (kg/ha)
        cnr = 40  # C:N ratio of initial residue
        standing_fraction = 0.0  # Fraction of residue standing
      mungbean
  simulation NT10 mungbean -  king planting 22
    clock: start_date=7/9/1987; end_date=29/5/1988
    summaryfile
    metfile met: filename=krs8788.met
    area paddock
      outputfile report: filename=NT10 mungbean -  king planting 22 report.out; title=NT10 mungbean -  king planting 22 report
      operations
        07/09/1987  soilwat2 set sw = 0.19 0.21 0.21 0.223 0.219 0.219 0.219 0.229 0.237
        17/01/1988  mungbean sow plants = 20, sowing_depth = 30,crop_class = plant, row_spacing = 360, cultivar = king
      fertiliser
      irrigation: same as aps18 - berkin weathering -  planting 1.paddock.irrigation
      manager: same as aps18 - berkin weathering -  planting 1.paddock.manager
      Soil: same as NT10 mungbean -  king planting 1.paddock.soil
      surfaceom
        PoolName = wheat  # Organic Matter pool name
        type = wheat  # Organic Matter type
        mass = 500  # Initial surface residue (kg/ha)
        cnr = 40  # C:N ratio of initial residue
        standing_fraction = 0.0  # Fraction of residue standing
      mungbean
  simulation NT10 mungbean -  king planting 23
    clock: start_date=7/9/1987; end_date=29/5/1988
    summaryfile
    metfile met: filename=krs8788.met
    area paddock
      outputfile report: filename=NT10 mungbean -  king planting 23 report.out; title=NT10 mungbean -  king planting 23 report
      operations
        07/09/1987  soilwat2 set sw = 0.19 0.21 0.21 0.223 0.219 0.219 0.219 0.229 0.237
        17/01/1988  mungbean sow plants = 40, sowing_depth = 30,crop_class = plant, row_spacing = 360, cultivar = king
      fertiliser
      irrigation: same as aps18 - berkin weathering -  planting 1.paddock.irrigation
      manager: same as aps18 - berkin weathering -  planting 1.paddock.manager
      Soil: same as NT10 mungbean -  king planting 1.paddock.soil
      surfaceom
        PoolName = wheat  # Organic Matter pool name
        type = wheat  # Organic Matter type
        mass = 500  # Initial surface residue (kg/ha)
        cnr = 40  # C:N ratio of initial residue
        standing_fraction = 0.0  # Fraction of residue standing
      mungbean
  simulation NT10 mungbean -  putland planting 1
    clock: start_date=7/9/1987; end_date=29/5/1988
    summaryfile
    metfile met: filename=krs8788.met
    area paddock
      outputfile report: filename=NT10 mungbean -  putland planting 1 report.out; title=NT10 mungbean -  putland planting 1 report
      operations
      fertiliser
      irrigation: same as aps18 - berkin weathering -  planting 1.paddock.irrigation
      manager: same as aps18 - berkin weathering -  planting 1.paddock.manager
      Soil: same as NT10 mungbean -  king planting 1.paddock.soil
      surfaceom
        PoolName = wheat  # Organic Matter pool name
        type = wheat  # Organic Matter type
        mass = 500  # Initial surface residue (kg/ha)
        cnr = 40  # C:N ratio of initial residue
        standing_fraction = 0.0  # Fraction of residue standing
      mungbean
  simulation NT10 mungbean -  putland planting 2
    clock: start_date=7/9/1987; end_date=29/5/1988
    summaryfile
    metfile met: filename=krs8788.met
    area paddock
      outputfile report: filename=NT10 mungbean -  putland planting 2 report.out; title=NT10 mungbean -  putland planting 2 report
      operations
      fertiliser
      irrigation: same as aps18 - berkin weathering -  planting 1.paddock.irrigation
      manager: same as aps18 - berkin weathering -  planting 1.paddock.manager
      Soil: same as NT10 mungbean -  king planting 1.paddock.soil
      surfaceom
        PoolName = wheat  # Organic Matter pool name
        type = wheat  # Organic Matter type
        mass = 500  # Initial surface residue (kg/ha)
        cnr = 40  # C:N ratio of initial residue
        standing_fraction = 0.0  # Fraction of residue standing
      mungbean
  simulation NT10 mungbean -  putland planting 3
    clock: start_date=7/9/1987; end_date=29/5/1988
    summaryfile
    metfile met: filename=krs8788.met
    area paddock
      outputfile report: filename=NT10 mungbean -  putland planting 3 report.out; title=NT10 mungbean -  putland planting 3 report
      operations
      fertiliser
      irrigation: same as aps18 - berkin weathering -  planting 1.paddock.irrigation
      manager: same as aps18 - berkin weathering -  planting 1.paddock.manager
      Soil: same as NT10 mungbean -  king planting 1.paddock.soil
      surfaceom
        PoolName = wheat  # Organic Matter pool name
        type = wheat  # Organic Matter type
        mass = 500  # Initial surface residue (kg/ha)
        cnr = 40  # C:N ratio of initial residue
        standing_fraction = 0.0  # Fraction of residue standing
      mungbean
  simulation NT10 mungbean -  putland planting 21
    clock: start_date=7/9/1987; end_date=29/5/1988
    summaryfile
    metfile met: filename=krs8788.met
    area paddock
      outputfile report: filename=NT10 mungbean -  putland planting 21 report.out; title=NT10 mungbean -  putland planting 21 report
      operations
        07/09/1987  soilwat2 set sw = 0.19 0.21 0.21 0.223 0.219 0.219 0.219 0.229 0.237
        17/01/1988  mungbean sow plants = 10, sowing_depth = 30,crop_class = plant, row_spacing = 360, cultivar = putland
      fertiliser
      irrigation: same as aps18 - berkin weathering -  planting 1.paddock.irrigation
      manager: same as aps18 - berkin weathering -  planting 1.paddock.manager
      Soil: same as NT10 mungbean -  king planting 1.paddock.soil
      surfaceom
        PoolName = wheat  # Organic Matter pool name
        type = wheat  # Organic Matter type
        mass = 500  # Initial surface residue (kg/ha)
        cnr = 40  # C:N ratio of initial residue
        standing_fraction = 0.0  # Fraction of residue standing
      mungbean
  simulation NT10 mungbean -  putland planting 22
    clock: start_date=7/9/1987; end_date=29/5/1988
    summaryfile
    metfile met: filename=krs8788.met
    area paddock
      outputfile report: filename=NT10 mungbean -  putland planting 22 report.out; title=NT10 mungbean -  putland planting 22 report
      operations
        07/09/1987  soilwat2 set sw = 0.19 0.21 0.21 0.223 0.219 0.219 0.219 0.229 0.237
        17/01/1988  mungbean sow plants = 20, sowing_depth = 30,crop_class = plant, row_spacing = 360, cultivar = putland
      fertiliser
      irrigation: same as aps18 - berkin weathering -  planting 1.paddock.irrigation
      manager: same as aps18 - berkin weathering -  planting 1.paddock.manager
      Soil: same as NT10 mungbean -  king planting 1.paddock.soil
      surfaceom
        PoolName = wheat  # Organic Matter pool name
        type = wheat  # Organic Matter type
        mass = 500  # Initial surface residue (kg/ha)
        cnr = 40  # C:N ratio of initial residue
        standing_fraction = 0.0  # Fraction of residue standing
      mungbean
  simulation NT10 mungbean -  putland planting 23
    clock: start_date=7/9/1987; end_date=29/5/1988
    summaryfile
    metfile met: filename=krs8788.met
    area paddock
      outputfile report: filename=NT10 mungbean -  putland planting 23 report.out; title=NT10 mungbean -  putland planting 23 report
      operations
        07/09/1987  soilwat2 set sw = 0.19 0.21 0.21 0.223 0.219 0.219 0.219 0.229 0.237
        17/01/1988  mungbean sow plants = 40, sowing_depth = 30,crop_class = plant, row_spacing = 360, cultivar = putland
      fertiliser
      irrigation: same as aps18 - berkin weathering -  planting 1.paddock.irrigation
      manager: same as aps18 - berkin weathering -  planting 1.paddock.manager
      Soil: same as NT10 mungbean -  king planting 1.paddock.soil
      surfaceom
        PoolName = wheat  # Organic Matter pool name
        type = wheat  # Organic Matter type
        mass = 500  # Initial surface residue (kg/ha)
        cnr = 40  # C:N ratio of initial residue
        standing_fraction = 0.0  # Fraction of residue standing
      mungbean
  simulation NT1 mungbean -  berkin planting 1
    clock: start_date=7/9/1986; end_date=30/5/1987
    summaryfile
    metfile met: filename=krc8687.met
    area paddock
      outputfile report: filename=NT1 mungbean -  berkin planting 1 report.out; title=NT1 mungbean -  berkin planting 1 report
      operations
        07/09/1986  soilwat2 set sw = 0.19 0.21 0.21 0.223 0.219 0.219 0.219 0.229 0.237
        05/01/1987  mungbean sow plants = 38.0,crop_class = plant, row_spacing = 360, sowing_depth = 30, cultivar = berken
      fertiliser
      irrigation: same as aps18 - berkin weathering -  planting 1.paddock.irrigation
      manager: same as aps18 - berkin weathering -  planting 1.paddock.manager
      Soil: same as NT10 mungbean -  king planting 1.paddock.soil
      surfaceom
        PoolName = wheat  # Organic Matter pool name
        type = wheat  # Organic Matter type
        mass = 500  # Initial surface residue (kg/ha)
        cnr = 40  # C:N ratio of initial residue
        standing_fraction = 0.0  # Fraction of residue standing
      mungbean
  simulation NT1 mungbean -  berkin planting 2
    clock: start_date=1/1/1987; end_date=30/5/1987
    summaryfile
    metfile met: filename=krc8687.met
    area paddock
      outputfile report: filename=NT1 mungbean -  berkin planting 2 report.out; title=NT1 mungbean -  berkin planting 2 report
      operations
        01/01/1987  soilwat2 set sw = 0.19 0.21 0.21 0.223 0.219 0.219 0.219 0.229 0.237
        30/01/1987  mungbean sow plants = 36.0,crop_class = plant, row_spacing = 360, sowing_depth = 30, cultivar = berken
      fertiliser
      irrigation: same as aps18 - berkin weathering -  planting 1.paddock.irrigation
      manager: same as aps18 - berkin weathering -  planting 1.paddock.manager
      Soil
        InitialWater Initial water: FractionFull=1; PercentMethod=EvenlyDistributed
        Water: same as NT10 mungbean -  king planting 1.paddock.soil.Water
        SoilWater: same as NT10 mungbean -  king planting 1.paddock.soil.SoilWater
        SoilOrganicMatter: same as NT10 mungbean -  king planting 1.paddock.soil.SoilOrganicMatter
        Analysis
          Thickness=[150.0, 150.0, 150.0, 150.0, 150.0, 150.0, 300.0, 300.0, 300.0]
          PH=[6.500, 6.200, 6.300, 6.400, 6.500, 6.600, 6.600, 6.500, 6.500]
        Sample Initial nitrogen
          Thickness  NO3  NH4
          150.0      2    1
          150.0      2    1
          150.0      2    1
          150.0      2    1
          150.0      2    1
          150.0      2    1
          300.0      2    1
          300.0      2    1
          300.0      -    -
      surfaceom
        PoolName = wheat  # Organic Matter pool name
        type = wheat  # Organic Matter type
        mass = 500  # Initial surface residue (kg/ha)
        cnr = 40  # C:N ratio of initial residue
        standing_fraction = 0.0  # Fraction of residue standing
      mungbean
  simulation NT1 mungbean -  king planting 1
    clock: start_date=7/9/1986; end_date=30/5/1987
    summaryfile
    metfile met: filename=krc8687.met
    area paddock
      outputfile report: filename=NT1 mungbean -  king planting 1 report.out; title=NT1 mungbean -  king planting 1 report
      operations
        07/09/1986  soilwat2 set sw = 0.19 0.21 0.21 0.223 0.219 0.219 0.219 0.229 0.237
        05/01/1987  mungbean sow plants = 33.5,crop_class = plant, row_spacing = 360, sowing_depth = 30, cultivar = king
      fertiliser
      irrigation: same as aps18 - berkin weathering -  planting 1.paddock.irrigation
      manager: same as aps18 - berkin weathering -  planting 1.paddock.manager
      Soil: same as NT1 mungbean -  berkin planting 2.paddock.soil
      surfaceom
        PoolName = wheat  # Organic Matter pool name
        type = wheat  # Organic Matter type
        mass = 500  # Initial surface residue (kg/ha)
        cnr = 40  # C:N ratio of initial residue
        standing_fraction = 0.0  # Fraction of residue standing
      mungbean
  simulation NT1 mungbean -  king planting 2
    clock: start_date=7/9/1986; end_date=30/5/1987
    summaryfile
    metfile met: filename=krc8687.met
    area paddock
      outputfile report: filename=NT1 mungbean -  king planting 2 report.out; title=NT1 mungbean -  king planting 2 report
      operations
        07/09/1986  soilwat2 set sw = 0.19 0.21 0.21 0.223 0.219 0.219 0.219 0.229 0.237
        30/01/1987  mungbean sow plants = 36.0,crop_class = plant, row_spacing = 360, sowing_depth = 30, cultivar = king
      fertiliser
      irrigation: same as aps18 - berkin weathering -  planting 1.paddock.irrigation
      manager: same as aps18 - berkin weathering -  planting 1.paddock.manager
      Soil: same as NT1 mungbean -  berkin planting 2.paddock.soil
      surfaceom
        PoolName = wheat  # Organic Matter pool name
        type = wheat  # Organic Matter type
        mass = 500  # Initial surface residue (kg/ha)
        cnr = 40  # C:N ratio of initial residue
        standing_fraction = 0.0  # Fraction of residue standing
      mungbean
  simulation NT1 mungbean -  satin planting 1
    clock: start_date=7/9/1986; end_date=30/5/1987
    summaryfile
    metfile met: filename=krc8687.met
    area paddock
      outputfile report: filename=NT1 mungbean -  satin planting 1 report.out; title=NT1 mungbean -  satin planting 1 report
      operations
        07/09/1986  soilwat2 set sw = 0.19 0.21 0.21 0.223 0.219 0.219 0.219 0.229 0.237
        05/01/1987  mungbean sow plants = 35.2,crop_class = plant, row_spacing = 360, sowing_depth = 30, cultivar = satin
      fertiliser
      irrigation: same as aps18 - berkin weathering -  planting 1.paddock.irrigation
      manager: same as aps18 - berkin weathering -  planting 1.paddock.manager
      Soil: same as NT1 mungbean -  berkin planting 2.paddock.soil
      surfaceom
        PoolName = wheat  # Organic Matter pool name
        type = wheat  # Organic Matter type
        mass = 500  # Initial surface residue (kg/ha)
        cnr = 40  # C:N ratio of initial residue
        standing_fraction = 0.0  # Fraction of residue standing
      mungbean
  simulation NT1 mungbean -  satin planting 2
    clock: start_date=7/9/1986; end_date=30/5/1987
    summaryfile
    metfile met: filename=krc8687.met
    area paddock
      outputfile report: filename=NT1 mungbean -  satin planting 2 report.out; title=NT1 mungbean -  satin planting 2 report
      operations
        07/09/1986  soilwat2 set sw = 0.19 0.21 0.21 0.223 0.219 0.219 0.219 0.229 0.237
        30/01/1987  mungbean sow plants = 40.8,crop_class = plant, row_spacing = 360, sowing_depth = 30, cultivar = satin
      fertiliser
      irrigation: same as aps18 - berkin weathering -  planting 1.paddock.irrigation
      manager: same as aps18 - berkin weathering -  planting 1.paddock.manager
      Soil: same as NT1 mungbean -  berkin planting 2.paddock.soil
      surfaceom
        PoolName = wheat  # Organic Matter pool name
        type = wheat  # Organic Matter type
        mass = 500  # Initial surface residue (kg/ha)
        cnr = 40  # C:N ratio of initial residue
        standing_fraction = 0.0  # Fraction of residue standing
      mungbean
  simulation NT1 mungbean -  shantung planting 1
    clock: start_date=7/9/1986; end_date=30/5/1987
    summaryfile
    metfile met: filename=krc8687.met
    area paddock
      outputfile report: filename=NT1 mungbean -  shantung planting 1 report.out; title=NT1 mungbean -  shantung planting 1 report
      operations
        07/09/1986  soilwat2 set sw = 0.19 0.21 0.21 0.223 0.219 0.219 0.219 0.229 0.237
        05/01/1987  mungbean sow plants = 33.9,crop_class = plant, row_spacing = 360, sowing_depth = 30, cultivar = shangtung
      fertiliser
      irrigation: same as aps18 - berkin weathering -  planting 1.paddock.irrigation
      manager: same as aps18 - berkin weathering -  planting 1.paddock.manager
      Soil: same as NT1 mungbean -  berkin planting 2.paddock.soil
      surfaceom
        PoolName = wheat  # Organic Matter pool name
        type = wheat  # Organic Matter type
        mass = 500  # Initial surface residue (kg/ha)
        cnr = 40  # C:N ratio of initial residue
        standing_fraction = 0.0  # Fraction of residue standing
      mungbean
  simulation NT1 mungbean -  shantung planting 2
    clock: start_date=7/9/1986; end_date=30/5/1987
    summaryfile
    metfile met: filename=krc8687.met
    area paddock
      outputfile report: filename=NT1 mungbean -  shantung planting 2 report.out; title=NT1 mungbean -  shantung planting 2 report
      operations
        07/09/1986  soilwat2 set sw = 0.19 0.21 0.21 0.223 0.219 0.219 0.219 0.229 0.237
        30/01/1987  mungbean sow plants = 34.4,crop_class = plant, row_spacing = 360, sowing_depth = 30, cultivar = shangtung
      fertiliser
      irrigation: same as aps18 - berkin weathering -  planting 1.paddock.irrigation
      manager: same as aps18 - berkin weathering -  planting 1.paddock.manager
      Soil: same as NT1 mungbean -  berkin planting 2.paddock.soil
      surfaceom
        PoolName = wheat  # Organic Matter pool name
        type = wheat  # Organic Matter type
        mass = 500  # Initial surface residue (kg/ha)
        cnr = 40  # C:N ratio of initial residue
        standing_fraction = 0.0  # Fraction of residue standing
      mungbean
  simulation NT1 mungbean -  putland planting 1
    clock: start_date=7/9/1986; end_date=30/5/1987
    summaryfile
    metfile met: filename=krc8687.met
    area paddock
      outputfile report: filename=NT1 mungbean -  putland planting 1 report.out; title=NT1 mungbean -  putland planting 1 report
      operations
        07/09/1986  soilwat2 set sw = 0.19 0.21 0.21 0.223 0.219 0.219 0.219 0.229 0.237
        05/01/1987  mungbean sow plants = 33.5,crop_class = plant, row_spacing = 360, sowing_depth = 30, cultivar = putland
      fertiliser
      irrigation: same as aps18 - berkin weathering -  planting 1.paddock.irrigation
      manager: same as aps18 - berkin weathering -  planting 1.paddock.manager
      Soil: same as NT1 mungbean -  berkin planting 2.paddock.soil
      surfaceom
        PoolName = wheat  # Organic Matter pool name
        type = wheat  # Organic Matter type
        mass = 500  # Initial surface residue (kg/ha)
        cnr = 40  # C:N ratio of initial residue
        standing_fraction = 0.0  # Fraction of residue standing
      mungbean
  simulation NT1 mungbean -  putland planting 2
    clock: start_date=7/9/1986; end_date=30/5/1987
    summaryfile
    metfile met: filename=krc8687.met
    area paddock
      outputfile report: filename=NT1 mungbean -  putland planting 2 report.out; title=NT1 mungbean -  putland planting 2 report
      operations
        07/09/1986  soilwat2 set sw = 0.19 0.21 0.21 0.223 0.219 0.219 0.219 0.229 0.237
        30/01/1987  mungbean sow plants = 33.2,crop_class = plant, row_spacing = 360, sowing_depth = 30, cultivar = putland
      fertiliser
      irrigation: same as aps18 - berkin weathering -  planting 1.paddock.irrigation
      manager: same as aps18 - berkin weathering -  planting 1.paddock.manager
      Soil: same as NT1 mungbean -  berkin planting 2.paddock.soil
      surfaceom
        PoolName = wheat  # Organic Matter pool name
        type = wheat  # Organic Matter type
        mass = 500  # Initial surface residue (kg/ha)
        cnr = 40  # C:N ratio of initial residue
        standing_fraction = 0.0  # Fraction of residue standing
      mungbean
  simulation NT2 mungbean -  king planting 1
    clock: start_date=1/1/1987; end_date=30/5/1987
    summaryfile
    metfile met: filename=dd8687.met
    area paddock
      outputfile report: filename=NT2 mungbean -  king planting 1 report.out; title=NT2 mungbean -  king planting 1 report
      operations
        15/01/1987  mungbean sow plants = 38.9,crop_class = plant, row_spacing = 360, sowing_depth = 30, cultivar = king
      fertiliser
      irrigation: same as aps18 - berkin weathering -  planting 1.paddock.irrigation
      manager: same as aps18 - berkin weathering -  planting 1.paddock.manager
      Soil
        InitialWater Initial water: FractionFull=1; PercentMethod=EvenlyDistributed
        Water
          Thickness  BD     AirDry  LL15   DUL    SAT
          150.0      1.560  0.053   0.19   0.304  0.315
          150.0      1.520  0.08    0.21   0.31   0.330
          150.0      1.460  0.21    0.21   0.31   0.337
          150.0      1.460  0.223   0.223  0.324  0.340
          150.0      1.420  0.219   0.219  0.328  0.340
          150.0      1.420  0.219   0.219  0.328  0.341
          300.0      1.460  0.219   0.219  0.325  0.344
          300.0      1.500  0.229   0.229  0.337  0.346
          300.0      1.530  0.237   0.237  0.35   0.370
          SoilCrop mungbean
            LL=[0.19, 0.21, 0.21, 0.235, 0.233, 0.242, 0.248, 0.277, 0.285]
            KL=[0.08, 0.08, 0.08, 0.08, 0.06, 0.04, 0.02, 0.01, 0.01]
            XF=[1.0, 1.0, 1.0, 1.0, 1.0, 1.0, 1.0, 1.0, 1.0]
        SoilWater: SummerCona=6.6; SummerU=1.5; SummerDate=1-Nov; WinterCona=6.6; WinterU=1.5; WinterDate=1-Apr; DiffusConst=88.0; DiffusSlope=35.4; Salb=0.2; CN2Bare=85; CNRed=20; CNCov=0.8; SWCON=[0.7, 0.7, 0.7, 0.7, 0.7, 0.7, 0.7, 0.7, 0.7]
          Thickness=[150.0, 150.0, 150.0, 150.0, 150.0, 150.0, 300.0, 300.0, 300.0]
        SoilOrganicMatter: same as NT10 mungbean -  king planting 1.paddock.soil.SoilOrganicMatter
        Analysis
          Thickness=[150.0, 150.0, 150.0, 150.0, 150.0, 150.0, 300.0, 300.0, 300.0]
          PH=[6.500, 6.200, 6.300, 6.400, 6.500, 6.600, 6.600, 6.500, 6.500]
        Sample Initial nitrogen
          Thickness  NO3  NH4
          150.0      2    1
          150.0      2    1
          150.0      2    1
          150.0      2    1
          150.0      2    1
          150.0      2    1
          300.0      2    1
          300.0      2    1
          300.0      -    -
      surfaceom
        PoolName = wheat  # Organic Matter pool name
        type = wheat  # Organic Matter type
        mass = 500  # Initial surface residue (kg/ha)
        cnr = 40  # C:N ratio of initial residue
        standing_fraction = 0.0  # Fraction of residue standing
      mungbean
  simulation NT2 mungbean -  king planting 2
    clock: start_date=1/1/1987; end_date=30/5/1987
    summaryfile
    metfile met: filename=dd8687.met
    area paddock
      outputfile report: filename=NT2 mungbean -  king planting 2 report.out; title=NT2 mungbean -  king planting 2 report
      operations
        28/01/1987  mungbean sow plants = 33.4,crop_class = plant, row_spacing = 360, sowing_depth = 30, cultivar = king
      fertiliser
      irrigation: same as aps18 - berkin weathering -  planting 1.paddock.irrigation
      manager: same as aps18 - berkin weathering -  planting 1.paddock.manager
      Soil: same as NT2 mungbean -  king planting 1.paddock.soil
      surfaceom
        PoolName = wheat  # Organic Matter pool name
        type = wheat  # Organic Matter type
        mass = 500  # Initial surface residue (kg/ha)
        cnr = 40  # C:N ratio of initial residue
        standing_fraction = 0.0  # Fraction of residue standing
      mungbean
  simulation NT2 mungbean -  king planting 3
    clock: start_date=1/1/1987; end_date=30/5/1987
    summaryfile
    metfile met: filename=dd8687.met
    area paddock
      outputfile report: filename=NT2 mungbean -  king planting 3 report.out; title=NT2 mungbean -  king planting 3 report
      operations
        10/02/1987  mungbean sow plants = 31.7,crop_class = plant, row_spacing = 360, sowing_depth = 30, cultivar = king
      fertiliser
      irrigation: same as aps18 - berkin weathering -  planting 1.paddock.irrigation
      manager: same as aps18 - berkin weathering -  planting 1.paddock.manager
      Soil: same as NT2 mungbean -  king planting 1.paddock.soil
      surfaceom
        PoolName = wheat  # Organic Matter pool name
        type = wheat  # Organic Matter type
        mass = 500  # Initial surface residue (kg/ha)
        cnr = 40  # C:N ratio of initial residue
        standing_fraction = 0.0  # Fraction of residue standing
      mungbean
  simulation NT2 mungbean -  king planting 4
    clock: start_date=1/1/1987; end_date=30/5/1987
    summaryfile
    metfile met: filename=dd8687.met
    area paddock
      outputfile report: filename=NT2 mungbean -  king planting 4 report.out; title=NT2 mungbean -  king planting 4 report
      operations
        25/02/1987  mungbean sow plants = 32.9,crop_class = plant, row_spacing = 360, sowing_depth = 30, cultivar = king
      fertiliser
      irrigation: same as aps18 - berkin weathering -  planting 1.paddock.irrigation
      manager: same as aps18 - berkin weathering -  planting 1.paddock.manager
      Soil: same as NT2 mungbean -  king planting 1.paddock.soil
      surfaceom
        PoolName = wheat  # Organic Matter pool name
        type = wheat  # Organic Matter type
        mass = 500  # Initial surface residue (kg/ha)
        cnr = 40  # C:N ratio of initial residue
        standing_fraction = 0.0  # Fraction of residue standing
      mungbean
  simulation NT2 mungbean -  satin planting 1
    clock: start_date=7/9/1986; end_date=30/5/1987
    summaryfile
    metfile met: filename=dd8687.met
    area paddock
      outputfile report: filename=NT2 mungbean -  satin planting 1 report.out; title=NT2 mungbean -  satin planting 1 report
      operations
        15/01/1987  mungbean sow plants = 26.1,crop_class = plant, row_spacing = 360, sowing_depth = 30, cultivar = satin
      fertiliser
      irrigation: same as aps18 - berkin weathering -  planting 1.paddock.irrigation
      manager: same as aps18 - berkin weathering -  planting 1.paddock.manager
      Soil: same as NT2 mungbean -  king planting 1.paddock.soil
      surfaceom
        PoolName = wheat  # Organic Matter pool name
        type = wheat  # Organic Matter type
        mass = 500  # Initial surface residue (kg/ha)
        cnr = 40  # C:N ratio of initial residue
        standing_fraction = 0.0  # Fraction of residue standing
      mungbean
  simulation NT2 mungbean -  satin planting 2
    clock: start_date=7/9/1986; end_date=30/5/1987
    summaryfile
    metfile met: filename=dd8687.met
    area paddock
      outputfile report: filename=NT2 mungbean -  satin planting 2 report.out; title=NT2 mungbean -  satin planting 2 report
      operations
        28/01/1987  mungbean sow plants = 36.0,crop_class = plant, row_spacing = 360, sowing_depth = 30, cultivar = satin
      fertiliser
      irrigation: same as aps18 - berkin weathering -  planting 1.paddock.irrigation
      manager: same as aps18 - berkin weathering -  planting 1.paddock.manager
      Soil: same as NT2 mungbean -  king planting 1.paddock.soil
      surfaceom
        PoolName = wheat  # Organic Matter pool name
        type = wheat  # Organic Matter type
        mass = 500  # Initial surface residue (kg/ha)
        cnr = 40  # C:N ratio of initial residue
        standing_fraction = 0.0  # Fraction of residue standing
      mungbean
  simulation NT2 mungbean -  satin planting 3
    clock: start_date=7/9/1986; end_date=30/5/1987
    summaryfile
    metfile met: filename=dd8687.met
    area paddock
      outputfile report: filename=NT2 mungbean -  satin planting 3 report.out; title=NT2 mungbean -  satin planting 3 report
      operations
        10/02/1987  mungbean sow plants = 38.0,crop_class = plant, row_spacing = 360, sowing_depth = 30, cultivar = satin
      fertiliser
      irrigation: same as aps18 - berkin weathering -  planting 1.paddock.irrigation
      manager: same as aps18 - berkin weathering -  planting 1.paddock.manager
      Soil: same as NT2 mungbean -  king planting 1.paddock.soil
      surfaceom
        PoolName = wheat  # Organic Matter pool name
        type = wheat  # Organic Matter type
        mass = 500  # Initial surface residue (kg/ha)
        cnr = 40  # C:N ratio of initial residue
        standing_fraction = 0.0  # Fraction of residue standing
      mungbean
  simulation NT2 mungbean -  satin planting 4
    clock: start_date=7/9/1986; end_date=30/5/1987
    summaryfile
    metfile met: filename=dd8687.met
    area paddock
      outputfile report: filename=NT2 mungbean -  satin planting 4 report.out; title=NT2 mungbean -  satin planting 4 report
      operations
        25/02/1987  mungbean sow plants = 39.0,crop_class = plant, row_spacing = 360, sowing_depth = 30, cultivar = satin
      fertiliser
      irrigation: same as aps18 - berkin weathering -  planting 1.paddock.irrigation
      manager: same as aps18 - berkin weathering -  planting 1.paddock.manager
      Soil: same as NT2 mungbean -  king planting 1.paddock.soil
      surfaceom
        PoolName = wheat  # Organic Matter pool name
        type = wheat  # Organic Matter type
        mass = 500  # Initial surface residue (kg/ha)
        cnr = 40  # C:N ratio of initial residue
        standing_fraction = 0.0  # Fraction of residue standing
      mungbean
  simulation NT2 mungbean -  putland planting 1
    clock: start_date=1/1/1987; end_date=30/5/1987
    summaryfile
    metfile met: filename=dd8687.met
    area paddock
      outputfile report: filename=NT2 mungbean -  putland planting 1 report.out; title=NT2 mungbean -  putland planting 1 report
      operations
        15/01/1987  mungbean sow plants = 31.9,crop_class = plant, row_spacing = 360, sowing_depth = 30, cultivar = putland
      fertiliser
      irrigation: same as aps18 - berkin weathering -  planting 1.paddock.irrigation
      manager: same as aps18 - berkin weathering -  planting 1.paddock.manager
      Soil: same as NT2 mungbean -  king planting 1.paddock.soil
      surfaceom
        PoolName = wheat  # Organic Matter pool name
        type = wheat  # Organic Matter type
        mass = 500  # Initial surface residue (kg/ha)
        cnr = 40  # C:N ratio of initial residue
        standing_fraction = 0.0  # Fraction of residue standing
      mungbean
  simulation NT2 mungbean -  putland planting 2
    clock: start_date=1/1/1987; end_date=30/5/1987
    summaryfile
    metfile met: filename=dd8687.met
    area paddock
      outputfile report: filename=NT2 mungbean -  putland planting 2 report.out; title=NT2 mungbean -  putland planting 2 report
      operations
        28/01/1987  mungbean sow plants = 34.1,crop_class = plant, row_spacing = 360, sowing_depth = 30, cultivar = putland
      fertiliser
      irrigation: same as aps18 - berkin weathering -  planting 1.paddock.irrigation
      manager: same as aps18 - berkin weathering -  planting 1.paddock.manager
      Soil: same as NT2 mungbean -  king planting 1.paddock.soil
      surfaceom
        PoolName = wheat  # Organic Matter pool name
        type = wheat  # Organic Matter type
        mass = 500  # Initial surface residue (kg/ha)
        cnr = 40  # C:N ratio of initial residue
        standing_fraction = 0.0  # Fraction of residue standing
      mungbean
  simulation NT2 mungbean -  putland planting 3
    clock: start_date=1/1/1987; end_date=30/5/1987
    summaryfile
    metfile met: filename=dd8687.met
    area paddock
      outputfile report: filename=NT2 mungbean -  putland planting 3 report.out; title=NT2 mungbean -  putland planting 3 report
      operations
        10/02/1987  mungbean sow plants = 32.9,crop_class = plant, row_spacing = 360, sowing_depth = 30, cultivar = putland
      fertiliser
      irrigation: same as aps18 - berkin weathering -  planting 1.paddock.irrigation
      manager: same as aps18 - berkin weathering -  planting 1.paddock.manager
      Soil: same as NT2 mungbean -  king planting 1.paddock.soil
      surfaceom
        PoolName = wheat  # Organic Matter pool name
        type = wheat  # Organic Matter type
        mass = 500  # Initial surface residue (kg/ha)
        cnr = 40  # C:N ratio of initial residue
        standing_fraction = 0.0  # Fraction of residue standing
      mungbean
  simulation NT2 mungbean -  putland planting 4
    clock: start_date=1/1/1987; end_date=1/6/1987
    summaryfile
    metfile met: filename=dd8687.met
    area paddock
      outputfile report: filename=NT2 mungbean -  putland planting 4 report.out; title=NT2 mungbean -  putland planting 4 report
      operations
        25/02/1987  mungbean sow plants = 33.9,crop_class = plant, row_spacing = 360, sowing_depth = 30, cultivar = putland
      fertiliser
      irrigation: same as aps18 - berkin weathering -  planting 1.paddock.irrigation
      manager: same as aps18 - berkin weathering -  planting 1.paddock.manager
      Soil: same as NT2 mungbean -  king planting 1.paddock.soil
      surfaceom
        PoolName = wheat  # Organic Matter pool name
        type = wheat  # Organic Matter type
        mass = 500  # Initial surface residue (kg/ha)
        cnr = 40  # C:N ratio of initial residue
        standing_fraction = 0.0  # Fraction of residue standing
      mungbean
  simulation NT3 mungbean -  king planting 1
    clock: start_date=7/9/1986; end_date=30/5/1987
    summaryfile
    metfile met: filename=krc8687.met
    area paddock
      outputfile report: filename=NT3 mungbean -  king planting 1 report.out; title=NT3 mungbean -  king planting 1 report
      operations
        18/01/1987  soilwat2 set sw = 0.19 0.21 0.21 0.223 0.219 0.219 0.219 0.229 0.237
        19/01/1987  mungbean sow plants = 40,crop_class = plant, row_spacing = 360, sowing_depth = 30, cultivar = king
      fertiliser
      irrigation: same as aps18 - berkin weathering -  planting 1.paddock.irrigation
      manager: same as aps18 - berkin weathering -  planting 1.paddock.manager
      Soil: same as NT1 mungbean -  berkin planting 2.paddock.soil
      surfaceom
        PoolName = wheat  # Organic Matter pool name
        type = wheat  # Organic Matter type
        mass = 500  # Initial surface residue (kg/ha)
        cnr = 40  # C:N ratio of initial residue
        standing_fraction = 0.0  # Fraction of residue standing
      mungbean
  simulation NT3 mungbean -  king planting 2
    clock: start_date=7/9/1986; end_date=30/5/1987
    summaryfile
    metfile met: filename=krc8687.met
    area paddock
      outputfile report: filename=NT3 mungbean -  king planting 2 report.out; title=NT3 mungbean -  king planting 2 report
      operations
        18/01/1987  soilwat2 set sw = 0.19 0.21 0.21 0.223 0.219 0.219 0.219 0.229 0.237
        30/01/1987  mungbean sow plants = 40,crop_class = plant, row_spacing = 360, sowing_depth = 30, cultivar = king
      fertiliser
      irrigation: same as aps18 - berkin weathering -  planting 1.paddock.irrigation
      manager: same as aps18 - berkin weathering -  planting 1.paddock.manager
      Soil: same as NT1 mungbean -  berkin planting 2.paddock.soil
      surfaceom
        PoolName = wheat  # Organic Matter pool name
        type = wheat  # Organic Matter type
        mass = 500  # Initial surface residue (kg/ha)
        cnr = 40  # C:N ratio of initial residue
        standing_fraction = 0.0  # Fraction of residue standing
      mungbean
  simulation NT3 mungbean -  king planting 3
    clock: start_date=7/9/1986; end_date=30/5/1987
    summaryfile
    metfile met: filename=krc8687.met
    area paddock
      outputfile report: filename=NT3 mungbean -  king planting 3 report.out; title=NT3 mungbean -  king planting 3 report
      operations
        18/01/1987  soilwat2 set sw = 0.19 0.21 0.21 0.223 0.219 0.219 0.219 0.229 0.237
        15/02/1987  mungbean sow plants = 40,crop_class = plant, row_spacing = 360, sowing_depth = 30, cultivar = king
      fertiliser
      irrigation: same as aps18 - berkin weathering -  planting 1.paddock.irrigation
      manager: same as aps18 - berkin weathering -  planting 1.paddock.manager
      Soil: same as NT1 mungbean -  berkin planting 2.paddock.soil
      surfaceom
        PoolName = wheat  # Organic Matter pool name
        type = wheat  # Organic Matter type
        mass = 500  # Initial surface residue (kg/ha)
        cnr = 40  # C:N ratio of initial residue
        standing_fraction = 0.0  # Fraction of residue standing
      mungbean
  simulation NT3 mungbean -  shantung planting 1
    clock: start_date=7/9/1986; end_date=30/5/1987
    summaryfile
    metfile met: filename=krc8687.met
    area paddock
      outputfile report: filename=NT3 mungbean -  shantung planting 1 report.out; title=NT3 mungbean -  shantung planting 1 report
      operations
        18/01/1987  soilwat2 set sw = 0.19 0.21 0.21 0.223 0.219 0.219 0.219 0.229 0.237
        19/01/1987  mungbean sow plants = 40,crop_class = plant, row_spacing = 360, sowing_depth = 30, cultivar = shangtung
      fertiliser
      irrigation: same as aps18 - berkin weathering -  planting 1.paddock.irrigation
      manager: same as aps18 - berkin weathering -  planting 1.paddock.manager
      Soil: same as NT1 mungbean -  berkin planting 2.paddock.soil
      surfaceom
        PoolName = wheat  # Organic Matter pool name
        type = wheat  # Organic Matter type
        mass = 500  # Initial surface residue (kg/ha)
        cnr = 40  # C:N ratio of initial residue
        standing_fraction = 0.0  # Fraction of residue standing
      mungbean
  simulation NT3 mungbean -  shantung planting 2
    clock: start_date=7/9/1986; end_date=30/5/1987
    summaryfile
    metfile met: filename=krc8687.met
    area paddock
      outputfile report: filename=NT3 mungbean -  shantung planting 2 report.out; title=NT3 mungbean -  shantung planting 2 report
      operations
        18/01/1987  soilwat2 set sw = 0.19 0.21 0.21 0.223 0.219 0.219 0.219 0.229 0.237
        30/01/1987  mungbean sow plants = 40,crop_class = plant, row_spacing = 360, sowing_depth = 30, cultivar = shangtung
      fertiliser
      irrigation: same as aps18 - berkin weathering -  planting 1.paddock.irrigation
      manager: same as aps18 - berkin weathering -  planting 1.paddock.manager
      Soil: same as NT1 mungbean -  berkin planting 2.paddock.soil
      surfaceom
        PoolName = wheat  # Organic Matter pool name
        type = wheat  # Organic Matter type
        mass = 500  # Initial surface residue (kg/ha)
        cnr = 40  # C:N ratio of initial residue
        standing_fraction = 0.0  # Fraction of residue standing
      mungbean
  simulation NT3 mungbean -  shantung planting 3
    clock: start_date=7/9/1986; end_date=30/5/1987
    summaryfile
    metfile met: filename=krc8687.met
    area paddock
      outputfile report: filename=NT3 mungbean -  shantung planting 3 report.out; title=NT3 mungbean -  shantung planting 3 report
      operations
        18/01/1987  soilwat2 set sw = 0.19 0.21 0.21 0.223 0.219 0.219 0.219 0.229 0.237
        15/02/1987  mungbean sow plants = 40,crop_class = plant, row_spacing = 360, sowing_depth = 30, cultivar = shangtung
      fertiliser
      irrigation: same as aps18 - berkin weathering -  planting 1.paddock.irrigation
      manager: same as aps18 - berkin weathering -  planting 1.paddock.manager
      Soil: same as NT1 mungbean -  berkin planting 2.paddock.soil
      surfaceom
        PoolName = wheat  # Organic Matter pool name
        type = wheat  # Organic Matter type
        mass = 500  # Initial surface residue (kg/ha)
        cnr = 40  # C:N ratio of initial residue
        standing_fraction = 0.0  # Fraction of residue standing
      mungbean
  simulation NT4 mungbean -  king planting 1
    clock: start_date=7/9/1989; end_date=30/5/1990
    summaryfile
    metfile met: filename=krs8990.met
    area paddock
      outputfile report: filename=NT4 mungbean -  king planting 1 report.out; title=NT4 mungbean -  king planting 1 report
      operations
        07/09/1989  soilwat2 set sw = 0.19 0.21 0.21 0.223 0.219 0.219 0.219 0.229 0.237
        01/01/1990  residue2 set residue_wt = 4000.0
        04/01/1990  mungbean sow plants = 40, sowing_depth = 30, cultivar = king ,crop_class = plant
        22/12/1989  irrigate apply amount = 37.0
        24/12/1989  irrigate apply amount = 25.0
        27/12/1989  irrigate apply amount = 35.0
        03/01/1990  irrigate apply amount = 15.0
        04/01/1990  irrigate apply amount = 15.0
        06/01/1990  irrigate apply amount = 8.0
        17/01/1990  irrigate apply amount = 10.0
        20/01/1990  irrigate apply amount = 23.0
        26/01/1990  irrigate apply amount = 6.0
        30/01/1990  irrigate apply amount = 7.0
        06/02/1990  irrigate apply amount = 21.0
        09/02/1990  irrigate apply amount = 16.0
        13/02/1990  irrigate apply amount = 15.0
      fertiliser
      irrigation
        automatic_irrigation = on
        asw_depth = 1000  # Depth to which ASW is calculated. (mm)
        crit_fr_asw = 0.70  # Fraction of ASW below which irrigation is applied (0-1.0)
        irrigation_efficiency = 1  # Efficiency of the irrigation. (0-1.0)
        irrigation_allocation = off  # Allocation limits
        allocation = 0  # Allocation in mm
        default_no3_conc = 0.0  # Nitrate concentration (ppm N)
        default_nh4_conc = 0.0  # Ammonium concentration (ppm N)
        default_cl_conc = 0.0  # Chloride concentration (ppm Cl)
      manager: same as aps18 - berkin weathering -  planting 1.paddock.manager
      Soil: same as NT1 mungbean -  berkin planting 2.paddock.soil
      surfaceom
        PoolName = wheat  # Organic Matter pool name
        type = wheat  # Organic Matter type
        mass = 500  # Initial surface residue (kg/ha)
        cnr = 40  # C:N ratio of initial residue
        standing_fraction = 0.0  # Fraction of residue standing
      mungbean
  simulation NT4 mungbean -  king planting 2
    clock: start_date=7/9/1989; end_date=30/5/1990
    summaryfile
    metfile met: filename=krs8990.met
    area paddock
      outputfile report: filename=NT4 mungbean -  king planting 2 report.out; title=NT4 mungbean -  king planting 2 report
      operations
        07/09/1989  soilwat2 set sw = 0.19 0.21 0.21 0.223 0.219 0.219 0.219 0.229 0.237
        01/01/1990  residue2 set residue_wt = 4000.0
        17/01/1990  mungbean sow plants = 40, sowing_depth = 30, cultivar = king ,crop_class = plant
        22/12/1989  irrigate apply amount = 37.0
        24/12/1989  irrigate apply amount = 25.0
        27/12/1989  irrigate apply amount = 35.0
        03/01/1990  irrigate apply amount = 15.0
        04/01/1990  irrigate apply amount = 15.0
        06/01/1990  irrigate apply amount = 8.0
        17/01/1990  irrigate apply amount = 10.0
        20/01/1990  irrigate apply amount = 23.0
        26/01/1990  irrigate apply amount = 6.0
        30/01/1990  irrigate apply amount = 7.0
        06/02/1990  irrigate apply amount = 21.0
        09/02/1990  irrigate apply amount = 16.0
        13/02/1990  irrigate apply amount = 15.0
      fertiliser
      irrigation: same as NT4 mungbean -  king planting 1.paddock.irrigation
      manager: same as aps18 - berkin weathering -  planting 1.paddock.manager
      Soil: same as NT1 mungbean -  berkin planting 2.paddock.soil
      surfaceom
        PoolName = wheat  # Organic Matter pool name
        type = wheat  # Organic Matter type
        mass = 500  # Initial surface residue (kg/ha)
        cnr = 40  # C:N ratio of initial residue
        standing_fraction = 0.0  # Fraction of residue standing
      mungbean
  simulation NT5 mungbean -  king planting 1
    clock: start_date=7/9/1990; end_date=30/5/1991
    summaryfile
    metfile met: filename=krs9091.met
    area paddock
      outputfile report: filename=NT5 mungbean -  king planting 1 report.out; title=NT5 mungbean -  king planting 1 report
      operations
        07/09/1990  soilwat2 set sw = 0.19 0.21 0.21 0.223 0.219 0.219 0.219 0.229 0.237
        15/01/1991  mungbean sow plants = 38, sowing_depth = 30, cultivar = king,crop_class = plant
      fertiliser
      irrigation: same as aps18 - berkin weathering -  planting 1.paddock.irrigation
      manager: same as aps18 - berkin weathering -  planting 1.paddock.manager
      Soil: same as NT1 mungbean -  berkin planting 2.paddock.soil
      surfaceom
        PoolName = wheat  # Organic Matter pool name
        type = wheat  # Organic Matter type
        mass = 500  # Initial surface residue (kg/ha)
        cnr = 40  # C:N ratio of initial residue
        standing_fraction = 0.0  # Fraction of residue standing
      mungbean
  simulation NT5 mungbean -  putland planting 1
    clock: start_date=7/9/1990; end_date=30/5/1991
    summaryfile
    metfile met: filename=krs9091.met
    area paddock
      outputfile report: filename=NT5 mungbean -  putland planting 1 report.out; title=NT5 mungbean -  putland planting 1 report
      operations
        07/09/1990  soilwat2 set sw = 0.19 0.21 0.21 0.223 0.219 0.219 0.219 0.229 0.237
        15/01/1991  mungbean sow plants = 26, sowing_depth = 30, cultivar = putland,crop_class = plant
      fertiliser
      irrigation: same as aps18 - berkin weathering -  planting 1.paddock.irrigation
      manager: same as aps18 - berkin weathering -  planting 1.paddock.manager
      Soil: same as NT1 mungbean -  berkin planting 2.paddock.soil
      surfaceom
        PoolName = wheat  # Organic Matter pool name
        type = wheat  # Organic Matter type
        mass = 500  # Initial surface residue (kg/ha)
        cnr = 40  # C:N ratio of initial residue
        standing_fraction = 0.0  # Fraction of residue standing
      mungbean
  simulation NT7 mungbean -  king planting 1
    clock: start_date=7/9/1987; end_date=29/5/1988
    summaryfile
    metfile met: filename=krs8788.met
    area paddock
      outputfile report: filename=NT7 mungbean -  king planting 1 report.out; title=NT7 mungbean -  king planting 1 report
      operations
      fertiliser
      irrigation: same as aps18 - berkin weathering -  planting 1.paddock.irrigation
      manager: same as aps18 - berkin weathering -  planting 1.paddock.manager
      Soil: same as NT1 mungbean -  berkin planting 2.paddock.soil
      surfaceom
        PoolName = wheat  # Organic Matter pool name
        type = wheat  # Organic Matter type
        mass = 500  # Initial surface residue (kg/ha)
        cnr = 40  # C:N ratio of initial residue
        standing_fraction = 0.0  # Fraction of residue standing
      mungbean
  simulation NT7 mungbean -  satin planting 1
    clock: start_date=7/9/1987; end_date=29/5/1988
    summaryfile
    metfile met: filename=krs8788.met
    area paddock
      outputfile report: filename=NT7 mungbean -  satin planting 1 report.out; title=NT7 mungbean -  satin planting 1 report
      operations
      fertiliser
      irrigation: same as aps18 - berkin weathering -  planting 1.paddock.irrigation
      manager: same as aps18 - berkin weathering -  planting 1.paddock.manager
      Soil: same as NT1 mungbean -  berkin planting 2.paddock.soil
      surfaceom
        PoolName = wheat  # Organic Matter pool name
        type = wheat  # Organic Matter type
        mass = 500  # Initial surface residue (kg/ha)
        cnr = 40  # C:N ratio of initial residue
        standing_fraction = 0.0  # Fraction of residue standing
      mungbean
  simulation NT7 mungbean -  shangtung planting 1
    clock: start_date=7/9/1987; end_date=29/5/1988
    summaryfile
    metfile met: filename=krs8788.met
    area paddock
      outputfile report: filename=NT7 mungbean -  shangtung planting 1 report.out; title=NT7 mungbean -  shangtung planting 1 report
      operations
      fertiliser
      irrigation: same as aps18 - berkin weathering -  planting 1.paddock.irrigation
      manager: same as aps18 - berkin weathering -  planting 1.paddock.manager
      Soil: same as NT1 mungbean -  berkin planting 2.paddock.soil
      surfaceom
        PoolName = wheat  # Organic Matter pool name
        type = wheat  # Organic Matter type
        mass = 500  # Initial surface residue (kg/ha)
        cnr = 40  # C:N ratio of initial residue
        standing_fraction = 0.0  # Fraction of residue standing
      mungbean
  simulation NT7 mungbean -  putland planting 1
    clock: start_date=7/9/1987; end_date=29/5/1988
    summaryfile
    metfile met: filename=krs8788.met
    area paddock
      outputfile report: filename=NT7 mungbean -  putland planting 1 report.out; title=NT7 mungbean -  putland planting 1 report
      operations
      fertiliser
      irrigation: same as aps18 - berkin weathering -  planting 1.paddock.irrigation
      manager: same as aps18 - berkin weathering -  planting 1.paddock.manager
      Soil: same as NT1 mungbean -  berkin planting 2.paddock.soil
      surfaceom
        PoolName = wheat  # Organic Matter pool name
        type = wheat  # Organic Matter type
        mass = 500  # Initial surface residue (kg/ha)
        cnr = 40  # C:N ratio of initial residue
        standing_fraction = 0.0  # Fraction of residue standing
      mungbean
  simulation NT8 mungbean -  king planting 1
    clock: start_date=7/9/1987; end_date=29/5/1988
    summaryfile
    metfile met: filename=kcc8788.met
    area paddock
      outputfile report: filename=NT8 mungbean -  king planting 1 report.out; title=NT8 mungbean -  king planting 1 report
      operations
      fertiliser
      irrigation: same as aps18 - berkin weathering -  planting 1.paddock.irrigation
      manager: same as aps18 - berkin weathering -  planting 1.paddock.manager
      Soil: same as NT1 mungbean -  berkin planting 2.paddock.soil
      surfaceom
        PoolName = wheat  # Organic Matter pool name
        type = wheat  # Organic Matter type
        mass = 500  # Initial surface residue (kg/ha)
        cnr = 40  # C:N ratio of initial residue
        standing_fraction = 0.0  # Fraction of residue standing
      mungbean
  simulation NT8 mungbean -  satin planting 1
    clock: start_date=7/9/1987; end_date=29/5/1988
    summaryfile
    metfile met: filename=kcc8788.met
    area paddock
      outputfile report: filename=NT8 mungbean -  satin planting 1 report.out; title=NT8 mungbean -  satin planting 1 report
      operations
      fertiliser
      irrigation: same as aps18 - berkin weathering -  planting 1.paddock.irrigation
      manager: same as aps18 - berkin weathering -  planting 1.paddock.manager
      Soil: same as NT1 mungbean -  berkin planting 2.paddock.soil
      surfaceom
        PoolName = wheat  # Organic Matter pool name
        type = wheat  # Organic Matter type
        mass = 500  # Initial surface residue (kg/ha)
        cnr = 40  # C:N ratio of initial residue
        standing_fraction = 0.0  # Fraction of residue standing
      mungbean
  simulation NT8 mungbean -  shangtung planting 1
    clock: start_date=7/9/1987; end_date=29/5/1988
    summaryfile
    metfile met: filename=kcc8788.met
    area paddock
      outputfile report: filename=NT8 mungbean -  shangtung planting 1 report.out; title=NT8 mungbean -  shangtung planting 1 report
      operations
      fertiliser
      irrigation: same as aps18 - berkin weathering -  planting 1.paddock.irrigation
      manager: same as aps18 - berkin weathering -  planting 1.paddock.manager
      Soil: same as NT1 mungbean -  berkin planting 2.paddock.soil
      surfaceom
        PoolName = wheat  # Organic Matter pool name
        type = wheat  # Organic Matter type
        mass = 500  # Initial surface residue (kg/ha)
        cnr = 40  # C:N ratio of initial residue
        standing_fraction = 0.0  # Fraction of residue standing
      mungbean
  simulation NT8 mungbean -  putland planting 1
    clock: start_date=7/9/1987; end_date=29/5/1988
    summaryfile
    metfile met: filename=kcc8788.met
    area paddock
      outputfile report: filename=NT8 mungbean -  putland planting 1 report.out; title=NT8 mungbean -  putland planting 1 report
      operations
      fertiliser
      irrigation: same as aps18 - berkin weathering -  planting 1.paddock.irrigation
      manager: same as aps18 - berkin weathering -  planting 1.paddock.manager
      Soil: same as NT1 mungbean -  berkin planting 2.paddock.soil
      surfaceom
        PoolName = wheat  # Organic Matter pool name
        type = wheat  # Organic Matter type
        mass = 500  # Initial surface residue (kg/ha)
        cnr = 40  # C:N ratio of initial residue
        standing_fraction = 0.0  # Fraction of residue standing
      mungbean
  simulation NT9 mungbean -  king planting 1
    clock: start_date=7/9/1987; end_date=29/5/1988
    summaryfile
    metfile met: filename=dd8788.met
    area paddock
      outputfile report: filename=NT9 mungbean -  king planting 1 report.out; title=NT9 mungbean -  king planting 1 report
      operations
        07/09/1987  soilwat2 set sw = 0.19 0.21 0.21 0.223 0.219 0.219 0.219 0.229 0.237
        15/01/1988  mungbean sow plants = 40, sowing_depth = 30, cultivar = king,crop_class = plant
      fertiliser
      irrigation: same as aps18 - berkin weathering -  planting 1.paddock.irrigation
      manager: same as aps18 - berkin weathering -  planting 1.paddock.manager
      Soil: same as NT2 mungbean -  king planting 1.paddock.soil
      surfaceom
        PoolName = wheat  # Organic Matter pool name
        type = wheat  # Organic Matter type
        mass = 500  # Initial surface residue (kg/ha)
        cnr = 40  # C:N ratio of initial residue
        standing_fraction = 0.0  # Fraction of residue standing
      mungbean
  simulation NT9 mungbean -  king planting 2
    clock: start_date=7/9/1987; end_date=29/5/1988
    summaryfile
    metfile met: filename=dd8788.met
    area paddock
      outputfile report: filename=NT9 mungbean -  king planting 2 report.out; title=NT9 mungbean -  king planting 2 report
      operations
        07/09/1987  soilwat2 set sw = 0.19 0.21 0.21 0.223 0.219 0.219 0.219 0.229 0.237
        02/02/1988  mungbean sow plants = 40, sowing_depth = 30, cultivar = king,crop_class = plant
      fertiliser
      irrigation: same as aps18 - berkin weathering -  planting 1.paddock.irrigation
      manager: same as aps18 - berkin weathering -  planting 1.paddock.manager
      Soil: same as NT2 mungbean -  king planting 1.paddock.soil
      surfaceom
        PoolName = wheat  # Organic Matter pool name
        type = wheat  # Organic Matter type
        mass = 500  # Initial surface residue (kg/ha)
        cnr = 40  # C:N ratio of initial residue
        standing_fraction = 0.0  # Fraction of residue standing
      mungbean
  simulation NT9 mungbean -  king planting 3
    clock: start_date=7/9/1987; end_date=29/5/1988
    summaryfile
    metfile met: filename=dd8788.met
    area paddock
      outputfile report: filename=NT9 mungbean -  king planting 3 report.out; title=NT9 mungbean -  king planting 3 report
      operations
        07/09/1987  soilwat2 set sw = 0.19 0.21 0.21 0.223 0.219 0.219 0.219 0.229 0.237
        16/02/1988  mungbean sow plants = 40, sowing_depth = 30, cultivar = king,crop_class = plant
      fertiliser
      irrigation: same as aps18 - berkin weathering -  planting 1.paddock.irrigation
      manager: same as aps18 - berkin weathering -  planting 1.paddock.manager
      Soil: same as NT2 mungbean -  king planting 1.paddock.soil
      surfaceom
        PoolName = wheat  # Organic Matter pool name
        type = wheat  # Organic Matter type
        mass = 500  # Initial surface residue (kg/ha)
        cnr = 40  # C:N ratio of initial residue
        standing_fraction = 0.0  # Fraction of residue standing
      mungbean
  simulation NT9 mungbean -  satin planting 1
    clock: start_date=7/9/1987; end_date=29/5/1988
    summaryfile
    metfile met: filename=dd8788.met
    area paddock
      outputfile report: filename=NT9 mungbean -  satin planting 1 report.out; title=NT9 mungbean -  satin planting 1 report
      operations
      fertiliser
      irrigation: same as aps18 - berkin weathering -  planting 1.paddock.irrigation
      manager: same as aps18 - berkin weathering -  planting 1.paddock.manager
      Soil: same as NT2 mungbean -  king planting 1.paddock.soil
      surfaceom
        PoolName = wheat  # Organic Matter pool name
        type = wheat  # Organic Matter type
        mass = 500  # Initial surface residue (kg/ha)
        cnr = 40  # C:N ratio of initial residue
        standing_fraction = 0.0  # Fraction of residue standing
      mungbean
  simulation NT9 mungbean -  satin planting 2
    clock: start_date=7/9/1987; end_date=29/5/1988
    summaryfile
    metfile met: filename=dd8788.met
    area paddock
      outputfile report: filename=NT9 mungbean -  satin planting 2 report.out; title=NT9 mungbean -  satin planting 2 report
      operations
        07/09/1987  soilwat2 set sw = 0.19 0.21 0.21 0.223 0.219 0.219 0.219 0.229 0.237
        02/02/1988  mungbean sow plants = 40, sowing_depth = 30, cultivar = satin,crop_class = plant
      fertiliser
      irrigation: same as aps18 - berkin weathering -  planting 1.paddock.irrigation
      manager: same as aps18 - berkin weathering -  planting 1.paddock.manager
      Soil: same as NT2 mungbean -  king planting 1.paddock.soil
      surfaceom
        PoolName = wheat  # Organic Matter pool name
        type = wheat  # Organic Matter type
        mass = 500  # Initial surface residue (kg/ha)
        cnr = 40  # C:N ratio of initial residue
        standing_fraction = 0.0  # Fraction of residue standing
      mungbean
  simulation NT9 mungbean -  satin planting 3
    clock: start_date=7/9/1987; end_date=29/5/1988
    summaryfile
    metfile met: filename=dd8788.met
    area paddock
      outputfile report: filename=NT9 mungbean -  satin planting 3 report.out; title=NT9 mungbean -  satin planting 3 report
      operations
        07/09/1987  soilwat2 set sw = 0.19 0.21 0.21 0.223 0.219 0.219 0.219 0.229 0.237
        16/02/1988  mungbean sow plants = 40, sowing_depth = 30, cultivar = satin,crop_class = plant
      fertiliser
      irrigation: same as aps18 - berkin weathering -  planting 1.paddock.irrigation
      manager: same as aps18 - berkin weathering -  planting 1.paddock.manager
      Soil: same as NT2 mungbean -  king planting 1.paddock.soil
      surfaceom
        PoolName = wheat  # Organic Matter pool name
        type = wheat  # Organic Matter type
        mass = 500  # Initial surface residue (kg/ha)
        cnr = 40  # C:N ratio of initial residue
        standing_fraction = 0.0  # Fraction of residue standing
      mungbean
  simulation NT9 mungbean -  putland planting 1
    clock: start_date=7/9/1987; end_date=29/5/1988
    summaryfile
    metfile met: filename=dd8788.met
    area paddock
      outputfile report: filename=NT9 mungbean -  putland planting 1 report.out; title=NT9 mungbean -  putland planting 1 report
      operations
        07/09/1987  soilwat2 set sw = 0.19 0.21 0.21 0.223 0.219 0.219 0.219 0.229 0.237
        15/01/1988  mungbean sow plants = 40, sowing_depth = 30, cultivar = putland,crop_class = plant
      fertiliser
      irrigation: same as aps18 - berkin weathering -  planting 1.paddock.irrigation
      manager: same as aps18 - berkin weathering -  planting 1.paddock.manager
      Soil: same as NT2 mungbean -  king planting 1.paddock.soil
      surfaceom
        PoolName = wheat  # Organic Matter pool name
        type = wheat  # Organic Matter type
        mass = 500  # Initial surface residue (kg/ha)
        cnr = 40  # C:N ratio of initial residue
        standing_fraction = 0.0  # Fraction of residue standing
      mungbean
  simulation NT9 mungbean -  putland planting 2
    clock: start_date=7/9/1987; end_date=8/6/1988
    summaryfile
    metfile met: filename=dd8788.met
    area paddock
      outputfile report: filename=NT9 mungbean -  putland planting 2 report.out; title=NT9 mungbean -  putland planting 2 report
      operations
        07/09/1987  soilwat2 set sw = 0.19 0.21 0.21 0.223 0.219 0.219 0.219 0.229 0.237
        02/02/1988  mungbean sow plants = 40, sowing_depth = 30, cultivar = putland,crop_class = plant
      fertiliser
      irrigation: same as aps18 - berkin weathering -  planting 1.paddock.irrigation
      manager: same as aps18 - berkin weathering -  planting 1.paddock.manager
      Soil: same as NT2 mungbean -  king planting 1.paddock.soil
      surfaceom
        PoolName = wheat  # Organic Matter pool name
        type = wheat  # Organic Matter type
        mass = 500  # Initial surface residue (kg/ha)
        cnr = 40  # C:N ratio of initial residue
        standing_fraction = 0.0  # Fraction of residue standing
      mungbean
  simulation NT9 mungbean -  putland planting 3
    clock: start_date=7/9/1987; end_date=18/6/1988
    summaryfile
    metfile met: filename=dd8788.met
    area paddock
      outputfile report: filename=NT9 mungbean -  putland planting 3 report.out; title=NT9 mungbean -  putland planting 3 report
      operations
        07/09/1987  soilwat2 set sw = 0.19 0.21 0.21 0.223 0.219 0.219 0.219 0.229 0.237
        16/02/1988  mungbean sow plants = 40, sowing_depth = 30, cultivar = putland,crop_class = plant
      fertiliser
      irrigation: same as aps18 - berkin weathering -  planting 1.paddock.irrigation
      manager: same as aps18 - berkin weathering -  planting 1.paddock.manager
      Soil: same as NT2 mungbean -  king planting 1.paddock.soil
      surfaceom
        PoolName = wheat  # Organic Matter pool name
        type = wheat  # Organic Matter type
        mass = 500  # Initial surface residue (kg/ha)
        cnr = 40  # C:N ratio of initial residue
        standing_fraction = 0.0  # Fraction of residue standing
      mungbean
  simulation RCM1_1: 1 April 1980 sowing 35 plants-m2, 25 cm rows
    clock: start_date=31/3/1980; end_date=18/6/1980
    summaryfile
    metfile met: filename=kunucli.dat
    area paddock
      outputfile report: title=1 April 1980 sowing 35 plants-m2, 25 cm rows report
        filename=RCM1_1: 1 April 1980 sowing 35 plants-m2, 25 cm rows report.out
      operations
        31/03/1980  mungbean sow plants = 35, sowing_depth = 40, cultivar = berken,crop_class = plant, row_spacing = 250
      fertiliser
      irrigation: same as NT4 mungbean -  king planting 1.paddock.irrigation
      manager: same as aps18 - berkin weathering -  planting 1.paddock.manager
      Soil: same as NT1 mungbean -  berkin planting 2.paddock.soil
      surfaceom
        PoolName = wheat  # Organic Matter pool name
        type = wheat  # Organic Matter type
        mass = 500  # Initial surface residue (kg/ha)
        cnr = 40  # C:N ratio of initial residue
        standing_fraction = 0.0  # Fraction of residue standing
      mungbean
  simulation RCM1_2: 1 April 1980 sowing 35 plants-m2, 25 cm rows
    clock: start_date=31/3/1980; end_date=18/6/1980
    summaryfile
    metfile met: filename=kunucli.dat
    area paddock
      outputfile report: title=1 April 1980 sowing 35 plants-m2, 25 cm rows report
        filename=RCM1_2: 1 April 1980 sowing 35 plants-m2, 25 cm rows report.out
      operations
        31/03/1980  mungbean sow plants = 35, sowing_depth = 40, cultivar = berken,crop_class = plant, row_spacing = 250
        07/04/1980  irrigate apply amount = 50
        14/04/1980  irrigate apply amount = 50
      fertiliser
      irrigation: same as aps18 - berkin weathering -  planting 1.paddock.irrigation
      manager: same as aps18 - berkin weathering -  planting 1.paddock.manager
      Soil: same as NT1 mungbean -  berkin planting 2.paddock.soil
      surfaceom
        PoolName = wheat  # Organic Matter pool name
        type = wheat  # Organic Matter type
        mass = 500  # Initial surface residue (kg/ha)
        cnr = 40  # C:N ratio of initial residue
        standing_fraction = 0.0  # Fraction of residue standing
      mungbean
  simulation RCM1_3: 1 April 1980 sowing 35 plants-m2, 25 cm rows
    clock: start_date=31/3/1980; end_date=18/6/1980
    summaryfile
    metfile met: filename=kunucli.dat
    area paddock
      outputfile report: title=1 April 1980 sowing 35 plants-m2, 25 cm rows report
        filename=RCM1_3: 1 April 1980 sowing 35 plants-m2, 25 cm rows report.out
      operations
        31/03/1980  mungbean sow plants = 35, sowing_depth = 40, cultivar = berken,crop_class = plant, row_spacing = 250
        07/04/1980  irrigate apply amount = 50
        14/04/1980  irrigate apply amount = 50
        21/04/1980  irrigate apply amount = 50
        28/04/1980  irrigate apply amount = 50
        05/05/1980  irrigate apply amount = 50
      fertiliser
      irrigation: same as aps18 - berkin weathering -  planting 1.paddock.irrigation
      manager: same as aps18 - berkin weathering -  planting 1.paddock.manager
      Soil: same as NT1 mungbean -  berkin planting 2.paddock.soil
      surfaceom
        PoolName = wheat  # Organic Matter pool name
        type = wheat  # Organic Matter type
        mass = 500  # Initial surface residue (kg/ha)
        cnr = 40  # C:N ratio of initial residue
        standing_fraction = 0.0  # Fraction of residue standing
      mungbean
  simulation RCM2_1: 11 January 1980 sowing 10 plants-m2, 25 cm rows
    clock: start_date=11/1/1980; end_date=30/3/1980
    summaryfile
    metfile met: filename=kunucli.dat
    area paddock
      outputfile report: title=11 January 1980 sowing 10 plants-m2, 25 cm rows report
        filename=RCM2_1: 11 January 1980 sowing 10 plants-m2, 25 cm rows report.out
      operations
        11/01/1980  mungbean sow plants = 10, sowing_depth = 40, cultivar = berken,crop_class = plant, row_spacing = 250
      fertiliser
      irrigation: same as NT4 mungbean -  king planting 1.paddock.irrigation
      manager: same as aps18 - berkin weathering -  planting 1.paddock.manager
      Soil: same as aps18 - berkin weathering -  planting 2.paddock.soil
      surfaceom
        PoolName = wheat  # Organic Matter pool name
        type = wheat  # Organic Matter type
        mass = 500  # Initial surface residue (kg/ha)
        cnr = 40  # C:N ratio of initial residue
        standing_fraction = 0.0  # Fraction of residue standing
      mungbean
  simulation RCM2_2: 11 January 1980 sowing 19 plants-m2, 25 cm rows
    clock: start_date=11/1/1980; end_date=30/3/1980
    summaryfile
    metfile met: filename=kunucli.dat
    area paddock
      outputfile report: title=11 January 1980 sowing 19 plants-m2, 25 cm rows report
        filename=RCM2_2: 11 January 1980 sowing 19 plants-m2, 25 cm rows report.out
      operations
        11/01/1980  mungbean sow plants = 19, sowing_depth = 40, cultivar = berken,crop_class = plant, row_spacing = 250
      fertiliser
      irrigation: same as NT4 mungbean -  king planting 1.paddock.irrigation
      manager: same as aps18 - berkin weathering -  planting 1.paddock.manager
      Soil: same as aps18 - berkin weathering -  planting 2.paddock.soil
      surfaceom
        PoolName = wheat  # Organic Matter pool name
        type = wheat  # Organic Matter type
        mass = 500  # Initial surface residue (kg/ha)
        cnr = 40  # C:N ratio of initial residue
        standing_fraction = 0.0  # Fraction of residue standing
      mungbean
  simulation RCM2_3: 11 January 1980 sowing 27 plants-m2, 25 cm rows
    clock: start_date=11/1/1980; end_date=30/3/1980
    summaryfile
    metfile met: filename=kunucli.dat
    area paddock
      outputfile report: title=11 January 1980 sowing 27 plants-m2, 25 cm rows report
        filename=RCM2_3: 11 January 1980 sowing 27 plants-m2, 25 cm rows report.out
      operations
        11/01/1980  mungbean sow plants = 27, sowing_depth = 40, cultivar = berken,crop_class = plant, row_spacing = 250
      fertiliser
      irrigation: same as NT4 mungbean -  king planting 1.paddock.irrigation
      manager: same as aps18 - berkin weathering -  planting 1.paddock.manager
      Soil: same as aps18 - berkin weathering -  planting 2.paddock.soil
      surfaceom
        PoolName = wheat  # Organic Matter pool name
        type = wheat  # Organic Matter type
        mass = 500  # Initial surface residue (kg/ha)
        cnr = 40  # C:N ratio of initial residue
        standing_fraction = 0.0  # Fraction of residue standing
      mungbean
  simulation RCM2_4: 11 January 1980 sowing 39 plants-m2, 25 cm rows
    clock: start_date=11/1/1980; end_date=30/3/1980
    summaryfile
    metfile met: filename=kunucli.dat
    area paddock
      outputfile report: title=11 January 1980 sowing 39 plants-m2, 25 cm rows report
        filename=RCM2_4: 11 January 1980 sowing 39 plants-m2, 25 cm rows report.out
      operations
        11/01/1980  mungbean sow plants = 39, sowing_depth = 40, cultivar = berken,crop_class = plant, row_spacing = 250
      fertiliser
      irrigation: same as NT4 mungbean -  king planting 1.paddock.irrigation
      manager: same as aps18 - berkin weathering -  planting 1.paddock.manager
      Soil: same as aps18 - berkin weathering -  planting 2.paddock.soil
      surfaceom
        PoolName = wheat  # Organic Matter pool name
        type = wheat  # Organic Matter type
        mass = 500  # Initial surface residue (kg/ha)
        cnr = 40  # C:N ratio of initial residue
        standing_fraction = 0.0  # Fraction of residue standing
      mungbean
  simulation RCM2_5: 11 January 1980 sowing 50 plants-m2, 25 cm rows
    clock: start_date=11/1/1980; end_date=30/3/1980
    summaryfile
    metfile met: filename=kunucli.dat
    area paddock
      outputfile report: title=11 January 1980 sowing 50 plants-m2, 25 cm rows report
        filename=RCM2_5: 11 January 1980 sowing 50 plants-m2, 25 cm rows report.out
      operations
        11/01/1980  mungbean sow plants = 50, sowing_depth = 40, cultivar = berken,crop_class = plant, row_spacing = 250
      fertiliser
      irrigation: same as NT4 mungbean -  king planting 1.paddock.irrigation
      manager: same as aps18 - berkin weathering -  planting 1.paddock.manager
      Soil: same as aps18 - berkin weathering -  planting 2.paddock.soil
      surfaceom
        PoolName = wheat  # Organic Matter pool name
        type = wheat  # Organic Matter type
        mass = 500  # Initial surface residue (kg/ha)
        cnr = 40  # C:N ratio of initial residue
        standing_fraction = 0.0  # Fraction of residue standing
      mungbean
  simulation RCM - sowing 2 1987-88 at Katherine 1 Dec 1987
    clock: start_date=1/12/1987; end_date=19/2/1988
    summaryfile
    metfile met: filename=kath8788.met
    area paddock
      outputfile report: filename=RCM - sowing 2 1987-88 at Katherine 1 Dec 1987 report.out; title=RCM - sowing 2 1987-88 at Katherine 1 Dec 1987 report
      operations
        01/12/1987  mungbean sow plants = 18, sowing_depth = 40, cultivar = king,crop_class = plant, row_spacing = 500
        07/12/1987  irrigate apply amount = 12
        08/12/1987  irrigate apply amount = 15
        10/12/1987  irrigate apply amount = 15
      fertiliser
      irrigation: same as aps18 - berkin weathering -  planting 1.paddock.irrigation
      manager: same as aps18 - berkin weathering -  planting 1.paddock.manager
      Soil: same as NT1 mungbean -  berkin planting 2.paddock.soil
      surfaceom
        PoolName = wheat  # Organic Matter pool name
        type = wheat  # Organic Matter type
        mass = 500  # Initial surface residue (kg/ha)
        cnr = 40  # C:N ratio of initial residue
        standing_fraction = 0.0  # Fraction of residue standing
      mungbean
  simulation RCM - sowing 3 1987-88 at Katherine 5 Jan 1988
    clock: start_date=4/1/1988; end_date=25/3/1988
    summaryfile
    metfile met: filename=kath8788.met
    area paddock
      outputfile report: filename=RCM - sowing 3 1987-88 at Katherine 5 Jan 1988 report.out; title=RCM - sowing 3 1987-88 at Katherine 5 Jan 1988 report
      operations
        05/01/1988  mungbean sow plants = 35, sowing_depth = 40, cultivar = king,crop_class = plant, row_spacing = 360
        06/01/1988  irrigate apply amount = 11
        08/01/1988  irrigate apply amount = 13
        07/01/1988  irrigate apply amount = 12
        13/01/1988  irrigate apply amount = 25
        18/01/1988  irrigate apply amount = 33
      fertiliser
      irrigation: same as aps18 - berkin weathering -  planting 1.paddock.irrigation
      manager: same as aps18 - berkin weathering -  planting 1.paddock.manager
      Soil: same as NT1 mungbean -  berkin planting 2.paddock.soil
      surfaceom
        PoolName = wheat  # Organic Matter pool name
        type = wheat  # Organic Matter type
        mass = 500  # Initial surface residue (kg/ha)
        cnr = 40  # C:N ratio of initial residue
        standing_fraction = 0.0  # Fraction of residue standing
      mungbean
  simulation RCM - sowing 3 1987-88 at Katherine 5 Jan 19881
    clock: start_date=4/1/1988; end_date=25/3/1988
    summaryfile
    metfile met: filename=kath8788.met
    area paddock
      outputfile report: filename=RCM - sowing 3 1987-88 at Katherine 5 Jan 19881 report.out; title=RCM - sowing 3 1987-88 at Katherine 5 Jan 19881 report
      operations
        05/01/1988  mungbean sow plants = 35, sowing_depth = 40, cultivar = king,crop_class = plant, row_spacing = 360
        06/01/1988  irrigate apply amount = 11
      fertiliser
      irrigation: same as aps18 - berkin weathering -  planting 1.paddock.irrigation
      manager: same as aps18 - berkin weathering -  planting 1.paddock.manager
      Soil: same as NT1 mungbean -  berkin planting 2.paddock.soil
      surfaceom
        PoolName = wheat  # Organic Matter pool name
        type = wheat  # Organic Matter type
        mass = 500  # Initial surface residue (kg/ha)
        cnr = 40  # C:N ratio of initial residue
        standing_fraction = 0.0  # Fraction of residue standing
      mungbean
  simulation RCM - sowing 1 1989 at Katherine 10 Jan 1989
    clock: start_date=10/1/1989; end_date=20/4/1989
    summaryfile
    metfile met: filename=kath89.met
    area paddock
      outputfile report: filename=RCM - sowing 1 1989 at Katherine 10 Jan 1989 report.out; title=RCM - sowing 1 1989 at Katherine 10 Jan 1989 report
      operations
        10/01/1989  mungbean sow plants = 35, sowing_depth = 40, cultivar = king,crop_class = plant, row_spacing = 360
        15/01/1989  irrigate apply amount = 17
      fertiliser
      irrigation: same as aps18 - berkin weathering -  planting 1.paddock.irrigation
      manager: same as aps18 - berkin weathering -  planting 1.paddock.manager
      Soil: same as NT1 mungbean -  berkin planting 2.paddock.soil
      surfaceom
        PoolName = wheat  # Organic Matter pool name
        type = wheat  # Organic Matter type
        mass = 500  # Initial surface residue (kg/ha)
        cnr = 40  # C:N ratio of initial residue
        standing_fraction = 0.0  # Fraction of residue standing
      mungbean
  simulation RCM - sowing 2 1989 at Katherine 7 Feb 1989
    clock: start_date=7/2/1989; end_date=22/4/1989
    summaryfile
    metfile met: filename=kath89.met
    area paddock
      outputfile report: filename=RCM - sowing 2 1989 at Katherine 7 Feb 1989 report.out; title=RCM - sowing 2 1989 at Katherine 7 Feb 1989 report
      operations
        07/02/1989  mungbean sow plants = 35, sowing_depth = 40, cultivar = king,crop_class = plant, row_spacing = 360
      fertiliser
      irrigation: same as aps18 - berkin weathering -  planting 1.paddock.irrigation
      manager: same as aps18 - berkin weathering -  planting 1.paddock.manager
      Soil: same as NT1 mungbean -  berkin planting 2.paddock.soil
      surfaceom
        PoolName = wheat  # Organic Matter pool name
        type = wheat  # Organic Matter type
        mass = 500  # Initial surface residue (kg/ha)
        cnr = 40  # C:N ratio of initial residue
        standing_fraction = 0.0  # Fraction of residue standing
      mungbean
  simulation RCM - sowing 3 1989 at Katherine 28 Feb 1989 Irrigated
    clock: start_date=28/2/1989; end_date=10/5/1989
    summaryfile
    metfile met: filename=kath89.met
    area paddock
      outputfile report
        filename=RCM - sowing 3 1989 at Katherine 28 Feb 1989 Irrigated report.out
        title=RCM - sowing 3 1989 at Katherine 28 Feb 1989 Irrigated report
      operations
        28/02/1989  mungbean sow plants = 35, sowing_depth = 40, cultivar = king,crop_class = plant, row_spacing = 360
        05/04/1989  irrigate apply amount = 26
        07/04/1989  irrigate apply amount = 30
        10/04/1989  irrigate apply amount = 14
        12/04/1989  irrigate apply amount = 24
        15/04/1989  irrigate apply amount = 42
        19/04/1989  irrigate apply amount = 13
        22/04/1989  irrigate apply amount = 27
        26/04/1989  irrigate apply amount = 32
        29/04/1989  irrigate apply amount = 43
        06/05/1989  irrigate apply amount = 39
        10/05/1989  irrigate apply amount = 35
        13/05/1989  irrigate apply amount = 34
        17/05/1989  irrigate apply amount = 33
        20/05/1989  irrigate apply amount = 38
        24/05/1989  irrigate apply amount = 34
        27/05/1989  irrigate apply amount = 33
        31/05/1989  irrigate apply amount = 34
        03/06/1989  irrigate apply amount = 28
        07/06/1989  irrigate apply amount = 27
        10/06/1989  irrigate apply amount = 27
        15/06/1989  irrigate apply amount = 28
        17/06/1989  irrigate apply amount = 26
        21/06/1989  irrigate apply amount = 23
        24/06/1989  irrigate apply amount = 22
      fertiliser
      irrigation: same as aps18 - berkin weathering -  planting 1.paddock.irrigation
      manager: same as aps18 - berkin weathering -  planting 1.paddock.manager
      Soil: same as NT1 mungbean -  berkin planting 2.paddock.soil
      surfaceom
        PoolName = wheat  # Organic Matter pool name
        type = wheat  # Organic Matter type
        mass = 500  # Initial surface residue (kg/ha)
        cnr = 40  # C:N ratio of initial residue
        standing_fraction = 0.0  # Fraction of residue standing
      mungbean
  simulation RCM - sowing 3 1989 at Katherine 28 Feb 1989 Rainfed
    clock: start_date=28/2/1989; end_date=10/5/1989
    summaryfile
    metfile met: filename=kath89.met
    area paddock
      outputfile report: title=RCM - sowing 3 1989 at Katherine 28 Feb 1989 Rainfed report
        filename=RCM - sowing 3 1989 at Katherine 28 Feb 1989 Rainfed report.out
      operations
        28/02/1989  mungbean sow plants = 35, sowing_depth = 40, cultivar = king,crop_class = plant, row_spacing = 360
        19/04/1989  irrigate apply amount = 44
        20/05/1989  irrigate apply amount = 38
      fertiliser
      irrigation: same as aps18 - berkin weathering -  planting 1.paddock.irrigation
      manager: same as aps18 - berkin weathering -  planting 1.paddock.manager
      Soil: same as NT1 mungbean -  berkin planting 2.paddock.soil
      surfaceom
        PoolName = wheat  # Organic Matter pool name
        type = wheat  # Organic Matter type
        mass = 500  # Initial surface residue (kg/ha)
        cnr = 40  # C:N ratio of initial residue
        standing_fraction = 0.0  # Fraction of residue standing
      mungbean
  simulation RCM - sowing 1990 at Gatton 9 Jan 1990
    clock: start_date=9/1/1990; end_date=5/4/1990
    summaryfile
    metfile met: filename=gatt90.met
    area paddock
      outputfile report: filename=RCM - sowing 1990 at Gatton 9 Jan 1990 report.out; title=RCM - sowing 1990 at Gatton 9 Jan 1990 report
      operations
        09/01/1990  mungbean sow plants = 35, sowing_depth = 40, cultivar = king,crop_class = plant, row_spacing = 360
        10/01/1990  irrigate apply amount = 18
        13/01/1990  irrigate apply amount = 25
        23/01/1990  irrigate apply amount = 10
        24/01/1990  irrigate apply amount = 11
        26/01/1990  irrigate apply amount = 16
        31/01/1990  irrigate apply amount = 14
        02/02/1990  irrigate apply amount = 23
        16/02/1990  irrigate apply amount = 26
        01/03/1990  irrigate apply amount = 31
        08/03/1990  irrigate apply amount = 21
        12/03/1990  irrigate apply amount = 26
        16/03/1990  irrigate apply amount = 24
        21/03/1990  irrigate apply amount = 10
        23/03/1990  irrigate apply amount = 25
      fertiliser
      irrigation: same as aps18 - berkin weathering -  planting 1.paddock.irrigation
      manager: same as aps18 - berkin weathering -  planting 1.paddock.manager
      Soil
        InitialWater Initial water: FractionFull=1; PercentMethod=EvenlyDistributed
        Water
          Thickness  BD     AirDry  LL15   DUL    SAT
          150.0      1.200  0.100   0.200  0.413  0.453
          150.0      1.200  0.260   0.280  0.454  0.504
          300.0      1.200  0.320   0.340  0.495  0.545
          300.0      1.200  0.300   0.320  0.495  0.545
          300.0      1.300  0.270   0.290  0.418  0.468
          300.0      1.300  0.240   0.260  0.406  0.457
          300.0      1.300  0.310   0.330  0.385  0.435
          SoilCrop mungbean: LL=[0.200, 0.280, 0.340, 0.340, 0.340, 0.400, 0.380]; KL=[0.08, 0.06, 0.04, 0.08, 0.06, 0.04, 0.02]; XF=[1.0, 1.0, 1.0, 0.0, 0.0, 0.0, 0.0]
        SoilWater: SummerCona=3.5; SummerU=6.0; SummerDate=1-Nov; WinterCona=3.5; WinterU=6.0; WinterDate=1-Apr; DiffusConst=40.0; DiffusSlope=16.0; Salb=0.13; CN2Bare=75; CNRed=20; CNCov=0.8; Thickness=[150.0, 150.0, 300.0, 300.0, 300.0, 300.0, 300.0]; SWCON=[0.300, 0.300, 0.300, 0.300, 0.300, 0.300, 0.300]
        SoilOrganicMatter: RootCN=33; RootWt=0; SoilCN=14.5; EnrACoeff=7.4; EnrBCoeff=0.2
          Thickness  OC    FBiom  FInert
          150.0      1.00  0.05   0.39
          150.0      0.64  0.02   0.47
          300.0      0.64  0.015  0.60
          300.0      0.47  0.01   0.83
          300.0      0.47  0.01   0.93
          300.0      0.35  0.01   0.93
          300.0      0.26  0.01   0.93
        Analysis: Thickness=[150.0, 150.0, 300.0, 300.0, 300.0, 300.0, 300.0]; PH=[6.50, 6.20, 6.20, 6.30, 6.30, 6.40, 6.50]
        Sample Initial nitrogen
          Thickness  NO3  NH4
          150.0      2    1
          150.0      2    1
          300.0      2    1
          300.0      2    1
          300.0      2    1
          300.0      2    1
          300.0      2    1
      surfaceom
        PoolName = wheat  # Organic Matter pool name
        type = wheat  # Organic Matter type
        mass = 500  # Initial surface residue (kg/ha)
        cnr = 40  # C:N ratio of initial residue
        standing_fraction = 0.0  # Fraction of residue standing
      mungbean
  simulation RJL1_1: Irrigated sown 10 Dec 1976-77 Dalby after winter cereal
    clock: start_date=25/9/1976; end_date=11/3/1977
    summaryfile
    metfile met: filename=dalby25.met
    area paddock
      outputfile report
        filename=RJL1_1: Irrigated sown 10 Dec 1976-77 Dalby after winter cereal report.out
        title=Irrigated sown 10 Dec 1976-77 Dalby after winter cereal report
      operations
        25/09/1976  soilwat2 set sw = 0.220 0.342 0.385 0.386 0.429 0.430 0.430
        25/09/1976  surfaceom add_surfaceom dlt_residue_wt = 1500, dlt_residue_type = wheat, dlt_residue_cnr = 70
        09/12/1976  mungbean sow plants = 18.5, sowing_depth = 40, cultivar = berken,crop_class = plant, row_spacing = 600
        14/12/1976  irrigate apply amount = 30
        05/01/1977  irrigate apply amount = 30
        28/01/1977  irrigate apply amount = 30
        03/02/1977  irrigate apply amount = 30
        19/02/1977  irrigate apply amount = 30
      fertiliser
      irrigation: same as aps18 - berkin weathering -  planting 1.paddock.irrigation
      manager: same as aps18 - berkin weathering -  planting 1.paddock.manager
      Soil
        InitialWater Initial water: FractionFull=1; PercentMethod=EvenlyDistributed
        Water: same as aps20 - mungbean satin f5.paddock.soil.Water
        SoilWater: same as aps20 - mungbean  emerald f1.paddock.soil.SoilWater
        SoilOrganicMatter: same as aps20 - mungbean  emerald f1.paddock.soil.SoilOrganicMatter
        Analysis: Thickness=[150.0, 150.0, 300.0, 300.0, 300.0, 300.0, 300.0]; PH=[8.900, 8.900, 9.000, 9.000, 9.000, 9.000, 9.000]
        Sample Initial nitrogen
          Thickness  NO3  NH4
          150.0      2    1
          150.0      2    1
          300.0      2    1
          300.0      2    1
          300.0      2    1
          300.0      2    1
          300.0      2    1
      surfaceom
        PoolName = wheat  # Organic Matter pool name
        type = wheat  # Organic Matter type
        mass = 500  # Initial surface residue (kg/ha)
        cnr = 40  # C:N ratio of initial residue
        standing_fraction = 0.0  # Fraction of residue standing
      mungbean
  simulation RJL1_2: Double-cropped sown 10 Dec 1976-77 Dalby after winter cereal
    clock: start_date=25/9/1976; end_date=11/3/1977
    summaryfile
    metfile met: filename=dalby25.met
    area paddock
      outputfile report
        filename=RJL1_2: Double-cropped sown 10 Dec 1976-77 Dalby after winter cereal report.out
        title=Double-cropped sown 10 Dec 1976-77 Dalby after winter cereal report
      operations
        25/09/1976  soilwat2 set sw = 0.220 0.342 0.385 0.386 0.429 0.430 0.430
        25/09/1976  surfaceom add_surfaceom dlt_residue_wt = 1500, dlt_residue_type = wheat, dlt_residue_cnr = 70
        09/12/1976  mungbean sow plants = 18.5, sowing_depth = 40, cultivar = berken,crop_class = plant, row_spacing = 600
      fertiliser
      irrigation: same as aps18 - berkin weathering -  planting 1.paddock.irrigation
      manager: same as aps18 - berkin weathering -  planting 1.paddock.manager
      Soil: same as RJL1_1: Irrigated sown 10 Dec 1976-77 Dalby after winter cereal.paddock.soil
      surfaceom
        PoolName = wheat  # Organic Matter pool name
        type = wheat  # Organic Matter type
        mass = 500  # Initial surface residue (kg/ha)
        cnr = 40  # C:N ratio of initial residue
        standing_fraction = 0.0  # Fraction of residue standing
      mungbean
  simulation RJL1_3: sown 10 Dec 1976-77 Dalby after winter fallow
    clock: start_date=9/4/1976; end_date=11/3/1977
    summaryfile
    metfile met: filename=dalby25.met
    area paddock
      outputfile report: title=sown 10 Dec 1976-77 Dalby after winter fallow report
        filename=RJL1_3: sown 10 Dec 1976-77 Dalby after winter fallow report.out
      operations
        09/04/1976  soilwat2 set sw = 0.220 0.342 0.385 0.386 0.429 0.430 0.430
        09/04/1976  surfaceom add_surfaceom dlt_residue_wt = 5000, dlt_residue_type = sorghum, dlt_residue_cnr = 70
        09/12/1976  mungbean sow plants = 18.5, sowing_depth = 40, cultivar = berken,crop_class = plant, row_spacing = 600
      fertiliser
      irrigation: same as aps18 - berkin weathering -  planting 1.paddock.irrigation
      manager: same as aps18 - berkin weathering -  planting 1.paddock.manager
      Soil: same as RJL1_1: Irrigated sown 10 Dec 1976-77 Dalby after winter cereal.paddock.soil
      surfaceom
        PoolName = wheat  # Organic Matter pool name
        type = wheat  # Organic Matter type
        mass = 500  # Initial surface residue (kg/ha)
        cnr = 40  # C:N ratio of initial residue
        standing_fraction = 0.0  # Fraction of residue standing
      mungbean
  simulation RJL1_4: Irrigated sown 10 Jan 1978 Dalby after winter cereal
    clock: start_date=17/10/1977; end_date=31/3/1978
    summaryfile
    metfile met: filename=dalby25.met
    area paddock
      outputfile report: title=Irrigated sown 10 Jan 1978 Dalby after winter cereal report
        filename=RJL1_4: Irrigated sown 10 Jan 1978 Dalby after winter cereal report.out
      operations
        17/10/1977  soilwat2 set sw = 0.220 0.342 0.385 0.386 0.429 0.430 0.430
        17/10/1977  surfaceom add_surfaceom dlt_residue_wt = 1500, dlt_residue_type = wheat, dlt_residue_cnr = 70
        10/01/1978  mungbean sow plants = 10, sowing_depth = 40, cultivar = berken,crop_class = plant, row_spacing = 600
        10/01/1978  irrigate apply amount = 50
        08/02/1978  irrigate apply amount = 30
        20/02/1978  irrigate apply amount = 30
        09/03/1978  irrigate apply amount = 30
        24/03/1978  irrigate apply amount = 30
      fertiliser
      irrigation: same as aps18 - berkin weathering -  planting 1.paddock.irrigation
      manager: same as aps18 - berkin weathering -  planting 1.paddock.manager
      Soil: same as RJL1_1: Irrigated sown 10 Dec 1976-77 Dalby after winter cereal.paddock.soil
      surfaceom
        PoolName = wheat  # Organic Matter pool name
        type = wheat  # Organic Matter type
        mass = 500  # Initial surface residue (kg/ha)
        cnr = 40  # C:N ratio of initial residue
        standing_fraction = 0.0  # Fraction of residue standing
      mungbean
  simulation RJL1_5: Double-cropped sown 10 Jan 1978 Dalby after winter cereal
    clock: start_date=17/10/1977; end_date=31/3/1978
    summaryfile
    metfile met: filename=dalby25.met
    area paddock
      outputfile report
        filename=RJL1_5: Double-cropped sown 10 Jan 1978 Dalby after winter cereal report.out
        title=Double-cropped sown 10 Jan 1978 Dalby after winter cereal report
      operations
        17/10/1977  surfaceom add_surfaceom dlt_residue_wt = 1500, dlt_residue_type = wheat, dlt_residue_cnr = 70
        17/10/1977  soilwat2 set sw = 0.220 0.342 0.385 0.386 0.429 0.430 0.430
        10/01/1978  mungbean sow plants = 10, sowing_depth = 40, cultivar = berken,crop_class = plant, row_spacing = 600
        10/01/1978  irrigate apply amount = 50
      fertiliser
      irrigation: same as aps18 - berkin weathering -  planting 1.paddock.irrigation
      manager: same as aps18 - berkin weathering -  planting 1.paddock.manager
      Soil: same as RJL1_1: Irrigated sown 10 Dec 1976-77 Dalby after winter cereal.paddock.soil
      surfaceom
        PoolName = wheat  # Organic Matter pool name
        type = wheat  # Organic Matter type
        mass = 500  # Initial surface residue (kg/ha)
        cnr = 40  # C:N ratio of initial residue
        standing_fraction = 0.0  # Fraction of residue standing
      mungbean
  simulation RJL1_6: sown 10 Jan 1978 Dalby after winter fallow
    clock: start_date=10/4/1977; end_date=31/3/1978
    summaryfile
    metfile met: filename=dalby25.met
    area paddock
      outputfile report: title=sown 10 Jan 1978 Dalby after winter fallow report
        filename=RJL1_6: sown 10 Jan 1978 Dalby after winter fallow report.out
      operations
        10/04/1977  soilwat2 set sw = 0.220 0.342 0.385 0.386 0.429 0.430 0.430
        10/04/1977  surfaceom add_surfaceom dlt_residue_wt = 5000, dlt_residue_type = sorghum, dlt_residue_cnr = 70
        10/01/1978  mungbean sow plants = 10, sowing_depth = 40, cultivar = berken,crop_class = plant, row_spacing = 600
        10/01/1978  irrigate apply amount = 50
      fertiliser
      irrigation: same as aps18 - berkin weathering -  planting 1.paddock.irrigation
      manager: same as aps18 - berkin weathering -  planting 1.paddock.manager
      Soil: same as RJL1_1: Irrigated sown 10 Dec 1976-77 Dalby after winter cereal.paddock.soil
      surfaceom
        PoolName = wheat  # Organic Matter pool name
        type = wheat  # Organic Matter type
        mass = 500  # Initial surface residue (kg/ha)
        cnr = 40  # C:N ratio of initial residue
        standing_fraction = 0.0  # Fraction of residue standing
      mungbean
  simulation RJL2_1: 18 Nov 1976 sowing 20 plants-m2, 100 cm rows
    clock: start_date=18/11/1976; end_date=11/3/1977
    summaryfile
    metfile met: filename=cooper.aps
    area paddock
      outputfile report: title=18 Nov 1976 sowing 20 plants-m2, 100 cm rows report
        filename=RJL2_1: 18 Nov 1976 sowing 20 plants-m2, 100 cm rows report.out
      operations
        18/11/1976  mungbean sow plants = 20, sowing_depth = 40, cultivar = berken,crop_class = plant, row_spacing = 1000
      fertiliser
      irrigation: same as NT4 mungbean -  king planting 1.paddock.irrigation
      manager: same as aps18 - berkin weathering -  planting 1.paddock.manager
      Soil: same as RCM - sowing 1990 at Gatton 9 Jan 1990.paddock.soil
      surfaceom
        PoolName = wheat  # Organic Matter pool name
        type = wheat  # Organic Matter type
        mass = 500  # Initial surface residue (kg/ha)
        cnr = 40  # C:N ratio of initial residue
        standing_fraction = 0.0  # Fraction of residue standing
      mungbean
  simulation RJL2_10: 24 Jan 1977 sowing 27 plants-m2, 75 cm rows
    clock: start_date=24/1/1977; end_date=30/4/1977
    summaryfile
    metfile met: filename=cooper.aps
    area paddock
      outputfile report: title=24 Jan 1977 sowing 27 plants-m2, 75 cm rows report
        filename=RJL2_10: 24 Jan 1977 sowing 27 plants-m2, 75 cm rows report.out
      operations
        24/01/1977  mungbean sow plants = 27, sowing_depth = 40, cultivar = berken,crop_class = plant, row_spacing = 750
      fertiliser
      irrigation: same as NT4 mungbean -  king planting 1.paddock.irrigation
      manager: same as aps18 - berkin weathering -  planting 1.paddock.manager
      Soil: same as RCM - sowing 1990 at Gatton 9 Jan 1990.paddock.soil
      surfaceom
        PoolName = wheat  # Organic Matter pool name
        type = wheat  # Organic Matter type
        mass = 500  # Initial surface residue (kg/ha)
        cnr = 40  # C:N ratio of initial residue
        standing_fraction = 0.0  # Fraction of residue standing
      mungbean
  simulation RJL2_11: 24 Jan 1977 sowing 40 plants-m2, 50 cm rows
    clock: start_date=24/1/1977; end_date=30/4/1977
    summaryfile
    metfile met: filename=cooper.aps
    area paddock
      outputfile report: title=24 Jan 1977 sowing 40 plants-m2, 50 cm rows report
        filename=RJL2_11: 24 Jan 1977 sowing 40 plants-m2, 50 cm rows report.out
      operations
        24/01/1977  mungbean sow plants = 40, sowing_depth = 40, cultivar = berken,crop_class = plant, row_spacing = 500
      fertiliser
      irrigation: same as NT4 mungbean -  king planting 1.paddock.irrigation
      manager: same as aps18 - berkin weathering -  planting 1.paddock.manager
      Soil: same as RCM - sowing 1990 at Gatton 9 Jan 1990.paddock.soil
      surfaceom
        PoolName = wheat  # Organic Matter pool name
        type = wheat  # Organic Matter type
        mass = 500  # Initial surface residue (kg/ha)
        cnr = 40  # C:N ratio of initial residue
        standing_fraction = 0.0  # Fraction of residue standing
      mungbean
  simulation RJL2_12: 24 Jan 1977 sowing 80 plants-m2, 25 cm rows
    clock: start_date=24/1/1977; end_date=30/4/1977
    summaryfile
    metfile met: filename=cooper.aps
    area paddock
      outputfile report: title=24 Jan 1977 sowing 80 plants-m2, 25 cm rows report
        filename=RJL2_12: 24 Jan 1977 sowing 80 plants-m2, 25 cm rows report.out
      operations
        24/01/1977  mungbean sow plants = 80, sowing_depth = 40, cultivar = berken,crop_class = plant, row_spacing = 250
      fertiliser
      irrigation: same as NT4 mungbean -  king planting 1.paddock.irrigation
      manager: same as aps18 - berkin weathering -  planting 1.paddock.manager
      Soil: same as RCM - sowing 1990 at Gatton 9 Jan 1990.paddock.soil
      surfaceom
        PoolName = wheat  # Organic Matter pool name
        type = wheat  # Organic Matter type
        mass = 500  # Initial surface residue (kg/ha)
        cnr = 40  # C:N ratio of initial residue
        standing_fraction = 0.0  # Fraction of residue standing
      mungbean
  simulation RJL2_2: 18 Nov 1976 sowing 27 plants-m2, 75 cm rows
    clock: start_date=18/11/1976; end_date=11/3/1977
    summaryfile
    metfile met: filename=cooper.aps
    area paddock
      outputfile report: title=18 Nov 1976 sowing 27 plants-m2, 75 cm rows report
        filename=RJL2_2: 18 Nov 1976 sowing 27 plants-m2, 75 cm rows report.out
      operations
        18/11/1976  mungbean sow plants = 27, sowing_depth = 40, cultivar = berken,crop_class = plant, row_spacing = 750
      fertiliser
      irrigation: same as NT4 mungbean -  king planting 1.paddock.irrigation
      manager: same as aps18 - berkin weathering -  planting 1.paddock.manager
      Soil: same as RCM - sowing 1990 at Gatton 9 Jan 1990.paddock.soil
      surfaceom
        PoolName = wheat  # Organic Matter pool name
        type = wheat  # Organic Matter type
        mass = 500  # Initial surface residue (kg/ha)
        cnr = 40  # C:N ratio of initial residue
        standing_fraction = 0.0  # Fraction of residue standing
      mungbean
  simulation RJL2_3: 18 Nov 1976 sowing 40 plants-m2, 50 cm rows
    clock: start_date=18/11/1976; end_date=11/3/1977
    summaryfile
    metfile met: filename=cooper.aps
    area paddock
      outputfile report: title=18 Nov 1976 sowing 40 plants-m2, 50 cm rows report
        filename=RJL2_3: 18 Nov 1976 sowing 40 plants-m2, 50 cm rows report.out
      operations
        18/11/1976  mungbean sow plants = 40, sowing_depth = 40, cultivar = berken,crop_class = plant, row_spacing = 500
      fertiliser
      irrigation: same as NT4 mungbean -  king planting 1.paddock.irrigation
      manager: same as aps18 - berkin weathering -  planting 1.paddock.manager
      Soil: same as RCM - sowing 1990 at Gatton 9 Jan 1990.paddock.soil
      surfaceom
        PoolName = wheat  # Organic Matter pool name
        type = wheat  # Organic Matter type
        mass = 500  # Initial surface residue (kg/ha)
        cnr = 40  # C:N ratio of initial residue
        standing_fraction = 0.0  # Fraction of residue standing
      mungbean
  simulation RJL2_4: 18 Nov 1976 sowing 80 plants-m2, 25 cm rows
    clock: start_date=18/11/1976; end_date=11/3/1977
    summaryfile
    metfile met: filename=cooper.aps
    area paddock
      outputfile report: title=18 Nov 1976 sowing 80 plants-m2, 25 cm rows report
        filename=RJL2_4: 18 Nov 1976 sowing 80 plants-m2, 25 cm rows report.out
      operations
        18/11/1976  mungbean sow plants = 80, sowing_depth = 40, cultivar = berken,crop_class = plant, row_spacing = 250
      fertiliser
      irrigation: same as NT4 mungbean -  king planting 1.paddock.irrigation
      manager: same as aps18 - berkin weathering -  planting 1.paddock.manager
      Soil: same as RCM - sowing 1990 at Gatton 9 Jan 1990.paddock.soil
      surfaceom
        PoolName = wheat  # Organic Matter pool name
        type = wheat  # Organic Matter type
        mass = 500  # Initial surface residue (kg/ha)
        cnr = 40  # C:N ratio of initial residue
        standing_fraction = 0.0  # Fraction of residue standing
      mungbean
  simulation RJL2_5: 20 Dec 1976 sowing 20 plants-m2, 100 cm rows
    clock: start_date=20/12/1976; end_date=21/3/1977
    summaryfile
    metfile met: filename=cooper.aps
    area paddock
      outputfile report: title=20 Dec 1976 sowing 20 plants-m2, 100 cm rows report
        filename=RJL2_5: 20 Dec 1976 sowing 20 plants-m2, 100 cm rows report.out
      operations
        20/12/1976  mungbean sow plants = 20, sowing_depth = 40, cultivar = berken,crop_class = plant, row_spacing = 1000
      fertiliser
      irrigation: same as NT4 mungbean -  king planting 1.paddock.irrigation
      manager: same as aps18 - berkin weathering -  planting 1.paddock.manager
      Soil: same as RCM - sowing 1990 at Gatton 9 Jan 1990.paddock.soil
      surfaceom
        PoolName = wheat  # Organic Matter pool name
        type = wheat  # Organic Matter type
        mass = 500  # Initial surface residue (kg/ha)
        cnr = 40  # C:N ratio of initial residue
        standing_fraction = 0.0  # Fraction of residue standing
      mungbean
  simulation RJL2_6: 20 Dec 1976 sowing 27 plants-m2, 75 cm rows
    clock: start_date=20/12/1976; end_date=21/3/1977
    summaryfile
    metfile met: filename=cooper.aps
    area paddock
      outputfile report: title=20 Dec 1976 sowing 27 plants-m2, 75 cm rows report
        filename=RJL2_6: 20 Dec 1976 sowing 27 plants-m2, 75 cm rows report.out
      operations
        20/12/1976  mungbean sow plants = 27, sowing_depth = 40, cultivar = berken,crop_class = plant, row_spacing = 750
      fertiliser
      irrigation: same as NT4 mungbean -  king planting 1.paddock.irrigation
      manager: same as aps18 - berkin weathering -  planting 1.paddock.manager
      Soil: same as RCM - sowing 1990 at Gatton 9 Jan 1990.paddock.soil
      surfaceom
        PoolName = wheat  # Organic Matter pool name
        type = wheat  # Organic Matter type
        mass = 500  # Initial surface residue (kg/ha)
        cnr = 40  # C:N ratio of initial residue
        standing_fraction = 0.0  # Fraction of residue standing
      mungbean
  simulation RJL2_7: 20 Dec 1976 sowing 40 plants-m2, 50 cm rows
    clock: start_date=20/12/1976; end_date=21/3/1977
    summaryfile
    metfile met: filename=cooper.aps
    area paddock
      outputfile report: title=20 Dec 1976 sowing 40 plants-m2, 50 cm rows report
        filename=RJL2_7: 20 Dec 1976 sowing 40 plants-m2, 50 cm rows report.out
      operations
        20/12/1976  mungbean sow plants = 40, sowing_depth = 40, cultivar = berken,crop_class = plant, row_spacing = 500
      fertiliser
      irrigation: same as NT4 mungbean -  king planting 1.paddock.irrigation
      manager: same as aps18 - berkin weathering -  planting 1.paddock.manager
      Soil: same as RCM - sowing 1990 at Gatton 9 Jan 1990.paddock.soil
      surfaceom
        PoolName = wheat  # Organic Matter pool name
        type = wheat  # Organic Matter type
        mass = 500  # Initial surface residue (kg/ha)
        cnr = 40  # C:N ratio of initial residue
        standing_fraction = 0.0  # Fraction of residue standing
      mungbean
  simulation RJL2_8: 20 Dec 1976 sowing 80 plants-m2, 25 cm rows
    clock: start_date=20/12/1976; end_date=21/3/1977
    summaryfile
    metfile met: filename=cooper.aps
    area paddock
      outputfile report: title=20 Dec 1976 sowing 80 plants-m2, 25 cm rows report
        filename=RJL2_8: 20 Dec 1976 sowing 80 plants-m2, 25 cm rows report.out
      operations
        20/12/1976  mungbean sow plants = 80, sowing_depth = 40, cultivar = berken,crop_class = plant, row_spacing = 250
      fertiliser
      irrigation: same as NT4 mungbean -  king planting 1.paddock.irrigation
      manager: same as aps18 - berkin weathering -  planting 1.paddock.manager
      Soil: same as RCM - sowing 1990 at Gatton 9 Jan 1990.paddock.soil
      surfaceom
        PoolName = wheat  # Organic Matter pool name
        type = wheat  # Organic Matter type
        mass = 500  # Initial surface residue (kg/ha)
        cnr = 40  # C:N ratio of initial residue
        standing_fraction = 0.0  # Fraction of residue standing
      mungbean
  simulation RJL2_9: 24 Jan 1977 sowing 20 plants-m2, 100 cm rows
    clock: start_date=24/1/1977; end_date=30/4/1977
    summaryfile
    metfile met: filename=cooper.aps
    area paddock
      outputfile report: title=24 Jan 1977 sowing 20 plants-m2, 100 cm rows report
        filename=RJL2_9: 24 Jan 1977 sowing 20 plants-m2, 100 cm rows report.out
      operations
        24/01/1977  mungbean sow plants = 20, sowing_depth = 40, cultivar = berken,crop_class = plant, row_spacing = 1000
      fertiliser
      irrigation: same as NT4 mungbean -  king planting 1.paddock.irrigation
      manager: same as aps18 - berkin weathering -  planting 1.paddock.manager
      Soil: same as RCM - sowing 1990 at Gatton 9 Jan 1990.paddock.soil
      surfaceom
        PoolName = wheat  # Organic Matter pool name
        type = wheat  # Organic Matter type
        mass = 500  # Initial surface residue (kg/ha)
        cnr = 40  # C:N ratio of initial residue
        standing_fraction = 0.0  # Fraction of residue standing
      mungbean
