folder simulations: version=36; creator=Apsim 7.6-r3518
  simulation Hybrid Rainfed
    metfile met: filename=%apsim%\Tests\Validation\OilPalm\Jerantut.met
    clock
      start_date = 01/03/1999  # Enter the start date of the simulation
      end_date = 30/04/2014  # Enter the end date of the simulation
    summaryfile
    area Block
      OilPalm
        UnderstoryCoverGreen = .8
        UnderstoryLegumeFraction = 1
      fertiliser
      surfaceom surface organic matter
        PoolName = oilpalm oilpalmstem  # Organic Matter pool name
        type = oilpalm oilpalmstem  # Organic Matter type
        mass = 24000 63000  # Initial surface residue (kg/ha)
        cnr = 39 145  # C:N ratio of initial residue
        standing_fraction = 0 0  # Fraction of residue standing
        memo
          24 t Fronds at 1.14% N = 274 kgN
          63 t Trunk at 0.3% N = 189 kg N

          Overall N% = 0.533% = C:N 75
      manager Palm Management
        planting_date = 01/03/1999
        population = 136  # Plant Population (/ha)
        cultivar = Dami
        year1N = 0.14  # N applied in year 1 (kg/palm)
        year2N = 0.3  # N applied in year 2 (kg/palm)
        year3N = 0.6  # N applied in year 3 (kg/palm)
        year4N = 0.9  # N applied in year 4 (kg/palm)
        MatureN = 1.05  # N applied to mature palms (kg/palm)
        WeeklyIrrig = 0  # Weekly water target (mm)
        on start_of_day:
```
ppsm = [population]/10000

! Add Trunk from previous plantation
!'surface organic matter' add_surfaceom type=OilPalm, name=trunk, mass=63000, cnr=133, cpr=200


endif

if today = date('[planting_date]') then
    OilPalm sow population = ppsm, depth = 200, cultivar = [cultivar], maxcover = 1.0, budnumber = 1, row_spacing = [row_width], crop_class = plant  
endif


if today = date('15-jan') or today = date('15-may') or today = date('15-sep') then
   if age <= 1 then
      Nrate = [population] * [year1N] / 3
   elseif age <= 2 then
      Nrate = [population] * [year2N] / 3
   elseif age <= 3 then
      Nrate = [population] * [year3N] / 3
   elseif age <= 4 then
      Nrate = [population] * [year4N] / 3
   else
      Nrate = [population] *  [MatureN]/ 3
   endif           

   fertiliser apply amount = Nrate, type = nh4no3, depth = 1
endif


if today = date('31-dec') then
  AnnualFrond = CumulativeFrondNumber - LastYearFrondNo 
  LastYearFrondNo = CumulativeFrondNumber
endif

weeklyrain = weeklyrain + rain     
if end_week = 1 then
   IrrigRequired = [WeeklyIrrig] - weeklyrain
   if IrrigRequired > 0 then
      Irrigation apply amount = IrrigRequired
   endif
   weeklyrain = 0
endif     
     
StemMassTPHa = Stemmass / 100.
```
        on Init:
```
Plant_population = 0
LastYearFrondNo = 0
StemMassTPHa = 0

WeeklyRain = 0
IrrigRequired = 0
```
      irrigation
        automatic_irrigation = off
        asw_depth = 1100  # Depth to which ASW is calculated. (mm)
        crit_fr_asw = .9  # Fraction of ASW below which irrigation is applied (0-1.0)
        irrigation_efficiency = 1  # Efficiency of the irrigation. (0-1.0)
        irrigation_allocation = off  # Allocation limits
        allocation = 0  # Allocation in mm
        default_no3_conc = 0.0  # Nitrate concentration (ppm N)
        default_nh4_conc = 0.0  # Ammonium concentration (ppm N)
        default_cl_conc = 0.0  # Chloride concentration (ppm Cl)
      Soil: SoilType=Clay Soil; Site=Jerantut; Country=Malaysia; Latitude=3.86; Longitude=102.54; YearOfSampling=0
        DataSource=http://www.aarsb.com.my/category/agro-management/oil-palm/page/5#Drainage
        Comments:
          Prang Series
          The Prang Series is a member of the Segamat Family which is a very fine, oxidic, isohyperthermic, red Tipik Akrolemoks. It is developed over amphibolite and schist parent materials. These are deep (> 100 cm) uniformly red coloured soils. These soils are characterized by thin clayey A horizons with dark reddish brown colours and B horizons having yellowish red to red colours, heavy clay textures with very weak, medium to fine subangular blocky structures and very friable consistence. These soils are often very deep but hard petroplinthite concretions may occur as a loose band at depths below 100 cm.    Browsing articles in "Oil Palm"
          Typifying Pedon
          Type Location
          Range in Characteristics
          Competing Soils and Their Differences
          Setting
          Principal Associated Soils
          Drainage and Permeability
          Use and Vegetation
          Distribution and Extent
          Series Established
          Remarks on Classification
          Suitability for Agriculture
          Analytical Data

          Prang Series
          The Prang Series is a member of the Segamat Family which is a very fine, oxidic, isohyperthermic, red Tipik Akrolemoks. It is developed over amphibolite and schist parent materials. These are deep (> 100 cm) uniformly red coloured soils. These soils are characterized by thin clayey A horizons with dark reddish brown colours and B horizons having yellowish red to red colours, heavy clay textures with very weak, medium to fine subangular blocky structures and very friable consistence. These soils are often very deep but hard petroplinthite concretions may occur as a loose band at depths below 100 cm.

          Typifying Pedon

          Type Location
          Soils of the Prang Series were first established in Prang Besar Estate, near Kuala Lumpur during the Reconnaissance Soil Survey of Selangor (Wong 1966). The above pedon was described from the same estate at the midslope of a rolling hill (16–20% or 8–10°) slope at an elevation of about 70 metres (200 ft) above sea level. Location: Topographic Sheet 3756, 2°55′ N, 101°42′ E (Grid Reference 3756 – 120230 m)

          Range in Characteristics
          The A horizons of the Prang Series range in colour from dark reddish brown to reddish brown (5YR3/3, 3/4, 4/3; 2.5YR2.3/4) with clay loam to clay textures. The B horizons range in colour from red to yellowish red (2.5YR4/6, 4/8, 5/6, 5/8; 5YR4/6, 5/6, 5/8). Textures are uniformly clayey with clay contents often over 65% but in the mechanical analyses lower clay contents are obtained due to poor dispersion. Structures are weak to very weak medium to fine subangular blocky and consistence very friable. Clayballs are sometimes found in the B horizons. Horizonation is weak and the profiles are often deep. Occasionally particularly at the crest of the hills petroplinthite nodules or iron coated schist material may be present but embedded in the clayey B matrix. This laterite band often occurs at depths of about one metre or greater. Sometimes a thin loose band of pisiform petroplinthite nodules may also occur within one metre but these are then thin bands.

          Competing Soils and Their Differences
          The Prang Series because of its typical reddish colours is easily mistaken for the Segamat, Patang, Kampong Kolam, Tarat and Apas Series. In fact unless the parent material is known it is virtually impossible to separate these soils. The Prang Series often has somewhat slightly more sand compared to the Segamat Series but as mentioned earlier poor dispersion may even make such differentiation impossible. The Patang Series mapped in Terengganu and Johore is also very similar to the Prang Series. The Patang Series is reported to be slightly firmer with depth and often has outcrops of hornfels at the surface. The Patang Series has a CECclay of more than 1.5 cmol. The Tarat Series and Apas Series are developed over andesites or basalts and have cation retention capacity over 1.5 cmol (+) kg–1 clay.

          Setting
          The soils of the Prang Series typically occur on undulating to rolling terrain. They have to-date been mapped at elevations of 0–100 metres (0–300 ft). These soils often occur on the lower slopes of hills which have the Malacca or Seremban Series on their crests.

          Principal Associated Soils
          The Prang Series have often been mapped in association with soils of the Munchong Series, Chat Series, Seremban Series and Malacca Series. Sometimes they have also been mapped in association with soils of the Serdang Series. The Munchong Series is separated from the Prang Series by its yellower hues. The Munchong Series has hues of 7.5YR and 10YR in the upper part (50 cm) of the B horizon. The Chat Series has colours similar to that of the Munchong Series and has an argillic horizon. The Seremban Series also has red colours but is characterized by the presence of platy iron-coated schist fragments within 50 cm. The Malacca Series is characterized by the presence of a thick band of angular petroplinthite gravels which occur within 50 cm of the surface.
        Water
          Thickness  BD    AirDry  LL15  DUL   SAT
          100        0.8   0.13    0.25  0.38  0.65
          200        0.83  0.13    0.25  0.38  0.65
          300        0.93  0.13    0.27  0.37  0.64
          300        1.15  0.13    0.27  0.37  0.56
          300        1.15  0.13    0.34  0.42  0.56
          300        1.15  0.13    0.34  0.42  0.56
          SoilCrop OilPalm: LL=[0.25, 0.25, 0.27, 0.27, 0.34, 0.34]; KL=[0.04, 0.025, 0.025, 0.015, 0.01, 0.01]; XF=[1, 1, 1, 1, 1, 0]
        SoilWater: SummerCona=5; SummerU=5; SummerDate=1-Nov; WinterCona=5; WinterU=5; WinterDate=1-Apr; DiffusConst=40; DiffusSlope=16; Salb=0.18; CN2Bare=75; CNRed=20; CNCov=0.8; Slope=0; DischargeWidth=0; CatchmentArea=0; MaxPond=0; Thickness=[100, 200, 300, 300, 300, 300]; SWCON=[0.55, 0.55, 0.55, 0.55, 0.55, 0.55]
        SoilOrganicMatter: RootCN=30; RootWt=3000; SoilCN=10; EnrACoeff=7.4; EnrBCoeff=0.2; OCUnits=Total
          Thickness  OC    FBiom  FInert
          200        2.46  0.08   0.28
          200        1     0.06   0.6
          200        1     0.04   0.7
          200        0.7   0.02   0.99
          200        0.7   0.02   0.99
          500        0.7   0.02   0.99
        Analysis: Thickness=[100, 100, 100, 300, 300, 600]; PH=[6.3, 6.4, 6.7, 6.8, 6.8, 6.8]; PHUnits=Water; BoronUnits=HotWater
        InitialWater Initial water: FractionFull=1; PercentMethod=EvenlyDistributed
        Sample Initial nitrogen: NO3Units=kgha; NH4Units=ppm; SWUnits=Volumetric; OCUnits=Total; PHUnits=Water
          Thickness  NO3  NH4
          100        217  0
          200        30   0
          300        5    0
          300        5    0
          300        0    0
          300        0    0
      outputfile AnnualOutput: filename=Hybrid Rainfed Block AnnualOutput.out; title=Hybrid Rainfed Block AnnualOutput
        variables
          variables: year, dd/mm/yyyy as Date, OilPalm.Age, AnnualYield, CumulativeFrondNumber, AnnualBunches, AnnualRain, AnnualEo, AnnualNPP, AnnualNFixation, UnderstoryCoverGreen, AnnualIrrigation, AnnualFrond
        events Reporting Frequency: event=end_year
      outputfile MonthlyOutput: filename=Hybrid Rainfed Block MonthlyOutput.out; title=Hybrid Rainfed Block MonthlyOutput
        variables
          variable:
            year
            dd/mm/yyyy as Date
            Age
            Month
            MonthlyRain
            MonthlyEo
            LAI
            StemMassTPHa
            oc(1)
            oc(2)
            oc(3)
            carbon_tot()
            nit_tot()
            MonthlyN2O
            MonthlyNLeach
            MonthlyDenit
            surfaceom_wt_oilpalmstem as FelledStemMass
            surfaceom_wt_oilpalm as FrondPileMass
            MonthlyWaterStress
            MonthlySoilWater
            MonthlyNitrogenStress
            Frond17Area
            MonthlyEP
            MonthlyEs
            MonthlyUnderstoryEP
            MonthlyPEP
        events Reporting Frequency: event=end_month
      tracker
        variable:
          sum of HarvestFFB on harvesting from AnnualOutput.reported to now as AnnualYield
          sum of HarvestBunches on harvesting from AnnualOutput.reported to now as AnnualBunches
          sum of Rain on post from AnnualOutput.reported to now as AnnualRain
          sum of eo on post from AnnualOutput.reported to now as AnnualEo
          sum of dltDM on post from AnnualOutput.reported to now as AnnualNPP
          sum of n2o_atm() on post from MonthlyOutput.reported to now as MonthlyN2O
          sum of leach_no3 on post from MonthlyOutput.reported to now as MonthlyNLeach
          sum of dnit() on post from MonthlyOutput.reported to now as MonthlyDenit
          sum of UnderstoryNFixation on post from AnnualOutput.reported to now as AnnualNFixation
          sum of Rain on post from MonthlyOutput.reported to now as MonthlyRain
          sum of HarvestFFB on harvesting from MonthlyOutput.reported to now as MonthlyYield
          sum of irrigation on post from AnnualOutput.reported to now as AnnualIrrigation
          average of eo on post from MonthlyOutput.reported to now as MonthlyEo
          average of Fw on post from MonthlyOutput.reported to now as MonthlyWaterStress
          average of sw_dep() on post from MonthlyOutput.reported to now as MonthlySoilWater
          average of ep on post from MonthlyOutput.reported to now as MonthlyEP
          average of es on post from MonthlyOutput.reported to now as MonthlyEs
          average of UnderstoryEP on post from MonthlyOutput.reported to now as MonthlyUnderstoryEP
          average of Fn on post from MonthlyOutput.reported to now as MonthlyNitrogenStress
          average of PEP on post from MonthlyOutput.reported to now as MonthlyPEP
  simulation Hybrid Irrigated -> /simulations/Hybrid Rainfed
    area Block -> /simulations/Hybrid Rainfed/Block
      manager Palm Management
        planting_date = 01/03/1999
        population = 136  # Plant Population (/ha)
        cultivar = Dami
        year1N = 0.14  # N applied in year 1 (kg/palm)
        year2N = 0.3  # N applied in year 2 (kg/palm)
        year3N = 0.6  # N applied in year 3 (kg/palm)
        year4N = 0.9  # N applied in year 4 (kg/palm)
        MatureN = 1.05  # N applied to mature palms (kg/palm)
        WeeklyIrrig = 35  # Weekly water target (mm)
        on start_of_day:
        script: same as in Hybrid Rainfed.Block.Palm Management
        on Init:
```
Plant_population = 0
LastYearFrondNo = 0
StemMassTPHa = 0

WeeklyRain = 0
IrrigRequired = 0
```
      outputfile AnnualOutput -> /simulations/Hybrid Rainfed/Block/AnnualOutput: filename=Hybrid Irrigated Block AnnualOutput.out; title=Hybrid Irrigated Block AnnualOutput
        variables -> /simulations/Hybrid Rainfed/Block/AnnualOutput/Variables
        events Reporting Frequency -> /simulations/Hybrid Rainfed/Block/AnnualOutput/Reporting Frequency
      outputfile MonthlyOutput -> /simulations/Hybrid Rainfed/Block/MonthlyOutput: filename=Hybrid Irrigated Block MonthlyOutput.out; title=Hybrid Irrigated Block MonthlyOutput
        variables -> /simulations/Hybrid Rainfed/Block/MonthlyOutput/Variables
        events Reporting Frequency -> /simulations/Hybrid Rainfed/Block/MonthlyOutput/Reporting Frequency
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