folder simulations: version=36; creator=Apsim 7.6-r3482
  folder Expt324
    simulation Expt324N0
      metfile met: filename=%apsim%\Tests\Validation\OilPalm\Popondetta.met
      clock
        start_date = 01/03/1996  # Enter the start date of the simulation
        end_date = 29/09/2010  # Enter the end date of the simulation
      summaryfile
      area paddock
        OilPalm
          UnderstoryCoverGreen = 0.4
          UnderstoryLegumeFraction = 1.0
        fertiliser
        surfaceom surface organic matter
          PoolName = oilpalm oilpalmstem  # Organic Matter pool name
          type = oilpalm oilpalmstem  # Organic Matter type
          mass = 24000 63000  # Initial surface residue (kg/ha)
          cnr = 39 145  # C:N ratio of initial residue
          standing_fraction = 0 0  # Fraction of residue standing
          memo
            24 t Fronds at 1.14% N = 274 kgN
            63 t Trunk at 0.3% N = 189 kg N

            Overall N% = 0.533% = C:N 75
        folder Manager folder
          operations
            1-apr-1996  fertiliser apply amount= 1.9 (kg/ha), type= Nh4NO3(), depth= 10 (mm)
            1-jun-1996  fertiliser apply amount= 3.8 (kg/ha), type= Nh4NO3(), depth= 10 (mm)
            1-sep-1996  fertiliser apply amount= 3.8 (kg/ha), type= Nh4NO3(), depth= 10 (mm)
            1-dec-1996  fertiliser apply amount= 3.8 (kg/ha), type= Nh4NO3(), depth= 10 (mm)
            1-mar-1996  fertiliser apply amount= 5.7 (kg/ha), type= Nh4NO3(), depth= 10 (mm)
            1-jul-1997  fertiliser apply amount= 11.8  (kg/ha), type= Nh4NO3(), depth= 10 (mm)
            1-nov-1997  fertiliser apply amount= 11.8  (kg/ha), type= Nh4NO3(), depth= 10 (mm)
            1-mar-1998  fertiliser apply amount= 16.5  (kg/ha), type= Nh4NO3(), depth= 10 (mm)
            1-jul-1998  fertiliser apply amount= 23.6  (kg/ha), type= Nh4NO3(), depth= 10 (mm)
            1-nov-1998  fertiliser apply amount= 23.6  (kg/ha), type= Nh4NO3(), depth= 10 (mm)
            1-mar-1999  fertiliser apply amount= 33.1  (kg/ha), type= Nh4NO3(), depth= 10 (mm)
            1-jul-1999  fertiliser apply amount= 37.8  (kg/ha), type= Nh4NO3(), depth= 10 (mm)
            1-nov-1999  fertiliser apply amount= 37.8  (kg/ha), type= Nh4NO3(), depth= 10 (mm)
            1-mar-2000  fertiliser apply amount= 42.5  (kg/ha), type= Nh4NO3(), depth= 10 (mm)
            1-jul-2000  fertiliser apply amount= 47.3  (kg/ha), type= Nh4NO3(), depth= 10 (mm)
            1-nov-2000  fertiliser apply amount= 47.3  (kg/ha), type= Nh4NO3(), depth= 10 (mm)
          irrigation
            automatic_irrigation = off
            asw_depth = 1000  # Depth to which ASW is calculated. (mm)
            crit_fr_asw = .95  # Fraction of ASW below which irrigation is applied (0-1.0)
            irrigation_efficiency = 1  # Efficiency of the irrigation. (0-1.0)
            irrigation_allocation = off  # Allocation limits
            allocation = 0  # Allocation in ML
            default_no3_conc = 100  # Nitrate concentration (ppm N)
            default_nh4_conc = 0  # Ammonium concentration (ppm N)
            default_cl_conc = 0  # Chloride concentration (ppm Cl)
            default_no3_conc = 100  # Nitrate concentration (ppm N)
            default_nh4_conc = 0  # Ammonium concentration (ppm N)
            default_cl_conc = 0  # Chloride concentration (ppm Cl)
          manager Palm Management
            sowing_date = 01/03/1996
            population = 135  # Plant Population (/ha)
            cultivar = Dami
            sowing_depth = 200  # Sowing depth (mm)
            on start_of_day:
```
ppsm = [population]/10000

! Add Trunk from previous plantation
!'surface organic matter' add_surfaceom type=OilPalm, name=trunk, mass=63000, cnr=133, cpr=200


endif

if today = date('[sowing_date]') then
    OilPalm sow population = ppsm, depth = [sowing_depth], cultivar = [cultivar], maxcover = 1.0, budnumber = 1, row_spacing = [row_width], crop_class = plant  
endif
```
            on Init:
```
Plant_population = 0
```
          manager Calculations
            on init:
```
Offset = 0
CumFronds = 0
CumBunches = 0
BunchOffset = 0
CumYield = 0
YieldOffset = 0
MonthlyPalmYield = 0
MonthlyPalmBunches = 0
MonthlyPalmBunchSize = 0
MonthlyDenit = 0
MonthlyN2O = 0
MonthlyN2 = 0
MonthlyFixation = 0
SurfaceNO3 = 0
RootZoneNO3 = 0
MonthlyLeach = 0
SoilC_tpha = 0
```
            on start_of_day:
```
if start_month = 1 then
   MonthlyPalmYield = 0
   MonthlyPalmBunches = 0
   MonthlyPalmBunchSize = 0
   MonthlyDenit = 0
   MonthlyN2O = 0
   MonthlyN2 = 0
   MonthlyFixation = 0
   MonthlyLeach = 0
endif
```
            on end_of_day:
```
If oilpalm.plant_status = 'alive' then
if today < date('01/11/2001') then
   Offset = OilPalm.CumulativeFrondNumber
endif
CumFronds = OilPalm.CumulativeFrondNumber - Offset

if today < date('01/12/2000') then
   BunchOffset = OilPalm.CumulativeBunchNumber
   YieldOffset = OilPalm.CumulativeYield
endif
CumBunches = OilPalm.CumulativeBunchNumber - BunchOffset
CumYield = OilPalm.CumulativeYield - YieldOffset
endif

MonthlyDenit = MonthlyDenit + dnit()
MonthlyN2O = MonthlyN2O + n2o_atm()
MonthlyN2 = MonthlyDenit - Monthly_N2O
SurfaceNO3 = no3(1) + no3(2) + no3(3)
RootZoneNO3 = no3(1) + no3(2) + no3(3) + no3(4) + no3(5) + no3(6) + no3(7) + no3(8) + no3(9)
MonthlyFixation = MonthlyFixation +OilPalm.UnderstoryNFixation
MonthlyLeach = MonthlyLeach + flow_no3(9)
SoilC_tpha = carbon_tot() / 1000.
```
            on harvesting:
```
MonthlyPalmYield = MonthlyPalmYield + HarvestBunchSize * HarvestBunches / 1000.
MonthlyPalmBunches = MonthlyPalmBunches + HarvestBunches
if MonthlyPalmBunches > 0 then
   MonthlyPalmBunchSize = MonthlyPalmYield / MonthlyPalmBunches
else
   MonthlyPalmBunchSize = 0
endif
```
        Soil: SoilType=Higaturu Series; Site=Sangara Estate; NearestTown=Popondetta; Region=Oro Province; Country=Papua New Guinea; Latitude=-8.7667; Longitude=148.2333; Comments=Volcanic Ash alluvial deposited
          DataSource=Soil OC from OPRA 2009 Annual Report. BD from Banabas PhD Thesis. SAT = total porosity, DUL = SAT - 0.05, LL = DUL-0.1, AD = LL/3
          Water
            Thickness  BD    AirDry  LL15   DUL    SAT
            100        1.22  0.127   0.38   0.48   0.53
            200        1.22  0.127   0.38   0.48   0.53
            300        1.43  0.1     0.3    0.4    0.45
            300        1.14  0.137   0.41   0.51   0.56
            300        1.15  0.135   0.406  0.506  0.556
            300        1.15  0.135   0.406  0.506  0.556
            500        1.43  0.1     0.3    0.4    0.45
            500        1.43  0.1     0.3    0.4    0.45
            500        1.43  0.1     0.3    0.4    0.45
            500        1.43  0.1     0.3    0.4    0.45
            500        1.43  0.1     0.3    0.4    0.45
            1000       1.43  0.1     0.3    0.4    0.45
            SoilCrop OilPalm
              LL=[0.38, 0.38, 0.3, 0.41, 0.406, 0.406, 0.3, 0.3, 0.3, 0.3, 0.3, 0.3]
              KL=[0.06, 0.04, 0.03, 0.02, 0.02, 0.02, 0.01, 0.01, 0.01, 0, 0, 0]
              XF=[1, 1, 1, 1, 1, 1, 1, 1, 1, 0, 0, 0]
          SoilWater: SummerCona=5; SummerU=5; SummerDate=1-Nov; WinterCona=5; WinterU=5; WinterDate=1-Apr; DiffusConst=88; DiffusSlope=35.4; Salb=0.18; CN2Bare=68; CNRed=20; CNCov=0.8; Slope=0; DischargeWidth=0; CatchmentArea=0; MaxPond=0; Thickness=[100, 200, 300, 300, 300, 300]; SWCON=[0.7, 0.7, 0.7, 0.7, 0.7, 0.7]
          SoilOrganicMatter: RootCN=30; RootWt=3000; SoilCN=12; EnrACoeff=7.4; EnrBCoeff=0.2; OCUnits=Total
            Thickness  OC    FBiom  FInert
            100        2.1   0.04   0.24
            100        1.06  0.03   0.47
            100        0.65  0.015  0.77
            300        0.5   0.01   0.95
            300        0.4   0.01   0.99
            4100       0.4   0.01   0.99
          Analysis: Thickness=[100, 100, 100, 300, 300, 4100]; PH=[6.3, 6.4, 6.7, 6.8, 6.8, 6.8]; PHUnits=Water; BoronUnits=HotWater
          InitialWater Initial water: FractionFull=1; PercentMethod=EvenlyDistributed
          Sample Initial nitrogen: NO3Units=ppm; NH4Units=ppm; SWUnits=Volumetric; OCUnits=Total; PHUnits=Water
            Thickness  NO3  NH4
            100        5    0
            200        5    0
            300        1    0
            300        1    0
            300        1    0
            3800       0    0
        outputfile AnnualOutput: filename=Expt324N0 AnnualOutput.out; title=Expt324N0 AnnualOutput
          variables
            variables: year, dd/mm/yyyy as Date, OilPalm.Age, AnnualYield, CumulativeFrondNumber, AnnualBunches, AnnualRain, AnnualEo, AnnualNPP, AnnualDnit, AnnualFertiliser
          events Reporting Frequency: event=end_year
        outputfile MonthlyOutput: filename=Expt324N0 MonthlyOutput.out; title=Expt324N0 MonthlyOutput
          variables
            variables: year, dd/mm/yyyy as Date, Age, Month, MonthlyPalmBunches, MonthlyPalmYield, MonthlyPalmBunchSize, LAI, Stemmass, oc(1-3), carbon_tot(), nit_tot(), surfaceom_wt_oilpalmstem, MonthlyDenit, MonthlyN2O, No3(), MonthlyLeach, MonthlyFixation, SurfaceNO3, RootZoneNO3, MonthlyN2, SoilC_tpha
          events Reporting Frequency: event=end_month
        tracker
          variable:
            sum of HarvestYield on harvesting from AnnualOutput.reported to now as AnnualYield
            sum of HarvestBunches on harvesting from AnnualOutput.reported to now as AnnualBunches
            sum of Rain on post from AnnualOutput.reported to now as AnnualRain
            sum of eo on post from AnnualOutput.reported to now as AnnualEo
            sum of dltDM on post from AnnualOutput.reported to now as AnnualNPP
            sum of dnit() on post from AnnualOutput.reported to now as AnnualDnit
            sum of fertiliser on post from AnnualOutput.reported to now as AnnualFertiliser
    simulation Expt324N1 -> /simulations/Expt324/Expt324N0
      area paddock -> /simulations/Expt324/Expt324N0/paddock
        folder Manager folder -> /simulations/Expt324/Expt324N0/paddock/Manager folder
          operations
            1-apr-1996  fertiliser apply amount= 1.9 (kg/ha), type= Nh4NO3(), depth= 10 (mm)
            1-jun-1996  fertiliser apply amount= 3.8 (kg/ha), type= Nh4NO3(), depth= 10 (mm)
            1-sep-1996  fertiliser apply amount= 3.8 (kg/ha), type= Nh4NO3(), depth= 10 (mm)
            1-dec-1996  fertiliser apply amount= 3.8 (kg/ha), type= Nh4NO3(), depth= 10 (mm)
            1-mar-1996  fertiliser apply amount= 5.7 (kg/ha), type= Nh4NO3(), depth= 10 (mm)
            1-jul-1997  fertiliser apply amount= 11.8  (kg/ha), type= Nh4NO3(), depth= 10 (mm)
            1-nov-1997  fertiliser apply amount= 11.8  (kg/ha), type= Nh4NO3(), depth= 10 (mm)
            1-mar-1998  fertiliser apply amount= 16.5  (kg/ha), type= Nh4NO3(), depth= 10 (mm)
            1-jul-1998  fertiliser apply amount= 23.6  (kg/ha), type= Nh4NO3(), depth= 10 (mm)
            1-nov-1998  fertiliser apply amount= 23.6  (kg/ha), type= Nh4NO3(), depth= 10 (mm)
            1-mar-1999  fertiliser apply amount= 33.1  (kg/ha), type= Nh4NO3(), depth= 10 (mm)
            1-jul-1999  fertiliser apply amount= 37.8  (kg/ha), type= Nh4NO3(), depth= 10 (mm)
            1-nov-1999  fertiliser apply amount= 37.8  (kg/ha), type= Nh4NO3(), depth= 10 (mm)
            1-mar-2000  fertiliser apply amount= 42.5  (kg/ha), type= Nh4NO3(), depth= 10 (mm)
            1-jul-2000  fertiliser apply amount= 47.3  (kg/ha), type= Nh4NO3(), depth= 10 (mm)
            1-nov-2000  fertiliser apply amount= 47.3  (kg/ha), type= Nh4NO3(), depth= 10 (mm)
            1-mar-2001  fertiliser apply amount= 57 (kg/ha), type= urea_N (), depth= 10 (mm)
            1-mar-2002  fertiliser apply amount= 57 (kg/ha), type= urea_N (), depth= 10 (mm)
            1-mar-2003  fertiliser apply amount= 57 (kg/ha), type= urea_N (), depth= 10 (mm)
            1-mar-2004  fertiliser apply amount= 57 (kg/ha), type= urea_N (), depth= 10 (mm)
            1-mar-2005  fertiliser apply amount= 57 (kg/ha), type= urea_N (), depth= 10 (mm)
            1-mar-2006  fertiliser apply amount= 57 (kg/ha), type= urea_N (), depth= 10 (mm)
            1-mar-2007  fertiliser apply amount= 57 (kg/ha), type= urea_N (), depth= 10 (mm)
            1-mar-2008  fertiliser apply amount= 57 (kg/ha), type= urea_N (), depth= 10 (mm)
            1-mar-2009  fertiliser apply amount= 57 (kg/ha), type= urea_N (), depth= 10 (mm)
            1-mar-2010  fertiliser apply amount= 57 (kg/ha), type= urea_N (), depth= 10 (mm)
        outputfile AnnualOutput -> /simulations/Expt324/Expt324N0/paddock/AnnualOutput: filename=Expt324N1 AnnualOutput.out; title=Expt324N1 AnnualOutput
          variables -> /simulations/Expt324/Expt324N0/paddock/AnnualOutput/Variables
          events Reporting Frequency -> /simulations/Expt324/Expt324N0/paddock/AnnualOutput/Reporting Frequency
        outputfile MonthlyOutput -> /simulations/Expt324/Expt324N0/paddock/MonthlyOutput: filename=Expt324N1 MonthlyOutput.out; title=Expt324N1 MonthlyOutput
          variables -> /simulations/Expt324/Expt324N0/paddock/MonthlyOutput/Variables
          events Reporting Frequency -> /simulations/Expt324/Expt324N0/paddock/MonthlyOutput/Reporting Frequency
    simulation Expt324N2 -> /simulations/Expt324/Expt324N0
      area paddock -> /simulations/Expt324/Expt324N0/paddock
        folder Manager folder -> /simulations/Expt324/Expt324N0/paddock/Manager folder
          operations
            1-apr-1996  fertiliser apply amount= 1.9 (kg/ha), type= Nh4NO3(), depth= 10 (mm)
            1-jun-1996  fertiliser apply amount= 3.8 (kg/ha), type= Nh4NO3(), depth= 10 (mm)
            1-sep-1996  fertiliser apply amount= 3.8 (kg/ha), type= Nh4NO3(), depth= 10 (mm)
            1-dec-1996  fertiliser apply amount= 3.8 (kg/ha), type= Nh4NO3(), depth= 10 (mm)
            1-mar-1996  fertiliser apply amount= 5.7 (kg/ha), type= Nh4NO3(), depth= 10 (mm)
            1-jul-1997  fertiliser apply amount= 11.8  (kg/ha), type= Nh4NO3(), depth= 10 (mm)
            1-nov-1997  fertiliser apply amount= 11.8  (kg/ha), type= Nh4NO3(), depth= 10 (mm)
            1-mar-1998  fertiliser apply amount= 16.5  (kg/ha), type= Nh4NO3(), depth= 10 (mm)
            1-jul-1998  fertiliser apply amount= 23.6  (kg/ha), type= Nh4NO3(), depth= 10 (mm)
            1-nov-1998  fertiliser apply amount= 23.6  (kg/ha), type= Nh4NO3(), depth= 10 (mm)
            1-mar-1999  fertiliser apply amount= 33.1  (kg/ha), type= Nh4NO3(), depth= 10 (mm)
            1-jul-1999  fertiliser apply amount= 37.8  (kg/ha), type= Nh4NO3(), depth= 10 (mm)
            1-nov-1999  fertiliser apply amount= 37.8  (kg/ha), type= Nh4NO3(), depth= 10 (mm)
            1-mar-2000  fertiliser apply amount= 42.5  (kg/ha), type= Nh4NO3(), depth= 10 (mm)
            1-jul-2000  fertiliser apply amount= 47.3  (kg/ha), type= Nh4NO3(), depth= 10 (mm)
            1-nov-2000  fertiliser apply amount= 47.3  (kg/ha), type= Nh4NO3(), depth= 10 (mm)
            1-mar-2001  fertiliser apply amount= 113 (kg/ha), type= urea_N (), depth= 10 (mm)
            1-mar-2002  fertiliser apply amount= 113 (kg/ha), type= urea_N (), depth= 10 (mm)
            1-mar-2003  fertiliser apply amount= 113 (kg/ha), type= urea_N (), depth= 10 (mm)
            1-mar-2004  fertiliser apply amount= 113 (kg/ha), type= urea_N (), depth= 10 (mm)
            1-mar-2005  fertiliser apply amount= 113 (kg/ha), type= urea_N (), depth= 10 (mm)
            1-mar-2006  fertiliser apply amount= 113 (kg/ha), type= urea_N (), depth= 10 (mm)
            1-mar-2007  fertiliser apply amount= 113 (kg/ha), type= urea_N (), depth= 10 (mm)
            1-mar-2008  fertiliser apply amount= 113 (kg/ha), type= urea_N (), depth= 10 (mm)
            1-mar-2009  fertiliser apply amount= 113 (kg/ha), type= urea_N (), depth= 10 (mm)
            1-mar-2010  fertiliser apply amount= 113 (kg/ha), type= urea_N (), depth= 10 (mm)
        outputfile AnnualOutput -> /simulations/Expt324/Expt324N0/paddock/AnnualOutput: filename=Expt324N2 AnnualOutput.out; title=Expt324N2 AnnualOutput
          variables -> /simulations/Expt324/Expt324N0/paddock/AnnualOutput/Variables
          events Reporting Frequency -> /simulations/Expt324/Expt324N0/paddock/AnnualOutput/Reporting Frequency
        outputfile MonthlyOutput -> /simulations/Expt324/Expt324N0/paddock/MonthlyOutput: filename=Expt324N2 MonthlyOutput.out; title=Expt324N2 MonthlyOutput
          variables -> /simulations/Expt324/Expt324N0/paddock/MonthlyOutput/Variables
          events Reporting Frequency -> /simulations/Expt324/Expt324N0/paddock/MonthlyOutput/Reporting Frequency
    simulation Expt324N3 -> /simulations/Expt324/Expt324N0
      area paddock -> /simulations/Expt324/Expt324N0/paddock
        folder Manager folder -> /simulations/Expt324/Expt324N0/paddock/Manager folder
          operations
            1-apr-1996  fertiliser apply amount= 1.9 (kg/ha), type= Nh4NO3(), depth= 10 (mm)
            1-jun-1996  fertiliser apply amount= 3.8 (kg/ha), type= Nh4NO3(), depth= 10 (mm)
            1-sep-1996  fertiliser apply amount= 3.8 (kg/ha), type= Nh4NO3(), depth= 10 (mm)
            1-dec-1996  fertiliser apply amount= 3.8 (kg/ha), type= Nh4NO3(), depth= 10 (mm)
            1-mar-1996  fertiliser apply amount= 5.7 (kg/ha), type= Nh4NO3(), depth= 10 (mm)
            1-jul-1997  fertiliser apply amount= 11.8  (kg/ha), type= Nh4NO3(), depth= 10 (mm)
            1-nov-1997  fertiliser apply amount= 11.8  (kg/ha), type= Nh4NO3(), depth= 10 (mm)
            1-mar-1998  fertiliser apply amount= 16.5  (kg/ha), type= Nh4NO3(), depth= 10 (mm)
            1-jul-1998  fertiliser apply amount= 23.6  (kg/ha), type= Nh4NO3(), depth= 10 (mm)
            1-nov-1998  fertiliser apply amount= 23.6  (kg/ha), type= Nh4NO3(), depth= 10 (mm)
            1-mar-1999  fertiliser apply amount= 33.1  (kg/ha), type= Nh4NO3(), depth= 10 (mm)
            1-jul-1999  fertiliser apply amount= 37.8  (kg/ha), type= Nh4NO3(), depth= 10 (mm)
            1-nov-1999  fertiliser apply amount= 37.8  (kg/ha), type= Nh4NO3(), depth= 10 (mm)
            1-mar-2000  fertiliser apply amount= 42.5  (kg/ha), type= Nh4NO3(), depth= 10 (mm)
            1-jul-2000  fertiliser apply amount= 47.3  (kg/ha), type= Nh4NO3(), depth= 10 (mm)
            1-nov-2000  fertiliser apply amount= 47.3  (kg/ha), type= Nh4NO3(), depth= 10 (mm)
            1-mar-2001  fertiliser apply amount= 227 (kg/ha), type= urea_N (), depth= 10 (mm)
            1-mar-2002  fertiliser apply amount= 227 (kg/ha), type= urea_N (), depth= 10 (mm)
            1-mar-2003  fertiliser apply amount= 227 (kg/ha), type= urea_N (), depth= 10 (mm)
            1-mar-2004  fertiliser apply amount= 227 (kg/ha), type= urea_N (), depth= 10 (mm)
            1-mar-2005  fertiliser apply amount= 227 (kg/ha), type= urea_N (), depth= 10 (mm)
            1-mar-2006  fertiliser apply amount= 227 (kg/ha), type= urea_N (), depth= 10 (mm)
            1-mar-2007  fertiliser apply amount= 227 (kg/ha), type= urea_N (), depth= 10 (mm)
            1-mar-2008  fertiliser apply amount= 227 (kg/ha), type= urea_N (), depth= 10 (mm)
            1-mar-2009  fertiliser apply amount= 227 (kg/ha), type= urea_N (), depth= 10 (mm)
            1-mar-2010  fertiliser apply amount= 227 (kg/ha), type= urea_N (), depth= 10 (mm)
        outputfile AnnualOutput -> /simulations/Expt324/Expt324N0/paddock/AnnualOutput: filename=Expt324N3 AnnualOutput.out; title=Expt324N3 AnnualOutput
          variables -> /simulations/Expt324/Expt324N0/paddock/AnnualOutput/Variables
          events Reporting Frequency -> /simulations/Expt324/Expt324N0/paddock/AnnualOutput/Reporting Frequency
        outputfile MonthlyOutput -> /simulations/Expt324/Expt324N0/paddock/MonthlyOutput: filename=Expt324N3 MonthlyOutput.out; title=Expt324N3 MonthlyOutput
          variables -> /simulations/Expt324/Expt324N0/paddock/MonthlyOutput/Variables
          events Reporting Frequency -> /simulations/Expt324/Expt324N0/paddock/MonthlyOutput/Reporting Frequency
  folder Expt504
    simulation Expt504N0
      metfile met: filename=%apsim%\Tests\Validation\OilPalm\Sagarai.met
      clock
        start_date = 01/03/1991  # Enter the start date of the simulation
        end_date = 31/12/2008  # Enter the end date of the simulation
      summaryfile
      area paddock
        OilPalm: UnderstoryCoverGreen=0.4; UnderstoryLegumeFraction=1.0
        fertiliser
        surfaceom surface organic matter
          PoolName = OilPalm OilPalmStem  # Organic Matter pool name
          type = oilpalm oilpalmstem  # Organic Matter type
          mass = 24000 63000  # Initial surface residue (kg/ha)
          cnr = 39 145  # C:N ratio of initial residue
          standing_fraction = 0  # Fraction of residue standing
        folder Manager folder
          operations
            1-mar-1991  fertiliser apply amount= 42 (kg/ha), type= urea_N (), depth= 10 (mm)
            1-sep-1991  fertiliser apply amount= 42 (kg/ha), type= urea_N (), depth= 10 (mm)
            1-mar-1992  fertiliser apply amount= 42 (kg/ha), type= urea_N (), depth= 10 (mm)
            1-sep-1992  fertiliser apply amount= 42 (kg/ha), type= urea_N (), depth= 10 (mm)
            1-mar-1993  fertiliser apply amount= 42 (kg/ha), type= urea_N (), depth= 10 (mm)
            1-sep-1993  fertiliser apply amount= 42 (kg/ha), type= urea_N (), depth= 10 (mm)
          irrigation: same as Expt324.Expt324N0.paddock.Manager folder.Irrigation
          manager Palm Management
            sowing_date = 01/03/1991
            population = 127  # Plant Population (/ha)
            cultivar = Dami
            sowing_depth = 200  # Sowing depth (mm)
            on start_of_day:
```
ppsm = [population]/10000

if today = date('[sowing_date]') then
    OilPalm sow population = ppsm, depth = [sowing_depth], cultivar = [cultivar], maxcover = 1.0, budnumber = 1, row_spacing = [row_width], crop_class = plant  
endif
```
            on Init:
```
Plant_population = 0
```
          manager Calculations
            on init:
```
Offset = 0
CumFronds = 0
CumBunches = 0
BunchOffset = 0
CumYield = 0
YieldOffset = 0
```
            on end_of_day:
```
If oilpalm.plant_status = 'alive' then
if today < date('01/04/2001') then
   Offset = OilPalm.CumulativeFrondNumber
endif
CumFronds = OilPalm.CumulativeFrondNumber - Offset

if today < date('01/01/1996') then
   BunchOffset = OilPalm.CumulativeBunchNumber
   YieldOffset = OilPalm.CumulativeYield
endif
CumBunches = OilPalm.CumulativeBunchNumber - BunchOffset
CumYield = OilPalm.CumulativeYield - YieldOffset
endif
```
        Soil: SoilType=Alluvial Clay; Site=Sagarai Estate; NearestTown=Alotau; Region=Milne Bay Province; Country=Papua New Guinea; Latitude=-10.37; Longitude=149.91
          DataSource=Soil BD (measured), LL15 (15 Bar pressure plate), DUL(0.1 Bar pressure plate), SAT (0Bar Pressure Plate) from P. Nelson. Soil OC data from K Balance Trial Measurements (Trial 504) ACIAR project SMCN/2000/046.
          Water
            Thickness  BD    AirDry  LL15  DUL   SAT
            100        0.89  0.13    0.43  0.63  0.66
            200        0.99  0.13    0.43  0.58  0.62
            300        0.99  0.13    0.42  0.58  0.62
            300        1.13  0.13    0.44  0.54  0.57
            300        1.13  0.13    0.44  0.54  0.57
            300        1.13  0.13    0.44  0.54  0.57
            500        1.13  0.13    0.44  0.54  0.57
            500        1.13  0.13    0.44  0.54  0.57
            500        1.13  0.13    0.44  0.54  0.57
            SoilCrop OilPalm: LL=[0.43, 0.43, 0.42, 0.44, 0.44, 0.44, 0.44, 0.44, 0.44]; KL=[0.03, 0.02, 0.015, 0.01, 0.01, 0.01, 0.01, 0.01, 0.01]; XF=[1, 1, 1, 1, 1, 1, 1, 1, 0]
          SoilWater: SummerCona=5; SummerU=5; SummerDate=1-Nov; WinterCona=5; WinterU=5; WinterDate=1-Apr; DiffusConst=40; DiffusSlope=16; Salb=0.18; CN2Bare=75; CNRed=20; CNCov=0.8; Slope=0; DischargeWidth=0; CatchmentArea=0; MaxPond=0; Thickness=[100, 200, 300, 300, 300, 3800]; SWCON=[0.55, 0.55, 0.55, 0.55, 0.55, 0.55]
          SoilOrganicMatter: RootCN=30; RootWt=3000; SoilCN=12; EnrACoeff=7.4; EnrBCoeff=0.2; OCUnits=Total
            Thickness  OC         FBiom  FInert
            200        4.12501    0.08   0.32
            200        2.94865    0.06   0.44
            200        1.43929    0.04   0.9
            200        0.999028   0.02   0.99
            200        0.835933   0.02   0.99
            200        0.900267   0.02   0.99
            200        0.738828   0.02   0.99
            200        0.7157782  0.02   0.99
            200        0.5792     0.02   0.99
            200        0.484944   0.02   0.99
            1000       0.485      0.02   0.99
          Analysis: PHUnits=Water; BoronUnits=HotWater
            Thickness  EC       PH       CEC      Ca       Mg          Na        K          ParticleSizeSand  ParticleSizeSilt  ParticleSizeClay
            200        171.876  6.61912  38.8338  30.4647  8.62375     0.261272  0.680812   16                47                37
            200        111.072  6.905    36.4586  29.5812  12.9887     0.158367  0.279408   -                 -                 -
            200        100.307  6.05353  35.339   31.2967  16.5086     0.215476  0.123019   -                 -                 -
            200        89.303   6.75754  22.3253  28.8014  17.7929     0.236152  0.104194   -                 -                 -
            200        136.3    6.37397  35.3357  29.7943  13.2667     0.220637  0.320391   -                 -                 -
            200        88.97    6.90088  29.1795  27.3182  17.9155     0.270692  0.0974073  -                 -                 -
            200        92.67    6.90139  35.7761  26.9269  16.8775134  0.300086  0.0938429  -                 -                 -
            200        93.488   6.87045  30.3681  25.8112  16.6432     0.33234   0.095525   -                 -                 -
            200        92.41    7.00166  26.1431  24.775   16.8619     0.373658  0.0982817  -                 -                 -
            200        125.932  7.08576  24.5346  25.0272  15.0965     0.412499  0.0859294  -                 -                 -
            1000       125.932  7.08576  24.5346  25.0272  15.0965     0.412499  0.0859294  -                 -                 -
          InitialWater Initial water: FractionFull=1; PercentMethod=EvenlyDistributed
          Sample Initial nitrogen: NO3Units=kgha; NH4Units=ppm; SWUnits=Volumetric; OCUnits=Total
            Thickness  NO3  NH4
            100        217  0
            200        30   0
            300        5    0
            300        5    0
            300        0    0
            300        0    0
        outputfile AnnualOutput: filename=Expt504N0 AnnualOutput.out; title=Expt504N0 AnnualOutput
          variables
            variables: year, dd/mm/yyyy as Date, OilPalm.Age, AnnualYield, CumulativeFrondNumber, AnnualBunches, Annualrain, AnnualEo, AnnualNPP, AnnualDnit, AnnualFertiliser
          events Reporting Frequency: event=end_year
        outputfile MonthlyOutput: filename=Expt504N0 MonthlyOutput.out; title=Expt504N0 MonthlyOutput
          variables
            variables: year, dd/mm/yyyy as Date, Age, Month, MonthlyPalmBunches, MonthlyPalmYield, MonthlyPalmBunchSize, LAI, Stemmass, oc(1-3), carbon_tot(), nit_tot()
          events Reporting Frequency: event=end_month
        tracker
          variable:
            sum of HarvestYield on harvesting from AnnualOutput.reported to now as AnnualYield
            sum of HarvestBunches on harvesting from AnnualOutput.reported to now as AnnualBunches
            sum of rain on post from AnnualOutput.reported to now as AnnualRain
            sum of eo on post from AnnualOutput.reported to now as AnnualEo
            sum of dltDM on post from AnnualOutput.reported to now as AnnualNPP
            sum of dnit() on post from AnnualOutput.reported to now as AnnualDnit
            sum of fertiliser on post from AnnualOutput.reported to now as AnnualFertiliser
    simulation Expt504N1 -> /simulations/Expt504/Expt504N0
      area paddock -> /simulations/Expt504/Expt504N0/paddock
        folder Manager folder -> /simulations/Expt504/Expt504N0/paddock/Manager folder
          operations
            1-feb  fertiliser apply amount= 17.8  (kg/ha), type= nh4_N (), depth= 10 (mm)
            1-jun  fertiliser apply amount= 17.8  (kg/ha), type= nh4_N (), depth= 10 (mm)
            1-oct  fertiliser apply amount= 17.8  (kg/ha), type= nh4_N (), depth= 10 (mm)
        outputfile AnnualOutput -> /simulations/Expt504/Expt504N0/paddock/AnnualOutput: filename=Expt504N1 AnnualOutput.out; title=Expt504N1 AnnualOutput
          variables -> /simulations/Expt504/Expt504N0/paddock/AnnualOutput/Variables
          events Reporting Frequency -> /simulations/Expt504/Expt504N0/paddock/AnnualOutput/Reporting Frequency
        outputfile MonthlyOutput -> /simulations/Expt504/Expt504N0/paddock/MonthlyOutput: filename=Expt504N1 MonthlyOutput.out; title=Expt504N1 MonthlyOutput
          variables -> /simulations/Expt504/Expt504N0/paddock/MonthlyOutput/Variables
          events Reporting Frequency -> /simulations/Expt504/Expt504N0/paddock/MonthlyOutput/Reporting Frequency
    simulation Expt504N2 -> /simulations/Expt504/Expt504N0
      area paddock -> /simulations/Expt504/Expt504N0/paddock
        folder Manager folder -> /simulations/Expt504/Expt504N0/paddock/Manager folder
          operations
            1-feb  fertiliser apply amount= 35.6 (kg/ha), type= nh4_N (), depth= 10 (mm)
            1-jun  fertiliser apply amount= 35.6 (kg/ha), type= nh4_N (), depth= 10 (mm)
            1-oct  fertiliser apply amount= 35.6 (kg/ha), type= nh4_N (), depth= 10 (mm)
        outputfile AnnualOutput -> /simulations/Expt504/Expt504N0/paddock/AnnualOutput: filename=Expt504N2 AnnualOutput.out; title=Expt504N2 AnnualOutput
          variables -> /simulations/Expt504/Expt504N0/paddock/AnnualOutput/Variables
          events Reporting Frequency -> /simulations/Expt504/Expt504N0/paddock/AnnualOutput/Reporting Frequency
        outputfile MonthlyOutput -> /simulations/Expt504/Expt504N0/paddock/MonthlyOutput: filename=Expt504N2 MonthlyOutput.out; title=Expt504N2 MonthlyOutput
          variables -> /simulations/Expt504/Expt504N0/paddock/MonthlyOutput/Variables
          events Reporting Frequency -> /simulations/Expt504/Expt504N0/paddock/MonthlyOutput/Reporting Frequency
    simulation Expt504N3 -> /simulations/Expt504/Expt504N0
      area paddock -> /simulations/Expt504/Expt504N0/paddock
        folder Manager folder -> /simulations/Expt504/Expt504N0/paddock/Manager folder
          operations
            1-feb  fertiliser apply amount= 53.3 (kg/ha), type= nh4_N (), depth= 10 (mm)
            1-jun  fertiliser apply amount= 53.3 (kg/ha), type= nh4_N (), depth= 10 (mm)
            1-oct  fertiliser apply amount= 53.3 (kg/ha), type= nh4_N (), depth= 10 (mm)
        outputfile AnnualOutput -> /simulations/Expt504/Expt504N0/paddock/AnnualOutput: filename=Expt504N3 AnnualOutput.out; title=Expt504N3 AnnualOutput
          variables -> /simulations/Expt504/Expt504N0/paddock/AnnualOutput/Variables
          events Reporting Frequency -> /simulations/Expt504/Expt504N0/paddock/AnnualOutput/Reporting Frequency
        outputfile MonthlyOutput -> /simulations/Expt504/Expt504N0/paddock/MonthlyOutput: filename=Expt504N3 MonthlyOutput.out; title=Expt504N3 MonthlyOutput
          variables -> /simulations/Expt504/Expt504N0/paddock/MonthlyOutput/Variables
          events Reporting Frequency -> /simulations/Expt504/Expt504N0/paddock/MonthlyOutput/Reporting Frequency
  folder Expt212
    simulation Expt212N0
      metfile met: filename=%apsim%\Tests\Validation\OilPalm\Hargy.met
      clock
        start_date = 01/02/1996  # Enter the start date of the simulation
        end_date = 31/12/2009  # Enter the end date of the simulation
      summaryfile
      area paddock
        OilPalm: UnderstoryCoverGreen=0.4; UnderstoryLegumeFraction=1.0
        fertiliser
        surfaceom surface organic matter
          PoolName = OilPalm OilPalmStem  # Organic Matter pool name
          type = Oilpalm oilpalmstem  # Organic Matter type
          mass = 24000 63000  # Initial surface residue (kg/ha)
          cnr = 39 145  # C:N ratio of initial residue
          standing_fraction = 0 0  # Fraction of residue standing
        folder Manager folder
          operations
            1-apr-1998  fertiliser apply amount= 36.7 (kg/ha), type= urea_N (), depth= 10 (mm)
            1-jun-1998  fertiliser apply amount= 36.7 (kg/ha), type= urea_N (), depth= 10 (mm)
            1-aug-1998  fertiliser apply amount= 36.7 (kg/ha), type= urea_N (), depth= 10 (mm)
            1-apr-1999  fertiliser apply amount= 36.7 (kg/ha), type= urea_N (), depth= 10 (mm)
            1-jun-1999  fertiliser apply amount= 36.7 (kg/ha), type= urea_N (), depth= 10 (mm)
            1-aug-1999  fertiliser apply amount= 36.7 (kg/ha), type= urea_N (), depth= 10 (mm)
            1-apr-2000  fertiliser apply amount= 36.7 (kg/ha), type= urea_N (), depth= 10 (mm)
            1-jun-2000  fertiliser apply amount= 36.7 (kg/ha), type= urea_N (), depth= 10 (mm)
            1-aug-2000  fertiliser apply amount= 36.7 (kg/ha), type= urea_N (), depth= 10 (mm)
            1-apr-2001  fertiliser apply amount= 36.7 (kg/ha), type= urea_N (), depth= 10 (mm)
            1-jun-2001  fertiliser apply amount= 36.7 (kg/ha), type= urea_N (), depth= 10 (mm)
            1-aug-2001  fertiliser apply amount= 36.7 (kg/ha), type= urea_N (), depth= 10 (mm)
          irrigation: same as Expt324.Expt324N0.paddock.Manager folder.Irrigation
          manager Palm Management
            sowing_date = 01/02/1996
            population = 140  # Plant Population (/ha)
            cultivar = Dami
            sowing_depth = 200  # Sowing depth (mm)
            on start_of_day:
            script: same as in Expt504.Expt504N0.paddock.Manager folder.Palm Management
            on Init:
```
Plant_population = 0
```
          manager Calculations
            on init:
```
Offset = 0
CumFronds = 0
CumBunches = 0
BunchOffset = 0
CumYield = 0
YieldOffset = 0
```
            on end_of_day:
```
If oilpalm.plant_status = 'alive' then
if today < date('01/11/2004') then
   Offset = OilPalm.CumulativeFrondNumber
endif
CumFronds = OilPalm.CumulativeFrondNumber - Offset

if today < date('01/04/2002') then
   BunchOffset = OilPalm.CumulativeBunchNumber
   YieldOffset = OilPalm.CumulativeYield
endif
CumBunches = OilPalm.CumulativeBunchNumber - BunchOffset
CumYield = OilPalm.CumulativeYield - YieldOffset
endif
```
        Soil: SoilType=Volcanic Ash; Site=Hargy Estate; NearestTown=Bialla; Region=West New Britain Province; Country=Papua New Guinea; Latitude=-5.305; Longitude=151.08
          DataSource=Soil BD (measured), LL15 (15 Bar pressure plate), DUL(0.1 Bar pressure plate), SAT (0Bar Pressure Plate) from P. Nelson. Soil OC from Gillman and Gillman (2001) Magnesium Deficiency Project.  Inert C estimated assuming C is dominated by amorphous iron oxieds and allophane at depth and these contents lower in surface soil (P. Nelson  - Mineralogy data from ACIAR Project SMCN/2000/046).
          Water
            Thickness  BD    AirDry  LL15  DUL   SAT
            100        0.7   0.05    0.3   0.54  0.68
            200        0.75  0.05    0.4   0.61  0.68
            300        1.2   0.05    0.23  0.43  0.51
            300        1.2   0.05    0.23  0.43  0.51
            300        1.2   0.05    0.23  0.43  0.51
            800        1.2   0.05    0.23  0.43  0.51
            500        1.2   0.05    0.23  0.43  0.51
            500        1.2   0.05    0.23  0.43  0.51
            500        1.2   0.05    0.23  0.43  0.51
            500        1.2   0.05    0.23  0.43  0.51
            SoilCrop OilPalm
              LL=[0.3, 0.4, 0.23, 0.23, 0.23, 0.23, 0.23, 0.23, 0.23, 0.23]
              KL=[0.04, 0.04, 0.02, 0.02, 0.01, 0.01, 0.01, 0.01, 0.01, 0.01]
              XF=[1, 1, 1, 1, 1, 1, 1, 1, 1, 1]
          SoilWater: SummerCona=5; SummerU=5; SummerDate=1-Nov; WinterCona=5; WinterU=5; WinterDate=1-Apr; DiffusConst=88; DiffusSlope=35.4; Salb=0.18; CN2Bare=68; CNRed=20; CNCov=0.8; Slope=0; DischargeWidth=0; CatchmentArea=0; MaxPond=0; Thickness=[100, 200, 300, 300, 300, 300]; SWCON=[0.8, 0.8, 0.8, 0.8, 0.8, 0.8]
          SoilOrganicMatter: RootCN=30; RootWt=3000; SoilCN=10; EnrACoeff=7.4; EnrBCoeff=0.2; OCUnits=Total
            Thickness  OC   FBiom  FInert
            200        5.3  0.08   0.4
            200        3    0.03   0.75
            400        2.4  0.015  0.95
            3200       2.2  0.01   0.99
          Analysis: Thickness=[100, 100, 100, 300, 300, 600]; PH=[6.3, 6.4, 6.7, 6.8, 6.8, 6.8]; PHUnits=Water; BoronUnits=HotWater
          InitialWater Initial water: FractionFull=1; PercentMethod=EvenlyDistributed
          Sample Initial nitrogen: NO3Units=kgha; NH4Units=ppm; SWUnits=Volumetric; OCUnits=Total; PHUnits=Water
            Thickness  NO3  NH4
            100        217  0
            200        30   0
            300        5    0
            300        5    0
            300        0    0
            300        0    0
        outputfile AnnualOutput: filename=Expt212N0 AnnualOutput.out; title=Expt212N0 AnnualOutput
          variables
            variables: year, dd/mm/yyyy as Date, OilPalm.Age, AnnualYield, CumulativeFrondNumber, AnnualBunches, AnnualRain, AnnualEo, AnnualNPP, AnnualDnit, AnnualFertiliser
          events Reporting Frequency: event=end_year
        outputfile MonthlyOutput: filename=Expt212N0 MonthlyOutput.out; title=Expt212N0 MonthlyOutput
          variables
            variables: year, dd/mm/yyyy as Date, Age, Month, MonthlyPalmBunches, MonthlyPalmYield, MonthlyPalmBunchSize, LAI, Stemmass, oc(1-3), carbon_tot(), nit_tot()
          events Reporting Frequency: event=end_month
        tracker: same as Expt504.Expt504N0.paddock.tracker
    simulation Expt212N1 -> /simulations/Expt212/Expt212N0
      area paddock -> /simulations/Expt212/Expt212N0/paddock
        folder Manager folder -> /simulations/Expt212/Expt212N0/paddock/Manager folder
          operations
            1-apr-1998  fertiliser apply amount= 36.7 (kg/ha), type= urea_N (), depth= 10 (mm)
            1-jun-1998  fertiliser apply amount= 36.7 (kg/ha), type= urea_N (), depth= 10 (mm)
            1-aug-1998  fertiliser apply amount= 36.7 (kg/ha), type= urea_N (), depth= 10 (mm)
            1-apr-1999  fertiliser apply amount= 36.7 (kg/ha), type= urea_N (), depth= 10 (mm)
            1-jun-1999  fertiliser apply amount= 36.7 (kg/ha), type= urea_N (), depth= 10 (mm)
            1-aug-1999  fertiliser apply amount= 36.7 (kg/ha), type= urea_N (), depth= 10 (mm)
            1-apr-2000  fertiliser apply amount= 36.7 (kg/ha), type= urea_N (), depth= 10 (mm)
            1-jun-2000  fertiliser apply amount= 36.7 (kg/ha), type= urea_N (), depth= 10 (mm)
            1-aug-2000  fertiliser apply amount= 36.7 (kg/ha), type= urea_N (), depth= 10 (mm)
            1-apr-2001  fertiliser apply amount= 36.7 (kg/ha), type= urea_N (), depth= 10 (mm)
            1-jun-2001  fertiliser apply amount= 36.7 (kg/ha), type= urea_N (), depth= 10 (mm)
            1-aug-2001  fertiliser apply amount= 36.7 (kg/ha), type= urea_N (), depth= 10 (mm)
            1-jun-2002  fertiliser apply amount= 70 (kg/ha), type= NH4NO3 (), depth= 10 (mm)
            1-dec-2002  fertiliser apply amount= 70 (kg/ha), type= NH4NO3 (), depth= 10 (mm)
            1-jun-2003  fertiliser apply amount= 70 (kg/ha), type= NH4NO3 (), depth= 10 (mm)
            1-dec-2003  fertiliser apply amount= 70 (kg/ha), type= NH4NO3 (), depth= 10 (mm)
            1-jun-2004  fertiliser apply amount= 70 (kg/ha), type= NH4NO3 (), depth= 10 (mm)
            1-dec-2004  fertiliser apply amount= 70 (kg/ha), type= NH4NO3 (), depth= 10 (mm)
            1-jun-2005  fertiliser apply amount= 70 (kg/ha), type= NH4NO3 (), depth= 10 (mm)
            1-dec-2005  fertiliser apply amount= 70 (kg/ha), type= NH4NO3 (), depth= 10 (mm)
            1-jun-2006  fertiliser apply amount= 70 (kg/ha), type= NH4NO3 (), depth= 10 (mm)
            1-dec-2006  fertiliser apply amount= 70 (kg/ha), type= NH4NO3 (), depth= 10 (mm)
            1-jun-2007  fertiliser apply amount= 70 (kg/ha), type= NH4NO3 (), depth= 10 (mm)
            1-dec-2007  fertiliser apply amount= 70 (kg/ha), type= NH4NO3 (), depth= 10 (mm)
            1-jun-2008  fertiliser apply amount= 70 (kg/ha), type= NH4NO3 (), depth= 10 (mm)
            1-dec-2008  fertiliser apply amount= 70 (kg/ha), type= NH4NO3 (), depth= 10 (mm)
            1-jun-2009  fertiliser apply amount= 70 (kg/ha), type= NH4NO3 (), depth= 10 (mm)
            1-dec-2009  fertiliser apply amount= 70 (kg/ha), type= NH4NO3 (), depth= 10 (mm)
        outputfile AnnualOutput -> /simulations/Expt212/Expt212N0/paddock/AnnualOutput: filename=Expt212N1 AnnualOutput.out; title=Expt212N1 AnnualOutput
          variables -> /simulations/Expt212/Expt212N0/paddock/AnnualOutput/Variables
          events Reporting Frequency -> /simulations/Expt212/Expt212N0/paddock/AnnualOutput/Reporting Frequency
        outputfile MonthlyOutput -> /simulations/Expt212/Expt212N0/paddock/MonthlyOutput: filename=Expt212N1 MonthlyOutput.out; title=Expt212N1 MonthlyOutput
          variables -> /simulations/Expt212/Expt212N0/paddock/MonthlyOutput/Variables
          events Reporting Frequency -> /simulations/Expt212/Expt212N0/paddock/MonthlyOutput/Reporting Frequency
    simulation Expt212N2 -> /simulations/Expt212/Expt212N0
      area paddock -> /simulations/Expt212/Expt212N0/paddock
        folder Manager folder -> /simulations/Expt212/Expt212N0/paddock/Manager folder
          operations
            1-apr-1998  fertiliser apply amount= 36.7 (kg/ha), type= urea_N (), depth= 10 (mm)
            1-jun-1998  fertiliser apply amount= 36.7 (kg/ha), type= urea_N (), depth= 10 (mm)
            1-aug-1998  fertiliser apply amount= 36.7 (kg/ha), type= urea_N (), depth= 10 (mm)
            1-apr-1999  fertiliser apply amount= 36.7 (kg/ha), type= urea_N (), depth= 10 (mm)
            1-jun-1999  fertiliser apply amount= 36.7 (kg/ha), type= urea_N (), depth= 10 (mm)
            1-aug-1999  fertiliser apply amount= 36.7 (kg/ha), type= urea_N (), depth= 10 (mm)
            1-apr-2000  fertiliser apply amount= 36.7 (kg/ha), type= urea_N (), depth= 10 (mm)
            1-jun-2000  fertiliser apply amount= 36.7 (kg/ha), type= urea_N (), depth= 10 (mm)
            1-aug-2000  fertiliser apply amount= 36.7 (kg/ha), type= urea_N (), depth= 10 (mm)
            1-apr-2001  fertiliser apply amount= 36.7 (kg/ha), type= urea_N (), depth= 10 (mm)
            1-jun-2001  fertiliser apply amount= 36.7 (kg/ha), type= urea_N (), depth= 10 (mm)
            1-aug-2001  fertiliser apply amount= 36.7 (kg/ha), type= urea_N (), depth= 10 (mm)
            1-jun-2002  fertiliser apply amount= 140 (kg/ha), type= NH4NO3 (), depth= 10 (mm)
            1-dec-2002  fertiliser apply amount= 140 (kg/ha), type= NH4NO3 (), depth= 10 (mm)
            1-jun-2003  fertiliser apply amount= 140 (kg/ha), type= NH4NO3 (), depth= 10 (mm)
            1-dec-2003  fertiliser apply amount= 140 (kg/ha), type= NH4NO3 (), depth= 10 (mm)
            1-jun-2004  fertiliser apply amount= 140 (kg/ha), type= NH4NO3 (), depth= 10 (mm)
            1-dec-2004  fertiliser apply amount= 140 (kg/ha), type= NH4NO3 (), depth= 10 (mm)
            1-jun-2005  fertiliser apply amount= 140 (kg/ha), type= NH4NO3 (), depth= 10 (mm)
            1-dec-2005  fertiliser apply amount= 140 (kg/ha), type= NH4NO3 (), depth= 10 (mm)
            1-jun-2006  fertiliser apply amount= 140 (kg/ha), type= NH4NO3 (), depth= 10 (mm)
            1-dec-2006  fertiliser apply amount= 140 (kg/ha), type= NH4NO3 (), depth= 10 (mm)
            1-jun-2007  fertiliser apply amount= 140 (kg/ha), type= NH4NO3 (), depth= 10 (mm)
            1-dec-2007  fertiliser apply amount= 140 (kg/ha), type= NH4NO3 (), depth= 10 (mm)
            1-jun-2008  fertiliser apply amount= 140 (kg/ha), type= NH4NO3 (), depth= 10 (mm)
            1-dec-2008  fertiliser apply amount= 140 (kg/ha), type= NH4NO3 (), depth= 10 (mm)
            1-jun-2009  fertiliser apply amount= 140 (kg/ha), type= NH4NO3 (), depth= 10 (mm)
            1-dec-2009  fertiliser apply amount= 140 (kg/ha), type= NH4NO3 (), depth= 10 (mm)
        outputfile AnnualOutput -> /simulations/Expt212/Expt212N1/paddock/AnnualOutput: filename=Expt212N2 AnnualOutput.out; title=Expt212N2 AnnualOutput
          variables -> /simulations/Expt212/Expt212N1/paddock/AnnualOutput/Variables
          events Reporting Frequency -> /simulations/Expt212/Expt212N1/paddock/AnnualOutput/Reporting Frequency
        outputfile MonthlyOutput -> /simulations/Expt212/Expt212N1/paddock/MonthlyOutput: filename=Expt212N2 MonthlyOutput.out; title=Expt212N2 MonthlyOutput
          variables -> /simulations/Expt212/Expt212N1/paddock/MonthlyOutput/Variables
          events Reporting Frequency -> /simulations/Expt212/Expt212N1/paddock/MonthlyOutput/Reporting Frequency
  folder Expt601 (disabled)
    simulation Expt601N0
      metfile met: filename=%apsim%\Tests\Validation\OilPalm\Ramu.met
      clock
        start_date = 01/01/2003  # Enter the start date of the simulation
        end_date = 09/07/2007  # Enter the end date of the simulation
      summaryfile
      area paddock
        OilPalm: UnderstoryCoverGreen=0.4; UnderstoryLegumeFraction=1.0
        fertiliser
        surfaceom surface organic matter
          PoolName = wheat  # Organic Matter pool name
          type = wheat  # Organic Matter type
          mass = 2000  # Initial surface residue (kg/ha)
          cnr = 80  # C:N ratio of initial residue
          standing_fraction = 0  # Fraction of residue standing
        folder Manager folder
          operations
            1-jan  fertiliser apply amount= 0 (kg/ha), type= urea_N (), depth= 10 (mm)
          irrigation: same as Expt324.Expt324N0.paddock.Manager folder.Irrigation
          manager Palm Management
            sowing_date = 01/03/2003
            population = 120  # Plant Population (/ha)
            cultivar = Dami
            sowing_depth = 200  # Sowing depth (mm)
            on start_of_day:
            script: same as in Expt504.Expt504N0.paddock.Manager folder.Palm Management
            on Init:
```
Plant_population = 0
```
          manager Calculations
            on init:
```
Offset = 0
CumFronds = 0
CumBunches = 0
BunchOffset = 0
CumYield = 0
YieldOffset = 0
```
            on end_of_day:
```
If oilpalm.plant_status = 'alive' then
if today < date('01/11/2001') then
   Offset = OilPalm.CumulativeFrondNumber
endif
CumFronds = OilPalm.CumulativeFrondNumber - Offset

if today < date('01/12/2000') then
   BunchOffset = OilPalm.CumulativeBunchNumber
   YieldOffset = OilPalm.CumulativeYield
endif
CumBunches = OilPalm.CumulativeBunchNumber - BunchOffset
CumYield = OilPalm.CumulativeYield - YieldOffset
endif
```
        Soil: Latitude=0; Longitude=0
          Water
            Thickness  BD    AirDry  LL15  DUL   SAT
            100        1.01  0.13    0.25  0.52  0.59
            200        1.05  0.2     0.25  0.5   0.57
            300        1.1   0.28    0.28  0.48  0.54
            300        1.1   0.28    0.28  0.48  0.54
            300        1.1   0.28    0.28  0.48  0.54
            800        1.1   0.28    0.28  0.48  0.54
            SoilCrop OilPalm: LL=[0.15, 0.15, 0.15, 0.15, 0.15, 0.15]; KL=[0.1, 0.06, 0.05, 0.04, 0.03, 0.03]; XF=[1, 1, 1, 1, 1, 1]
          SoilWater: SummerCona=5; SummerU=5; SummerDate=1-Nov; WinterCona=5; WinterU=5; WinterDate=1-Apr; DiffusConst=40; DiffusSlope=16; Salb=0.12; CN2Bare=78; CNRed=20; CNCov=0.8; Slope=0; DischargeWidth=0; CatchmentArea=0; MaxPond=0; Thickness=[100, 200, 300, 300, 300, 300]; SWCON=[0.3, 0.3, 0.3, 0.3, 0.3, 0.3]
          SoilOrganicMatter: RootCN=30; RootWt=3000; SoilCN=6.3; EnrACoeff=7.4; EnrBCoeff=0.2; OCUnits=Total
            Thickness  OC    FBiom  FInert
            100        1.76  0.025  0.1
            100        0.72  0.025  0.4
            100        0.44  0.015  0.9
            300        0.44  0.01   0.9
            300        0.44  0.01   0.96
            600        0.44  0.01   0.96
          Analysis: Thickness=[100, 100, 100, 300, 300, 600]; PH=[6.3, 6.4, 6.7, 6.8, 6.8, 6.8]; PHUnits=Water; BoronUnits=HotWater
          InitialWater Initial water: FractionFull=1; PercentMethod=EvenlyDistributed
          Sample Initial nitrogen: NO3Units=kgha; NH4Units=ppm; SWUnits=Volumetric; OCUnits=Total
            Thickness  NO3  NH4
            100        217  0
            200        30   0
            300        5    0
            300        5    0
            300        0    0
            300        0    0
        outputfile: filename=Expt601N0.out; title=Expt601N0
          variables
            variables: dd/mm/yyyy as Date, Age, Plant_Status, StemMass, FrondMass, LAI, CumFronds, FrondNumber, CumulativeFrondNumber, StructureMainStemNodeNo, Interception, cover_green, PEP, EP, sw_dep(), PotSWUptake(), SWUptake(), FW, DltDM, RootDepth, CumulativeBunchNumber, CumBunches, CumulativeYield, CumYield, SLA, ReproductiveGrowthFraction, CarbonStress, RootMass, FrondNConc, RootNConc, StemNConc, BunchNConc, PlantN, FrondN, StemN, RootN, BunchN, surfaceom_wt, surfaceom_cover, oc(1)
          events Reporting Frequency: event=Daily
    simulation Expt601N1 -> /simulations/Expt601/Expt601N0
      area paddock -> /simulations/Expt601/Expt601N0/paddock
        folder Manager folder -> /simulations/Expt601/Expt601N0/paddock/Manager folder
          operations
            1-mar  fertiliser apply amount= 28 (kg/ha), type= urea_N (), depth= 10 (mm)
            1-jun  fertiliser apply amount= 28 (kg/ha), type= urea_N (), depth= 10 (mm)
            1-nov  fertiliser apply amount= 28 (kg/ha), type= urea_N (), depth= 10 (mm)
        outputfile -> /simulations/Expt601/Expt601N0/paddock/Outputfile: filename=Expt601N1.out; title=Expt601N1
          variables -> /simulations/Expt601/Expt601N0/paddock/Outputfile/Variables
          events Reporting Frequency -> /simulations/Expt601/Expt601N0/paddock/Outputfile/Reporting Frequency
    simulation Expt601N2 -> /simulations/Expt601/Expt601N0
      area paddock -> /simulations/Expt601/Expt601N0/paddock
        folder Manager folder -> /simulations/Expt601/Expt601N0/paddock/Manager folder
          operations
            1-mar  fertiliser apply amount= 55 (kg/ha), type= urea_N (), depth= 10 (mm)
            1-jun  fertiliser apply amount= 55 (kg/ha), type= urea_N (), depth= 10 (mm)
            1-nov  fertiliser apply amount= 55 (kg/ha), type= urea_N (), depth= 10 (mm)
        outputfile -> /simulations/Expt601/Expt601N0/paddock/Outputfile: filename=Expt601N2.out; title=Expt601N2
          variables -> /simulations/Expt601/Expt601N0/paddock/Outputfile/Variables
          events Reporting Frequency -> /simulations/Expt601/Expt601N0/paddock/Outputfile/Reporting Frequency
  folder Breure88 (disabled)
    simulation Breure88_110
      metfile met: filename=%apsim%\Tests\Validation\OilPalm\Hargy.met
      clock
        start_date = 01/02/1996  # Enter the start date of the simulation
        end_date = 31/12/2009  # Enter the end date of the simulation
      summaryfile
      area paddock
        OilPalm: UnderstoryCoverGreen=0.4; UnderstoryLegumeFraction=1.0
        fertiliser
        surfaceom surface organic matter
          PoolName = OilPalm  # Organic Matter pool name
          type = Oilpalm  # Organic Matter type
          mass = 24000  # Initial surface residue (kg/ha)
          cnr = 35  # C:N ratio of initial residue
          standing_fraction = 0  # Fraction of residue standing
        folder Manager folder
          operations
            1-apr  fertiliser apply amount= 36.7 (kg/ha), type= urea_N (), depth= 10 (mm)
            1-jun  fertiliser apply amount= 36.7 (kg/ha), type= urea_N (), depth= 10 (mm)
            1-aug  fertiliser apply amount= 36.7 (kg/ha), type= urea_N (), depth= 10 (mm)
          irrigation: same as Expt324.Expt324N0.paddock.Manager folder.Irrigation
          manager Palm Management
            sowing_date = 01/02/1996
            population = 110  # Plant Population (/ha)
            cultivar = Dami
            sowing_depth = 200  # Sowing depth (mm)
            on start_of_day:
            script: same as in Expt504.Expt504N0.paddock.Manager folder.Palm Management
            on Init:
```
Plant_population = 0
```
          manager Calculations: same as Expt212.Expt212N0.paddock.Manager folder.Calculations
        Soil: Latitude=0; Longitude=0
          Water
            Thickness  BD    AirDry  LL15  DUL   SAT
            100        0.7   0.05    0.3   0.54  0.62
            200        0.75  0.05    0.4   0.61  0.67
            300        1.2   0.05    0.23  0.43  0.52
            300        1.2   0.05    0.23  0.43  0.52
            300        1.2   0.05    0.23  0.43  0.52
            800        1.2   0.05    0.23  0.43  0.52
            500        1.2   0.05    0.23  0.43  0.52
            500        1.2   0.05    0.23  0.43  0.52
            500        1.2   0.05    0.23  0.43  0.52
            500        1.2   0.05    0.23  0.43  0.52
            SoilCrop OilPalm: LL=[0.3, 0.4, 0.23, 0.23, 0.23, 0.23, 0.23, 0.23, 0.23, 0.23]; KL=[0.1, 0.06, 0.05, 0.04, 0.03, 0.03, 0.03, 0.03, 0.03, 0.03]; XF=[1, 1, 1, 1, 1, 1, 1, 1, 1, 1]
          SoilWater: same as Expt212.Expt212N0.paddock.Soil.SoilWater
          SoilOrganicMatter: RootCN=30; RootWt=3000; SoilCN=10; EnrACoeff=7.4; EnrBCoeff=0.2; OCUnits=Total
            Thickness  OC    FBiom  FInert
            100        3.8   0.08   0.1
            100        3.4   0.03   0.15
            100        1.4   0.015  0.5
            300        0.35  0.01   0.8
            300        0.25  0.01   0.99
            4100       0.25  0.01   0.99
          Analysis: Thickness=[100, 100, 100, 300, 300, 600]; PH=[6.3, 6.4, 6.7, 6.8, 6.8, 6.8]; PHUnits=Water; BoronUnits=HotWater
          InitialWater Initial water: FractionFull=1; PercentMethod=EvenlyDistributed
          Sample Initial nitrogen: NO3Units=kgha; NH4Units=ppm; SWUnits=Volumetric; OCUnits=Total; PHUnits=Water
            Thickness  NO3  NH4
            100        217  0
            200        30   0
            300        5    0
            300        5    0
            300        0    0
            300        0    0
        outputfile: filename=Breure88_110.out; title=Breure88_110
          variables
            variable:
              dd/mm/yyyy as Date
              Age
              year
              Plant_Status
              StemMass
              FrondMass
              LAI
              CumFronds
              FrondNumber
              CumulativeFrondNumber
              StructureMainStemNodeNo
              Interception
              cover_green
              PEP
              EP
              sw_dep()
              PotSWUptake()
              SWUptake()
              FW
              Fn
              DltDM
              RootDepth
              CumulativeBunchNumber
              CumBunches
              CumulativeYield
              CumYield
              SLA
              ReproductiveGrowthFraction
              CarbonStress
              RootMass
              FrondNConc
              RootNConc
              StemNConc
              BunchNConc
              PlantN
              FrondN
              StemN
              RootN
              BunchN
              surfaceom_wt
              surfaceom_cover
              UnderstoryNFixation
              NO3()
              NH4()
              FrondArea
              RelativeDevelopmentalRateValue
              nit_tot()
              oc(1)
              oc(2)
              oc(3)
              biom_c(1)
              DiffuseLightFraction
          events Reporting Frequency: event=Daily
    simulation Breure88_148 -> /simulations/Breure88/Breure88_110
      area paddock -> /simulations/Breure88/Breure88_110/paddock
        folder Manager folder -> /simulations/Breure88/Breure88_110/paddock/Manager folder
          manager Palm Management
            sowing_date = 01/02/1996
            population = 148  # Plant Population (/ha)
            cultivar = Dami
            sowing_depth = 200  # Sowing depth (mm)
            on start_of_day:
            script: same as in Expt504.Expt504N0.paddock.Manager folder.Palm Management
            on Init:
```
Plant_population = 0
```
        outputfile -> /simulations/Breure88/Breure88_110/paddock/Outputfile: filename=Breure88_148.out; title=Breure88_148
          variables -> /simulations/Breure88/Breure88_110/paddock/Outputfile/Variables
          events Reporting Frequency -> /simulations/Breure88/Breure88_110/paddock/Outputfile/Reporting Frequency
    simulation Breure88_186 -> /simulations/Breure88/Breure88_110
      area paddock -> /simulations/Breure88/Breure88_110/paddock
        folder Manager folder -> /simulations/Breure88/Breure88_110/paddock/Manager folder
          manager Palm Management
            sowing_date = 01/02/1996
            population = 186  # Plant Population (/ha)
            cultivar = Dami
            sowing_depth = 200  # Sowing depth (mm)
            on start_of_day:
            script: same as in Expt504.Expt504N0.paddock.Manager folder.Palm Management
            on Init:
```
Plant_population = 0
```
        outputfile -> /simulations/Breure88/Breure88_110/paddock/Outputfile: filename=Breure88_186.out; title=Breure88_186
          variables -> /simulations/Breure88/Breure88_110/paddock/Outputfile/Variables
          events Reporting Frequency -> /simulations/Breure88/Breure88_110/paddock/Outputfile/Reporting Frequency
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