folder Simulations: version=32
  folder Shared
    clock: start_date=3/6/1990; end_date=17/10/1990
    summaryfile
    metfile met: filename=pat74-99.met
    area paddock
      outputfile: filename=.out
        variables
          variable:
            year
            day
            pigeonpea.stagename
            pigeonpea.plant_status
            pigeonpea.daysaftersowing
            pigeonpea.ttaftersowing
            pigeonpea.yield
            pigeonpea.biomass
            pigeonpea.plants
            pigeonpea.dlt_dm
            pigeonpea.rootgreenwt
            pigeonpea.leafgreenwt
            pigeonpea.stemgreenwt
            pigeonpea.podgreenwt
            pigeonpea.grain_wt
            pigeonpea.stage
            pigeonpea.height
            pigeonpea.lai
            pigeonpea.tlai
            pigeonpea.slai
            pigeonpea.node_no as node_no
            pigeonpea.LeafNumber as LeafNumber
            pigeonpea.leaf_no_dead
            pigeonpea.root_depth
            pigeonpea.oxdef_photo
            pigeonpea.swdef_photo
            pigeonpea.swdef_expan
            pigeonpea.nfact_photo
            pigeonpea.n_uptake
            pigeonpea.ep
            es
            sw_dep() as tot_sw
            runoff
            rain
            manager.anth_date
            manager.mat_date
            maxt
            mint
            radn
            pigeonpea.green_biomass
      fertiliser
      irrigation
        automatic_irrigation = off
        asw_depth = 600  # Depth to which ASW is calculated. (mm)
        crit_fr_asw = 0.5  # Fraction of ASW below which irrigation is applied (0-1.0)
        irrigation_efficiency = 1  # Efficiency of the irrigation. (0-1.0)
        irrigation_allocation = off  # Allocation limits
        allocation = 0  # Allocation in mm
        default_no3_conc = 0.0  # Nitrate concentration (ppm N)
        default_nh4_conc = 0.0  # Ammonium concentration (ppm N)
        default_cl_conc = 0.0  # Chloride concentration (ppm Cl)
      manager
        on init:
```
                 dateset = 0
                 emer_date = 0
                 endjuv_date = 0
                 anth_date = 0
                 mat_date = 0
```
        on end_of_day:
```
             !    report do_output
                 if pigeonpea.stage = 3 and dateset = 0 then
                    emer_date = daysaftersowing
                    dateset = 1
                 endif
                 if pigeonpea.stage = 4 and dateset = 1 then
                    endjuv_date = daysaftersowing
                    dateset = 2
                 endif
                 if pigeonpea.stage = 6 and dateset = 2 then
                    anth_date = daysaftersowing
                    dateset = 3
                 endif
                 if pigeonpea.stage = 9 and dateset = 3 then
                    mat_date = daysaftersowing
                    dateset = 4
                 endif
            if (pigeonpea.stagename = 'maturity' or pigeonpea.plant_status = 'dead') then
               outputfile do_output
               pigeonpea harvest 
               pigeonpea kill_crop 
               pigeonpea end_crop
               dateset = 0
            endif
```
      soil icr_alf1
        Water
          Layer:
            Thickness (mm)  BD (g/cc)  AirDry (mm/mm)  LL15 (mm/mm)  DUL (mm/mm)  SAT (mm/mm)
            150.000         1.475      0.050           0.146         0.282        0.443
            150.000         1.520      0.135           0.207         0.327        0.404
            150.000         1.460      0.220           0.220         0.354        0.404
            150.000         1.460      0.230           0.230         0.354        0.404
            150.000         1.420      0.230           0.230         0.341        0.391
            150.000         1.420      0.230           0.230         0.341        0.391
            150.000         1.460      0.236           0.236         0.325        0.375
            150.000         1.460      0.233           0.233         0.325        0.375
            150.000         1.500      0.231           0.231         0.325        0.375
            150.000         1.500      0.231           0.231         0.325        0.375
          SoilCrop pigeonpea
            Layer:
              Thickness (mm)  LL (mm/mm)  KL (/day)  XF (0-1)
              150.000         0.146       0.116      1.000
              150.000         0.207       0.083      1.000
              150.000         0.220       0.049      1.000
              150.000         0.230       0.049      1.000
              150.000         0.230       0.049      1.000
              150.000         0.230       0.049      1.000
              150.000         0.270       0.049      1.000
              150.000         0.300       0.049      1.000
              150.000         0.324       0.044      1.000
              150.000         0.324       0.040      1.000
        SoilWat: SummerCona=6.6; SummerU=1.5; SummerDate=1-Nov; WinterCona=6.6; WinterU=1.5; WinterDate=1-Apr; DiffusConst=250.0; DiffusSlope=22.0; Salb=0.13; Cn2Bare=85; CnRed=20; CnCov=0.8
          Layer:
            Thickness (mm)  SWCON (0-1)
            150.000         0.700
            150.000         0.700
            150.000         0.700
            150.000         0.700
            150.000         0.700
            150.000         0.700
            150.000         0.700
            150.000         0.700
            150.000         0.700
            150.000         0.700
        SoilOrganicMatter: RootCn=45.0; RootWt=1000.0; SoilCn=14.5; EnrACoeff=7.4; EnrBCoeff=0.2
          Layer:
            Thickness (mm)  OC (Total %)  FBiom (0-1)  FInert (0-1)
            150.000         0.535         0.040        0.390
            150.000         0.608         0.020        0.470
            150.000         0.446         0.015        0.520
            150.000         0.446         0.015        0.520
            150.000         0.210         0.010        0.620
            150.000         0.210         0.010        0.620
            150.000         0.121         0.010        0.740
            150.000         0.121         0.010        0.740
            150.000         0.180         0.010        0.830
            150.000         0.180         0.010        0.930
        Analysis
          Layer:
            Thickness (mm)  PH (1:5 water)
            150.000         6.000
            150.000         6.000
            150.000         6.000
            150.000         6.000
            150.000         6.200
            150.000         6.200
            150.000         6.500
            150.000         6.500
            150.000         6.700
            150.000         6.800
        Sample Initial nitrogen
          Layer:
            Thickness (mm)  NO3 (ppm)  NH4 (ppm)
            150.000         3.000      2.500
            150.000         9.000      2.500
            150.000         9.000      1.500
            150.000         9.000      1.500
            150.000         7.000      1.000
            150.000         7.000      1.000
            150.000         5.000      0.500
            150.000         5.000      0.500
            150.000         5.000      0.500
            150.000         3.000      0.500
        Sample Initial water
          Layer:
            Thickness (mm)  SW (mm/mm)
            150.000         0.146
            150.000         0.207
            150.000         0.220
            150.000         0.230
            150.000         0.230
            150.000         0.230
            150.000         0.236
            150.000         0.233
            150.000         0.231
            150.000         0.231
      surfaceom
        PoolName = sorghum  # Organic Matter pool name
        type = sorghum  # Organic Matter type
        mass = 0.0  # Initial surface residue (kg/ha)
        cnr = 33.0  # C:N ratio of initial residue
        standing_fraction = 0.0  # Fraction of residue standing
      pigeonpea
  simulation ed902a33 - ICRISAT 1990, Rainfed,ICPL 84023 -> /Simulations/Shared
    clock: start_date=3/6/1990; end_date=17/10/1990
    area paddock -> /Simulations/Shared/paddock
      outputfile: filename=ed902a33 - ICRISAT 1990, Rainfed,ICPL 84023.out; title=ed902a33 - ICRISAT 1990, Rainfed,ICPL 84023
        variables
          Constants: constant Code=ed902a33; constant mat_class=E
        variables variables1 -> /Simulations/Shared/paddock/outputfile/variables
      operations
        03/07/1990  pigeonpea sow population = 33 (plants/m^2), sowing_depth = 30. , cultivar = extrashort_duration, row_spacing = 300
        03/07/1990  fertiliser apply amount = 100.0 (kg/ha) , depth = 50 ,type = nh4no3
  simulation ed931a - ICRISAT 1993, Irrigated, ICPL 84023 - different sowing date -> /Simulations/Shared
    clock: start_date=15/5/1993; end_date=27/10/1993
    area paddock -> /Simulations/Shared/paddock
      outputfile
        filename=ed931a - ICRISAT 1993, Irrigated, ICPL 84023 - different sowing date.out
        title=ed931a - ICRISAT 1993, Irrigated, ICPL 84023 - different sowing date
        variables -> /Simulations/Shared/paddock/outputfile/variables
        variables variables1
          Constants: constant Code=ed931a; constant mat_class=E
      operations
        14/06/1993  pigeonpea sow population = 33 (plants/m^2), sowing_depth = 30. , cultivar = extrashort_duration, row_spacing = 300
        14/06/1993  fertiliser apply amount = 100.0 (kg/ha) , depth = 50 ,type = nh4no3
      irrigation
        automatic_irrigation = on
        asw_depth = 1000  # Depth to which ASW is calculated. (mm)
        crit_fr_asw = 0.70  # Fraction of ASW below which irrigation is applied (0-1.0)
        irrigation_efficiency = 1  # Efficiency of the irrigation. (0-1.0)
        irrigation_allocation = off  # Allocation limits
        allocation = 0  # Allocation in mm
        default_no3_conc = 0.0  # Nitrate concentration (ppm N)
        default_nh4_conc = 0.0  # Ammonium concentration (ppm N)
        default_cl_conc = 0.0  # Chloride concentration (ppm Cl)
  simulation ed931a33 ICRISAT 1993, Irrigated ICPL 84023 -> /Simulations/Shared
    clock: start_date=20/5/1993; end_date=27/10/1993
    area paddock -> /Simulations/Shared/paddock
      outputfile: filename=ed931a33 ICRISAT 1993, Irrigated ICPL 84023.out; title=ed931a33 ICRISAT 1993, Irrigated ICPL 84023
        variables -> /Simulations/Shared/paddock/outputfile/variables
        variables variables1
          Constants: constant Code=ed931a33; constant mat_class=E
      operations
        19/06/1993  pigeonpea sow population = 33 (plants/m^2), sowing_depth = 30. , cultivar = extrashort_duration, row_spacing = 300
        19/06/1993  fertiliser apply amount = 100.0 (kg/ha) , depth = 50 ,type = nh4no3
      irrigation: same as ed931a - ICRISAT 1993, Irrigated, ICPL 84023 - different sowing date.paddock.irrigation
  simulation ed941a33 - ICRISAT 1994, Irrigated,ICPL 84023 -> /Simulations/Shared
    clock: start_date=22/5/1994; end_date=27/10/1994
    area paddock -> /Simulations/Shared/paddock
      outputfile: filename=ed941a33 - ICRISAT 1994, Irrigated,ICPL 84023.out; title=ed941a33 - ICRISAT 1994, Irrigated,ICPL 84023
        variables -> /Simulations/Shared/paddock/outputfile/variables
        variables variables1
          Constants: constant Code=ed941a33; constant mat_class=E
      operations
        21/06/1994  pigeonpea sow population = 33 (plants/m^2), sowing_depth = 30. , cultivar = extrashort_duration, row_spacing = 600
        21/06/1994  fertiliser apply amount = 100.0 (kg/ha) , depth = 50 ,type = nh4no3
      irrigation: same as ed931a - ICRISAT 1993, Irrigated, ICPL 84023 - different sowing date.paddock.irrigation
  simulation ed942a33 ICRISAT 1994, Irrigated, ICPL 84023 -> /Simulations/Shared
    clock: start_date=22/5/1994; end_date=5/10/1994
    area paddock -> /Simulations/Shared/paddock
      outputfile: filename=ed942a33 ICRISAT 1994, Irrigated, ICPL 84023.out; title=ed942a33 ICRISAT 1994, Irrigated, ICPL 84023
        variables -> /Simulations/Shared/paddock/outputfile/variables
        variables variables1
          Constants: constant Code=ed942a33; constant mat_class=E
      operations
        21/06/1994  pigeonpea sow population = 33 (plants/m^2), sowing_depth = 30. , cultivar = extrashort_duration, row_spacing = 600
        21/06/1994  fertiliser apply amount = 100.0 (kg/ha) , depth = 50 ,type = nh4no3
  simulation ed961a33 - ICRISAT 1996, Irrigated, ICPL 84023 -> /Simulations/Shared
    clock: start_date=25/5/1996; end_date=26/10/1996
    area paddock -> /Simulations/Shared/paddock
      outputfile: filename=ed961a33 - ICRISAT 1996, Irrigated, ICPL 84023.out; title=ed961a33 - ICRISAT 1996, Irrigated, ICPL 84023
        variables -> /Simulations/Shared/paddock/outputfile/variables
        variables variables1
          Constants: constant Code=ed961a33; constant mat_class=E
      operations
        24/06/1996  pigeonpea sow population = 33 (plants/m^2), sowing_depth = 30. , cultivar = extrashort_duration, row_spacing = 300
        24/06/1996  fertiliser apply amount = 100.0 (kg/ha) , depth = 50 ,type = nh4no3
      irrigation: same as ed931a - ICRISAT 1993, Irrigated, ICPL 84023 - different sowing date.paddock.irrigation
  simulation ed971a17 - ICRISAT 1997, ICPL 88039 Rainfed 17 plants.m2 -> /Simulations/Shared
    clock: start_date=23/6/1997; end_date=27/10/1997
    area paddock -> /Simulations/Shared/paddock
      outputfile: title=ed971a17 - ICRISAT 1997, ICPL 88039 Rainfed 17 plants.m2
        filename=ed971a17 - ICRISAT 1997, ICPL 88039 Rainfed 17 plants.m2.out
        variables -> /Simulations/Shared/paddock/outputfile/variables
        variables variables1
          Constants: constant Code=ed971a17; constant mat_class=E
      operations
        24/06/1997  pigeonpea sow population = 17 (plants/m^2), sowing_depth = 30. , cultivar = extrashort_duration, row_spacing = 300
        24/06/1997  fertiliser apply amount = 100.0 (kg/ha) , depth = 50 ,type = nh4no3
      irrigation: same as ed931a - ICRISAT 1993, Irrigated, ICPL 84023 - different sowing date.paddock.irrigation
  simulation ed971a33 - ICRISAT 1997, ICPL 88039 - Rainfed 33 plants.m2 -> /Simulations/Shared
    clock: start_date=23/6/1997; end_date=27/10/1997
    area paddock -> /Simulations/Shared/paddock
      outputfile: title=ed971a33 - ICRISAT 1997, ICPL 88039 - Rainfed 33 plants.m2
        filename=ed971a33 - ICRISAT 1997, ICPL 88039 - Rainfed 33 plants.m2.out
        variables -> /Simulations/Shared/paddock/outputfile/variables
        variables variables1
          Constants: constant Code=ed971a33; constant mat_class=E
      operations
        24/06/1997  pigeonpea sow population = 33 (plants/m^2), sowing_depth = 30. , cultivar = extrashort_duration, row_spacing = 300
        24/06/1997  fertiliser apply amount = 100.0 (kg/ha) , depth = 50 ,type = nh4no3
      irrigation: same as ed931a - ICRISAT 1993, Irrigated, ICPL 84023 - different sowing date.paddock.irrigation
  simulation ed971a4 - ICRISAT 1997, ICPL 88039 Rainfed 4 plants.m2 -> /Simulations/Shared
    clock: start_date=23/6/1997; end_date=27/10/1997
    area paddock -> /Simulations/Shared/paddock
      outputfile: filename=ed971a4 - ICRISAT 1997, ICPL 88039 Rainfed 4 plants.m2.out; title=ed971a4 - ICRISAT 1997, ICPL 88039 Rainfed 4 plants.m2
        variables -> /Simulations/Shared/paddock/outputfile/variables
        variables variables1
          Constants: constant Code=ed971a4; constant mat_class=E
      operations
        24/06/1997  pigeonpea sow population = 4 (plants/m^2), sowing_depth = 30. , cultivar = extrashort_duration, row_spacing = 300
        24/06/1997  fertiliser apply amount = 100.0 (kg/ha) , depth = 50 ,type = nh4no3
      irrigation: same as ed931a - ICRISAT 1993, Irrigated, ICPL 84023 - different sowing date.paddock.irrigation
  simulation ed971a8 - ICRISAT 1997, ICPL 88039 Rainfed 8 plants.m2 -> /Simulations/Shared
    clock: start_date=23/6/1997; end_date=27/10/1997
    area paddock -> /Simulations/Shared/paddock
      outputfile: filename=ed971a8 - ICRISAT 1997, ICPL 88039 Rainfed 8 plants.m2.out; title=ed971a8 - ICRISAT 1997, ICPL 88039 Rainfed 8 plants.m2
        variables -> /Simulations/Shared/paddock/outputfile/variables
        variables variables1
          Constants: constant Code=ed971a8; constant mat_class=E
      operations
        24/06/1997  pigeonpea sow population = 8 (plants/m^2), sowing_depth = 30. , cultivar = extrashort_duration, row_spacing = 300
        24/06/1997  fertiliser apply amount = 100.0 (kg/ha) , depth = 50 ,type = nh4no3
      irrigation: same as ed931a - ICRISAT 1993, Irrigated, ICPL 84023 - different sowing date.paddock.irrigation
  simulation ed991a17 - ICRISAT 1999,ICPL 88039, Rainfed 17 plants.m2 -> /Simulations/Shared
    clock: start_date=7/7/1999; end_date=27/10/1999
    area paddock -> /Simulations/Shared/paddock
      outputfile: title=ed991a17 - ICRISAT 1999,ICPL 88039, Rainfed 17 plants.m2
        filename=ed991a17 - ICRISAT 1999,ICPL 88039, Rainfed 17 plants.m2.out
        variables -> /Simulations/Shared/paddock/outputfile/variables
        variables variables1
          Constants: constant Code=ed991a17; constant mat_class=E
      operations
        08/07/1999  pigeonpea sow population = 17 (plants/m^2), sowing_depth = 30. , cultivar = extrashort_duration, row_spacing = 400
        08/07/1999  'soil Water' set sw = 0.159 0.219 0.233 0.242 0.241 0.241 0.245 0.242 0.24 0.24
        08/07/1999  fertiliser apply amount = 100.0 (kg/ha) , depth = 50 ,type = nh4no3
  simulation ed991a33 - ICRISAT 1999, ICPL 88039, Rainfed 33 plants.m2 -> /Simulations/Shared
    clock: start_date=7/7/1999; end_date=27/10/1999
    area paddock -> /Simulations/Shared/paddock
      outputfile: title=ed991a33 - ICRISAT 1999, ICPL 88039, Rainfed 33 plants.m2
        filename=ed991a33 - ICRISAT 1999, ICPL 88039, Rainfed 33 plants.m2.out
        variables -> /Simulations/Shared/paddock/outputfile/variables
        variables variables1
          Constants: constant Code=ed991a33; constant mat_class=E
      operations
        08/07/1999  pigeonpea sow population = 33 (plants/m^2), sowing_depth = 30. , cultivar = extrashort_duration, row_spacing = 400
        08/07/1999  'soil water' set sw = 0.159 0.219 0.233 0.242 0.241 0.241 0.245 0.242 0.24 0.24
        08/07/1999  fertiliser apply amount = 100.0 (kg/ha) , depth = 50 ,type = nh4no3
  simulation ed991a4 - ICRISAT 1999, ICPL 88039 Rainfed 4.4 plants.m2 -> /Simulations/Shared
    clock: start_date=7/7/1999; end_date=27/10/1999
    area paddock -> /Simulations/Shared/paddock
      outputfile: title=ed991a4 - ICRISAT 1999, ICPL 88039 Rainfed 4.4 plants.m2
        filename=ed991a4 - ICRISAT 1999, ICPL 88039 Rainfed 4.4 plants.m2.out
        variables -> /Simulations/Shared/paddock/outputfile/variables
        variables variables1
          Constants: constant Code=ed991a4; constant mat_class=E
      operations
        08/07/1999  pigeonpea sow population = 4.4 (plants/m^2), sowing_depth = 30. , cultivar = extrashort_duration, row_spacing = 400
        08/07/1999  'soil water' set sw = 0.159 0.219 0.233 0.242 0.241 0.241 0.245 0.242 0.24 0.24
        08/07/1999  fertiliser apply amount = 100.0 (kg/ha) , depth = 50 ,type = nh4no3
  simulation ed991a8 - ICRISAT 1999, ICPL 88039, Rainfed 8.8 plants.m2 -> /Simulations/Shared
    clock: start_date=7/7/1999; end_date=27/10/1999
    area paddock -> /Simulations/Shared/paddock
      outputfile: title=ed991a8 - ICRISAT 1999, ICPL 88039, Rainfed 8.8 plants.m2
        filename=ed991a8 - ICRISAT 1999, ICPL 88039, Rainfed 8.8 plants.m2.out
        variables -> /Simulations/Shared/paddock/outputfile/variables
        variables variables1
          Constants: constant Code=ed991a8; constant mat_class=E
      operations
        08/07/1999  pigeonpea sow population = 8.8 (plants/m^2), sowing_depth = 30. , cultivar = extrashort_duration, row_spacing = 400
        08/07/1999  'soil water' set sw = 0.159 0.219 0.233 0.242 0.241 0.241 0.245 0.242 0.24 0.24
        08/07/1999  fertiliser apply amount = 100.0 (kg/ha) , depth = 50 ,type = nh4no3
  simulation m742a4 - ICRISAT 1974, alfisol -> /Simulations/Shared
    clock: start_date=4/6/1974; end_date=11/3/1975
    area paddock -> /Simulations/Shared/paddock
      outputfile: filename=m742a4 - ICRISAT 1974, alfisol.out; title=m742a4 - ICRISAT 1974, alfisol
        variables -> /Simulations/Shared/paddock/outputfile/variables
        variables variables1
          Constants: constant Code=m742a4; constant mat_class=M
      operations
        04/07/1974  pigeonpea sow population = 4.44 (plants/m^2), sowing_depth = 30. , cultivar = medium_duration, row_spacing = 300
        04/07/1974  fertiliser apply amount = 500.0 (kg/ha) , depth = 50 , type = nh4no3
  simulation m742v4 - ICRISAT 1974, vertisol -> /Simulations/Shared
    clock: start_date=20/5/1974; end_date=11/3/1975
    area paddock -> /Simulations/Shared/paddock
      outputfile: filename=m742v4 - ICRISAT 1974, vertisol.out; title=m742v4 - ICRISAT 1974, vertisol
        variables -> /Simulations/Shared/paddock/outputfile/variables
        variables variables1
          Constants: constant Code=m742v4; constant mat_class=M
      operations
        19/06/1974  'soil water' set sw = 0.224 0.245 0.246 0.246 0.247 0.256 0.256
        26/06/1974  pigeonpea sow population = 4.44 (plants/m^2), sowing_depth = 30. , cultivar = medium_duration, row_spacing = 750
        26/06/1974  fertiliser apply amount = 500.0 (kg/ha) , depth = 50 , type = nh4no3
      soil -> /Simulations/Shared/paddock/icr_alf1
        InitWater Initial water
          percentmethod: percent=0.1; distributed=Evenly distributed
        Water
          Layer:
            Thickness (mm)  BD (g/cc)  AirDry (mm/mm)  LL15 (mm/mm)  DUL (mm/mm)  SAT (mm/mm)
            150.000         1.200      0.100           0.224         0.390        0.440
            150.000         1.200      0.200           0.245         0.417        0.467
            300.000         1.200      0.246           0.246         0.417        0.467
            300.000         1.200      0.246           0.246         0.401        0.451
            300.000         1.200      0.247           0.247         0.403        0.453
            300.000         1.200      0.256           0.256         0.430        0.480
            300.000         1.200      0.256           0.256         0.430        0.480
          SoilCrop pigeonpea
            Layer:
              Thickness (mm)  LL (mm/mm)  KL (/day)  XF (0-1)
              150.000         0.224       0.116      1.000
              150.000         0.245       0.083      1.000
              300.000         0.246       0.049      1.000
              300.000         0.246       0.049      1.000
              300.000         0.247       0.049      1.000
              300.000         0.256       0.049      1.000
              300.000         0.256       0.049      1.000
        SoilWat: SummerCona=3.5; SummerU=6.0; SummerDate=1-Nov; WinterCona=3.5; WinterU=6.0; WinterDate=1-Apr; DiffusConst=40.0; DiffusSlope=16.0; Salb=0.05; Cn2Bare=73; CnRed=20; CnCov=0.8
          Layer:
            Thickness (mm)  SWCON (0-1)
            150.000         0.100
            150.000         0.100
            300.000         0.100
            300.000         0.100
            300.000         0.100
            300.000         0.100
            300.000         0.100
        SoilOrganicMatter: RootCn=45.0; RootWt=1000.0; SoilCn=14.5; EnrACoeff=7.4; EnrBCoeff=0.2
          Layer:
            Thickness (mm)  OC (Total %)  FBiom (0-1)  FInert (0-1)
            150.000         0.960         0.040        0.390
            150.000         0.870         0.020        0.470
            300.000         0.690         0.015        0.520
            300.000         0.630         0.010        0.620
            300.000         0.600         0.010        0.740
            300.000         0.530         0.010        0.830
            300.000         0.300         0.010        0.930
        Analysis
          Layer:
            Thickness (mm)  PH (1:5 water)
            150.000         7.500
            150.000         8.000
            300.000         8.000
            300.000         8.000
            300.000         8.000
            300.000         8.000
            300.000         8.000
        Sample Initial nitrogen
          Layer:
            Thickness (mm)  NO3 (ppm)  NH4 (ppm)
            150.000         5.000      2.500
            150.000         3.000      2.500
            300.000         2.000      1.500
            300.000         1.000      1.000
            300.000         1.000      0.500
            300.000         1.000      0.500
            300.000         0.500      0.500
  simulation m792v4 - ICRISAT 1981, vertisol (BW-3), Irrigated -> /Simulations/Shared
    clock: start_date=28/5/1979; end_date=26/12/1979
    area paddock -> /Simulations/Shared/paddock
      outputfile: filename=m792v4 - ICRISAT 1981, vertisol (BW-3), Irrigated.out; title=m792v4 - ICRISAT 1981, vertisol (BW-3), Irrigated
        variables -> /Simulations/Shared/paddock/outputfile/variables
        variables variables1
          Constants: constant Code=m792v4; constant mat_class=M
      operations
        27/06/1979  pigeonpea sow population = 4.44 (plants/m^2), sowing_depth = 30. , cultivar = medium_duration, row_spacing = 750
        27/06/1979  fertiliser apply amount = 0 (kg/ha) , depth = 50 ,type = nh4no3
      soil -> /Simulations/Shared/paddock/icr_alf1
        InitWater Initial water
          percentmethod: percent=0.1; distributed=Evenly distributed
        Water: same as m742v4 - ICRISAT 1974, vertisol.paddock.soil.Water
        SoilWat: same as m742v4 - ICRISAT 1974, vertisol.paddock.soil.SoilWat
        SoilOrganicMatter: same as m742v4 - ICRISAT 1974, vertisol.paddock.soil.SoilOrganicMatter
        Analysis: same as m742v4 - ICRISAT 1974, vertisol.paddock.soil.Analysis
        Sample Initial nitrogen: same as m742v4 - ICRISAT 1974, vertisol.paddock.soil.Initial nitrogen
  simulation m794v33 - ICRISAT 1981, vertisol (BW-3), Dryland -> /Simulations/Shared
    clock: start_date=1/10/1979; end_date=25/3/1980
    area paddock -> /Simulations/Shared/paddock
      outputfile: filename=m794v33 - ICRISAT 1981, vertisol (BW-3), Dryland.out; title=m794v33 - ICRISAT 1981, vertisol (BW-3), Dryland
        variables -> /Simulations/Shared/paddock/outputfile/variables
        variables variables1
          Constants: constant Code=m794v33; constant mat_class=M
      operations
        30/10/1979  pigeonpea sow population = 33.3 (plants/m^2), sowing_depth = 30. , cultivar = medium_duration, row_spacing = 750
        30/10/1979  fertiliser apply amount = 0 (kg/ha) , depth = 50 ,type = nh4no3
        30/10/1979  'soil water' set sw = 0.300 0.280 0.287 0.346 0.347 0.356 0.300
      soil -> /Simulations/Shared/paddock/icr_alf1
        InitWater Initial water
          percentmethod: percent=0.1; distributed=Evenly distributed
        Water: same as m742v4 - ICRISAT 1974, vertisol.paddock.soil.Water
        SoilWat: same as m742v4 - ICRISAT 1974, vertisol.paddock.soil.SoilWat
        SoilOrganicMatter: same as m742v4 - ICRISAT 1974, vertisol.paddock.soil.SoilOrganicMatter
        Analysis: same as m742v4 - ICRISAT 1974, vertisol.paddock.soil.Analysis
        Sample Initial nitrogen: same as m742v4 - ICRISAT 1974, vertisol.paddock.soil.Initial nitrogen
  simulation m811v5 - ICRISAT 1981, vertisol (BW-3), Irrigated -> /Simulations/Shared
    clock: start_date=19/5/1981; end_date=31/12/1981
    area paddock -> /Simulations/Shared/paddock
      outputfile: filename=m811v5 - ICRISAT 1981, vertisol (BW-3), Irrigated.out; title=m811v5 - ICRISAT 1981, vertisol (BW-3), Irrigated
        variables -> /Simulations/Shared/paddock/outputfile/variables
        variables variables1
          Constants: constant Code=m811v5; constant mat_class=M
      operations
        18/06/1981  pigeonpea sow population = 5 (plants/m^2), sowing_depth = 30. , cultivar = medium_duration, row_spacing = 450
        18/06/1981  fertiliser apply amount = 100.0 (kg/ha) , depth = 50 ,type = nh4no3
      irrigation: same as ed931a - ICRISAT 1993, Irrigated, ICPL 84023 - different sowing date.paddock.irrigation
      soil -> /Simulations/Shared/paddock/icr_alf1
        InitWater Initial water
          percentmethod: percent=0.1; distributed=Evenly distributed
        Water: same as m742v4 - ICRISAT 1974, vertisol.paddock.soil.Water
        SoilWat: same as m742v4 - ICRISAT 1974, vertisol.paddock.soil.SoilWat
        SoilOrganicMatter: same as m742v4 - ICRISAT 1974, vertisol.paddock.soil.SoilOrganicMatter
        Analysis: same as m742v4 - ICRISAT 1974, vertisol.paddock.soil.Analysis
        Sample Initial nitrogen: same as m742v4 - ICRISAT 1974, vertisol.paddock.soil.Initial nitrogen
  simulation m812v5 - ICRISAT 1981, vertisol (BW-3), Irrigated -> /Simulations/Shared
    clock: start_date=19/5/1981; end_date=31/12/1981
    area paddock -> /Simulations/Shared/paddock
      outputfile: filename=m812v5 - ICRISAT 1981, vertisol (BW-3), Irrigated.out; title=m812v5 - ICRISAT 1981, vertisol (BW-3), Irrigated
        variables -> /Simulations/Shared/paddock/outputfile/variables
        variables variables1
          Constants: constant Code=m812v5; constant mat_class=M
      operations
        18/06/1981  pigeonpea sow population = 5 (plants/m^2), sowing_depth = 30. , cultivar = medium_duration, row_spacing = 450
        18/06/1981  fertiliser apply amount = 100.0 (kg/ha) , depth = 50 ,type = nh4no3
      soil -> /Simulations/Shared/paddock/icr_alf1
        InitWater Initial water
          percentmethod: percent=0.1; distributed=Evenly distributed
        Water: same as m742v4 - ICRISAT 1974, vertisol.paddock.soil.Water
        SoilWat: same as m742v4 - ICRISAT 1974, vertisol.paddock.soil.SoilWat
        SoilOrganicMatter: same as m742v4 - ICRISAT 1974, vertisol.paddock.soil.SoilOrganicMatter
        Analysis: same as m742v4 - ICRISAT 1974, vertisol.paddock.soil.Analysis
        Sample Initial nitrogen: same as m742v4 - ICRISAT 1974, vertisol.paddock.soil.Initial nitrogen
  simulation m813v33 - ICRISAT 1981, vertisol (BW-3), Irrigated -> /Simulations/Shared
    clock: start_date=12/10/1981; end_date=21/3/1982
    area paddock -> /Simulations/Shared/paddock
      outputfile: filename=m813v33 - ICRISAT 1981, vertisol (BW-3), Irrigated.out; title=m813v33 - ICRISAT 1981, vertisol (BW-3), Irrigated
        variables -> /Simulations/Shared/paddock/outputfile/variables
        variables variables1
          Constants: constant Code=m813v33; constant mat_class=M
      operations
        14/10/1981  'soil water' set sw = 0.390 0.417 0.417 0.301 0.303 0.330 0.330
        14/10/1981  pigeonpea sow population = 33.3 (plants/m^2), sowing_depth = 30. , cultivar = medium_duration, row_spacing = 450
        14/10/1981  fertiliser apply amount = 0 (kg/ha) , depth = 50 ,type = nh4no3
      irrigation: same as ed931a - ICRISAT 1993, Irrigated, ICPL 84023 - different sowing date.paddock.irrigation
      soil -> /Simulations/Shared/paddock/icr_alf1
        InitWater Initial water
          percentmethod: percent=0.1; distributed=Evenly distributed
        Water: same as m742v4 - ICRISAT 1974, vertisol.paddock.soil.Water
        SoilWat: same as m742v4 - ICRISAT 1974, vertisol.paddock.soil.SoilWat
        SoilOrganicMatter: same as m742v4 - ICRISAT 1974, vertisol.paddock.soil.SoilOrganicMatter
        Analysis: same as m742v4 - ICRISAT 1974, vertisol.paddock.soil.Analysis
        Sample Initial nitrogen: same as m742v4 - ICRISAT 1974, vertisol.paddock.soil.Initial nitrogen
  simulation m814v33 - ICRISAT 1981, vertisol (BW-3), Irrigated -> /Simulations/Shared
    clock: start_date=12/10/1981; end_date=21/3/1982
    area paddock -> /Simulations/Shared/paddock
      outputfile: filename=m814v33 - ICRISAT 1981, vertisol (BW-3), Irrigated.out; title=m814v33 - ICRISAT 1981, vertisol (BW-3), Irrigated
        variables -> /Simulations/Shared/paddock/outputfile/variables
        variables variables1
          Constants: constant Code=m814v33; constant mat_class=M
      operations
        14/10/1981  'soil water' set sw = 0.300 0.280 0.287 0.386 0.387 0.406 0.400
        14/10/1981  pigeonpea sow population = 33.3 (plants/m^2), sowing_depth = 30. , cultivar = medium_duration, row_spacing = 450
        14/10/1981  fertiliser apply amount = 0 (kg/ha) , depth = 50 ,type = nh4no3
      soil -> /Simulations/Shared/paddock/icr_alf1
        InitWater Initial water
          percentmethod: percent=0.1; distributed=Evenly distributed
        Water: same as m742v4 - ICRISAT 1974, vertisol.paddock.soil.Water
        SoilWat: same as m742v4 - ICRISAT 1974, vertisol.paddock.soil.SoilWat
        SoilOrganicMatter: same as m742v4 - ICRISAT 1974, vertisol.paddock.soil.SoilOrganicMatter
        Analysis: same as m742v4 - ICRISAT 1974, vertisol.paddock.soil.Analysis
        Sample Initial nitrogen: same as m742v4 - ICRISAT 1974, vertisol.paddock.soil.Initial nitrogen
  simulation m902a6 - ICRISAT 1991, Block RCE2, Irrigated -> /Simulations/Shared
    clock: start_date=3/6/1990; end_date=31/12/1990
    area paddock -> /Simulations/Shared/paddock
      outputfile: filename=m902a6 - ICRISAT 1991, Block RCE2, Irrigated.out; title=m902a6 - ICRISAT 1991, Block RCE2, Irrigated
        variables -> /Simulations/Shared/paddock/outputfile/variables
        variables variables1
          Constants: constant Code=m902a6; constant mat_class=M
      operations
        03/07/1990  pigeonpea sow population = 6.67 (plants/m^2), sowing_depth = 30. , cultivar = medium_duration, row_spacing = 600
        03/07/1990  fertiliser apply amount = 100.0 (kg/ha) , depth = 50 ,type = nh4no3
  simulation m911a6 - ICRISAT 1991 Block RCE2 Irrigated -> /Simulations/Shared
    clock: start_date=23/5/1991; end_date=31/12/1991
    area paddock -> /Simulations/Shared/paddock
      outputfile: filename=m911a6 - ICRISAT 1991 Block RCE2 Irrigated.out; title=m911a6 - ICRISAT 1991 Block RCE2 Irrigated
        variables -> /Simulations/Shared/paddock/outputfile/variables
        variables variables1
          Constants: constant Code=m911a6; constant mat_class=M
      operations
        22/06/1991  pigeonpea sow population = 6.67 (plants/m^2), sowing_depth = 30. , cultivar = medium_duration, row_spacing = 600
        22/06/1991  fertiliser apply amount = 100.0 (kg/ha) , depth = 20 ,type = nh4no3
        17/07/1991  'soil water' set sw = .363 .292 .338 .342 .333 .333 .333 .320 .336 .336
        31/08/1991  irrigation apply amount = 52.9
        06/09/1991  irrigation apply amount = 38.7
        13/09/1991  irrigation apply amount = 18.3
        20/09/1991  irrigation apply amount = 19.3
        30/10/1991  irrigation apply amount = 46.8
        07/11/1991  irrigation apply amount = 37.6
  simulation m912a6 - ICRISAT 1991, Block RCE2, Rainfed -> /Simulations/Shared
    clock: start_date=23/5/1991; end_date=31/12/1991
    area paddock -> /Simulations/Shared/paddock
      outputfile: filename=m912a6 - ICRISAT 1991, Block RCE2, Rainfed.out; title=m912a6 - ICRISAT 1991, Block RCE2, Rainfed
        variables -> /Simulations/Shared/paddock/outputfile/variables
        variables variables1
          Constants: constant Code=m912a6; constant mat_class=M
      operations
        22/06/1991  pigeonpea sow population = 6.67 (plants/m^2), sowing_depth = 30. , cultivar = medium_duration, row_spacing = 600
        22/06/1991  fertiliser apply amount = 100.0 (kg/ha) , depth = 50 ,type = nh4no3
        17/07/1991  'soil water' set sw = .327 .298 .325 .349 .333 .339 .334 .331 .321 .321
  simulation m931a33 - ICRISAT 1991, Block RCE2, Irrigated -> /Simulations/Shared
    clock: start_date=20/5/1993; end_date=6/1/1994
    area paddock -> /Simulations/Shared/paddock
      outputfile: filename=m931a33 - ICRISAT 1991, Block RCE2, Irrigated.out; title=m931a33 - ICRISAT 1991, Block RCE2, Irrigated
        variables -> /Simulations/Shared/paddock/outputfile/variables
        variables variables1
          Constants: constant Code=m931a33; constant mat_class=M
      operations
        19/06/1993  pigeonpea sow population = 33.3 (plants/m^2), sowing_depth = 30. , cultivar = medium_duration, row_spacing = 300
        19/06/1993  fertiliser apply amount = 100.0 (kg/ha) , depth = 50 ,type = nh4no3
      irrigation: same as ed931a - ICRISAT 1993, Irrigated, ICPL 84023 - different sowing date.paddock.irrigation
  simulation m932a33 - ICRISAT 1991, Block RCE2, Irrigated -> /Simulations/Shared
    clock: start_date=20/5/1993; end_date=10/1/1994
    area paddock -> /Simulations/Shared/paddock
      outputfile: filename=m932a33 - ICRISAT 1991, Block RCE2, Irrigated.out; title=m932a33 - ICRISAT 1991, Block RCE2, Irrigated
        variables -> /Simulations/Shared/paddock/outputfile/variables
        variables variables1
          Constants: constant Code=m932a33; constant mat_class=M
      operations
        19/06/1993  pigeonpea sow population = 33.3 (plants/m^2), sowing_depth = 30. , cultivar = medium_duration, row_spacing = 300
        19/06/1993  fertiliser apply amount = 100.0 (kg/ha) , depth = 50 ,type = nh4no3
  simulation m941a8 - ICRISAT 1994, Block RCE2, Irrigated -> /Simulations/Shared
    clock: start_date=22/5/1994; end_date=31/12/1994
    area paddock -> /Simulations/Shared/paddock
      outputfile: filename=m941a8 - ICRISAT 1994, Block RCE2, Irrigated.out; title=m941a8 - ICRISAT 1994, Block RCE2, Irrigated
        variables -> /Simulations/Shared/paddock/outputfile/variables
        variables variables1
          Constants: constant Code=m941a8; constant mat_class=M
      operations
        21/06/1994  pigeonpea sow population = 8.33 (plants/m^2), sowing_depth = 30. , cultivar = medium_duration, , row_spacing = 600
        21/06/1994  fertiliser apply amount = 100.0 (kg/ha) , depth = 50 ,type = nh4no3
      irrigation: same as ed931a - ICRISAT 1993, Irrigated, ICPL 84023 - different sowing date.paddock.irrigation
  simulation m942a8 - ICRISAT 1994, Block RCE2, Irrigated -> /Simulations/Shared
    clock: start_date=22/5/1994; end_date=31/12/1994
    area paddock -> /Simulations/Shared/paddock
      outputfile: filename=m942a8 - ICRISAT 1994, Block RCE2, Irrigated.out; title=m942a8 - ICRISAT 1994, Block RCE2, Irrigated
        variables -> /Simulations/Shared/paddock/outputfile/variables
        variables variables1
          Constants: constant Code=m942a8; constant mat_class=M
      operations
        21/06/1994  pigeonpea sow population = 8.33 (plants/m^2), sowing_depth = 30. , cultivar = medium_duration, row_spacing = 600
        21/06/1994  fertiliser apply amount = 100.0 (kg/ha) , depth = 50 ,type = nh4no3
  simulation s742v4 - ICRISAT 1974, Rainfed T 21 -> /Simulations/Shared
    clock: start_date=27/5/1974; end_date=23/10/1974
    area paddock -> /Simulations/Shared/paddock
      outputfile: filename=s742v4 - ICRISAT 1974, Rainfed T 21.out; title=s742v4 - ICRISAT 1974, Rainfed T 21
        variables -> /Simulations/Shared/paddock/outputfile/variables
        variables variables1
          Constants: constant Code=s742v4; constant mat_class=S
      operations
        26/06/1974  pigeonpea sow population = 4.44 (plants/m^2), sowing_depth = 30. , cultivar = short_duration, row_spacing = 750
        26/06/1974  fertiliser apply amount = 100.0 (kg/ha) , depth = 50 ,type = nh4no3
      soil -> /Simulations/Shared/paddock/icr_alf1
        InitWater Initial water
          percentmethod: percent=0.1; distributed=Evenly distributed
        Water: same as m742v4 - ICRISAT 1974, vertisol.paddock.soil.Water
        SoilWat: same as m742v4 - ICRISAT 1974, vertisol.paddock.soil.SoilWat
        SoilOrganicMatter: same as m742v4 - ICRISAT 1974, vertisol.paddock.soil.SoilOrganicMatter
        Analysis: same as m742v4 - ICRISAT 1974, vertisol.paddock.soil.Analysis
        Sample Initial nitrogen: same as m742v4 - ICRISAT 1974, vertisol.paddock.soil.Initial nitrogen
  simulation s754v13 - ICRISAT 1975, Rainfed T 21 -> /Simulations/Shared
    clock: start_date=12/10/1975; end_date=9/4/1976
    area paddock -> /Simulations/Shared/paddock
      outputfile: filename=s754v13 - ICRISAT 1975, Rainfed T 21.out; title=s754v13 - ICRISAT 1975, Rainfed T 21
        variables -> /Simulations/Shared/paddock/outputfile/variables
        variables variables1
          Constants: constant Code=s754v13; constant mat_class=S
      operations
        11/11/1975  pigeonpea sow population = 13 (plants/m^2), sowing_depth = 30. , cultivar = short_duration, row_spacing = 750
        11/11/1975  fertiliser apply amount = 100.0 (kg/ha) , depth = 50 ,type = nh4no3
      soil -> /Simulations/Shared/paddock/icr_alf1
        InitWater Initial water
          percentmethod: percent=0.1; distributed=Evenly distributed
        Water: same as m742v4 - ICRISAT 1974, vertisol.paddock.soil.Water
        SoilWat: same as m742v4 - ICRISAT 1974, vertisol.paddock.soil.SoilWat
        SoilOrganicMatter: same as m742v4 - ICRISAT 1974, vertisol.paddock.soil.SoilOrganicMatter
        Analysis: same as m742v4 - ICRISAT 1974, vertisol.paddock.soil.Analysis
        Sample Initial nitrogen: same as m742v4 - ICRISAT 1974, vertisol.paddock.soil.Initial nitrogen
  simulation s754v22 ICRISAT 1975, Rainfed - T 21 -> /Simulations/Shared
    clock: start_date=12/10/1975; end_date=9/4/1976
    area paddock -> /Simulations/Shared/paddock
      outputfile: filename=s754v22 ICRISAT 1975, Rainfed - T 21.out; title=s754v22 ICRISAT 1975, Rainfed - T 21
        variables -> /Simulations/Shared/paddock/outputfile/variables
        variables variables1
          Constants: constant Code=s754v22; constant mat_class=S
      operations
        11/11/1975  pigeonpea sow population = 22 (plants/m^2), crop_class = plant, sowing_depth = 30. , cultivar = short_duration, row_spacing = 750
        11/11/1975  fertiliser apply amount = 100.0 (kg/ha) , depth = 50 ,type = nh4no3
      soil -> /Simulations/Shared/paddock/icr_alf1
        InitWater Initial water
          percentmethod: percent=0.1; distributed=Evenly distributed
        Water: same as m742v4 - ICRISAT 1974, vertisol.paddock.soil.Water
        SoilWat: same as m742v4 - ICRISAT 1974, vertisol.paddock.soil.SoilWat
        SoilOrganicMatter: same as m742v4 - ICRISAT 1974, vertisol.paddock.soil.SoilOrganicMatter
        Analysis: same as m742v4 - ICRISAT 1974, vertisol.paddock.soil.Analysis
        Sample Initial nitrogen: same as m742v4 - ICRISAT 1974, vertisol.paddock.soil.Initial nitrogen
  simulation s902a33 ICRISAT 1990, Block RCE2, Rainfed,UPAS 120 -> /Simulations/Shared
    clock: start_date=3/6/1990; end_date=27/10/1990
    area paddock -> /Simulations/Shared/paddock
      outputfile: filename=s902a33 ICRISAT 1990, Block RCE2, Rainfed,UPAS 120.out; title=s902a33 ICRISAT 1990, Block RCE2, Rainfed,UPAS 120
        variables -> /Simulations/Shared/paddock/outputfile/variables
        variables variables1
          Constants: constant Code=s902a33; constant mat_class=S
      operations
        03/07/1990  pigeonpea sow population = 33 (plants/m^2), sowing_depth = 30. , cultivar = short_duration, row_spacing = 300
        03/07/1990  fertiliser apply amount = 100.0 (kg/ha) , depth = 50 ,type = nh4no3
  simulation sd742v4 - ICRISAT 1974, PUSA AGETI -> /Simulations/Shared
    clock: start_date=27/5/1974; end_date=27/11/1974
    area paddock -> /Simulations/Shared/paddock
      outputfile: filename=sd742v4 - ICRISAT 1974, PUSA AGETI.out; title=sd742v4 - ICRISAT 1974, PUSA AGETI
        variables -> /Simulations/Shared/paddock/outputfile/variables
        variables variables1
          Constants: constant Code=sd742v4; constant mat_class=S
      operations
        26/06/1974  pigeonpea sow population = 4.44 (plants/m^2), sowing_depth = 30. , cultivar = short_duration, row_spacing = 750
        26/06/1974  fertiliser apply amount = 100.0 (kg/ha) , depth = 50 ,type = nh4no3
      soil -> /Simulations/Shared/paddock/icr_alf1
        InitWater Initial water
          percentmethod: percent=0.1; distributed=Evenly distributed
        Water: same as m742v4 - ICRISAT 1974, vertisol.paddock.soil.Water
        SoilWat: same as m742v4 - ICRISAT 1974, vertisol.paddock.soil.SoilWat
        SoilOrganicMatter: same as m742v4 - ICRISAT 1974, vertisol.paddock.soil.SoilOrganicMatter
        Analysis: same as m742v4 - ICRISAT 1974, vertisol.paddock.soil.Analysis
        Sample Initial nitrogen: same as m742v4 - ICRISAT 1974, vertisol.paddock.soil.Initial nitrogen
  simulation sd861a16 - ICRISAT 1974, ICPL 87 -> /Simulations/Shared
    clock: start_date=9/6/1986; end_date=27/11/1986
    area paddock -> /Simulations/Shared/paddock
      outputfile: filename=sd861a16 - ICRISAT 1974, ICPL 87.out; title=sd861a16 - ICRISAT 1974, ICPL 87
        variables -> /Simulations/Shared/paddock/outputfile/variables
        variables variables1
          Constants: constant Code=sd861a16; constant mat_class=S
      operations
        09/07/1986  pigeonpea sow population = 16.7 (plants/m^2), sowing_depth = 30. , cultivar = short_duration, row_spacing = 300
        09/07/1986  fertiliser apply amount = 100.0 (kg/ha) , depth = 50 ,type = nh4no3
      irrigation: same as ed931a - ICRISAT 1993, Irrigated, ICPL 84023 - different sowing date.paddock.irrigation
  simulation sd861a33 - ICRISAT 1974, ICPL 87 -> /Simulations/Shared
    clock: start_date=9/6/1986; end_date=27/11/1986
    area paddock -> /Simulations/Shared/paddock
      outputfile: filename=sd861a33 - ICRISAT 1974, ICPL 87.out; title=sd861a33 - ICRISAT 1974, ICPL 87
        variables -> /Simulations/Shared/paddock/outputfile/variables
        variables variables1
          Constants: constant Code=sd861a33; constant mat_class=S
      operations
        09/07/1986  pigeonpea sow population = 33.3 (plants/m^2), sowing_depth = 30. , cultivar = short_duration, row_spacing = 300
        09/07/1986  fertiliser apply amount = 100.0 (kg/ha) , depth = 50 ,type = nh4no3
      irrigation: same as ed931a - ICRISAT 1993, Irrigated, ICPL 84023 - different sowing date.paddock.irrigation
  simulation sd861a66 ICRISAT 1974, ICPL 87 -> /Simulations/Shared
    clock: start_date=9/6/1986; end_date=27/11/1986
    area paddock -> /Simulations/Shared/paddock
      outputfile: filename=sd861a66 ICRISAT 1974, ICPL 87.out; title=sd861a66 ICRISAT 1974, ICPL 87
        variables -> /Simulations/Shared/paddock/outputfile/variables
        variables variables1
          Constants: constant Code=sd861a66; constant mat_class=S
      operations
        09/07/1986  pigeonpea sow population = 66.7 (plants/m^2), sowing_depth = 30. , cultivar = short_duration, row_spacing = 300
        09/07/1986  fertiliser apply amount = 100.0 (kg/ha) , depth = 50 ,type = nh4no3
      irrigation: same as ed931a - ICRISAT 1993, Irrigated, ICPL 84023 - different sowing date.paddock.irrigation
  simulation sd902a33 - ICRISAT 1993, Block RCE2, Rainfed -> /Simulations/Shared
    clock: start_date=3/6/1990; end_date=27/10/1990
    area paddock -> /Simulations/Shared/paddock
      outputfile: filename=sd902a33 - ICRISAT 1993, Block RCE2, Rainfed.out; title=sd902a33 - ICRISAT 1993, Block RCE2, Rainfed
        variables -> /Simulations/Shared/paddock/outputfile/variables
        variables variables1
          Constants: constant Code=sd902a33; constant mat_class=S
      operations
        03/07/1990  pigeonpea sow population = 33 (plants/m^2), sowing_depth = 30. , cultivar = short_duration, row_spacing = 300
        03/07/1990  fertiliser apply amount = 100.0 (kg/ha) , depth = 50 ,type = nh4no3
  simulation sd931a33 - ICRISAT 1993, Block RCE2, Irrigated -> /Simulations/Shared
    clock: start_date=20/5/1993; end_date=27/10/1993
    area paddock -> /Simulations/Shared/paddock
      outputfile: filename=sd931a33 - ICRISAT 1993, Block RCE2, Irrigated.out; title=sd931a33 - ICRISAT 1993, Block RCE2, Irrigated
        variables -> /Simulations/Shared/paddock/outputfile/variables
        variables variables1
          Constants: constant Code=sd931a33; constant mat_class=S
      operations
        19/06/1993  pigeonpea sow population = 33 (plants/m^2), row_spacing = 300 (m), sowing_depth = 30. , cultivar = short_duration
        19/06/1993  fertiliser apply amount = 100.0 (kg/ha) , depth = 50 ,type = nh4no3
      irrigation: same as ed931a - ICRISAT 1993, Irrigated, ICPL 84023 - different sowing date.paddock.irrigation
  simulation sd941a33 - ICRISAT 1994, Block RCE2, Irrigated -> /Simulations/Shared
    clock: start_date=22/5/1994; end_date=27/10/1994
    area paddock -> /Simulations/Shared/paddock
      outputfile: filename=sd941a33 - ICRISAT 1994, Block RCE2, Irrigated.out; title=sd941a33 - ICRISAT 1994, Block RCE2, Irrigated
        variables -> /Simulations/Shared/paddock/outputfile/variables
        variables variables1
          Constants: constant Code=sd941a33; constant mat_class=S
      operations
        21/06/1994  pigeonpea sow population = 33 (plants/m^2), sowing_depth = 30. , cultivar = short_duration, row_spacing = 600
        21/06/1994  fertiliser apply amount = 100.0 (kg/ha) , depth = 50 ,type = nh4no3
      irrigation: same as ed931a - ICRISAT 1993, Irrigated, ICPL 84023 - different sowing date.paddock.irrigation
  simulation sd942a33 - ICRISAT 1994, Block RCE2, Irrigated -> /Simulations/Shared
    clock: start_date=22/5/1994; end_date=27/10/1994
    area paddock -> /Simulations/Shared/paddock
      outputfile: filename=sd942a33 - ICRISAT 1994, Block RCE2, Irrigated.out; title=sd942a33 - ICRISAT 1994, Block RCE2, Irrigated
        variables -> /Simulations/Shared/paddock/outputfile/variables
        variables variables1
          Constants: constant Code=sd942a33; constant mat_class=S
      operations
        21/06/1994  pigeonpea sow population = 33 (plants/m^2), sowing_depth = 30. , cultivar = short_duration, row_spacing = 600
        21/06/1994  fertiliser apply amount = 100.0 (kg/ha) , depth = 50 ,type = nh4no3
  simulation sd961a33 - ICRISAT 1996, ICPL 4 -> /Simulations/Shared
    clock: start_date=25/5/1996; end_date=26/10/1996
    area paddock -> /Simulations/Shared/paddock
      outputfile: filename=sd961a33 - ICRISAT 1996, ICPL 4.out; title=sd961a33 - ICRISAT 1996, ICPL 4
        variables -> /Simulations/Shared/paddock/outputfile/variables
        variables variables1
          Constants: constant Code=sd961a33; constant mat_class=S
      operations
        23/06/1996  pigeonpea sow population = 33 (plants/m^2), sowing_depth = 30. , cultivar = short_duration, row_spacing = 300
        23/06/1996  fertiliser apply amount = 100.0 (kg/ha) , depth = 50 ,type = nh4no3
      irrigation: same as ed931a - ICRISAT 1993, Irrigated, ICPL 84023 - different sowing date.paddock.irrigation
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