folder Simulations: version=36; creator=Apsim 7.8-r4001
  simulation 3-Thirlstane_04
    metfile met: filename=latrobe.met
    clock
      start_date = 1/08/2003  # Select the start date of the simulation
      end_date = 30/05/2004  # Select the end date of the simulation
    summaryfile
    area paddock
      folder Manager folder
        manager Sowing rule
          # Sowing criteria
          date1 = 24-oct  # Enter sowing window START date (dd-mmm)
          date2 = 25-oct  # Enter sowing window END date (dd-mmm)
          must_sow = yes  # Must sow?
          raincrit = 0  # Amount of rainfall
          rainnumdays = 7  # Number of days of rainfall
          esw_amount = 0  # Enter minimum allowable available soil water (mm)
          # Sowing parameters
          crop = potato  # Enter name of crop to sow
          seeds = 6  # Enter sowing density (seeds/m2)
          depth = 20  # Enter sowing depth (mm)
          cultivar = russet  # Enter cultivar
          class = plant  # Enter crop growth class
          age = 150  # Enter physiological age (deg days)
          row_spacing = 320  # Enter row spacing (mm)
          on start_of_day:
```
      if (paddock_is_fallow() = 1 and FallowIn <> 'yes' and (NextCrop = 0 or NextCrop = '[crop]')) then
         if (date_within('[date1], [date2]') = 1) then
            if (rain[[rainnumdays]] >= [raincrit] AND esw >= [esw_amount]) OR
                ('[must_sow]' = 'yes' AND today = date('[date2]'))) THEN
               ChooseNextCrop = 'yes'   ! for rotations
               
!Set relationship between potential stem number per seed and seed age

              stem_per_seed = -100+(0.3*[age])                                  !Need estimate from IRS work

!Set maximum and minimum limits

              if stem_per_seed > 10 then                                               !Need estimate from IRS work
                 stem_per_seed = 10
              elseif stem_per_seed < 2 then                                         !Need estimate from IRS work
                 stem_per_seed = 2.9
              endif

!Soil temperature factor based on top layer average soil temperature on day of sowing only!!

              stf = st(1)/10                                                                            ! Assuming that optimum temp is 10dc

!Set upper and lower limits for stf and swf

              if (stf < 0) then
                  stf = 0
               endif
               if (stf > 1) then
                  stf = 1
               endif        
       
               swf = (sw(1) - ll(1))/(dul(1) - ll(1))
               if (swf < 0) then
                  swf = 0
               endif
               if (swf > 1) then
                  swf = 1
               endif

               density = [seeds] * stem_per_seed * stf * swf
               [crop] sow plants = density, sowing_depth = [depth], cultivar = [cultivar], row_spacing = [row_spacing], crop_class = [class]
            endif
            if today = date('[date2]') then
               ChooseNextCrop = 'yes'
            endif
         endif
      endif
```
        manager Harvesting rule
          # Harvesting criteria
          crop = potato  # Enter name of crop to harvest when ripe
          on end_of_day:
```
           if [crop].StageName = 'maturity' or [crop].plant_status = 'dead' then
              [crop]  harvest
              [crop]  end_crop
           endif
```
        manager Sowing fertiliser
          # When should fertiliser be applied
          modulename = potato  # On which module should the event come from
          eventname = sowing  # On which event should fertiliser be applied
          # Fertiliser application details
          fertmodule = fertiliser  # Module used to apply the fertiliser
          fert_amount_sow = 204  # Amount of starter fertiliser at sowing (kg/ha)
          fert_type_sow = NO3_N  # Sowing fertiliser type
          on [modulename].[eventname]:
```
        [fertmodule] apply amount = [fert_amount_sow] (kg/ha), depth = 50 (mm), type = [fert_type_sow]
```
        manager Fertilise on fixed date
          # When should fertiliser be applied
          fert_date = 7-dec  # Enter fertiliser date (dd-mmm)
          fert_criteria = 1000  # Don't add fertiliser if N in top 2 layers exceeds (kg/ha)
          # Fertiliser application details
          fertmodule = fertiliser  # Module used to apply the fertiliser
          fert_amount = 129  # Amount of fertiliser to apply (kg/ha)
          fert_type = urea_N  # Fertiliser type
          on start_of_day:
```
         if (today = date('[fert_date]') then
            N_topsoil = no3(1) + nh4(1) + no3(2) + nh4(2)
            if (N_topsoil < [fert_criteria]) then
               [fertmodule] apply amount = [fert_amount] (kg/ha), depth = 50 (mm), type = [fert_type] ()
            endif
         endif
```
      fertiliser
      surfaceom surface organic matter
        PoolName = wheat  # Organic Matter pool name
        type = wheat  # Organic Matter type
        mass = 1000.  # Initial surface residue (kg/ha)
        cnr = 80.0  # C:N ratio of initial residue
        standing_fraction = 0.0  # Fraction of residue standing
      outputfile: filename=3-Thirlstane_04.out; title=3-Thirlstane_04
        events Reporting Frequency: event=Daily  # End of day
        variables
          variable:
            dd/mm/yyyy as Date  # Date (dd/mm/yyyy)
            biomass  # Biomass
            lai
            LeafGreenWt
            StemGreenWt
            TuberGreenWt
            st(1)
            plants
            node_no
            node_no_sen
            stf
            stage  # Plant stage
            nfact_pheno  # N factor for phenology
            nfact_photo  # N factor for photosynthesis
            swdef_pheno  # Soil water deficit in phenological development
            swdef_photo  # Soil water deficit in photosynthesis
            StemGreenP
            density
            applied_irr_tot
            n_uptake  # N uptake
            stage  # Plant stage
      potato
      irrigation
        automatic_irrigation = off
        asw_depth = 600  # Depth to which ASW is calculated. (mm)
        crit_fr_asw = 0.5  # Fraction of ASW below which irrigation is applied (0-1.0)
        irrigation_efficiency = 1  # Efficiency of the irrigation. (0-1.0)
        default_no3_conc = 0.0  # Nitrate concentration (ppm N)
        default_nh4_conc = 0.0  # Ammonium concentration (ppm N)
        default_cl_conc = 0.0  # Chloride concentration (ppm Cl)
      manager Logic
        on init:
```
 irriginterval = 0
applied_irr_tot = 0
```
        on start_of_day:
```
 !tuber_no = (density * 0.3) + 2                          !Slope and intercept from IRS relationship
 !tuber_size = tuber_wt / tuber_no

irriginterval = irriginterval + 1

 if potato.plant_status = 'alive'  and (potato.stage > 3) and (potato.stage < 6) and (irriginterval > 10) then  
            'Cox_12 water' set dlt_sw_dep = 25.0 0.0 0.0 0.0 !0.0! 
           irriginterval = 0
           applied_irr_tot = applied_irr_tot + 25
 endif
```
      Soil Cox_12: Site=Cox Farm; Region=Central North Tasmania; State=Tasmania; Longitude=147.068
        Comment = Results from CSBP Soil & Plant Laboratory in Perth (Wesfarmers).  # Comments
        SoilType = Sandy loam  # Soil description
        NearestTown = Cressy
        NaturalVegetation = Agriculture
        Latitude = -41.6014  # Latitude (WGS84)
        LocationAccuracy = +/- 20m
        DataSource = Bill Cotching and Shaun Lisson, TIAR
        InitialWater Initial water: FractionFull=1.00; PercentMethod=EvenlyDistributed
        Water
          Thickness  BD    AirDry  LL15  DUL   SAT
          150        1.24  0.08    0.17  0.49  0.532
          130        1.47  0.07    0.11  0.39  0.445
          340        1.34  0.37    0.37  0.49  0.494
          590        1.34  0.35    0.35  0.48  0.49
          SoilCrop wheat: LL=[0.17, 0.11, 0.37, 0.35]; KL=[0.16, 0.16, 0.1, 0.05]; XF=[0.8, 0.9, 1, 0.2]
          SoilCrop canola: LL=[0.17, 0.11, 0.37, 0.35]; KL=[0.16, 0.16, 0.1, 0.05]; XF=[0.8, 0.9, 1, 0.2]
          SoilCrop fieldpea: LL=[0.17, 0.11, 0.37, 0.35]; KL=[0.16, 0.16, 0.1, 0.05]; XF=[0.8, 0.9, 1, 0.2]
          SoilCrop lucerne: LL=[0.17, 0.11, 0.37, 0.35]; KL=[0.16, 0.16, 0.1, 0.05]; XF=[0.8, 0.9, 1, 0.2]
          SoilCrop weed: LL=[0.17, 0.11, 0.37, 0.35]; KL=[0.16, 0.16, 0.1, 0.05]; XF=[0.8, 0.9, 1, 0.2]
          SoilCrop broccoli: LL=[0.17, 0.11, 0.37, 0.35]; KL=[0.16, 0.16, 0.1, 0.05]; XF=[0.8, 0.9, 1, 0.2]
          SoilCrop potato: LL=[0.17, 0.11, 0.37, 0.35]; KL=[0.06, 0.06, 0.06, 0.06]; XF=[1, 1, 1, 1]
        SoilWater: SummerCona=3.5; SummerU=6; SummerDate=1-Nov; WinterCona=2; WinterU=2; WinterDate=1-Apr; DiffusConst=88; DiffusSlope=36; Salb=0.1; CN2Bare=65; CNRed=20; CNCov=0.8
          Thickness  SWCON  MWCON
          150        0.5    1
          130        0.6    1
          340        0.7    1
          590        0.2    1
        SoilOrganicMatter: RootCN=30; RootWt=1500; SoilCN=14.5; EnrACoeff=7.4; EnrBCoeff=0.2
          Thickness  OC   FBiom  FInert
          150        0.7  0.04   0.1
          130        0.7  0.04   0.1
          340        0.4  0.03   0.1
          590        0.2  0.01   0.1
        Analysis: Thickness=[150, 130, 340, 590]; PH=[5, 5, 5, 5]
        Sample Initial nitrogen
          Thickness  NO3      NH4
          150        1.54007  0.0999815
          130        1.54007  0.0999815
          340        1.54007  0.0999815
          590        1.54007  0.0999815
  simulation 5-Deloraine_04
    metfile met: filename=deloraine.met
    clock
      start_date = 1/08/2003  # Select the start date of the simulation
      end_date = 31/07/2004  # Select the end date of the simulation
    summaryfile
    area paddock
      folder Manager folder
        manager Sowing rule
          # Sowing criteria
          date1 = 25-oct  # Enter sowing window START date (dd-mmm)
          date2 = 26-oct  # Enter sowing window END date (dd-mmm)
          must_sow = yes  # Must sow?
          raincrit = 0  # Amount of rainfall
          rainnumdays = 7  # Number of days of rainfall
          esw_amount = 0  # Enter minimum allowable available soil water (mm)
          # Sowing parameters
          crop = potato  # Enter name of crop to sow
          seeds = 6  # Enter sowing density (seeds/m2)
          depth = 20  # Enter sowing depth (mm)
          cultivar = russet  # Enter cultivar
          class = plant  # Enter crop growth class
          age = 150  # Enter physiological age (deg days)
          row_spacing = 815  # Enter row spacing (mm)
          on start_of_day:
```
      if (paddock_is_fallow() = 1 and FallowIn <> 'yes' and (NextCrop = 0 or NextCrop = '[crop]')) then
         if (date_within('[date1], [date2]') = 1) then
            if (rain[[rainnumdays]] >= [raincrit] AND esw >= [esw_amount]) OR
                ('[must_sow]' = 'yes' AND today = date('[date2]'))) THEN
               ChooseNextCrop = 'yes'   ! for rotations
               
!Set relationship between potential stem number per seed and seed age

              stem_per_seed = -100+(0.3*[age])                                  !Need estimate from IRS work

!Set maximum and minimum limits

              if stem_per_seed > 10 then                                               !Need estimate from IRS work
                 stem_per_seed = 10
              elseif stem_per_seed < 2 then                                         !Need estimate from IRS work
                 stem_per_seed = 3.0
              endif

!Soil temperature factor based on top layer average soil temperature on day of sowing only!!

              stf = st(1)/10                                                                            ! Assuming that optimum temp is 10dc

!Set upper and lower limits for stf and swf

              if (stf < 0) then
                  stf = 0
               endif
               if (stf > 1) then
                  stf = 1
               endif        
       
               swf = (sw(1) - ll(1))/(dul(1) - ll(1))
               if (swf < 0) then
                  swf = 0
               endif
               if (swf > 1) then
                  swf = 1
               endif

               density = [seeds] * stem_per_seed * stf * swf
               [crop] sow plants = density, sowing_depth = [depth], cultivar = [cultivar], row_spacing = [row_spacing], crop_class = [class]
            endif
            if today = date('[date2]') then
               ChooseNextCrop = 'yes'
            endif
         endif
      endif
```
        manager Harvesting rule
          # Harvesting criteria
          crop = potato  # Enter name of crop to harvest when ripe
          on end_of_day:
          script: same as in 3-Thirlstane_04.paddock.Manager folder.Harvesting rule
        manager Sowing fertiliser
          # When should fertiliser be applied
          modulename = potato  # On which module should the event come from
          eventname = sowing  # On which event should fertiliser be applied
          # Fertiliser application details
          fertmodule = fertiliser  # Module used to apply the fertiliser
          fert_amount_sow = 131  # Amount of starter fertiliser at sowing (kg/ha)
          fert_type_sow = NO3_N  # Sowing fertiliser type
          on [modulename].[eventname]:
          script: same as in 3-Thirlstane_04.paddock.Manager folder.Sowing fertiliser
        manager Fertilise on fixed date
          # When should fertiliser be applied
          fert_date = 8-dec  # Enter fertiliser date (dd-mmm)
          fert_criteria = 1000  # Don't add fertiliser if N in top 2 layers exceeds (kg/ha)
          # Fertiliser application details
          fertmodule = fertiliser  # Module used to apply the fertiliser
          fert_amount = 177  # Amount of fertiliser to apply (kg/ha)
          fert_type = urea_N  # Fertiliser type
          on start_of_day:
          script: same as in 3-Thirlstane_04.paddock.Manager folder.Fertilise on fixed date
      fertiliser
      surfaceom surface organic matter
        PoolName = wheat  # Organic Matter pool name
        type = wheat  # Organic Matter type
        mass = 1000.  # Initial surface residue (kg/ha)
        cnr = 80.0  # C:N ratio of initial residue
        standing_fraction = 0.0  # Fraction of residue standing
      outputfile: filename=5-Deloraine_04.out; title=5-Deloraine_04
        events Reporting Frequency: event=Daily  # End of day
        variables: same as 3-Thirlstane_04.paddock.outputfile.Variables
      potato
      irrigation: same as 3-Thirlstane_04.paddock.Irrigation
      manager Logic
        on init:
```
 irriginterval = 0
applied_irr_tot = 0
```
        on start_of_day:
```
 !tuber_no = (density * 0.3) + 2                          !Slope and intercept from IRS relationship
 !tuber_size = tuber_wt / tuber_no

irriginterval = irriginterval + 1

 if potato.plant_status = 'alive'  and (potato.stage > 3) and (potato.stage < 6) and (irriginterval > 9) then  
            'Cox_12 water' set dlt_sw_dep = 30.0 0.0 0.0 0.0 0.0! 
           irriginterval = 0
           applied_irr_tot = applied_irr_tot + 30
 endif
```
      Soil Cox_12: same as 3-Thirlstane_04.paddock.Cox_12
  simulation 6-Cuprona_04
    metfile met: filename=forthside.met
    clock
      start_date = 1/08/2003  # Select the start date of the simulation
      end_date = 30/06/2004  # Select the end date of the simulation
    summaryfile
    area paddock
      folder Manager folder
        manager Sowing rule
          # Sowing criteria
          date1 = 17-Oct  # Enter sowing window START date (dd-mmm)
          date2 = 18-oct  # Enter sowing window END date (dd-mmm)
          must_sow = yes  # Must sow?
          raincrit = 0  # Amount of rainfall
          rainnumdays = 7  # Number of days of rainfall
          esw_amount = 0  # Enter minimum allowable available soil water (mm)
          # Sowing parameters
          crop = potato  # Enter name of crop to sow
          seeds = 6  # Enter sowing density (seeds/m2)
          depth = 20  # Enter sowing depth (mm)
          cultivar = russet  # Enter cultivar
          class = plant  # Enter crop growth class
          age = 150  # Enter physiological age (deg days)
          row_spacing = 815  # Enter row spacing (mm)
          on start_of_day:
```
      if (paddock_is_fallow() = 1 and FallowIn <> 'yes' and (NextCrop = 0 or NextCrop = '[crop]')) then
         if (date_within('[date1], [date2]') = 1) then
            if (rain[[rainnumdays]] >= [raincrit] AND esw >= [esw_amount]) OR
                ('[must_sow]' = 'yes' AND today = date('[date2]'))) THEN
               ChooseNextCrop = 'yes'   ! for rotations
               
!Set relationship between potential stem number per seed and seed age

              stem_per_seed = -100+(0.3*[age])                                  !Need estimate from IRS work

!Set maximum and minimum limits

              if stem_per_seed > 10 then                                               !Need estimate from IRS work
                 stem_per_seed = 10
              elseif stem_per_seed < 2 then                                         !Need estimate from IRS work
                 stem_per_seed = 2.7
              endif

!Soil temperature factor based on top layer average soil temperature on day of sowing only!!

              stf = st(1)/10                                                                            ! Assuming that optimum temp is 10dc

!Set upper and lower limits for stf and swf

              if (stf < 0) then
                  stf = 0
               endif
               if (stf > 1) then
                  stf = 1
               endif        
       
               swf = (sw(1) - ll(1))/(dul(1) - ll(1))
               if (swf < 0) then
                  swf = 0
               endif
               if (swf > 1) then
                  swf = 1
               endif

               density = [seeds] * stem_per_seed * stf * swf
               [crop] sow plants = density, sowing_depth = [depth], cultivar = [cultivar], row_spacing = [row_spacing], crop_class = [class]
            endif
            if today = date('[date2]') then
               ChooseNextCrop = 'yes'
            endif
         endif
      endif
```
        manager Harvesting rule
          # Harvesting criteria
          crop = potato  # Enter name of crop to harvest when ripe
          on end_of_day:
          script: same as in 3-Thirlstane_04.paddock.Manager folder.Harvesting rule
        manager Sowing fertiliser
          # When should fertiliser be applied
          modulename = potato  # On which module should the event come from
          eventname = sowing  # On which event should fertiliser be applied
          # Fertiliser application details
          fertmodule = fertiliser  # Module used to apply the fertiliser
          fert_amount_sow = 168  # Amount of starter fertiliser at sowing (kg/ha)
          fert_type_sow = NO3_N  # Sowing fertiliser type
          on [modulename].[eventname]:
          script: same as in 3-Thirlstane_04.paddock.Manager folder.Sowing fertiliser
        manager Fertilise on fixed date
          # When should fertiliser be applied
          fert_date = 1-dec  # Enter fertiliser date (dd-mmm)
          fert_criteria = 1000  # Don't add fertiliser if N in top 2 layers exceeds (kg/ha)
          # Fertiliser application details
          fertmodule = fertiliser  # Module used to apply the fertiliser
          fert_amount = 230  # Amount of fertiliser to apply (kg/ha)
          fert_type = urea_N  # Fertiliser type
          on start_of_day:
          script: same as in 3-Thirlstane_04.paddock.Manager folder.Fertilise on fixed date
      fertiliser
      surfaceom surface organic matter
        PoolName = wheat  # Organic Matter pool name
        type = wheat  # Organic Matter type
        mass = 1000.  # Initial surface residue (kg/ha)
        cnr = 80.0  # C:N ratio of initial residue
        standing_fraction = 0.0  # Fraction of residue standing
      outputfile: filename=6-Cuprona_04.out; title=6-Cuprona_04
        events Reporting Frequency: event=Daily  # End of day
        variables: same as 3-Thirlstane_04.paddock.outputfile.Variables
      potato
      irrigation: same as 3-Thirlstane_04.paddock.Irrigation
      manager Logic
        on init:
```
 irriginterval = 0
applied_irr_tot = 0
```
        on start_of_day:
```
 !tuber_no = (density * 0.3) + 2                          !Slope and intercept from IRS relationship
 !tuber_size = tuber_wt / tuber_no

irriginterval = irriginterval + 1

 if potato.plant_status = 'alive'  and (potato.stage > 3) and (potato.stage < 6) and (irriginterval > 9) then  
            'Chilvers_10 water' set dlt_sw_dep = 30.0 0.0 0.0 0.0 !0.0! 
           irriginterval = 0
           applied_irr_tot = applied_irr_tot + 30
 endif
```
      Soil Chilvers_10: Site=Chilvers Farm; Region=Central North Tasmania; State=Tasmania; Longitude=147.072
        Comment = Results from CSBP Soil & Plant Laboratory in Perth (Wesfarmers).  # Comments
        SoilType = Medium clay  # Soil description
        NearestTown = Cressy
        NaturalVegetation = Agriculture
        Latitude = -41.627  # Latitude (WGS84)
        LocationAccuracy = +/- 20m
        DataSource = Bill Cotching and Shaun Lisson, TIAR
        InitialWater Initial water: FractionFull=1.00; PercentMethod=EvenlyDistributed
        Water
          Thickness  BD    AirDry  LL15  DUL   SAT
          250        1.15  0.13    0.26  0.5   0.56
          200        1.35  0.22    0.24  0.47  0.49
          350        1.71  0.11    0.11  0.31  0.35
          300        1.97  0.15    0.15  0.25  0.257
          SoilCrop wheat: LL=[0.26, 0.24, 0.11, 0.15]; KL=[0.16, 0.16, 0.1, 0.05]; XF=[0.9, 1, 0.5, 0.2]
          SoilCrop canola: LL=[0.26, 0.24, 0.11, 0.15]; KL=[0.16, 0.16, 0.1, 0.05]; XF=[0.9, 1, 0.5, 0.2]
          SoilCrop fieldpea: LL=[0.26, 0.24, 0.11, 0.15]; KL=[0.16, 0.16, 0.1, 0.05]; XF=[0.9, 1, 0.5, 0.2]
          SoilCrop lucerne: LL=[0.26, 0.24, 0.11, 0.15]; KL=[0.16, 0.16, 0.1, 0.05]; XF=[0.9, 1, 0.5, 0.2]
          SoilCrop weed: LL=[0.26, 0.24, 0.11, 0.15]; KL=[0.16, 0.16, 0.1, 0.05]; XF=[0.9, 1, 0.5, 0.2]
          SoilCrop broccoli: LL=[0.26, 0.24, 0.11, 0.15]; KL=[0.16, 0.16, 0.1, 0.05]; XF=[0.9, 1, 0.5, 0.2]
          SoilCrop potato: LL=[0.26, 0.24, 0.11, 0.15]; KL=[0.06, 0.06, 0.06, 0.06]; XF=[1, 1, 1, 1]
        SoilWater: SummerCona=3.5; SummerU=6; SummerDate=1-Nov; WinterCona=2; WinterU=2; WinterDate=1-Apr; DiffusConst=40; DiffusSlope=16; Salb=0.1; CN2Bare=70; CNRed=20; CNCov=0.8
          Thickness  SWCON  MWCON
          250        0.4    1
          200        0.5    1
          350        0.5    1
          300        0.2    1
        SoilOrganicMatter: RootCN=30; RootWt=1500; SoilCN=14.5; EnrACoeff=7.4; EnrBCoeff=0.2
          Thickness  OC   FBiom  FInert
          250        0.7  0.04   0.1
          200        0.7  0.04   0.1
          350        0.4  0.03   0.1
          300        0.2  0.01   0.1
        Analysis: Thickness=[250, 200, 350, 300]; PH=[5, 5, 5, 5]
        Sample Initial nitrogen
          Thickness  NO3      NH4
          250        1.43102  0.1
          200        1.43102  0.1
          350        1.43102  0.1
          300        1.43102  0.1
  simulation 8-Deloraine_05
    metfile met: filename=deloraine.met
    clock
      start_date = 1/08/2004  # Select the start date of the simulation
      end_date = 30/06/2005  # Select the end date of the simulation
    summaryfile
    area paddock
      folder Manager folder
        manager Sowing rule
          # Sowing criteria
          date1 = 26-oct  # Enter sowing window START date (dd-mmm)
          date2 = 27-oct  # Enter sowing window END date (dd-mmm)
          must_sow = yes  # Must sow?
          raincrit = 0  # Amount of rainfall
          rainnumdays = 7  # Number of days of rainfall
          esw_amount = 0  # Enter minimum allowable available soil water (mm)
          # Sowing parameters
          crop = potato  # Enter name of crop to sow
          seeds = 6  # Enter sowing density (seeds/m2)
          depth = 20  # Enter sowing depth (mm)
          cultivar = russet  # Enter cultivar
          class = plant  # Enter crop growth class
          age = 150  # Enter physiological age (deg days)
          row_spacing = 815  # Enter row spacing (mm)
          on start_of_day:
```
      if (paddock_is_fallow() = 1 and FallowIn <> 'yes' and (NextCrop = 0 or NextCrop = '[crop]')) then
         if (date_within('[date1], [date2]') = 1) then
            if (rain[[rainnumdays]] >= [raincrit] AND esw >= [esw_amount]) OR
                ('[must_sow]' = 'yes' AND today = date('[date2]'))) THEN
               ChooseNextCrop = 'yes'   ! for rotations
               
!Set relationship between potential stem number per seed and seed age

              stem_per_seed = -100+(0.3*[age])                                  !Need estimate from IRS work

!Set maximum and minimum limits

              if stem_per_seed > 10 then                                               !Need estimate from IRS work
                 stem_per_seed = 10
              elseif stem_per_seed < 2 then                                         !Need estimate from IRS work
                 stem_per_seed = 2.8
              endif

!Soil temperature factor based on top layer average soil temperature on day of sowing only!!

              stf = st(1)/10                                                                            ! Assuming that optimum temp is 10dc

!Set upper and lower limits for stf and swf

              if (stf < 0) then
                  stf = 0
               endif
               if (stf > 1) then
                  stf = 1
               endif        
       
               swf = (sw(1) - ll(1))/(dul(1) - ll(1))
               if (swf < 0) then
                  swf = 0
               endif
               if (swf > 1) then
                  swf = 1
               endif

               density = [seeds] * stem_per_seed * stf * swf
               [crop] sow plants = density, sowing_depth = [depth], cultivar = [cultivar], row_spacing = [row_spacing], crop_class = [class]
            endif
            if today = date('[date2]') then
               ChooseNextCrop = 'yes'
            endif
         endif
      endif
```
        manager Harvesting rule
          # Harvesting criteria
          crop = potato  # Enter name of crop to harvest when ripe
          on end_of_day:
          script: same as in 3-Thirlstane_04.paddock.Manager folder.Harvesting rule
        manager Sowing fertiliser
          # When should fertiliser be applied
          modulename = potato  # On which module should the event come from
          eventname = sowing  # On which event should fertiliser be applied
          # Fertiliser application details
          fertmodule = fertiliser  # Module used to apply the fertiliser
          fert_amount_sow = 170  # Amount of starter fertiliser at sowing (kg/ha)
          fert_type_sow = NO3_N  # Sowing fertiliser type
          on [modulename].[eventname]:
          script: same as in 3-Thirlstane_04.paddock.Manager folder.Sowing fertiliser
        manager Fertilise on fixed date
          # When should fertiliser be applied
          fert_date = 10-dec  # Enter fertiliser date (dd-mmm)
          fert_criteria = 1000  # Don't add fertiliser if N in top 2 layers exceeds (kg/ha)
          # Fertiliser application details
          fertmodule = fertiliser  # Module used to apply the fertiliser
          fert_amount = 207  # Amount of fertiliser to apply (kg/ha)
          fert_type = urea_N  # Fertiliser type
          on start_of_day:
          script: same as in 3-Thirlstane_04.paddock.Manager folder.Fertilise on fixed date
      fertiliser
      surfaceom surface organic matter
        PoolName = wheat  # Organic Matter pool name
        type = wheat  # Organic Matter type
        mass = 1000.  # Initial surface residue (kg/ha)
        cnr = 80.0  # C:N ratio of initial residue
        standing_fraction = 0.0  # Fraction of residue standing
      outputfile: filename=8-Deloraine_05.out; title=8-Deloraine_05
        events Reporting Frequency: event=Daily  # End of day
        variables: same as 3-Thirlstane_04.paddock.outputfile.Variables
      potato
      irrigation: same as 3-Thirlstane_04.paddock.Irrigation
      manager Logic
        on init:
```
 irriginterval = 0
applied_irr_tot = 0
```
        on start_of_day:
```
 !tuber_no = (density * 0.3) + 2                          !Slope and intercept from IRS relationship
 !tuber_size = tuber_wt / tuber_no

irriginterval = irriginterval + 1

 if potato.plant_status = 'alive'  and (potato.stage > 3) and (potato.stage < 6) and (irriginterval > 9) then  
            'Bond_4 water' set dlt_sw_dep = 25.0 0.0 0.0 0.0 0.0! 
           irriginterval = 0
           applied_irr_tot = applied_irr_tot + 25
 endif
```
      Soil Bond_4: Site=Bond farm; Region=Central North Tasmania; State=Tasmania; Longitude=147.013
        Comment = Results from CSBP Soil & Plant Laboratory in Perth (Wesfarmers).  # Comments
        SoilType = Sandy loam  # Soil description
        NearestTown = Cressy
        NaturalVegetation = Agriculture
        Latitude = -41.6909  # Latitude (WGS84)
        LocationAccuracy = +/- 20m
        DataSource = Bill Cotching and Shaun Lisson, TIAR
        InitNitrogen Initial nitrogen
          PercentMethod: Percent=0
        InitialWater Initial water: FractionFull=0; PercentMethod=EvenlyDistributed
        Water
          Thickness  BD    AirDry  LL15  DUL   SAT
          200        1.46  0.02    0.05  0.34  0.449
          270        1.71  0.01    0.02  0.26  0.34
          450        1.71  0.02    0.02  0.26  0.34
          320        2.06  0.09    0.09  0.17  0.223
          760        1.27  0.35    0.35  0.51  0.52
          SoilCrop wheat: LL=[0.05, 0.02, 0.02, 0.09, 0.35]; KL=[0.16, 0.16, 0.1, 0.05, 0.01]; XF=[1, 0.6, 0.5, 0.5, 0.1]
          SoilCrop canola: LL=[0.05, 0.02, 0.02, 0.09, 0.35]; KL=[0.16, 0.16, 0.1, 0.05, 0.01]; XF=[1, 0.6, 0.5, 0.5, 0.1]
          SoilCrop fieldpea: LL=[0.05, 0.02, 0.02, 0.09, 0.35]; KL=[0.16, 0.16, 0.1, 0.05, 0.01]; XF=[1, 0.6, 0.5, 0.5, 0.1]
          SoilCrop lucerne: LL=[0.05, 0.02, 0.02, 0.09, 0.35]; KL=[0.16, 0.16, 0.1, 0.05, 0.01]; XF=[1, 0.6, 0.5, 0.5, 0.1]
          SoilCrop weed: LL=[0.05, 0.02, 0.02, 0.09, 0.35]; KL=[0.16, 0.16, 0.1, 0.05, 0.01]; XF=[1, 0.6, 0.5, 0.5, 0.1]
          SoilCrop broccoli: LL=[0.05, 0.02, 0.02, 0.09, 0.35]; KL=[0.16, 0.16, 0.1, 0.05, 0.01]; XF=[1, 0.6, 0.5, 0.5, 0.1]
          SoilCrop potato: LL=[0.05, 0.02, 0.02, 0.09, 0.35]; KL=[0.16, 0.16, 0.1, 0.05, 0.01]; XF=[1, 1, 1, 1, 1]
        SoilWater: SummerCona=3.5; SummerU=6; SummerDate=1-Nov; WinterCona=2; WinterU=2; WinterDate=1-Apr; DiffusConst=88; DiffusSlope=36; Salb=0.1; CN2Bare=65; CNRed=20; CNCov=0.8
          Thickness  SWCON  MWCON
          200        0.7    1
          270        0.5    1
          450        0.5    1
          320        0.3    1
          760        0.1    1
        SoilOrganicMatter: RootCN=30; RootWt=1500; SoilCN=14.5; EnrACoeff=7.4; EnrBCoeff=0.2
          Thickness  OC    FBiom  FInert
          200        2.05  0.04   0.1
          270        0.19  0.04   0.1
          450        0.19  0.03   0.1
          320        0.08  0.01   0.1
          760        0.21  0.01   0.1
        Analysis: Thickness=[200, 270, 450, 320, 760]; PH=[5, 5, 5, 5, 5]
        Sample Soil sample: Thickness=[3000]; NO3=[0]; NH4=[0]; SW=[0]
  simulation 9-Latrobe_05
    metfile met: filename=latrobe.met
    clock
      start_date = 1/08/2004  # Select the start date of the simulation
      end_date = 30/06/2005  # Select the end date of the simulation
    summaryfile
    area paddock
      folder Manager folder
        manager Sowing rule
          # Sowing criteria
          date1 = 14-oct  # Enter sowing window START date (dd-mmm)
          date2 = 15-oct  # Enter sowing window END date (dd-mmm)
          must_sow = yes  # Must sow?
          raincrit = 0  # Amount of rainfall
          rainnumdays = 7  # Number of days of rainfall
          esw_amount = 0  # Enter minimum allowable available soil water (mm)
          # Sowing parameters
          crop = potato  # Enter name of crop to sow
          seeds = 6  # Enter sowing density (seeds/m2)
          depth = 20  # Enter sowing depth (mm)
          cultivar = russet  # Enter cultivar
          class = plant  # Enter crop growth class
          age = 150  # Enter physiological age (deg days)
          row_spacing = 815  # Enter row spacing (mm)
          on start_of_day:
```
      if (paddock_is_fallow() = 1 and FallowIn <> 'yes' and (NextCrop = 0 or NextCrop = '[crop]')) then
         if (date_within('[date1], [date2]') = 1) then
            if (rain[[rainnumdays]] >= [raincrit] AND esw >= [esw_amount]) OR
                ('[must_sow]' = 'yes' AND today = date('[date2]'))) THEN
               ChooseNextCrop = 'yes'   ! for rotations
               
!Set relationship between potential stem number per seed and seed age

              stem_per_seed = -100+(0.3*[age])                                  !Need estimate from IRS work

!Set maximum and minimum limits

              if stem_per_seed > 10 then                                               !Need estimate from IRS work
                 stem_per_seed = 10
              elseif stem_per_seed < 2 then                                         !Need estimate from IRS work
                 stem_per_seed = 3.8
              endif

!Soil temperature factor based on top layer average soil temperature on day of sowing only!!

              stf = st(1)/10                                                                            ! Assuming that optimum temp is 10dc

!Set upper and lower limits for stf and swf

              if (stf < 0) then
                  stf = 0
               endif
               if (stf > 1) then
                  stf = 1
               endif        
       
               swf = (sw(1) - ll(1))/(dul(1) - ll(1))
               if (swf < 0) then
                  swf = 0
               endif
               if (swf > 1) then
                  swf = 1
               endif

               density = [seeds] * stem_per_seed * stf * swf
               [crop] sow plants = density, sowing_depth = [depth], cultivar = [cultivar], row_spacing = [row_spacing], crop_class = [class]
            endif
            if today = date('[date2]') then
               ChooseNextCrop = 'yes'
            endif
         endif
      endif
```
        manager Harvesting rule
          # Harvesting criteria
          crop = potato  # Enter name of crop to harvest when ripe
          on end_of_day:
          script: same as in 3-Thirlstane_04.paddock.Manager folder.Harvesting rule
        manager Sowing fertiliser
          # When should fertiliser be applied
          modulename = potato  # On which module should the event come from
          eventname = sowing  # On which event should fertiliser be applied
          # Fertiliser application details
          fertmodule = fertiliser  # Module used to apply the fertiliser
          fert_amount_sow = 150  # Amount of starter fertiliser at sowing (kg/ha)
          fert_type_sow = NO3_N  # Sowing fertiliser type
          on [modulename].[eventname]:
          script: same as in 3-Thirlstane_04.paddock.Manager folder.Sowing fertiliser
        manager Fertilise on fixed date
          # When should fertiliser be applied
          fert_date = 1-dec  # Enter fertiliser date (dd-mmm)
          fert_criteria = 1000  # Don't add fertiliser if N in top 2 layers exceeds (kg/ha)
          # Fertiliser application details
          fertmodule = fertiliser  # Module used to apply the fertiliser
          fert_amount = 168  # Amount of fertiliser to apply (kg/ha)
          fert_type = urea_N  # Fertiliser type
          on start_of_day:
          script: same as in 3-Thirlstane_04.paddock.Manager folder.Fertilise on fixed date
      fertiliser
      surfaceom surface organic matter
        PoolName = wheat  # Organic Matter pool name
        type = wheat  # Organic Matter type
        mass = 1000.  # Initial surface residue (kg/ha)
        cnr = 80.0  # C:N ratio of initial residue
        standing_fraction = 0.0  # Fraction of residue standing
      outputfile: filename=9-Latrobe_05.out; title=9-Latrobe_05
        events Reporting Frequency: event=Daily  # End of day
        variables: same as 3-Thirlstane_04.paddock.outputfile.Variables
      potato
      irrigation: same as 3-Thirlstane_04.paddock.Irrigation
      manager Logic
        on init:
```
 irriginterval = 0
applied_irr_tot = 0
```
        on start_of_day:
```
 !tuber_no = (density * 0.3) + 2                          !Slope and intercept from IRS relationship
 !tuber_size = tuber_wt / tuber_no

irriginterval = irriginterval + 1

 if potato.plant_status = 'alive'  and (potato.stage > 3) and (potato.stage < 6) and (irriginterval > 10) then  
            'Cox_12 water' set dlt_sw_dep = 30.0 0.0 0.0 0.0 !0.0! 
           irriginterval = 0
           applied_irr_tot = applied_irr_tot + 30
 endif
```
      Soil Cox_12: same as 3-Thirlstane_04.paddock.Cox_12
  simulation 10-S_Creek_05
    metfile met: filename=wynyard.met
    clock
      start_date = 1/08/2004  # Select the start date of the simulation
      end_date = 30/06/2005  # Select the end date of the simulation
    summaryfile
    area paddock
      folder Manager folder
        manager Sowing rule
          # Sowing criteria
          date1 = 4-oct  # Enter sowing window START date (dd-mmm)
          date2 = 5-oct  # Enter sowing window END date (dd-mmm)
          must_sow = yes  # Must sow?
          raincrit = 0  # Amount of rainfall
          rainnumdays = 7  # Number of days of rainfall
          esw_amount = 0  # Enter minimum allowable available soil water (mm)
          # Sowing parameters
          crop = potato  # Enter name of crop to sow
          seeds = 20  # Enter sowing density (seeds/m2)
          depth = 20  # Enter sowing depth (mm)
          cultivar = russet  # Enter cultivar
          class = plant  # Enter crop growth class
          age = 150  # Enter physiological age (deg days)
          row_spacing = 320  # Enter row spacing (mm)
          on start_of_day:
```
      if (paddock_is_fallow() = 1 and FallowIn <> 'yes' and (NextCrop = 0 or NextCrop = '[crop]')) then
         if (date_within('[date1], [date2]') = 1) then
            if (rain[[rainnumdays]] >= [raincrit] AND esw >= [esw_amount]) OR
                ('[must_sow]' = 'yes' AND today = date('[date2]'))) THEN
               ChooseNextCrop = 'yes'   ! for rotations
               
!Set relationship between potential stem number per seed and seed age

              stem_per_seed = -100+(0.3*[age])                                  !Need estimate from IRS work

!Set maximum and minimum limits

              if stem_per_seed > 10 then                                               !Need estimate from IRS work
                 stem_per_seed = 10
              elseif stem_per_seed < 2 then                                         !Need estimate from IRS work
                 stem_per_seed = 2.4
              endif

!Soil temperature factor based on top layer average soil temperature on day of sowing only!!

              stf = st(1)/10                                                                            ! Assuming that optimum temp is 10dc

!Set upper and lower limits for stf and swf

              if (stf < 0) then
                  stf = 0
               endif
               if (stf > 1) then
                  stf = 1
               endif        
       
               swf = (sw(1) - ll(1))/(dul(1) - ll(1))
               if (swf < 0) then
                  swf = 0
               endif
               if (swf > 1) then
                  swf = 1
               endif

               density = [seeds] * stem_per_seed * stf * swf
               [crop] sow plants = density, sowing_depth = [depth], cultivar = [cultivar], row_spacing = [row_spacing], crop_class = [class]
            endif
            if today = date('[date2]') then
               ChooseNextCrop = 'yes'
            endif
         endif
      endif
```
        manager Harvesting rule
          # Harvesting criteria
          crop = potato  # Enter name of crop to harvest when ripe
          on end_of_day:
          script: same as in 3-Thirlstane_04.paddock.Manager folder.Harvesting rule
        manager Sowing fertiliser
          # When should fertiliser be applied
          modulename = potato  # On which module should the event come from
          eventname = sowing  # On which event should fertiliser be applied
          # Fertiliser application details
          fertmodule = fertiliser  # Module used to apply the fertiliser
          fert_amount_sow = 216  # Amount of starter fertiliser at sowing (kg/ha)
          fert_type_sow = NO3_N  # Sowing fertiliser type
          on [modulename].[eventname]:
          script: same as in 3-Thirlstane_04.paddock.Manager folder.Sowing fertiliser
        manager Fertilise on fixed date
          # When should fertiliser be applied
          fert_date = 25-nov  # Enter fertiliser date (dd-mmm)
          fert_criteria = 1000  # Don't add fertiliser if N in top 2 layers exceeds (kg/ha)
          # Fertiliser application details
          fertmodule = fertiliser  # Module used to apply the fertiliser
          fert_amount = 110  # Amount of fertiliser to apply (kg/ha)
          fert_type = urea_N  # Fertiliser type
          on start_of_day:
          script: same as in 3-Thirlstane_04.paddock.Manager folder.Fertilise on fixed date
      fertiliser
      surfaceom surface organic matter
        PoolName = wheat  # Organic Matter pool name
        type = wheat  # Organic Matter type
        mass = 1000.  # Initial surface residue (kg/ha)
        cnr = 80.0  # C:N ratio of initial residue
        standing_fraction = 0.0  # Fraction of residue standing
      outputfile: filename=10-S_Creek_05.out; title=10-S_Creek_05
        events Reporting Frequency: event=Daily  # End of day
        variables: same as 3-Thirlstane_04.paddock.outputfile.Variables
      potato
      irrigation: same as 3-Thirlstane_04.paddock.Irrigation
      manager Logic
        on init:
```
 irriginterval = 0
applied_irr_tot = 0
```
        on start_of_day:
```
 !tuber_no = (density * 0.3) + 2                          !Slope and intercept from IRS relationship
 !tuber_size = tuber_wt / tuber_no

irriginterval = irriginterval + 1

 if potato.plant_status = 'alive'  and (potato.stage > 3) and (potato.stage < 6) and (irriginterval > 12) then  
            'Tulich_3 water' set dlt_sw_dep = 30.0 0.0 0.0 0.0! 0.0! 
           irriginterval = 0
           applied_irr_tot = applied_irr_tot + 30
 endif
```
      Soil Tulich_3: Site=Anderson Farm; Region=Central North Tasmania; State=Tasmania; Longitude=147.059
        Comment = Results from CSBP Soil & Plant Laboratory in Perth (Wesfarmers).  # Comments
        SoilType = Medium clay  # Soil description
        NearestTown = Cressy
        NaturalVegetation = Agriculture
        Latitude = -41.6445  # Latitude (WGS84)
        LocationAccuracy = +/- 20m
        DataSource = Bill Cotching and Shaun Lisson, TIAR
        InitNitrogen Initial nitrogen
          PercentMethod: Percent=0
        InitialWater Initial water: FractionFull=0; PercentMethod=EvenlyDistributed
        Water
          Thickness  BD    AirDry  LL15  DUL   SAT
          230        1.05  0.09    0.19  0.44  0.59
          200        1.07  0.33    0.37  0.55  0.59
          370        1.13  0.34    0.34  0.54  0.56
          400        1.13  0.34    0.34  0.54  0.56
          SoilCrop wheat: LL=[0.19, 0.37, 0.34, 0.34]; KL=[0.16, 0.16, 0.1, 0.05]; XF=[1, 0.1, 0.1, 0.1]
          SoilCrop canola: LL=[0.19, 0.37, 0.34, 0.34]; KL=[0.16, 0.16, 0.1, 0.05]; XF=[1, 0.1, 0.1, 0.1]
          SoilCrop fieldpea: LL=[0.19, 0.37, 0.34, 0.34]; KL=[0.16, 0.16, 0.1, 0.05]; XF=[1, 0.1, 0.1, 0.1]
          SoilCrop lucerne: LL=[0.19, 0.37, 0.34, 0.34]; KL=[0.16, 0.16, 0.1, 0.05]; XF=[1, 0.1, 0.1, 0.1]
          SoilCrop weed: LL=[0.19, 0.37, 0.34, 0.34]; KL=[0.16, 0.16, 0.1, 0.05]; XF=[1, 0.1, 0.1, 0.1]
          SoilCrop broccoli: LL=[0.19, 0.37, 0.34, 0.34]; KL=[0.16, 0.16, 0.1, 0.05]; XF=[1, 0.1, 0.1, 0.1]
          SoilCrop potato: LL=[0.19, 0.37, 0.34, 0.34]; KL=[0.06, 0.06, 0.06, 0.06]; XF=[1, 1, 1, 1]
        SoilWater: SummerCona=3.5; SummerU=6; SummerDate=1-Nov; WinterCona=2; WinterU=2; WinterDate=1-Apr; DiffusConst=40; DiffusSlope=16; Salb=0.1; CN2Bare=70; CNRed=20; CNCov=0.8
          Thickness  SWCON  MWCON
          230        0.5    1
          200        0.1    1
          370        0.1    1
          400        0.1    1
        SoilOrganicMatter: RootCN=30; RootWt=1500; SoilCN=14.5; EnrACoeff=7.4; EnrBCoeff=0.2
          Thickness  OC   FBiom  FInert
          230        0.7  0.04   0.1
          200        0.7  0.04   0.1
          370        0.4  0.03   0.1
          400        0.2  0.01   0.1
        Analysis: Thickness=[230, 200, 370, 400]; PH=[5, 5, 5, 5]
        Sample Soil sample: Thickness=[3000]; NO3=[0]; NH4=[0]; SW=[0]
  simulation 12-Thrilstane_05
    metfile met: filename=latrobe.met
    clock
      start_date = 1/08/2004  # Select the start date of the simulation
      end_date = 31/07/2005  # Select the end date of the simulation
    summaryfile
    area paddock
      folder Manager folder
        manager Sowing rule
          # Sowing criteria
          date1 = 18-oct  # Enter sowing window START date (dd-mmm)
          date2 = 19-oct  # Enter sowing window END date (dd-mmm)
          must_sow = yes  # Must sow?
          raincrit = 0  # Amount of rainfall
          rainnumdays = 7  # Number of days of rainfall
          esw_amount = 0  # Enter minimum allowable available soil water (mm)
          # Sowing parameters
          crop = potato  # Enter name of crop to sow
          seeds = 6  # Enter sowing density (seeds/m2)
          depth = 20  # Enter sowing depth (mm)
          cultivar = russet  # Enter cultivar
          class = plant  # Enter crop growth class
          age = 150  # Enter physiological age (deg days)
          row_spacing = 815  # Enter row spacing (mm)
          on start_of_day:
          script: same as in 6-Cuprona_04.paddock.Manager folder.Sowing rule
        manager Harvesting rule
          # Harvesting criteria
          crop = potato  # Enter name of crop to harvest when ripe
          on end_of_day:
          script: same as in 3-Thirlstane_04.paddock.Manager folder.Harvesting rule
        manager Sowing fertiliser
          # When should fertiliser be applied
          modulename = potato  # On which module should the event come from
          eventname = sowing  # On which event should fertiliser be applied
          # Fertiliser application details
          fertmodule = fertiliser  # Module used to apply the fertiliser
          fert_amount_sow = 210  # Amount of starter fertiliser at sowing (kg/ha)
          fert_type_sow = NO3_N  # Sowing fertiliser type
          on [modulename].[eventname]:
          script: same as in 3-Thirlstane_04.paddock.Manager folder.Sowing fertiliser
        manager Fertilise on fixed date
          # When should fertiliser be applied
          fert_date = 1-dec  # Enter fertiliser date (dd-mmm)
          fert_criteria = 1000  # Don't add fertiliser if N in top 2 layers exceeds (kg/ha)
          # Fertiliser application details
          fertmodule = fertiliser  # Module used to apply the fertiliser
          fert_amount = 99  # Amount of fertiliser to apply (kg/ha)
          fert_type = urea_N  # Fertiliser type
          on start_of_day:
          script: same as in 3-Thirlstane_04.paddock.Manager folder.Fertilise on fixed date
      fertiliser
      surfaceom surface organic matter
        PoolName = wheat  # Organic Matter pool name
        type = wheat  # Organic Matter type
        mass = 1000.  # Initial surface residue (kg/ha)
        cnr = 80.0  # C:N ratio of initial residue
        standing_fraction = 0.0  # Fraction of residue standing
      outputfile: filename=12-Thrilstane_05.out; title=12-Thrilstane_05
        events Reporting Frequency: event=Daily  # End of day
        variables: same as 3-Thirlstane_04.paddock.outputfile.Variables
      potato
      irrigation: same as 3-Thirlstane_04.paddock.Irrigation
      manager Logic
        on init:
```
 irriginterval = 0
applied_irr_tot = 0
```
        on start_of_day:
```
 !tuber_no = (density * 0.3) + 2                          !Slope and intercept from IRS relationship
 !tuber_size = tuber_wt / tuber_no

irriginterval = irriginterval + 1

 if potato.plant_status = 'alive'  and (potato.stage > 3) and (potato.stage < 6) and (irriginterval > 10) then  
            'Chilvers_10 water' set dlt_sw_dep = 25.0 0.0 0.0 0.0 !0.0! 
           irriginterval = 0
           applied_irr_tot = applied_irr_tot + 25
 endif
```
      Soil Chilvers_10: same as 6-Cuprona_04.paddock.Chilvers_10
  simulation 14-Deloraine1_06
    metfile met: filename=deloraine.met
    clock
      start_date = 1/08/2005  # Select the start date of the simulation
      end_date = 30/07/2006  # Select the end date of the simulation
    summaryfile
    area paddock
      folder Manager folder
        manager Sowing rule
          # Sowing criteria
          date1 = 7-nov  # Enter sowing window START date (dd-mmm)
          date2 = 8-nov  # Enter sowing window END date (dd-mmm)
          must_sow = yes  # Must sow?
          raincrit = 0  # Amount of rainfall
          rainnumdays = 7  # Number of days of rainfall
          esw_amount = 0  # Enter minimum allowable available soil water (mm)
          # Sowing parameters
          crop = potato  # Enter name of crop to sow
          seeds = 6  # Enter sowing density (seeds/m2)
          depth = 20  # Enter sowing depth (mm)
          cultivar = russet  # Enter cultivar
          class = plant  # Enter crop growth class
          age = 150  # Enter physiological age (deg days)
          row_spacing = 815  # Enter row spacing (mm)
          on start_of_day:
```
      if (paddock_is_fallow() = 1 and FallowIn <> 'yes' and (NextCrop = 0 or NextCrop = '[crop]')) then
         if (date_within('[date1], [date2]') = 1) then
            if (rain[[rainnumdays]] >= [raincrit] AND esw >= [esw_amount]) OR
                ('[must_sow]' = 'yes' AND today = date('[date2]'))) THEN
               ChooseNextCrop = 'yes'   ! for rotations
               
!Set relationship between potential stem number per seed and seed age

              stem_per_seed = -100+(0.3*[age])                                  !Need estimate from IRS work

!Set maximum and minimum limits

              if stem_per_seed > 10 then                                               !Need estimate from IRS work
                 stem_per_seed = 10
              elseif stem_per_seed < 2 then                                         !Need estimate from IRS work
                 stem_per_seed = 4.5
              endif

!Soil temperature factor based on top layer average soil temperature on day of sowing only!!

              stf = st(1)/10                                                                            ! Assuming that optimum temp is 10dc

!Set upper and lower limits for stf and swf

              if (stf < 0) then
                  stf = 0
               endif
               if (stf > 1) then
                  stf = 1
               endif        
       
               swf = (sw(1) - ll(1))/(dul(1) - ll(1))
               if (swf < 0) then
                  swf = 0
               endif
               if (swf > 1) then
                  swf = 1
               endif

               density = [seeds] * stem_per_seed * stf * swf
               [crop] sow plants = density, sowing_depth = [depth], cultivar = [cultivar], row_spacing = [row_spacing], crop_class = [class]
            endif
            if today = date('[date2]') then
               ChooseNextCrop = 'yes'
            endif
         endif
      endif
```
        manager Harvesting rule
          # Harvesting criteria
          crop = potato  # Enter name of crop to harvest when ripe
          on end_of_day:
          script: same as in 3-Thirlstane_04.paddock.Manager folder.Harvesting rule
        manager Sowing fertiliser
          # When should fertiliser be applied
          modulename = potato  # On which module should the event come from
          eventname = sowing  # On which event should fertiliser be applied
          # Fertiliser application details
          fertmodule = fertiliser  # Module used to apply the fertiliser
          fert_amount_sow = 144  # Amount of starter fertiliser at sowing (kg/ha)
          fert_type_sow = NO3_N  # Sowing fertiliser type
          on [modulename].[eventname]:
          script: same as in 3-Thirlstane_04.paddock.Manager folder.Sowing fertiliser
        manager Fertilise on fixed date
          # When should fertiliser be applied
          fert_date = 21-dec  # Enter fertiliser date (dd-mmm)
          fert_criteria = 1000  # Don't add fertiliser if N in top 2 layers exceeds (kg/ha)
          # Fertiliser application details
          fertmodule = fertiliser  # Module used to apply the fertiliser
          fert_amount = 115  # Amount of fertiliser to apply (kg/ha)
          fert_type = urea_N  # Fertiliser type
          on start_of_day:
          script: same as in 3-Thirlstane_04.paddock.Manager folder.Fertilise on fixed date
      fertiliser
      surfaceom surface organic matter
        PoolName = wheat  # Organic Matter pool name
        type = wheat  # Organic Matter type
        mass = 1000.  # Initial surface residue (kg/ha)
        cnr = 80.0  # C:N ratio of initial residue
        standing_fraction = 0.0  # Fraction of residue standing
      outputfile: filename=14-Deloraine1_06.out; title=14-Deloraine1_06
        events Reporting Frequency: event=Daily  # End of day
        variables: same as 3-Thirlstane_04.paddock.outputfile.Variables
      potato
      irrigation: same as 3-Thirlstane_04.paddock.Irrigation
      manager Logic
        on init:
```
 irriginterval = 0
applied_irr_tot = 0
```
        on start_of_day:
```
 !tuber_no = (density * 0.3) + 2                          !Slope and intercept from IRS relationship
 !tuber_size = tuber_wt / tuber_no

irriginterval = irriginterval + 1

 if potato.plant_status = 'alive'  and (potato.stage > 3) and (potato.stage < 6) and (irriginterval > 12) then  
            'Tulich_3 water' set dlt_sw_dep = 28.0 0.0 0.0 0.0! 0.0! 
           irriginterval = 0
           applied_irr_tot = applied_irr_tot + 28
 endif
```
      Soil Tulich_3: same as 10-S_Creek_05.paddock.Tulich_3
  simulation 15-S_Creek1_06
    metfile met: filename=wynyard.met
    clock
      start_date = 1/08/2005  # Select the start date of the simulation
      end_date = 30/07/2006  # Select the end date of the simulation
    summaryfile
    area paddock
      folder Manager folder
        manager Sowing rule
          # Sowing criteria
          date1 = 6-nov  # Enter sowing window START date (dd-mmm)
          date2 = 7-nov  # Enter sowing window END date (dd-mmm)
          must_sow = yes  # Must sow?
          raincrit = 0  # Amount of rainfall
          rainnumdays = 7  # Number of days of rainfall
          esw_amount = 0  # Enter minimum allowable available soil water (mm)
          # Sowing parameters
          crop = potato  # Enter name of crop to sow
          seeds = 6  # Enter sowing density (seeds/m2)
          depth = 20  # Enter sowing depth (mm)
          cultivar = russet  # Enter cultivar
          class = plant  # Enter crop growth class
          age = 150  # Enter physiological age (deg days)
          row_spacing = 815  # Enter row spacing (mm)
          on start_of_day:
```
      if (paddock_is_fallow() = 1 and FallowIn <> 'yes' and (NextCrop = 0 or NextCrop = '[crop]')) then
         if (date_within('[date1], [date2]') = 1) then
            if (rain[[rainnumdays]] >= [raincrit] AND esw >= [esw_amount]) OR
                ('[must_sow]' = 'yes' AND today = date('[date2]'))) THEN
               ChooseNextCrop = 'yes'   ! for rotations
               
!Set relationship between potential stem number per seed and seed age

              stem_per_seed = -100+(0.3*[age])                                  !Need estimate from IRS work

!Set maximum and minimum limits

              if stem_per_seed > 10 then                                               !Need estimate from IRS work
                 stem_per_seed = 10
              elseif stem_per_seed < 2 then                                         !Need estimate from IRS work
                 stem_per_seed = 3.4
              endif

!Soil temperature factor based on top layer average soil temperature on day of sowing only!!

              stf = st(1)/10                                                                            ! Assuming that optimum temp is 10dc

!Set upper and lower limits for stf and swf

              if (stf < 0) then
                  stf = 0
               endif
               if (stf > 1) then
                  stf = 1
               endif        
       
               swf = (sw(1) - ll(1))/(dul(1) - ll(1))
               if (swf < 0) then
                  swf = 0
               endif
               if (swf > 1) then
                  swf = 1
               endif

               density = [seeds] * stem_per_seed * stf * swf
               [crop] sow plants = density, sowing_depth = [depth], cultivar = [cultivar], row_spacing = [row_spacing], crop_class = [class]
            endif
            if today = date('[date2]') then
               ChooseNextCrop = 'yes'
            endif
         endif
      endif
```
        manager Harvesting rule
          # Harvesting criteria
          crop = potato  # Enter name of crop to harvest when ripe
          on end_of_day:
          script: same as in 3-Thirlstane_04.paddock.Manager folder.Harvesting rule
        manager Sowing fertiliser
          # When should fertiliser be applied
          modulename = potato  # On which module should the event come from
          eventname = sowing  # On which event should fertiliser be applied
          # Fertiliser application details
          fertmodule = fertiliser  # Module used to apply the fertiliser
          fert_amount_sow = 220  # Amount of starter fertiliser at sowing (kg/ha)
          fert_type_sow = NO3_N  # Sowing fertiliser type
          on [modulename].[eventname]:
          script: same as in 3-Thirlstane_04.paddock.Manager folder.Sowing fertiliser
        manager Fertilise on fixed date
          # When should fertiliser be applied
          fert_date = 21-dec  # Enter fertiliser date (dd-mmm)
          fert_criteria = 1000  # Don't add fertiliser if N in top 2 layers exceeds (kg/ha)
          # Fertiliser application details
          fertmodule = fertiliser  # Module used to apply the fertiliser
          fert_amount = 406  # Amount of fertiliser to apply (kg/ha)
          fert_type = urea_N  # Fertiliser type
          on start_of_day:
          script: same as in 3-Thirlstane_04.paddock.Manager folder.Fertilise on fixed date
      fertiliser
      surfaceom surface organic matter
        PoolName = wheat  # Organic Matter pool name
        type = wheat  # Organic Matter type
        mass = 1000.  # Initial surface residue (kg/ha)
        cnr = 80.0  # C:N ratio of initial residue
        standing_fraction = 0.0  # Fraction of residue standing
      outputfile: filename=15-S_Creek1_06.out; title=15-S_Creek1_06
        events Reporting Frequency: event=Daily  # End of day
        variables: same as 3-Thirlstane_04.paddock.outputfile.Variables
      potato
      irrigation: same as 3-Thirlstane_04.paddock.Irrigation
      manager Logic
        on init:
```
 irriginterval = 0
applied_irr_tot = 0
```
        on start_of_day:
```
 !tuber_no = (density * 0.3) + 2                          !Slope and intercept from IRS relationship
 !tuber_size = tuber_wt / tuber_no

irriginterval = irriginterval + 1

 if potato.plant_status = 'alive'  and (potato.stage > 3) and (potato.stage < 6) and (irriginterval > 10) then  
            'Tulich_3 water' set dlt_sw_dep = 30.0 0.0 0.0 0.0 !0.0! 
           irriginterval = 0
           applied_irr_tot = applied_irr_tot + 30
 endif
```
      Soil Tulich_3: same as 10-S_Creek_05.paddock.Tulich_3
  simulation 16-S_Creek2_06
    metfile met: filename=wynyard.met
    clock
      start_date = 1/08/2005  # Select the start date of the simulation
      end_date = 30/07/2006  # Select the end date of the simulation
    summaryfile
    area paddock
      folder Manager folder
        manager Sowing rule
          # Sowing criteria
          date1 = 16-nov  # Enter sowing window START date (dd-mmm)
          date2 = 17-nov  # Enter sowing window END date (dd-mmm)
          must_sow = yes  # Must sow?
          raincrit = 0  # Amount of rainfall
          rainnumdays = 7  # Number of days of rainfall
          esw_amount = 0  # Enter minimum allowable available soil water (mm)
          # Sowing parameters
          crop = potato  # Enter name of crop to sow
          seeds = 6  # Enter sowing density (seeds/m2)
          depth = 20  # Enter sowing depth (mm)
          cultivar = russet  # Enter cultivar
          class = plant  # Enter crop growth class
          age = 150  # Enter physiological age (deg days)
          row_spacing = 815  # Enter row spacing (mm)
          on start_of_day:
```
      if (paddock_is_fallow() = 1 and FallowIn <> 'yes' and (NextCrop = 0 or NextCrop = '[crop]')) then
         if (date_within('[date1], [date2]') = 1) then
            if (rain[[rainnumdays]] >= [raincrit] AND esw >= [esw_amount]) OR
                ('[must_sow]' = 'yes' AND today = date('[date2]'))) THEN
               ChooseNextCrop = 'yes'   ! for rotations
               
!Set relationship between potential stem number per seed and seed age

              stem_per_seed = -100+(0.3*[age])                                  !Need estimate from IRS work

!Set maximum and minimum limits

              if stem_per_seed > 10 then                                               !Need estimate from IRS work
                 stem_per_seed = 10
              elseif stem_per_seed < 2 then                                         !Need estimate from IRS work
                 stem_per_seed = 2.5
              endif

!Soil temperature factor based on top layer average soil temperature on day of sowing only!!

              stf = st(1)/10                                                                            ! Assuming that optimum temp is 10dc

!Set upper and lower limits for stf and swf

              if (stf < 0) then
                  stf = 0
               endif
               if (stf > 1) then
                  stf = 1
               endif        
       
               swf = (sw(1) - ll(1))/(dul(1) - ll(1))
               if (swf < 0) then
                  swf = 0
               endif
               if (swf > 1) then
                  swf = 1
               endif

               density = [seeds] * stem_per_seed * stf * swf
               [crop] sow plants = density, sowing_depth = [depth], cultivar = [cultivar], row_spacing = [row_spacing], crop_class = [class]
            endif
            if today = date('[date2]') then
               ChooseNextCrop = 'yes'
            endif
         endif
      endif
```
        manager Harvesting rule
          # Harvesting criteria
          crop = potato  # Enter name of crop to harvest when ripe
          on end_of_day:
          script: same as in 3-Thirlstane_04.paddock.Manager folder.Harvesting rule
        manager Sowing fertiliser: same as 15-S_Creek1_06.paddock.Manager folder.Sowing fertiliser
        manager Fertilise on fixed date
          # When should fertiliser be applied
          fert_date = 5-jan  # Enter fertiliser date (dd-mmm)
          fert_criteria = 1000  # Don't add fertiliser if N in top 2 layers exceeds (kg/ha)
          # Fertiliser application details
          fertmodule = fertiliser  # Module used to apply the fertiliser
          fert_amount = 449  # Amount of fertiliser to apply (kg/ha)
          fert_type = urea_N  # Fertiliser type
          on start_of_day:
          script: same as in 3-Thirlstane_04.paddock.Manager folder.Fertilise on fixed date
      fertiliser
      surfaceom surface organic matter
        PoolName = wheat  # Organic Matter pool name
        type = wheat  # Organic Matter type
        mass = 1000  # Initial surface residue (kg/ha)
        cnr = 80  # C:N ratio of initial residue
        standing_fraction = 0  # Fraction of residue standing
      outputfile: filename=16-S_Creek2_06.out; title=16-S_Creek2_06
        events Reporting Frequency: event=Daily  # End of day
        variables: same as 3-Thirlstane_04.paddock.outputfile.Variables
      potato
      irrigation: same as 3-Thirlstane_04.paddock.Irrigation
      manager Logic: same as 15-S_Creek1_06.paddock.Logic
      Soil Tulich_3: same as 10-S_Creek_05.paddock.Tulich_3
  simulation 17-Deloraine2_06
    metfile met: filename=deloraine.met
    clock
      start_date = 1/08/2005  # Select the start date of the simulation
      end_date = 31/08/2006  # Select the end date of the simulation
    summaryfile
    area paddock
      folder Manager folder
        manager Sowing rule
          # Sowing criteria
          date1 = 24-nov  # Enter sowing window START date (dd-mmm)
          date2 = 25-nov  # Enter sowing window END date (dd-mmm)
          must_sow = yes  # Must sow?
          raincrit = 0  # Amount of rainfall
          rainnumdays = 7  # Number of days of rainfall
          esw_amount = 0  # Enter minimum allowable available soil water (mm)
          # Sowing parameters
          crop = potato  # Enter name of crop to sow
          seeds = 6  # Enter sowing density (seeds/m2)
          depth = 20  # Enter sowing depth (mm)
          cultivar = russet  # Enter cultivar
          class = plant  # Enter crop growth class
          age = 150  # Enter physiological age (deg days)
          row_spacing = 815  # Enter row spacing (mm)
          on start_of_day:
```
      if (paddock_is_fallow() = 1 and FallowIn <> 'yes' and (NextCrop = 0 or NextCrop = '[crop]')) then
         if (date_within('[date1], [date2]') = 1) then
            if (rain[[rainnumdays]] >= [raincrit] AND esw >= [esw_amount]) OR
                ('[must_sow]' = 'yes' AND today = date('[date2]'))) THEN
               ChooseNextCrop = 'yes'   ! for rotations
               
!Set relationship between potential stem number per seed and seed age

              stem_per_seed = -100+(0.3*[age])                                  !Need estimate from IRS work

!Set maximum and minimum limits

              if stem_per_seed > 10 then                                               !Need estimate from IRS work
                 stem_per_seed = 10
              elseif stem_per_seed < 2 then                                         !Need estimate from IRS work
                 stem_per_seed = 4.2
              endif

!Soil temperature factor based on top layer average soil temperature on day of sowing only!!

              stf = st(1)/10                                                                            ! Assuming that optimum temp is 10dc

!Set upper and lower limits for stf and swf

              if (stf < 0) then
                  stf = 0
               endif
               if (stf > 1) then
                  stf = 1
               endif        
       
               swf = (sw(1) - ll(1))/(dul(1) - ll(1))
               if (swf < 0) then
                  swf = 0
               endif
               if (swf > 1) then
                  swf = 1
               endif

               density = [seeds] * stem_per_seed * stf * swf
               [crop] sow plants = density, sowing_depth = [depth], cultivar = [cultivar], row_spacing = [row_spacing], crop_class = [class]
            endif
            if today = date('[date2]') then
               ChooseNextCrop = 'yes'
            endif
         endif
      endif
```
        manager Harvesting rule
          # Harvesting criteria
          crop = potato  # Enter name of crop to harvest when ripe
          on end_of_day:
          script: same as in 3-Thirlstane_04.paddock.Manager folder.Harvesting rule
        manager Sowing fertiliser: same as 9-Latrobe_05.paddock.Manager folder.Sowing fertiliser
        manager Fertilise on fixed date
          # When should fertiliser be applied
          fert_date = 10-jan  # Enter fertiliser date (dd-mmm)
          fert_criteria = 1000  # Don't add fertiliser if N in top 2 layers exceeds (kg/ha)
          # Fertiliser application details
          fertmodule = fertiliser  # Module used to apply the fertiliser
          fert_amount = 160  # Amount of fertiliser to apply (kg/ha)
          fert_type = urea_N  # Fertiliser type
          on start_of_day:
          script: same as in 3-Thirlstane_04.paddock.Manager folder.Fertilise on fixed date
      fertiliser
      surfaceom surface organic matter
        PoolName = wheat  # Organic Matter pool name
        type = wheat  # Organic Matter type
        mass = 1000.  # Initial surface residue (kg/ha)
        cnr = 80.0  # C:N ratio of initial residue
        standing_fraction = 0.0  # Fraction of residue standing
      outputfile: filename=17-Deloraine2_06.out; title=17-Deloraine2_06
        events Reporting Frequency: event=Daily  # End of day
        variables: same as 3-Thirlstane_04.paddock.outputfile.Variables
      potato
      irrigation: same as 3-Thirlstane_04.paddock.Irrigation
      manager Logic
        on init:
```
 irriginterval = 0
applied_irr_tot = 0
```
        on start_of_day:
```
 !tuber_no = (density * 0.3) + 2                          !Slope and intercept from IRS relationship
 !tuber_size = tuber_wt / tuber_no

irriginterval = irriginterval + 1

 if potato.plant_status = 'alive'  and (potato.stage > 3) and (potato.stage < 6) and (irriginterval > 10) then  
            'Cox_6 water' set dlt_sw_dep = 22.0 0.0 0.0 0.0 !0.0! 
           irriginterval = 0
           applied_irr_tot = applied_irr_tot + 22
 endif
```
      Soil Cox_6: Site=Cox Farm; Region=Central North Tasmania; State=Tasmania; Longitude=147.08
        Comment = Results from CSBP Soil & Plant Laboratory in Perth (Wesfarmers).  # Comments
        SoilType = Clay loam  # Soil description
        NearestTown = Cressy
        NaturalVegetation = Agriculture
        Latitude = -41.5942  # Latitude (WGS84)
        LocationAccuracy = +/- 20m
        DataSource = Bill Cotching and Shaun Lisson, TIAR
        InitialWater Initial water: FractionFull=1.00; PercentMethod=EvenlyDistributed
        Water
          Thickness  BD    AirDry  LL15  DUL   SAT
          220        1.27  0.11    0.22  0.44  0.52
          290        1.19  0.35    0.38  0.55  0.55
          260        1.15  0.36    0.36  0.55  0.566
          210        1.3   0.37    0.37  0.5   0.509
          620        1.3   0.37    0.37  0.5   0.509
          SoilCrop wheat: LL=[0.22, 0.38, 0.36, 0.37, 0.37]; KL=[0.16, 0.16, 0.16, 0.1, 0.05]; XF=[1, 0.3, 0.2, 0.1, 0.1]
          SoilCrop canola: LL=[0.22, 0.38, 0.36, 0.37, 0.37]; KL=[0.16, 0.16, 0.16, 0.1, 0.05]; XF=[1, 0.3, 0.2, 0.1, 0.1]
          SoilCrop fieldpea: LL=[0.22, 0.38, 0.36, 0.37, 0.37]; KL=[0.16, 0.16, 0.16, 0.1, 0.05]; XF=[1, 0.3, 0.2, 0.1, 0.1]
          SoilCrop lucerne: LL=[0.22, 0.38, 0.36, 0.37, 0.37]; KL=[0.16, 0.16, 0.16, 0.1, 0.05]; XF=[1, 0.3, 0.2, 0.1, 0.1]
          SoilCrop weed: LL=[0.22, 0.38, 0.36, 0.37, 0.37]; KL=[0.16, 0.16, 0.16, 0.1, 0.05]; XF=[1, 0.3, 0.2, 0.1, 0.1]
          SoilCrop broccoli: LL=[0.22, 0.38, 0.36, 0.37, 0.37]; KL=[0.16, 0.16, 0.16, 0.1, 0.05]; XF=[1, 0.3, 0.2, 0.1, 0.1]
          SoilCrop potato: LL=[0.22, 0.38, 0.36, 0.37, 0.37]; KL=[0.06, 0.06, 0.06, 0.06, 0.06]; XF=[1, 1, 1, 1, 1]
        SoilWater: SummerCona=3.5; SummerU=6; SummerDate=1-Nov; WinterCona=2; WinterU=2; WinterDate=1-Apr; DiffusConst=40; DiffusSlope=16; Salb=0.1; CN2Bare=70; CNRed=20; CNCov=0.8
          Thickness  SWCON  MWCON
          220        0.5    1
          290        0.2    1
          260        0.2    1
          210        0.1    1
          620        0.1    1
        SoilOrganicMatter: RootCN=30; RootWt=1500; SoilCN=14.5; EnrACoeff=7.4; EnrBCoeff=0.2
          Thickness  OC   FBiom  FInert
          220        0.7  0.04   0.1
          290        0.7  0.04   0.1
          260        0.4  0.03   0.1
          210        0.3  0.2    0.1
          620        0.2  0.2    0.1
        Analysis: Thickness=[220, 290, 260, 210, 620]; PH=[5, 5, 5, 5, 5]
        Sample Initial nitrogen
          Thickness  NO3      NH4
          220        1.24844  0.100025
          290        1.24844  0.100025
          260        1.24844  0.100025
          210        1.24844  0.100025
          620        1.24844  0.100025
  simulation 18-Barrington_06
    metfile met: filename=Sheffield.met
    clock
      start_date = 1/08/2005  # Select the start date of the simulation
      end_date = 31/08/2006  # Select the end date of the simulation
    summaryfile
    area paddock
      folder Manager folder
        manager Sowing rule
          # Sowing criteria
          date1 = 21-nov  # Enter sowing window START date (dd-mmm)
          date2 = 22-nov  # Enter sowing window END date (dd-mmm)
          must_sow = yes  # Must sow?
          raincrit = 0  # Amount of rainfall
          rainnumdays = 7  # Number of days of rainfall
          esw_amount = 0  # Enter minimum allowable available soil water (mm)
          # Sowing parameters
          crop = potato  # Enter name of crop to sow
          seeds = 6  # Enter sowing density (seeds/m2)
          depth = 20  # Enter sowing depth (mm)
          cultivar = russet  # Enter cultivar
          class = plant  # Enter crop growth class
          age = 150  # Enter physiological age (deg days)
          row_spacing = 815  # Enter row spacing (mm)
          on start_of_day:
```
      if (paddock_is_fallow() = 1 and FallowIn <> 'yes' and (NextCrop = 0 or NextCrop = '[crop]')) then
         if (date_within('[date1], [date2]') = 1) then
            if (rain[[rainnumdays]] >= [raincrit] AND esw >= [esw_amount]) OR
                ('[must_sow]' = 'yes' AND today = date('[date2]'))) THEN
               ChooseNextCrop = 'yes'   ! for rotations
               
!Set relationship between potential stem number per seed and seed age

              stem_per_seed = -100+(0.3*[age])                                  !Need estimate from IRS work

!Set maximum and minimum limits

              if stem_per_seed > 10 then                                               !Need estimate from IRS work
                 stem_per_seed = 10
              elseif stem_per_seed < 2 then                                         !Need estimate from IRS work
                 stem_per_seed = 4.1
              endif

!Soil temperature factor based on top layer average soil temperature on day of sowing only!!

              stf = st(1)/10                                                                            ! Assuming that optimum temp is 10dc

!Set upper and lower limits for stf and swf

              if (stf < 0) then
                  stf = 0
               endif
               if (stf > 1) then
                  stf = 1
               endif        
       
               swf = (sw(1) - ll(1))/(dul(1) - ll(1))
               if (swf < 0) then
                  swf = 0
               endif
               if (swf > 1) then
                  swf = 1
               endif

               density = [seeds] * stem_per_seed * stf * swf
               [crop] sow plants = density, sowing_depth = [depth], cultivar = [cultivar], row_spacing = [row_spacing], crop_class = [class]
            endif
            if today = date('[date2]') then
               ChooseNextCrop = 'yes'
            endif
         endif
      endif
```
        manager Harvesting rule
          # Harvesting criteria
          crop = potato  # Enter name of crop to harvest when ripe
          on end_of_day:
          script: same as in 3-Thirlstane_04.paddock.Manager folder.Harvesting rule
        manager Sowing fertiliser
          # When should fertiliser be applied
          modulename = potato  # On which module should the event come from
          eventname = sowing  # On which event should fertiliser be applied
          # Fertiliser application details
          fertmodule = fertiliser  # Module used to apply the fertiliser
          fert_amount_sow = 152  # Amount of starter fertiliser at sowing (kg/ha)
          fert_type_sow = NO3_N  # Sowing fertiliser type
          on [modulename].[eventname]:
          script: same as in 3-Thirlstane_04.paddock.Manager folder.Sowing fertiliser
        manager Fertilise on fixed date
          # When should fertiliser be applied
          fert_date = 5-jan  # Enter fertiliser date (dd-mmm)
          fert_criteria = 1000  # Don't add fertiliser if N in top 2 layers exceeds (kg/ha)
          # Fertiliser application details
          fertmodule = fertiliser  # Module used to apply the fertiliser
          fert_amount = 200  # Amount of fertiliser to apply (kg/ha)
          fert_type = urea_N  # Fertiliser type
          on start_of_day:
          script: same as in 3-Thirlstane_04.paddock.Manager folder.Fertilise on fixed date
      fertiliser
      surfaceom surface organic matter
        PoolName = wheat  # Organic Matter pool name
        type = wheat  # Organic Matter type
        mass = 1000  # Initial surface residue (kg/ha)
        cnr = 80  # C:N ratio of initial residue
        standing_fraction = 0  # Fraction of residue standing
      outputfile: filename=18-Barrington_06.out; title=18-Barrington_06
        events Reporting Frequency: event=Daily  # End of day
        variables: same as 3-Thirlstane_04.paddock.outputfile.Variables
      potato
      irrigation: same as 3-Thirlstane_04.paddock.Irrigation
      manager Logic
        on init:
```
 irriginterval = 0
applied_irr_tot = 0
```
        on start_of_day:
```
 !tuber_no = (density * 0.3) + 2                          !Slope and intercept from IRS relationship
 !tuber_size = tuber_wt / tuber_no

irriginterval = irriginterval + 1

 if potato.plant_status = 'alive'  and (potato.stage > 3) and (potato.stage < 6) and (irriginterval > 10) then  
            'Cox_6 water' set dlt_sw_dep = 25.0 0.0 0.0 0.0 0.0! 
           irriginterval = 0
           applied_irr_tot = applied_irr_tot + 25
 endif
```
      Soil Cox_6: same as 17-Deloraine2_06.paddock.Cox_6
  simulation 19-Branxholm_06
    metfile met: filename=Branxholm.met
    clock
      start_date = 1/08/2005  # Select the start date of the simulation
      end_date = 30/07/2006  # Select the end date of the simulation
    summaryfile
    area paddock
      folder Manager folder
        manager Sowing rule
          # Sowing criteria
          date1 = 1-nov  # Enter sowing window START date (dd-mmm)
          date2 = 2-nov  # Enter sowing window END date (dd-mmm)
          must_sow = yes  # Must sow?
          raincrit = 0  # Amount of rainfall
          rainnumdays = 7  # Number of days of rainfall
          esw_amount = 0  # Enter minimum allowable available soil water (mm)
          # Sowing parameters
          crop = potato  # Enter name of crop to sow
          seeds = 6.5  # Enter sowing density (seeds/m2)
          depth = 20  # Enter sowing depth (mm)
          cultivar = russet  # Enter cultivar
          class = plant  # Enter crop growth class
          age = 150  # Enter physiological age (deg days)
          row_spacing = 815  # Enter row spacing (mm)
          on start_of_day:
```
      if (paddock_is_fallow() = 1 and FallowIn <> 'yes' and (NextCrop = 0 or NextCrop = '[crop]')) then
         if (date_within('[date1], [date2]') = 1) then
            if (rain[[rainnumdays]] >= [raincrit] AND esw >= [esw_amount]) OR
                ('[must_sow]' = 'yes' AND today = date('[date2]'))) THEN
               ChooseNextCrop = 'yes'   ! for rotations
               
!Set relationship between potential stem number per seed and seed age

              stem_per_seed = -100+(0.3*[age])                                  !Need estimate from IRS work

!Set maximum and minimum limits

              if stem_per_seed > 10 then                                               !Need estimate from IRS work
                 stem_per_seed = 10
              elseif stem_per_seed < 2 then                                         !Need estimate from IRS work
                 stem_per_seed = 3.9
              endif

!Soil temperature factor based on top layer average soil temperature on day of sowing only!!

              stf = st(1)/10                                                                            ! Assuming that optimum temp is 10dc

!Set upper and lower limits for stf and swf

              if (stf < 0) then
                  stf = 0
               endif
               if (stf > 1) then
                  stf = 1
               endif        
       
               swf = (sw(1) - ll(1))/(dul(1) - ll(1))
               if (swf < 0) then
                  swf = 0
               endif
               if (swf > 1) then
                  swf = 1
               endif

               density = [seeds] * stem_per_seed * stf * swf
               [crop] sow plants = density, sowing_depth = [depth], cultivar = [cultivar], row_spacing = [row_spacing], crop_class = [class]
            endif
            if today = date('[date2]') then
               ChooseNextCrop = 'yes'
            endif
         endif
      endif
```
        manager Harvesting rule
          # Harvesting criteria
          crop = potato  # Enter name of crop to harvest when ripe
          on end_of_day:
          script: same as in 3-Thirlstane_04.paddock.Manager folder.Harvesting rule
        manager Sowing fertiliser
          # When should fertiliser be applied
          modulename = potato  # On which module should the event come from
          eventname = sowing  # On which event should fertiliser be applied
          # Fertiliser application details
          fertmodule = fertiliser  # Module used to apply the fertiliser
          fert_amount_sow = 115  # Amount of starter fertiliser at sowing (kg/ha)
          fert_type_sow = NO3_N  # Sowing fertiliser type
          on [modulename].[eventname]:
          script: same as in 3-Thirlstane_04.paddock.Manager folder.Sowing fertiliser
        manager Fertilise on fixed date
          # When should fertiliser be applied
          fert_date = 15-dec  # Enter fertiliser date (dd-mmm)
          fert_criteria = 1000  # Don't add fertiliser if N in top 2 layers exceeds (kg/ha)
          # Fertiliser application details
          fertmodule = fertiliser  # Module used to apply the fertiliser
          fert_amount = 128  # Amount of fertiliser to apply (kg/ha)
          fert_type = urea_N  # Fertiliser type
          on start_of_day:
          script: same as in 3-Thirlstane_04.paddock.Manager folder.Fertilise on fixed date
      fertiliser
      surfaceom surface organic matter
        PoolName = wheat  # Organic Matter pool name
        type = wheat  # Organic Matter type
        mass = 1000  # Initial surface residue (kg/ha)
        cnr = 80  # C:N ratio of initial residue
        standing_fraction = 0  # Fraction of residue standing
      outputfile: filename=19-Branxholm_06.out; title=19-Branxholm_06
        events Reporting Frequency: event=Daily  # End of day
        variables: same as 3-Thirlstane_04.paddock.outputfile.Variables
      potato
      irrigation: same as 3-Thirlstane_04.paddock.Irrigation
      manager Logic
        on init:
```
 irriginterval = 0
applied_irr_tot = 0
```
        on start_of_day:
```
 !tuber_no = (density * 0.3) + 2                          !Slope and intercept from IRS relationship
 !tuber_size = tuber_wt / tuber_no

irriginterval = irriginterval + 1

 if potato.plant_status = 'alive'  and (potato.stage > 3) and (potato.stage < 6) and (irriginterval > 10) then  
            'Chilvers_10 water' set dlt_sw_dep = 30.0 0.0 0.0 0.0 !0.0! 
           irriginterval = 0
           applied_irr_tot = applied_irr_tot + 30
 endif
```
      Soil Chilvers_10: same as 6-Cuprona_04.paddock.Chilvers_10
  simulation 13-Melrose_05
    metfile met: filename=forthside.met
    clock
      start_date = 1/09/2004  # Select the start date of the simulation
      end_date = 30/06/2005  # Select the end date of the simulation
    summaryfile
    area paddock
      folder Manager folder
        manager Sowing rule
          # Sowing criteria
          date1 = 20-Nov  # Enter sowing window START date (dd-mmm)
          date2 = 25-Nov  # Enter sowing window END date (dd-mmm)
          must_sow = yes  # Must sow?
          raincrit = 0  # Amount of rainfall
          rainnumdays = 7  # Number of days of rainfall
          esw_amount = 0  # Enter minimum allowable available soil water (mm)
          # Sowing parameters
          crop = potato  # Enter name of crop to sow
          seeds = 6  # Enter sowing density (seeds/m2)
          depth = 20  # Enter sowing depth (mm)
          cultivar = russet  # Enter cultivar
          class = plant  # Enter crop growth class
          age = 150  # Enter physiological age (deg days)
          row_spacing = 815  # Enter row spacing (mm)
          on start_of_day:
          script: same as in 9-Latrobe_05.paddock.Manager folder.Sowing rule
        manager Harvesting rule
          # Harvesting criteria
          crop = potato  # Enter name of crop to harvest when ripe
          on end_of_day:
          script: same as in 3-Thirlstane_04.paddock.Manager folder.Harvesting rule
        manager Sowing fertiliser
          # When should fertiliser be applied
          modulename = potato  # On which module should the event come from
          eventname = sowing  # On which event should fertiliser be applied
          # Fertiliser application details
          fertmodule = fertiliser  # Module used to apply the fertiliser
          fert_amount_sow = 403  # Amount of starter fertiliser at sowing (kg/ha)
          fert_type_sow = NO3_N  # Sowing fertiliser type
          on [modulename].[eventname]:
          script: same as in 3-Thirlstane_04.paddock.Manager folder.Sowing fertiliser
        manager Fertilise on fixed date
          # When should fertiliser be applied
          fert_date = 1-jan  # Enter fertiliser date (dd-mmm)
          fert_criteria = 1000  # Don't add fertiliser if N in top 2 layers exceeds (kg/ha)
          # Fertiliser application details
          fertmodule = fertiliser  # Module used to apply the fertiliser
          fert_amount = 259  # Amount of fertiliser to apply (kg/ha)
          fert_type = urea_N  # Fertiliser type
          on start_of_day:
          script: same as in 3-Thirlstane_04.paddock.Manager folder.Fertilise on fixed date
      fertiliser
      surfaceom surface organic matter
        PoolName = wheat  # Organic Matter pool name
        type = wheat  # Organic Matter type
        mass = 1000  # Initial surface residue (kg/ha)
        cnr = 80  # C:N ratio of initial residue
        standing_fraction = 0  # Fraction of residue standing
      outputfile: filename=13-Melrose_05.out; title=13-Melrose_05
        events Reporting Frequency: event=Daily  # End of day
        variables: same as 3-Thirlstane_04.paddock.outputfile.Variables
      potato
      irrigation: same as 3-Thirlstane_04.paddock.Irrigation
      manager Logic
        on init:
```
 irriginterval = 0
applied_irr_tot = 0
```
        on start_of_day:
```
 !tuber_no = (density * 0.3) + 2                          !Slope and intercept from IRS relationship
 !tuber_size = tuber_wt / tuber_no

irriginterval = irriginterval + 1

 if potato.plant_status = 'alive'  and (potato.stage > 3) and (potato.stage < 6) and (irriginterval > 8) then  
            'Chilvers_10 water' set dlt_sw_dep = 25.0 0.0 0.0 0.0 !0.0! 
           irriginterval = 0
           applied_irr_tot = applied_irr_tot + 25
 endif
```
      Soil Chilvers_10: same as 6-Cuprona_04.paddock.Chilvers_10
  simulation 2-Wynyard_04
    metfile met: filename=wynyard.met
    clock
      start_date = 1/08/2003  # Select the start date of the simulation
      end_date = 30/06/2004  # Select the end date of the simulation
    summaryfile
    area paddock
      folder Manager folder
        manager Sowing rule
          # Sowing criteria
          date1 = 18-nov  # Enter sowing window START date (dd-mmm)
          date2 = 19-nov  # Enter sowing window END date (dd-mmm)
          must_sow = yes  # Must sow?
          raincrit = 0  # Amount of rainfall
          rainnumdays = 7  # Number of days of rainfall
          esw_amount = 0  # Enter minimum allowable available soil water (mm)
          # Sowing parameters
          crop = potato  # Enter name of crop to sow
          seeds = 6  # Enter sowing density (seeds/m2)
          depth = 20  # Enter sowing depth (mm)
          cultivar = russet  # Enter cultivar
          class = plant  # Enter crop growth class
          age = 150  # Enter physiological age (deg days)
          row_spacing = 815  # Enter row spacing (mm)
          on start_of_day:
          script: same as in 8-Deloraine_05.paddock.Manager folder.Sowing rule
        manager Harvesting rule
          # Harvesting criteria
          crop = potato  # Enter name of crop to harvest when ripe
          on end_of_day:
          script: same as in 3-Thirlstane_04.paddock.Manager folder.Harvesting rule
        manager Sowing fertiliser
          # When should fertiliser be applied
          modulename = potato  # On which module should the event come from
          eventname = sowing  # On which event should fertiliser be applied
          # Fertiliser application details
          fertmodule = fertiliser  # Module used to apply the fertiliser
          fert_amount_sow = 198  # Amount of starter fertiliser at sowing (kg/ha)
          fert_type_sow = NO3_N  # Sowing fertiliser type
          on [modulename].[eventname]:
          script: same as in 3-Thirlstane_04.paddock.Manager folder.Sowing fertiliser
        manager Fertilise on fixed date
          # When should fertiliser be applied
          fert_date = 1-jan  # Enter fertiliser date (dd-mmm)
          fert_criteria = 1000  # Don't add fertiliser if N in top 2 layers exceeds (kg/ha)
          # Fertiliser application details
          fertmodule = fertiliser  # Module used to apply the fertiliser
          fert_amount = 81  # Amount of fertiliser to apply (kg/ha)
          fert_type = urea_N  # Fertiliser type
          on start_of_day:
          script: same as in 3-Thirlstane_04.paddock.Manager folder.Fertilise on fixed date
      fertiliser
      surfaceom surface organic matter
        PoolName = wheat  # Organic Matter pool name
        type = wheat  # Organic Matter type
        mass = 1000  # Initial surface residue (kg/ha)
        cnr = 80  # C:N ratio of initial residue
        standing_fraction = 0  # Fraction of residue standing
      outputfile: filename=2-Wynyard_04.out; title=2-Wynyard_04
        events Reporting Frequency: event=Daily  # End of day
        variables: same as 3-Thirlstane_04.paddock.outputfile.Variables
      potato
      irrigation: same as 3-Thirlstane_04.paddock.Irrigation
      manager Logic
        on init:
```
 irriginterval = 0
applied_irr_tot = 0
```
        on start_of_day:
```
 !tuber_no = (density * 0.3) + 2                          !Slope and intercept from IRS relationship
 !tuber_size = tuber_wt / tuber_no

irriginterval = irriginterval + 1

 if potato.plant_status = 'alive'  and (potato.stage > 3) and (potato.stage < 6) and (irriginterval > 10) then  
            'Tulich_3 water' set dlt_sw_dep = 25.0 0.0 0.0 0.0 !0.0! 
           irriginterval = 0
           applied_irr_tot = applied_irr_tot + 25
 endif
```
      Soil Tulich_3: Site=Anderson Farm; Region=Central North Tasmania; State=Tasmania; Longitude=147.059
        Comment = Results from CSBP Soil & Plant Laboratory in Perth (Wesfarmers).  # Comments
        SoilType = Medium clay  # Soil description
        NearestTown = Cressy
        NaturalVegetation = Agriculture
        Latitude = -41.6445  # Latitude (WGS84)
        LocationAccuracy = +/- 20m
        DataSource = Bill Cotching and Shaun Lisson, TIAR
        InitialWater Initial water: FractionFull=1.00; PercentMethod=EvenlyDistributed
        Water: same as 10-S_Creek_05.paddock.Tulich_3.Water
        SoilWater: same as 10-S_Creek_05.paddock.Tulich_3.SoilWater
        SoilOrganicMatter: RootCN=30; RootWt=1500; SoilCN=14.5; EnrACoeff=7.4; EnrBCoeff=0.2
          Thickness  OC   FBiom  FInert
          230        0.7  0.04   0.1
          200        0.7  0.04   0.1
          370        0.4  0.03   0.1
          400        0.2  0.01   0.1
        Analysis: Thickness=[230, 200, 370, 400]; PH=[5, 5, 5, 5]
        Sample Initial nitrogen
          Thickness  NO3      NH4
          230        1.88594  0.10003
          200        1.88594  0.10003
          370        1.88594  0.10003
          400        1.88594  0.10003
  simulation 7-Latrobe_04
    metfile met: filename=latrobe.met
    clock
      start_date = 1/08/2003  # Select the start date of the simulation
      end_date = 30/06/2004  # Select the end date of the simulation
    summaryfile
    area paddock
      folder Manager folder
        manager Sowing rule
          # Sowing criteria
          date1 = 8-nov  # Enter sowing window START date (dd-mmm)
          date2 = 9-nov  # Enter sowing window END date (dd-mmm)
          must_sow = yes  # Must sow?
          raincrit = 0  # Amount of rainfall
          rainnumdays = 7  # Number of days of rainfall
          esw_amount = 0  # Enter minimum allowable available soil water (mm)
          # Sowing parameters
          crop = potato  # Enter name of crop to sow
          seeds = 6  # Enter sowing density (seeds/m2)
          depth = 20  # Enter sowing depth (mm)
          cultivar = russet  # Enter cultivar
          class = plant  # Enter crop growth class
          age = 150  # Enter physiological age (deg days)
          row_spacing = 815  # Enter row spacing (mm)
          on start_of_day:
```
      if (paddock_is_fallow() = 1 and FallowIn <> 'yes' and (NextCrop = 0 or NextCrop = '[crop]')) then
         if (date_within('[date1], [date2]') = 1) then
            if (rain[[rainnumdays]] >= [raincrit] AND esw >= [esw_amount]) OR
                ('[must_sow]' = 'yes' AND today = date('[date2]'))) THEN
               ChooseNextCrop = 'yes'   ! for rotations
               
!Set relationship between potential stem number per seed and seed age

              stem_per_seed = -100+(0.3*[age])                                  !Need estimate from IRS work

!Set maximum and minimum limits

              if stem_per_seed > 10 then                                               !Need estimate from IRS work
                 stem_per_seed = 10
              elseif stem_per_seed < 2 then                                         !Need estimate from IRS work
                 stem_per_seed = 2.2
              endif

!Soil temperature factor based on top layer average soil temperature on day of sowing only!!

              stf = st(1)/10                                                                            ! Assuming that optimum temp is 10dc

!Set upper and lower limits for stf and swf

              if (stf < 0) then
                  stf = 0
               endif
               if (stf > 1) then
                  stf = 1
               endif        
       
               swf = (sw(1) - ll(1))/(dul(1) - ll(1))
               if (swf < 0) then
                  swf = 0
               endif
               if (swf > 1) then
                  swf = 1
               endif

               density = [seeds] * stem_per_seed * stf * swf
               [crop] sow plants = density, sowing_depth = [depth], cultivar = [cultivar], row_spacing = [row_spacing], crop_class = [class]
            endif
            if today = date('[date2]') then
               ChooseNextCrop = 'yes'
            endif
         endif
      endif
```
        manager Harvesting rule
          # Harvesting criteria
          crop = potato  # Enter name of crop to harvest when ripe
          on end_of_day:
          script: same as in 3-Thirlstane_04.paddock.Manager folder.Harvesting rule
        manager Sowing fertiliser
          # When should fertiliser be applied
          modulename = potato  # On which module should the event come from
          eventname = sowing  # On which event should fertiliser be applied
          # Fertiliser application details
          fertmodule = fertiliser  # Module used to apply the fertiliser
          fert_amount_sow = 197  # Amount of starter fertiliser at sowing (kg/ha)
          fert_type_sow = NO3_N  # Sowing fertiliser type
          on [modulename].[eventname]:
          script: same as in 3-Thirlstane_04.paddock.Manager folder.Sowing fertiliser
        manager Fertilise on fixed date
          # When should fertiliser be applied
          fert_date = 21-dec  # Enter fertiliser date (dd-mmm)
          fert_criteria = 1000  # Don't add fertiliser if N in top 2 layers exceeds (kg/ha)
          # Fertiliser application details
          fertmodule = fertiliser  # Module used to apply the fertiliser
          fert_amount = 29  # Amount of fertiliser to apply (kg/ha)
          fert_type = urea_N  # Fertiliser type
          on start_of_day:
          script: same as in 3-Thirlstane_04.paddock.Manager folder.Fertilise on fixed date
      fertiliser
      surfaceom surface organic matter
        PoolName = wheat  # Organic Matter pool name
        type = wheat  # Organic Matter type
        mass = 1000.  # Initial surface residue (kg/ha)
        cnr = 80.0  # C:N ratio of initial residue
        standing_fraction = 0.0  # Fraction of residue standing
      outputfile: filename=7-Latrobe_04.out; title=7-Latrobe_04
        events Reporting Frequency: event=Daily  # End of day
        variables: same as 3-Thirlstane_04.paddock.outputfile.Variables
      potato
      irrigation: same as 3-Thirlstane_04.paddock.Irrigation
      manager Logic
        on init:
```
 irriginterval = 0
applied_irr_tot = 0
```
        on start_of_day:
```
 !tuber_no = (density * 0.3) + 2                          !Slope and intercept from IRS relationship
 !tuber_size = tuber_wt / tuber_no

irriginterval = irriginterval + 1

 if potato.plant_status = 'alive'  and (potato.stage > 3) and (potato.stage < 6) and (irriginterval > 9) then  
            'Cox_12 water' set dlt_sw_dep = 25.0 0.0 0.0 0.0 !0.0! 
           irriginterval = 0
           applied_irr_tot = applied_irr_tot + 25
 endif
```
      Soil Cox_12: same as 3-Thirlstane_04.paddock.Cox_12
  simulation 20-Stowport_06
    metfile met: filename=gunnsplains.met
    clock
      start_date = 1/08/2005  # Select the start date of the simulation
      end_date = 31/10/2006  # Select the end date of the simulation
    summaryfile
    area paddock
      folder Manager folder
        manager Sowing rule
          # Sowing criteria
          date1 = 22-Nov  # Enter sowing window START date (dd-mmm)
          date2 = 23-Nov  # Enter sowing window END date (dd-mmm)
          must_sow = yes  # Must sow?
          raincrit = 0  # Amount of rainfall
          rainnumdays = 7  # Number of days of rainfall
          esw_amount = 0  # Enter minimum allowable available soil water (mm)
          # Sowing parameters
          crop = potato  # Enter name of crop to sow
          seeds = 6  # Enter sowing density (seeds/m2)
          depth = 20  # Enter sowing depth (mm)
          cultivar = russet  # Enter cultivar
          class = plant  # Enter crop growth class
          age = 150  # Enter physiological age (deg days)
          row_spacing = 815  # Enter row spacing (mm)
          on start_of_day:
          script: same as in 18-Barrington_06.paddock.Manager folder.Sowing rule
        manager Harvesting rule
          # Harvesting criteria
          crop = potato  # Enter name of crop to harvest when ripe
          on end_of_day:
          script: same as in 3-Thirlstane_04.paddock.Manager folder.Harvesting rule
        manager Sowing fertiliser
          # When should fertiliser be applied
          modulename = potato  # On which module should the event come from
          eventname = sowing  # On which event should fertiliser be applied
          # Fertiliser application details
          fertmodule = fertiliser  # Module used to apply the fertiliser
          fert_amount_sow = 180  # Amount of starter fertiliser at sowing (kg/ha)
          fert_type_sow = NO3_N  # Sowing fertiliser type
          on [modulename].[eventname]:
          script: same as in 3-Thirlstane_04.paddock.Manager folder.Sowing fertiliser
        manager Fertilise on fixed date
          # When should fertiliser be applied
          fert_date = 10-jan  # Enter fertiliser date (dd-mmm)
          fert_criteria = 1000  # Don't add fertiliser if N in top 2 layers exceeds (kg/ha)
          # Fertiliser application details
          fertmodule = fertiliser  # Module used to apply the fertiliser
          fert_amount = 83  # Amount of fertiliser to apply (kg/ha)
          fert_type = urea_N  # Fertiliser type
          on start_of_day:
          script: same as in 3-Thirlstane_04.paddock.Manager folder.Fertilise on fixed date
      fertiliser
      surfaceom surface organic matter
        PoolName = wheat  # Organic Matter pool name
        type = wheat  # Organic Matter type
        mass = 1000.  # Initial surface residue (kg/ha)
        cnr = 80.0  # C:N ratio of initial residue
        standing_fraction = 0.0  # Fraction of residue standing
      outputfile: filename=20-Stowport_06.out; title=20-Stowport_06
        events Reporting Frequency: event=Daily  # End of day
        variables: same as 3-Thirlstane_04.paddock.outputfile.Variables
      potato
      irrigation: same as 3-Thirlstane_04.paddock.Irrigation
      manager Logic
        on init:
```
 irriginterval = 0
applied_irr_tot = 0
```
        on start_of_day:
```
 !tuber_no = (density * 0.3) + 2                          !Slope and intercept from IRS relationship
 !tuber_size = tuber_wt / tuber_no

irriginterval = irriginterval + 1

 if potato.plant_status = 'alive'  and (potato.stage > 3) and (potato.stage < 6) and (irriginterval > 10) then  
            'Chilvers_10 water' set dlt_sw_dep = 28.0 0.0 0.0 0.0 !0.0! 
           irriginterval = 0
           applied_irr_tot = applied_irr_tot + 28
 endif
```
      Soil Chilvers_10: same as 6-Cuprona_04.paddock.Chilvers_10
  simulation 4-Bishopbourne_04
    metfile met: filename=cressy.met
    clock
      start_date = 1/08/2003  # Select the start date of the simulation
      end_date = 31/07/2004  # Select the end date of the simulation
    summaryfile
    area paddock
      folder Manager folder
        manager Sowing rule
          # Sowing criteria
          date1 = 5-nov  # Enter sowing window START date (dd-mmm)
          date2 = 6-nov  # Enter sowing window END date (dd-mmm)
          must_sow = yes  # Must sow?
          raincrit = 0  # Amount of rainfall
          rainnumdays = 7  # Number of days of rainfall
          esw_amount = 0  # Enter minimum allowable available soil water (mm)
          # Sowing parameters
          crop = potato  # Enter name of crop to sow
          seeds = 6  # Enter sowing density (seeds/m2)
          depth = 20  # Enter sowing depth (mm)
          cultivar = russet  # Enter cultivar
          class = plant  # Enter crop growth class
          age = 150  # Enter physiological age (deg days)
          row_spacing = 815  # Enter row spacing (mm)
          on start_of_day:
```
      if (paddock_is_fallow() = 1 and FallowIn <> 'yes' and (NextCrop = 0 or NextCrop = '[crop]')) then
         if (date_within('[date1], [date2]') = 1) then
            if (rain[[rainnumdays]] >= [raincrit] AND esw >= [esw_amount]) OR
                ('[must_sow]' = 'yes' AND today = date('[date2]'))) THEN
               ChooseNextCrop = 'yes'   ! for rotations
               
!Set relationship between potential stem number per seed and seed age

              stem_per_seed = -100+(0.3*[age])                                  !Need estimate from IRS work

!Set maximum and minimum limits

              if stem_per_seed > 10 then                                               !Need estimate from IRS work
                 stem_per_seed = 10
              elseif stem_per_seed < 2 then                                         !Need estimate from IRS work
                 stem_per_seed = 3.5
              endif

!Soil temperature factor based on top layer average soil temperature on day of sowing only!!

              stf = st(1)/10                                                                            ! Assuming that optimum temp is 10dc

!Set upper and lower limits for stf and swf

              if (stf < 0) then
                  stf = 0
               endif
               if (stf > 1) then
                  stf = 1
               endif        
       
               swf = (sw(1) - ll(1))/(dul(1) - ll(1))
               if (swf < 0) then
                  swf = 0
               endif
               if (swf > 1) then
                  swf = 1
               endif

               density = [seeds] * stem_per_seed * stf * swf
               [crop] sow plants = density, sowing_depth = [depth], cultivar = [cultivar], row_spacing = [row_spacing], crop_class = [class]
            endif
            if today = date('[date2]') then
               ChooseNextCrop = 'yes'
            endif
         endif
      endif
```
        manager Harvesting rule
          # Harvesting criteria
          crop = potato  # Enter name of crop to harvest when ripe
          on end_of_day:
          script: same as in 3-Thirlstane_04.paddock.Manager folder.Harvesting rule
        manager Sowing fertiliser
          # When should fertiliser be applied
          modulename = potato  # On which module should the event come from
          eventname = sowing  # On which event should fertiliser be applied
          # Fertiliser application details
          fertmodule = fertiliser  # Module used to apply the fertiliser
          fert_amount_sow = 120  # Amount of starter fertiliser at sowing (kg/ha)
          fert_type_sow = NO3_N  # Sowing fertiliser type
          on [modulename].[eventname]:
          script: same as in 3-Thirlstane_04.paddock.Manager folder.Sowing fertiliser
        manager Fertilise on fixed date
          # When should fertiliser be applied
          fert_date = 19-dec  # Enter fertiliser date (dd-mmm)
          fert_criteria = 1000  # Don't add fertiliser if N in top 2 layers exceeds (kg/ha)
          # Fertiliser application details
          fertmodule = fertiliser  # Module used to apply the fertiliser
          fert_amount = 161  # Amount of fertiliser to apply (kg/ha)
          fert_type = urea_N  # Fertiliser type
          on start_of_day:
          script: same as in 3-Thirlstane_04.paddock.Manager folder.Fertilise on fixed date
      fertiliser
      surfaceom surface organic matter
        PoolName = wheat  # Organic Matter pool name
        type = wheat  # Organic Matter type
        mass = 1000.  # Initial surface residue (kg/ha)
        cnr = 80.0  # C:N ratio of initial residue
        standing_fraction = 0.0  # Fraction of residue standing
      outputfile: filename=4-Bishopbourne_04.out; title=4-Bishopbourne_04
        events Reporting Frequency: event=Daily  # End of day
        variables: same as 3-Thirlstane_04.paddock.outputfile.Variables
      potato
      irrigation: same as 3-Thirlstane_04.paddock.Irrigation
      manager Logic
        on init:
```
 irriginterval = 0
applied_irr_tot = 0
```
        on start_of_day:
```
 !tuber_no = (density * 0.3) + 2                          !Slope and intercept from IRS relationship
 !tuber_size = tuber_wt / tuber_no

irriginterval = irriginterval + 1

 if potato.plant_status = 'alive'  and (potato.stage > 3) and (potato.stage < 6) and (irriginterval > 7) then  
            'Cox_12 water' set dlt_sw_dep = 20.0 0.0 0.0 0.0 0.0! 
           irriginterval = 0
           applied_irr_tot = applied_irr_tot + 20
 endif
```
      Soil Cox_12: Site=Cox Farm; Region=Central North Tasmania; State=Tasmania; Longitude=147.068
        Comment = Results from CSBP Soil & Plant Laboratory in Perth (Wesfarmers).  # Comments
        SoilType = Sandy loam  # Soil description
        NearestTown = Cressy
        NaturalVegetation = Agriculture
        Latitude = -41.6014  # Latitude (WGS84)
        LocationAccuracy = +/- 20m
        DataSource = Bill Cotching and Shaun Lisson, TIAR
        InitialWater Initial water: FractionFull=1.00; PercentMethod=EvenlyDistributed
        Water
          Thickness  BD    AirDry  LL15  DUL   SAT
          150        1.24  0.08    0.17  0.49  0.532
          130        1.47  0.07    0.11  0.39  0.445
          340        1.34  0.37    0.37  0.49  0.494
          590        1.34  0.35    0.35  0.48  0.49
          SoilCrop wheat: LL=[0.17, 0.11, 0.37, 0.35]; KL=[0.16, 0.16, 0.1, 0.05]; XF=[0.8, 0.9, 1, 0.2]
          SoilCrop canola: LL=[0.17, 0.11, 0.37, 0.35]; KL=[0.16, 0.16, 0.1, 0.05]; XF=[0.8, 0.9, 1, 0.2]
          SoilCrop fieldpea: LL=[0.17, 0.11, 0.37, 0.35]; KL=[0.16, 0.16, 0.1, 0.05]; XF=[0.8, 0.9, 1, 0.2]
          SoilCrop lucerne: LL=[0.17, 0.11, 0.37, 0.35]; KL=[0.16, 0.16, 0.1, 0.05]; XF=[0.8, 0.9, 1, 0.2]
          SoilCrop weed: LL=[0.17, 0.11, 0.37, 0.35]; KL=[0.16, 0.16, 0.1, 0.05]; XF=[0.8, 0.9, 1, 0.2]
          SoilCrop broccoli: LL=[0.17, 0.11, 0.37, 0.35]; KL=[0.16, 0.16, 0.1, 0.05]; XF=[0.8, 0.9, 1, 0.2]
          SoilCrop potato: LL=[0.17, 0.11, 0.37, 0.35]; KL=[0.06, 0.06, 0.06, 0.06]; XF=[0.8, 0.9, 1, 0.2]
        SoilWater: same as 3-Thirlstane_04.paddock.Cox_12.SoilWater
        SoilOrganicMatter: RootCN=30; RootWt=1500; SoilCN=14.5; EnrACoeff=7.4; EnrBCoeff=0.2
          Thickness  OC   FBiom  FInert
          150        0.7  0.04   0.1
          130        0.7  0.04   0.1
          340        0.4  0.03   0.1
          590        0.2  0.01   0.1
        Analysis: Thickness=[150, 130, 340, 590]; PH=[5, 5, 5, 5]
        Sample Initial nitrogen
          Thickness  NO3      NH4
          150        1.54007  0.0999815
          130        1.54007  0.0999815
          340        1.54007  0.0999815
          590        1.54007  0.0999815
  simulation 32-Penguin_05
    metfile met: filename=ulverstone.met
    clock
      start_date = 1/08/2004  # Select the start date of the simulation
      end_date = 31/08/2005  # Select the end date of the simulation
    summaryfile
    area paddock
      folder Manager folder
        manager Sowing rule
          # Sowing criteria
          date1 = 15-oct  # Enter sowing window START date (dd-mmm)
          date2 = 16-oct  # Enter sowing window END date (dd-mmm)
          must_sow = yes  # Must sow?
          raincrit = 0  # Amount of rainfall
          rainnumdays = 7  # Number of days of rainfall
          esw_amount = 0  # Enter minimum allowable available soil water (mm)
          # Sowing parameters
          crop = potato  # Enter name of crop to sow
          seeds = 6  # Enter sowing density (seeds/m2)
          depth = 20  # Enter sowing depth (mm)
          cultivar = russet  # Enter cultivar
          class = plant  # Enter crop growth class
          age = 150  # Enter physiological age (deg days)
          row_spacing = 815  # Enter row spacing (mm)
          on start_of_day:
```
      if (paddock_is_fallow() = 1 and FallowIn <> 'yes' and (NextCrop = 0 or NextCrop = '[crop]')) then
         if (date_within('[date1], [date2]') = 1) then
            if (rain[[rainnumdays]] >= [raincrit] AND esw >= [esw_amount]) OR
                ('[must_sow]' = 'yes' AND today = date('[date2]'))) THEN
               ChooseNextCrop = 'yes'   ! for rotations
               
!Set relationship between potential stem number per seed and seed age

              stem_per_seed = -100+(0.3*[age])                                  !Need estimate from IRS work

!Set maximum and minimum limits

              if stem_per_seed > 10 then                                               !Need estimate from IRS work
                 stem_per_seed = 10
              elseif stem_per_seed < 2 then                                         !Need estimate from IRS work
                 stem_per_seed = 5.4
              endif

!Soil temperature factor based on top layer average soil temperature on day of sowing only!!

              stf = st(1)/10                                                                            ! Assuming that optimum temp is 10dc

!Set upper and lower limits for stf and swf

              if (stf < 0) then
                  stf = 0
               endif
               if (stf > 1) then
                  stf = 1
               endif        
       
               swf = (sw(1) - ll(1))/(dul(1) - ll(1))
               if (swf < 0) then
                  swf = 0
               endif
               if (swf > 1) then
                  swf = 1
               endif

               density = [seeds] * stem_per_seed * stf * swf
               [crop] sow plants = density, sowing_depth = [depth], cultivar = [cultivar], row_spacing = [row_spacing], crop_class = [class]
            endif
            if today = date('[date2]') then
               ChooseNextCrop = 'yes'
            endif
         endif
      endif
```
        manager Harvesting rule
          # Harvesting criteria
          crop = potato  # Enter name of crop to harvest when ripe
          on end_of_day:
          script: same as in 3-Thirlstane_04.paddock.Manager folder.Harvesting rule
        manager Sowing fertiliser
          # When should fertiliser be applied
          modulename = potato  # On which module should the event come from
          eventname = sowing  # On which event should fertiliser be applied
          # Fertiliser application details
          fertmodule = fertiliser  # Module used to apply the fertiliser
          fert_amount_sow = 234  # Amount of starter fertiliser at sowing (kg/ha)
          fert_type_sow = NO3_N  # Sowing fertiliser type
          on [modulename].[eventname]:
          script: same as in 3-Thirlstane_04.paddock.Manager folder.Sowing fertiliser
        manager Fertilise on fixed date
          # When should fertiliser be applied
          fert_date = 1-dec  # Enter fertiliser date (dd-mmm)
          fert_criteria = 1000  # Don't add fertiliser if N in top 2 layers exceeds (kg/ha)
          # Fertiliser application details
          fertmodule = fertiliser  # Module used to apply the fertiliser
          fert_amount = 115  # Amount of fertiliser to apply (kg/ha)
          fert_type = urea_N  # Fertiliser type
          on start_of_day:
          script: same as in 3-Thirlstane_04.paddock.Manager folder.Fertilise on fixed date
      fertiliser
      surfaceom surface organic matter
        PoolName = wheat  # Organic Matter pool name
        type = wheat  # Organic Matter type
        mass = 1000.  # Initial surface residue (kg/ha)
        cnr = 80.0  # C:N ratio of initial residue
        standing_fraction = 0.0  # Fraction of residue standing
      outputfile: filename=32-Penguin_05.out; title=32-Penguin_05
        events Reporting Frequency: event=Daily  # End of day
        variables: same as 3-Thirlstane_04.paddock.outputfile.Variables
      potato
      irrigation: same as 3-Thirlstane_04.paddock.Irrigation
      manager Logic
        on init:
```
 irriginterval = 0
applied_irr_tot = 0
```
        on start_of_day:
```
 !tuber_no = (density * 0.3) + 2                          !Slope and intercept from IRS relationship
 !tuber_size = tuber_wt / tuber_no

irriginterval = irriginterval + 1

 if potato.plant_status = 'alive'  and (potato.stage > 3) and (potato.stage < 6) and (irriginterval > 4) then  
            'Radford water' set dlt_sw_dep = 12.0 0.0 0.0 0.0 0.0! 
           irriginterval = 0
           applied_irr_tot = applied_irr_tot + 12
 endif
```
      Soil Radford: Site=Shane Radford; Region=Panatana; State=Tasmania
        NearestTown = Sassafras
        DataSource = Bill Cotching
        InitialWater Initial water: FractionFull=1; PercentMethod=FilledFromTop
        Water
          Thickness  BD    AirDry  LL15  DUL   SAT
          150        1.45  0.03    0.05  0.25  0.3
          150        1.48  0.06    0.12  0.22  0.24
          200        1.69  0.01    0.07  0.11  0.15
          300        1.58  0.01    0.06  0.1   0.16
          300        1.45  0.03    0.05  0.25  0.28
          SoilCrop sorghum: LL=[0.05, 0.12, 0.07, 0.06, 0.05]; KL=[0.16, 0.16, 0.1, 0.05, 0.05]; XF=[1, 1, 1, 1, 1]
          SoilCrop potato: LL=[0.05, 0.12, 0.07, 0.06, 0.05]; KL=[0.16, 0.16, 0.1, 0.05, 0.05]; XF=[1, 1, 1, 1, 1]
          SoilCrop wheat: LL=[0.05, 0.12, 0.07, 0.06, 0.05]; KL=[0.16, 0.16, 0.1, 0.05, 0.05]; XF=[1, 1, 1, 1, 1]
          SoilCrop broccoli: LL=[0.05, 0.12, 0.07, 0.06, 0.05]; KL=[0.16, 0.16, 0.1, 0.05, 0.05]; XF=[1, 1, 1, 1, 1]
          SoilCrop lucerne: LL=[0.05, 0.12, 0.07, 0.06, 0.05]; KL=[0.16, 0.16, 0.1, 0.05, 0.05]; XF=[1, 1, 1, 1, 1]
          SoilCrop navybean: LL=[0.05, 0.12, 0.07, 0.06, 0.05]; KL=[0.16, 0.16, 0.1, 0.05, 0.05]; XF=[1, 1, 1, 1, 1]
          SoilCrop canola: LL=[0.05, 0.12, 0.07, 0.06, 0.05]; KL=[0.16, 0.16, 0.1, 0.05, 0.05]; XF=[1, 1, 1, 1, 1]
        SoilWater: SummerCona=3.5; SummerU=6; SummerDate=1-Nov; WinterCona=2.5; WinterU=4; WinterDate=1-apr; DiffusConst=40; DiffusSlope=16; Salb=0.12; CN2Bare=73; CNRed=20; CNCov=0.8; Thickness=[150, 150, 200, 300, 300]; SWCON=[0.3, 0.3, 0.3, 0.3, 0.3]
        SoilOrganicMatter: RootCN=40; RootWt=1000; SoilCN=12; EnrACoeff=7.4; EnrBCoeff=0.2
          Thickness  OC    FBiom  FInert
          150        2.7   0.04   1
          150        2.72  0.02   1
          200        0.02  0.02   1
          300        0.98  0.02   1
          300        0.66  0.01   1
        Analysis: Thickness=[150, 150, 200, 300, 300]; PH=[5.9, 5.9, 6.4, 6.5, 6.5]
        Sample Initial nitrogen
          Thickness  NO3      NH4
          150        0.10003  0.10003
          150        0.10003  0.10003
          200        0.10003  0.10003
          300        0.10003  0.10003
          300        0.10003  0.10003
  simulation 30-Deloraine_05
    metfile met: filename=deloraine.met
    clock
      start_date = 1/08/2004  # Select the start date of the simulation
      end_date = 1/08/2005  # Select the end date of the simulation
    summaryfile
    area paddock
      folder Manager folder
        manager Sowing rule
          # Sowing criteria
          date1 = 17-oct  # Enter sowing window START date (dd-mmm)
          date2 = 18-oct  # Enter sowing window END date (dd-mmm)
          must_sow = yes  # Must sow?
          raincrit = 0  # Amount of rainfall
          rainnumdays = 7  # Number of days of rainfall
          esw_amount = 0  # Enter minimum allowable available soil water (mm)
          # Sowing parameters
          crop = potato  # Enter name of crop to sow
          seeds = 6  # Enter sowing density (seeds/m2)
          depth = 20  # Enter sowing depth (mm)
          cultivar = russet  # Enter cultivar
          class = plant  # Enter crop growth class
          age = 150  # Enter physiological age (deg days)
          row_spacing = 815  # Enter row spacing (mm)
          on start_of_day:
          script: same as in 9-Latrobe_05.paddock.Manager folder.Sowing rule
        manager Harvesting rule
          # Harvesting criteria
          crop = potato  # Enter name of crop to harvest when ripe
          on end_of_day:
          script: same as in 3-Thirlstane_04.paddock.Manager folder.Harvesting rule
        manager Sowing fertiliser: same as 4-Bishopbourne_04.paddock.Manager folder.Sowing fertiliser
        manager Fertilise on fixed date
          # When should fertiliser be applied
          fert_date = 1-dec  # Enter fertiliser date (dd-mmm)
          fert_criteria = 1000  # Don't add fertiliser if N in top 2 layers exceeds (kg/ha)
          # Fertiliser application details
          fertmodule = fertiliser  # Module used to apply the fertiliser
          fert_amount = 250  # Amount of fertiliser to apply (kg/ha)
          fert_type = urea_N  # Fertiliser type
          on start_of_day:
          script: same as in 3-Thirlstane_04.paddock.Manager folder.Fertilise on fixed date
      fertiliser
      surfaceom surface organic matter
        PoolName = wheat  # Organic Matter pool name
        type = wheat  # Organic Matter type
        mass = 1000.  # Initial surface residue (kg/ha)
        cnr = 80.0  # C:N ratio of initial residue
        standing_fraction = 0.0  # Fraction of residue standing
      outputfile: filename=30-Deloraine_05.out; title=30-Deloraine_05
        events Reporting Frequency: event=Daily  # End of day
        variables: same as 3-Thirlstane_04.paddock.outputfile.Variables
      potato
      irrigation: same as 3-Thirlstane_04.paddock.Irrigation
      manager Logic
        on init:
```
 irriginterval = 0
applied_irr_tot = 0
```
        on start_of_day:
```
 !tuber_no = (density * 0.3) + 2                          !Slope and intercept from IRS relationship
 !tuber_size = tuber_wt / tuber_no

irriginterval = irriginterval + 1

 if potato.plant_status = 'alive'  and (potato.stage > 3) and (potato.stage < 6) and (irriginterval > 12) then  
            'Radford water' set dlt_sw_dep = 30.0 0.0 0.0 0.0 0.0! 
           irriginterval = 0
           applied_irr_tot = applied_irr_tot + 30
 endif
```
      Soil Radford: same as 32-Penguin_05.paddock.Radford
  simulation 21-EastDevo_04
    metfile met: filename=devonport.met
    clock
      start_date = 1/08/2003  # Select the start date of the simulation
      end_date = 30/06/2004  # Select the end date of the simulation
    summaryfile
    area paddock
      folder Manager folder
        manager Sowing rule
          # Sowing criteria
          date1 = 30-oct  # Enter sowing window START date (dd-mmm)
          date2 = 31-oct  # Enter sowing window END date (dd-mmm)
          must_sow = yes  # Must sow?
          raincrit = 0  # Amount of rainfall
          rainnumdays = 7  # Number of days of rainfall
          esw_amount = 0  # Enter minimum allowable available soil water (mm)
          # Sowing parameters
          crop = potato  # Enter name of crop to sow
          seeds = 6  # Enter sowing density (seeds/m2)
          depth = 20  # Enter sowing depth (mm)
          cultivar = russet  # Enter cultivar
          class = plant  # Enter crop growth class
          age = 150  # Enter physiological age (deg days)
          row_spacing = 815  # Enter row spacing (mm)
          on start_of_day:
```
      if (paddock_is_fallow() = 1 and FallowIn <> 'yes' and (NextCrop = 0 or NextCrop = '[crop]')) then
         if (date_within('[date1], [date2]') = 1) then
            if (rain[[rainnumdays]] >= [raincrit] AND esw >= [esw_amount]) OR
                ('[must_sow]' = 'yes' AND today = date('[date2]'))) THEN
               ChooseNextCrop = 'yes'   ! for rotations
               
!Set relationship between potential stem number per seed and seed age

              stem_per_seed = -100+(0.3*[age])                                  !Need estimate from IRS work

!Set maximum and minimum limits

              if stem_per_seed > 10 then                                               !Need estimate from IRS work
                 stem_per_seed = 10
              elseif stem_per_seed < 2 then                                         !Need estimate from IRS work
                 stem_per_seed = 2.75
              endif

!Soil temperature factor based on top layer average soil temperature on day of sowing only!!

              stf = st(1)/10                                                                            ! Assuming that optimum temp is 10dc

!Set upper and lower limits for stf and swf

              if (stf < 0) then
                  stf = 0
               endif
               if (stf > 1) then
                  stf = 1
               endif        
       
               swf = (sw(1) - ll(1))/(dul(1) - ll(1))
               if (swf < 0) then
                  swf = 0
               endif
               if (swf > 1) then
                  swf = 1
               endif

               density = [seeds] * stem_per_seed * stf * swf
               [crop] sow plants = density, sowing_depth = [depth], cultivar = [cultivar], row_spacing = [row_spacing], crop_class = [class]
            endif
            if today = date('[date2]') then
               ChooseNextCrop = 'yes'
            endif
         endif
      endif
```
        manager Harvesting rule
          # Harvesting criteria
          crop = potato  # Enter name of crop to harvest when ripe
          on end_of_day:
          script: same as in 3-Thirlstane_04.paddock.Manager folder.Harvesting rule
        manager Sowing fertiliser
          # When should fertiliser be applied
          modulename = potato  # On which module should the event come from
          eventname = sowing  # On which event should fertiliser be applied
          # Fertiliser application details
          fertmodule = fertiliser  # Module used to apply the fertiliser
          fert_amount_sow = 140  # Amount of starter fertiliser at sowing (kg/ha)
          fert_type_sow = NO3_N  # Sowing fertiliser type
          on [modulename].[eventname]:
          script: same as in 3-Thirlstane_04.paddock.Manager folder.Sowing fertiliser
        manager Fertilise on fixed date
          # When should fertiliser be applied
          fert_date = 15-dec  # Enter fertiliser date (dd-mmm)
          fert_criteria = 1000  # Don't add fertiliser if N in top 2 layers exceeds (kg/ha)
          # Fertiliser application details
          fertmodule = fertiliser  # Module used to apply the fertiliser
          fert_amount = 82  # Amount of fertiliser to apply (kg/ha)
          fert_type = urea_N  # Fertiliser type
          on start_of_day:
          script: same as in 3-Thirlstane_04.paddock.Manager folder.Fertilise on fixed date
      fertiliser
      surfaceom surface organic matter
        PoolName = wheat  # Organic Matter pool name
        type = wheat  # Organic Matter type
        mass = 1000  # Initial surface residue (kg/ha)
        cnr = 80  # C:N ratio of initial residue
        standing_fraction = 0  # Fraction of residue standing
      outputfile: filename=21-EastDevo_04.out; title=21-EastDevo_04
        events Reporting Frequency: event=Daily  # End of day
        variables: same as 3-Thirlstane_04.paddock.outputfile.Variables
      potato
      irrigation: same as 3-Thirlstane_04.paddock.Irrigation
      manager Logic
        on init:
```
 irriginterval = 0
applied_irr_tot = 0
```
        on start_of_day:
```
 !tuber_no = (density * 0.3) + 2                          !Slope and intercept from IRS relationship
 !tuber_size = tuber_wt / tuber_no

irriginterval = irriginterval + 1

 if potato.plant_status = 'alive'  and (potato.stage > 3) and (potato.stage < 6) and (irriginterval > 11) then  
            'Cox_6 water' set dlt_sw_dep = 30.0 0.0 0.0 0.0 0.0! 
           irriginterval = 0
           applied_irr_tot = applied_irr_tot + 30
 endif
```
      Soil Cox_6: Site=Cox Farm; Region=Central North Tasmania; State=Tasmania; Longitude=147.08
        Comment = Results from CSBP Soil & Plant Laboratory in Perth (Wesfarmers).  # Comments
        SoilType = Clay loam  # Soil description
        NearestTown = Cressy
        NaturalVegetation = Agriculture
        Latitude = -41.5942  # Latitude (WGS84)
        LocationAccuracy = +/- 20m
        DataSource = Bill Cotching and Shaun Lisson, TIAR
        InitNitrogen Initial nitrogen
          PercentMethod: Percent=0
        InitialWater Initial water: FractionFull=0; PercentMethod=EvenlyDistributed
        Water
          Thickness  BD    AirDry  LL15  DUL   SAT
          220        1.27  0.11    0.22  0.44  0.52
          290        1.19  0.35    0.38  0.55  0.55
          260        1.15  0.36    0.36  0.55  0.566
          210        1.3   0.37    0.37  0.5   0.509
          620        1.3   0.37    0.37  0.5   0.509
          SoilCrop wheat: LL=[0.22, 0.38, 0.36, 0.37, 0.37]; KL=[0.16, 0.16, 0.16, 0.1, 0.05]; XF=[1, 0.3, 0.2, 0.1, 0.1]
          SoilCrop canola: LL=[0.22, 0.38, 0.36, 0.37, 0.37]; KL=[0.16, 0.16, 0.16, 0.1, 0.05]; XF=[1, 0.3, 0.2, 0.1, 0.1]
          SoilCrop fieldpea: LL=[0.22, 0.38, 0.36, 0.37, 0.37]; KL=[0.16, 0.16, 0.16, 0.1, 0.05]; XF=[1, 0.3, 0.2, 0.1, 0.1]
          SoilCrop lucerne: LL=[0.22, 0.38, 0.36, 0.37, 0.37]; KL=[0.16, 0.16, 0.16, 0.1, 0.05]; XF=[1, 0.3, 0.2, 0.1, 0.1]
          SoilCrop weed: LL=[0.22, 0.38, 0.36, 0.37, 0.37]; KL=[0.16, 0.16, 0.16, 0.1, 0.05]; XF=[1, 0.3, 0.2, 0.1, 0.1]
          SoilCrop broccoli: LL=[0.22, 0.38, 0.36, 0.37, 0.37]; KL=[0.16, 0.16, 0.16, 0.1, 0.05]; XF=[1, 0.3, 0.2, 0.1, 0.1]
          SoilCrop potato: LL=[0.22, 0.38, 0.36, 0.37, 0.37]; KL=[0.16, 0.16, 0.16, 0.1, 0.05]; XF=[1, 0.3, 0.2, 0.1, 0.1]
        SoilWater: same as 17-Deloraine2_06.paddock.Cox_6.SoilWater
        SoilOrganicMatter: RootCN=30; RootWt=1500; SoilCN=14.5; EnrACoeff=7.4; EnrBCoeff=0.2
          Thickness  OC   FBiom  FInert
          220        0.7  0.04   0.1
          290        0.7  0.04   0.1
          260        0.4  0.03   0.1
          210        0.3  0.2    0.1
          620        0.2  0.2    0.1
        Analysis: Thickness=[220, 290, 260, 210, 620]; PH=[5, 5, 5, 5, 5]
        Sample Soil sample: Thickness=[3000]; NO3=[0]; NH4=[0]; SW=[0]
  simulation 24-Abbotsham_04
    metfile met: filename=ulverstone.met
    clock
      start_date = 1/08/2003  # Select the start date of the simulation
      end_date = 31/08/2004  # Select the end date of the simulation
    summaryfile
    area paddock
      folder Manager folder
        manager Sowing rule
          # Sowing criteria
          date1 = 5-nov  # Enter sowing window START date (dd-mmm)
          date2 = 6-nov  # Enter sowing window END date (dd-mmm)
          must_sow = yes  # Must sow?
          raincrit = 0  # Amount of rainfall
          rainnumdays = 7  # Number of days of rainfall
          esw_amount = 0  # Enter minimum allowable available soil water (mm)
          # Sowing parameters
          crop = potato  # Enter name of crop to sow
          seeds = 6  # Enter sowing density (seeds/m2)
          depth = 20  # Enter sowing depth (mm)
          cultivar = russet  # Enter cultivar
          class = plant  # Enter crop growth class
          age = 150  # Enter physiological age (deg days)
          row_spacing = 815  # Enter row spacing (mm)
          on start_of_day:
```
      if (paddock_is_fallow() = 1 and FallowIn <> 'yes' and (NextCrop = 0 or NextCrop = '[crop]')) then
         if (date_within('[date1], [date2]') = 1) then
            if (rain[[rainnumdays]] >= [raincrit] AND esw >= [esw_amount]) OR
                ('[must_sow]' = 'yes' AND today = date('[date2]'))) THEN
               ChooseNextCrop = 'yes'   ! for rotations
               
!Set relationship between potential stem number per seed and seed age

              stem_per_seed = -100+(0.3*[age])                                  !Need estimate from IRS work

!Set maximum and minimum limits

              if stem_per_seed > 10 then                                               !Need estimate from IRS work
                 stem_per_seed = 10
              elseif stem_per_seed < 2 then                                         !Need estimate from IRS work
                 stem_per_seed = 3.46
              endif

!Soil temperature factor based on top layer average soil temperature on day of sowing only!!

              stf = st(1)/10                                                                            ! Assuming that optimum temp is 10dc

!Set upper and lower limits for stf and swf

              if (stf < 0) then
                  stf = 0
               endif
               if (stf > 1) then
                  stf = 1
               endif        
       
               swf = (sw(1) - ll(1))/(dul(1) - ll(1))
               if (swf < 0) then
                  swf = 0
               endif
               if (swf > 1) then
                  swf = 1
               endif

               density = [seeds] * stem_per_seed * stf * swf
               [crop] sow plants = density, sowing_depth = [depth], cultivar = [cultivar], row_spacing = [row_spacing], crop_class = [class]
            endif
            if today = date('[date2]') then
               ChooseNextCrop = 'yes'
            endif
         endif
      endif
```
        manager Harvesting rule
          # Harvesting criteria
          crop = potato  # Enter name of crop to harvest when ripe
          on end_of_day:
          script: same as in 3-Thirlstane_04.paddock.Manager folder.Harvesting rule
        manager Sowing fertiliser: same as 21-EastDevo_04.paddock.Manager folder.Sowing fertiliser
        manager Fertilise on fixed date
          # When should fertiliser be applied
          fert_date = 19-dec  # Enter fertiliser date (dd-mmm)
          fert_criteria = 1000  # Don't add fertiliser if N in top 2 layers exceeds (kg/ha)
          # Fertiliser application details
          fertmodule = fertiliser  # Module used to apply the fertiliser
          fert_amount = 230  # Amount of fertiliser to apply (kg/ha)
          fert_type = urea_N  # Fertiliser type
          on start_of_day:
          script: same as in 3-Thirlstane_04.paddock.Manager folder.Fertilise on fixed date
      fertiliser
      surfaceom surface organic matter
        PoolName = wheat  # Organic Matter pool name
        type = wheat  # Organic Matter type
        mass = 1000.  # Initial surface residue (kg/ha)
        cnr = 80.0  # C:N ratio of initial residue
        standing_fraction = 0.0  # Fraction of residue standing
      outputfile: filename=24-Abbotsham_04.out; title=24-Abbotsham_04
        events Reporting Frequency: event=Daily  # End of day
        variables: same as 3-Thirlstane_04.paddock.outputfile.Variables
      potato
      irrigation: same as 3-Thirlstane_04.paddock.Irrigation
      manager Logic
        on init:
```
 irriginterval = 0
applied_irr_tot = 0
```
        on start_of_day:
```
 !tuber_no = (density * 0.3) + 2                          !Slope and intercept from IRS relationship
 !tuber_size = tuber_wt / tuber_no

irriginterval = irriginterval + 1

 if potato.plant_status = 'alive'  and (potato.stage > 3) and (potato.stage < 6) and (irriginterval > 12) then  
            'Cox_6 water' set dlt_sw_dep = 30.0 0.0 0.0 0.0 0.0! 
           irriginterval = 0
           applied_irr_tot = applied_irr_tot + 30
 endif
```
      Soil Cox_6: Site=Cox Farm; Region=Central North Tasmania; State=Tasmania; Longitude=147.08
        Comment = Results from CSBP Soil & Plant Laboratory in Perth (Wesfarmers).  # Comments
        SoilType = Clay loam  # Soil description
        NearestTown = Cressy
        NaturalVegetation = Agriculture
        Latitude = -41.5942  # Latitude (WGS84)
        LocationAccuracy = +/- 20m
        DataSource = Bill Cotching and Shaun Lisson, TIAR
        InitNitrogen Initial nitrogen
          PercentMethod: Percent=0
        InitialWater Initial water: FractionFull=0; PercentMethod=EvenlyDistributed
        Water: same as 17-Deloraine2_06.paddock.Cox_6.Water
        SoilWater: same as 17-Deloraine2_06.paddock.Cox_6.SoilWater
        SoilOrganicMatter: RootCN=30; RootWt=1500; SoilCN=14.5; EnrACoeff=7.4; EnrBCoeff=0.2
          Thickness  OC   FBiom  FInert
          220        0.7  0.04   0.1
          290        0.7  0.04   0.1
          260        0.4  0.03   0.1
          210        0.3  0.2    0.1
          620        0.2  0.2    0.1
        Analysis: Thickness=[220, 290, 260, 210, 620]; PH=[5, 5, 5, 5, 5]
        Sample Soil sample: Thickness=[3000]; NO3=[0]; NH4=[0]; SW=[0]
  simulation 25-Sheffield_04
    metfile met: filename=Sheffield.met
    clock
      start_date = 1/08/2003  # Select the start date of the simulation
      end_date = 31/08/2004  # Select the end date of the simulation
    summaryfile
    area paddock
      folder Manager folder
        manager Sowing rule
          # Sowing criteria
          date1 = 14-nov  # Enter sowing window START date (dd-mmm)
          date2 = 15-nov  # Enter sowing window END date (dd-mmm)
          must_sow = yes  # Must sow?
          raincrit = 0  # Amount of rainfall
          rainnumdays = 7  # Number of days of rainfall
          esw_amount = 0  # Enter minimum allowable available soil water (mm)
          # Sowing parameters
          crop = potato  # Enter name of crop to sow
          seeds = 6  # Enter sowing density (seeds/m2)
          depth = 20  # Enter sowing depth (mm)
          cultivar = russet  # Enter cultivar
          class = plant  # Enter crop growth class
          age = 150  # Enter physiological age (deg days)
          row_spacing = 815  # Enter row spacing (mm)
          on start_of_day:
```
      if (paddock_is_fallow() = 1 and FallowIn <> 'yes' and (NextCrop = 0 or NextCrop = '[crop]')) then
         if (date_within('[date1], [date2]') = 1) then
            if (rain[[rainnumdays]] >= [raincrit] AND esw >= [esw_amount]) OR
                ('[must_sow]' = 'yes' AND today = date('[date2]'))) THEN
               ChooseNextCrop = 'yes'   ! for rotations
               
!Set relationship between potential stem number per seed and seed age

              stem_per_seed = -100+(0.3*[age])                                  !Need estimate from IRS work

!Set maximum and minimum limits

              if stem_per_seed > 10 then                                               !Need estimate from IRS work
                 stem_per_seed = 10
              elseif stem_per_seed < 2 then                                         !Need estimate from IRS work
                 stem_per_seed = 3.7
              endif

!Soil temperature factor based on top layer average soil temperature on day of sowing only!!

              stf = st(1)/10                                                                            ! Assuming that optimum temp is 10dc

!Set upper and lower limits for stf and swf

              if (stf < 0) then
                  stf = 0
               endif
               if (stf > 1) then
                  stf = 1
               endif        
       
               swf = (sw(1) - ll(1))/(dul(1) - ll(1))
               if (swf < 0) then
                  swf = 0
               endif
               if (swf > 1) then
                  swf = 1
               endif

               density = [seeds] * stem_per_seed * stf * swf
               [crop] sow plants = density, sowing_depth = [depth], cultivar = [cultivar], row_spacing = [row_spacing], crop_class = [class]
            endif
            if today = date('[date2]') then
               ChooseNextCrop = 'yes'
            endif
         endif
      endif
```
        manager Harvesting rule
          # Harvesting criteria
          crop = potato  # Enter name of crop to harvest when ripe
          on end_of_day:
          script: same as in 3-Thirlstane_04.paddock.Manager folder.Harvesting rule
        manager Sowing fertiliser: same as 14-Deloraine1_06.paddock.Manager folder.Sowing fertiliser
        manager Fertilise on fixed date
          # When should fertiliser be applied
          fert_date = 01-jan  # Enter fertiliser date (dd-mmm)
          fert_criteria = 1000  # Don't add fertiliser if N in top 2 layers exceeds (kg/ha)
          # Fertiliser application details
          fertmodule = fertiliser  # Module used to apply the fertiliser
          fert_amount = 112  # Amount of fertiliser to apply (kg/ha)
          fert_type = urea_N  # Fertiliser type
          on start_of_day:
          script: same as in 3-Thirlstane_04.paddock.Manager folder.Fertilise on fixed date
      fertiliser
      surfaceom surface organic matter
        PoolName = wheat  # Organic Matter pool name
        type = wheat  # Organic Matter type
        mass = 1000.  # Initial surface residue (kg/ha)
        cnr = 80.0  # C:N ratio of initial residue
        standing_fraction = 0.0  # Fraction of residue standing
      outputfile: filename=25-Sheffield_04.out; title=25-Sheffield_04
        events Reporting Frequency: event=Daily  # End of day
        variables: same as 3-Thirlstane_04.paddock.outputfile.Variables
      potato
      irrigation: same as 3-Thirlstane_04.paddock.Irrigation
      manager Logic
        on init:
```
 irriginterval = 0
applied_irr_tot = 0
```
        on start_of_day:
```
 !tuber_no = (density * 0.3) + 2                          !Slope and intercept from IRS relationship
 !tuber_size = tuber_wt / tuber_no

irriginterval = irriginterval + 1

 if potato.plant_status = 'alive'  and (potato.stage > 3) and (potato.stage < 6) and (irriginterval > 10) then  
            'Radford water' set dlt_sw_dep = 25.0 0.0 0.0 0.0 0.0! 
           irriginterval = 0
           applied_irr_tot = applied_irr_tot + 25
 endif
```
      Soil Radford: same as 32-Penguin_05.paddock.Radford
  simulation 26-Forthside_04
    metfile met: filename=forthside.met
    clock
      start_date = 1/08/2003  # Select the start date of the simulation
      end_date = 31/08/2004  # Select the end date of the simulation
    summaryfile
    area paddock
      folder Manager folder
        manager Sowing rule
          # Sowing criteria
          date1 = 1-nov  # Enter sowing window START date (dd-mmm)
          date2 = 2-nov  # Enter sowing window END date (dd-mmm)
          must_sow = yes  # Must sow?
          raincrit = 0  # Amount of rainfall
          rainnumdays = 7  # Number of days of rainfall
          esw_amount = 0  # Enter minimum allowable available soil water (mm)
          # Sowing parameters
          crop = potato  # Enter name of crop to sow
          seeds = 6  # Enter sowing density (seeds/m2)
          depth = 20  # Enter sowing depth (mm)
          cultivar = russet  # Enter cultivar
          class = plant  # Enter crop growth class
          age = 150  # Enter physiological age (deg days)
          row_spacing = 815  # Enter row spacing (mm)
          on start_of_day:
```
      if (paddock_is_fallow() = 1 and FallowIn <> 'yes' and (NextCrop = 0 or NextCrop = '[crop]')) then
         if (date_within('[date1], [date2]') = 1) then
            if (rain[[rainnumdays]] >= [raincrit] AND esw >= [esw_amount]) OR
                ('[must_sow]' = 'yes' AND today = date('[date2]'))) THEN
               ChooseNextCrop = 'yes'   ! for rotations
               
!Set relationship between potential stem number per seed and seed age

              stem_per_seed = -100+(0.3*[age])                                  !Need estimate from IRS work

!Set maximum and minimum limits

              if stem_per_seed > 10 then                                               !Need estimate from IRS work
                 stem_per_seed = 10
              elseif stem_per_seed < 2 then                                         !Need estimate from IRS work
                 stem_per_seed = 2.97
              endif

!Soil temperature factor based on top layer average soil temperature on day of sowing only!!

              stf = st(1)/10                                                                            ! Assuming that optimum temp is 10dc

!Set upper and lower limits for stf and swf

              if (stf < 0) then
                  stf = 0
               endif
               if (stf > 1) then
                  stf = 1
               endif        
       
               swf = (sw(1) - ll(1))/(dul(1) - ll(1))
               if (swf < 0) then
                  swf = 0
               endif
               if (swf > 1) then
                  swf = 1
               endif

               density = [seeds] * stem_per_seed * stf * swf
               [crop] sow plants = density, sowing_depth = [depth], cultivar = [cultivar], row_spacing = [row_spacing], crop_class = [class]
            endif
            if today = date('[date2]') then
               ChooseNextCrop = 'yes'
            endif
         endif
      endif
```
        manager Harvesting rule
          # Harvesting criteria
          crop = potato  # Enter name of crop to harvest when ripe
          on end_of_day:
          script: same as in 3-Thirlstane_04.paddock.Manager folder.Harvesting rule
        manager Sowing fertiliser
          # When should fertiliser be applied
          modulename = potato  # On which module should the event come from
          eventname = sowing  # On which event should fertiliser be applied
          # Fertiliser application details
          fertmodule = fertiliser  # Module used to apply the fertiliser
          fert_amount_sow = 160  # Amount of starter fertiliser at sowing (kg/ha)
          fert_type_sow = NO3_N  # Sowing fertiliser type
          on [modulename].[eventname]:
          script: same as in 3-Thirlstane_04.paddock.Manager folder.Sowing fertiliser
        manager Fertilise on fixed date
          # When should fertiliser be applied
          fert_date = 15-dec  # Enter fertiliser date (dd-mmm)
          fert_criteria = 1000  # Don't add fertiliser if N in top 2 layers exceeds (kg/ha)
          # Fertiliser application details
          fertmodule = fertiliser  # Module used to apply the fertiliser
          fert_amount = 125  # Amount of fertiliser to apply (kg/ha)
          fert_type = urea_N  # Fertiliser type
          on start_of_day:
          script: same as in 3-Thirlstane_04.paddock.Manager folder.Fertilise on fixed date
      fertiliser
      surfaceom surface organic matter
        PoolName = wheat  # Organic Matter pool name
        type = wheat  # Organic Matter type
        mass = 1000.  # Initial surface residue (kg/ha)
        cnr = 80.0  # C:N ratio of initial residue
        standing_fraction = 0.0  # Fraction of residue standing
      outputfile: filename=26-Forthside_04.out; title=26-Forthside_04
        events Reporting Frequency: event=Daily  # End of day
        variables: same as 3-Thirlstane_04.paddock.outputfile.Variables
      potato
      irrigation: same as 3-Thirlstane_04.paddock.Irrigation
      manager Logic
        on init:
```
 irriginterval = 0
applied_irr_tot = 0
```
        on start_of_day:
```
 !tuber_no = (density * 0.3) + 2                          !Slope and intercept from IRS relationship
 !tuber_size = tuber_wt / tuber_no

irriginterval = irriginterval + 1

 if potato.plant_status = 'alive'  and (potato.stage > 3) and (potato.stage < 6) and (irriginterval > 12) then  
            'Chilvers_10 water' set dlt_sw_dep = 30.0 0.0 0.0 0.0 !0.0! 
           irriginterval = 0
           applied_irr_tot = applied_irr_tot + 30
 endif
```
      Soil Chilvers_10: Site=Chilvers Farm; Region=Central North Tasmania; State=Tasmania; Longitude=147.072
        Comment = Results from CSBP Soil & Plant Laboratory in Perth (Wesfarmers).  # Comments
        SoilType = Medium clay  # Soil description
        NearestTown = Cressy
        NaturalVegetation = Agriculture
        Latitude = -41.627  # Latitude (WGS84)
        LocationAccuracy = +/- 20m
        DataSource = Bill Cotching and Shaun Lisson, TIAR
        InitialWater Initial water: FractionFull=1.00; PercentMethod=EvenlyDistributed
        Water
          Thickness  BD    AirDry  LL15  DUL   SAT
          250        1.15  0.13    0.26  0.5   0.56
          200        1.35  0.22    0.24  0.47  0.49
          350        1.71  0.11    0.11  0.31  0.35
          300        1.97  0.15    0.15  0.25  0.257
          SoilCrop wheat: LL=[0.26, 0.24, 0.11, 0.15]; KL=[0.16, 0.16, 0.1, 0.05]; XF=[0.9, 1, 0.5, 0.2]
          SoilCrop canola: LL=[0.26, 0.24, 0.11, 0.15]; KL=[0.16, 0.16, 0.1, 0.05]; XF=[0.9, 1, 0.5, 0.2]
          SoilCrop fieldpea: LL=[0.26, 0.24, 0.11, 0.15]; KL=[0.16, 0.16, 0.1, 0.05]; XF=[0.9, 1, 0.5, 0.2]
          SoilCrop lucerne: LL=[0.26, 0.24, 0.11, 0.15]; KL=[0.16, 0.16, 0.1, 0.05]; XF=[0.9, 1, 0.5, 0.2]
          SoilCrop weed: LL=[0.26, 0.24, 0.11, 0.15]; KL=[0.16, 0.16, 0.1, 0.05]; XF=[0.9, 1, 0.5, 0.2]
          SoilCrop broccoli: LL=[0.26, 0.24, 0.11, 0.15]; KL=[0.16, 0.16, 0.1, 0.05]; XF=[0.9, 1, 0.5, 0.2]
          SoilCrop potato: LL=[0.26, 0.24, 0.11, 0.15]; KL=[0.16, 0.16, 0.1, 0.05]; XF=[0.9, 1, 0.5, 0.2]
        SoilWater: same as 6-Cuprona_04.paddock.Chilvers_10.SoilWater
        SoilOrganicMatter: RootCN=30; RootWt=1500; SoilCN=14.5; EnrACoeff=7.4; EnrBCoeff=0.2
          Thickness  OC   FBiom  FInert
          250        0.7  0.04   0.1
          200        0.7  0.04   0.1
          350        0.4  0.03   0.1
          300        0.2  0.01   0.1
        Analysis: Thickness=[250, 200, 350, 300]; PH=[5, 5, 5, 5]
        Sample Initial nitrogen
          Thickness  NO3      NH4
          250        1.43102  0.1
          200        1.43102  0.1
          350        1.43102  0.1
          300        1.43102  0.1
  simulation 27-EastDevo_05
    metfile met: filename=devonport.met
    clock
      start_date = 1/08/2004  # Select the start date of the simulation
      end_date = 31/08/2005  # Select the end date of the simulation
    summaryfile
    area paddock
      folder Manager folder
        manager Sowing rule
          # Sowing criteria
          date1 = 30-oct  # Enter sowing window START date (dd-mmm)
          date2 = 31-oct  # Enter sowing window END date (dd-mmm)
          must_sow = yes  # Must sow?
          raincrit = 0  # Amount of rainfall
          rainnumdays = 7  # Number of days of rainfall
          esw_amount = 0  # Enter minimum allowable available soil water (mm)
          # Sowing parameters
          crop = potato  # Enter name of crop to sow
          seeds = 6  # Enter sowing density (seeds/m2)
          depth = 20  # Enter sowing depth (mm)
          cultivar = russet  # Enter cultivar
          class = plant  # Enter crop growth class
          age = 150  # Enter physiological age (deg days)
          row_spacing = 815  # Enter row spacing (mm)
          on start_of_day:
```
      if (paddock_is_fallow() = 1 and FallowIn <> 'yes' and (NextCrop = 0 or NextCrop = '[crop]')) then
         if (date_within('[date1], [date2]') = 1) then
            if (rain[[rainnumdays]] >= [raincrit] AND esw >= [esw_amount]) OR
                ('[must_sow]' = 'yes' AND today = date('[date2]'))) THEN
               ChooseNextCrop = 'yes'   ! for rotations
               
!Set relationship between potential stem number per seed and seed age

              stem_per_seed = -100+(0.3*[age])                                  !Need estimate from IRS work

!Set maximum and minimum limits

              if stem_per_seed > 10 then                                               !Need estimate from IRS work
                 stem_per_seed = 10
              elseif stem_per_seed < 2 then                                         !Need estimate from IRS work
                 stem_per_seed = 2.0
              endif

!Soil temperature factor based on top layer average soil temperature on day of sowing only!!

              stf = st(1)/10                                                                            ! Assuming that optimum temp is 10dc

!Set upper and lower limits for stf and swf

              if (stf < 0) then
                  stf = 0
               endif
               if (stf > 1) then
                  stf = 1
               endif        
       
               swf = (sw(1) - ll(1))/(dul(1) - ll(1))
               if (swf < 0) then
                  swf = 0
               endif
               if (swf > 1) then
                  swf = 1
               endif

               density = [seeds] * stem_per_seed * stf * swf
               [crop] sow plants = density, sowing_depth = [depth], cultivar = [cultivar], row_spacing = [row_spacing], crop_class = [class]
            endif
            if today = date('[date2]') then
               ChooseNextCrop = 'yes'
            endif
         endif
      endif
```
        manager Harvesting rule
          # Harvesting criteria
          crop = potato  # Enter name of crop to harvest when ripe
          on end_of_day:
          script: same as in 3-Thirlstane_04.paddock.Manager folder.Harvesting rule
        manager Sowing fertiliser
          # When should fertiliser be applied
          modulename = potato  # On which module should the event come from
          eventname = sowing  # On which event should fertiliser be applied
          # Fertiliser application details
          fertmodule = fertiliser  # Module used to apply the fertiliser
          fert_amount_sow = 158  # Amount of starter fertiliser at sowing (kg/ha)
          fert_type_sow = NO3_N  # Sowing fertiliser type
          on [modulename].[eventname]:
          script: same as in 3-Thirlstane_04.paddock.Manager folder.Sowing fertiliser
        manager Fertilise on fixed date
          # When should fertiliser be applied
          fert_date = 15-dec  # Enter fertiliser date (dd-mmm)
          fert_criteria = 1000  # Don't add fertiliser if N in top 2 layers exceeds (kg/ha)
          # Fertiliser application details
          fertmodule = fertiliser  # Module used to apply the fertiliser
          fert_amount = 75  # Amount of fertiliser to apply (kg/ha)
          fert_type = urea_N  # Fertiliser type
          on start_of_day:
          script: same as in 3-Thirlstane_04.paddock.Manager folder.Fertilise on fixed date
      fertiliser
      surfaceom surface organic matter
        PoolName = wheat  # Organic Matter pool name
        type = wheat  # Organic Matter type
        mass = 1000.  # Initial surface residue (kg/ha)
        cnr = 80.0  # C:N ratio of initial residue
        standing_fraction = 0.0  # Fraction of residue standing
      outputfile: filename=27-EastDevo_05.out; title=27-EastDevo_05
        events Reporting Frequency: event=Daily  # End of day
        variables: same as 3-Thirlstane_04.paddock.outputfile.Variables
      potato
      irrigation: same as 3-Thirlstane_04.paddock.Irrigation
      manager Logic
        on init:
```
 irriginterval = 0
applied_irr_tot = 0
```
        on start_of_day:
```
 !tuber_no = (density * 0.3) + 2                          !Slope and intercept from IRS relationship
 !tuber_size = tuber_wt / tuber_no

irriginterval = irriginterval + 1

 if potato.plant_status = 'alive'  and (potato.stage > 3) and (potato.stage < 6) and (irriginterval > 8) then  
            'Cox_6 water' set dlt_sw_dep = 20.0 0.0 0.0 0.0 0.0! 
           irriginterval = 0
           applied_irr_tot = applied_irr_tot + 20
 endif
```
      Soil Cox_6: Site=Cox Farm; Region=Central North Tasmania; State=Tasmania; Longitude=147.08
        Comment = Results from CSBP Soil & Plant Laboratory in Perth (Wesfarmers).  # Comments
        SoilType = Clay loam  # Soil description
        NearestTown = Cressy
        NaturalVegetation = Agriculture
        Latitude = -41.5942  # Latitude (WGS84)
        LocationAccuracy = +/- 20m
        DataSource = Bill Cotching and Shaun Lisson, TIAR
        InitialWater Initial water: FractionFull=1.00; PercentMethod=EvenlyDistributed
        Water: same as 21-EastDevo_04.paddock.Cox_6.Water
        SoilWater: same as 17-Deloraine2_06.paddock.Cox_6.SoilWater
        SoilOrganicMatter: RootCN=30; RootWt=1500; SoilCN=14.5; EnrACoeff=7.4; EnrBCoeff=0.2
          Thickness  OC   FBiom  FInert
          220        0.7  0.04   0.1
          290        0.7  0.04   0.1
          260        0.4  0.03   0.1
          210        0.3  0.2    0.1
          620        0.2  0.2    0.1
        Analysis: Thickness=[220, 290, 260, 210, 620]; PH=[5, 5, 5, 5, 5]
        Sample Initial nitrogen
          Thickness  NO3      NH4
          220        1.24844  0.100025
          290        1.24844  0.100025
          260        1.24844  0.100025
          210        1.24844  0.100025
          620        1.24844  0.100025
  simulation 29-Gawler_05
    metfile met: filename=ulverstone.met
    clock
      start_date = 1/08/2004  # Select the start date of the simulation
      end_date = 1/08/2005  # Select the end date of the simulation
    summaryfile
    area paddock
      folder Manager folder
        manager Sowing rule
          # Sowing criteria
          date1 = 25-oct  # Enter sowing window START date (dd-mmm)
          date2 = 26-oct  # Enter sowing window END date (dd-mmm)
          must_sow = yes  # Must sow?
          raincrit = 0  # Amount of rainfall
          rainnumdays = 7  # Number of days of rainfall
          esw_amount = 0  # Enter minimum allowable available soil water (mm)
          # Sowing parameters
          crop = potato  # Enter name of crop to sow
          seeds = 20  # Enter sowing density (seeds/m2)
          depth = 20  # Enter sowing depth (mm)
          cultivar = russet  # Enter cultivar
          class = plant  # Enter crop growth class
          age = 150  # Enter physiological age (deg days)
          row_spacing = 320  # Enter row spacing (mm)
          on start_of_day:
```
      if (paddock_is_fallow() = 1 and FallowIn <> 'yes' and (NextCrop = 0 or NextCrop = '[crop]')) then
         if (date_within('[date1], [date2]') = 1) then
            if (rain[[rainnumdays]] >= [raincrit] AND esw >= [esw_amount]) OR
                ('[must_sow]' = 'yes' AND today = date('[date2]'))) THEN
               ChooseNextCrop = 'yes'   ! for rotations
               
!Set relationship between potential stem number per seed and seed age

              stem_per_seed = -100+(0.3*[age])                                  !Need estimate from IRS work

!Set maximum and minimum limits

              if stem_per_seed > 10 then                                               !Need estimate from IRS work
                 stem_per_seed = 10
              elseif stem_per_seed < 2 then                                         !Need estimate from IRS work
                 stem_per_seed = 3.2
              endif

!Soil temperature factor based on top layer average soil temperature on day of sowing only!!

              stf = st(1)/10                                                                            ! Assuming that optimum temp is 10dc

!Set upper and lower limits for stf and swf

              if (stf < 0) then
                  stf = 0
               endif
               if (stf > 1) then
                  stf = 1
               endif        
       
               swf = (sw(1) - ll(1))/(dul(1) - ll(1))
               if (swf < 0) then
                  swf = 0
               endif
               if (swf > 1) then
                  swf = 1
               endif

               density = [seeds] * stem_per_seed * stf * swf
               [crop] sow plants = density, sowing_depth = [depth], cultivar = [cultivar], row_spacing = [row_spacing], crop_class = [class]
            endif
            if today = date('[date2]') then
               ChooseNextCrop = 'yes'
            endif
         endif
      endif
```
        manager Harvesting rule
          # Harvesting criteria
          crop = potato  # Enter name of crop to harvest when ripe
          on end_of_day:
          script: same as in 3-Thirlstane_04.paddock.Manager folder.Harvesting rule
        manager Sowing fertiliser: same as 2-Wynyard_04.paddock.Manager folder.Sowing fertiliser
        manager Fertilise on fixed date
          # When should fertiliser be applied
          fert_date = 8-dec  # Enter fertiliser date (dd-mmm)
          fert_criteria = 1000  # Don't add fertiliser if N in top 2 layers exceeds (kg/ha)
          # Fertiliser application details
          fertmodule = fertiliser  # Module used to apply the fertiliser
          fert_amount = 196  # Amount of fertiliser to apply (kg/ha)
          fert_type = urea_N  # Fertiliser type
          on start_of_day:
          script: same as in 3-Thirlstane_04.paddock.Manager folder.Fertilise on fixed date
      fertiliser
      surfaceom surface organic matter
        PoolName = wheat  # Organic Matter pool name
        type = wheat  # Organic Matter type
        mass = 1000.  # Initial surface residue (kg/ha)
        cnr = 80.0  # C:N ratio of initial residue
        standing_fraction = 0.0  # Fraction of residue standing
      outputfile: filename=29-Gawler_05.out; title=29-Gawler_05
        events Reporting Frequency: event=Daily  # End of day
        variables: same as 3-Thirlstane_04.paddock.outputfile.Variables
      potato
      irrigation: same as 3-Thirlstane_04.paddock.Irrigation
      manager Logic
        on init:
```
 irriginterval = 0
applied_irr_tot = 0
```
        on start_of_day:
```
 !tuber_no = (density * 0.3) + 2                          !Slope and intercept from IRS relationship
 !tuber_size = tuber_wt / tuber_no

irriginterval = irriginterval + 1

 if potato.plant_status = 'alive'  and (potato.stage > 3) and (potato.stage < 6) and (irriginterval > 10) then  
            'Rockcliff water' set dlt_sw_dep = 25.0 0.0 0.0 0.0 0.0! 
           irriginterval = 0
           applied_irr_tot = applied_irr_tot + 25
 endif
```
      Soil Rockcliff: Site=Rick Rockcliff; Region=Panatana; State=Tasmania
        NearestTown = Sassafras
        DataSource = Bill Cotching
        InitialWater Initial water: FractionFull=1; PercentMethod=FilledFromTop
        Water
          Thickness  BD    AirDry  LL15  DUL   SAT
          150        0.9   0.15    0.21  0.37  0.45
          150        1.11  0.16    0.21  0.44  0.48
          200        1.08  0.12    0.3   0.41  0.56
          300        1.18  0.12    0.34  0.45  0.53
          300        1.26  0.15    0.37  0.51  0.52
          SoilCrop sorghum: LL=[0.21, 0.21, 0.3, 0.34, 0.37]; KL=[0.16, 0.16, 0.1, 0.05, 0.05]; XF=[1, 1, 1, 1, 1]
          SoilCrop potato: LL=[0.21, 0.21, 0.3, 0.34, 0.37]; KL=[0.16, 0.16, 0.1, 0.05, 0.05]; XF=[1, 1, 1, 1, 1]
          SoilCrop wheat: LL=[0.21, 0.21, 0.3, 0.34, 0.37]; KL=[0.16, 0.16, 0.1, 0.05, 0.05]; XF=[1, 1, 1, 1, 1]
          SoilCrop broccoli: LL=[0.21, 0.21, 0.3, 0.34, 0.37]; KL=[0.16, 0.16, 0.1, 0.05, 0.05]; XF=[1, 1, 1, 1, 1]
          SoilCrop lucerne: LL=[0.21, 0.21, 0.3, 0.34, 0.37]; KL=[0.16, 0.16, 0.1, 0.05, 0.05]; XF=[1, 1, 1, 1, 1]
          SoilCrop navybean: LL=[0.21, 0.21, 0.3, 0.34, 0.37]; KL=[0.16, 0.16, 0.1, 0.05, 0.05]; XF=[1, 1, 1, 1, 1]
          SoilCrop canola: LL=[0.21, 0.21, 0.3, 0.34, 0.37]; KL=[0.16, 0.16, 0.1, 0.05, 0.05]; XF=[1, 1, 1, 1, 1]
          SoilCrop fieldpea: LL=[0.21, 0.21, 0.3, 0.34, 0.37]; KL=[0.16, 0.16, 0.1, 0.05, 0.05]; XF=[1, 1, 1, 1, 1]
        SoilWater: SummerCona=3.5; SummerU=6; SummerDate=1-Nov; WinterCona=2.5; WinterU=4; WinterDate=1-apr; DiffusConst=40; DiffusSlope=16; Salb=0.12; CN2Bare=73; CNRed=20; CNCov=0.8; Thickness=[150, 150, 200, 300, 300]; SWCON=[0.3, 0.3, 0.3, 0.3, 0.3]
        SoilOrganicMatter: RootCN=40; RootWt=1000; SoilCN=12; EnrACoeff=7.4; EnrBCoeff=0.2
          Thickness  OC    FBiom  FInert
          150        4.95  0.04   1
          150        4.76  0.02   1
          200        2.07  0.02   1
          300        1.12  0.02   1
          300        0.47  0.01   1
        Analysis: Thickness=[150, 150, 200, 300, 300]; PH=[6.6, 6.6, 5.8, 5.6, 5.6]
        Sample Initial nitrogen
          Thickness  NO3      NH4
          150        2.80112  0.10004
          150        2.80112  0.10004
          200        2.80112  0.10004
          300        2.80112  0.10004
          300        2.80112  0.10004
  simulation 31-Campbelltown_05
    metfile met: filename=epping.met
    clock
      start_date = 1/08/2004  # Select the start date of the simulation
      end_date = 1/08/2005  # Select the end date of the simulation
    summaryfile
    area paddock
      folder Manager folder
        manager Sowing rule
          # Sowing criteria
          date1 = 19-oct  # Enter sowing window START date (dd-mmm)
          date2 = 20-oct  # Enter sowing window END date (dd-mmm)
          must_sow = yes  # Must sow?
          raincrit = 0  # Amount of rainfall
          rainnumdays = 7  # Number of days of rainfall
          esw_amount = 0  # Enter minimum allowable available soil water (mm)
          # Sowing parameters
          crop = potato  # Enter name of crop to sow
          seeds = 6  # Enter sowing density (seeds/m2)
          depth = 20  # Enter sowing depth (mm)
          cultivar = russet  # Enter cultivar
          class = plant  # Enter crop growth class
          age = 150  # Enter physiological age (deg days)
          row_spacing = 815  # Enter row spacing (mm)
          on start_of_day:
          script: same as in 15-S_Creek1_06.paddock.Manager folder.Sowing rule
        manager Harvesting rule
          # Harvesting criteria
          crop = potato  # Enter name of crop to harvest when ripe
          on end_of_day:
          script: same as in 3-Thirlstane_04.paddock.Manager folder.Harvesting rule
        manager Sowing fertiliser
          # When should fertiliser be applied
          modulename = potato  # On which module should the event come from
          eventname = sowing  # On which event should fertiliser be applied
          # Fertiliser application details
          fertmodule = fertiliser  # Module used to apply the fertiliser
          fert_amount_sow = 100  # Amount of starter fertiliser at sowing (kg/ha)
          fert_type_sow = NO3_N  # Sowing fertiliser type
          on [modulename].[eventname]:
          script: same as in 3-Thirlstane_04.paddock.Manager folder.Sowing fertiliser
        manager Fertilise on fixed date
          # When should fertiliser be applied
          fert_date = 5-dec  # Enter fertiliser date (dd-mmm)
          fert_criteria = 1000  # Don't add fertiliser if N in top 2 layers exceeds (kg/ha)
          # Fertiliser application details
          fertmodule = fertiliser  # Module used to apply the fertiliser
          fert_amount = 138  # Amount of fertiliser to apply (kg/ha)
          fert_type = urea_N  # Fertiliser type
          on start_of_day:
          script: same as in 3-Thirlstane_04.paddock.Manager folder.Fertilise on fixed date
      fertiliser
      surfaceom surface organic matter
        PoolName = wheat  # Organic Matter pool name
        type = wheat  # Organic Matter type
        mass = 1000  # Initial surface residue (kg/ha)
        cnr = 80  # C:N ratio of initial residue
        standing_fraction = 0  # Fraction of residue standing
      outputfile: filename=31-Campbelltown_05.out; title=31-Campbelltown_05
        events Reporting Frequency: event=Daily  # End of day
        variables: same as 3-Thirlstane_04.paddock.outputfile.Variables
      potato
      irrigation: same as 3-Thirlstane_04.paddock.Irrigation
      manager Logic: same as 32-Penguin_05.paddock.Logic
      Soil Radford: same as 32-Penguin_05.paddock.Radford
  simulation 33-E_Devonport_04
    metfile met: filename=devonport.met
    clock
      start_date = 1/08/2003  # Select the start date of the simulation
      end_date = 31/08/2004  # Select the end date of the simulation
    summaryfile
    area paddock
      folder Manager folder
        manager Sowing rule
          # Sowing criteria
          date1 = 10-nov  # Enter sowing window START date (dd-mmm)
          date2 = 11-nov  # Enter sowing window END date (dd-mmm)
          must_sow = yes  # Must sow?
          raincrit = 0  # Amount of rainfall
          rainnumdays = 7  # Number of days of rainfall
          esw_amount = 0  # Enter minimum allowable available soil water (mm)
          # Sowing parameters
          crop = potato  # Enter name of crop to sow
          seeds = 9  # Enter sowing density (seeds/m2)
          depth = 20  # Enter sowing depth (mm)
          cultivar = russet  # Enter cultivar
          class = plant  # Enter crop growth class
          age = 150  # Enter physiological age (deg days)
          row_spacing = 815  # Enter row spacing (mm)
          on start_of_day:
          script: same as in 3-Thirlstane_04.paddock.Manager folder.Sowing rule
        manager Harvesting rule
          # Harvesting criteria
          crop = potato  # Enter name of crop to harvest when ripe
          on end_of_day:
          script: same as in 3-Thirlstane_04.paddock.Manager folder.Harvesting rule
        manager Sowing fertiliser
          # When should fertiliser be applied
          modulename = potato  # On which module should the event come from
          eventname = sowing  # On which event should fertiliser be applied
          # Fertiliser application details
          fertmodule = fertiliser  # Module used to apply the fertiliser
          fert_amount_sow = 408  # Amount of starter fertiliser at sowing (kg/ha)
          fert_type_sow = NO3_N  # Sowing fertiliser type
          on [modulename].[eventname]:
          script: same as in 3-Thirlstane_04.paddock.Manager folder.Sowing fertiliser
        manager Fertilise on fixed date
          # When should fertiliser be applied
          fert_date = 30-dec  # Enter fertiliser date (dd-mmm)
          fert_criteria = 1000  # Don't add fertiliser if N in top 2 layers exceeds (kg/ha)
          # Fertiliser application details
          fertmodule = fertiliser  # Module used to apply the fertiliser
          fert_amount = 0  # Amount of fertiliser to apply (kg/ha)
          fert_type = urea_N  # Fertiliser type
          on start_of_day:
          script: same as in 3-Thirlstane_04.paddock.Manager folder.Fertilise on fixed date
      fertiliser
      surfaceom surface organic matter
        PoolName = wheat  # Organic Matter pool name
        type = wheat  # Organic Matter type
        mass = 1000.  # Initial surface residue (kg/ha)
        cnr = 80.0  # C:N ratio of initial residue
        standing_fraction = 0.0  # Fraction of residue standing
      outputfile: filename=33-E_Devonport_04.out; title=33-E_Devonport_04
        events Reporting Frequency: event=Daily  # End of day
        variables: same as 3-Thirlstane_04.paddock.outputfile.Variables
      potato
      irrigation: same as 3-Thirlstane_04.paddock.Irrigation
      manager Logic
        on init:
```
 irriginterval = 0
applied_irr_tot = 0
```
        on start_of_day:
```
 !tuber_no = (density * 0.3) + 2                          !Slope and intercept from IRS relationship
 !tuber_size = tuber_wt / tuber_no

irriginterval = irriginterval + 1

 if potato.plant_status = 'alive'  and (potato.stage > 3) and (potato.stage < 6) and (irriginterval > 12) then  
            'Tul_2 water' set dlt_sw_dep = 30.0 0.0 0.0 0.0 0.0! 
           irriginterval = 0
           applied_irr_tot = applied_irr_tot + 30
 endif
```
      Soil Tul_2: Site=Tulich farm; Region=Central North Tasmania; State=Tasmania; Longitude=147.06
        Comment = Results from CSBP Soil & Plant Laboratory in Perth (Wesfarmers).  # Comments
        SoilType = Clay loam  # Soil description
        NearestTown = Cressy
        NaturalVegetation = Agriculture
        Latitude = -41.6393  # Latitude (WGS84)
        LocationAccuracy = +/- 20m
        DataSource = Bill Cotching and Shaun Lisson, TIAR
        InitNitrogen Initial nitrogen
          PercentMethod: Percent=0
        InitialWater Initial water: FractionFull=0; PercentMethod=EvenlyDistributed
        Water
          Thickness  BD    AirDry  LL15  DUL   SAT
          200        1.32  0.07    0.14  0.4   0.5
          120        1.43  0.12    0.16  0.42  0.46
          180        1.43  0.16    0.16  0.42  0.46
          550        2.04  0.12    0.12  0.22  0.23
          350        1.93  0.21    0.21  0.26  0.27
          SoilCrop wheat: LL=[0.14, 0.16, 0.16, 0.12, 0.21]; KL=[0.16, 0.16, 0.16, 0.1, 0.05]; XF=[1, 1, 0.8, 0.4, 0.3]
          SoilCrop canola: LL=[0.14, 0.16, 0.16, 0.12, 0.21]; KL=[0.16, 0.16, 0.16, 0.1, 0.05]; XF=[1, 1, 0.8, 0.4, 0.3]
          SoilCrop fieldpea: LL=[0.14, 0.16, 0.16, 0.12, 0.21]; KL=[0.16, 0.16, 0.16, 0.1, 0.05]; XF=[1, 1, 0.8, 0.4, 0.3]
          SoilCrop lucerne: LL=[0.14, 0.16, 0.16, 0.12, 0.21]; KL=[0.16, 0.16, 0.16, 0.1, 0.05]; XF=[1, 1, 0.8, 0.4, 0.3]
          SoilCrop weed: LL=[0.14, 0.16, 0.16, 0.12, 0.21]; KL=[0.16, 0.16, 0.16, 0.1, 0.05]; XF=[1, 1, 0.8, 0.4, 0.3]
          SoilCrop broccoli: LL=[0.14, 0.16, 0.16, 0.12, 0.21]; KL=[0.16, 0.16, 0.16, 0.1, 0.05]; XF=[1, 1, 0.8, 0.4, 0.3]
          SoilCrop potato: LL=[0.14, 0.16, 0.16, 0.12, 0.21]; KL=[0.16, 0.16, 0.16, 0.1, 0.05]; XF=[1, 1, 0.8, 0.4, 0.3]
        SoilWater: SummerCona=3.5; SummerU=6; SummerDate=1-Nov; WinterCona=2; WinterU=2; WinterDate=1-Apr; DiffusConst=88; DiffusSlope=36; Salb=0.1; CN2Bare=65; CNRed=20; CNCov=0.8
          Thickness  SWCON  MWCON
          200        0.5    1
          120        0.5    1
          180        0.4    1
          550        0.2    1
          350        0.2    1
        SoilOrganicMatter: RootCN=30; RootWt=1500; SoilCN=14.5; EnrACoeff=7.4; EnrBCoeff=0.2
          Thickness  OC   FBiom  FInert
          200        0.7  0.04   0.1
          120        0.7  0.04   0.1
          180        0.4  0.03   0.1
          550        0.4  0.01   0.1
          350        0.3  0.01   0.1
        Analysis: Thickness=[200, 120, 180, 550, 350]; PH=[5, 5, 5, 5, 5]
        Sample Soil sample: Thickness=[3000]; NO3=[0]; NH4=[0]; SW=[0]
  simulation 34-Sheffield_04
    metfile met: filename=Sheffield.met
    clock
      start_date = 1/08/2003  # Select the start date of the simulation
      end_date = 31/08/2004  # Select the end date of the simulation
    summaryfile
    area paddock
      folder Manager folder
        manager Sowing rule
          # Sowing criteria
          date1 = 17-Nov  # Enter sowing window START date (dd-mmm)
          date2 = 18-Nov  # Enter sowing window END date (dd-mmm)
          must_sow = yes  # Must sow?
          raincrit = 0  # Amount of rainfall
          rainnumdays = 7  # Number of days of rainfall
          esw_amount = 0  # Enter minimum allowable available soil water (mm)
          # Sowing parameters
          crop = potato  # Enter name of crop to sow
          seeds = 6  # Enter sowing density (seeds/m2)
          depth = 20  # Enter sowing depth (mm)
          cultivar = russet  # Enter cultivar
          class = plant  # Enter crop growth class
          age = 150  # Enter physiological age (deg days)
          row_spacing = 320  # Enter row spacing (mm)
          on start_of_day:
```
      if (paddock_is_fallow() = 1 and FallowIn <> 'yes' and (NextCrop = 0 or NextCrop = '[crop]')) then
         if (date_within('[date1], [date2]') = 1) then
            if (rain[[rainnumdays]] >= [raincrit] AND esw >= [esw_amount]) OR
                ('[must_sow]' = 'yes' AND today = date('[date2]'))) THEN
               ChooseNextCrop = 'yes'   ! for rotations
               
!Set relationship between potential stem number per seed and seed age

              stem_per_seed = -100+(0.3*[age])                                  !Need estimate from IRS work

!Set maximum and minimum limits

              if stem_per_seed > 10 then                                               !Need estimate from IRS work
                 stem_per_seed = 10
              elseif stem_per_seed < 2 then                                         !Need estimate from IRS work
                 stem_per_seed = 2.3
              endif

!Soil temperature factor based on top layer average soil temperature on day of sowing only!!

              stf = st(1)/10                                                                            ! Assuming that optimum temp is 10dc

!Set upper and lower limits for stf and swf

              if (stf < 0) then
                  stf = 0
               endif
               if (stf > 1) then
                  stf = 1
               endif        
       
               swf = (sw(1) - ll(1))/(dul(1) - ll(1))
               if (swf < 0) then
                  swf = 0
               endif
               if (swf > 1) then
                  swf = 1
               endif

               density = [seeds] * stem_per_seed * stf * swf
               [crop] sow plants = density, sowing_depth = [depth], cultivar = [cultivar], row_spacing = [row_spacing], crop_class = [class]
            endif
            if today = date('[date2]') then
               ChooseNextCrop = 'yes'
            endif
         endif
      endif
```
        manager Harvesting rule
          # Harvesting criteria
          crop = potato  # Enter name of crop to harvest when ripe
          on end_of_day:
          script: same as in 3-Thirlstane_04.paddock.Manager folder.Harvesting rule
        manager Sowing fertiliser: same as 5-Deloraine_04.paddock.Manager folder.Sowing fertiliser
        manager Fertilise on fixed date
          # When should fertiliser be applied
          fert_date = 1-jan  # Enter fertiliser date (dd-mmm)
          fert_criteria = 1000  # Don't add fertiliser if N in top 2 layers exceeds (kg/ha)
          # Fertiliser application details
          fertmodule = fertiliser  # Module used to apply the fertiliser
          fert_amount = 58  # Amount of fertiliser to apply (kg/ha)
          fert_type = urea_N  # Fertiliser type
          on start_of_day:
          script: same as in 3-Thirlstane_04.paddock.Manager folder.Fertilise on fixed date
      fertiliser
      surfaceom surface organic matter
        PoolName = wheat  # Organic Matter pool name
        type = wheat  # Organic Matter type
        mass = 1000.  # Initial surface residue (kg/ha)
        cnr = 80.0  # C:N ratio of initial residue
        standing_fraction = 0.0  # Fraction of residue standing
      outputfile: filename=34-Sheffield_04.out; title=34-Sheffield_04
        events Reporting Frequency: event=Daily  # End of day
        variables: same as 3-Thirlstane_04.paddock.outputfile.Variables
      potato
      irrigation: same as 3-Thirlstane_04.paddock.Irrigation
      manager Logic
        on init:
```
 irriginterval = 0
applied_irr_tot = 0
```
        on start_of_day:
```
 !tuber_no = (density * 0.3) + 2                          !Slope and intercept from IRS relationship
 !tuber_size = tuber_wt / tuber_no

irriginterval = irriginterval + 1

 if potato.plant_status = 'alive'  and (potato.stage > 3) and (potato.stage < 6) and (irriginterval > 6) then  
            'Cox_12 water' set dlt_sw_dep = 15.0 0.0 0.0 0.0 !0.0! 
           irriginterval = 0
           applied_irr_tot = applied_irr_tot + 15
 endif
```
      Soil Cox_12: Site=Cox Farm; Region=Central North Tasmania; State=Tasmania; Longitude=147.068
        Comment = Results from CSBP Soil & Plant Laboratory in Perth (Wesfarmers).  # Comments
        SoilType = Sandy loam  # Soil description
        NearestTown = Cressy
        NaturalVegetation = Agriculture
        Latitude = -41.6014  # Latitude (WGS84)
        LocationAccuracy = +/- 20m
        DataSource = Bill Cotching and Shaun Lisson, TIAR
        InitNitrogen Initial nitrogen
          PercentMethod: Percent=0
        InitialWater Initial water: FractionFull=0; PercentMethod=EvenlyDistributed
        Water
          Thickness  BD    AirDry  LL15  DUL   SAT
          150        1.24  0.08    0.17  0.49  0.532
          130        1.47  0.07    0.11  0.39  0.445
          340        1.34  0.37    0.37  0.49  0.494
          590        1.34  0.35    0.35  0.48  0.49
          SoilCrop wheat: LL=[0.17, 0.11, 0.37, 0.35]; KL=[0.16, 0.16, 0.1, 0.05]; XF=[0.8, 0.9, 1, 0.2]
          SoilCrop canola: LL=[0.17, 0.11, 0.37, 0.35]; KL=[0.16, 0.16, 0.1, 0.05]; XF=[0.8, 0.9, 1, 0.2]
          SoilCrop fieldpea: LL=[0.17, 0.11, 0.37, 0.35]; KL=[0.16, 0.16, 0.1, 0.05]; XF=[0.8, 0.9, 1, 0.2]
          SoilCrop lucerne: LL=[0.17, 0.11, 0.37, 0.35]; KL=[0.16, 0.16, 0.1, 0.05]; XF=[0.8, 0.9, 1, 0.2]
          SoilCrop weed: LL=[0.17, 0.11, 0.37, 0.35]; KL=[0.16, 0.16, 0.1, 0.05]; XF=[0.8, 0.9, 1, 0.2]
          SoilCrop broccoli: LL=[0.17, 0.11, 0.37, 0.35]; KL=[0.16, 0.16, 0.1, 0.05]; XF=[0.8, 0.9, 1, 0.2]
          SoilCrop potato: LL=[0.17, 0.11, 0.37, 0.35]; KL=[0.16, 0.16, 0.1, 0.05]; XF=[0.8, 0.9, 1, 0.2]
        SoilWater: same as 3-Thirlstane_04.paddock.Cox_12.SoilWater
        SoilOrganicMatter: RootCN=30; RootWt=1500; SoilCN=14.5; EnrACoeff=7.4; EnrBCoeff=0.2
          Thickness  OC   FBiom  FInert
          150        0.7  0.04   0.1
          130        0.7  0.04   0.1
          340        0.4  0.03   0.1
          590        0.2  0.01   0.1
        Analysis: Thickness=[150, 130, 340, 590]; PH=[5, 5, 5, 5]
        Sample Soil sample: Thickness=[3000]; NO3=[0]; NH4=[0]; SW=[0]
  simulation 35-Wynyard_04
    metfile met: filename=wynyard.met
    clock
      start_date = 1/08/2003  # Select the start date of the simulation
      end_date = 31/08/2004  # Select the end date of the simulation
    summaryfile
    area paddock
      folder Manager folder
        manager Sowing rule
          # Sowing criteria
          date1 = 20-nov  # Enter sowing window START date (dd-mmm)
          date2 = 21-nov  # Enter sowing window END date (dd-mmm)
          must_sow = yes  # Must sow?
          raincrit = 0  # Amount of rainfall
          rainnumdays = 7  # Number of days of rainfall
          esw_amount = 0  # Enter minimum allowable available soil water (mm)
          # Sowing parameters
          crop = potato  # Enter name of crop to sow
          seeds = 6  # Enter sowing density (seeds/m2)
          depth = 20  # Enter sowing depth (mm)
          cultivar = russet  # Enter cultivar
          class = plant  # Enter crop growth class
          age = 150  # Enter physiological age (deg days)
          row_spacing = 815  # Enter row spacing (mm)
          on start_of_day:
          script: same as in 9-Latrobe_05.paddock.Manager folder.Sowing rule
        manager Harvesting rule
          # Harvesting criteria
          crop = potato  # Enter name of crop to harvest when ripe
          on end_of_day:
          script: same as in 3-Thirlstane_04.paddock.Manager folder.Harvesting rule
        manager Sowing fertiliser: same as 20-Stowport_06.paddock.Manager folder.Sowing fertiliser
        manager Fertilise on fixed date
          # When should fertiliser be applied
          fert_date = 01-jan  # Enter fertiliser date (dd-mmm)
          fert_criteria = 1000  # Don't add fertiliser if N in top 2 layers exceeds (kg/ha)
          # Fertiliser application details
          fertmodule = fertiliser  # Module used to apply the fertiliser
          fert_amount = 58  # Amount of fertiliser to apply (kg/ha)
          fert_type = urea_N  # Fertiliser type
          on start_of_day:
          script: same as in 3-Thirlstane_04.paddock.Manager folder.Fertilise on fixed date
      fertiliser
      surfaceom surface organic matter
        PoolName = wheat  # Organic Matter pool name
        type = wheat  # Organic Matter type
        mass = 1000.  # Initial surface residue (kg/ha)
        cnr = 80.0  # C:N ratio of initial residue
        standing_fraction = 0.0  # Fraction of residue standing
      outputfile: filename=35-Wynyard_04.out; title=35-Wynyard_04
        events Reporting Frequency: event=Daily  # End of day
        variables: same as 3-Thirlstane_04.paddock.outputfile.Variables
      potato
      irrigation: same as 3-Thirlstane_04.paddock.Irrigation
      manager Logic: same as 26-Forthside_04.paddock.Logic
      Soil Chilvers_10: same as 26-Forthside_04.paddock.Chilvers_10
  simulation 36-Westbury_04
    metfile met: filename=Westbury.met
    clock
      start_date = 1/08/2003  # Select the start date of the simulation
      end_date = 31/08/2004  # Select the end date of the simulation
    summaryfile
    area paddock
      folder Manager folder
        manager Sowing rule
          # Sowing criteria
          date1 = 20-nov  # Enter sowing window START date (dd-mmm)
          date2 = 21-nov  # Enter sowing window END date (dd-mmm)
          must_sow = yes  # Must sow?
          raincrit = 0  # Amount of rainfall
          rainnumdays = 7  # Number of days of rainfall
          esw_amount = 0  # Enter minimum allowable available soil water (mm)
          # Sowing parameters
          crop = potato  # Enter name of crop to sow
          seeds = 6  # Enter sowing density (seeds/m2)
          depth = 20  # Enter sowing depth (mm)
          cultivar = russet  # Enter cultivar
          class = plant  # Enter crop growth class
          age = 150  # Enter physiological age (deg days)
          row_spacing = 815  # Enter row spacing (mm)
          on start_of_day:
          script: same as in 25-Sheffield_04.paddock.Manager folder.Sowing rule
        manager Harvesting rule
          # Harvesting criteria
          crop = potato  # Enter name of crop to harvest when ripe
          on end_of_day:
          script: same as in 3-Thirlstane_04.paddock.Manager folder.Harvesting rule
        manager Sowing fertiliser: same as 9-Latrobe_05.paddock.Manager folder.Sowing fertiliser
        manager Fertilise on fixed date: same as 35-Wynyard_04.paddock.Manager folder.Fertilise on fixed date
      fertiliser
      surfaceom surface organic matter
        PoolName = wheat  # Organic Matter pool name
        type = wheat  # Organic Matter type
        mass = 1000.  # Initial surface residue (kg/ha)
        cnr = 80.0  # C:N ratio of initial residue
        standing_fraction = 0.0  # Fraction of residue standing
      outputfile: filename=36-Westbury_04.out; title=36-Westbury_04
        events Reporting Frequency: event=Daily  # End of day
        variables: same as 3-Thirlstane_04.paddock.outputfile.Variables
      potato
      irrigation: same as 3-Thirlstane_04.paddock.Irrigation
      manager Logic
        on init:
```
 irriginterval = 0
applied_irr_tot = 0
```
        on start_of_day:
```
 !tuber_no = (density * 0.3) + 2                          !Slope and intercept from IRS relationship
 !tuber_size = tuber_wt / tuber_no

irriginterval = irriginterval + 1

 if potato.plant_status = 'alive'  and (potato.stage > 3) and (potato.stage < 6) and (irriginterval > 12) then  
            'Cox_12 water' set dlt_sw_dep = 28.0 0.0 0.0 0.0 !0.0! 
           irriginterval = 0
           applied_irr_tot = applied_irr_tot + 28
 endif
```
      Soil Cox_12: Site=Cox Farm; Region=Central North Tasmania; State=Tasmania; Longitude=147.068
        Comment = Results from CSBP Soil & Plant Laboratory in Perth (Wesfarmers).  # Comments
        SoilType = Sandy loam  # Soil description
        NearestTown = Cressy
        NaturalVegetation = Agriculture
        Latitude = -41.6014  # Latitude (WGS84)
        LocationAccuracy = +/- 20m
        DataSource = Bill Cotching and Shaun Lisson, TIAR
        InitialWater Initial water: FractionFull=1.00; PercentMethod=EvenlyDistributed
        Water: same as 34-Sheffield_04.paddock.Cox_12.Water
        SoilWater: same as 3-Thirlstane_04.paddock.Cox_12.SoilWater
        SoilOrganicMatter: RootCN=30; RootWt=1500; SoilCN=14.5; EnrACoeff=7.4; EnrBCoeff=0.2
          Thickness  OC   FBiom  FInert
          150        0.7  0.04   0.1
          130        0.7  0.04   0.1
          340        0.4  0.03   0.1
          590        0.2  0.01   0.1
        Analysis: Thickness=[150, 130, 340, 590]; PH=[5, 5, 5, 5]
        Sample Initial nitrogen
          Thickness  NO3      NH4
          150        1.54007  0.0999815
          130        1.54007  0.0999815
          340        1.54007  0.0999815
          590        1.54007  0.0999815
  simulation 40-Ulverstone_05
    metfile met: filename=ulverstone.met
    clock
      start_date = 1/08/2004  # Select the start date of the simulation
      end_date = 1/08/2005  # Select the end date of the simulation
    summaryfile
    area paddock
      folder Manager folder
        manager Sowing rule
          # Sowing criteria
          date1 = 11-oct  # Enter sowing window START date (dd-mmm)
          date2 = 12-oct  # Enter sowing window END date (dd-mmm)
          must_sow = yes  # Must sow?
          raincrit = 0  # Amount of rainfall
          rainnumdays = 7  # Number of days of rainfall
          esw_amount = 0  # Enter minimum allowable available soil water (mm)
          # Sowing parameters
          crop = potato  # Enter name of crop to sow
          seeds = 6  # Enter sowing density (seeds/m2)
          depth = 20  # Enter sowing depth (mm)
          cultivar = russet  # Enter cultivar
          class = plant  # Enter crop growth class
          age = 150  # Enter physiological age (deg days)
          row_spacing = 815  # Enter row spacing (mm)
          on start_of_day:
          script: same as in 8-Deloraine_05.paddock.Manager folder.Sowing rule
        manager Harvesting rule
          # Harvesting criteria
          crop = potato  # Enter name of crop to harvest when ripe
          on end_of_day:
          script: same as in 3-Thirlstane_04.paddock.Manager folder.Harvesting rule
        manager Sowing fertiliser
          # When should fertiliser be applied
          modulename = potato  # On which module should the event come from
          eventname = sowing  # On which event should fertiliser be applied
          # Fertiliser application details
          fertmodule = fertiliser  # Module used to apply the fertiliser
          fert_amount_sow = 193  # Amount of starter fertiliser at sowing (kg/ha)
          fert_type_sow = NO3_N  # Sowing fertiliser type
          on [modulename].[eventname]:
          script: same as in 3-Thirlstane_04.paddock.Manager folder.Sowing fertiliser
        manager Fertilise on fixed date
          # When should fertiliser be applied
          fert_date = 01-dec  # Enter fertiliser date (dd-mmm)
          fert_criteria = 1000  # Don't add fertiliser if N in top 2 layers exceeds (kg/ha)
          # Fertiliser application details
          fertmodule = fertiliser  # Module used to apply the fertiliser
          fert_amount = 75  # Amount of fertiliser to apply (kg/ha)
          fert_type = urea_N  # Fertiliser type
          on start_of_day:
          script: same as in 3-Thirlstane_04.paddock.Manager folder.Fertilise on fixed date
      fertiliser
      surfaceom surface organic matter
        PoolName = wheat  # Organic Matter pool name
        type = wheat  # Organic Matter type
        mass = 1000.  # Initial surface residue (kg/ha)
        cnr = 80.0  # C:N ratio of initial residue
        standing_fraction = 0.0  # Fraction of residue standing
      outputfile: filename=40-Ulverstone_05.out; title=40-Ulverstone_05
        events Reporting Frequency: event=Daily  # End of day
        variables: same as 3-Thirlstane_04.paddock.outputfile.Variables
      potato
      irrigation: same as 3-Thirlstane_04.paddock.Irrigation
      manager Logic: same as 26-Forthside_04.paddock.Logic
      Soil Chilvers_10: same as 26-Forthside_04.paddock.Chilvers_10
  simulation 41-Westbury_05
    metfile met: filename=Westbury.met
    clock
      start_date = 1/08/2004  # Select the start date of the simulation
      end_date = 1/08/2005  # Select the end date of the simulation
    summaryfile
    area paddock
      folder Manager folder
        manager Sowing rule
          # Sowing criteria
          date1 = 5-nov  # Enter sowing window START date (dd-mmm)
          date2 = 6-nov  # Enter sowing window END date (dd-mmm)
          must_sow = yes  # Must sow?
          raincrit = 0  # Amount of rainfall
          rainnumdays = 7  # Number of days of rainfall
          esw_amount = 0  # Enter minimum allowable available soil water (mm)
          # Sowing parameters
          crop = potato  # Enter name of crop to sow
          seeds = 20  # Enter sowing density (seeds/m2)
          depth = 20  # Enter sowing depth (mm)
          cultivar = russet  # Enter cultivar
          class = plant  # Enter crop growth class
          age = 150  # Enter physiological age (deg days)
          row_spacing = 320  # Enter row spacing (mm)
          on start_of_day:
          script: same as in 4-Bishopbourne_04.paddock.Manager folder.Sowing rule
        manager Harvesting rule
          # Harvesting criteria
          crop = potato  # Enter name of crop to harvest when ripe
          on end_of_day:
          script: same as in 3-Thirlstane_04.paddock.Manager folder.Harvesting rule
        manager Sowing fertiliser
          # When should fertiliser be applied
          modulename = potato  # On which module should the event come from
          eventname = sowing  # On which event should fertiliser be applied
          # Fertiliser application details
          fertmodule = fertiliser  # Module used to apply the fertiliser
          fert_amount_sow = 248  # Amount of starter fertiliser at sowing (kg/ha)
          fert_type_sow = NO3_N  # Sowing fertiliser type
          on [modulename].[eventname]:
          script: same as in 3-Thirlstane_04.paddock.Manager folder.Sowing fertiliser
        manager Fertilise on fixed date
          # When should fertiliser be applied
          fert_date = 15-dec  # Enter fertiliser date (dd-mmm)
          fert_criteria = 1000  # Don't add fertiliser if N in top 2 layers exceeds (kg/ha)
          # Fertiliser application details
          fertmodule = fertiliser  # Module used to apply the fertiliser
          fert_amount = 0  # Amount of fertiliser to apply (kg/ha)
          fert_type = urea_N  # Fertiliser type
          on start_of_day:
          script: same as in 3-Thirlstane_04.paddock.Manager folder.Fertilise on fixed date
      fertiliser
      surfaceom surface organic matter
        PoolName = wheat  # Organic Matter pool name
        type = wheat  # Organic Matter type
        mass = 1000.  # Initial surface residue (kg/ha)
        cnr = 80.0  # C:N ratio of initial residue
        standing_fraction = 0.0  # Fraction of residue standing
      outputfile: filename=41-Westbury_05.out; title=41-Westbury_05
        events Reporting Frequency: event=Daily  # End of day
        variables: same as 3-Thirlstane_04.paddock.outputfile.Variables
      potato
      irrigation: same as 3-Thirlstane_04.paddock.Irrigation
      manager Logic
        on init:
```
 irriginterval = 0
applied_irr_tot = 0
```
        on start_of_day:
```
 !tuber_no = (density * 0.3) + 2                          !Slope and intercept from IRS relationship
 !tuber_size = tuber_wt / tuber_no

irriginterval = irriginterval + 1

 if potato.plant_status = 'alive'  and (potato.stage > 3) and (potato.stage < 6) and (irriginterval > 8) then  
            'Rockcliff water' set dlt_sw_dep = 20.0 0.0 0.0 0.0 0.0! 
           irriginterval = 0
           applied_irr_tot = applied_irr_tot + 20
 endif
```
      Soil Rockcliff: same as 29-Gawler_05.paddock.Rockcliff
  simulation 44-Cressy_06
    metfile met: filename=cressy.met
    clock
      start_date = 1/08/2005  # Select the start date of the simulation
      end_date = 1/08/2006  # Select the end date of the simulation
    summaryfile
    area paddock
      folder Manager folder
        manager Sowing rule
          # Sowing criteria
          date1 = 27-nov  # Enter sowing window START date (dd-mmm)
          date2 = 28-nov  # Enter sowing window END date (dd-mmm)
          must_sow = yes  # Must sow?
          raincrit = 0  # Amount of rainfall
          rainnumdays = 7  # Number of days of rainfall
          esw_amount = 0  # Enter minimum allowable available soil water (mm)
          # Sowing parameters
          crop = potato  # Enter name of crop to sow
          seeds = 6  # Enter sowing density (seeds/m2)
          depth = 20  # Enter sowing depth (mm)
          cultivar = russet  # Enter cultivar
          class = plant  # Enter crop growth class
          age = 150  # Enter physiological age (deg days)
          row_spacing = 815  # Enter row spacing (mm)
          on start_of_day:
          script: same as in 32-Penguin_05.paddock.Manager folder.Sowing rule
        manager Harvesting rule
          # Harvesting criteria
          crop = potato  # Enter name of crop to harvest when ripe
          on end_of_day:
          script: same as in 3-Thirlstane_04.paddock.Manager folder.Harvesting rule
        manager Sowing fertiliser: same as 9-Latrobe_05.paddock.Manager folder.Sowing fertiliser
        manager Fertilise on fixed date
          # When should fertiliser be applied
          fert_date = 5-jan  # Enter fertiliser date (dd-mmm)
          fert_criteria = 1000  # Don't add fertiliser if N in top 2 layers exceeds (kg/ha)
          # Fertiliser application details
          fertmodule = fertiliser  # Module used to apply the fertiliser
          fert_amount = 58  # Amount of fertiliser to apply (kg/ha)
          fert_type = urea_N  # Fertiliser type
          on start_of_day:
          script: same as in 3-Thirlstane_04.paddock.Manager folder.Fertilise on fixed date
      fertiliser
      surfaceom surface organic matter
        PoolName = wheat  # Organic Matter pool name
        type = wheat  # Organic Matter type
        mass = 1000.  # Initial surface residue (kg/ha)
        cnr = 80.0  # C:N ratio of initial residue
        standing_fraction = 0.0  # Fraction of residue standing
      outputfile: filename=44-Cressy_06.out; title=44-Cressy_06
        events Reporting Frequency: event=Daily  # End of day
        variables: same as 3-Thirlstane_04.paddock.outputfile.Variables
      potato
      irrigation: same as 3-Thirlstane_04.paddock.Irrigation
      manager Logic
        on init:
```
 irriginterval = 0
applied_irr_tot = 0
```
        on start_of_day:
```
 !tuber_no = (density * 0.3) + 2                          !Slope and intercept from IRS relationship
 !tuber_size = tuber_wt / tuber_no

irriginterval = irriginterval + 1

 if potato.plant_status = 'alive'  and (potato.stage > 3) and (potato.stage < 6) and (irriginterval > 11) then  
            'Radford water' set dlt_sw_dep = 20.0 0.0 0.0 0.0 0.0! 
           irriginterval = 0
           applied_irr_tot = applied_irr_tot + 20
 endif
```
      Soil Radford: same as 32-Penguin_05.paddock.Radford
  simulation 47-Forthside_06
    metfile met: filename=forthside.met
    clock
      start_date = 1/08/2005  # Select the start date of the simulation
      end_date = 1/08/2006  # Select the end date of the simulation
    summaryfile
    area paddock
      folder Manager folder
        manager Sowing rule
          # Sowing criteria
          date1 = 22-nov  # Enter sowing window START date (dd-mmm)
          date2 = 23-nov  # Enter sowing window END date (dd-mmm)
          must_sow = yes  # Must sow?
          raincrit = 0  # Amount of rainfall
          rainnumdays = 7  # Number of days of rainfall
          esw_amount = 0  # Enter minimum allowable available soil water (mm)
          # Sowing parameters
          crop = potato  # Enter name of crop to sow
          seeds = 6  # Enter sowing density (seeds/m2)
          depth = 20  # Enter sowing depth (mm)
          cultivar = russet  # Enter cultivar
          class = plant  # Enter crop growth class
          age = 150  # Enter physiological age (deg days)
          row_spacing = 815  # Enter row spacing (mm)
          on start_of_day:
```
      if (paddock_is_fallow() = 1 and FallowIn <> 'yes' and (NextCrop = 0 or NextCrop = '[crop]')) then
         if (date_within('[date1], [date2]') = 1) then
            if (rain[[rainnumdays]] >= [raincrit] AND esw >= [esw_amount]) OR
                ('[must_sow]' = 'yes' AND today = date('[date2]'))) THEN
               ChooseNextCrop = 'yes'   ! for rotations
               
!Set relationship between potential stem number per seed and seed age

              stem_per_seed = -100+(0.3*[age])                                  !Need estimate from IRS work

!Set maximum and minimum limits

              if stem_per_seed > 10 then                                               !Need estimate from IRS work
                 stem_per_seed = 10
              elseif stem_per_seed < 2 then                                         !Need estimate from IRS work
                 stem_per_seed = 4.8
              endif

!Soil temperature factor based on top layer average soil temperature on day of sowing only!!

              stf = st(1)/10                                                                            ! Assuming that optimum temp is 10dc

!Set upper and lower limits for stf and swf

              if (stf < 0) then
                  stf = 0
               endif
               if (stf > 1) then
                  stf = 1
               endif        
       
               swf = (sw(1) - ll(1))/(dul(1) - ll(1))
               if (swf < 0) then
                  swf = 0
               endif
               if (swf > 1) then
                  swf = 1
               endif

               density = [seeds] * stem_per_seed * stf * swf
               [crop] sow plants = density, sowing_depth = [depth], cultivar = [cultivar], row_spacing = [row_spacing], crop_class = [class]
            endif
            if today = date('[date2]') then
               ChooseNextCrop = 'yes'
            endif
         endif
      endif
```
        manager Harvesting rule
          # Harvesting criteria
          crop = potato  # Enter name of crop to harvest when ripe
          on end_of_day:
          script: same as in 3-Thirlstane_04.paddock.Manager folder.Harvesting rule
        manager Sowing fertiliser
          # When should fertiliser be applied
          modulename = potato  # On which module should the event come from
          eventname = sowing  # On which event should fertiliser be applied
          # Fertiliser application details
          fertmodule = fertiliser  # Module used to apply the fertiliser
          fert_amount_sow = 57  # Amount of starter fertiliser at sowing (kg/ha)
          fert_type_sow = NO3_N  # Sowing fertiliser type
          on [modulename].[eventname]:
          script: same as in 3-Thirlstane_04.paddock.Manager folder.Sowing fertiliser
        manager Fertilise on fixed date
          # When should fertiliser be applied
          fert_date = 05-jan  # Enter fertiliser date (dd-mmm)
          fert_criteria = 1000  # Don't add fertiliser if N in top 2 layers exceeds (kg/ha)
          # Fertiliser application details
          fertmodule = fertiliser  # Module used to apply the fertiliser
          fert_amount = 35  # Amount of fertiliser to apply (kg/ha)
          fert_type = urea_N  # Fertiliser type
          on start_of_day:
          script: same as in 3-Thirlstane_04.paddock.Manager folder.Fertilise on fixed date
      fertiliser
      surfaceom surface organic matter
        PoolName = wheat  # Organic Matter pool name
        type = wheat  # Organic Matter type
        mass = 1000.  # Initial surface residue (kg/ha)
        cnr = 80.0  # C:N ratio of initial residue
        standing_fraction = 0.0  # Fraction of residue standing
      outputfile: filename=47-Forthside_06.out; title=47-Forthside_06
        events Reporting Frequency: event=Daily  # End of day
        variables: same as 3-Thirlstane_04.paddock.outputfile.Variables
      potato
      irrigation: same as 3-Thirlstane_04.paddock.Irrigation
      manager Logic
        on init:
```
 irriginterval = 0
applied_irr_tot = 0
```
        on start_of_day:
```
 !tuber_no = (density * 0.3) + 2                          !Slope and intercept from IRS relationship
 !tuber_size = tuber_wt / tuber_no

irriginterval = irriginterval + 1

 if potato.plant_status = 'alive'  and (potato.stage > 3) and (potato.stage < 6) and (irriginterval > 10) then  
            'Cox_6 water' set dlt_sw_dep = 28.0 0.0 0.0 0.0 0.0! 
           irriginterval = 0
           applied_irr_tot = applied_irr_tot + 28
 endif
```
      Soil Cox_6: same as 24-Abbotsham_04.paddock.Cox_6
  simulation 1-Latrobe_04
    metfile met: filename=latrobe.met
    clock
      start_date = 1/08/2003  # Select the start date of the simulation
      end_date = 30/05/2004  # Select the end date of the simulation
    summaryfile
    area paddock
      folder Manager folder
        manager Sowing rule
          # Sowing criteria
          date1 = 23-oct  # Enter sowing window START date (dd-mmm)
          date2 = 24-oct  # Enter sowing window END date (dd-mmm)
          must_sow = yes  # Must sow?
          raincrit = 0  # Amount of rainfall
          rainnumdays = 7  # Number of days of rainfall
          esw_amount = 0  # Enter minimum allowable available soil water (mm)
          # Sowing parameters
          crop = potato  # Enter name of crop to sow
          seeds = 6  # Enter sowing density (seeds/m2)
          depth = 20  # Enter sowing depth (mm)
          cultivar = russet  # Enter cultivar
          class = plant  # Enter crop growth class
          age = 150  # Enter physiological age (deg days)
          row_spacing = 320  # Enter row spacing (mm)
          on start_of_day:
          script: same as in 3-Thirlstane_04.paddock.Manager folder.Sowing rule
        manager Harvesting rule
          # Harvesting criteria
          crop = potato  # Enter name of crop to harvest when ripe
          on end_of_day:
          script: same as in 3-Thirlstane_04.paddock.Manager folder.Harvesting rule
        manager Sowing fertiliser
          # When should fertiliser be applied
          modulename = potato  # On which module should the event come from
          eventname = sowing  # On which event should fertiliser be applied
          # Fertiliser application details
          fertmodule = fertiliser  # Module used to apply the fertiliser
          fert_amount_sow = 147  # Amount of starter fertiliser at sowing (kg/ha)
          fert_type_sow = NO3_N  # Sowing fertiliser type
          on [modulename].[eventname]:
          script: same as in 3-Thirlstane_04.paddock.Manager folder.Sowing fertiliser
        manager Fertilise on fixed date
          # When should fertiliser be applied
          fert_date = 10-dec  # Enter fertiliser date (dd-mmm)
          fert_criteria = 1000  # Don't add fertiliser if N in top 2 layers exceeds (kg/ha)
          # Fertiliser application details
          fertmodule = fertiliser  # Module used to apply the fertiliser
          fert_amount = 179  # Amount of fertiliser to apply (kg/ha)
          fert_type = urea_N  # Fertiliser type
          on start_of_day:
          script: same as in 3-Thirlstane_04.paddock.Manager folder.Fertilise on fixed date
      fertiliser
      surfaceom surface organic matter
        PoolName = wheat  # Organic Matter pool name
        type = wheat  # Organic Matter type
        mass = 1000.  # Initial surface residue (kg/ha)
        cnr = 80.0  # C:N ratio of initial residue
        standing_fraction = 0.0  # Fraction of residue standing
      outputfile: filename=1-Latrobe_04.out; title=1-Latrobe_04
        events Reporting Frequency: event=Daily  # End of day
        variables: same as 3-Thirlstane_04.paddock.outputfile.Variables
      potato
      irrigation: same as 3-Thirlstane_04.paddock.Irrigation
      manager Logic
        on init:
```
 irriginterval = 0
applied_irr_tot = 0
raintot = 0
```
        on start_of_day:
```
 !tuber_no = (density * 0.3) + 2                          !Slope and intercept from IRS relationship
 !tuber_size = tuber_wt / tuber_no

irriginterval = irriginterval + 1

 if potato.plant_status = 'alive'  and (potato.stage > 3) and (potato.stage < 6) and (irriginterval > 12) then  
            'Reader_11 water' set dlt_sw_dep = 30.0 0.0 0.0 0.0 0.0! 
           irriginterval = 0
           applied_irr_tot = applied_irr_tot + 30
 endif
```
      Soil Reader_11: Site=Reader Farm; Region=Central North Tasmania; State=Tasmania; Longitude=147.021
        Comment = Results from CSBP Soil & Plant Laboratory in Perth (Wesfarmers).  # Comments
        SoilType = Clay loam  # Soil description
        NearestTown = Cressy
        NaturalVegetation = Agriculture
        Latitude = -41.6155  # Latitude (WGS84)
        LocationAccuracy = +/- 20m
        DataSource = Bill Cotching and Shaun Lisson, TIAR
        InitialWater Initial water: FractionFull=1.00; PercentMethod=EvenlyDistributed
        Water
          Thickness  BD    AirDry  LL15  DUL   SAT
          200        1.37  0.12    0.25  0.45  0.48
          160        1.28  0.25    0.3   0.41  0.517
          120        1.23  0.4     0.4   0.48  0.536
          320        1.24  0.43    0.43  0.52  0.53
          300        1.24  0.43    0.43  0.52  0.53
          SoilCrop wheat: LL=[0.25, 0.3, 0.4, 0.43, 0.43]; KL=[0.16, 0.16, 0.16, 0.1, 0.05]; XF=[1, 1, 0.8, 0.3, 0.1]
          SoilCrop canola: LL=[0.25, 0.3, 0.4, 0.43, 0.43]; KL=[0.16, 0.16, 0.16, 0.1, 0.05]; XF=[1, 1, 0.8, 0.3, 0.1]
          SoilCrop fieldpea: LL=[0.25, 0.3, 0.4, 0.43, 0.43]; KL=[0.16, 0.16, 0.16, 0.1, 0.05]; XF=[1, 1, 0.8, 0.3, 0.1]
          SoilCrop lucerne: LL=[0.25, 0.3, 0.4, 0.43, 0.43]; KL=[0.16, 0.16, 0.16, 0.1, 0.05]; XF=[1, 1, 0.8, 0.3, 0.1]
          SoilCrop weed: LL=[0.25, 0.3, 0.4, 0.43, 0.43]; KL=[0.16, 0.16, 0.16, 0.1, 0.05]; XF=[1, 1, 0.8, 0.3, 0.1]
          SoilCrop broccoli: LL=[0.25, 0.3, 0.4, 0.43, 0.43]; KL=[0.16, 0.16, 0.16, 0.1, 0.05]; XF=[1, 1, 0.8, 0.3, 0.1]
          SoilCrop potato: LL=[0.25, 0.3, 0.4, 0.43, 0.43]; KL=[0.16, 0.16, 0.16, 0.1, 0.05]; XF=[1, 1, 1, 1, 1]
        SoilWater: SummerCona=3.5; SummerU=6; SummerDate=1-Nov; WinterCona=2; WinterU=2; WinterDate=1-Apr; DiffusConst=40; DiffusSlope=16; Salb=0.1; CN2Bare=70; CNRed=20; CNCov=0.8
          Thickness  SWCON  MWCON
          200        0.5    1
          160        0.5    1
          120        0.4    1
          320        0.2    1
          300        0.2    1
        SoilOrganicMatter: RootCN=30; RootWt=1500; SoilCN=14.5; EnrACoeff=7.4; EnrBCoeff=0.2
          Thickness  OC   FBiom  FInert
          200        0.7  0.04   0.1
          160        0.7  0.04   0.1
          120        0.4  0.03   0.1
          320        0.3  0.2    0.1
          300        0.2  0.2    0.1
        Analysis: Thickness=[200, 160, 120, 320, 300]; PH=[5, 5, 5, 5, 5]
        Sample Initial nitrogen
          Thickness  NO3      NH4
          200        1.79186  0.0999857
          160        1.79186  0.0999857
          120        1.79186  0.0999857
          320        1.79186  0.0999857
          300        1.79186  0.0999857
  simulation 11-Barrington_06
    metfile met: filename=Sheffield.met
    clock
      start_date = 1/08/2005  # Select the start date of the simulation
      end_date = 31/08/2006  # Select the end date of the simulation
    summaryfile
    area paddock
      folder Manager folder
        manager Sowing rule
          # Sowing criteria
          date1 = 18-nov  # Enter sowing window START date (dd-mmm)
          date2 = 19-nov  # Enter sowing window END date (dd-mmm)
          must_sow = yes  # Must sow?
          raincrit = 0  # Amount of rainfall
          rainnumdays = 7  # Number of days of rainfall
          esw_amount = 0  # Enter minimum allowable available soil water (mm)
          # Sowing parameters
          crop = potato  # Enter name of crop to sow
          seeds = 6  # Enter sowing density (seeds/m2)
          depth = 20  # Enter sowing depth (mm)
          cultivar = russet  # Enter cultivar
          class = plant  # Enter crop growth class
          age = 150  # Enter physiological age (deg days)
          row_spacing = 815  # Enter row spacing (mm)
          on start_of_day:
          script: same as in 3-Thirlstane_04.paddock.Manager folder.Sowing rule
        manager Harvesting rule
          # Harvesting criteria
          crop = potato  # Enter name of crop to harvest when ripe
          on end_of_day:
          script: same as in 3-Thirlstane_04.paddock.Manager folder.Harvesting rule
        manager Sowing fertiliser: same as 26-Forthside_04.paddock.Manager folder.Sowing fertiliser
        manager Fertilise on fixed date
          # When should fertiliser be applied
          fert_date = 01-jan  # Enter fertiliser date (dd-mmm)
          fert_criteria = 1000  # Don't add fertiliser if N in top 2 layers exceeds (kg/ha)
          # Fertiliser application details
          fertmodule = fertiliser  # Module used to apply the fertiliser
          fert_amount = 219  # Amount of fertiliser to apply (kg/ha)
          fert_type = urea_N  # Fertiliser type
          on start_of_day:
          script: same as in 3-Thirlstane_04.paddock.Manager folder.Fertilise on fixed date
      fertiliser
      surfaceom surface organic matter
        PoolName = wheat  # Organic Matter pool name
        type = wheat  # Organic Matter type
        mass = 1000  # Initial surface residue (kg/ha)
        cnr = 80  # C:N ratio of initial residue
        standing_fraction = 0  # Fraction of residue standing
      outputfile: filename=11-Barrington_06.out; title=11-Barrington_06
        events Reporting Frequency: event=Daily  # End of day
        variables: same as 3-Thirlstane_04.paddock.outputfile.Variables
      potato
      irrigation: same as 3-Thirlstane_04.paddock.Irrigation
      manager Logic
        on init:
```
 irriginterval = 0
applied_irr_tot = 0
```
        on start_of_day:
```
 !tuber_no = (density * 0.3) + 2                          !Slope and intercept from IRS relationship
 !tuber_size = tuber_wt / tuber_no

irriginterval = irriginterval + 1

 if potato.plant_status = 'alive'  and (potato.stage > 3) and (potato.stage < 6) and (irriginterval > 8) then  
            'Anderson_8 water' set dlt_sw_dep = 20.0 0.0 0.0 !0.0 !0.0! 
           irriginterval = 0
           applied_irr_tot = applied_irr_tot + 20
 endif
```
      Soil Anderson_8: Site=Anderson farm; Region=Central North Tasmania; State=Tasmania; Longitude=146.989
        Comment = Results from CSBP Soil & Plant Laboratory in Perth (Wesfarmers).  # Comments
        SoilType = Clay loam  # Soil description
        NearestTown = Cressy
        NaturalVegetation = Agriculture
        Latitude = -41.6706  # Latitude (WGS84)
        LocationAccuracy = +/- 20m
        DataSource = Bill Cotching and Shaun Lisson, TIAR
        InitialWater Initial water: FractionFull=1.00; PercentMethod=EvenlyDistributed
        Water
          Thickness  BD    AirDry  LL15  DUL   SAT
          260        1.17  0.03    0.07  0.48  0.55
          280        1.41  0.2     0.24  0.46  0.46
          660        1.27  0.2     0.2   0.51  0.52
          SoilCrop wheat: LL=[0.07, 0.24, 0.2]; KL=[0.16, 0.16, 0.1]; XF=[1, 1, 0.1]
          SoilCrop canola: LL=[0.07, 0.24, 0.2]; KL=[0.16, 0.16, 0.1]; XF=[1, 1, 0.1]
          SoilCrop fieldpea: LL=[0.07, 0.24, 0.2]; KL=[0.16, 0.16, 0.1]; XF=[1, 1, 0.1]
          SoilCrop lucerne: LL=[0.07, 0.24, 0.2]; KL=[0.16, 0.16, 0.1]; XF=[1, 1, 0.1]
          SoilCrop weed: LL=[0.07, 0.24, 0.2]; KL=[0.16, 0.16, 0.1]; XF=[1, 1, 0.1]
          SoilCrop broccoli: LL=[0.07, 0.24, 0.2]; KL=[0.16, 0.16, 0.1]; XF=[1, 1, 0.1]
          SoilCrop potato: LL=[0.07, 0.24, 0.2]; KL=[0.06, 0.06, 0.06]; XF=[1, 1, 1]
        SoilWater: SummerCona=3.5; SummerU=6; SummerDate=1-Nov; WinterCona=2; WinterU=2; WinterDate=1-Apr; DiffusConst=40; DiffusSlope=16; Salb=0.1; CN2Bare=70; CNRed=20; CNCov=0.8
          Thickness  SWCON  MWCON
          260        0.5    1
          280        0.5    1
          660        0.01   1
        SoilOrganicMatter: RootCN=30; RootWt=1500; SoilCN=14.5; EnrACoeff=7.4; EnrBCoeff=0.2
          Thickness  OC   FBiom  FInert
          260        0.7  0.04   0.1
          280        0.7  0.04   0.1
          660        0.4  0.03   0.1
        Analysis: Thickness=[260, 280, 660]; PH=[5, 5, 5]
        Sample Initial nitrogen
          Thickness  NO3      NH4
          260        1.62633  0.099987
          280        1.62633  0.099987
          660        1.62633  0.099987
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