folder Simulations: version=32
  simulation Pukekohe_FSP_highN
    metfile met: filename=Pukehohe.met
    clock
      start_date = 1/05/2000  # Enter the start date of the simulation
      end_date = 1/12/2000  # Enter the end date of the simulation
    summaryfile
    area paddock
      fertiliser
      surfaceom surface organic matter
        PoolName = wheat  # Organic Matter pool name
        type = wheat  # Organic Matter type
        mass = 2000  # Initial surface residue (kg/ha)
        cnr = 80  # C:N ratio of initial residue
        standing_fraction = 0  # Fraction of residue standing
      folder Manager folder
        manager Sowing rule
          # Sowing criteria
          date1 = 2-may  # Enter sowing window START date (dd-mmm)
          date2 = 2-may  # Enter sowing window END date (dd-mmm)
          must_sow = yes  # Must sow?
          raincrit = 10  # Amount of rainfall
          rainnumdays = 7  # Number of days of rainfall
          esw_amount = 10  # Enter minimum allowable available soil water (mm)
          # Sowing parameters
          crop = potato  # Enter name of crop to sow
          seeds = 5  # Enter sowing density (seeds/m2)
          depth = 200  # Enter sowing depth (mm)
          cultivar = russet  # Enter cultivar
          class = plant  # Enter crop growth class
          age = 1000  # Enter physiological age (deg days)
          row_spacing = 650  # Enter row spacing (mm)
          on start_of_day:
```
      if (paddock_is_fallow() = 1 ) then
         if (date_within('[date1], [date2]') = 1) then
            if (rain[[rainnumdays]] >= [raincrit] AND esw >= [esw_amount]) OR
                ('[must_sow]' = 'yes' AND today = date('[date2]'))) THEN
               ChooseNextCrop = 'yes'   ! for rotations
               stf = st(1) / 10.
               if (stf < 0) then
                  stf = 0
               endif
               if (stf > 1) then
                  stf = 1
               endif               
               swf = (sw(1) - ll(1))/(dul(1) - ll(1))
               if (swf < 0) then
                  swf = 0
               endif
               if (swf > 1) then
                  swf = 1
               endif
               density = [seeds]*4 !* [age]/2000. * stf * swf
               [crop] sow plants = density, sowing_depth = [depth], cultivar = [cultivar], row_spacing = [row_spacing], crop_class = [class]
            endif
         endif
      endif
```
        manager Harvesting rule
          # Harvesting criteria
          crop = potato  # Enter name of crop to harvest when ripe
          on end_of_day:
```
           if [crop].StageName = 'maturity' or [crop].plant_status = 'dead' then
              [crop]  harvest
              [crop]  end_crop
           endif
```
        operations
          2/05/2000  fertiliser apply amount= 300 (kg/ha), type= urea_N (), depth= 10 (mm)
          14/06/2000  fertiliser apply amount= 170 (kg/ha), type= urea_N (), depth= 10 (mm)
        irrigation
          automatic_irrigation = off
          asw_depth = 600  # Depth to which ASW is calculated. (mm)
          crit_fr_asw = 0.5  # Fraction of ASW below which irrigation is applied (0-1.0)
          irrigation_efficiency = 1  # Efficiency of the irrigation. (0-1.0)
          irrigation_allocation = off  # Allocation limits
          allocation = 0  # Allocation in ML
          default_no3_conc = 0  # Nitrate concentration (ppm N)
          default_nh4_conc = 0  # Ammonium concentration (ppm N)
          default_cl_conc = 0  # Chloride concentration (ppm Cl)
          default_no3_conc = 0  # Nitrate concentration (ppm N)
          default_nh4_conc = 0  # Ammonium concentration (ppm N)
          default_cl_conc = 0  # Chloride concentration (ppm Cl)
      outputfile: filename=Pukekohe_FSP_highN.out; title=Pukekohe_FSP_highN
        events Reporting Frequency: event=Daily
        variables
          variable:
            dd/mmm/yyyy  # Date (dd/mmm/yyyy)
            biomass  # Biomass
            leafgreenwt
            leafgreenn
            leafsenescedwt
            stemgreenwt
            stemgreenn
            TuberGreenWt
            TuberGreenN
            nfact_expan
            nfact_photo
            lai
            leaf_no
            stagename
            tt
            node_no
            height
            node_no_fx
            node_no_sen
            ttafteremergence
            ttaftersowing
      soil Templeton
        InitWater Initial water
          PercentMethod: Percent=1.00; Distributed=Evenly distributed
        Water
          Layer:
            Thickness (mm)  BD (g/cc)  AirDry (mm/mm)  LL15 (mm/mm)  DUL (mm/mm)  SAT (mm/mm)
            100             1.2        0.08            0.13          0.33         0.5
            200             1.2        0.08            0.13          0.33         0.5
            300             1.2        0.05            0.1           0.31         0.44
            300             1.2        0.04            0.08          0.27         0.46
            300             1.2        0.06            0.11          0.3          0.44
            300             1.2        0.06            0.11          0.3          0.44
          SoilCrop wheat
            Layer:
              Thickness (mm)  LL (mm/mm)  KL (/day)  XF (0-1)
              100             0.13        0.06       1
              200             0.13        0.06       1
              300             0.1         0.06       1
              300             0.08        0.06       1
              300             0.11        0.06       1
              300             0.11        0.06       1
          SoilCrop potato
            Layer:
              Thickness (mm)  LL (mm/mm)  KL (/day)  XF (0-1)
              100             0.13        0.1        1
              200             0.13        0.1        1
              300             0.1         0.07       1
              300             0.08        0.05       1
              300             0.11        0.05       1
              300             0.11        0.05       1
        SoilWat: SummerCona=4.4; SummerU=9; SummerDate=1-Nov; WinterCona=4.4; WinterU=9; WinterDate=1-Apr; DiffusConst=88; DiffusSlope=35.4; Salb=0.18; CN2Bare=68; CNRed=20; CNCov=0.8
          Layer:
            Thickness (mm)  SWCON (0-1)
            100             0.55
            200             0.55
            300             0.55
            300             0.55
            300             0.55
            300             0.55
        SoilOrganicMatter: RootCN=30; RootWT=3000; SoilCN=11.5; EnrACoeff=7.4; EnrBCoeff=0.2
          Layer:
            Thickness (mm)  OC (Total %)  FBiom (0-1)  FInert (0-1)
            100             1.82          0.025        0.3
            200             1.47          0.025        0.4
            300             1.2           0.015        0.75
            300             1.03          0.01         0.9
            300             0.47          0.01         0.96
            300             0.47          0.01         0.96
        Analysis
          Layer:
            Thickness (mm)  PH (1:5 water)
            100             6.6
            200             6.2
            300             5.7
            300             5.5
            300             5.5
            300             5.5
        Sample Initial nitrogen
          Layer:
            Thickness (mm)  NO3 (ppm)  NH4 (ppm)
            100             33.3333    0.1
            200             22.5       0.1
            300             1.38889    0.1
            300             1.38889    0.1
            300             1.38889    0.1
            300             1.38889    0.1
      potato -> /Simulations/FUE/FUE_300/paddock/potato
      micromet -> /Simulations/FUE/FUE_300/paddock/Micromet
  folder FUE
    simulation FUE_300
      metfile met: filename=lincoln.met
      clock
        start_date = 18/10/1999  # Enter the start date of the simulation
        end_date = 1/06/2000  # Enter the end date of the simulation
      summaryfile
      area paddock
        fertiliser
        surfaceom surface organic matter
          PoolName = wheat  # Organic Matter pool name
          type = wheat  # Organic Matter type
          mass = 2000  # Initial surface residue (kg/ha)
          cnr = 80  # C:N ratio of initial residue
          standing_fraction = 0  # Fraction of residue standing
        folder Manager folder
          manager Sowing rule
            # Sowing criteria
            date1 = 19-oct  # Enter sowing window START date (dd-mmm)
            date2 = 19-oct  # Enter sowing window END date (dd-mmm)
            must_sow = yes  # Must sow?
            raincrit = 10  # Amount of rainfall
            rainnumdays = 7  # Number of days of rainfall
            esw_amount = 10  # Enter minimum allowable available soil water (mm)
            # Sowing parameters
            crop = potato  # Enter name of crop to sow
            seeds = 6  # Enter sowing density (seeds/m2)
            depth = 150  # Enter sowing depth (mm)
            cultivar = russet  # Enter cultivar
            class = plant  # Enter crop growth class
            age = 1000  # Enter physiological age (deg days)
            row_spacing = 650  # Enter row spacing (mm)
            on start_of_day:
            script: same as in Pukekohe_FSP_highN.paddock.Manager folder.Sowing rule
          manager Harvesting rule
            # Harvesting criteria
            crop = potato  # Enter name of crop to harvest when ripe
            on end_of_day:
            script: same as in Pukekohe_FSP_highN.paddock.Manager folder.Harvesting rule
          operations
            19/10/1999  fertiliser apply amount= 150 (kg/ha), type= urea_N (), depth= 10 (mm)
            1/12/1999  fertiliser apply amount= 150 (kg/ha), type= urea_N (), depth= 10 (mm)
            9/12/1999  irrigation apply amount= 55 (mm)
            23/12/1999  irrigation apply amount= 25 (mm)
            30/12/1999  irrigation apply amount= 25 (mm)
            21/01/2000  irrigation apply amount= 38 (mm)
            10/02/2000  irrigation apply amount= 50 (mm)
            16/02/2000  irrigation apply amount= 25 (mm)
            1/03/2000  irrigation apply amount= 38 (mm)
          irrigation: same as Pukekohe_FSP_highN.paddock.Manager folder.Irrigation
        outputfile: filename=FUE_300.out; title=FUE_300
          events Reporting Frequency: event=Daily
          variables
            variable:
              dd/mmm/yyyy  # Date (dd/mmm/yyyy)
              biomass  # Biomass
              leafgreenwt
              leafgreenn
              leafsenescedwt
              stemgreenwt
              stemgreenn
              TuberGreenWt
              TuberGreenN
              nfact_expan
              nfact_photo
              lai
              leaf_no
              stagename
              tt
              node_no
              height
              node_no_fx
              node_no_sen
              ttafteremergence
              ttaftersowing
              dlt_lai_carbon  # Potential change in lai allowing for growth
              dlt_lai_pot
              no3()
              swdef_photo
              root_depth
              no3_demand
        soil Templeton
          InitWater Initial water
            PercentMethod: Percent=1.00; Distributed=Evenly distributed
          Water
            Layer:
              Thickness (mm)  BD (g/cc)  AirDry (mm/mm)  LL15 (mm/mm)  DUL (mm/mm)  SAT (mm/mm)
              100             1.2        0.08            0.13          0.33         0.5
              200             1.2        0.08            0.13          0.33         0.5
              300             1.2        0.05            0.1           0.31         0.44
              300             1.2        0.04            0.08          0.27         0.46
              300             1.2        0.06            0.11          0.3          0.44
              300             1.2        0.06            0.11          0.3          0.44
            SoilCrop wheat: same as Pukekohe_FSP_highN.paddock.Templeton.Water.wheat
            SoilCrop potato
              Layer:
                Thickness (mm)  LL (mm/mm)  KL (/day)  XF (0-1)
                100             0.13        0.1        1
                200             0.13        0.1        1
                300             0.1         0.07       1
                300             0.15        0.05       1
                300             0.3         0.05       0
                300             0.3         0.05       0
          SoilWat: same as Pukekohe_FSP_highN.paddock.Templeton.SoilWat
          SoilOrganicMatter: same as Pukekohe_FSP_highN.paddock.Templeton.SoilOrganicMatter
          Analysis: same as Pukekohe_FSP_highN.paddock.Templeton.Analysis
          Sample Initial nitrogen: same as Pukekohe_FSP_highN.paddock.Templeton.Initial nitrogen
        potato
          ini: filename=%apsim%\Model\Potato.xml
        micromet
          soilalbedo = 0.23
          a_interception = 0
          b_interception = 0
          c_interception = 0
          d_interception = 0
    simulation FUE_0 -> /Simulations/FUE/FUE_300
      area paddock -> /Simulations/FUE/FUE_300/paddock
        folder Manager folder -> /Simulations/FUE/FUE_300/paddock/Manager folder
          operations
            19/10/1999  fertiliser apply amount= 0 (kg/ha), type= urea_N (), depth= 10 (mm)
            1/12/1999  fertiliser apply amount= 0 (kg/ha), type= urea_N (), depth= 10 (mm)
            9/12/1999  irrigation apply amount= 55 (mm)
            23/12/1999  irrigation apply amount= 25 (mm)
            30/12/1999  irrigation apply amount= 25 (mm)
            21/01/2000  irrigation apply amount= 38 (mm)
            10/02/2000  irrigation apply amount= 50 (mm)
            16/02/2000  irrigation apply amount= 25 (mm)
            1/03/2000  irrigation apply amount= 38 (mm)
        outputfile -> /Simulations/FUE/FUE_300/paddock/outputfile: filename=FUE_0.out; title=FUE_0
          events Reporting Frequency -> /Simulations/FUE/FUE_300/paddock/outputfile/Reporting Frequency
          variables -> /Simulations/FUE/FUE_300/paddock/outputfile/Variables
    simulation FUE_150 -> /Simulations/FUE/FUE_300
      area paddock -> /Simulations/FUE/FUE_300/paddock
        folder Manager folder -> /Simulations/FUE/FUE_300/paddock/Manager folder
          operations
            19/10/1999  fertiliser apply amount= 150 (kg/ha), type= urea_N (), depth= 10 (mm)
            9/12/1999  irrigation apply amount= 55 (mm)
            23/12/1999  irrigation apply amount= 25 (mm)
            30/12/1999  irrigation apply amount= 25 (mm)
            21/01/2000  irrigation apply amount= 38 (mm)
            10/02/2000  irrigation apply amount= 50 (mm)
            16/02/2000  irrigation apply amount= 25 (mm)
            1/03/2000  irrigation apply amount= 38 (mm)
        outputfile -> /Simulations/FUE/FUE_300/paddock/outputfile: filename=FUE_150.out; title=FUE_150
          events Reporting Frequency -> /Simulations/FUE/FUE_300/paddock/outputfile/Reporting Frequency
          variables -> /Simulations/FUE/FUE_300/paddock/outputfile/Variables
    simulation FUE_275 -> /Simulations/FUE/FUE_300
      area paddock -> /Simulations/FUE/FUE_300/paddock
        folder Manager folder -> /Simulations/FUE/FUE_300/paddock/Manager folder
          operations
            19/10/1999  fertiliser apply amount= 100 (kg/ha), type= urea_N (), depth= 10 (mm)
            1/12/1999  fertiliser apply amount= 25 (kg/ha), type= urea_N (), depth= 10 (mm)
            9/12/1999  irrigation apply amount= 55 (mm)
            23/12/1999  irrigation apply amount= 25 (mm)
            30/12/1999  irrigation apply amount= 25 (mm)
            21/01/2000  irrigation apply amount= 38 (mm)
            10/02/2000  irrigation apply amount= 50 (mm)
            16/02/2000  irrigation apply amount= 25 (mm)
            1/03/2000  irrigation apply amount= 38 (mm)
            13/12/1999  fertiliser apply amount= 25 (kg/ha), type= urea_N (), depth= 10 (mm)
            17/01/2000  fertiliser apply amount= 13 (kg/ha), type= urea_N (), depth= 10 (mm)
            21/01/2000  fertiliser apply amount= 13 (kg/ha), type= urea_N (), depth= 10 (mm)
            24/01/2000  fertiliser apply amount= 13 (kg/ha), type= urea_N (), depth= 10 (mm)
            31/01/2000  fertiliser apply amount= 13 (kg/ha), type= urea_N (), depth= 10 (mm)
            7/02/2000  fertiliser apply amount= 13 (kg/ha), type= urea_N (), depth= 10 (mm)
            14/02/2000  fertiliser apply amount= 13 (kg/ha), type= urea_N (), depth= 10 (mm)
            21/02/2000  fertiliser apply amount= 13 (kg/ha), type= urea_N (), depth= 10 (mm)
            28/02/2000  fertiliser apply amount= 13 (kg/ha), type= urea_N (), depth= 10 (mm)
            6/03/2000  fertiliser apply amount= 13 (kg/ha), type= urea_N (), depth= 10 (mm)
            13/03/2000  fertiliser apply amount= 13 (kg/ha), type= urea_N (), depth= 10 (mm)
            20/03/2000  fertiliser apply amount= 13 (kg/ha), type= urea_N (), depth= 10 (mm)
            27/03/2000  fertiliser apply amount= 13 (kg/ha), type= urea_N (), depth= 10 (mm)
        outputfile -> /Simulations/FUE/FUE_300/paddock/outputfile: filename=FUE_275.out; title=FUE_275
          events Reporting Frequency -> /Simulations/FUE/FUE_300/paddock/outputfile/Reporting Frequency
          variables -> /Simulations/FUE/FUE_300/paddock/outputfile/Variables
  folder Baxters
    simulation Baxters_14Oct_high
      metfile met: filename=lincoln.met
      clock
        start_date = 14/10/1998  # Enter the start date of the simulation
        end_date = 1/06/1999  # Enter the end date of the simulation
      summaryfile
      area paddock
        fertiliser
        surfaceom surface organic matter
          PoolName = wheat  # Organic Matter pool name
          type = wheat  # Organic Matter type
          mass = 2000  # Initial surface residue (kg/ha)
          cnr = 80  # C:N ratio of initial residue
          standing_fraction = 0  # Fraction of residue standing
        folder Manager folder
          manager Harvesting rule
            # Harvesting criteria
            crop = potato  # Enter name of crop to harvest when ripe
            on end_of_day:
            script: same as in Pukekohe_FSP_highN.paddock.Manager folder.Harvesting rule
          operations
            2/10/1998  irrigation apply amount= 40 (mm)
            26/10/1998  irrigation apply amount= 70 (mm)
            15/12/1998  irrigation apply amount= 70 (mm)
            29/12/1998  irrigation apply amount= 10 (mm)
            30/12/1998  irrigation apply amount= 55 (mm)
            7/01/1999  irrigation apply amount= 50 (mm)
            21/01/1999  irrigation apply amount= 40 (mm)
            10/02/1999  irrigation apply amount= 28 (mm)
            19/02/1999  irrigation apply amount= 15 (mm)
            9/03/1999  irrigation apply amount= 25 (mm)
            29/12/1998  fertiliser apply amount= 150 (kg/ha), type= urea_N (), depth= 10 (mm)
          irrigation: same as Pukekohe_FSP_highN.paddock.Manager folder.Irrigation
          manager Sowing rule
            # Sowing criteria
            date1 = 14-oct  # Enter sowing window START date (dd-mmm)
            date2 = 14-oct  # Enter sowing window END date (dd-mmm)
            must_sow = yes  # Must sow?
            raincrit = 10  # Amount of rainfall
            rainnumdays = 7  # Number of days of rainfall
            esw_amount = 10  # Enter minimum allowable available soil water (mm)
            # Sowing parameters
            crop = potato  # Enter name of crop to sow
            seeds = 4.3  # Enter sowing density (seeds/m2)
            depth = 30  # Enter sowing depth (mm)
            cultivar = russet  # Enter cultivar
            class = plant  # Enter crop growth class
            age = 1000  # Enter physiological age (deg days)
            row_spacing = 650  # Enter row spacing (mm)
            on start_of_day:
            script: same as in Pukekohe_FSP_highN.paddock.Manager folder.Sowing rule
        outputfile: filename=Baxters_14Oct_high.out; title=Baxters_14Oct_high
          events Reporting Frequency: event=Daily
          variables
            variable:
              dd/mmm/yyyy  # Date (dd/mmm/yyyy)
              biomass  # Biomass
              leafgreenwt
              leafgreenn
              leafsenescedwt
              stemgreenwt
              stemgreenn
              TuberGreenWt
              TuberGreenN
              nfact_expan
              nfact_photo
              lai
              leaf_no
              stagename
              tt
              node_no
        soil Baxters_compact
          InitWater Initial water
            PercentMethod: Percent=1.00; Distributed=Evenly distributed
          Water
            Layer:
              Thickness (mm)  BD (g/cc)  AirDry (mm/mm)  LL15 (mm/mm)  DUL (mm/mm)  SAT (mm/mm)
              100             1.2        0.08            0.13          0.33         0.5
              200             1.2        0.08            0.13          0.33         0.5
              300             1.2        0.05            0.1           0.31         0.44
              300             1.2        0.04            0.08          0.27         0.46
              300             1.2        0.06            0.11          0.3          0.44
              300             1.2        0.06            0.11          0.3          0.44
            SoilCrop wheat: same as Pukekohe_FSP_highN.paddock.Templeton.Water.wheat
            SoilCrop potato
              Layer:
                Thickness (mm)  LL (mm/mm)  KL (/day)  XF (0-1)
                100             0.13        0.1        1
                200             0.13        0.1        1
                300             0.27        0.07       0.1
                300             0.27        0.05       0
                300             0.3         0.05       0
                300             0.3         0.05       0
          SoilWat: same as Pukekohe_FSP_highN.paddock.Templeton.SoilWat
          SoilOrganicMatter: same as Pukekohe_FSP_highN.paddock.Templeton.SoilOrganicMatter
          Analysis: same as Pukekohe_FSP_highN.paddock.Templeton.Analysis
          Sample Initial nitrogen
            Layer:
              Thickness (mm)  NO3 (ppm)  NH4 (ppm)
              100             125        0
              200             27.9167    0
              300             8.33333    0
              300             1.38889    0
              300             0          0
              300             0          0
        potato -> /Simulations/FUE/FUE_300/paddock/potato
        micromet -> /Simulations/FUE/FUE_300/paddock/Micromet
    simulation Baxters_14Oct_low -> /Simulations/Baxters/Baxters_14Oct_high
      area paddock -> /Simulations/Baxters/Baxters_14Oct_high/paddock
        folder Manager folder -> /Simulations/Baxters/Baxters_14Oct_high/paddock/Manager folder
          manager Sowing rule
            # Sowing criteria
            date1 = 19-oct  # Enter sowing window START date (dd-mmm)
            date2 = 19-oct  # Enter sowing window END date (dd-mmm)
            must_sow = yes  # Must sow?
            raincrit = 10  # Amount of rainfall
            rainnumdays = 7  # Number of days of rainfall
            esw_amount = 10  # Enter minimum allowable available soil water (mm)
            # Sowing parameters
            crop = potato  # Enter name of crop to sow
            seeds = 2.16  # Enter sowing density (seeds/m2)
            depth = 30  # Enter sowing depth (mm)
            cultivar = russet  # Enter cultivar
            class = plant  # Enter crop growth class
            age = 1000  # Enter physiological age (deg days)
            row_spacing = 650  # Enter row spacing (mm)
            on start_of_day:
            script: same as in Pukekohe_FSP_highN.paddock.Manager folder.Sowing rule
        outputfile -> /Simulations/Baxters/Baxters_14Oct_high/paddock/outputfile: filename=Baxters_14Oct_low.out; title=Baxters_14Oct_low
          events Reporting Frequency -> /Simulations/Baxters/Baxters_14Oct_high/paddock/outputfile/Reporting Frequency
          variables -> /Simulations/Baxters/Baxters_14Oct_high/paddock/outputfile/Variables
    simulation Baxters_2Nov_high -> /Simulations/Baxters/Baxters_14Oct_high
      area paddock -> /Simulations/Baxters/Baxters_14Oct_high/paddock
        folder Manager folder -> /Simulations/Baxters/Baxters_14Oct_high/paddock/Manager folder
          manager Sowing rule
            # Sowing criteria
            date1 = 2-nov  # Enter sowing window START date (dd-mmm)
            date2 = 2-nov  # Enter sowing window END date (dd-mmm)
            must_sow = yes  # Must sow?
            raincrit = 10  # Amount of rainfall
            rainnumdays = 7  # Number of days of rainfall
            esw_amount = 10  # Enter minimum allowable available soil water (mm)
            # Sowing parameters
            crop = potato  # Enter name of crop to sow
            seeds = 4.3  # Enter sowing density (seeds/m2)
            depth = 30  # Enter sowing depth (mm)
            cultivar = russet  # Enter cultivar
            class = plant  # Enter crop growth class
            age = 1000  # Enter physiological age (deg days)
            row_spacing = 650  # Enter row spacing (mm)
            on start_of_day:
            script: same as in Pukekohe_FSP_highN.paddock.Manager folder.Sowing rule
        outputfile -> /Simulations/Baxters/Baxters_14Oct_high/paddock/outputfile: filename=Baxters_2Nov_high.out; title=Baxters_2Nov_high
          events Reporting Frequency -> /Simulations/Baxters/Baxters_14Oct_high/paddock/outputfile/Reporting Frequency
          variables -> /Simulations/Baxters/Baxters_14Oct_high/paddock/outputfile/Variables
    simulation Baxters_2Nov_low -> /Simulations/Baxters/Baxters_14Oct_high
      area paddock -> /Simulations/Baxters/Baxters_14Oct_high/paddock
        folder Manager folder -> /Simulations/Baxters/Baxters_14Oct_high/paddock/Manager folder
          manager Sowing rule
            # Sowing criteria
            date1 = 2-nov  # Enter sowing window START date (dd-mmm)
            date2 = 2-nov  # Enter sowing window END date (dd-mmm)
            must_sow = yes  # Must sow?
            raincrit = 10  # Amount of rainfall
            rainnumdays = 7  # Number of days of rainfall
            esw_amount = 10  # Enter minimum allowable available soil water (mm)
            # Sowing parameters
            crop = potato  # Enter name of crop to sow
            seeds = 2.16  # Enter sowing density (seeds/m2)
            depth = 30  # Enter sowing depth (mm)
            cultivar = russet  # Enter cultivar
            class = plant  # Enter crop growth class
            age = 1000  # Enter physiological age (deg days)
            row_spacing = 650  # Enter row spacing (mm)
            on start_of_day:
            script: same as in Pukekohe_FSP_highN.paddock.Manager folder.Sowing rule
        outputfile -> /Simulations/Baxters/Baxters_14Oct_high/paddock/outputfile: filename=Baxters_2Nov_low.out; title=Baxters_2Nov_low
          events Reporting Frequency -> /Simulations/Baxters/Baxters_14Oct_high/paddock/outputfile/Reporting Frequency
          variables -> /Simulations/Baxters/Baxters_14Oct_high/paddock/outputfile/Variables
    simulation Baxters_23Nov_high -> /Simulations/Baxters/Baxters_14Oct_high
      area paddock -> /Simulations/Baxters/Baxters_14Oct_high/paddock
        folder Manager folder -> /Simulations/Baxters/Baxters_14Oct_high/paddock/Manager folder
          manager Sowing rule
            # Sowing criteria
            date1 = 23-nov  # Enter sowing window START date (dd-mmm)
            date2 = 23-nov  # Enter sowing window END date (dd-mmm)
            must_sow = yes  # Must sow?
            raincrit = 10  # Amount of rainfall
            rainnumdays = 7  # Number of days of rainfall
            esw_amount = 10  # Enter minimum allowable available soil water (mm)
            # Sowing parameters
            crop = potato  # Enter name of crop to sow
            seeds = 4.3  # Enter sowing density (seeds/m2)
            depth = 30  # Enter sowing depth (mm)
            cultivar = russet  # Enter cultivar
            class = plant  # Enter crop growth class
            age = 1000  # Enter physiological age (deg days)
            row_spacing = 650  # Enter row spacing (mm)
            on start_of_day:
            script: same as in Pukekohe_FSP_highN.paddock.Manager folder.Sowing rule
        outputfile -> /Simulations/Baxters/Baxters_14Oct_high/paddock/outputfile: filename=Baxters_23Nov_high.out; title=Baxters_23Nov_high
          events Reporting Frequency -> /Simulations/Baxters/Baxters_14Oct_high/paddock/outputfile/Reporting Frequency
          variables -> /Simulations/Baxters/Baxters_14Oct_high/paddock/outputfile/Variables
    simulation Baxters_23Nov_low -> /Simulations/Baxters/Baxters_14Oct_high
      area paddock -> /Simulations/Baxters/Baxters_14Oct_high/paddock
        folder Manager folder -> /Simulations/Baxters/Baxters_14Oct_high/paddock/Manager folder
          manager Sowing rule
            # Sowing criteria
            date1 = 23-nov  # Enter sowing window START date (dd-mmm)
            date2 = 23-nov  # Enter sowing window END date (dd-mmm)
            must_sow = yes  # Must sow?
            raincrit = 10  # Amount of rainfall
            rainnumdays = 7  # Number of days of rainfall
            esw_amount = 10  # Enter minimum allowable available soil water (mm)
            # Sowing parameters
            crop = potato  # Enter name of crop to sow
            seeds = 2.16  # Enter sowing density (seeds/m2)
            depth = 30  # Enter sowing depth (mm)
            cultivar = russet  # Enter cultivar
            class = plant  # Enter crop growth class
            age = 1000  # Enter physiological age (deg days)
            row_spacing = 650  # Enter row spacing (mm)
            on start_of_day:
            script: same as in Pukekohe_FSP_highN.paddock.Manager folder.Sowing rule
        outputfile -> /Simulations/Baxters/Baxters_14Oct_high/paddock/outputfile: filename=Baxters_23Nov_low.out; title=Baxters_23Nov_low
          events Reporting Frequency -> /Simulations/Baxters/Baxters_14Oct_high/paddock/outputfile/Reporting Frequency
          variables -> /Simulations/Baxters/Baxters_14Oct_high/paddock/outputfile/Variables
  folder PYM
    simulation PYM_Nov98
      metfile met: filename=LawnRoad.met
      clock
        start_date = 15/11/1998  # Enter the start date of the simulation
        end_date = 1/06/1999  # Enter the end date of the simulation
      summaryfile
      area paddock
        fertiliser
        surfaceom surface organic matter
          PoolName = wheat  # Organic Matter pool name
          type = wheat  # Organic Matter type
          mass = 2000  # Initial surface residue (kg/ha)
          cnr = 80  # C:N ratio of initial residue
          standing_fraction = 0  # Fraction of residue standing
        folder Manager folder
          manager Sowing rule
            # Sowing criteria
            date1 = 16-nov  # Enter sowing window START date (dd-mmm)
            date2 = 16-nov  # Enter sowing window END date (dd-mmm)
            must_sow = yes  # Must sow?
            raincrit = 10  # Amount of rainfall
            rainnumdays = 7  # Number of days of rainfall
            esw_amount = 10  # Enter minimum allowable available soil water (mm)
            # Sowing parameters
            crop = potato  # Enter name of crop to sow
            seeds = 5  # Enter sowing density (seeds/m2)
            depth = 30  # Enter sowing depth (mm)
            cultivar = russet  # Enter cultivar
            class = plant  # Enter crop growth class
            age = 1000  # Enter physiological age (deg days)
            row_spacing = 650  # Enter row spacing (mm)
            on start_of_day:
            script: same as in Pukekohe_FSP_highN.paddock.Manager folder.Sowing rule
          manager Harvesting rule
            # Harvesting criteria
            crop = potato  # Enter name of crop to harvest when ripe
            on end_of_day:
            script: same as in Pukekohe_FSP_highN.paddock.Manager folder.Harvesting rule
          operations
            16/11/1998  fertiliser apply amount= 120 (kg/ha), type= urea_N (), depth= 10 (mm)
            18/12/1998  irrigation apply amount= 30 (mm)
            22/12/1998  irrigation apply amount= 30 (mm)
            27/12/1998  irrigation apply amount= 30 (mm)
            1/01/1999  irrigation apply amount= 30 (mm)
            5/01/1999  irrigation apply amount= 30 (mm)
            10/01/1999  irrigation apply amount= 30 (mm)
            10/02/1999  irrigation apply amount= 30 (mm)
            15/02/1999  irrigation apply amount= 30 (mm)
            18/02/1999  fertiliser apply amount= 40 (kg/ha), type= urea_N (), depth= 10 (mm)
            21/02/1999  irrigation apply amount= 30 (mm)
            27/02/1999  irrigation apply amount= 30 (mm)
            25/03/1999  irrigation apply amount= 30 (mm)
          irrigation: same as Pukekohe_FSP_highN.paddock.Manager folder.Irrigation
        outputfile: filename=PYM_Nov98.out; title=PYM_Nov98
          events Reporting Frequency -> /Simulations/FUE/FUE_300/paddock/outputfile/Reporting Frequency
          variables -> /Simulations/FUE/FUE_300/paddock/outputfile/Variables
        soil Templeton
          InitWater Initial water
            PercentMethod: Percent=1.00; Distributed=Evenly distributed
          Water: same as Pukekohe_FSP_highN.paddock.Templeton.Water
          SoilWat: same as Pukekohe_FSP_highN.paddock.Templeton.SoilWat
          SoilOrganicMatter: same as Pukekohe_FSP_highN.paddock.Templeton.SoilOrganicMatter
          Analysis: same as Pukekohe_FSP_highN.paddock.Templeton.Analysis
          Sample Initial nitrogen
            Layer:
              Thickness (mm)  NO3 (ppm)  NH4 (ppm)
              100             41.6667    0.1
              200             20         0.1
              300             1.38889    0.1
              300             1.38889    0.1
              300             1.38889    0.1
              300             1.38889    0.1
        potato -> /Simulations/FUE/FUE_300/paddock/potato
        micromet -> /Simulations/FUE/FUE_300/paddock/Micromet
    simulation PYM_Dec98 -> /Simulations/PYM/PYM_Nov98
      area paddock -> /Simulations/PYM/PYM_Nov98/paddock
        folder Manager folder -> /Simulations/PYM/PYM_Nov98/paddock/Manager folder
          manager Sowing rule
            # Sowing criteria
            date1 = 14-dec  # Enter sowing window START date (dd-mmm)
            date2 = 14-dec  # Enter sowing window END date (dd-mmm)
            must_sow = yes  # Must sow?
            raincrit = 10  # Amount of rainfall
            rainnumdays = 7  # Number of days of rainfall
            esw_amount = 10  # Enter minimum allowable available soil water (mm)
            # Sowing parameters
            crop = potato  # Enter name of crop to sow
            seeds = 5  # Enter sowing density (seeds/m2)
            depth = 30  # Enter sowing depth (mm)
            cultivar = russet  # Enter cultivar
            class = plant  # Enter crop growth class
            age = 1000  # Enter physiological age (deg days)
            row_spacing = 650  # Enter row spacing (mm)
            on start_of_day:
            script: same as in Pukekohe_FSP_highN.paddock.Manager folder.Sowing rule
          operations
            14/12/1998  fertiliser apply amount= 120 (kg/ha), type= urea_N (), depth= 10 (mm)
            8/01/1999  irrigation apply amount= 30 (mm)
            13/01/1999  irrigation apply amount= 30 (mm)
            7/02/1999  irrigation apply amount= 30 (mm)
            15/02/1999  irrigation apply amount= 30 (mm)
            18/02/1999  fertiliser apply amount= 40 (kg/ha), type= urea_N (), depth= 10 (mm)
            20/02/1999  irrigation apply amount= 30 (mm)
            27/02/1999  irrigation apply amount= 30 (mm)
            6/03/1999  irrigation apply amount= 30 (mm)
            27/03/1999  irrigation apply amount= 30 (mm)
        outputfile -> /Simulations/PYM/PYM_Nov98/paddock/outputfile: filename=PYM_Dec98.out; title=PYM_Dec98
          events Reporting Frequency -> /Simulations/PYM/PYM_Nov98/paddock/outputfile/Reporting Frequency
          variables -> /Simulations/PYM/PYM_Nov98/paddock/outputfile/Variables
    simulation PYM_Oct99 -> /Simulations/PYM/PYM_Dec98
      clock
        start_date = 13/10/1999  # Enter the start date of the simulation
        end_date = 1/06/2000  # Enter the end date of the simulation
      area paddock -> /Simulations/PYM/PYM_Dec98/paddock
        folder Manager folder -> /Simulations/PYM/PYM_Dec98/paddock/Manager folder
          manager Sowing rule
            # Sowing criteria
            date1 = 14-oct  # Enter sowing window START date (dd-mmm)
            date2 = 14-oct  # Enter sowing window END date (dd-mmm)
            must_sow = yes  # Must sow?
            raincrit = 10  # Amount of rainfall
            rainnumdays = 7  # Number of days of rainfall
            esw_amount = 10  # Enter minimum allowable available soil water (mm)
            # Sowing parameters
            crop = potato  # Enter name of crop to sow
            seeds = 5  # Enter sowing density (seeds/m2)
            depth = 30  # Enter sowing depth (mm)
            cultivar = russet  # Enter cultivar
            class = plant  # Enter crop growth class
            age = 1000  # Enter physiological age (deg days)
            row_spacing = 650  # Enter row spacing (mm)
            on start_of_day:
            script: same as in Pukekohe_FSP_highN.paddock.Manager folder.Sowing rule
          operations
            14/10/1999  fertiliser apply amount= 120 (kg/ha), type= urea_N (), depth= 10 (mm)
            14/11/1999  irrigation apply amount= 30 (mm)
            16/12/1999  irrigation apply amount= 30 (mm)
            22/12/1999  irrigation apply amount= 30 (mm)
            28/12/1999  irrigation apply amount= 30 (mm)
            3/01/2000  irrigation apply amount= 30 (mm)
            10/01/2000  irrigation apply amount= 30 (mm)
            16/01/2000  irrigation apply amount= 30 (mm)
            20/01/2000  irrigation apply amount= 30 (mm)
            30/01/2000  irrigation apply amount= 30 (mm)
            4/02/2000  irrigation apply amount= 30 (mm)
            10/02/2000  irrigation apply amount= 30 (mm)
            18/02/2000  irrigation apply amount= 30 (mm)
        outputfile -> /Simulations/PYM/PYM_Dec98/paddock/outputfile: filename=PYM_Oct99.out; title=PYM_Oct99
          events Reporting Frequency -> /Simulations/PYM/PYM_Dec98/paddock/outputfile/Reporting Frequency
          variables -> /Simulations/PYM/PYM_Dec98/paddock/outputfile/Variables
    simulation PYM_Nov99 -> /Simulations/PYM/PYM_Nov98
      clock
        start_date = 13/10/1999  # Enter the start date of the simulation
        end_date = 1/06/2000  # Enter the end date of the simulation
      area paddock -> /Simulations/PYM/PYM_Nov98/paddock
        folder Manager folder -> /Simulations/PYM/PYM_Nov98/paddock/Manager folder
          manager Sowing rule
            # Sowing criteria
            date1 = 4-nov  # Enter sowing window START date (dd-mmm)
            date2 = 4-nov  # Enter sowing window END date (dd-mmm)
            must_sow = yes  # Must sow?
            raincrit = 10  # Amount of rainfall
            rainnumdays = 7  # Number of days of rainfall
            esw_amount = 10  # Enter minimum allowable available soil water (mm)
            # Sowing parameters
            crop = potato  # Enter name of crop to sow
            seeds = 5  # Enter sowing density (seeds/m2)
            depth = 30  # Enter sowing depth (mm)
            cultivar = russet  # Enter cultivar
            class = plant  # Enter crop growth class
            age = 1000  # Enter physiological age (deg days)
            row_spacing = 650  # Enter row spacing (mm)
            on start_of_day:
            script: same as in Pukekohe_FSP_highN.paddock.Manager folder.Sowing rule
          operations
            4/11/1999  fertiliser apply amount= 120 (kg/ha), type= urea_N (), depth= 10 (mm)
            18/12/1999  irrigation apply amount= 30 (mm)
            24/12/1999  irrigation apply amount= 30 (mm)
            28/12/1999  irrigation apply amount= 30 (mm)
            4/01/2000  irrigation apply amount= 30 (mm)
            10/01/2000  irrigation apply amount= 30 (mm)
            16/01/2000  irrigation apply amount= 30 (mm)
            20/01/2000  irrigation apply amount= 30 (mm)
            30/01/2000  irrigation apply amount= 30 (mm)
            4/02/2000  irrigation apply amount= 30 (mm)
            10/02/2000  irrigation apply amount= 30 (mm)
            16/02/2000  irrigation apply amount= 30 (mm)
            23/02/2000  irrigation apply amount= 30 (mm)
            3/03/2000  irrigation apply amount= 30 (mm)
        outputfile -> /Simulations/PYM/PYM_Nov98/paddock/outputfile: filename=PYM_Nov99.out; title=PYM_Nov99
          events Reporting Frequency -> /Simulations/PYM/PYM_Nov98/paddock/outputfile/Reporting Frequency
          variables -> /Simulations/PYM/PYM_Nov98/paddock/outputfile/Variables
  folder Parilla
    simulation Parilla_23Nov_highN
      metfile met: filename=Lameroo.met
      clock
        start_date = 22/11/2007  # Enter the start date of the simulation
        end_date = 1/06/2008  # Enter the end date of the simulation
      summaryfile
      area paddock
        fertiliser
        surfaceom surface organic matter
          PoolName = wheat  # Organic Matter pool name
          type = wheat  # Organic Matter type
          mass = 2000  # Initial surface residue (kg/ha)
          cnr = 80  # C:N ratio of initial residue
          standing_fraction = 0  # Fraction of residue standing
        folder Manager folder
          manager Sowing rule
            # Sowing criteria
            date1 = 23-nov  # Enter sowing window START date (dd-mmm)
            date2 = 23-nov  # Enter sowing window END date (dd-mmm)
            must_sow = yes  # Must sow?
            raincrit = 10  # Amount of rainfall
            rainnumdays = 7  # Number of days of rainfall
            esw_amount = 10  # Enter minimum allowable available soil water (mm)
            # Sowing parameters
            crop = potato  # Enter name of crop to sow
            seeds = 5  # Enter sowing density (seeds/m2)
            depth = 30  # Enter sowing depth (mm)
            cultivar = russet  # Enter cultivar
            class = plant  # Enter crop growth class
            age = 1000  # Enter physiological age (deg days)
            row_spacing = 650  # Enter row spacing (mm)
            on start_of_day:
            script: same as in Pukekohe_FSP_highN.paddock.Manager folder.Sowing rule
          manager Harvesting rule
            # Harvesting criteria
            crop = potato  # Enter name of crop to harvest when ripe
            on end_of_day:
            script: same as in Pukekohe_FSP_highN.paddock.Manager folder.Harvesting rule
          operations
            23/11/2007  fertiliser apply amount= 100 (kg/ha), type= urea_N (), depth= 10 (mm)
            20/12/2007  fertiliser apply amount= 75 (kg/ha), type= urea_N (), depth= 10 (mm)
            10/01/2008  fertiliser apply amount= 48 (kg/ha), type= urea_N (), depth= 10 (mm)
            14/01/2008  fertiliser apply amount= 75 (kg/ha), type= urea_N (), depth= 10 (mm)
            29/01/2008  fertiliser apply amount= 40 (kg/ha), type= urea_N (), depth= 10 (mm)
            1/02/2008  fertiliser apply amount= 40 (kg/ha), type= urea_N (), depth= 10 (mm)
            12/02/2008  fertiliser apply amount= 40 (kg/ha), type= urea_N (), depth= 10 (mm)
            28/02/2008  fertiliser apply amount= 40 (kg/ha), type= urea_N (), depth= 10 (mm)
            29/02/2008  fertiliser apply amount= 20 (kg/ha), type= urea_N (), depth= 10 (mm)
            6/03/2008  fertiliser apply amount= 40 (kg/ha), type= urea_N (), depth= 10 (mm)
            16/03/2008  fertiliser apply amount= 40 (kg/ha), type= urea_N (), depth= 10 (mm)
            23/11/2007  irrigation apply amount= 9 (mm)
            24/11/2007  irrigation apply amount= 9 (mm)
            25/11/2007  irrigation apply amount= 9 (mm)
            26/11/2007  irrigation apply amount= 9 (mm)
            27/11/2007  irrigation apply amount= 9 (mm)
            28/11/2007  irrigation apply amount= 9 (mm)
            29/11/2007  irrigation apply amount= 9 (mm)
            1/12/2007  irrigation apply amount= 9 (mm)
            2/12/2007  irrigation apply amount= 9 (mm)
            3/12/2007  irrigation apply amount= 9 (mm)
            4/12/2007  irrigation apply amount= 9 (mm)
            5/12/2007  irrigation apply amount= 9 (mm)
            6/12/2007  irrigation apply amount= 9 (mm)
            7/12/2007  irrigation apply amount= 9 (mm)
            8/12/2007  irrigation apply amount= 9 (mm)
            9/12/2007  irrigation apply amount= 9 (mm)
            10/12/2007  irrigation apply amount= 9 (mm)
            11/12/2007  irrigation apply amount= 9 (mm)
            12/12/2007  irrigation apply amount= 9 (mm)
            13/12/2007  irrigation apply amount= 9 (mm)
            14/12/2007  irrigation apply amount= 9 (mm)
            16/12/2007  irrigation apply amount= 9 (mm)
            17/12/2007  irrigation apply amount= 9 (mm)
            18/12/2007  irrigation apply amount= 9 (mm)
            19/12/2007  irrigation apply amount= 9 (mm)
            20/12/2007  irrigation apply amount= 9 (mm)
            21/12/2007  irrigation apply amount= 9 (mm)
            22/12/2007  irrigation apply amount= 9 (mm)
            23/12/2007  irrigation apply amount= 9 (mm)
            24/12/2007  irrigation apply amount= 9 (mm)
            25/12/2007  irrigation apply amount= 9 (mm)
            26/12/2007  irrigation apply amount= 9 (mm)
            27/12/2007  irrigation apply amount= 9 (mm)
            28/12/2007  irrigation apply amount= 9 (mm)
            29/12/2007  irrigation apply amount= 9 (mm)
            30/12/2007  irrigation apply amount= 9 (mm)
            31/12/2007  irrigation apply amount= 9 (mm)
            1/01/2008  irrigation apply amount= 9 (mm)
            2/01/2008  irrigation apply amount= 9 (mm)
            3/01/2008  irrigation apply amount= 9 (mm)
            4/01/2008  irrigation apply amount= 9 (mm)
            5/01/2008  irrigation apply amount= 9 (mm)
            6/01/2008  irrigation apply amount= 9 (mm)
            7/01/2008  irrigation apply amount= 9 (mm)
            8/01/2008  irrigation apply amount= 9 (mm)
            9/01/2008  irrigation apply amount= 9 (mm)
            10/01/2008  irrigation apply amount= 9 (mm)
            11/01/2008  irrigation apply amount= 9 (mm)
            12/01/2008  irrigation apply amount= 9 (mm)
            13/01/2008  irrigation apply amount= 9 (mm)
            14/01/2008  irrigation apply amount= 9 (mm)
            15/01/2008  irrigation apply amount= 9 (mm)
            16/01/2008  irrigation apply amount= 9 (mm)
            17/01/2008  irrigation apply amount= 9 (mm)
            18/01/2008  irrigation apply amount= 9 (mm)
            20/01/2008  irrigation apply amount= 9 (mm)
            21/01/2008  irrigation apply amount= 9 (mm)
            22/01/2008  irrigation apply amount= 9 (mm)
            23/01/2008  irrigation apply amount= 9 (mm)
            24/01/2008  irrigation apply amount= 9 (mm)
            25/01/2008  irrigation apply amount= 9 (mm)
            26/01/2008  irrigation apply amount= 9 (mm)
            27/01/2008  irrigation apply amount= 9 (mm)
            28/01/2008  irrigation apply amount= 9 (mm)
            29/01/2008  irrigation apply amount= 9 (mm)
            30/01/2008  irrigation apply amount= 9 (mm)
            31/01/2008  irrigation apply amount= 9 (mm)
            1/02/2008  irrigation apply amount= 9 (mm)
            2/02/2008  irrigation apply amount= 9 (mm)
            3/02/2008  irrigation apply amount= 9 (mm)
            4/02/2008  irrigation apply amount= 9 (mm)
            5/02/2008  irrigation apply amount= 9 (mm)
            6/02/2008  irrigation apply amount= 9 (mm)
            7/02/2008  irrigation apply amount= 9 (mm)
            8/02/2008  irrigation apply amount= 9 (mm)
            9/02/2008  irrigation apply amount= 9 (mm)
            10/02/2008  irrigation apply amount= 9 (mm)
            11/02/2008  irrigation apply amount= 9 (mm)
            12/02/2008  irrigation apply amount= 9 (mm)
            13/02/2008  irrigation apply amount= 9 (mm)
            14/02/2008  irrigation apply amount= 9 (mm)
            15/02/2008  irrigation apply amount= 9 (mm)
            16/02/2008  irrigation apply amount= 9 (mm)
            17/02/2008  irrigation apply amount= 9 (mm)
            18/02/2008  irrigation apply amount= 9 (mm)
            19/02/2008  irrigation apply amount= 9 (mm)
            20/02/2008  irrigation apply amount= 9 (mm)
            21/02/2008  irrigation apply amount= 9 (mm)
            22/02/2008  irrigation apply amount= 9 (mm)
            23/02/2008  irrigation apply amount= 9 (mm)
            24/02/2008  irrigation apply amount= 9 (mm)
            25/02/2008  irrigation apply amount= 9 (mm)
            26/02/2008  irrigation apply amount= 9 (mm)
            27/02/2008  irrigation apply amount= 9 (mm)
            28/02/2008  irrigation apply amount= 9 (mm)
            29/02/2008  irrigation apply amount= 9 (mm)
            1/03/2008  irrigation apply amount= 9 (mm)
            2/03/2008  irrigation apply amount= 9 (mm)
            3/03/2008  irrigation apply amount= 9 (mm)
            4/03/2008  irrigation apply amount= 9 (mm)
            5/03/2008  irrigation apply amount= 9 (mm)
            6/03/2008  irrigation apply amount= 9 (mm)
            7/03/2008  irrigation apply amount= 9 (mm)
            8/03/2008  irrigation apply amount= 9 (mm)
            9/03/2008  irrigation apply amount= 9 (mm)
            10/03/2008  irrigation apply amount= 9 (mm)
            11/03/2008  irrigation apply amount= 9 (mm)
            12/03/2008  irrigation apply amount= 9 (mm)
            13/03/2008  irrigation apply amount= 9 (mm)
            14/03/2008  irrigation apply amount= 9 (mm)
            15/03/2008  irrigation apply amount= 9 (mm)
            16/03/2008  irrigation apply amount= 9 (mm)
            17/03/2008  irrigation apply amount= 9 (mm)
            18/03/2008  irrigation apply amount= 9 (mm)
            19/03/2008  irrigation apply amount= 9 (mm)
            20/03/2008  irrigation apply amount= 9 (mm)
            22/03/2008  irrigation apply amount= 9 (mm)
            23/03/2008  irrigation apply amount= 9 (mm)
            25/03/2008  irrigation apply amount= 9 (mm)
            26/03/2008  irrigation apply amount= 9 (mm)
            28/03/2008  irrigation apply amount= 9 (mm)
            29/03/2008  irrigation apply amount= 9 (mm)
            31/03/2008  irrigation apply amount= 9 (mm)
            1/04/2008  irrigation apply amount= 9 (mm)
            3/04/2008  irrigation apply amount= 9 (mm)
            4/04/2008  irrigation apply amount= 9 (mm)
            6/04/2008  irrigation apply amount= 9 (mm)
            7/04/2008  irrigation apply amount= 9 (mm)
            9/04/2008  irrigation apply amount= 9 (mm)
            10/04/2008  irrigation apply amount= 9 (mm)
            12/04/2008  irrigation apply amount= 9 (mm)
            13/04/2008  irrigation apply amount= 9 (mm)
            15/04/2008  irrigation apply amount= 9 (mm)
            16/04/2008  irrigation apply amount= 9 (mm)
            18/04/2008  irrigation apply amount= 9 (mm)
            19/04/2008  irrigation apply amount= 9 (mm)
            21/04/2008  irrigation apply amount= 9 (mm)
            22/04/2008  irrigation apply amount= 9 (mm)
            24/04/2008  irrigation apply amount= 9 (mm)
            25/04/2008  irrigation apply amount= 9 (mm)
            27/04/2008  irrigation apply amount= 9 (mm)
            28/04/2008  irrigation apply amount= 9 (mm)
            30/04/2008  irrigation apply amount= 9 (mm)
            1/05/2008  irrigation apply amount= 9 (mm)
            3/05/2008  irrigation apply amount= 9 (mm)
            4/05/2008  irrigation apply amount= 9 (mm)
            6/05/2008  irrigation apply amount= 9 (mm)
            7/05/2008  irrigation apply amount= 9 (mm)
          irrigation: same as Pukekohe_FSP_highN.paddock.Manager folder.Irrigation
        outputfile: filename=Parilla_23Nov_highN.out; title=Parilla_23Nov_highN
          events Reporting Frequency -> /Simulations/FUE/FUE_300/paddock/outputfile/Reporting Frequency
          variables -> /Simulations/FUE/FUE_300/paddock/outputfile/Variables
        soil Pinarro_sand
          InitWater Initial water
            PercentMethod: Percent=1.00; Distributed=Evenly distributed
          Water
            Layer:
              Thickness (mm)  BD (g/cc)  AirDry (mm/mm)  LL15 (mm/mm)  DUL (mm/mm)  SAT (mm/mm)
              100             1.2        0.03            0.06          0.12         0.25
              200             1.2        0.05            0.06          0.12         0.25
              300             1.2        0.06            0.06          0.12         0.25
              300             1.2        0.06            0.06          0.12         0.25
              300             1.2        0.06            0.06          0.12         0.25
              300             1.2        0.06            0.06          0.12         0.25
            SoilCrop potato
              Layer:
                Thickness (mm)  LL (mm/mm)  KL (/day)  XF (0-1)
                100             0.06        0.1        1
                200             0.06        0.1        1
                300             0.12        0.07       1
                300             0.12        0.05       1
                300             0.12        0.05       1
                300             0.12        0.05       1
          SoilWat: SummerCona=4.4; SummerU=9; SummerDate=1-Nov; WinterCona=4.4; WinterU=9; WinterDate=1-Apr; DiffusConst=88; DiffusSlope=35.4; Salb=0.18; CN2Bare=68; CNRed=20; CNCov=0.8
            Layer:
              Thickness (mm)  SWCON (0-1)
              100             0.9
              200             0.9
              300             0.9
              300             0.9
              300             0.9
              300             0.9
          SoilOrganicMatter: RootCN=30; RootWT=3000; SoilCN=11.5; EnrACoeff=7.4; EnrBCoeff=0.2
            Layer:
              Thickness (mm)  OC (Total %)  FBiom (0-1)  FInert (0-1)
              100             0.7           0.025        0.3
              200             0.5           0.025        0.4
              300             0.3           0.015        0.75
              300             0.3           0.01         0.9
              300             0.3           0.01         0.96
              300             0.3           0.01         0.96
          Analysis: same as Pukekohe_FSP_highN.paddock.Templeton.Analysis
          Sample Initial nitrogen
            Layer:
              Thickness (mm)  NO3 (ppm)  NH4 (ppm)
              100             21.25      0.1
              200             19.125     0.1
              300             0.555556   0.1
              300             0.555556   0.1
              300             0.555556   0.1
              300             0.555556   0.1
        potato -> /Simulations/FUE/FUE_300/paddock/potato
        micromet -> /Simulations/FUE/FUE_300/paddock/Micromet
    simulation Parilla_3Dec_highN -> /Simulations/Parilla/Parilla_23Nov_highN
      clock
        start_date = 2/12/2007  # Enter the start date of the simulation
        end_date = 1/06/2008  # Enter the end date of the simulation
      area paddock -> /Simulations/Parilla/Parilla_23Nov_highN/paddock
        folder Manager folder -> /Simulations/Parilla/Parilla_23Nov_highN/paddock/Manager folder
          manager Sowing rule
            # Sowing criteria
            date1 = 3-dec  # Enter sowing window START date (dd-mmm)
            date2 = 3-dec  # Enter sowing window END date (dd-mmm)
            must_sow = yes  # Must sow?
            raincrit = 10  # Amount of rainfall
            rainnumdays = 7  # Number of days of rainfall
            esw_amount = 10  # Enter minimum allowable available soil water (mm)
            # Sowing parameters
            crop = potato  # Enter name of crop to sow
            seeds = 5  # Enter sowing density (seeds/m2)
            depth = 30  # Enter sowing depth (mm)
            cultivar = russet  # Enter cultivar
            class = plant  # Enter crop growth class
            age = 1000  # Enter physiological age (deg days)
            row_spacing = 650  # Enter row spacing (mm)
            on start_of_day:
            script: same as in Pukekohe_FSP_highN.paddock.Manager folder.Sowing rule
          operations
            14/01/2008  fertiliser apply amount= 75 (kg/ha), type= urea_N (), depth= 10 (mm)
            27/01/2008  fertiliser apply amount= 44 (kg/ha), type= urea_N (), depth= 10 (mm)
            29/01/2008  fertiliser apply amount= 75 (kg/ha), type= urea_N (), depth= 10 (mm)
            2/05/2008  fertiliser apply amount= 44 (kg/ha), type= urea_N (), depth= 10 (mm)
            12/02/2008  fertiliser apply amount= 50 (kg/ha), type= urea_N (), depth= 10 (mm)
            13/02/2008  fertiliser apply amount= 40 (kg/ha), type= urea_N (), depth= 10 (mm)
            27/02/2008  fertiliser apply amount= 40 (kg/ha), type= urea_N (), depth= 10 (mm)
            3/06/2008  fertiliser apply amount= 40 (kg/ha), type= urea_N (), depth= 10 (mm)
            13/03/2008  fertiliser apply amount= 40 (kg/ha), type= urea_N (), depth= 10 (mm)
            21/03/2008  fertiliser apply amount= 40 (kg/ha), type= urea_N (), depth= 10 (mm)
            23/11/2007  irrigation apply amount= 9 (mm)
            24/11/2007  irrigation apply amount= 9 (mm)
            25/11/2007  irrigation apply amount= 9 (mm)
            26/11/2007  irrigation apply amount= 9 (mm)
            27/11/2007  irrigation apply amount= 9 (mm)
            28/11/2007  irrigation apply amount= 9 (mm)
            29/11/2007  irrigation apply amount= 9 (mm)
            1/12/2007  irrigation apply amount= 9 (mm)
            2/12/2007  irrigation apply amount= 9 (mm)
            3/12/2007  irrigation apply amount= 9 (mm)
            4/12/2007  irrigation apply amount= 9 (mm)
            5/12/2007  irrigation apply amount= 9 (mm)
            6/12/2007  irrigation apply amount= 9 (mm)
            7/12/2007  irrigation apply amount= 9 (mm)
            8/12/2007  irrigation apply amount= 9 (mm)
            9/12/2007  irrigation apply amount= 9 (mm)
            10/12/2007  irrigation apply amount= 9 (mm)
            11/12/2007  irrigation apply amount= 9 (mm)
            12/12/2007  irrigation apply amount= 9 (mm)
            13/12/2007  irrigation apply amount= 9 (mm)
            14/12/2007  irrigation apply amount= 9 (mm)
            16/12/2007  irrigation apply amount= 9 (mm)
            17/12/2007  irrigation apply amount= 9 (mm)
            18/12/2007  irrigation apply amount= 9 (mm)
            19/12/2007  irrigation apply amount= 9 (mm)
            20/12/2007  irrigation apply amount= 9 (mm)
            21/12/2007  irrigation apply amount= 9 (mm)
            22/12/2007  irrigation apply amount= 9 (mm)
            23/12/2007  irrigation apply amount= 9 (mm)
            24/12/2007  irrigation apply amount= 9 (mm)
            25/12/2007  irrigation apply amount= 9 (mm)
            26/12/2007  irrigation apply amount= 9 (mm)
            27/12/2007  irrigation apply amount= 9 (mm)
            28/12/2007  irrigation apply amount= 9 (mm)
            29/12/2007  irrigation apply amount= 9 (mm)
            30/12/2007  irrigation apply amount= 9 (mm)
            31/12/2007  irrigation apply amount= 9 (mm)
            1/01/2008  irrigation apply amount= 9 (mm)
            2/01/2008  irrigation apply amount= 9 (mm)
            3/01/2008  irrigation apply amount= 9 (mm)
            4/01/2008  irrigation apply amount= 9 (mm)
            5/01/2008  irrigation apply amount= 9 (mm)
            6/01/2008  irrigation apply amount= 9 (mm)
            7/01/2008  irrigation apply amount= 9 (mm)
            8/01/2008  irrigation apply amount= 9 (mm)
            9/01/2008  irrigation apply amount= 9 (mm)
            10/01/2008  irrigation apply amount= 9 (mm)
            11/01/2008  irrigation apply amount= 9 (mm)
            12/01/2008  irrigation apply amount= 9 (mm)
            13/01/2008  irrigation apply amount= 9 (mm)
            14/01/2008  irrigation apply amount= 9 (mm)
            15/01/2008  irrigation apply amount= 9 (mm)
            16/01/2008  irrigation apply amount= 9 (mm)
            17/01/2008  irrigation apply amount= 9 (mm)
            18/01/2008  irrigation apply amount= 9 (mm)
            20/01/2008  irrigation apply amount= 9 (mm)
            21/01/2008  irrigation apply amount= 9 (mm)
            22/01/2008  irrigation apply amount= 9 (mm)
            23/01/2008  irrigation apply amount= 9 (mm)
            24/01/2008  irrigation apply amount= 9 (mm)
            25/01/2008  irrigation apply amount= 9 (mm)
            26/01/2008  irrigation apply amount= 9 (mm)
            27/01/2008  irrigation apply amount= 9 (mm)
            28/01/2008  irrigation apply amount= 9 (mm)
            29/01/2008  irrigation apply amount= 9 (mm)
            30/01/2008  irrigation apply amount= 9 (mm)
            31/01/2008  irrigation apply amount= 9 (mm)
            1/02/2008  irrigation apply amount= 9 (mm)
            2/02/2008  irrigation apply amount= 9 (mm)
            3/02/2008  irrigation apply amount= 9 (mm)
            4/02/2008  irrigation apply amount= 9 (mm)
            5/02/2008  irrigation apply amount= 9 (mm)
            6/02/2008  irrigation apply amount= 9 (mm)
            7/02/2008  irrigation apply amount= 9 (mm)
            8/02/2008  irrigation apply amount= 9 (mm)
            9/02/2008  irrigation apply amount= 9 (mm)
            10/02/2008  irrigation apply amount= 9 (mm)
            11/02/2008  irrigation apply amount= 9 (mm)
            12/02/2008  irrigation apply amount= 9 (mm)
            13/02/2008  irrigation apply amount= 9 (mm)
            14/02/2008  irrigation apply amount= 9 (mm)
            15/02/2008  irrigation apply amount= 9 (mm)
            16/02/2008  irrigation apply amount= 9 (mm)
            17/02/2008  irrigation apply amount= 9 (mm)
            18/02/2008  irrigation apply amount= 9 (mm)
            19/02/2008  irrigation apply amount= 9 (mm)
            20/02/2008  irrigation apply amount= 9 (mm)
            21/02/2008  irrigation apply amount= 9 (mm)
            22/02/2008  irrigation apply amount= 9 (mm)
            23/02/2008  irrigation apply amount= 9 (mm)
            24/02/2008  irrigation apply amount= 9 (mm)
            25/02/2008  irrigation apply amount= 9 (mm)
            26/02/2008  irrigation apply amount= 9 (mm)
            27/02/2008  irrigation apply amount= 9 (mm)
            28/02/2008  irrigation apply amount= 9 (mm)
            29/02/2008  irrigation apply amount= 9 (mm)
            1/03/2008  irrigation apply amount= 9 (mm)
            2/03/2008  irrigation apply amount= 9 (mm)
            3/03/2008  irrigation apply amount= 9 (mm)
            4/03/2008  irrigation apply amount= 9 (mm)
            5/03/2008  irrigation apply amount= 9 (mm)
            6/03/2008  irrigation apply amount= 9 (mm)
            7/03/2008  irrigation apply amount= 9 (mm)
            8/03/2008  irrigation apply amount= 9 (mm)
            9/03/2008  irrigation apply amount= 9 (mm)
            10/03/2008  irrigation apply amount= 9 (mm)
            11/03/2008  irrigation apply amount= 9 (mm)
            12/03/2008  irrigation apply amount= 9 (mm)
            13/03/2008  irrigation apply amount= 9 (mm)
            14/03/2008  irrigation apply amount= 9 (mm)
            15/03/2008  irrigation apply amount= 9 (mm)
            16/03/2008  irrigation apply amount= 9 (mm)
            17/03/2008  irrigation apply amount= 9 (mm)
            18/03/2008  irrigation apply amount= 9 (mm)
            19/03/2008  irrigation apply amount= 9 (mm)
            20/03/2008  irrigation apply amount= 9 (mm)
            22/03/2008  irrigation apply amount= 9 (mm)
            23/03/2008  irrigation apply amount= 9 (mm)
            25/03/2008  irrigation apply amount= 9 (mm)
            26/03/2008  irrigation apply amount= 9 (mm)
            28/03/2008  irrigation apply amount= 9 (mm)
            29/03/2008  irrigation apply amount= 9 (mm)
            31/03/2008  irrigation apply amount= 9 (mm)
            1/04/2008  irrigation apply amount= 9 (mm)
            3/04/2008  irrigation apply amount= 9 (mm)
            4/04/2008  irrigation apply amount= 9 (mm)
            6/04/2008  irrigation apply amount= 9 (mm)
            7/04/2008  irrigation apply amount= 9 (mm)
            9/04/2008  irrigation apply amount= 9 (mm)
            10/04/2008  irrigation apply amount= 9 (mm)
            12/04/2008  irrigation apply amount= 9 (mm)
            13/04/2008  irrigation apply amount= 9 (mm)
            15/04/2008  irrigation apply amount= 9 (mm)
            16/04/2008  irrigation apply amount= 9 (mm)
            18/04/2008  irrigation apply amount= 9 (mm)
            19/04/2008  irrigation apply amount= 9 (mm)
            21/04/2008  irrigation apply amount= 9 (mm)
            22/04/2008  irrigation apply amount= 9 (mm)
            24/04/2008  irrigation apply amount= 9 (mm)
            25/04/2008  irrigation apply amount= 9 (mm)
            27/04/2008  irrigation apply amount= 9 (mm)
            28/04/2008  irrigation apply amount= 9 (mm)
            30/04/2008  irrigation apply amount= 9 (mm)
            1/05/2008  irrigation apply amount= 9 (mm)
            3/05/2008  irrigation apply amount= 9 (mm)
            4/05/2008  irrigation apply amount= 9 (mm)
            6/05/2008  irrigation apply amount= 9 (mm)
            7/05/2008  irrigation apply amount= 9 (mm)
        outputfile -> /Simulations/Parilla/Parilla_23Nov_highN/paddock/outputfile: filename=Parilla_3Dec_highN.out; title=Parilla_3Dec_highN
          events Reporting Frequency -> /Simulations/Parilla/Parilla_23Nov_highN/paddock/outputfile/Reporting Frequency
          variables -> /Simulations/Parilla/Parilla_23Nov_highN/paddock/outputfile/Variables
        soil Pinarro_sand
          InitWater Initial water
            PercentMethod: Percent=1.00; Distributed=Evenly distributed
          Water
            Layer:
              Thickness (mm)  BD (g/cc)  AirDry (mm/mm)  LL15 (mm/mm)  DUL (mm/mm)  SAT (mm/mm)
              100             1.2        0.03            0.06          0.15         0.3
              200             1.2        0.05            0.06          0.11         0.3
              300             1.2        0.06            0.06          0.11         0.3
              300             1.2        0.06            0.06          0.11         0.3
              300             1.2        0.06            0.06          0.11         0.3
              300             1.2        0.06            0.06          0.11         0.3
            SoilCrop potato
              Layer:
                Thickness (mm)  LL (mm/mm)  KL (/day)  XF (0-1)
                100             0.06        0.1        1
                200             0.06        0.1        1
                300             0.11        0.07       1
                300             0.11        0.05       1
                300             0.11        0.05       1
                300             0.11        0.05       1
          SoilWat: same as Parilla.Parilla_23Nov_highN.paddock.Pinarro_sand.SoilWat
          SoilOrganicMatter: same as Parilla.Parilla_23Nov_highN.paddock.Pinarro_sand.SoilOrganicMatter
          Analysis: same as Pukekohe_FSP_highN.paddock.Templeton.Analysis
          Sample Initial nitrogen
            Layer:
              Thickness (mm)  NO3 (ppm)  NH4 (ppm)
              100             125        0.1
              200             19.125     0.1
              300             0.555556   0.1
              300             0.555556   0.1
              300             0.555556   0.1
              300             0.555556   0.1
    simulation Parilla_17Dec_highN -> /Simulations/Parilla/Parilla_23Nov_highN
      clock
        start_date = 16/12/2007  # Enter the start date of the simulation
        end_date = 1/06/2008  # Enter the end date of the simulation
      area paddock -> /Simulations/Parilla/Parilla_23Nov_highN/paddock
        folder Manager folder -> /Simulations/Parilla/Parilla_23Nov_highN/paddock/Manager folder
          manager Sowing rule
            # Sowing criteria
            date1 = 17-dec  # Enter sowing window START date (dd-mmm)
            date2 = 17-dec  # Enter sowing window END date (dd-mmm)
            must_sow = yes  # Must sow?
            raincrit = 10  # Amount of rainfall
            rainnumdays = 7  # Number of days of rainfall
            esw_amount = 10  # Enter minimum allowable available soil water (mm)
            # Sowing parameters
            crop = potato  # Enter name of crop to sow
            seeds = 5  # Enter sowing density (seeds/m2)
            depth = 30  # Enter sowing depth (mm)
            cultivar = russet  # Enter cultivar
            class = plant  # Enter crop growth class
            age = 1000  # Enter physiological age (deg days)
            row_spacing = 650  # Enter row spacing (mm)
            on start_of_day:
            script: same as in Pukekohe_FSP_highN.paddock.Manager folder.Sowing rule
          operations: same as Parilla.Parilla_3Dec_highN.paddock.Manager folder.operations
        outputfile -> /Simulations/Parilla/Parilla_23Nov_highN/paddock/outputfile: filename=Parilla_17Dec_highN.out; title=Parilla_17Dec_highN
          events Reporting Frequency -> /Simulations/Parilla/Parilla_23Nov_highN/paddock/outputfile/Reporting Frequency
          variables -> /Simulations/Parilla/Parilla_23Nov_highN/paddock/outputfile/Variables
        soil Pinarro_sand: same as Parilla.Parilla_3Dec_highN.paddock.Pinarro_sand
  memo
    	Note: If you have Observered data for some samplings but not others, then in the .out file (for the observations) you can use * or ?  for those missing values instead of using 0

    	This allows you to tell the difference between data you did not collect, and data that actually had a value of 0

    	Data with a * or ? is not plotted on the graph (hence neither is its predicted value) whereas data with 0 is.
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