folder simulations: version=36; creator=Apsim 7.8-r3905
  simulation soil temp formartin2012
    metfile met: filename=tipton_bridge_mod.met
    clock
      start_date = 01/11/2012  # Enter the start date of the simulation
      end_date = 16/07/2013  # Enter the end date of the simulation
    summaryfile
    area paddock
      surfaceom surface organic matter
        PoolName = wheat  # Organic Matter pool name
        type = wheat  # Organic Matter type
        mass = 2000  # Initial surface residue (kg/ha)
        cnr = 80  # C:N ratio of initial residue
        standing_fraction = 0  # Fraction of residue standing
      fertiliser
      wheat
      folder Manager folder
        operations Operations Schedule
          01/11/2012  'Colonsay_nem water' set sw = 0.33 0.31 0.32 0.34 0.37 0.37 0.37 0.37
      Soil Colonsay_nem: SoilType=Black Vertosol; Site=Bongeen; NearestTown=Bongeen, Q 4356; Region=Darling Downs; State=Queensland; Country=Australia; NaturalVegetation=Qld. Bluegrass, possible Qld. Blue gum; ApsoilNumber=1; Latitude=-27.629; Longitude=151.402; LocationAccuracy=+/-20m; YearOfSampling=0; DataSource=CSIRO Sustainable Ecosystems, Toowoomba
        Comments=Soil naming structure: \State\Region\Classification-Local Name (Site/district and locator number); oc and ph estimated
        Water
          Thickness  BD    AirDry  LL15  DUL   SAT
          150        1.06  0.008   0.26  0.53  0.58
          150        1.03  0.208   0.31  0.54  0.59
          150        1.02  0.32    0.35  0.54  0.59
          150        1.03  0.32    0.35  0.54  0.59
          300        1.03  0.32    0.34  0.53  0.58
          300        1.07  0.32    0.39  0.53  0.58
          300        1.07  0.32    0.44  0.52  0.57
          300        1.07  0.32    0.52  0.52  0.57
          AirDry source: Estimated based on local knowledge (layer 2, 3, 4, 5, 6, 7)
          LL15 source: Estimated based on local knowledge (layer 1)
          SoilCrop wheat: LL=[0.26, 0.31, 0.35, 0.35, 0.34, 0.39, 0.44, 0.52]; KL=[0.07, 0.07, 0.07, 0.05, 0.05, 0.04, 0.03, -]; XF=[1, 1, 1, 1, 1, 1, 1, -]
            LL source: Field measured and checked for sensibility (layer 1, 5)
        SoilWater: SummerCona=3.5; SummerU=6; SummerDate=1-Nov; WinterCona=2.5; WinterU=4; WinterDate=1-Apr; DiffusConst=40; DiffusSlope=16; Salb=0.12; CN2Bare=73; CNRed=20; CNCov=0.8; Thickness=[150, 150, 150, 150, 300, 300, 300, 300]; SWCON=[0.3, 0.3, 0.3, 0.3, 0.3, 0.3, 0.3, 0.3]
        SoilOrganicMatter: RootCN=40; RootWt=1000; SoilCN=12; EnrACoeff=7.4; EnrBCoeff=0.2; OCUnits=WalkleyBlack
          Thickness  OC        FBiom  FInert
          150        0.953846  0.04   0.4
          150        0.953846  0.02   0.6
          300        0.961538  0.02   0.8
          300        0.846154  0.02   1
          300        0.546154  0.01   1
          300        0.261538  0.01   1
          300        0.2       0.01   1
          OC source: Estimated based on local knowledge
        Analysis: PHUnits=Water; BoronUnits=HotWater
          Thickness  PH  ParticleSizeSand  ParticleSizeSilt  ParticleSizeClay
          150        8   10.84             23.37             65.79
          150        8   10.46             21.4              68.14
          300        8   10.36             21.05             68.59
          300        8   10.36             21.05             68.59
          300        8   10.1              18.64             71.26
          300        8   11.11             16.46             72.43
          300        8   -                 -                 -
          PH source: Estimated based on local knowledge
        InitialWater: FractionFull=1; PercentMethod=FilledFromTop
        Sample Initial nitrogen: NO3Units=kgha; NH4Units=kgha
          Thickness  NO3  NH4
          200        200  5
          1800       70   1
        SoilTemperature2
          MaxTTimeDefault = 14
          BoundaryLayerConductanceSource = calc
          BoundaryLayerConductance = 20
          BoundaryLayerConductanceIterations = 1
          NetRadiationSource = calc
          DefaultWindSpeed = 3
          DefaultAltitude = 366
          DefaultInstrumentHeight = 1.2
          BareSoilHeight = 57
      outputfile: filename=soil temp formartin2012.out; title=soil temp formartin2012
        variables
          variables: dd/mm/yyyy as Date, ave_soil_temp, maxt_soil, mint_soil, maxT, minT, sw, surfaceom_wt
        events Reporting Frequency: event=Daily
        memo
          	Note: If you have Observered data for some samplings but not others, then in the .out file (for the observations) you can use * or ?  for those missing values instead of using 0

          	This allows you to tell the difference between data you did not collect, and data that actually had a value of 0

          	Data with a * or ? is not plotted on the graph (hence neither is its predicted value) whereas data with 0 is.

          	Note: You can add error bars to your Observed data by adding an extra column with the same name but with the word "Error" appended to the column name.
                    eg. If you have a column called "yield" you would add an extra column called "yieldError" to your Observed data output file.
                        (It is very important you don't put any spaces between the "yield" and "Error")
        memo: same as soil temp formartin2012.paddock.outputfile.memo
        memo: same as soil temp formartin2012.paddock.outputfile.memo
        memo: same as soil temp formartin2012.paddock.outputfile.memo
        memo: same as soil temp formartin2012.paddock.outputfile.memo
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