folder simulations: version=37; creator=Apsim 7.9-r4081
  folder HE1
    folder shared
      Soil HRS: SoilType=HMM; LocalName=HRS; Site=HRS; NearestTown=Unknown; Region=SE Queensland; NaturalVegetation=Unknown; Latitude=0; Longitude=0; YearOfSampling=0
        Water
          Thickness  BD    AirDry  LL15   DUL   SAT
          100        1.34  0.08    0.226  0.42  0.45
          100        1.34  0.19    0.226  0.42  0.45
          200        1.33  0.23    0.258  0.46  0.48
          200        1.38  0.26    0.27   0.46  0.47
          200        1.4   0.26    0.268  0.43  0.45
          200        1.55  0.28    0.304  0.4   0.41
          200        1.59  0.25    0.335  0.37  0.38
          200        1.63  0.28    0.33   0.33  0.37
          200        1.66  0.3     0.32   0.32  0.37
          200        1.68  0.31    0.33   0.33  0.36
          SoilCrop Sorghum
            LL=[0.226, 0.226, 0.258, 0.27, 0.268, 0.304, 0.335, 0.33, 0.32, 0.33]
            KL=[0.07, 0.07, 0.07, 0.07, 0.06, 0.06, 0.06, 0.05, 0.05, 0.04]
            XF=[1, 1, 1, 1, 1, 1, 1, 1, 1, 1]
        SoilWater: SummerCona=6.5; SummerU=1.5; SummerDate=1-Nov; WinterCona=6.5; WinterU=1.5; WinterDate=1-Apr; DiffusConst=40; DiffusSlope=16; Salb=0.2; CN2Bare=85; CNRed=20; CNCov=0.8; Thickness=[100, 100, 200, 200, 200, 200, 200, 200, 200, 200]; SWCON=[0.3, 0.3, 0.3, 0.3, 0.3, 0.3, 0.3, 0.3, 0.3, 0.3]
        SoilOrganicMatter: RootCN=50; RootWt=1000; SoilCN=12.5; EnrACoeff=7.4; EnrBCoeff=0.2; OCUnits=Total
          Thickness  OC    FBiom  FInert
          100        1.19  0.05   0.45
          100        0.59  0.02   0.6
          200        0.45  0.01   0.75
          200        0.3   0.01   0.9
          200        0.2   0.01   0.9
          200        0.16  0.01   0.9
          200        0.17  0.01   0.9
          200        0.17  0.05   0.9
          200        0.17  0.02   0.9
          200        0.17  0.01   0.9
        Analysis: Thickness=[100, 100, 200, 200, 200, 200, 200, 200, 200, 200]; PH=[6.3, 6.4, 6.5, 6.6, 6.6, 6.5, 6.5, 6.5, 6.5, 6.5]; PHUnits=Water; BoronUnits=HotWater
        Sample Initial nitrogen: NO3Units=ppm; NH4Units=ppm; SWUnits=Volumetric; OCUnits=Total; PHUnits=Water
          Thickness  NO3    NH4
          100        10.4   0.1
          100        1.633  0.1
          200        1.233  0.1
          200        0.9    0.1
          200        1.1    0.1
          200        1.467  0.1
          200        3.633  0.1
          200        5.667  0.1
          200        5.8    0.1
          200        7.267  0.1
        Sample Initial water: Thickness=[100, 100, 200, 200, 200, 200, 200, 200, 200, 200]; NO3Units=ppm; NH4Units=ppm; SWUnits=Volumetric; OCUnits=Total; PHUnits=Water
          SW=[0.235, 0.252, 0.27, 0.3, 0.268, 0.304, 0.335, 0.33, 0.32, 0.33]
      variables My Variables
        variable:
          today format dd/mm/yyyy as Date
          daysAfterSowing as Das
          Stage
          Biomass
          GreenWt
          Biomass units g/m^2 as BiomassWt
          RootGreenWt
          LeafGreenWt
          StemGreenWt
          RachisGreenWt
          GrainGreenWt
          biomass_n
          GreenN
          RootGreenN
          LeafGreenN
          StemGreenN
          RachisGreenN
          GrainGreenN
          GrainGreenNConc
          GrainNo
          GrainSize
          HI
          LeafNo
          LAI
          SLAI
          ESW
          no3() as NO3
          SLN
          WaterSD
          sw
          TPLA
          SPLA
      events My Variables Events
      Sorghum
        sorghumConstants standard
          crop_type = sorghum
          default_crop_class = plant
          stage_names = sowing germination emergence end_of_juvenile floral_initiation flag_leaf flowering start_grain_fill end_grain_fill maturity harvest_ripe end_crop
          stage_code = 1   2   3    4      5     6     7    8    9    10   11   12
          pesw_germ = 0
          shoot_lag = 15
          shoot_rate = 0.6
          twilight = -2.2
          x_temp = 11 30  42
          y_tt = 0  19   0
          x_temp_fm = 5.7 23.5
          y_tt_fm = 0   17.8
          SorghumCanopy = Canopy --------------------------------------------------
          leaf_no_at_emerg = 1
          leaf_no_seed = 4
          leaf_no_min = 10
          leaf_no_max = 40
          leaf_init_rate = 21.6
          leaf_app_rate1 = 41
          leaf_app_rate2 = 20
          leaf_no_rate_change = 3.5
          leaf_app_rate = 41
          rue = 0   0  1.25  1.25  1.25 1.25  1.25 1.25 1.25 1.25    0    0
          row_spacing_default = 750
          x_row_spacing = 0.20   0.50   1.00
          y_extinct_coef = 0.70   0.40   0.40
          x_ave_temp = 8 20 35 50
          y_stress_photo = 0  1  1  0
          leaf_no_correction = 1.52
          x_lai = 0.1    4
          y_lai_sla_max = 50000 25000
          lai_sla_min = 8000  8000
          sla_max = 45000
          sla_min = 8000
          initial_tpla = 200
          tiller_coef = 0.66
          tpla_inflection_ratio = 0.66
          height_max = 3500
          height_stem_slope = 250
          Biomass = Biomass --------------------------------------------------
          dm_leaf_init = 0.1
          dm_root_init = 0.1
          dm_stem_init = 0.1
          stem_trans_frac = 0.2
          leaf_trans_frac = 0.15
          retransRate = 0.15
          ratio_root_shoot = 0   0   1    1     0.33  0.33  0.087  0    0     0    0    0
          partition_rate_leaf = 0.006
          frac_stem2flower = 0.3
          grn_water_cont = 0.13
          GrainTempWindow = -150 50
          GrainTempOrdinals = 36 40
          Roots = ROOTS --------------------------------------------------
          root_depth_rate = 0 27.0  27.0  27.0 27.0  27.0   27.0   0      0       0    0    0
          x_sw_ratio = 0   0.25
          y_sw_fac_root = 0   1
          initial_root_depth = 50
          specific_root_length = 100000
          x_plant_rld = 0.0  0.1
          y_rel_root_rate = 1.0  1.0
          transp_eff_cf = 0.009 0.009 0.009 0.009 0.009 0.009  0.009  0.009  0.009  0.009   0.009   0.009
          svp_fract = 0.75
          x_sw_demand_ratio = 0.1 1.1
          y_swdef_leaf = 0   1
          x_sw_avail_ratio = 0 0.2 1.0
          y_swdef_pheno = 0 1.0 1.0
          Nitrogen = Nitrogen --------------------------------------------------
          no3_diffn_const = 2
          maxUptakeRate = 0.029
          initialRootNConc = 0.02
          targetRootNConc = 0.002
          initialLeafSLN = 1.5
          targetLeafSLN = 1.5
          newLeafSLN = 1
          senescedLeafSLN = 0.3
          initialStemNConc = 0.01
          x_stem_n = 3         5       7         10
          targetStemNConc = 0.055   0.016   0.01      0.005
          structStemNConc = 0.012  0.012   0.005   0.0015
          initialRachisNConc = 0
          targetRachisNConc = 0.01
          structRachisNConc = 0.003
          stemDilnNSlope = 0.0062
          stemDilnNInt = -0.001
          rachisDilnNSlope = 0.0062
          rachisDilnNInt = -0.001
          leafDilnNSlope = 0.0043
          leafDilnNInt = -0.0017
          grainFillRate = 0.001
          grainFillIntercept = 0.0000319
          grainFillSlope = 0.4026
          targetGrainNConc = 0.0175
          nUptakeCease = 570
          nSupplyFrac = 5
          Senescence = Senescence --------------------------------------------------
          dm_root_sen_frac = 0.002
          lai_sen_light = 4
          sen_light_slope = 0.008
          x_temp_senescence = 0.0 6.0
          y_senescence_fac = 1   0
          sen_rate_water = 0.05
          dead_detach_frac = 0 0 0 0 0
          dm_leaf_detach_frac = 0
          sen_light_time_const = 10
          sen_radn_crit = 2
          frost_kill = 1
          sen_water_time_const = 10
          sen_threshold = 0.25
          spla_slope = 81.5
          tt_emerg_limit = 150
          days_germ_limit = 40
          swdf_photo_limit = 99
          swdf_photo_rate = 0
          swdf_pheno_limit = 99
          x_weighted_temp = 55.0  60.0
          y_plant_death = 0.0   1.0
          stress_determinants = leaf stem grain
          Phosphorous = Phosphorous --------------------------------------------------
          yield_parts = grain
          retrans_parts = leaf stem  flower
          pfact_photo_slope = 2.5
          pfact_expansion_slope = 2.5
          pfact_pheno_slope = 6
          pfact_grain_slope = 20
          p_uptake_factor = 1.5
          x_p_stage_code = 3       4      5      6      7      8      10
          y_p_conc_max_leaf = 0.0059  0.0054 0.0040 0.0029 0.0026 0.0025 0.0022
          y_p_conc_min_leaf = 0.003   0.003  0.0029 0.0011 0.0011 0.0008 0.0006
          y_p_conc_sen_leaf = 0.0005  0.0005 0.0005 0.0005 0.0005 0.0005 0.0005
          y_p_conc_max_stem = 0.0057  0.0038 0.0037 0.0018 0.0016 0.0013 0.0013
          y_p_conc_min_stem = 0.003   0.003  0.002  0.0006 0.0006 0.0002 0.0002
          y_p_conc_sen_stem = 0.0002  0.0002 0.0002 0.0002 0.0002 0.0002 0.0002
          y_p_conc_max_root = 0.0010  0.0010 0.0010 0.0010 0.0010 0.0010 0.0010
          y_p_conc_min_root = 0.0010  0.0010 0.0010 0.0010 0.0010 0.0010 0.0010
          y_p_conc_sen_root = 0.0010  0.0010 0.0010 0.0010 0.0010 0.0010 0.0010
          y_p_conc_max_flower = 0.0057  0.0038 0.0037 0.0018 0.0016 0.0013 0.0013
          y_p_conc_min_flower = 0.003   0.003  0.002  0.0006 0.0006 0.0002 0.0002
          y_p_conc_sen_flower = 0.0002  0.0002 0.0002 0.0002 0.0002 0.0002 0.0002
          y_p_conc_max_grain = 0.001   0.001  0.001  0.001  0.052  0.0044  0.0034
          y_p_conc_min_grain = 0.001   0.001  0.001  0.001  0.001  0.0015  0.0015
          y_p_conc_sen_grain = 0.001   0.001  0.001  0.001  0.001  0.0015  0.0015
          y_p_conc_max_energy = 0.001   0.001  0.001  0.001  0.001  0.001  0.001
          y_p_conc_min_energy = 0.001   0.001  0.001  0.001  0.001  0.001  0.001
          y_p_conc_sen_energy = 0.001   0.001  0.001  0.001  0.001  0.001  0.001
          p_conc_init_leaf = 0.0059
          p_conc_init_stem = 0.0057
          p_conc_init_root = 0.01
          p_conc_init_flower = 0.0057
          p_conc_init_grain = 0.0052
          p_conc_init_energy = 0
          Bounds = Bounds --------------------------------------------------
          ll_ub = 1000
          kl_ub = 1
          minsw = 0.00001
          latitude_ub = 90
          latitude_lb = -90
          maxt_ub = 55
          maxt_lb = 0
          mint_ub = 40
          mint_lb = -10
          radn_ub = 50
          radn_lb = 1
          dlayer_ub = 1000
          dlayer_lb = 0
          dul_dep_ub = 1000
          dul_dep_lb = 0
          sw_dep_ub = 1000
          sw_dep_lb = 0
          sw_ub = 1
          sw_lb = 0
          no3_ub = 10000
          no3_lb = 0
          no3_min_ub = 10000
          no3_min_lb = 0
          nh4_ub = 10000
          nh4_lb = 0
          nh4_min_ub = 10000
          nh4_min_lb = 0
          head_grain_no_max_ub = 45000
          grain_gth_rate_ub = 20
          tt_emerg_to_endjuv_ub = 500
          pp_endjuv_to_init_ub = 200
          tt_flower_to_maturity_ub = 1000
          tt_maturity_to_ripe_ub = 1000
          tt_flower_to_start_grain_ub = 1000
          tt_flag_to_flower_ub = 1000
          x_co2_te_modifier = 350
          y_co2_te_modifier = 1
          Water = WATER --------------------------------------------------
        sorghumGenotype QL41xQL36
          tt_emerg_to_endjuv = 100
          photoperiod_crit1 = 11.5
          photoperiod_crit2 = 13.5
          photoperiod_slope = 12.5
          tt_endjuv_to_init = 179
          tt_flag_to_flower = 170
          tt_flower_to_start_grain = 80
          tt_flower_to_maturity = 761
          tt_maturity_to_ripe = 1
          main_stem_coef = 2.9
          tpla_prod_coef = 0.018
          dm_per_seed = 0.00083
          x_stem_wt = 0    80
          y_height = 0  2000
          maxGFRate = 0.09
        sorghumGenotype Buster
          tt_emerg_to_endjuv = 100
          photoperiod_crit1 = 11.5
          photoperiod_crit2 = 13.5
          photoperiod_slope = 11.5
          tt_endjuv_to_init = 160
          tt_flag_to_flower = 170
          tt_flower_to_start_grain = 80
          tt_flower_to_maturity = 761
          tt_maturity_to_ripe = 1
          main_stem_coef = 2.9
          tpla_prod_coef = 0.018
          dm_per_seed = 0.00083
          x_stem_wt = 0    80
          y_height = 0  2000
          maxGFRate = 0.09
        sorghumGenotype M35-1
          tt_emerg_to_endjuv = 100
          photoperiod_crit1 = 11.5
          photoperiod_crit2 = 13.5
          photoperiod_slope = 61
          tt_endjuv_to_init = 252
          tt_flag_to_flower = 170
          tt_flower_to_start_grain = 80
          tt_flower_to_maturity = 761
          tt_maturity_to_ripe = 1
          main_stem_coef = 2.82
          tpla_prod_coef = 0.011
          dm_per_seed = 0.00142784
          x_stem_wt = 0    80
          y_height = 0  2000
          partition_rate_leaf = 0.018
          nUptakeCease = 10
          leaf_init_rate = 26.1
          targetLeafSLN = 1.2
          maxGFRate = 0.09
    simulation Sorghum_HE1_T1
      clock
        start_date = 1/12/1996  # Select the start date of the simulation
        end_date = 11/06/1997  # Select the end date of the simulation
      summaryfile
      metfile met: filename=HE1.met
      area paddock
        outputfile: filename=Sorghum_HE1_T1.out; title=Sorghum_HE1_T1
          variables My Variables -> /simulations/HE1/shared/My Variables
          events My Variables Events -> /simulations/HE1/shared/My Variables Events
        folder Manager folder
          manager Sow SkipRow on a fixed date
            # Sowing criteria
            date = 9/01/1997  # Enter sowing date (d/m/yyyy)
            # Sowing parameters
            crop = Sorghum  # Enter name of crop to sow
            density = 10  # Enter sowing density (plants/m2)
            depth = 30  # Enter sowing depth (mm)
            cultivar = QL41xQL36  # Enter cultivar
            row_spacing = 500  # Enter row spacing (m)
            RowConfiguration = solid  # Enter skip row configuration
            ftn = 0  # Enter Fertile Tiller No.
            on start_of_day:
```
            if (paddock_is_fallow() = 1 and today = date('[date]')) then
              [crop] sow plants =[density], sowing_depth = [depth], cultivar = [cultivar], row_spacing = [row_spacing], skip = [RowConfiguration], tiller_no_fertile = [ftn] ()
            endif
            if (paddock_is_fallow() = 0) then
               outputfile do_output
            endif
```
          manager Harvesting rule
            # Harvesting criteria
            crop = Sorghum  # Enter name of crop to harvest when ripe
            on end_of_day:
```
           if [crop].StageName = 'harvest_ripe' or [crop].plant_status = 'dead' then
              [crop]  harvest
              [crop]  end_crop
           endif
```
        irrigation
          automatic_irrigation = off  # switch
          asw_depth = 600.0  # Depth to which ASW is calculated. (mm)
          crit_fr_asw = 0.5  # Fraction of ASW below which irrigation is applied (0-1.0)
          irrigation_efficiency = 1.0  # Efficiency of the irrigation. (0-1.0)
          default_no3_conc = 0.0  # Nitrate concentration (ppm N)
          default_nh4_conc = 0.0  # Ammonium concentration (ppm N)
          default_cl_conc = 0.0  # Chloride concentration (ppm Cl)
        fertiliser
        operations
          9/01/1997  Irrigation apply amount = 52
          16/01/1997  Irrigation apply amount = 36
          21/01/1997  Irrigation apply amount = 18
          29/01/1997  Irrigation apply amount = 20
          7/02/1997  Irrigation apply amount = 14
          13/03/1997  Irrigation apply amount = 30
          21/03/1997  Irrigation apply amount = 45
          10/04/1997  Irrigation apply amount = 27
          17/04/1997  Irrigation apply amount = 42
          2/05/1997  Irrigation apply amount = 27
          20/12/1996  fertiliser apply amount = 33 (kg/ha), depth = 50 (mm), type = NO3_N ()
          23/12/1996  fertiliser apply amount = 0 (kg/ha), depth = 50 (mm), type = NO3_N ()
          23/12/1996  fertiliser apply amount = 119 (kg/ha), depth = 50 (mm), type = NO3_N ()
          12/02/1997  fertiliser apply amount = 59 (kg/ha), depth = 50 (mm), type = NO3_N ()
          21/03/1997  fertiliser apply amount = 59 (kg/ha), depth = 50 (mm), type = NO3_N ()
        Soil HRS -> /simulations/HE1/shared/HRS
        Sorghum -> /simulations/HE1/shared/Sorghum
    simulation Sorghum_HE1_T2
      clock
        start_date = 1/12/1996  # Select the start date of the simulation
        end_date = 30/06/1997  # Select the end date of the simulation
      summaryfile
      metfile met: filename=HE1.met
      area paddock
        outputfile: filename=Sorghum_HE1_T2.out; title=Sorghum_HE1_T2
          variables My Variables -> /simulations/HE1/shared/My Variables
          events My Variables Events -> /simulations/HE1/shared/My Variables Events
        folder Manager folder
          manager Sow SkipRow on a fixed date
            # Sowing criteria
            date = 9/01/1997  # Enter sowing date (d/m/yyyy)
            # Sowing parameters
            crop = Sorghum  # Enter name of crop to sow
            density = 10  # Enter sowing density (plants/m2)
            depth = 30  # Enter sowing depth (mm)
            cultivar = Buster  # Enter cultivar
            row_spacing = 0.5  # Enter row spacing (m)
            RowConfiguration = solid  # Enter skip row configuration
            ftn = 0.2  # Enter Fertile Tiller No.
            on start_of_day:
            script: same as in HE1.Sorghum_HE1_T1.paddock.Manager folder.Sow SkipRow on a fixed date
          manager Harvesting rule
            # Harvesting criteria
            crop = Sorghum  # Enter name of crop to harvest when ripe
            on end_of_day:
            script: same as in HE1.Sorghum_HE1_T1.paddock.Manager folder.Harvesting rule
        irrigation: same as HE1.Sorghum_HE1_T1.paddock.Irrigation
        fertiliser
        operations: same as HE1.Sorghum_HE1_T1.paddock.operations
        Soil HRS -> /simulations/HE1/shared/HRS
        Sorghum -> /simulations/HE1/shared/Sorghum
    simulation Sorghum_HE1_T3
      clock
        start_date = 1/12/1996  # Select the start date of the simulation
        end_date = 30/06/1997  # Select the end date of the simulation
      summaryfile
      metfile met: filename=HE1.met
      area paddock
        outputfile: filename=Sorghum_HE1_T3.out; title=Sorghum_HE1_T3
          variables My Variables -> /simulations/HE1/shared/My Variables
          events My Variables Events -> /simulations/HE1/shared/My Variables Events
        folder Manager folder
          manager Sow SkipRow on a fixed date
            # Sowing criteria
            date = 9/01/1997  # Enter sowing date (d/m/yyyy)
            # Sowing parameters
            crop = Sorghum  # Enter name of crop to sow
            density = 10  # Enter sowing density (plants/m2)
            depth = 30  # Enter sowing depth (mm)
            cultivar = M35-1  # Enter cultivar
            row_spacing = 0.5  # Enter row spacing (m)
            RowConfiguration = solid  # Enter skip row configuration
            ftn = 0  # Enter Fertile Tiller No.
            on start_of_day:
            script: same as in HE1.Sorghum_HE1_T1.paddock.Manager folder.Sow SkipRow on a fixed date
          manager Harvesting rule
            # Harvesting criteria
            crop = Sorghum  # Enter name of crop to harvest when ripe
            on end_of_day:
            script: same as in HE1.Sorghum_HE1_T1.paddock.Manager folder.Harvesting rule
        irrigation: same as HE1.Sorghum_HE1_T1.paddock.Irrigation
        fertiliser
        operations: same as HE1.Sorghum_HE1_T1.paddock.operations
        Soil HRS -> /simulations/HE1/shared/HRS
        Sorghum -> /simulations/HE1/shared/Sorghum
  folder HE2
    folder shared
      events My Variables Events
      Soil HRS: SoilType=HMM; LocalName=HRS; Site=HRS; NearestTown=Unknown; Region=SE Queensland; NaturalVegetation=Unknown; Latitude=0; Longitude=0; YearOfSampling=0
        Water
          Thickness  BD     AirDry  LL15   DUL    SAT
          100        1.340  0.080   0.226  0.420  0.450
          100        1.340  0.190   0.226  0.420  0.450
          200        1.330  0.230   0.258  0.460  0.470
          200        1.380  0.260   0.270  0.460  0.470
          200        1.400  0.260   0.268  0.430  0.450
          200        1.550  0.280   0.304  0.400  0.410
          200        1.590  0.250   0.335  0.370  0.380
          200        1.630  0.280   0.330  0.330  0.370
          200        1.660  0.300   0.320  0.320  0.370
          200        1.680  0.310   0.330  0.330  0.360
          SoilCrop Sorghum
            LL=[0.226, 0.226, 0.258, 0.270, 0.268, 0.304, 0.335, 0.330, 0.320, 0.330]
            KL=[0.070, 0.070, 0.070, 0.070, 0.060, 0.060, 0.060, 0.050, 0.050, 0.040]
            XF=[1, 1, 1, 1, 1, 1, 1, 1, 1, 1]
        SoilWater: SummerCona=6.5; SummerU=1.5; SummerDate=1-Nov; WinterCona=6.5; WinterU=1.5; WinterDate=1-Apr; DiffusConst=40; DiffusSlope=16; Salb=0.2; CN2Bare=85; CNRed=20; CNCov=0.8; Thickness=[100, 100, 200, 200, 200, 200, 200, 200, 200, 200]
          SWCON=[0.300, 0.300, 0.300, 0.300, 0.300, 0.300, 0.300, 0.300, 0.300, 0.300]
        SoilOrganicMatter: RootCN=50; RootWt=1000; SoilCN=12.5; EnrACoeff=7.4; EnrBCoeff=0.2
          Thickness  OC     FBiom  FInert
          100        1.190  0.050  0.450
          100        0.590  0.020  0.600
          200        0.450  0.010  0.750
          200        0.300  0.010  0.900
          200        0.200  0.010  0.900
          200        0.160  0.010  0.900
          200        0.170  0.010  0.900
          200        0.170  0.050  0.900
          200        0.170  0.020  0.900
          200        0.170  0.010  0.900
        Analysis: Thickness=[100, 100, 200, 200, 200, 200, 200, 200, 200, 200]
          PH=[6.300, 6.400, 6.500, 6.600, 6.600, 6.500, 6.500, 6.500, 6.500, 6.500]
        Sample Initial nitrogen
          Thickness  NO3        NH4
          100        0.0999983  0.1
          100        0.0259996  0.1
          200        0.0499991  0.1
          200        0.0579706  0.1
          200        0.394272   0.1
          200        0.187095   0.1
          200        0.511991   0.1
          200        0.761987   0.1
          200        0.718988   0.1
          200        0.699988   0.1
        Sample Initial water: Thickness=[100, 100, 200, 200, 200, 200, 200, 200, 200, 200]
          SW=[0.235, 0.252, 0.270, 0.300, 0.268, 0.304, 0.335, 0.330, 0.320, 0.330]
      variables My Variables
        variable:
          today format dd/mm/yyyy as Date
          DaysAfterSowing as Das
          Stage
          Biomass
          GreenWt
          Biomass units g/m^2 as BiomassWt
          RootGreenWt
          LeafGreenWt
          StemGreenWt
          RachisGreenWt
          GrainGreenWt
          BiomassN
          RootGreenN
          LeafGreenN
          StemGreenN
          RachisGreenN
          GrainGreenN
          GrainGreenNConc
          GrainNo
          GrainSize
          HI
          LeafNo
          LAI
          SLAI
          ESW
          no3() as NO3
          SLN
          WaterSD
          sw
          TPLA
          SPLA
          biomass_n
      sorghum
        sorghumConstants standard: same as HE1.shared.Sorghum.standard
        sorghumGenotype QL41xQL36: same as HE1.shared.Sorghum.QL41xQL36
        sorghumGenotype Buster: same as HE1.shared.Sorghum.Buster
        sorghumGenotype M35-1: same as HE1.shared.Sorghum.M35-1
    simulation Sorghum_HE2_T1
      clock
        start_date = 1/12/1996  # Select the start date of the simulation
        end_date = 30/06/1997  # Select the end date of the simulation
      summaryfile
      metfile met: filename=HE2.met
      area paddock
        outputfile: filename=Sorghum_HE2_T1.out; title=Sorghum_HE2_T1
          variables My Variables -> /simulations/HE2/shared/My Variables
          events My Variables Events -> /simulations/HE2/shared/My Variables Events
        folder Manager folder
          manager Sow SkipRow on a fixed date
            # Sowing criteria
            date = 9/01/1997  # Enter sowing date (d/m/yyyy)
            # Sowing parameters
            crop = Sorghum  # Enter name of crop to sow
            density = 10  # Enter sowing density (plants/m2)
            depth = 30  # Enter sowing depth (mm)
            cultivar = QL41xQL36  # Enter cultivar
            row_spacing = 0.5  # Enter row spacing (m)
            RowConfiguration = solid  # Enter skip row configuration
            ftn = 0  # Enter Fertile Tiller No.
            on start_of_day:
            script: same as in HE1.Sorghum_HE1_T1.paddock.Manager folder.Sow SkipRow on a fixed date
          manager Harvesting rule
            # Harvesting criteria
            crop = Sorghum  # Enter name of crop to harvest when ripe
            on end_of_day:
            script: same as in HE1.Sorghum_HE1_T1.paddock.Manager folder.Harvesting rule
        irrigation: same as HE1.Sorghum_HE1_T1.paddock.Irrigation
        fertiliser
        operations
          9/01/1997  Irrigation apply amount = 54
          16/01/1997  Irrigation apply amount = 37
          21/01/1997  Irrigation apply amount = 19
          29/01/1997  Irrigation apply amount = 20
          7/02/1997  Irrigation apply amount = 14
          13/03/1997  Irrigation apply amount = 30
          21/03/1997  Irrigation apply amount = 46
          10/04/1997  Irrigation apply amount = 24
          17/04/1997  Irrigation apply amount = 41
          2/05/1997  Irrigation apply amount = 25
          20/12/1996  fertiliser apply amount = 0(kg/ha), depth = 50 (mm), type = NO3_N ()
          23/12/1996  fertiliser apply amount = 0 (kg/ha), depth = 50 (mm), type = NO3_N ()
          23/12/1996  fertiliser apply amount = 10 (kg/ha), depth = 50 (mm), type = NO3_N ()
        Soil HRS -> /simulations/HE2/shared/HRS
        sorghum -> /simulations/HE2/shared/sorghum
    simulation Sorghum_HE2_T2
      clock
        start_date = 1/12/1996  # Select the start date of the simulation
        end_date = 30/06/1997  # Select the end date of the simulation
      summaryfile
      metfile met: filename=HE2.met
      area paddock
        outputfile: filename=Sorghum_HE2_T2.out; title=Sorghum_HE2_T2
          variables My Variables -> /simulations/HE2/shared/My Variables
          events My Variables Events -> /simulations/HE2/shared/My Variables Events
        folder Manager folder
          manager Sow SkipRow on a fixed date
            # Sowing criteria
            date = 9/01/1997  # Enter sowing date (d/m/yyyy)
            # Sowing parameters
            crop = Sorghum  # Enter name of crop to sow
            density = 10  # Enter sowing density (plants/m2)
            depth = 30  # Enter sowing depth (mm)
            cultivar = Buster  # Enter cultivar
            row_spacing = 0.5  # Enter row spacing (m)
            RowConfiguration = solid  # Enter skip row configuration
            ftn = 0  # Enter Fertile Tiller No.
            on start_of_day:
            script: same as in HE1.Sorghum_HE1_T1.paddock.Manager folder.Sow SkipRow on a fixed date
          manager Harvesting rule
            # Harvesting criteria
            crop = Sorghum  # Enter name of crop to harvest when ripe
            on end_of_day:
            script: same as in HE1.Sorghum_HE1_T1.paddock.Manager folder.Harvesting rule
        irrigation: same as HE1.Sorghum_HE1_T1.paddock.Irrigation
        fertiliser
        operations
          9/01/1997  Irrigation apply amount = 54
          16/01/1997  Irrigation apply amount = 37
          21/01/1997  Irrigation apply amount = 19
          29/01/1997  Irrigation apply amount = 20
          7/02/1997  Irrigation apply amount = 14
          13/03/1997  Irrigation apply amount = 30
          21/03/1997  Irrigation apply amount = 46
          10/04/1997  Irrigation apply amount = 24
          17/04/1997  Irrigation apply amount = 41
          2/05/1997  Irrigation apply amount = 25
          20/12/1996  fertiliser apply amount = 0 (kg/ha), depth = 50 (mm), type = NO3_N ()
          23/12/1996  fertiliser apply amount = 0 (kg/ha), depth = 50 (mm), type = NO3_N ()
          23/12/1996  fertiliser apply amount = 10 (kg/ha), depth = 50 (mm), type = NO3_N ()
        Soil HRS -> /simulations/HE2/shared/HRS
        sorghum -> /simulations/HE2/shared/sorghum
    simulation Sorghum_HE2_T3
      clock
        start_date = 1/12/1996  # Select the start date of the simulation
        end_date = 30/06/1997  # Select the end date of the simulation
      summaryfile
      metfile met: filename=HE2.met
      area paddock
        outputfile: filename=Sorghum_HE2_T3.out; title=Sorghum_HE2_T3
          variables My Variables -> /simulations/HE2/shared/My Variables
          events My Variables Events -> /simulations/HE2/shared/My Variables Events
        folder Manager folder
          manager Sow SkipRow on a fixed date: same as HE1.Sorghum_HE1_T3.paddock.Manager folder.Sow SkipRow on a fixed date
          manager Harvesting rule
            # Harvesting criteria
            crop = Sorghum  # Enter name of crop to harvest when ripe
            on end_of_day:
            script: same as in HE1.Sorghum_HE1_T1.paddock.Manager folder.Harvesting rule
        irrigation: same as HE1.Sorghum_HE1_T1.paddock.Irrigation
        fertiliser
        operations
          9/01/1997  Irrigation apply amount = 54
          16/01/1997  Irrigation apply amount = 37
          21/01/1997  Irrigation apply amount = 19
          29/01/1997  Irrigation apply amount = 20
          7/02/1997  Irrigation apply amount = 14
          13/03/1997  Irrigation apply amount = 30
          21/03/1997  Irrigation apply amount = 46
          10/04/1997  Irrigation apply amount = 24
          17/04/1997  Irrigation apply amount = 41
          2/05/1997  Irrigation apply amount = 25
          20/12/1996  fertiliser apply amount = 3 (kg/ha), depth = 50 (mm), type = NO3_N ()
          23/12/1996  fertiliser apply amount = 0 (kg/ha), depth = 50 (mm), type = NO3_N ()
          23/12/1996  fertiliser apply amount = 10 (kg/ha), depth = 50 (mm), type = NO3_N ()
        Soil HRS -> /simulations/HE2/shared/HRS
        sorghum -> /simulations/HE2/shared/sorghum
  folder HE3
    folder shared
      events My Variables Events
      Soil HRS: SoilType=HMM; LocalName=HRS; Site=HRS; NearestTown=Unknown; Region=SE Queensland; NaturalVegetation=Unknown; Latitude=0; Longitude=0; YearOfSampling=0
        Water
          Thickness  BD     AirDry  LL15   DUL    SAT
          100        1.340  0.080   0.226  0.420  0.450
          100        1.340  0.190   0.226  0.420  0.450
          200        1.330  0.230   0.258  0.460  0.480
          200        1.380  0.260   0.270  0.460  0.470
          200        1.400  0.260   0.268  0.430  0.450
          200        1.550  0.280   0.304  0.400  0.410
          200        1.590  0.320   0.335  0.370  0.380
          200        1.630  0.320   0.330  0.330  0.370
          200        1.660  0.320   0.320  0.320  0.370
          200        1.680  0.330   0.330  0.330  0.360
          SoilCrop Sorghum
            LL=[0.226, 0.226, 0.258, 0.270, 0.268, 0.304, 0.335, 0.330, 0.320, 0.330]
            KL=[0.070, 0.070, 0.070, 0.070, 0.060, 0.060, 0.060, 0.050, 0.050, 0.040]
            XF=[1, 1, 1, 1, 1, 1, 1, 1, 1, 1]
        SoilWater: same as HE2.shared.HRS.SoilWater
        SoilOrganicMatter: same as HE2.shared.HRS.SoilOrganicMatter
        Analysis: Thickness=[100, 100, 200, 200, 200, 200, 200, 200, 200, 200]
          PH=[6.300, 6.400, 6.500, 6.600, 6.600, 6.500, 6.500, 6.500, 6.500, 6.500]
        Sample Initial nitrogen
          Thickness  NO3     NH4
          100        12.233  0.100
          100        1.867   0.100
          200        1.400   0.100
          200        0.867   0.100
          200        0.900   0.100
          200        2.833   0.100
          200        3.833   0.100
          200        3.900   0.100
          200        4.233   0.100
          200        3.767   0.100
        Sample Initial water: Thickness=[100, 100, 200, 200, 200, 200, 200, 200, 200, 200]
          SW=[0.217, 0.357, 0.375, 0.401, 0.349, 0.351, 0.359, 0.330, 0.322, 0.347]
      variables My Variables: same as HE2.shared.My Variables
      sorghum: same as HE2.shared.sorghum
    simulation Sorghum_HE3_T1
      clock
        start_date = 9/01/1997  # Select the start date of the simulation
        end_date = 30/06/1997  # Select the end date of the simulation
      summaryfile
      metfile met: filename=HE3.met
      area paddock
        outputfile: filename=Sorghum_HE3_T1.out; title=Sorghum_HE3_T1
          variables My Variables -> /simulations/HE3/shared/My Variables
          events My Variables Events -> /simulations/HE3/shared/My Variables Events
        folder Manager folder
          manager Sow SkipRow on a fixed date
            # Sowing criteria
            date = 9/01/1997  # Enter sowing date (d/m/yyyy)
            # Sowing parameters
            crop = Sorghum  # Enter name of crop to sow
            density = 10  # Enter sowing density (plants/m2)
            depth = 15  # Enter sowing depth (mm)
            cultivar = QL41xQL36  # Enter cultivar
            row_spacing = 0.5  # Enter row spacing (m)
            RowConfiguration = solid  # Enter skip row configuration
            ftn = 0  # Enter Fertile Tiller No.
            on start_of_day:
            script: same as in HE1.Sorghum_HE1_T1.paddock.Manager folder.Sow SkipRow on a fixed date
          manager Harvesting rule
            # Harvesting criteria
            crop = Sorghum  # Enter name of crop to harvest when ripe
            on end_of_day:
            script: same as in HE1.Sorghum_HE1_T1.paddock.Manager folder.Harvesting rule
        irrigation: same as HE1.Sorghum_HE1_T1.paddock.Irrigation
        fertiliser
        operations
          23/12/1996  Irrigation apply amount = 69
          27/12/1996  Irrigation apply amount = 9
          9/01/1997  Irrigation apply amount = 33
          16/01/1997  Irrigation apply amount = 28
          31/01/1997  Irrigation apply amount = 19
          20/12/1996  fertiliser apply amount = 33 (kg/ha), depth = 50 (mm), type = NO3_N ()
          23/12/1996  fertiliser apply amount = 0 (kg/ha), depth = 50 (mm), type = NO3_N ()
          23/12/1996  fertiliser apply amount = 119 (kg/ha), depth = 50 (mm), type = NO3_N ()
        Soil HRS -> /simulations/HE3/shared/HRS
        sorghum -> /simulations/HE3/shared/sorghum
    simulation Sorghum_HE3_T2
      clock
        start_date = 9/01/1997  # Select the start date of the simulation
        end_date = 30/06/1997  # Select the end date of the simulation
      summaryfile
      metfile met: filename=HE3.met
      area paddock
        outputfile: filename=Sorghum_HE3_T2.out; title=Sorghum_HE3_T2
          variables My Variables -> /simulations/HE3/shared/My Variables
          events My Variables Events -> /simulations/HE3/shared/My Variables Events
        folder Manager folder
          manager Sow SkipRow on a fixed date
            # Sowing criteria
            date = 9/01/1997  # Enter sowing date (d/m/yyyy)
            # Sowing parameters
            crop = Sorghum  # Enter name of crop to sow
            density = 10  # Enter sowing density (plants/m2)
            depth = 15  # Enter sowing depth (mm)
            cultivar = Buster  # Enter cultivar
            row_spacing = 0.5  # Enter row spacing (m)
            RowConfiguration = solid  # Enter skip row configuration
            ftn = 0  # Enter Fertile Tiller No.
            on start_of_day:
            script: same as in HE1.Sorghum_HE1_T1.paddock.Manager folder.Sow SkipRow on a fixed date
          manager Harvesting rule
            # Harvesting criteria
            crop = Sorghum  # Enter name of crop to harvest when ripe
            on end_of_day:
            script: same as in HE1.Sorghum_HE1_T1.paddock.Manager folder.Harvesting rule
        irrigation: same as HE1.Sorghum_HE1_T1.paddock.Irrigation
        fertiliser
        operations: same as HE3.Sorghum_HE3_T1.paddock.operations
        Soil HRS -> /simulations/HE3/shared/HRS
        sorghum -> /simulations/HE3/shared/sorghum
    simulation Sorghum_HE3_T3
      clock
        start_date = 9/01/1997  # Select the start date of the simulation
        end_date = 30/06/1997  # Select the end date of the simulation
      summaryfile
      metfile met: filename=HE3.met
      area paddock
        outputfile: filename=Sorghum_HE3_T3.out; title=Sorghum_HE3_T3
          variables My Variables -> /simulations/HE3/shared/My Variables
          events My Variables Events -> /simulations/HE3/shared/My Variables Events
        folder Manager folder
          manager Sow SkipRow on a fixed date
            # Sowing criteria
            date = 9/01/1997  # Enter sowing date (d/m/yyyy)
            # Sowing parameters
            crop = Sorghum  # Enter name of crop to sow
            density = 10  # Enter sowing density (plants/m2)
            depth = 15  # Enter sowing depth (mm)
            cultivar = M35-1  # Enter cultivar
            row_spacing = 0.5  # Enter row spacing (m)
            RowConfiguration = solid  # Enter skip row configuration
            ftn = 0  # Enter Fertile Tiller No.
            on start_of_day:
            script: same as in HE1.Sorghum_HE1_T1.paddock.Manager folder.Sow SkipRow on a fixed date
          manager Harvesting rule
            # Harvesting criteria
            crop = Sorghum  # Enter name of crop to harvest when ripe
            on end_of_day:
            script: same as in HE1.Sorghum_HE1_T1.paddock.Manager folder.Harvesting rule
        irrigation: same as HE1.Sorghum_HE1_T1.paddock.Irrigation
        fertiliser
        operations: same as HE3.Sorghum_HE3_T1.paddock.operations
        Soil HRS -> /simulations/HE3/shared/HRS
        sorghum -> /simulations/HE3/shared/sorghum
  folder HE4
    folder shared
      variables My Variables: same as HE2.shared.My Variables
      events My Variables Events
      operations
        23/12/1996  Irrigation apply amount = 69
        27/12/1996  Irrigation apply amount = 9
        9/01/1997  Irrigation apply amount = 33
        16/01/1997  Irrigation apply amount = 28
        31/01/1997  Irrigation apply amount = 19
        20/12/1996  fertiliser apply amount = 0 (kg/ha), depth = 50 (mm), type = NO3_N ()
        23/12/1996  fertiliser apply amount = 10 (kg/ha), depth = 50 (mm), type = NO3_N ()
        23/12/1997  fertiliser apply amount = 0 (kg/ha), depth = 50 (mm), type = NO3_N ()
      Soil HRS: SoilType=HMM; LocalName=HRS; Site=HRS; NearestTown=Unknown; Region=SE Queensland; NaturalVegetation=Unknown; Latitude=0; Longitude=0; YearOfSampling=0
        InitialWater Initial water: FractionFull=0.60; PercentMethod=FilledFromTop
        Water
          Thickness  BD     AirDry  LL15   DUL    SAT
          100        1.340  0.080   0.226  0.420  0.450
          100        1.340  0.190   0.226  0.420  0.450
          200        1.330  0.230   0.258  0.460  0.480
          200        1.380  0.260   0.270  0.460  0.470
          200        1.400  0.260   0.268  0.430  0.450
          200        1.550  0.280   0.304  0.400  0.410
          200        1.590  0.250   0.335  0.370  0.380
          200        1.630  0.280   0.330  0.330  0.370
          200        1.660  0.300   0.320  0.320  0.370
          200        1.680  0.310   0.330  0.330  0.360
          SoilCrop Sorghum
            LL=[0.226, 0.226, 0.258, 0.270, 0.268, 0.304, 0.335, 0.330, 0.320, 0.330]
            KL=[0.070, 0.070, 0.070, 0.070, 0.060, 0.060, 0.060, 0.050, 0.050, 0.040]
            XF=[1, 1, 1, 1, 1, 1, 1, 1, 1, 1]
        SoilWater: same as HE2.shared.HRS.SoilWater
        SoilOrganicMatter: same as HE2.shared.HRS.SoilOrganicMatter
        Analysis: Thickness=[100, 100, 200, 200, 200, 200, 200, 200, 200, 200]
          PH=[6.300, 6.400, 6.500, 6.600, 6.600, 6.500, 6.500, 6.500, 6.500, 6.500]
        Sample Initial nitrogen
          Thickness  NO3      NH4
          100        18.4607  0.468732
          100        2.89869  0.468732
          200        2.18866  0.468732
          200        1.59756  0.468732
          200        1.95258  0.468732
          200        2.60403  0.468732
          200        6.44883  0.468732
          200        10.0593  0.468732
          200        10.2954  0.468732
          200        12.8994  0.468732
      sorghum: same as HE2.shared.sorghum
    simulation Sorghum_HE4_T1
      clock
        start_date = 1/12/1996  # Select the start date of the simulation
        end_date = 11/06/1997  # Select the end date of the simulation
      summaryfile
      metfile met: filename=HE4.met
      area paddock
        outputfile: filename=Sorghum_HE4_T1.out; title=Sorghum_HE4_T1
          variables My Variables -> /simulations/HE4/shared/My Variables
          events My Variables Events -> /simulations/HE4/shared/My Variables Events
        folder Manager folder
          manager Sow SkipRow on a fixed date
            # Sowing criteria
            date = 9/01/1997  # Enter sowing date (d/m/yyyy)
            # Sowing parameters
            crop = Sorghum  # Enter name of crop to sow
            density = 10  # Enter sowing density (plants/m2)
            depth = 15  # Enter sowing depth (mm)
            cultivar = QL41xQL36  # Enter cultivar
            row_spacing = 500  # Enter row spacing (m)
            RowConfiguration = solid  # Enter skip row configuration
            ftn = 0  # Enter Fertile Tiller No.
            on start_of_day:
            script: same as in HE1.Sorghum_HE1_T1.paddock.Manager folder.Sow SkipRow on a fixed date
          manager Harvesting rule
            # Harvesting criteria
            crop = Sorghum  # Enter name of crop to harvest when ripe
            on end_of_day:
            script: same as in HE1.Sorghum_HE1_T1.paddock.Manager folder.Harvesting rule
        irrigation
          automatic_irrigation = off  # switch
          asw_depth = 600  # Depth to which ASW is calculated. (mm)
          crit_fr_asw = 0.5  # Fraction of ASW below which irrigation is applied (0-1.0)
          irrigation_efficiency = 1  # Efficiency of the irrigation. (0-1.0)
          default_no3_conc = 0.0  # Nitrate concentration (ppm N)
          default_nh4_conc = 0.0  # Ammonium concentration (ppm N)
          default_cl_conc = 0.0  # Chloride concentration (ppm Cl)
        fertiliser
        operations -> /simulations/HE4/shared/operations
        Soil HRS -> /simulations/HE4/shared/HRS
        sorghum -> /simulations/HE4/shared/sorghum
    simulation Sorghum_HE4_T2
      clock
        start_date = 1/12/1996  # Select the start date of the simulation
        end_date = 30/06/1997  # Select the end date of the simulation
      summaryfile
      metfile met: filename=HE4.met
      area paddock
        outputfile: filename=Sorghum_HE4_T2.out; title=Sorghum_HE4_T2
          variables My Variables -> /simulations/HE4/shared/My Variables
          events My Variables Events -> /simulations/HE4/shared/My Variables Events
        folder Manager folder: same as HE1.Sorghum_HE1_T2.paddock.Manager folder
        irrigation: same as HE4.Sorghum_HE4_T1.paddock.Irrigation
        fertiliser
        operations -> /simulations/HE4/shared/operations
        Soil HRS -> /simulations/HE4/shared/HRS
        sorghum -> /simulations/HE4/shared/sorghum
    simulation Sorghum_HE4_T3
      clock
        start_date = 1/12/1996  # Select the start date of the simulation
        end_date = 30/06/1997  # Select the end date of the simulation
      summaryfile
      metfile met: filename=HE4.met
      area paddock
        outputfile: filename=Sorghum_HE4_T3.out; title=Sorghum_HE4_T3
          variables My Variables -> /simulations/HE4/shared/My Variables
          events My Variables Events -> /simulations/HE4/shared/My Variables Events
        folder Manager folder: same as HE1.Sorghum_HE1_T3.paddock.Manager folder
        irrigation: same as HE1.Sorghum_HE1_T1.paddock.Irrigation
        fertiliser
        operations -> /simulations/HE4/shared/operations
        Soil HRS -> /simulations/HE4/shared/HRS
        sorghum -> /simulations/HE4/shared/sorghum
  folder HE5
    folder shared
      events My Variables Events
      Soil HRS: SoilType=HMM; LocalName=HRS; Site=HRS; NearestTown=Unknown; Region=SE Queensland; NaturalVegetation=Unknown; Latitude=0; Longitude=0; YearOfSampling=0
        Water: same as HE4.shared.HRS.Water
        SoilWater: same as HE2.shared.HRS.SoilWater
        SoilOrganicMatter: same as HE2.shared.HRS.SoilOrganicMatter
        Analysis: Thickness=[100, 100, 200, 200, 200, 200, 200, 200, 200, 200]
          PH=[6.300, 6.400, 6.500, 6.600, 6.600, 6.500, 6.500, 6.500, 6.500, 6.500]
        Sample Initial nitrogen
          Thickness  NO3     NH4
          100        8.421   0.100
          100        8.054   0.100
          200        7.001   0.100
          200        3.824   0.100
          200        2.759   0.100
          200        3.429   0.100
          200        8.668   0.100
          200        11.576  0.100
          200        8.816   0.100
          200        11.758  0.100
        Sample Initial water: Thickness=[100, 100, 200, 200, 200, 200, 200, 200, 200, 200]
          SW=[0.217, 0.357, 0.375, 0.401, 0.349, 0.351, 0.359, 0.330, 0.322, 0.347]
      variables My Variables: same as HE2.shared.My Variables
      sorghum
        sorghumConstants standard: same as HE1.shared.Sorghum.standard
        sorghumGenotype QL41xQL36: same as HE1.shared.Sorghum.QL41xQL36
        sorghumGenotype Buster: same as HE1.shared.Sorghum.Buster
        sorghumGenotype M35-1: same as HE1.shared.Sorghum.M35-1
        sorghumGenotype CSH13R
          tt_emerg_to_endjuv = 100
          photoperiod_crit1 = 11.5
          photoperiod_crit2 = 13.5
          photoperiod_slope = 17
          tt_endjuv_to_init = 228
          tt_flag_to_flower = 170
          tt_flower_to_start_grain = 80
          tt_flower_to_maturity = 761
          tt_maturity_to_ripe = 1
          main_stem_coef = 2.95
          tpla_prod_coef = 0.014
          dm_per_seed = 0.0015
          x_stem_wt = 0    80
          y_height = 0  2000
          rue = 0   0  1.6  1.6  1.6 1.6  1.6 1.6 1.6 1.6    0    0
          partition_rate_leaf = 0.018
          targetLeafSLN = 1.2
          leaf_init_rate = 23.2
          maxGFRate = 0.09
    simulation Sorghum_HE5_T1
      clock
        start_date = 18/11/1997  # Select the start date of the simulation
        end_date = 15/04/1998  # Select the end date of the simulation
      summaryfile
      metfile met: filename=HE5.met
      area paddock
        outputfile: filename=Sorghum_HE5_T1.out; title=Sorghum_HE5_T1
          variables My Variables -> /simulations/HE5/shared/My Variables
          events My Variables Events -> /simulations/HE5/shared/My Variables Events
        folder Manager folder
          manager Sow SkipRow on a fixed date
            # Sowing criteria
            date = 27/11/1997  # Enter sowing date (d/m/yyyy)
            # Sowing parameters
            crop = Sorghum  # Enter name of crop to sow
            density = 10  # Enter sowing density (plants/m2)
            depth = 30  # Enter sowing depth (mm)
            cultivar = Buster  # Enter cultivar
            row_spacing = 0.5  # Enter row spacing (m)
            RowConfiguration = solid  # Enter skip row configuration
            ftn = 0.1  # Enter Fertile Tiller No.
            on start_of_day:
            script: same as in HE1.Sorghum_HE1_T1.paddock.Manager folder.Sow SkipRow on a fixed date
          manager Harvesting rule
            # Harvesting criteria
            crop = Sorghum  # Enter name of crop to harvest when ripe
            on end_of_day:
            script: same as in HE1.Sorghum_HE1_T1.paddock.Manager folder.Harvesting rule
        irrigation: same as HE1.Sorghum_HE1_T1.paddock.Irrigation
        fertiliser
        operations
          28/11/1997  Irrigation apply amount = 16
          2/12/1997  Irrigation apply amount = 25
          4/12/1997  Irrigation apply amount = 13
          8/12/1997  Irrigation apply amount = 21
          18/12/1997  Irrigation apply amount = 28
          6/01/1998  Irrigation apply amount = 26
          12/01/1998  Irrigation apply amount = 46
          27/01/1998  Irrigation apply amount = 25
          20/02/1998  Irrigation apply amount = 26
          27/02/1998  Irrigation apply amount = 55
          13/03/1998  Irrigation apply amount = 22
          18/03/1998  Irrigation apply amount = 39
          20/03/1998  Irrigation apply amount = 21
          26/11/1997  fertiliser apply amount = 3 (kg/ha), depth = 50 (mm), type = NO3_N ()
          20/02/1998  fertiliser apply amount = 59 (kg/ha), depth = 50 (mm), type = NO3_N ()
        Soil HRS -> /simulations/HE5/shared/HRS
        sorghum -> /simulations/HE5/shared/sorghum
    simulation Sorghum_HE5_T2
      clock
        start_date = 18/11/1997  # Select the start date of the simulation
        end_date = 15/04/1998  # Select the end date of the simulation
      summaryfile
      metfile met: filename=HE5.met
      area paddock
        outputfile: filename=Sorghum_HE5_T2.out; title=Sorghum_HE5_T2
          variables My Variables -> /simulations/HE5/shared/My Variables
          events My Variables Events -> /simulations/HE5/shared/My Variables Events
        folder Manager folder
          manager Sow SkipRow on a fixed date
            # Sowing criteria
            date = 27/11/1997  # Enter sowing date (d/m/yyyy)
            # Sowing parameters
            crop = Sorghum  # Enter name of crop to sow
            density = 10  # Enter sowing density (plants/m2)
            depth = 30  # Enter sowing depth (mm)
            cultivar = M35-1  # Enter cultivar
            row_spacing = 0.5  # Enter row spacing (m)
            RowConfiguration = solid  # Enter skip row configuration
            ftn = 0.2  # Enter Fertile Tiller No.
            on start_of_day:
            script: same as in HE1.Sorghum_HE1_T1.paddock.Manager folder.Sow SkipRow on a fixed date
          manager Harvesting rule
            # Harvesting criteria
            crop = Sorghum  # Enter name of crop to harvest when ripe
            on end_of_day:
            script: same as in HE1.Sorghum_HE1_T1.paddock.Manager folder.Harvesting rule
        irrigation: same as HE1.Sorghum_HE1_T1.paddock.Irrigation
        fertiliser
        operations: same as HE5.Sorghum_HE5_T1.paddock.operations
        Soil HRS -> /simulations/HE5/shared/HRS
        sorghum -> /simulations/HE5/shared/sorghum
    simulation Sorghum_HE5_T3
      clock
        start_date = 18/11/1997  # Select the start date of the simulation
        end_date = 15/04/1998  # Select the end date of the simulation
      summaryfile
      metfile met: filename=HE5.met
      area paddock
        outputfile: filename=Sorghum_HE5_T3.out; title=Sorghum_HE5_T3
          variables My Variables -> /simulations/HE5/shared/My Variables
          events My Variables Events -> /simulations/HE5/shared/My Variables Events
        folder Manager folder
          manager Sow SkipRow on a fixed date
            # Sowing criteria
            date = 27/11/1997  # Enter sowing date (d/m/yyyy)
            # Sowing parameters
            crop = Sorghum  # Enter name of crop to sow
            density = 10  # Enter sowing density (plants/m2)
            depth = 30  # Enter sowing depth (mm)
            cultivar = CSH13R  # Enter cultivar
            row_spacing = 0.5  # Enter row spacing (m)
            RowConfiguration = solid  # Enter skip row configuration
            ftn = 0  # Enter Fertile Tiller No.
            on start_of_day:
            script: same as in HE1.Sorghum_HE1_T1.paddock.Manager folder.Sow SkipRow on a fixed date
          manager Harvesting rule
            # Harvesting criteria
            crop = Sorghum  # Enter name of crop to harvest when ripe
            on end_of_day:
            script: same as in HE1.Sorghum_HE1_T1.paddock.Manager folder.Harvesting rule
        irrigation: same as HE1.Sorghum_HE1_T1.paddock.Irrigation
        fertiliser
        operations
          28/11/1997  Irrigation apply amount = 16
          2/12/1997  Irrigation apply amount = 25
          4/12/1997  Irrigation apply amount = 13
          8/12/1997  Irrigation apply amount = 21
          18/12/1997  Irrigation apply amount = 28
          6/01/1998  Irrigation apply amount = 26
          12/01/1998  Irrigation apply amount = 46
          27/01/1998  Irrigation apply amount = 25
          20/02/1998  Irrigation apply amount = 26
          27/02/1998  Irrigation apply amount = 55
          13/03/1998  Irrigation apply amount = 22
          18/03/1998  Irrigation apply amount = 39
          20/03/1998  Irrigation apply amount = 21
          26/11/1997  fertiliser apply amount = 0 (kg/ha), depth = 50 (mm), type = NO3_N ()
          26/11/1997  fertiliser apply amount = 33 (kg/ha), depth = 50 (mm), type = NO3_N ()
          20/02/1998  fertiliser apply amount = 59 (kg/ha), depth = 50 (mm), type = NO3_N ()
        Soil HRS -> /simulations/HE5/shared/HRS
        sorghum -> /simulations/HE5/shared/sorghum
  folder HE6
    folder shared
      Soil HRS: SoilType=HMM; LocalName=HRS; Site=HRS; NearestTown=Unknown; Region=SE Queensland; NaturalVegetation=Unknown; Latitude=0; Longitude=0; YearOfSampling=0
        Water: same as HE4.shared.HRS.Water
        SoilWater: same as HE2.shared.HRS.SoilWater
        SoilOrganicMatter: same as HE2.shared.HRS.SoilOrganicMatter
        Analysis: Thickness=[100, 100, 200, 200, 200, 200, 200, 200, 200, 200]
          PH=[6.300, 6.400, 6.500, 6.600, 6.600, 6.500, 6.500, 6.500, 6.500, 6.500]
        Sample Initial nitrogen
          Thickness  NO3    NH4
          100        1.493  0.100
          100        1.633  0.100
          200        1.233  0.100
          200        0.900  0.100
          200        1.100  0.100
          200        1.467  0.100
          200        2.516  0.100
          200        3.067  0.100
          200        3.012  0.100
          200        2.976  0.100
        Sample Initial water: Thickness=[100, 100, 200, 200, 200, 200, 200, 200, 200, 200]
          SW=[0.217, 0.357, 0.375, 0.401, 0.349, 0.351, 0.359, 0.330, 0.322, 0.347]
      events My Variables Events
      variables My Variables
        variable:
          today format dd/mm/yyyy as Date
          DaysAfterSowing as Das
          Stage
          Biomass
          GreenWt
          Biomass units g/m^2 as BiomassWt
          RootGreenWt
          LeafGreenWt
          StemGreenWt
          RachisGreenWt
          GrainGreenWt
          BiomassN
          RootGreenN
          LeafGreenN
          StemGreenN
          RachisGreenN
          GrainGreenN
          GrainGreenNConc
          GrainNo
          GrainSize
          LeafNo
          LAI
          SLAI
          ESW
          no3() as NO3
          SLN
          WaterSD
          sw
          HI
          TPLA
          SPLA
          biomass_n
      sorghum: same as HE5.shared.sorghum
    simulation Sorghum_HE6_T1
      clock
        start_date = 18/11/1997  # Select the start date of the simulation
        end_date = 15/04/1998  # Select the end date of the simulation
      summaryfile
      metfile met: filename=HE6.met
      area paddock
        outputfile: filename=Sorghum_HE6_T1.out; title=Sorghum_HE6_T1
          variables My Variables -> /simulations/HE6/shared/My Variables
          events My Variables Events -> /simulations/HE6/shared/My Variables Events
        folder Manager folder
          manager Sow SkipRow on a fixed date
            # Sowing criteria
            date = 27/11/1997  # Enter sowing date (d/m/yyyy)
            # Sowing parameters
            crop = Sorghum  # Enter name of crop to sow
            density = 10  # Enter sowing density (plants/m2)
            depth = 30  # Enter sowing depth (mm)
            cultivar = Buster  # Enter cultivar
            row_spacing = 0.5  # Enter row spacing (m)
            RowConfiguration = solid  # Enter skip row configuration
            ftn = 0  # Enter Fertile Tiller No.
            on start_of_day:
            script: same as in HE1.Sorghum_HE1_T1.paddock.Manager folder.Sow SkipRow on a fixed date
          manager Harvesting rule
            # Harvesting criteria
            crop = Sorghum  # Enter name of crop to harvest when ripe
            on end_of_day:
            script: same as in HE1.Sorghum_HE1_T1.paddock.Manager folder.Harvesting rule
        irrigation: same as HE1.Sorghum_HE1_T1.paddock.Irrigation
        fertiliser
        operations
          28/11/1997  Irrigation apply amount = 16
          2/12/1997  Irrigation apply amount = 24
          4/12/1997  Irrigation apply amount = 13
          8/12/1997  Irrigation apply amount = 21
          18/12/1997  Irrigation apply amount = 28
          6/01/1998  Irrigation apply amount = 26
          12/01/1998  Irrigation apply amount = 47
          27/01/1998  Irrigation apply amount = 25
          20/02/1998  Irrigation apply amount = 20
          27/02/1998  Irrigation apply amount = 38
          13/03/1998  Irrigation apply amount = 22
          18/03/1998  Irrigation apply amount = 40
          26/11/1997  fertiliser apply amount = 10 (kg/ha), depth = 50 (mm), type = NO3_N ()
        Soil HRS -> /simulations/HE6/shared/HRS
        sorghum -> /simulations/HE6/shared/sorghum
    simulation Sorghum_HE6_T2
      clock
        start_date = 18/11/1997  # Select the start date of the simulation
        end_date = 15/04/1998  # Select the end date of the simulation
      summaryfile
      metfile met: filename=HE6.met
      area paddock
        outputfile: filename=Sorghum_HE6_T2.out; title=Sorghum_HE6_T2
          variables My Variables -> /simulations/HE6/shared/My Variables
          events My Variables Events -> /simulations/HE6/shared/My Variables Events
        folder Manager folder
          manager Sow SkipRow on a fixed date
            # Sowing criteria
            date = 27/11/1997  # Enter sowing date (d/m/yyyy)
            # Sowing parameters
            crop = Sorghum  # Enter name of crop to sow
            density = 10  # Enter sowing density (plants/m2)
            depth = 30  # Enter sowing depth (mm)
            cultivar = M35-1  # Enter cultivar
            row_spacing = 0.5  # Enter row spacing (m)
            RowConfiguration = solid  # Enter skip row configuration
            ftn = 0  # Enter Fertile Tiller No.
            on start_of_day:
            script: same as in HE1.Sorghum_HE1_T1.paddock.Manager folder.Sow SkipRow on a fixed date
          manager Harvesting rule
            # Harvesting criteria
            crop = Sorghum  # Enter name of crop to harvest when ripe
            on end_of_day:
            script: same as in HE1.Sorghum_HE1_T1.paddock.Manager folder.Harvesting rule
        irrigation: same as HE1.Sorghum_HE1_T1.paddock.Irrigation
        fertiliser
        operations: same as HE6.Sorghum_HE6_T1.paddock.operations
        Soil HRS -> /simulations/HE6/shared/HRS
        sorghum -> /simulations/HE6/shared/sorghum
    simulation Sorghum_HE6_T3
      clock
        start_date = 18/11/1997  # Select the start date of the simulation
        end_date = 15/04/1998  # Select the end date of the simulation
      summaryfile
      metfile met: filename=HE6.met
      area paddock
        outputfile: filename=Sorghum_HE6_T3.out; title=Sorghum_HE6_T3
          variables My Variables -> /simulations/HE6/shared/My Variables
          events My Variables Events -> /simulations/HE6/shared/My Variables Events
        folder Manager folder
          manager Sow SkipRow on a fixed date
            # Sowing criteria
            date = 27/11/1997  # Enter sowing date (d/m/yyyy)
            # Sowing parameters
            crop = Sorghum  # Enter name of crop to sow
            density = 10  # Enter sowing density (plants/m2)
            depth = 30  # Enter sowing depth (mm)
            cultivar = CSH13R  # Enter cultivar
            row_spacing = 0.5  # Enter row spacing (m)
            RowConfiguration = solid  # Enter skip row configuration
            ftn = 0  # Enter Fertile Tiller No.
            on start_of_day:
```
   tlai = lai + slai
            if (paddock_is_fallow() = 1 and today = date('[date]')) then
              [crop] sow plants =[density], sowing_depth = [depth], cultivar = [cultivar], row_spacing = [row_spacing], skip = [RowConfiguration], tiller_no_fertile = [ftn] ()
            endif
           if (paddock_is_fallow() = 0) then
               outputfile do_output
           endif
```
          manager Harvesting rule
            # Harvesting criteria
            crop = Sorghum  # Enter name of crop to harvest when ripe
            on end_of_day:
            script: same as in HE1.Sorghum_HE1_T1.paddock.Manager folder.Harvesting rule
        irrigation: same as HE1.Sorghum_HE1_T1.paddock.Irrigation
        fertiliser
        operations: same as HE6.Sorghum_HE6_T1.paddock.operations
        Soil HRS -> /simulations/HE6/shared/HRS
        sorghum -> /simulations/HE6/shared/sorghum
  folder HE7
    folder shared
      events My Variables Events
      variables My Variables: same as HE6.shared.My Variables
      sorghum: same as HE5.shared.sorghum
    simulation Sorghum_HE7_T1
      clock
        start_date = 25/11/1997  # Select the start date of the simulation
        end_date = 15/04/1998  # Select the end date of the simulation
      summaryfile
      metfile met: filename=HE7.met
      area paddock
        outputfile: filename=Sorghum_HE7_T1.out; title=Sorghum_HE7_T1
          variables My Variables -> /simulations/HE7/shared/My Variables
          events My Variables Events -> /simulations/HE7/shared/My Variables Events
        folder Manager folder
          manager Sow SkipRow on a fixed date
            # Sowing criteria
            date = 27/11/1997  # Enter sowing date (d/m/yyyy)
            # Sowing parameters
            crop = Sorghum  # Enter name of crop to sow
            density = 10  # Enter sowing density (plants/m2)
            depth = 15  # Enter sowing depth (mm)
            cultivar = Buster  # Enter cultivar
            row_spacing = 0.5  # Enter row spacing (m)
            RowConfiguration = solid  # Enter skip row configuration
            ftn = 0  # Enter Fertile Tiller No.
            on start_of_day:
            script: same as in HE1.Sorghum_HE1_T1.paddock.Manager folder.Sow SkipRow on a fixed date
          manager Harvesting rule
            # Harvesting criteria
            crop = Sorghum  # Enter name of crop to harvest when ripe
            on end_of_day:
            script: same as in HE1.Sorghum_HE1_T1.paddock.Manager folder.Harvesting rule
        irrigation: same as HE1.Sorghum_HE1_T1.paddock.Irrigation
        fertiliser
        operations
          28/11/1997  Irrigation apply amount = 65
          16/12/1997  Irrigation apply amount = 90
          26/11/1997  fertiliser apply amount = 3 (kg/ha), depth = 50 (mm), type = NO3_N ()
          26/11/1997  fertiliser apply amount = 119 (kg/ha), depth = 50 (mm), type = NO3_N ()
        Soil HRS: LocalName=HRS; Site=HRS; Region=SE Queensland
          SoilType = HMM  # Soil description
          NearestTown = Unknown
          NaturalVegetation = Unknown
          Water: same as HE3.shared.HRS.Water
          SoilWater: same as HE2.shared.HRS.SoilWater
          SoilOrganicMatter: same as HE2.shared.HRS.SoilOrganicMatter
          Analysis: Thickness=[100, 100, 200, 200, 200, 200, 200, 200, 200, 200]
            PH=[6.300, 6.400, 6.500, 6.600, 6.600, 6.500, 6.500, 6.500, 6.500, 6.500]
          Sample Initial nitrogen
            Thickness  NO3     NH4
            100        25.798  0.100
            100        6.921   0.100
            200        9.285   0.100
            200        2.823   0.100
            200        2.286   0.100
            200        3.196   0.100
            200        3.695   0.100
            200        4.410   0.100
            200        2.743   0.100
            200        4.891   0.100
          Sample Initial water: Thickness=[100, 100, 200, 200, 200, 200, 200, 200, 200, 200]
            SW=[0.307, 0.326, 0.444, 0.429, 0.363, 0.351, 0.336, 0.343, 0.352, 0.347]
        sorghum -> /simulations/HE7/shared/sorghum
    simulation Sorghum_HE7_T2
      clock
        start_date = 25/11/1997  # Select the start date of the simulation
        end_date = 15/04/1998  # Select the end date of the simulation
      summaryfile
      metfile met: filename=HE7.met
      area paddock
        outputfile: filename=Sorghum_HE7_T2.out; title=Sorghum_HE7_T2
          variables My Variables -> /simulations/HE7/shared/My Variables
          events My Variables Events -> /simulations/HE7/shared/My Variables Events
        folder Manager folder
          manager Sow SkipRow on a fixed date
            # Sowing criteria
            date = 27/11/1997  # Enter sowing date (d/m/yyyy)
            # Sowing parameters
            crop = Sorghum  # Enter name of crop to sow
            density = 10  # Enter sowing density (plants/m2)
            depth = 15  # Enter sowing depth (mm)
            cultivar = M35-1  # Enter cultivar
            row_spacing = 0.5  # Enter row spacing (m)
            RowConfiguration = solid  # Enter skip row configuration
            ftn = 0  # Enter Fertile Tiller No.
            on start_of_day:
            script: same as in HE1.Sorghum_HE1_T1.paddock.Manager folder.Sow SkipRow on a fixed date
          manager Harvesting rule
            # Harvesting criteria
            crop = Sorghum  # Enter name of crop to harvest when ripe
            on end_of_day:
            script: same as in HE1.Sorghum_HE1_T1.paddock.Manager folder.Harvesting rule
        irrigation: same as HE1.Sorghum_HE1_T1.paddock.Irrigation
        fertiliser
        operations
          28/11/1997  Irrigation apply amount = 65
          16/12/1997  Irrigation apply amount = 90
          26/11/1997  fertiliser apply amount = 0 (kg/ha), depth = 50 (mm), type = NO3_N ()
          26/11/1997  fertiliser apply amount = 33 (kg/ha), depth = 50 (mm), type = NO3_N ()
          26/11/1997  fertiliser apply amount = 119 (kg/ha), depth = 50 (mm), type = NO3_N ()
        Soil HRS: LocalName=HRS; Site=HRS; Region=SE Queensland
          SoilType = HMM  # Soil description
          NearestTown = Unknown
          NaturalVegetation = Unknown
          Water: same as HE3.shared.HRS.Water
          SoilWater: same as HE2.shared.HRS.SoilWater
          SoilOrganicMatter: same as HE2.shared.HRS.SoilOrganicMatter
          Analysis: Thickness=[100, 100, 200, 200, 200, 200, 200, 200, 200, 200]
            PH=[6.300, 6.400, 6.500, 6.600, 6.600, 6.500, 6.500, 6.500, 6.500, 6.500]
          Sample Initial nitrogen
            Thickness  NO3     NH4
            100        25.798  0.100
            100        6.921   0.100
            200        9.285   0.100
            200        2.823   0.100
            200        2.286   0.100
            200        3.196   0.100
            200        3.695   0.100
            200        4.410   0.100
            200        2.743   0.100
            200        4.891   0.100
          Sample Initial water: Thickness=[100, 100, 200, 200, 200, 200, 200, 200, 200, 200]
            SW=[0.323, 0.407, 0.388, 0.342, 0.341, 0.321, 0.324, 0.332, 0.339, 0.341]
        sorghum -> /simulations/HE7/shared/sorghum
    simulation Sorghum_HE7_T3
      clock
        start_date = 25/11/1997  # Select the start date of the simulation
        end_date = 15/04/1998  # Select the end date of the simulation
      summaryfile
      metfile met: filename=HE7.met
      area paddock
        outputfile: filename=Sorghum_HE7_T3.out; title=Sorghum_HE7_T3
          variables My Variables -> /simulations/HE7/shared/My Variables
          events My Variables Events -> /simulations/HE7/shared/My Variables Events
        folder Manager folder
          manager Sow SkipRow on a fixed date
            # Sowing criteria
            date = 27/11/1997  # Enter sowing date (d/m/yyyy)
            # Sowing parameters
            crop = Sorghum  # Enter name of crop to sow
            density = 10  # Enter sowing density (plants/m2)
            depth = 15  # Enter sowing depth (mm)
            cultivar = CSH13R  # Enter cultivar
            row_spacing = 0.5  # Enter row spacing (m)
            RowConfiguration = solid  # Enter skip row configuration
            ftn = 0  # Enter Fertile Tiller No.
            on start_of_day:
            script: same as in HE1.Sorghum_HE1_T1.paddock.Manager folder.Sow SkipRow on a fixed date
          manager Harvesting rule
            # Harvesting criteria
            crop = Sorghum  # Enter name of crop to harvest when ripe
            on end_of_day:
            script: same as in HE1.Sorghum_HE1_T1.paddock.Manager folder.Harvesting rule
        irrigation: same as HE1.Sorghum_HE1_T1.paddock.Irrigation
        fertiliser
        operations: same as HE7.Sorghum_HE7_T2.paddock.operations
        Soil HRS: LocalName=HRS; Site=HRS; Region=SE Queensland
          SoilType = HMM  # Soil description
          NearestTown = Unknown
          NaturalVegetation = Unknown
          Water: same as HE3.shared.HRS.Water
          SoilWater: same as HE2.shared.HRS.SoilWater
          SoilOrganicMatter: same as HE2.shared.HRS.SoilOrganicMatter
          Analysis: Thickness=[100, 100, 200, 200, 200, 200, 200, 200, 200, 200]
            PH=[6.300, 6.400, 6.500, 6.600, 6.600, 6.500, 6.500, 6.500, 6.500, 6.500]
          Sample Initial nitrogen
            Thickness  NO3     NH4
            100        25.798  0.100
            100        6.921   0.100
            200        9.285   0.100
            200        2.823   0.100
            200        2.286   0.100
            200        3.196   0.100
            200        3.695   0.100
            200        4.410   0.100
            200        2.743   0.100
            200        4.891   0.100
          Sample Initial water: Thickness=[100, 100, 200, 200, 200, 200, 200, 200, 200, 200]
            SW=[0.307, 0.377, 0.385, 0.382, 0.376, 0.337, 0.346, 0.359, 0.348, 0.350]
        sorghum -> /simulations/HE7/shared/sorghum
  folder HE8
    folder shared
      variables My Variables: same as HE6.shared.My Variables
      sorghum: same as HE5.shared.sorghum
    simulation Sorghum_HE8_T1
      clock
        start_date = 25/11/1997  # Select the start date of the simulation
        end_date = 15/04/1998  # Select the end date of the simulation
      summaryfile
      metfile met: filename=HE8.met
      area paddock
        outputfile: filename=Sorghum_HE8_T1.out; title=Sorghum_HE8_T1; events=My Variables Events
          variables My Variables -> /simulations/HE8/shared/My Variables
        folder Manager folder
          manager Sow SkipRow on a fixed date: same as HE7.Sorghum_HE7_T1.paddock.Manager folder.Sow SkipRow on a fixed date
          manager Harvesting rule
            # Harvesting criteria
            crop = Sorghum  # Enter name of crop to harvest when ripe
            on end_of_day:
            script: same as in HE1.Sorghum_HE1_T1.paddock.Manager folder.Harvesting rule
        irrigation: same as HE1.Sorghum_HE1_T1.paddock.Irrigation
        fertiliser
        operations
          28/11/1997  Irrigation apply amount = 65
          16/12/1997  Irrigation apply amount = 90
          26/11/1997  fertiliser apply amount = 3 (kg/ha), depth = 50 (mm), type = NO3_N ()
          26/11/1997  fertiliser apply amount = 10 (kg/ha), depth = 50 (mm), type = NO3_N ()
        Soil HRS: LocalName=HRS; Site=HRS; Region=SE Queensland
          SoilType = HMM  # Soil description
          NearestTown = Unknown
          NaturalVegetation = Unknown
          Water: same as HE3.shared.HRS.Water
          SoilWater: same as HE2.shared.HRS.SoilWater
          SoilOrganicMatter: same as HE2.shared.HRS.SoilOrganicMatter
          Analysis: Thickness=[100, 100, 200, 200, 200, 200, 200, 200, 200, 200]
            PH=[6.300, 6.400, 6.500, 6.600, 6.600, 6.500, 6.500, 6.500, 6.500, 6.500]
          Sample Initial nitrogen
            Thickness  NO3     NH4
            100        25.798  0.100
            100        6.921   0.100
            200        9.285   0.100
            200        2.823   0.100
            200        2.286   0.100
            200        3.196   0.100
            200        3.695   0.100
            200        4.410   0.100
            200        2.743   0.100
            200        4.891   0.100
          Sample Initial water: Thickness=[100, 100, 200, 200, 200, 200, 200, 200, 200, 200]
            SW=[0.294, 0.381, 0.367, 0.306, 0.290, 0.319, 0.330, 0.343, 0.337, 0.344]
        sorghum -> /simulations/HE8/shared/sorghum
    simulation Sorghum_HE8_T2
      clock
        start_date = 25/11/1997  # Select the start date of the simulation
        end_date = 15/04/1998  # Select the end date of the simulation
      summaryfile
      metfile met: filename=HE8.met
      area paddock
        outputfile: filename=Sorghum_HE8_T2.out; title=Sorghum_HE8_T2; events=My Variables Events
          variables My Variables -> /simulations/HE8/shared/My Variables
        folder Manager folder
          manager Sow SkipRow on a fixed date: same as HE7.Sorghum_HE7_T2.paddock.Manager folder.Sow SkipRow on a fixed date
          manager Harvesting rule
            # Harvesting criteria
            crop = Sorghum  # Enter name of crop to harvest when ripe
            on end_of_day:
            script: same as in HE1.Sorghum_HE1_T1.paddock.Manager folder.Harvesting rule
        irrigation: same as HE1.Sorghum_HE1_T1.paddock.Irrigation
        fertiliser
        operations
          28/11/1997  Irrigation apply amount = 65
          16/12/1997  Irrigation apply amount = 90
          26/11/1997  fertiliser apply amount = 0 (kg/ha), depth = 50 (mm), type = NO3_N ()
          26/11/1997  fertiliser apply amount = 33 (kg/ha), depth = 50 (mm), type = NO3_N ()
          26/11/1997  fertiliser apply amount = 10 (kg/ha), depth = 50 (mm), type = NO3_N ()
        Soil HRS: LocalName=HRS; Site=HRS; Region=SE Queensland
          SoilType = HMM  # Soil description
          NearestTown = Unknown
          NaturalVegetation = Unknown
          Water: same as HE3.shared.HRS.Water
          SoilWater: same as HE2.shared.HRS.SoilWater
          SoilOrganicMatter: same as HE2.shared.HRS.SoilOrganicMatter
          Analysis: Thickness=[100, 100, 200, 200, 200, 200, 200, 200, 200, 200]
            PH=[6.300, 6.400, 6.500, 6.600, 6.600, 6.500, 6.500, 6.500, 6.500, 6.500]
          Sample Initial nitrogen
            Thickness  NO3     NH4
            100        25.798  0.100
            100        6.921   0.100
            200        9.285   0.100
            200        2.823   0.100
            200        2.286   0.100
            200        3.196   0.100
            200        3.695   0.100
            200        4.410   0.100
            200        2.743   0.100
            200        4.891   0.100
          Sample Initial water: Thickness=[100, 100, 200, 200, 200, 200, 200, 200, 200, 200]
            SW=[0.338, 0.364, 0.359, 0.376, 0.364, 0.351, 0.358, 0.351, 0.346, 0.343]
        sorghum -> /simulations/HE8/shared/sorghum
    simulation Sorghum_HE8_T3
      clock
        start_date = 25/11/1997  # Select the start date of the simulation
        end_date = 15/04/1998  # Select the end date of the simulation
      summaryfile
      metfile met: filename=HE8.met
      area paddock
        outputfile: filename=Sorghum_HE8_T3.out; title=Sorghum_HE8_T3; events=My Variables Events
          variables My Variables -> /simulations/HE8/shared/My Variables
        folder Manager folder
          manager Sow SkipRow on a fixed date
            # Sowing criteria
            date = 27/11/1997  # Enter sowing date (d/m/yyyy)
            # Sowing parameters
            crop = sorghum  # Enter name of crop to sow
            density = 10  # Enter sowing density (plants/m2)
            depth = 15  # Enter sowing depth (mm)
            cultivar = CSH13R  # Enter cultivar
            row_spacing = 0.5  # Enter row spacing (m)
            RowConfiguration = solid  # Enter skip row configuration
            ftn = 0  # Enter Fertile Tiller No.
            on start_of_day:
            script: same as in HE1.Sorghum_HE1_T1.paddock.Manager folder.Sow SkipRow on a fixed date
          manager Harvesting rule
            # Harvesting criteria
            crop = Sorghum  # Enter name of crop to harvest when ripe
            on end_of_day:
            script: same as in HE1.Sorghum_HE1_T1.paddock.Manager folder.Harvesting rule
        irrigation: same as HE1.Sorghum_HE1_T1.paddock.Irrigation
        fertiliser
        operations: same as HE8.Sorghum_HE8_T2.paddock.operations
        Soil HRS: LocalName=HRS; Site=HRS; Region=SE Queensland
          SoilType = HMM  # Soil description
          NearestTown = Unknown
          NaturalVegetation = Unknown
          Water: same as HE3.shared.HRS.Water
          SoilWater: same as HE2.shared.HRS.SoilWater
          SoilOrganicMatter: same as HE2.shared.HRS.SoilOrganicMatter
          Analysis: Thickness=[100, 100, 200, 200, 200, 200, 200, 200, 200, 200]
            PH=[6.300, 6.400, 6.500, 6.600, 6.600, 6.500, 6.500, 6.500, 6.500, 6.500]
          Sample Initial nitrogen
            Thickness  NO3     NH4
            100        25.798  0.100
            100        6.921   0.100
            200        9.285   0.100
            200        2.823   0.100
            200        2.286   0.100
            200        3.196   0.100
            200        3.695   0.100
            200        4.410   0.100
            200        2.743   0.100
            200        4.891   0.100
          Sample Initial water: Thickness=[100, 100, 200, 200, 200, 200, 200, 200, 200, 200]
            SW=[0.310, 0.387, 0.329, 0.308, 0.317, 0.330, 0.329, 0.348, 0.341, 0.345]
        sorghum -> /simulations/HE8/shared/sorghum
  folder BW5_GxE
    folder shared
      variables My Variables
        variable:
          today format dd/mm/yyyy as Date
          DaysAfterSowing as Das
          Stage
          Biomass
          GreenWt
          Biomass units g/m^2 as BiomassWt
          RootGreenWt
          LeafGreenWt
          StemGreenWt
          RachisGreenWt
          GrainGreenWt
          BiomassN
          RootGreenN
          LeafGreenN
          StemGreenN
          RachisGreenN
          GrainGreenN
          GrainGreenNConc
          GrainNo
          LeafNo
          LAI
          SLAI
          ESW
          no3() as NO3
          SLN
          WaterSD
          sw
          HI
          TPLA
          SPLA
          GrainSize
          biomass_n
      events My Variables Events
      Soil IC_BW5: SoilType=BW5; LocalName=ICRISAT; Site=ICRISAT; NearestTown=Unknown; Region=Hyderabad; NaturalVegetation=Unknown; Latitude=0; Longitude=0; YearOfSampling=0
        Water
          Thickness  BD     AirDry  LL15   DUL    SAT
          150        1.320  0.100   0.210  0.420  0.440
          150        1.490  0.210   0.220  0.390  0.410
          150        1.540  0.230   0.240  0.360  0.380
          150        1.540  0.230   0.240  0.360  0.380
          150        1.490  0.220   0.230  0.390  0.410
          150        1.470  0.220   0.230  0.420  0.440
          150        1.380  0.220   0.230  0.430  0.450
          150        1.370  0.210   0.220  0.430  0.450
          150        1.330  0.220   0.220  0.450  0.470
          150        1.350  0.220   0.220  0.430  0.450
          150        1.350  0.220   0.220  0.430  0.450
          150        1.330  0.220   0.220  0.450  0.470
          150        1.330  0.220   0.220  0.450  0.470
          SoilCrop Sorghum
            LL=[0.210, 0.220, 0.240, 0.240, 0.230, 0.230, 0.230, 0.220, 0.220, 0.220, 0.220, 0.220, 0.220]
            KL=[0.070, 0.070, 0.070, 0.070, 0.070, 0.070, 0.070, 0.070, 0.070, 0.040, 0.040, 0.040, 0.040]
            XF=[1, 1, 1, 1, 1, 1, 1, 1, 1, 1, 1, 1, 1]
        SoilWater: SummerCona=3.5; SummerU=6; SummerDate=1-Nov; WinterCona=3.5; WinterU=6; WinterDate=1-Apr; DiffusConst=40; DiffusSlope=16; Salb=0.11; CN2Bare=85; CNRed=0.8; CNCov=0.2
          Thickness=[150, 150, 150, 150, 150, 150, 150, 150, 150, 150, 150, 150, 150]
          SWCON=[0.160, 0.110, 0.140, 0.140, 0.110, 0.110, 0.100, 0.100, 0.100, 0.120, 0.120, 0.100, 0.100]
        SoilOrganicMatter: RootCN=45; RootWt=1000; SoilCN=14.5; EnrACoeff=7.4; EnrBCoeff=0.2
          Thickness  OC     FBiom  FInert
          150        0.450  0.050  0.390
          150        0.320  0.020  0.470
          150        0.290  0.010  0.520
          150        0.230  0.010  0.620
          150        0.270  0.010  0.740
          150        0.300  0.010  0.830
          150        0.230  0.010  0.930
          150        0.220  0.010  0.930
          150        0.190  0.010  0.930
          150        0.120  0.010  0.930
          150        0.120  0.010  0.930
          150        0.140  0.010  0.930
          150        0.140  0.010  0.930
        Analysis
          Thickness=[150, 150, 150, 150, 150, 150, 150, 150, 150, 150, 150, 150, 150]
          PH=[8.350, 8.520, 8.800, 8.950, 9, 9, 9, 9, 8.920, 8.970, 8.970, 8.820, 8.820]
        Sample Initial nitrogen
          Thickness  NO3    NH4
          150        6.100  0.100
          150        5.600  0.100
          150        4      0.100
          150        3.300  0.100
          150        3.200  0.100
          150        3.700  0.100
          150        5      0.100
          150        3      0.100
          150        3      0.100
          150        2      0.100
          150        2      0.100
          150        2      0.100
          150        2      0.100
        Sample Initial water
          Thickness=[150, 150, 150, 150, 150, 150, 150, 150, 150, 150, 150, 150, 150]
          SW=[0.281, 0.338, 0.353, 0.360, 0.390, 0.407, 0.430, 0.430, 0.450, 0.430, 0.430, 0.450, 0.450]
      sorghum
        sorghumConstants standard: same as HE1.shared.Sorghum.standard
        sorghumGenotype QL41xQL36: same as HE1.shared.Sorghum.QL41xQL36
        sorghumGenotype Buster: same as HE1.shared.Sorghum.Buster
        sorghumGenotype M35-1: same as HE1.shared.Sorghum.M35-1
        sorghumGenotype CSH13R: same as HE5.shared.sorghum.CSH13R
        sorghumGenotype ATX623xRTX430
          tt_emerg_to_endjuv = 100
          photoperiod_crit1 = 11.5
          photoperiod_crit2 = 13.5
          photoperiod_slope = 13
          tt_endjuv_to_init = 202
          tt_flag_to_flower = 170
          tt_flower_to_start_grain = 80
          tt_flower_to_maturity = 761
          tt_maturity_to_ripe = 1
          main_stem_coef = 2.9
          tpla_prod_coef = 0.018
          dm_per_seed = 0.00083
          x_stem_wt = 0    80
          y_height = 0  2000
          maxGFRate = 0.09
    simulation Sorghum_BW5_GxE_T1
      clock
        start_date = 26/09/1996  # Select the start date of the simulation
        end_date = 20/02/1997  # Select the end date of the simulation
      summaryfile
      metfile met: filename=BW5_GxE.met
      area paddock
        outputfile: filename=Sorghum_BW5_GxE_T1.out; title=Sorghum_BW5_GxE_T1
          variables My Variables -> /simulations/BW5_GxE/shared/My Variables
          events My Variables Events -> /simulations/BW5_GxE/shared/My Variables Events
        folder Manager folder
          manager Sow SkipRow on a fixed date
            # Sowing criteria
            date = 10/10/1996  # Enter sowing date (d/m/yyyy)
            # Sowing parameters
            crop = Sorghum  # Enter name of crop to sow
            density = 10  # Enter sowing density (plants/m2)
            depth = 30  # Enter sowing depth (mm)
            cultivar = M35-1  # Enter cultivar
            row_spacing = 0.5  # Enter row spacing (m)
            RowConfiguration = solid  # Enter skip row configuration
            ftn = 0  # Enter Fertile Tiller No.
            on start_of_day:
            script: same as in HE1.Sorghum_HE1_T1.paddock.Manager folder.Sow SkipRow on a fixed date
          manager Harvesting rule
            # Harvesting criteria
            crop = Sorghum  # Enter name of crop to harvest when ripe
            on end_of_day:
            script: same as in HE1.Sorghum_HE1_T1.paddock.Manager folder.Harvesting rule
        irrigation: same as HE4.Sorghum_HE4_T1.paddock.Irrigation
        fertiliser
        operations
          21/11/1996  Irrigation apply amount = 29
          2/12/1996  Irrigation apply amount = 45
          11/12/1996  Irrigation apply amount = 45
          8/01/1997  Irrigation apply amount = 65
          9/01/1997  Irrigation apply amount = 50
          27/09/1996  fertiliser apply amount = 10 (kg/ha), depth = 50 (mm), type = NO3_N ()
          9/10/1996  fertiliser apply amount = 13 (kg/ha), depth = 50 (mm), type = NO3_N ()
          16/10/1996  fertiliser apply amount = 99 (kg/ha), depth = 50 (mm), type = NO3_N ()
          11/11/1996  fertiliser apply amount = 59 (kg/ha), depth = 50 (mm), type = NO3_N ()
          11/12/1996  fertiliser apply amount = 59 (kg/ha), depth = 50 (mm), type = NO3_N ()
        Soil IC_BW5 -> /simulations/BW5_GxE/shared/IC_BW5
        sorghum -> /simulations/BW5_GxE/shared/sorghum
    simulation Sorghum_BW5_GxE_T2
      clock
        start_date = 26/09/1996  # Select the start date of the simulation
        end_date = 20/02/1997  # Select the end date of the simulation
      summaryfile
      metfile met: filename=BW5_GxE.met
      area paddock
        outputfile: filename=Sorghum_BW5_GxE_T2.out; title=Sorghum_BW5_GxE_T2
          variables My Variables -> /simulations/BW5_GxE/shared/My Variables
          events My Variables Events -> /simulations/BW5_GxE/shared/My Variables Events
        folder Manager folder
          manager Sow SkipRow on a fixed date
            # Sowing criteria
            date = 10/10/1996  # Enter sowing date (d/m/yyyy)
            # Sowing parameters
            crop = Sorghum  # Enter name of crop to sow
            density = 10  # Enter sowing density (plants/m2)
            depth = 30  # Enter sowing depth (mm)
            cultivar = CSH13R  # Enter cultivar
            row_spacing = 0.5  # Enter row spacing (m)
            RowConfiguration = solid  # Enter skip row configuration
            ftn = 0  # Enter Fertile Tiller No.
            on start_of_day:
            script: same as in HE1.Sorghum_HE1_T1.paddock.Manager folder.Sow SkipRow on a fixed date
          manager Harvesting rule
            # Harvesting criteria
            crop = Sorghum  # Enter name of crop to harvest when ripe
            on end_of_day:
            script: same as in HE1.Sorghum_HE1_T1.paddock.Manager folder.Harvesting rule
        irrigation: same as HE1.Sorghum_HE1_T1.paddock.Irrigation
        fertiliser
        operations: same as BW5_GxE.Sorghum_BW5_GxE_T1.paddock.operations
        Soil IC_BW5 -> /simulations/BW5_GxE/shared/IC_BW5
        sorghum -> /simulations/BW5_GxE/shared/sorghum
    simulation Sorghum_BW5_GxE_T3
      clock
        start_date = 26/09/1996  # Select the start date of the simulation
        end_date = 20/02/1997  # Select the end date of the simulation
      summaryfile
      metfile met: filename=BW5_GxE.met
      area paddock
        outputfile: filename=Sorghum_BW5_GxE_T3.out; title=Sorghum_BW5_GxE_T3
          variables My Variables -> /simulations/BW5_GxE/shared/My Variables
          events My Variables Events -> /simulations/BW5_GxE/shared/My Variables Events
        folder Manager folder
          manager Sow SkipRow on a fixed date
            # Sowing criteria
            date = 10/10/1996  # Enter sowing date (d/m/yyyy)
            # Sowing parameters
            crop = Sorghum  # Enter name of crop to sow
            density = 10  # Enter sowing density (plants/m2)
            depth = 30  # Enter sowing depth (mm)
            cultivar = ATX623xRTX430  # Enter cultivar
            row_spacing = 0.5  # Enter row spacing (m)
            RowConfiguration = solid  # Enter skip row configuration
            ftn = 0  # Enter Fertile Tiller No.
            on start_of_day:
            script: same as in HE1.Sorghum_HE1_T1.paddock.Manager folder.Sow SkipRow on a fixed date
          manager Harvesting rule
            # Harvesting criteria
            crop = Sorghum  # Enter name of crop to harvest when ripe
            on end_of_day:
            script: same as in HE1.Sorghum_HE1_T1.paddock.Manager folder.Harvesting rule
        irrigation: same as HE1.Sorghum_HE1_T1.paddock.Irrigation
        fertiliser
        operations: same as BW5_GxE.Sorghum_BW5_GxE_T1.paddock.operations
        Soil IC_BW5 -> /simulations/BW5_GxE/shared/IC_BW5
        sorghum -> /simulations/BW5_GxE/shared/sorghum
    simulation Sorghum_BW5_GxE_T4
      clock
        start_date = 26/09/1996  # Select the start date of the simulation
        end_date = 20/02/1997  # Select the end date of the simulation
      summaryfile
      metfile met: filename=BW5_GxE.met
      area paddock
        outputfile: filename=Sorghum_BW5_GxE_T4.out; title=Sorghum_BW5_GxE_T4
          variables My Variables -> /simulations/BW5_GxE/shared/My Variables
          events My Variables Events -> /simulations/BW5_GxE/shared/My Variables Events
        folder Manager folder
          manager Sow SkipRow on a fixed date
            # Sowing criteria
            date = 10/10/1996  # Enter sowing date (d/m/yyyy)
            # Sowing parameters
            crop = Sorghum  # Enter name of crop to sow
            density = 10  # Enter sowing density (plants/m2)
            depth = 30  # Enter sowing depth (mm)
            cultivar = QL41xQL36  # Enter cultivar
            row_spacing = 0.5  # Enter row spacing (m)
            RowConfiguration = solid  # Enter skip row configuration
            ftn = 0  # Enter Fertile Tiller No.
            on start_of_day:
            script: same as in HE1.Sorghum_HE1_T1.paddock.Manager folder.Sow SkipRow on a fixed date
          manager Harvesting rule
            # Harvesting criteria
            crop = Sorghum  # Enter name of crop to harvest when ripe
            on end_of_day:
            script: same as in HE1.Sorghum_HE1_T1.paddock.Manager folder.Harvesting rule
        irrigation: same as HE1.Sorghum_HE1_T1.paddock.Irrigation
        fertiliser
        operations: same as BW5_GxE.Sorghum_BW5_GxE_T1.paddock.operations
        Soil IC_BW5 -> /simulations/BW5_GxE/shared/IC_BW5
        sorghum -> /simulations/BW5_GxE/shared/sorghum
    simulation Sorghum_BW5_GxE_T5
      clock
        start_date = 26/09/1996  # Select the start date of the simulation
        end_date = 20/02/1997  # Select the end date of the simulation
      summaryfile
      metfile met: filename=BW5_GxE.met
      area paddock
        outputfile: filename=Sorghum_BW5_GxE_T5.out; title=Sorghum_BW5_GxE_T5
          variables My Variables -> /simulations/BW5_GxE/shared/My Variables
          events My Variables Events -> /simulations/BW5_GxE/shared/My Variables Events
        folder Manager folder: same as BW5_GxE.Sorghum_BW5_GxE_T1.paddock.Manager folder
        irrigation: same as HE1.Sorghum_HE1_T1.paddock.Irrigation
        fertiliser
        operations
          27/09/1996  fertiliser apply amount = 10 (kg/ha), depth = 50 (mm), type = NO3_N ()
          9/10/1996  fertiliser apply amount = 13 (kg/ha), depth = 50 (mm), type = NO3_N ()
          16/10/1996  fertiliser apply amount = 99 (kg/ha), depth = 50 (mm), type = NO3_N ()
        Soil IC_BW5 -> /simulations/BW5_GxE/shared/IC_BW5
        sorghum -> /simulations/BW5_GxE/shared/sorghum
    simulation Sorghum_BW5_GxE_T6
      clock
        start_date = 26/09/1996  # Select the start date of the simulation
        end_date = 20/02/1997  # Select the end date of the simulation
      summaryfile
      metfile met: filename=BW5_GxE.met
      area paddock
        outputfile: filename=Sorghum_BW5_GxE_T6.out; title=Sorghum_BW5_GxE_T6
          variables My Variables -> /simulations/BW5_GxE/shared/My Variables
          events My Variables Events -> /simulations/BW5_GxE/shared/My Variables Events
        folder Manager folder: same as BW5_GxE.Sorghum_BW5_GxE_T2.paddock.Manager folder
        irrigation: same as HE1.Sorghum_HE1_T1.paddock.Irrigation
        fertiliser
        operations
          27/09/1996  fertiliser apply amount = 10 (kg/ha), depth = 50 (mm), type = NO3_N ()
          9/10/1996  fertiliser apply amount = 13 (kg/ha), depth = 50 (mm), type = NO3_N ()
          16/10/1996  fertiliser apply amount = 99  (kg/ha), depth = 50 (mm), type = NO3_N ()
        Soil IC_BW5 -> /simulations/BW5_GxE/shared/IC_BW5
        sorghum -> /simulations/BW5_GxE/shared/sorghum
    simulation Sorghum_BW5_GxE_T7
      clock
        start_date = 26/09/1996  # Select the start date of the simulation
        end_date = 20/02/1997  # Select the end date of the simulation
      summaryfile
      metfile met: filename=BW5_GxE.met
      area paddock
        outputfile: filename=Sorghum_BW5_GxE_T7.out; title=Sorghum_BW5_GxE_T7
          variables My Variables -> /simulations/BW5_GxE/shared/My Variables
          events My Variables Events -> /simulations/BW5_GxE/shared/My Variables Events
        folder Manager folder: same as BW5_GxE.Sorghum_BW5_GxE_T3.paddock.Manager folder
        irrigation: same as HE1.Sorghum_HE1_T1.paddock.Irrigation
        fertiliser
        operations: same as BW5_GxE.Sorghum_BW5_GxE_T5.paddock.operations
        Soil IC_BW5 -> /simulations/BW5_GxE/shared/IC_BW5
        sorghum -> /simulations/BW5_GxE/shared/sorghum
    simulation Sorghum_BW5_GxE_T8
      clock
        start_date = 26/09/1996  # Select the start date of the simulation
        end_date = 20/02/1997  # Select the end date of the simulation
      summaryfile
      metfile met: filename=BW5_GxE.met
      area paddock
        outputfile: filename=Sorghum_BW5_GxE_T8.out; title=Sorghum_BW5_GxE_T8
          variables My Variables -> /simulations/BW5_GxE/shared/My Variables
          events My Variables Events -> /simulations/BW5_GxE/shared/My Variables Events
        folder Manager folder: same as BW5_GxE.Sorghum_BW5_GxE_T4.paddock.Manager folder
        irrigation: same as HE1.Sorghum_HE1_T1.paddock.Irrigation
        fertiliser
        operations: same as BW5_GxE.Sorghum_BW5_GxE_T5.paddock.operations
        Soil IC_BW5 -> /simulations/BW5_GxE/shared/IC_BW5
        sorghum -> /simulations/BW5_GxE/shared/sorghum
    simulation Sorghum_BW5_GxE_T9
      clock
        start_date = 26/09/1996  # Select the start date of the simulation
        end_date = 20/02/1997  # Select the end date of the simulation
      summaryfile
      metfile met: filename=BW5_GxE.met
      area paddock
        outputfile: filename=Sorghum_BW5_GxE_T9.out; title=Sorghum_BW5_GxE_T9
          variables My Variables -> /simulations/BW5_GxE/shared/My Variables
          events My Variables Events -> /simulations/BW5_GxE/shared/My Variables Events
        folder Manager folder: same as BW5_GxE.Sorghum_BW5_GxE_T1.paddock.Manager folder
        irrigation: same as HE1.Sorghum_HE1_T1.paddock.Irrigation
        fertiliser
        operations
          27/09/1996  fertiliser apply amount = 10 (kg/ha), depth = 50 (mm), type = NO3_N ()
        Soil IC_BW5 -> /simulations/BW5_GxE/shared/IC_BW5
        sorghum -> /simulations/BW5_GxE/shared/sorghum
    simulation Sorghum_BW5_GxE_T10
      clock
        start_date = 26/09/1996  # Select the start date of the simulation
        end_date = 20/02/1997  # Select the end date of the simulation
      summaryfile
      metfile met: filename=BW5_GxE.met
      area paddock
        outputfile: filename=Sorghum_BW5_GxE_T10.out; title=Sorghum_BW5_GxE_T10
          variables My Variables -> /simulations/BW5_GxE/shared/My Variables
          events My Variables Events -> /simulations/BW5_GxE/shared/My Variables Events
        folder Manager folder
          manager Sow SkipRow on a fixed date
            # Sowing criteria
            date = 10/10/1996  # Enter sowing date (d/m/yyyy)
            # Sowing parameters
            crop = sorghum  # Enter name of crop to sow
            density = 10  # Enter sowing density (plants/m2)
            depth = 30  # Enter sowing depth (mm)
            cultivar = CSH13R  # Enter cultivar
            row_spacing = 0.5  # Enter row spacing (m)
            RowConfiguration = solid  # Enter skip row configuration
            ftn = 0  # Enter Fertile Tiller No.
            on start_of_day:
            script: same as in HE1.Sorghum_HE1_T1.paddock.Manager folder.Sow SkipRow on a fixed date
          manager Harvesting rule
            # Harvesting criteria
            crop = Sorghum  # Enter name of crop to harvest when ripe
            on end_of_day:
            script: same as in HE1.Sorghum_HE1_T1.paddock.Manager folder.Harvesting rule
        irrigation: same as HE1.Sorghum_HE1_T1.paddock.Irrigation
        fertiliser
        operations
          27/09/1996  fertiliser apply amount = 10 (kg/ha), depth = 50 (mm), type = NO3_N ()
        Soil IC_BW5 -> /simulations/BW5_GxE/shared/IC_BW5
        sorghum -> /simulations/BW5_GxE/shared/sorghum
    simulation Sorghum_BW5_GxE_T11
      clock
        start_date = 26/09/1996  # Select the start date of the simulation
        end_date = 20/02/1997  # Select the end date of the simulation
      summaryfile
      metfile met: filename=BW5_GxE.met
      area paddock
        outputfile: filename=Sorghum_BW5_GxE_T11.out; title=Sorghum_BW5_GxE_T11
          variables My Variables -> /simulations/BW5_GxE/shared/My Variables
          events My Variables Events -> /simulations/BW5_GxE/shared/My Variables Events
        folder Manager folder: same as BW5_GxE.Sorghum_BW5_GxE_T3.paddock.Manager folder
        irrigation: same as HE1.Sorghum_HE1_T1.paddock.Irrigation
        fertiliser
        operations
          27/09/1996  fertiliser apply amount = 10 (kg/ha), depth = 50 (mm), type = NO3_N ()
        Soil IC_BW5 -> /simulations/BW5_GxE/shared/IC_BW5
        sorghum -> /simulations/BW5_GxE/shared/sorghum
    simulation Sorghum_BW5_GxE_T12
      clock
        start_date = 26/09/1996  # Select the start date of the simulation
        end_date = 20/02/1997  # Select the end date of the simulation
      summaryfile
      metfile met: filename=BW5_GxE.met
      area paddock
        outputfile: filename=Sorghum_BW5_GxE_T12.out; title=Sorghum_BW5_GxE_T12
          variables My Variables -> /simulations/BW5_GxE/shared/My Variables
          events My Variables Events -> /simulations/BW5_GxE/shared/My Variables Events
        folder Manager folder
          manager Sow SkipRow on a fixed date
            # Sowing criteria
            date = 10/10/1996  # Enter sowing date (d/m/yyyy)
            # Sowing parameters
            crop = sorghum  # Enter name of crop to sow
            density = 10  # Enter sowing density (plants/m2)
            depth = 30  # Enter sowing depth (mm)
            cultivar = QL41xQL36  # Enter cultivar
            row_spacing = 0.5  # Enter row spacing (m)
            RowConfiguration = solid  # Enter skip row configuration
            ftn = 0  # Enter Fertile Tiller No.
            on start_of_day:
            script: same as in HE1.Sorghum_HE1_T1.paddock.Manager folder.Sow SkipRow on a fixed date
          manager Harvesting rule
            # Harvesting criteria
            crop = Sorghum  # Enter name of crop to harvest when ripe
            on end_of_day:
            script: same as in HE1.Sorghum_HE1_T1.paddock.Manager folder.Harvesting rule
        irrigation: same as HE1.Sorghum_HE1_T1.paddock.Irrigation
        fertiliser
        operations
          27/09/1996  fertiliser apply amount = 10 (kg/ha), depth = 50 (mm), type = NO3_N ()
        Soil IC_BW5 -> /simulations/BW5_GxE/shared/IC_BW5
        sorghum -> /simulations/BW5_GxE/shared/sorghum
  folder BW8_GxE
    folder shared
      outputfile: filename=.out; events=My Variables Events
        variables My Variables
          variable:
            today format dd/mm/yyyy as Date
            DaysAfterSowing as Das
            Stage
            Biomass
            GreenWt
            Biomass units g/m^2 as BiomassWt
            RootGreenWt
            LeafGreenWt
            StemGreenWt
            RachisGreenWt
            GrainGreenWt
            BiomassN
            BiomassN
            RootGreenN
            LeafGreenN
            StemGreenN
            RachisGreenN
            GrainGreenN
            GrainGreenNConc
            GrainNo
            LeafNo
            LAI
            SLAI
            ESW
            no3() as NO3
            SLN
            WaterSD
            sw
            HI
            TPLA
            SPLA
            biomass_n
      sorghum
        sorghumConstants standard: same as HE1.shared.Sorghum.standard
        sorghumGenotype QL41xQL36: same as HE1.shared.Sorghum.QL41xQL36
        sorghumGenotype Buster: same as HE1.shared.Sorghum.Buster
        sorghumGenotype M35-1: same as HE1.shared.Sorghum.M35-1
        sorghumGenotype CSH13R: same as HE5.shared.sorghum.CSH13R
        sorghumGenotype ATX623xRTX430: same as BW5_GxE.shared.sorghum.ATX623xRTX430
        sorghumGenotype A35xQL36
          tt_emerg_to_endjuv = 100
          photoperiod_crit1 = 11.8
          photoperiod_crit2 = 14
          photoperiod_slope = 39.7
          tt_endjuv_to_init = 134.4
          tt_flag_to_flower = 170
          tt_flower_to_start_grain = 80
          tt_flower_to_maturity = 761
          tt_maturity_to_ripe = 1
          main_stem_coef = 2.9
          tpla_prod_coef = 0.018
          dm_per_seed = 0.00083
          x_stem_wt = 0    80
          y_height = 0  2000
          partition_rate_leaf = 0.012
          maxGFRate = 0.09
        sorghumGenotype QL39xQL36
          tt_emerg_to_endjuv = 100
          photoperiod_crit1 = 11.8
          photoperiod_crit2 = 14
          photoperiod_slope = 39.7
          tt_endjuv_to_init = 114.4
          tt_flag_to_flower = 170
          tt_flower_to_start_grain = 80
          tt_flower_to_maturity = 761
          tt_maturity_to_ripe = 1
          main_stem_coef = 2.9
          tpla_prod_coef = 0.018
          dm_per_seed = 0.00083
          x_stem_wt = 0    80
          y_height = 0  2000
          maxGFRate = 0.09
      Soil IC_BW8: SoilType=BW8; LocalName=ICRISAT; Site=ICRISAT; NearestTown=Unknown; Region=Hyderabad; NaturalVegetation=Unknown; Latitude=0; Longitude=0; YearOfSampling=0
        InitialWater Initial water: FractionFull=0.50; PercentMethod=FilledFromTop
        Water
          Thickness  BD     AirDry  LL15   DUL    SAT
          150        1.490  0.120   0.160  0.320  0.43
          150        1.410  0.150   0.190  0.350  0.46
          150        1.410  0.150   0.190  0.350  0.46
          150        1.560  0.100   0.140  0.280  0.41
          150        1.490  0.110   0.150  0.310  0.43
          150        1.520  0.130   0.170  0.330  0.42
          150        1.610  0.090   0.130  0.260  0.39
          150        1.680  0.080   0.120  0.220  0.36
          150        1.630  0.090   0.130  0.240  0.38
          300        1.620  0.090   0.130  0.240  0.38
          300        1.620  0.090   0.130  0.240  0.38
          SoilCrop Sorghum
            LL=[0.160, 0.190, 0.190, 0.140, 0.150, 0.170, 0.130, 0.120, 0.130, 0.130, 0.130]
            KL=[0.070, 0.070, 0.070, 0.070, 0.070, 0.070, 0.070, 0.070, 0.070, 0.040, 0.040]
            XF=[1, 1, 1, 1, 1, 1, 1, 1, 1, 1, 1]
        SoilWater: SummerCona=3.5; SummerU=6; SummerDate=1-Nov; WinterCona=3.5; WinterU=6; WinterDate=1-Apr; DiffusConst=40; DiffusSlope=16; Salb=0.11; CN2Bare=85; CNRed=0.8; CNCov=0.2; Thickness=[150, 150, 150, 150, 150, 150, 150, 150, 150, 300, 300]
          SWCON=[0.160, 0.110, 0.140, 0.140, 0.110, 0.110, 0.100, 0.100, 0.100, 0.120, 0.100]
        SoilOrganicMatter: RootCN=45; RootWt=1000; SoilCN=14.5; EnrACoeff=7.4; EnrBCoeff=0.2
          Thickness  OC     FBiom  FInert
          150        0.490  0.050  0.390
          150        0.450  0.020  0.470
          150        0.280  0.010  0.520
          150        0.180  0.010  0.620
          150        0.140  0.010  0.740
          150        0.110  0.010  0.830
          150        0.090  0.010  0.930
          150        0.070  0.010  0.930
          150        0.060  0.010  0.930
          300        0.050  0.010  0.930
          300        0.030  0.010  0.930
        Analysis: Thickness=[150, 150, 150, 150, 150, 150, 150, 150, 150, 300, 300]
          PH=[8.350, 8.520, 8.800, 8.950, 9, 9, 9, 9, 8.920, 8.970, 8.820]
        Sample Initial nitrogen
          Thickness  NO3  NH4
          150        9    0.1
          150        11   0.1
          150        8    0.1
          150        6    0.1
          150        4    0.1
          150        3    0.1
          150        3    0.1
          150        3    0.1
          150        6    0.1
          300        4    0.1
          300        5    0.1
    simulation Sorghum_BW8_GxE_T1
      clock
        start_date = 26/09/1996  # Select the start date of the simulation
        end_date = 20/02/1997  # Select the end date of the simulation
      summaryfile
      metfile met: filename=BW8_GxE.met
      area paddock
        folder Manager folder
          manager Sow SkipRow on a fixed date
            # Sowing criteria
            date = 7/10/1996  # Enter sowing date (d/m/yyyy)
            # Sowing parameters
            crop = Sorghum  # Enter name of crop to sow
            density = 10  # Enter sowing density (plants/m2)
            depth = 0.5  # Enter sowing depth (mm)
            cultivar = M35-1  # Enter cultivar
            row_spacing = 0.5  # Enter row spacing (m)
            RowConfiguration = solid  # Enter skip row configuration
            ftn = 0  # Enter Fertile Tiller No.
            on start_of_day:
            script: same as in HE1.Sorghum_HE1_T1.paddock.Manager folder.Sow SkipRow on a fixed date
          manager Harvesting rule
            # Harvesting criteria
            crop = Sorghum  # Enter name of crop to harvest when ripe
            on end_of_day:
            script: same as in HE1.Sorghum_HE1_T1.paddock.Manager folder.Harvesting rule
        irrigation: same as HE4.Sorghum_HE4_T1.paddock.Irrigation
        fertiliser
        operations
          19/11/1996  Irrigation apply amount = 28
          28/11/1996  Irrigation apply amount = 58
          10/12/1996  Irrigation apply amount = 49
          24/12/1996  Irrigation apply amount = 57
          7/01/1997  Irrigation apply amount = 67
          25/09/1996  fertiliser apply amount = 20 (kg/ha), depth = 50 (mm), type = NO3_N ()
          17/10/1996  fertiliser apply amount = 99 (kg/ha), depth = 50 (mm), type = NO3_N ()
          6/11/1996  fertiliser apply amount = 59 (kg/ha), depth = 50 (mm), type = NO3_N ()
          10/12/1996  fertiliser apply amount = 59 (kg/ha), depth = 50 (mm), type = NO3_N ()
        outputfile -> /simulations/BW8_GxE/shared/outputfile: filename=Sorghum_BW8_GxE_T1.out; title=Sorghum_BW8_GxE_T1
          variables My Variables -> /simulations/BW8_GxE/shared/outputfile/My Variables
          events My Variables Events -> /simulations/BW8_GxE/shared/outputfile/My Variables Events
        sorghum -> /simulations/BW8_GxE/shared/sorghum
        Soil IC_BW8 -> /simulations/BW8_GxE/shared/IC_BW8
    simulation Sorghum_BW8_GxE_T2
      clock
        start_date = 26/09/1996  # Select the start date of the simulation
        end_date = 20/02/1997  # Select the end date of the simulation
      summaryfile
      metfile met: filename=BW8_GxE.met
      area paddock
        folder Manager folder
          manager Sow SkipRow on a fixed date
            # Sowing criteria
            date = 7/10/1996  # Enter sowing date (d/m/yyyy)
            # Sowing parameters
            crop = Sorghum  # Enter name of crop to sow
            density = 10  # Enter sowing density (plants/m2)
            depth = 0.5  # Enter sowing depth (mm)
            cultivar = CSH13R  # Enter cultivar
            row_spacing = 0.5  # Enter row spacing (m)
            RowConfiguration = solid  # Enter skip row configuration
            ftn = 0  # Enter Fertile Tiller No.
            on start_of_day:
            script: same as in HE1.Sorghum_HE1_T1.paddock.Manager folder.Sow SkipRow on a fixed date
          manager Harvesting rule
            # Harvesting criteria
            crop = Sorghum  # Enter name of crop to harvest when ripe
            on end_of_day:
            script: same as in HE1.Sorghum_HE1_T1.paddock.Manager folder.Harvesting rule
        irrigation: same as HE1.Sorghum_HE1_T1.paddock.Irrigation
        fertiliser
        operations: same as BW8_GxE.Sorghum_BW8_GxE_T1.paddock.operations
        outputfile -> /simulations/BW8_GxE/shared/outputfile: filename=Sorghum_BW8_GxE_T2.out; title=Sorghum_BW8_GxE_T2
          variables My Variables -> /simulations/BW8_GxE/shared/outputfile/My Variables
          events My Variables Events -> /simulations/BW8_GxE/shared/outputfile/My Variables Events
        sorghum -> /simulations/BW8_GxE/shared/sorghum
        Soil IC_BW8 -> /simulations/BW8_GxE/shared/IC_BW8
    simulation Sorghum_BW8_GxE_T3
      clock
        start_date = 26/09/1996  # Select the start date of the simulation
        end_date = 20/02/1997  # Select the end date of the simulation
      summaryfile
      metfile met: filename=BW8_GxE.met
      area paddock
        folder Manager folder
          manager Sow SkipRow on a fixed date
            # Sowing criteria
            date = 7/10/1996  # Enter sowing date (d/m/yyyy)
            # Sowing parameters
            crop = Sorghum  # Enter name of crop to sow
            density = 10  # Enter sowing density (plants/m2)
            depth = 0.5  # Enter sowing depth (mm)
            cultivar = ATX623xRTX430  # Enter cultivar
            row_spacing = 0.5  # Enter row spacing (m)
            RowConfiguration = solid  # Enter skip row configuration
            ftn = 0  # Enter Fertile Tiller No.
            on start_of_day:
            script: same as in HE1.Sorghum_HE1_T1.paddock.Manager folder.Sow SkipRow on a fixed date
          manager Harvesting rule
            # Harvesting criteria
            crop = Sorghum  # Enter name of crop to harvest when ripe
            on end_of_day:
            script: same as in HE1.Sorghum_HE1_T1.paddock.Manager folder.Harvesting rule
        irrigation: same as HE1.Sorghum_HE1_T1.paddock.Irrigation
        fertiliser
        operations: same as BW8_GxE.Sorghum_BW8_GxE_T1.paddock.operations
        outputfile -> /simulations/BW8_GxE/shared/outputfile: filename=Sorghum_BW8_GxE_T3.out; title=Sorghum_BW8_GxE_T3
          variables My Variables -> /simulations/BW8_GxE/shared/outputfile/My Variables
          events My Variables Events -> /simulations/BW8_GxE/shared/outputfile/My Variables Events
        sorghum -> /simulations/BW8_GxE/shared/sorghum
        Soil IC_BW8 -> /simulations/BW8_GxE/shared/IC_BW8
    simulation Sorghum_BW8_GxE_T4
      clock
        start_date = 26/09/1996  # Select the start date of the simulation
        end_date = 20/02/1997  # Select the end date of the simulation
      summaryfile
      metfile met: filename=BW8_GxE.met
      area paddock
        folder Manager folder
          manager Sow SkipRow on a fixed date
            # Sowing criteria
            date = 7/10/1996  # Enter sowing date (d/m/yyyy)
            # Sowing parameters
            crop = Sorghum  # Enter name of crop to sow
            density = 10  # Enter sowing density (plants/m2)
            depth = 0.5  # Enter sowing depth (mm)
            cultivar = QL41xQL36  # Enter cultivar
            row_spacing = 0.5  # Enter row spacing (m)
            RowConfiguration = solid  # Enter skip row configuration
            ftn = 0  # Enter Fertile Tiller No.
            on start_of_day:
            script: same as in HE1.Sorghum_HE1_T1.paddock.Manager folder.Sow SkipRow on a fixed date
          manager Harvesting rule
            # Harvesting criteria
            crop = Sorghum  # Enter name of crop to harvest when ripe
            on end_of_day:
            script: same as in HE1.Sorghum_HE1_T1.paddock.Manager folder.Harvesting rule
        irrigation: same as HE1.Sorghum_HE1_T1.paddock.Irrigation
        fertiliser
        operations: same as BW8_GxE.Sorghum_BW8_GxE_T1.paddock.operations
        outputfile -> /simulations/BW8_GxE/shared/outputfile: filename=Sorghum_BW8_GxE_T4.out; title=Sorghum_BW8_GxE_T4
          variables My Variables -> /simulations/BW8_GxE/shared/outputfile/My Variables
          events My Variables Events -> /simulations/BW8_GxE/shared/outputfile/My Variables Events
        sorghum -> /simulations/BW8_GxE/shared/sorghum
        Soil IC_BW8 -> /simulations/BW8_GxE/shared/IC_BW8
    simulation Sorghum_BW8_GxE_T5
      clock
        start_date = 26/09/1996  # Select the start date of the simulation
        end_date = 20/02/1997  # Select the end date of the simulation
      summaryfile
      metfile met: filename=BW8_GxE.met
      area paddock
        folder Manager folder: same as BW8_GxE.Sorghum_BW8_GxE_T1.paddock.Manager folder
        irrigation: same as HE4.Sorghum_HE4_T1.paddock.Irrigation
        fertiliser
        operations
          25/09/1996  fertiliser apply amount = 20 (kg/ha), depth = 50 (mm), type = NO3_N ()
          17/10/1996  fertiliser apply amount = 99 (kg/ha), depth = 50 (mm), type = NO3_N ()
        outputfile -> /simulations/BW8_GxE/shared/outputfile: filename=Sorghum_BW8_GxE_T5.out; title=Sorghum_BW8_GxE_T5
          variables My Variables -> /simulations/BW8_GxE/shared/outputfile/My Variables
          events My Variables Events -> /simulations/BW8_GxE/shared/outputfile/My Variables Events
        sorghum -> /simulations/BW8_GxE/shared/sorghum
        Soil IC_BW8 -> /simulations/BW8_GxE/shared/IC_BW8
    simulation Sorghum_BW8_GxE_T6
      clock
        start_date = 26/09/1996  # Select the start date of the simulation
        end_date = 20/02/1997  # Select the end date of the simulation
      summaryfile
      metfile met: filename=BW8_GxE.met
      area paddock
        folder Manager folder: same as BW8_GxE.Sorghum_BW8_GxE_T2.paddock.Manager folder
        manager Calculator
          on init:
```
 head_wt = 0
root_n = 0
head_n = 0
leaf_n = 0
sd = 0
```
          on end_of_day:
```
 [cr]head_wt = dw_green(4)[cr]root_n = n_green(1)[cr]head_n = n_green(4)[cr]leaf_n = n_green(2)[cr][cr]if (sw_demand > 0) then[cr]   sd = sw_supply / sw_demand[cr]else[cr]   sd = 1[cr]endif[cr][cr]if (sd > 1) then[cr]   sd = 1[cr]endif[cr]
```
        irrigation: same as HE1.Sorghum_HE1_T1.paddock.Irrigation
        fertiliser
        operations
          25/09/1996  fertiliser apply amount = 20 (kg/ha), depth = 50 (mm), type = NO3_N ()
          17/10/1996  fertiliser apply amount = 99 (kg/ha), depth = 50 (mm), type = NO3_N ()
        outputfile -> /simulations/BW8_GxE/shared/outputfile: filename=Sorghum_BW8_GxE_T6.out; title=Sorghum_BW8_GxE_T6
          variables My Variables -> /simulations/BW8_GxE/shared/outputfile/My Variables
          events My Variables Events -> /simulations/BW8_GxE/shared/outputfile/My Variables Events
        sorghum -> /simulations/BW8_GxE/shared/sorghum
        Soil IC_BW8 -> /simulations/BW8_GxE/shared/IC_BW8
    simulation Sorghum_BW8_GxE_T7
      clock
        start_date = 26/09/1996  # Select the start date of the simulation
        end_date = 20/02/1997  # Select the end date of the simulation
      summaryfile
      metfile met: filename=BW8_GxE.met
      area paddock
        folder Manager folder: same as BW8_GxE.Sorghum_BW8_GxE_T3.paddock.Manager folder
        irrigation: same as HE1.Sorghum_HE1_T1.paddock.Irrigation
        fertiliser
        operations
          25/09/1996  fertiliser apply amount = 20 (kg/ha), depth = 50 (mm), type = NO3_N ()
          17/10/1996  fertiliser apply amount = 99 (kg/ha), depth = 50 (mm), type = NO3_N ()
        outputfile -> /simulations/BW8_GxE/shared/outputfile: filename=Sorghum_BW8_GxE_T7.out; title=Sorghum_BW8_GxE_T7
          variables My Variables -> /simulations/BW8_GxE/shared/outputfile/My Variables
          events My Variables Events -> /simulations/BW8_GxE/shared/outputfile/My Variables Events
        sorghum -> /simulations/BW8_GxE/shared/sorghum
        Soil IC_BW8 -> /simulations/BW8_GxE/shared/IC_BW8
    simulation Sorghum_BW8_GxE_T8
      clock
        start_date = 26/09/1996  # Select the start date of the simulation
        end_date = 20/02/1997  # Select the end date of the simulation
      summaryfile
      metfile met: filename=BW8_GxE.met
      area paddock
        folder Manager folder: same as BW8_GxE.Sorghum_BW8_GxE_T4.paddock.Manager folder
        irrigation: same as HE1.Sorghum_HE1_T1.paddock.Irrigation
        fertiliser
        operations
          25/09/1996  fertiliser apply amount = 20 (kg/ha), depth = 50 (mm), type = NO3_N ()
          17/10/1996  fertiliser apply amount = 99 (kg/ha), depth = 50 (mm), type = NO3_N ()
        outputfile -> /simulations/BW8_GxE/shared/outputfile: filename=Sorghum_BW8_GxE_T8.out; title=Sorghum_BW8_GxE_T8
          variables My Variables -> /simulations/BW8_GxE/shared/outputfile/My Variables
          events My Variables Events -> /simulations/BW8_GxE/shared/outputfile/My Variables Events
        sorghum -> /simulations/BW8_GxE/shared/sorghum
        Soil IC_BW8 -> /simulations/BW8_GxE/shared/IC_BW8
    simulation Sorghum_BW8_GxE_T9
      clock
        start_date = 26/09/1996  # Select the start date of the simulation
        end_date = 20/02/1997  # Select the end date of the simulation
      summaryfile
      metfile met: filename=BW8_GxE.met
      area paddock
        folder Manager folder: same as BW8_GxE.Sorghum_BW8_GxE_T1.paddock.Manager folder
        irrigation: same as HE1.Sorghum_HE1_T1.paddock.Irrigation
        fertiliser
        operations
          25/09/1996  fertiliser apply amount = 20 (kg/ha), depth = 50 (mm), type = NO3_N ()
        outputfile -> /simulations/BW8_GxE/shared/outputfile: filename=Sorghum_BW8_GxE_T9.out; title=Sorghum_BW8_GxE_T9
          variables My Variables -> /simulations/BW8_GxE/shared/outputfile/My Variables
          events My Variables Events -> /simulations/BW8_GxE/shared/outputfile/My Variables Events
        sorghum -> /simulations/BW8_GxE/shared/sorghum
        Soil IC_BW8 -> /simulations/BW8_GxE/shared/IC_BW8
    simulation Sorghum_BW8_GxE_T10
      clock
        start_date = 26/09/1996  # Select the start date of the simulation
        end_date = 20/02/1997  # Select the end date of the simulation
      summaryfile
      metfile met: filename=BW8_GxE.met
      area paddock
        folder Manager folder: same as BW8_GxE.Sorghum_BW8_GxE_T2.paddock.Manager folder
        irrigation: same as HE1.Sorghum_HE1_T1.paddock.Irrigation
        fertiliser
        operations
          25/09/1996  fertiliser apply amount = 20 (kg/ha), depth = 50 (mm), type = NO3_N ()
        outputfile -> /simulations/BW8_GxE/shared/outputfile: filename=Sorghum_BW8_GxE_T10.out; title=Sorghum_BW8_GxE_T10
          variables My Variables -> /simulations/BW8_GxE/shared/outputfile/My Variables
          events My Variables Events -> /simulations/BW8_GxE/shared/outputfile/My Variables Events
        sorghum -> /simulations/BW8_GxE/shared/sorghum
        Soil IC_BW8 -> /simulations/BW8_GxE/shared/IC_BW8
    simulation Sorghum_BW8_GxE_T11
      clock
        start_date = 26/09/1996  # Select the start date of the simulation
        end_date = 20/02/1997  # Select the end date of the simulation
      summaryfile
      metfile met: filename=BW8_GxE.met
      area paddock
        folder Manager folder: same as BW8_GxE.Sorghum_BW8_GxE_T3.paddock.Manager folder
        irrigation: same as HE1.Sorghum_HE1_T1.paddock.Irrigation
        fertiliser
        operations
          25/09/1996  fertiliser apply amount = 20 (kg/ha), depth = 50 (mm), type = NO3_N ()
        outputfile -> /simulations/BW8_GxE/shared/outputfile: filename=Sorghum_BW8_GxE_T11.out; title=Sorghum_BW8_GxE_T11
          variables My Variables -> /simulations/BW8_GxE/shared/outputfile/My Variables
          events My Variables Events -> /simulations/BW8_GxE/shared/outputfile/My Variables Events
        sorghum -> /simulations/BW8_GxE/shared/sorghum
        Soil IC_BW8 -> /simulations/BW8_GxE/shared/IC_BW8
    simulation Sorghum_BW8_GxE_T12
      clock
        start_date = 26/09/1996  # Select the start date of the simulation
        end_date = 20/02/1997  # Select the end date of the simulation
      summaryfile
      metfile met: filename=BW8_GxE.met
      area paddock
        folder Manager folder: same as BW8_GxE.Sorghum_BW8_GxE_T4.paddock.Manager folder
        irrigation: same as HE1.Sorghum_HE1_T1.paddock.Irrigation
        fertiliser
        operations
          25/09/1996  fertiliser apply amount = 20 (kg/ha), depth = 50 (mm), type = NO3_N ()
        outputfile -> /simulations/BW8_GxE/shared/outputfile: filename=Sorghum_BW8_GxE_T12.out; title=Sorghum_BW8_GxE_T12
          variables My Variables -> /simulations/BW8_GxE/shared/outputfile/My Variables
          events My Variables Events -> /simulations/BW8_GxE/shared/outputfile/My Variables Events
        sorghum -> /simulations/BW8_GxE/shared/sorghum
        Soil IC_BW8 -> /simulations/BW8_GxE/shared/IC_BW8
  folder LE13
    folder shared
      variables My Variables: same as HE6.shared.My Variables
      events My Variables Events
      sorghum: same as BW5_GxE.shared.sorghum
    simulation Sorghum_LE13_Buster-I-N
      clock
        start_date = 28/11/1995  # Select the start date of the simulation
        end_date = 1/05/1996  # Select the end date of the simulation
      summaryfile
      metfile met: filename=LE13.met
      area paddock
        outputfile: filename=Sorghum_LE13_Buster-I-N.out; title=Sorghum_LE13_Buster-I-N
          variables My Variables -> /simulations/LE13/shared/My Variables
          events My Variables Events -> /simulations/LE13/shared/My Variables Events
        folder Manager folder
          manager Sow SkipRow on a fixed date
            # Sowing criteria
            date = 29/11/1995  # Enter sowing date (d/m/yyyy)
            # Sowing parameters
            crop = Sorghum  # Enter name of crop to sow
            density = 16  # Enter sowing density (plants/m2)
            depth = 20  # Enter sowing depth (mm)
            cultivar = Buster  # Enter cultivar
            row_spacing = 0.5  # Enter row spacing (m)
            RowConfiguration = solid  # Enter skip row configuration
            ftn = 0  # Enter Fertile Tiller No.
            on start_of_day:
            script: same as in HE1.Sorghum_HE1_T1.paddock.Manager folder.Sow SkipRow on a fixed date
          manager Harvesting rule
            # Harvesting criteria
            crop = Sorghum  # Enter name of crop to harvest when ripe
            on end_of_day:
            script: same as in HE1.Sorghum_HE1_T1.paddock.Manager folder.Harvesting rule
        Soil GLH Field: LocalName=Cooper Lab; Site=Cooper Lab; Region=Gatton
          SoilType = GLHSoil  # Soil description
          NearestTown = Unknown
          NaturalVegetation = Unknown
          Water
            Thickness  BD     AirDry  LL15   DUL    SAT
            200        1.320  0.100   0.300  0.410  0.460
            200        1.300  0.150   0.300  0.430  0.480
            200        1.230  0.280   0.350  0.460  0.510
            300        1.270  0.280   0.320  0.440  0.490
            300        1.370  0.280   0.290  0.400  0.450
            300        1.350  0.300   0.310  0.410  0.460
            300        1.350  0.300   0.310  0.380  0.430
            SoilCrop Sorghum: LL=[0.300, 0.300, 0.350, 0.320, 0.290, 0.310, 0.310]; KL=[0.080, 0.080, 0.080, 0.080, 0.060, 0.040, 0.020]; XF=[1, 1, 1, 1, 1, 1, 1]
          SoilWater: SummerCona=3.5; SummerU=6; SummerDate=1-Nov; WinterCona=3.5; WinterU=6; WinterDate=1-Apr; DiffusConst=88; DiffusSlope=35.4; Salb=0.13; CN2Bare=91; CNRed=20; CNCov=0.8; Thickness=[200, 200, 200, 300, 300, 300, 300]; SWCON=[0.500, 0.500, 0.500, 0.500, 0.500, 0.500, 0.500]
          SoilOrganicMatter: RootCN=30; RootWt=1500; SoilCN=12.5; EnrACoeff=7.4; EnrBCoeff=0.2
            Thickness  OC     FBiom  FInert
            200        1.300  0.030  0.310
            200        0.650  0.010  0.380
            200        0.320  0      0.470
            300        0.110  0      0.700
            300        0.110  0      0.900
            300        0.110  0      0.950
            300        0.110  0      0.950
          Analysis: Thickness=[200, 200, 200, 300, 300, 300, 300]; PH=[8.200, 8.700, 8.900, 8.100, 8, 8, 8]
          Sample Initial nitrogen
            Thickness  NO3    NH4
            200        9      0.100
            200        2.480  0.100
            200        2.790  0.100
            300        1.280  0.100
            300        2.980  0.100
            300        2.965  0.100
            300        1.387  0.100
          Sample Initial water: Thickness=[200, 200, 200, 300, 300, 300, 300]; SW=[0.385, 0.470, 0.467, 0.459, 0.394, 0.399, 0.380]
        irrigation: same as HE1.Sorghum_HE1_T1.paddock.Irrigation
        fertiliser
        operations
          29/11/1995  Irrigation apply amount = 14
          1/12/1995  Irrigation apply amount = 10
          3/12/1995  Irrigation apply amount = 13
          5/12/1995  Irrigation apply amount = 8
          7/02/1996  Irrigation apply amount = 6
          28/11/1995  fertiliser apply amount = 0 (kg/ha), depth = 50 (mm), type = NO3_N ()
          28/11/1995  fertiliser apply amount = 0 (kg/ha), depth = 50 (mm), type = NO3_N ()
        sorghum -> /simulations/LE13/shared/sorghum
    simulation Sorghum_LE13_Buster-I+N
      clock
        start_date = 28/11/1995  # Select the start date of the simulation
        end_date = 1/05/1996  # Select the end date of the simulation
      summaryfile
      metfile met: filename=LE13.met
      area paddock
        outputfile: filename=Sorghum_LE13_Buster-I+N.out; title=Sorghum_LE13_Buster-I+N
          variables My Variables -> /simulations/LE13/shared/My Variables
          events My Variables Events -> /simulations/LE13/shared/My Variables Events
        folder Manager folder
          manager Sow SkipRow on a fixed date
            # Sowing criteria
            date = 29/11/1995  # Enter sowing date (d/m/yyyy)
            # Sowing parameters
            crop = Sorghum  # Enter name of crop to sow
            density = 16  # Enter sowing density (plants/m2)
            depth = 20  # Enter sowing depth (mm)
            cultivar = Buster  # Enter cultivar
            row_spacing = 0.5  # Enter row spacing (m)
            RowConfiguration = solid  # Enter skip row configuration
            ftn = 0.35  # Enter Fertile Tiller No.
            on start_of_day:
            script: same as in HE1.Sorghum_HE1_T1.paddock.Manager folder.Sow SkipRow on a fixed date
          manager Harvesting rule
            # Harvesting criteria
            crop = Sorghum  # Enter name of crop to harvest when ripe
            on end_of_day:
            script: same as in HE1.Sorghum_HE1_T1.paddock.Manager folder.Harvesting rule
        Soil GLH Field: LocalName=Cooper Lab; Site=Cooper Lab; Region=Gatton
          SoilType = GLHSoil  # Soil description
          NearestTown = Unknown
          NaturalVegetation = Unknown
          InitialWater Initial water: FractionFull=1.00; PercentMethod=FilledFromTop
          Water: same as LE13.Sorghum_LE13_Buster-I-N.paddock.GLH Field.Water
          SoilWater: same as LE13.Sorghum_LE13_Buster-I-N.paddock.GLH Field.SoilWater
          SoilOrganicMatter: same as LE13.Sorghum_LE13_Buster-I-N.paddock.GLH Field.SoilOrganicMatter
          Analysis: Thickness=[200, 200, 200, 300, 300, 300, 300]; PH=[8.200, 8.700, 8.900, 8.100, 8, 8, 8]
          Sample Initial nitrogen
            Thickness  NO3    NH4
            200        9      0.100
            200        2.480  0.100
            200        2.790  0.100
            300        1.280  0.100
            300        2.980  0.100
            300        2.965  0.100
            300        1.387  0.100
        irrigation: same as HE1.Sorghum_HE1_T1.paddock.Irrigation
        fertiliser
        operations
          29/11/1995  Irrigation apply amount = 14
          1/12/1995  Irrigation apply amount = 10
          3/12/1995  Irrigation apply amount = 13
          5/12/1995  Irrigation apply amount = 8
          7/02/1996  Irrigation apply amount = 6
          29/11/1995  fertiliser apply amount = 119 (kg/ha), depth = 50 (mm), type = NO3_N ()
          28/12/1995  fertiliser apply amount = 59 (kg/ha), depth = 50 (mm), type = NO3_N ()
          7/02/1996  fertiliser apply amount = 59 (kg/ha), depth = 50 (mm), type = NO3_N ()
          28/11/1995  fertiliser apply amount = 0 (kg/ha), depth = 50 (mm), type = NO3_N ()
          28/11/1995  fertiliser apply amount = 122 (kg/ha), depth = 50 (mm), type = NO3_N ()
        sorghum -> /simulations/LE13/shared/sorghum
    simulation Sorghum_LE13_Buster+I+N
      clock
        start_date = 28/11/1995  # Select the start date of the simulation
        end_date = 1/05/1996  # Select the end date of the simulation
      summaryfile
      metfile met: filename=LE13.met
      area paddock
        outputfile: filename=Sorghum_LE13_Buster+I+N.out; title=Sorghum_LE13_Buster+I+N
          variables My Variables -> /simulations/LE13/shared/My Variables
          events My Variables Events -> /simulations/LE13/shared/My Variables Events
        folder Manager folder
          manager Sow SkipRow on a fixed date
            # Sowing criteria
            date = 29/11/1995  # Enter sowing date (d/m/yyyy)
            # Sowing parameters
            crop = Sorghum  # Enter name of crop to sow
            density = 16  # Enter sowing density (plants/m2)
            depth = 20  # Enter sowing depth (mm)
            cultivar = Buster  # Enter cultivar
            row_spacing = 0.5  # Enter row spacing (m)
            RowConfiguration = solid  # Enter skip row configuration
            ftn = 0.2  # Enter Fertile Tiller No.
            on start_of_day:
            script: same as in HE1.Sorghum_HE1_T1.paddock.Manager folder.Sow SkipRow on a fixed date
          manager Harvesting rule
            # Harvesting criteria
            crop = Sorghum  # Enter name of crop to harvest when ripe
            on end_of_day:
            script: same as in HE1.Sorghum_HE1_T1.paddock.Manager folder.Harvesting rule
        Soil GLH Field: same as LE13.Sorghum_LE13_Buster-I-N.paddock.GLH Field
        irrigation: same as HE1.Sorghum_HE1_T1.paddock.Irrigation
        fertiliser
        operations
          29/11/1995  Irrigation apply amount = 14
          1/12/1995  Irrigation apply amount = 10
          3/12/1995  Irrigation apply amount = 13
          5/12/1995  Irrigation apply amount = 8
          7/02/1996  Irrigation apply amount = 6
          12/02/1996  Irrigation apply amount = 33
          26/02/1996  Irrigation apply amount = 20
          6/03/1996  Irrigation apply amount = 18
          18/03/1996  Irrigation apply amount = 25
          28/11/1995  fertiliser apply amount = 122 (kg/ha), depth = 50 (mm), type = NO3_N ()
          28/12/1995  fertiliser apply amount = 59 (kg/ha), depth = 50 (mm), type = NO3_N ()
          7/02/1996  fertiliser apply amount = 59 (kg/ha), depth = 50 (mm), type = NO3_N ()
          28/11/1995  fertiliser apply amount = 0 (kg/ha), depth = 50 (mm), type = NO3_N ()
        sorghum -> /simulations/LE13/shared/sorghum
    simulation Sorghum_LE13_M35-1-I-N
      clock
        start_date = 28/11/1995  # Select the start date of the simulation
        end_date = 1/05/1996  # Select the end date of the simulation
      summaryfile
      metfile met: filename=LE13.met
      area paddock
        outputfile: filename=Sorghum_LE13_M35-1-I-N.out; title=Sorghum_LE13_M35-1-I-N
          variables My Variables -> /simulations/LE13/shared/My Variables
          events My Variables Events -> /simulations/LE13/shared/My Variables Events
        folder Manager folder
          manager Sow SkipRow on a fixed date
            # Sowing criteria
            date = 29/11/1995  # Enter sowing date (d/m/yyyy)
            # Sowing parameters
            crop = Sorghum  # Enter name of crop to sow
            density = 16  # Enter sowing density (plants/m2)
            depth = 20  # Enter sowing depth (mm)
            cultivar = M35-1  # Enter cultivar
            row_spacing = 0.5  # Enter row spacing (m)
            RowConfiguration = solid  # Enter skip row configuration
            ftn = 0.2  # Enter Fertile Tiller No.
            on start_of_day:
            script: same as in HE1.Sorghum_HE1_T1.paddock.Manager folder.Sow SkipRow on a fixed date
          manager Harvesting rule
            # Harvesting criteria
            crop = Sorghum  # Enter name of crop to harvest when ripe
            on end_of_day:
            script: same as in HE1.Sorghum_HE1_T1.paddock.Manager folder.Harvesting rule
        Soil GLH Field: same as LE13.Sorghum_LE13_Buster-I-N.paddock.GLH Field
        irrigation: same as HE1.Sorghum_HE1_T1.paddock.Irrigation
        fertiliser
        operations
          29/11/1995  Irrigation apply amount = 14
          1/12/1995  Irrigation apply amount = 10
          3/12/1995  Irrigation apply amount = 13
          5/12/1995  Irrigation apply amount = 8
          7/02/1996  Irrigation apply amount = 6
          28/11/1995  fertiliser apply amount = 0 (kg/ha), depth = 50 (mm), type = NO3_N ()
          28/11/1995  fertiliser apply amount = 12 (kg/ha), depth = 50 (mm), type = NO3_N ()
        sorghum -> /simulations/LE13/shared/sorghum
    simulation Sorghum_LE13_M35-1-I+N
      clock
        start_date = 28/11/1995  # Select the start date of the simulation
        end_date = 1/05/1996  # Select the end date of the simulation
      summaryfile
      metfile met: filename=LE13.met
      area paddock
        outputfile: filename=Sorghum_LE13_M35-1-I+N.out; title=Sorghum_LE13_M35-1-I+N
          variables My Variables -> /simulations/LE13/shared/My Variables
          events My Variables Events -> /simulations/LE13/shared/My Variables Events
        folder Manager folder
          manager Sow SkipRow on a fixed date
            # Sowing criteria
            date = 29/11/1995  # Enter sowing date (d/m/yyyy)
            # Sowing parameters
            crop = Sorghum  # Enter name of crop to sow
            density = 16  # Enter sowing density (plants/m2)
            depth = 20  # Enter sowing depth (mm)
            cultivar = M35-1  # Enter cultivar
            row_spacing = 0.5  # Enter row spacing (m)
            RowConfiguration = solid  # Enter skip row configuration
            ftn = 0  # Enter Fertile Tiller No.
            on start_of_day:
            script: same as in HE1.Sorghum_HE1_T1.paddock.Manager folder.Sow SkipRow on a fixed date
          manager Harvesting rule
            # Harvesting criteria
            crop = Sorghum  # Enter name of crop to harvest when ripe
            on end_of_day:
            script: same as in HE1.Sorghum_HE1_T1.paddock.Manager folder.Harvesting rule
        Soil GLH Field: same as LE13.Sorghum_LE13_Buster-I-N.paddock.GLH Field
        irrigation: same as HE1.Sorghum_HE1_T1.paddock.Irrigation
        fertiliser
        operations: same as LE13.Sorghum_LE13_Buster-I+N.paddock.operations
        sorghum -> /simulations/LE13/shared/sorghum
    simulation Sorghum_LE13_M35-1+I+N
      clock
        start_date = 28/11/1995  # Select the start date of the simulation
        end_date = 1/05/1996  # Select the end date of the simulation
      summaryfile
      metfile met: filename=LE13.met
      area paddock
        outputfile: filename=Sorghum_LE13_M35-1+I+N.out; title=Sorghum_LE13_M35-1+I+N
          variables My Variables -> /simulations/LE13/shared/My Variables
          events My Variables Events -> /simulations/LE13/shared/My Variables Events
        folder Manager folder: same as LE13.Sorghum_LE13_M35-1-I+N.paddock.Manager folder
        Soil GLH Field: same as LE13.Sorghum_LE13_Buster-I-N.paddock.GLH Field
        irrigation: same as HE1.Sorghum_HE1_T1.paddock.Irrigation
        fertiliser
        operations: same as LE13.Sorghum_LE13_Buster+I+N.paddock.operations
        sorghum -> /simulations/LE13/shared/sorghum
  folder LE14
    folder shared
      variables My Variables: same as HE6.shared.My Variables
      events My Variables Events
      sorghum -> /simulations/LE13/shared/sorghum
    simulation Sorghum_LE14_Buster
      clock
        start_date = 5/09/1996  # Select the start date of the simulation
        end_date = 19/02/1997  # Select the end date of the simulation
      summaryfile
      metfile met: filename=LE14.met
      area paddock
        outputfile: filename=Sorghum_LE14_Buster.out; title=Sorghum_LE14_Buster
          variables My Variables -> /simulations/LE14/shared/My Variables
          events My Variables Events -> /simulations/LE14/shared/My Variables Events
        folder Manager folder
          manager Sow SkipRow on a fixed date
            # Sowing criteria
            date = 11/10/1996  # Enter sowing date (d/m/yyyy)
            # Sowing parameters
            crop = Sorghum  # Enter name of crop to sow
            density = 10  # Enter sowing density (plants/m2)
            depth = 20  # Enter sowing depth (mm)
            cultivar = Buster  # Enter cultivar
            row_spacing = 0.5  # Enter row spacing (m)
            RowConfiguration = solid  # Enter skip row configuration
            ftn = 0.4  # Enter Fertile Tiller No.
            on start_of_day:
            script: same as in HE1.Sorghum_HE1_T1.paddock.Manager folder.Sow SkipRow on a fixed date
          manager Harvesting rule
            # Harvesting criteria
            crop = Sorghum  # Enter name of crop to harvest when ripe
            on end_of_day:
            script: same as in HE1.Sorghum_HE1_T1.paddock.Manager folder.Harvesting rule
        Soil GLH Field: LocalName=Cooper Lab; Site=Cooper Lab; Region=Gatton
          SoilType = GLHSoil  # Soil description
          NearestTown = Unknown
          NaturalVegetation = Unknown
          Water: same as LE13.Sorghum_LE13_Buster-I-N.paddock.GLH Field.Water
          SoilWater: same as LE13.Sorghum_LE13_Buster-I-N.paddock.GLH Field.SoilWater
          SoilOrganicMatter: same as LE13.Sorghum_LE13_Buster-I-N.paddock.GLH Field.SoilOrganicMatter
          Analysis: Thickness=[200, 200, 200, 300, 300, 300, 300]; PH=[8.200, 8.700, 8.900, 8.100, 8, 8, 8]
          Sample Initial nitrogen
            Thickness  NO3     NH4
            200        11.624  0.100
            200        5.732   0.100
            200        2.974   0.100
            300        1.645   0.100
            300        1.902   0.100
            300        2.246   0.100
            300        1.942   0.100
          Sample Initial water: Thickness=[200, 200, 200, 300, 300, 300, 300]; SW=[0.385, 0.470, 0.467, 0.459, 0.394, 0.399, 0.380]
        irrigation
          automatic_irrigation = on  # switch
          asw_depth = 1800  # Depth to which ASW is calculated. (mm)
          crit_fr_asw = 1.0  # Fraction of ASW below which irrigation is applied (0-1.0)
          irrigation_efficiency = 1.0  # Efficiency of the irrigation. (0-1.0)
          default_no3_conc = 0.0  # Nitrate concentration (ppm N)
          default_nh4_conc = 0.0  # Ammonium concentration (ppm N)
          default_cl_conc = 0.0  # Chloride concentration (ppm Cl)
        fertiliser
        operations
          6/09/1996  fertiliser apply amount = 0 (kg/ha), depth = 50 (mm), type = NO3_N ()
          6/09/1996  fertiliser apply amount = 126 (kg/ha), depth = 50 (mm), type = NO3_N ()
          16/09/1996  fertiliser apply amount = 105 (kg/ha), depth = 50 (mm), type = NO3_N ()
          15/11/1996  fertiliser apply amount = 73 (kg/ha), depth = 50 (mm), type = NO3_N ()
          31/12/1996  fertiliser apply amount = 59 (kg/ha), depth = 50 (mm), type = NO3_N ()
        sorghum -> /simulations/LE14/shared/sorghum
    simulation Sorghum_LE14_M35-1
      clock
        start_date = 5/09/1996  # Select the start date of the simulation
        end_date = 19/02/1997  # Select the end date of the simulation
      summaryfile
      metfile met: filename=LE14.met
      area paddock
        outputfile: filename=Sorghum_LE14_M35-1.out; title=Sorghum_LE14_M35-1
          variables My Variables -> /simulations/LE14/shared/My Variables
          events My Variables Events -> /simulations/LE14/shared/My Variables Events
        folder Manager folder
          manager Sow SkipRow on a fixed date
            # Sowing criteria
            date = 11/10/1996  # Enter sowing date (d/m/yyyy)
            # Sowing parameters
            crop = Sorghum  # Enter name of crop to sow
            density = 10  # Enter sowing density (plants/m2)
            depth = 20  # Enter sowing depth (mm)
            cultivar = M35-1  # Enter cultivar
            row_spacing = 0.5  # Enter row spacing (m)
            RowConfiguration = solid  # Enter skip row configuration
            ftn = 0.1  # Enter Fertile Tiller No.
            on start_of_day:
            script: same as in HE1.Sorghum_HE1_T1.paddock.Manager folder.Sow SkipRow on a fixed date
          manager Harvesting rule
            # Harvesting criteria
            crop = Sorghum  # Enter name of crop to harvest when ripe
            on end_of_day:
            script: same as in HE1.Sorghum_HE1_T1.paddock.Manager folder.Harvesting rule
        Soil GLH Field: same as LE14.Sorghum_LE14_Buster.paddock.GLH Field
        irrigation: same as LE14.Sorghum_LE14_Buster.paddock.Irrigation
        fertiliser
        operations: same as LE14.Sorghum_LE14_Buster.paddock.operations
        sorghum -> /simulations/LE14/shared/sorghum
    simulation Sorghum_LE14_QL41xQL36
      clock
        start_date = 5/09/1996  # Select the start date of the simulation
        end_date = 19/02/1997  # Select the end date of the simulation
      summaryfile
      metfile met: filename=LE14.met
      area paddock
        outputfile: filename=Sorghum_LE14_QL41xQL36.out; title=Sorghum_LE14_QL41xQL36
          variables My Variables -> /simulations/LE14/shared/My Variables
          events My Variables Events -> /simulations/LE14/shared/My Variables Events
        folder Manager folder
          manager Sow SkipRow on a fixed date
            # Sowing criteria
            date = 11/10/1996  # Enter sowing date (d/m/yyyy)
            # Sowing parameters
            crop = Sorghum  # Enter name of crop to sow
            density = 10  # Enter sowing density (plants/m2)
            depth = 20  # Enter sowing depth (mm)
            cultivar = QL41xQL36  # Enter cultivar
            row_spacing = 0.5  # Enter row spacing (m)
            RowConfiguration = solid  # Enter skip row configuration
            ftn = 0.4  # Enter Fertile Tiller No.
            on start_of_day:
            script: same as in HE1.Sorghum_HE1_T1.paddock.Manager folder.Sow SkipRow on a fixed date
          manager Harvesting rule
            # Harvesting criteria
            crop = Sorghum  # Enter name of crop to harvest when ripe
            on end_of_day:
            script: same as in HE1.Sorghum_HE1_T1.paddock.Manager folder.Harvesting rule
        Soil GLH Field: same as LE14.Sorghum_LE14_Buster.paddock.GLH Field
        irrigation: same as LE14.Sorghum_LE14_Buster.paddock.Irrigation
        fertiliser
        operations: same as LE14.Sorghum_LE14_Buster.paddock.operations
        sorghum -> /simulations/LE14/shared/sorghum
  folder LE15
    folder shared
      variables My Variables: same as HE6.shared.My Variables
      operations
        6/01/1997  Irrigation apply amount = 31
        8/01/1997  Irrigation apply amount = 14
        10/01/1997  Irrigation apply amount = 14
        12/01/1997  Irrigation apply amount = 14
        14/01/1997  Irrigation apply amount = 11
        17/01/1997  Irrigation apply amount = 14
        20/01/1997  Irrigation apply amount = 7
        22/01/1997  Irrigation apply amount = 8
        24/01/1997  Irrigation apply amount = 17
        4/02/1997  Irrigation apply amount = 8
        12/02/1997  Irrigation apply amount = 24
        26/02/1997  Irrigation apply amount = 29
        11/03/1997  Irrigation apply amount = 22
        19/03/1997  Irrigation apply amount = 27
        27/03/1997  Irrigation apply amount = 25
        3/04/1997  Irrigation apply amount = 20
        9/04/1997  Irrigation apply amount = 32
        18/04/1997  Irrigation apply amount = 35
        27/04/1997  Irrigation apply amount = 22
        3/01/1997  fertiliser apply amount = 0 (kg/ha), depth = 50 (mm), type = NO3_N ()
        3/01/1997  fertiliser apply amount = 45 (kg/ha), depth = 50 (mm), type = NO3_N ()
        3/01/1997  fertiliser apply amount = 116 (kg/ha), depth = 50 (mm), type = NO3_N ()
        4/02/1997  fertiliser apply amount = 59 (kg/ha), depth = 50 (mm), type = NO3_N ()
        11/03/1997  fertiliser apply amount = 59 (kg/ha), depth = 50 (mm), type = NO3_N ()
      sorghum -> /simulations/LE14/shared/sorghum
    simulation Sorghum_LE15_Buster
      clock
        start_date = 5/09/1996  # Select the start date of the simulation
        end_date = 8/05/1997  # Select the end date of the simulation
      summaryfile
      metfile met: filename=LE15.met
      area paddock
        outputfile: filename=Sorghum_LE15_Buster.out; title=Sorghum_LE15_Buster
          variables My Variables -> /simulations/LE15/shared/My Variables
        folder Manager folder
          manager Sow SkipRow on a fixed date
            # Sowing criteria
            date = 6/01/1997  # Enter sowing date (d/m/yyyy)
            # Sowing parameters
            crop = Sorghum  # Enter name of crop to sow
            density = 10  # Enter sowing density (plants/m2)
            depth = 25  # Enter sowing depth (mm)
            cultivar = Buster  # Enter cultivar
            row_spacing = 0.5  # Enter row spacing (m)
            RowConfiguration = solid  # Enter skip row configuration
            ftn = 0.5  # Enter Fertile Tiller No.
            on start_of_day:
            script: same as in HE1.Sorghum_HE1_T1.paddock.Manager folder.Sow SkipRow on a fixed date
          manager Harvesting rule
            # Harvesting criteria
            crop = Sorghum  # Enter name of crop to harvest when ripe
            on end_of_day:
            script: same as in HE1.Sorghum_HE1_T1.paddock.Manager folder.Harvesting rule
        Soil GLH Field: LocalName=Cooper Lab; Site=Cooper Lab; Region=Gatton
          SoilType = GLHSoil  # Soil description
          NearestTown = Unknown
          NaturalVegetation = Unknown
          Water: same as LE13.Sorghum_LE13_Buster-I-N.paddock.GLH Field.Water
          SoilWater: same as LE13.Sorghum_LE13_Buster-I-N.paddock.GLH Field.SoilWater
          SoilOrganicMatter: same as LE13.Sorghum_LE13_Buster-I-N.paddock.GLH Field.SoilOrganicMatter
          Analysis: Thickness=[200, 200, 200, 300, 300, 300, 300]; PH=[8.200, 8.700, 8.900, 8.100, 8, 8, 8]
          Sample Initial nitrogen
            Thickness  NO3     NH4
            200        11.624  0.100
            200        5.732   0.100
            200        2.974   0.100
            300        1.645   0.100
            300        1.902   0.100
            300        2.246   0.100
            300        1.942   0.100
          Sample Initial water: Thickness=[200, 200, 200, 300, 300, 300, 300]; SW=[0.390, 0.470, 0.479, 0.422, 0.393, 0.379, 0.405]
        irrigation: same as HE1.Sorghum_HE1_T1.paddock.Irrigation
        fertiliser
        operations -> /simulations/LE15/shared/operations
        sorghum -> /simulations/LE15/shared/sorghum
    simulation Sorghum_LE15_M35-1
      clock
        start_date = 5/09/1996  # Select the start date of the simulation
        end_date = 8/05/1997  # Select the end date of the simulation
      summaryfile
      metfile met: filename=LE15.met
      area paddock
        outputfile: filename=Sorghum_LE15_M35-1.out; title=Sorghum_LE15_M35-1
          variables My Variables -> /simulations/LE15/shared/My Variables
        folder Manager folder
          manager Sow SkipRow on a fixed date
            # Sowing criteria
            date = 6/01/1997  # Enter sowing date (d/m/yyyy)
            # Sowing parameters
            crop = Sorghum  # Enter name of crop to sow
            density = 10  # Enter sowing density (plants/m2)
            depth = 25  # Enter sowing depth (mm)
            cultivar = M35-1  # Enter cultivar
            row_spacing = 0.5  # Enter row spacing (m)
            RowConfiguration = solid  # Enter skip row configuration
            ftn = 0  # Enter Fertile Tiller No.
            on start_of_day:
            script: same as in HE1.Sorghum_HE1_T1.paddock.Manager folder.Sow SkipRow on a fixed date
          manager Harvesting rule
            # Harvesting criteria
            crop = Sorghum  # Enter name of crop to harvest when ripe
            on end_of_day:
            script: same as in HE1.Sorghum_HE1_T1.paddock.Manager folder.Harvesting rule
        Soil GLH Field: same as LE15.Sorghum_LE15_Buster.paddock.GLH Field
        irrigation: same as HE1.Sorghum_HE1_T1.paddock.Irrigation
        fertiliser
        operations -> /simulations/LE15/shared/operations
        sorghum -> /simulations/LE15/shared/sorghum
    simulation Sorghum_LE15_QL41xQL36
      clock
        start_date = 5/09/1996  # Select the start date of the simulation
        end_date = 8/05/1997  # Select the end date of the simulation
      summaryfile
      metfile met: filename=LE15.met
      area paddock
        outputfile: filename=Sorghum_LE15_QL41xQL36.out; title=Sorghum_LE15_QL41xQL36
          variables My Variables -> /simulations/LE15/shared/My Variables
        folder Manager folder
          manager Sow SkipRow on a fixed date
            # Sowing criteria
            date = 6/01/1997  # Enter sowing date (d/m/yyyy)
            # Sowing parameters
            crop = Sorghum  # Enter name of crop to sow
            density = 10  # Enter sowing density (plants/m2)
            depth = 25  # Enter sowing depth (mm)
            cultivar = QL41xQL36  # Enter cultivar
            row_spacing = 0.5  # Enter row spacing (m)
            RowConfiguration = solid  # Enter skip row configuration
            ftn = 0.5  # Enter Fertile Tiller No.
            on start_of_day:
            script: same as in HE1.Sorghum_HE1_T1.paddock.Manager folder.Sow SkipRow on a fixed date
          manager Harvesting rule
            # Harvesting criteria
            crop = Sorghum  # Enter name of crop to harvest when ripe
            on end_of_day:
            script: same as in HE1.Sorghum_HE1_T1.paddock.Manager folder.Harvesting rule
        Soil GLH Field: same as LE15.Sorghum_LE15_Buster.paddock.GLH Field
        irrigation: same as HE1.Sorghum_HE1_T1.paddock.Irrigation
        fertiliser
        operations -> /simulations/LE15/shared/operations
        sorghum -> /simulations/LE15/shared/sorghum
  folder LE17
    folder shared
      variables My Variables: same as HE6.shared.My Variables
      sorghum -> /simulations/LE15/shared/sorghum
    simulation Sorghum_LE17_T1
      clock
        start_date = 27/11/1997  # Select the start date of the simulation
        end_date = 9/04/1998  # Select the end date of the simulation
      summaryfile
      metfile met: filename=LE17.met
      area paddock
        outputfile: filename=Sorghum_LE17_T1.out; title=Sorghum_LE17_T1
          variables My Variables -> /simulations/LE17/shared/My Variables
        folder Manager folder
          manager Sow SkipRow on a fixed date
            # Sowing criteria
            date = 4/12/1997  # Enter sowing date (d/m/yyyy)
            # Sowing parameters
            crop = Sorghum  # Enter name of crop to sow
            density = 10  # Enter sowing density (plants/m2)
            depth = 25  # Enter sowing depth (mm)
            cultivar = Buster  # Enter cultivar
            row_spacing = 0.5  # Enter row spacing (m)
            RowConfiguration = solid  # Enter skip row configuration
            ftn = 1  # Enter Fertile Tiller No.
            on start_of_day:
            script: same as in HE1.Sorghum_HE1_T1.paddock.Manager folder.Sow SkipRow on a fixed date
          manager Harvesting rule
            # Harvesting criteria
            crop = Sorghum  # Enter name of crop to harvest when ripe
            on end_of_day:
            script: same as in HE1.Sorghum_HE1_T1.paddock.Manager folder.Harvesting rule
        Soil CooperLab: LocalName=Gatton CSIRO; Site=Gatton CSIRO; Region=SE Queensland
          SoilType = Gatton  # Soil description
          NearestTown = Unknown
          NaturalVegetation = Unknown
          Water: same as LE13.Sorghum_LE13_Buster-I-N.paddock.GLH Field.Water
          SoilWater: same as LE13.Sorghum_LE13_Buster-I-N.paddock.GLH Field.SoilWater
          SoilOrganicMatter: same as LE13.Sorghum_LE13_Buster-I-N.paddock.GLH Field.SoilOrganicMatter
          Analysis: Thickness=[200, 200, 200, 300, 300, 300, 300]; PH=[7.700, 8.300, 8.400, 8.500, 8.500, 8.500, 8.600]
          Sample Initial nitrogen
            Thickness  NO3      NH4
            200        5.18718  0.1
            200        2.41329  0.1
            200        6.50018  0.1
            300        6.34423  0.1
            300        6.81417  0.1
            300        6.70303  0.1
            300        3.09205  0.1
          Sample Initial water: Thickness=[200, 200, 200, 300, 300, 300, 300]; SW=[0.340, 0.412, 0.439, 0.434, 0.405, 0.399, 0.389]
        irrigation: same as HE1.Sorghum_HE1_T1.paddock.Irrigation
        fertiliser
        operations
          4/12/1997  Irrigation apply amount = 72
          17/12/1997  Irrigation apply amount = 22
          29/12/1997  Irrigation apply amount = 27
          6/01/1998  Irrigation apply amount = 44
          19/01/1998  Irrigation apply amount = 40
          10/02/1998  Irrigation apply amount = 17
          5/03/1998  Irrigation apply amount = 43
          18/03/1998  Irrigation apply amount = 37
          3/12/1997  fertiliser apply amount = 0 (kg/ha), depth = 50 (mm), type = NO3_N ()
          3/12/1997  fertiliser apply amount = 40 (kg/ha), depth = 50 (mm), type = NO3_N ()
          4/12/1997  fertiliser apply amount = 147 (kg/ha), depth = 50 (mm), type = NO3_N ()
          6/01/1998  fertiliser apply amount = 59 (kg/ha), depth = 50 (mm), type = NO3_N ()
          10/02/1998  fertiliser apply amount = 59 (kg/ha), depth = 50 (mm), type = NO3_N ()
        sorghum -> /simulations/LE17/shared/sorghum
    simulation Sorghum_LE17_T2
      clock
        start_date = 27/11/1997  # Select the start date of the simulation
        end_date = 9/04/1998  # Select the end date of the simulation
      summaryfile
      metfile met: filename=LE17.met
      area paddock
        outputfile: filename=Sorghum_LE17_T2.out; title=Sorghum_LE17_T2
          variables My Variables -> /simulations/LE17/shared/My Variables
        folder Manager folder
          manager Sow SkipRow on a fixed date
            # Sowing criteria
            date = 4/12/1997  # Enter sowing date (d/m/yyyy)
            # Sowing parameters
            crop = Sorghum  # Enter name of crop to sow
            density = 10  # Enter sowing density (plants/m2)
            depth = 25  # Enter sowing depth (mm)
            cultivar = M35-1  # Enter cultivar
            row_spacing = 0.5  # Enter row spacing (m)
            RowConfiguration = solid  # Enter skip row configuration
            ftn = 1  # Enter Fertile Tiller No.
            on start_of_day:
            script: same as in HE1.Sorghum_HE1_T1.paddock.Manager folder.Sow SkipRow on a fixed date
          manager Harvesting rule
            # Harvesting criteria
            crop = Sorghum  # Enter name of crop to harvest when ripe
            on end_of_day:
            script: same as in HE1.Sorghum_HE1_T1.paddock.Manager folder.Harvesting rule
        Soil CooperLab: LocalName=Gatton CSIRO; Site=Gatton CSIRO; Region=SE Queensland
          SoilType = Gatton  # Soil description
          NearestTown = Unknown
          NaturalVegetation = Unknown
          Water: same as LE13.Sorghum_LE13_Buster-I-N.paddock.GLH Field.Water
          SoilWater: same as LE13.Sorghum_LE13_Buster-I-N.paddock.GLH Field.SoilWater
          SoilOrganicMatter: same as LE13.Sorghum_LE13_Buster-I-N.paddock.GLH Field.SoilOrganicMatter
          Analysis: Thickness=[200, 200, 200, 300, 300, 300, 300]; PH=[7.700, 8.300, 8.400, 8.500, 8.500, 8.500, 8.600]
          Sample Initial nitrogen
            Thickness  NO3     NH4
            200        17.363  0.1
            200        8.078   0.1
            200        21.758  0.1
            300        21.236  0.1
            300        22.809  0.1
            300        22.437  0.1
            300        10.35   0.1
          Sample Initial water: Thickness=[200, 200, 200, 300, 300, 300, 300]; SW=[0.340, 0.412, 0.439, 0.434, 0.405, 0.399, 0.389]
        irrigation: same as HE1.Sorghum_HE1_T1.paddock.Irrigation
        fertiliser
        operations: same as LE17.Sorghum_LE17_T1.paddock.operations
        sorghum -> /simulations/LE17/shared/sorghum
    simulation Sorghum_LE17_T3
      clock
        start_date = 27/11/1997  # Select the start date of the simulation
        end_date = 9/04/1998  # Select the end date of the simulation
      summaryfile
      metfile met: filename=LE17.met
      area paddock
        outputfile: filename=Sorghum_LE17_T3.out; title=Sorghum_LE17_T3
          variables My Variables -> /simulations/LE17/shared/My Variables
        folder Manager folder
          manager Sow SkipRow on a fixed date
            # Sowing criteria
            date = 4/12/1997  # Enter sowing date (d/m/yyyy)
            # Sowing parameters
            crop = Sorghum  # Enter name of crop to sow
            density = 10  # Enter sowing density (plants/m2)
            depth = 25  # Enter sowing depth (mm)
            cultivar = CSH13R  # Enter cultivar
            row_spacing = 0.5  # Enter row spacing (m)
            RowConfiguration = solid  # Enter skip row configuration
            ftn = 1  # Enter Fertile Tiller No.
            on start_of_day:
            script: same as in HE1.Sorghum_HE1_T1.paddock.Manager folder.Sow SkipRow on a fixed date
          manager Harvesting rule
            # Harvesting criteria
            crop = Sorghum  # Enter name of crop to harvest when ripe
            on end_of_day:
            script: same as in HE1.Sorghum_HE1_T1.paddock.Manager folder.Harvesting rule
        Soil CooperLab: LocalName=Gatton CSIRO; Site=Gatton CSIRO; Region=SE Queensland
          SoilType = Gatton  # Soil description
          NearestTown = Unknown
          NaturalVegetation = Unknown
          Water: same as LE13.Sorghum_LE13_Buster-I-N.paddock.GLH Field.Water
          SoilWater: same as LE13.Sorghum_LE13_Buster-I-N.paddock.GLH Field.SoilWater
          SoilOrganicMatter: same as LE13.Sorghum_LE13_Buster-I-N.paddock.GLH Field.SoilOrganicMatter
          Analysis: Thickness=[200, 200, 200, 300, 300, 300, 300]; PH=[7.700, 8.300, 8.400, 8.500, 8.500, 8.500, 8.600]
          Sample Initial nitrogen
            Thickness  NO3     NH4
            200        17.363  0.100
            200        8.078   0.100
            200        21.758  0.100
            300        21.236  0.100
            300        22.809  0.100
            300        22.437  0.100
            300        10.350  0.100
          Sample Initial water: Thickness=[200, 200, 200, 300, 300, 300, 300]; SW=[0.340, 0.412, 0.439, 0.434, 0.405, 0.399, 0.389]
        irrigation
          automatic_irrigation = on  # switch
          asw_depth = 600.0  # Depth to which ASW is calculated. (mm)
          crit_fr_asw = 0.5  # Fraction of ASW below which irrigation is applied (0-1.0)
          irrigation_efficiency = 1.0  # Efficiency of the irrigation. (0-1.0)
          default_no3_conc = 0.0  # Nitrate concentration (ppm N)
          default_nh4_conc = 0.0  # Ammonium concentration (ppm N)
          default_cl_conc = 0.0  # Chloride concentration (ppm Cl)
        fertiliser
        operations: same as LE17.Sorghum_LE17_T1.paddock.operations
        sorghum -> /simulations/LE17/shared/sorghum
  folder LE19
    folder shared
      irrigation
        automatic_irrigation = on  # switch
        asw_depth = 600.0  # Depth to which ASW is calculated. (mm)
        crit_fr_asw = 0.75  # Fraction of ASW below which irrigation is applied (0-1.0)
        irrigation_efficiency = 1.0  # Efficiency of the irrigation. (0-1.0)
        default_no3_conc = 0.0  # Nitrate concentration (ppm N)
        default_nh4_conc = 0.0  # Ammonium concentration (ppm N)
        default_cl_conc = 0.0  # Chloride concentration (ppm Cl)
      variables My Variables: same as HE6.shared.My Variables
      sorghum -> /simulations/LE17/shared/sorghum
    simulation Sorghum_LE19_T1
      clock
        start_date = 9/11/1998  # Select the start date of the simulation
        end_date = 7/03/1999  # Select the end date of the simulation
      summaryfile
      metfile met: filename=LE19.met
      area paddock
        outputfile: filename=Sorghum_LE19_T1.out; title=Sorghum_LE19_T1
          variables My Variables -> /simulations/LE19/shared/My Variables
        folder Manager folder
          manager Sow SkipRow on a fixed date
            # Sowing criteria
            date = 11/11/1998  # Enter sowing date (d/m/yyyy)
            # Sowing parameters
            crop = Sorghum  # Enter name of crop to sow
            density = 10  # Enter sowing density (plants/m2)
            depth = 30  # Enter sowing depth (mm)
            cultivar = Buster  # Enter cultivar
            row_spacing = 0.5  # Enter row spacing (m)
            RowConfiguration = solid  # Enter skip row configuration
            ftn = 0  # Enter Fertile Tiller No.
            on start_of_day:
            script: same as in HE1.Sorghum_HE1_T1.paddock.Manager folder.Sow SkipRow on a fixed date
          manager Harvesting rule
            # Harvesting criteria
            crop = Sorghum  # Enter name of crop to harvest when ripe
            on end_of_day:
            script: same as in HE1.Sorghum_HE1_T1.paddock.Manager folder.Harvesting rule
        Soil CooperLab: LocalName=Gatton CSIRO; Site=Gatton CSIRO; Region=SE Queensland
          SoilType = Gatton  # Soil description
          NearestTown = Unknown
          NaturalVegetation = Unknown
          InitialWater Initial water: FractionFull=100; PercentMethod=FilledFromTop
          Water: same as LE13.Sorghum_LE13_Buster-I-N.paddock.GLH Field.Water
          SoilWater: same as LE13.Sorghum_LE13_Buster-I-N.paddock.GLH Field.SoilWater
          SoilOrganicMatter: same as LE13.Sorghum_LE13_Buster-I-N.paddock.GLH Field.SoilOrganicMatter
          Analysis: Thickness=[200, 200, 200, 300, 300, 300, 300]; PH=[7.700, 8.300, 8.400, 8.500, 8.500, 8.500, 8.600]
          Sample Initial nitrogen
            Thickness  NO3    NH4
            200        8.581  0.100
            200        5.840  0.100
            200        1.684  0.100
            300        0.665  0.100
            300        0.363  0.100
            300        0.439  0.100
            300        0.582  0.100
        fertiliser
        operations
        irrigation -> /simulations/LE19/shared/Irrigation
        sorghum -> /simulations/LE19/shared/sorghum
    simulation Sorghum_LE19_T2
      clock
        start_date = 9/11/1998  # Select the start date of the simulation
        end_date = 7/03/1999  # Select the end date of the simulation
      summaryfile
      metfile met: filename=LE19.met
      area paddock
        outputfile: filename=Sorghum_LE19_T2.out; title=Sorghum_LE19_T2
          variables My Variables -> /simulations/LE19/shared/My Variables
        folder Manager folder
          manager Sow SkipRow on a fixed date
            # Sowing criteria
            date = 11/11/1998  # Enter sowing date (d/m/yyyy)
            # Sowing parameters
            crop = Sorghum  # Enter name of crop to sow
            density = 10  # Enter sowing density (plants/m2)
            depth = 30  # Enter sowing depth (mm)
            cultivar = Buster  # Enter cultivar
            row_spacing = 0.5  # Enter row spacing (m)
            RowConfiguration = solid  # Enter skip row configuration
            ftn = 0.2  # Enter Fertile Tiller No.
            on start_of_day:
            script: same as in HE1.Sorghum_HE1_T1.paddock.Manager folder.Sow SkipRow on a fixed date
          manager Harvesting rule
            # Harvesting criteria
            crop = Sorghum  # Enter name of crop to harvest when ripe
            on end_of_day:
            script: same as in HE1.Sorghum_HE1_T1.paddock.Manager folder.Harvesting rule
        Soil CooperLab: LocalName=Gatton CSIRO; Site=Gatton CSIRO; Region=SE Queensland
          SoilType = Gatton  # Soil description
          NearestTown = Unknown
          NaturalVegetation = Unknown
          Water: same as LE13.Sorghum_LE13_Buster-I-N.paddock.GLH Field.Water
          SoilWater: same as LE13.Sorghum_LE13_Buster-I-N.paddock.GLH Field.SoilWater
          SoilOrganicMatter: same as LE13.Sorghum_LE13_Buster-I-N.paddock.GLH Field.SoilOrganicMatter
          Analysis: Thickness=[200, 200, 200, 300, 300, 300, 300]; PH=[7.700, 8.300, 8.400, 8.500, 8.500, 8.500, 8.600]
          Sample Initial nitrogen
            Thickness  NO3    NH4
            200        8.581  0.100
            200        5.840  0.100
            200        1.684  0.100
            300        0.665  0.100
            300        0.363  0.100
            300        0.439  0.100
            300        0.582  0.100
          Sample Initial water: Thickness=[200, 200, 200, 300, 300, 300, 300]; SW=[0.293, 0.388, 0.371, 0.315, 0.307, 0.350, 0.374]
        fertiliser
        operations
          11/11/1998  fertiliser apply amount = 55 (kg/ha), depth = 50 (mm), type = NO3_N ()
        irrigation -> /simulations/LE19/shared/Irrigation
        sorghum -> /simulations/LE19/shared/sorghum
    simulation Sorghum_LE19_T3
      clock
        start_date = 9/11/1998  # Select the start date of the simulation
        end_date = 7/03/1999  # Select the end date of the simulation
      summaryfile
      metfile met: filename=LE19.met
      area paddock
        outputfile: filename=Sorghum_LE19_T3.out; title=Sorghum_LE19_T3
          variables My Variables -> /simulations/LE19/shared/My Variables
        folder Manager folder
          manager Sow SkipRow on a fixed date
            # Sowing criteria
            date = 11/11/1998  # Enter sowing date (d/m/yyyy)
            # Sowing parameters
            crop = sorghum  # Enter name of crop to sow
            density = 10  # Enter sowing density (plants/m2)
            depth = 30  # Enter sowing depth (mm)
            cultivar = Buster  # Enter cultivar
            row_spacing = 0.5  # Enter row spacing (m)
            RowConfiguration = solid  # Enter skip row configuration
            ftn = 0.3  # Enter Fertile Tiller No.
            on start_of_day:
            script: same as in HE1.Sorghum_HE1_T1.paddock.Manager folder.Sow SkipRow on a fixed date
          manager Harvesting rule
            # Harvesting criteria
            crop = Sorghum  # Enter name of crop to harvest when ripe
            on end_of_day:
            script: same as in HE1.Sorghum_HE1_T1.paddock.Manager folder.Harvesting rule
        Soil CooperLab: same as LE19.Sorghum_LE19_T2.paddock.CooperLab
        fertiliser
        operations
          11/11/1998  fertiliser apply amount = 55 (kg/ha), depth = 50 (mm), type = NO3_N ()
          13/12/1998  fertiliser apply amount = 27 (kg/ha), depth = 50 (mm), type = NO3_N ()
          14/01/1999  fertiliser apply amount = 27 (kg/ha), depth = 50 (mm), type = NO3_N ()
        irrigation -> /simulations/LE19/shared/Irrigation
        sorghum -> /simulations/LE19/shared/sorghum
    simulation Sorghum_LE19_T4
      clock
        start_date = 9/11/1998  # Select the start date of the simulation
        end_date = 7/03/1999  # Select the end date of the simulation
      summaryfile
      metfile met: filename=LE19.met
      area paddock
        outputfile: filename=Sorghum_LE19_T4.out; title=Sorghum_LE19_T4
          variables My Variables -> /simulations/LE19/shared/My Variables
        folder Manager folder
          manager Sow SkipRow on a fixed date
            # Sowing criteria
            date = 11/11/1998  # Enter sowing date (d/m/yyyy)
            # Sowing parameters
            crop = Sorghum  # Enter name of crop to sow
            density = 10  # Enter sowing density (plants/m2)
            depth = 30  # Enter sowing depth (mm)
            cultivar = Buster  # Enter cultivar
            row_spacing = 0.5  # Enter row spacing (m)
            RowConfiguration = solid  # Enter skip row configuration
            ftn = 0.4  # Enter Fertile Tiller No.
            on start_of_day:
            script: same as in HE1.Sorghum_HE1_T1.paddock.Manager folder.Sow SkipRow on a fixed date
          manager Harvesting rule
            # Harvesting criteria
            crop = Sorghum  # Enter name of crop to harvest when ripe
            on end_of_day:
            script: same as in HE1.Sorghum_HE1_T1.paddock.Manager folder.Harvesting rule
        Soil CooperLab: same as LE19.Sorghum_LE19_T2.paddock.CooperLab
        fertiliser
        operations
          11/11/1998  fertiliser apply amount = 55 (kg/ha), depth = 50 (mm), type = NO3_N ()
          13/12/1998  fertiliser apply amount = 55 (kg/ha), depth = 50 (mm), type = NO3_N ()
          14/01/1999  fertiliser apply amount = 55 (kg/ha), depth = 50 (mm), type = NO3_N ()
        irrigation -> /simulations/LE19/shared/Irrigation
        sorghum -> /simulations/LE19/shared/sorghum
    simulation Sorghum_LE19_T5
      clock
        start_date = 9/11/1998  # Select the start date of the simulation
        end_date = 7/03/1999  # Select the end date of the simulation
      summaryfile
      metfile met: filename=LE19.met
      area paddock
        outputfile: filename=Sorghum_LE19_T5.out; title=Sorghum_LE19_T5
          variables My Variables -> /simulations/LE19/shared/My Variables
        folder Manager folder
          manager Sow SkipRow on a fixed date
            # Sowing criteria
            date = 11/11/1998  # Enter sowing date (d/m/yyyy)
            # Sowing parameters
            crop = Sorghum  # Enter name of crop to sow
            density = 10  # Enter sowing density (plants/m2)
            depth = 30  # Enter sowing depth (mm)
            cultivar = CSH13R  # Enter cultivar
            row_spacing = 0.5  # Enter row spacing (m)
            RowConfiguration = solid  # Enter skip row configuration
            ftn = 0  # Enter Fertile Tiller No.
            on start_of_day:
            script: same as in HE1.Sorghum_HE1_T1.paddock.Manager folder.Sow SkipRow on a fixed date
          manager Harvesting rule
            # Harvesting criteria
            crop = Sorghum  # Enter name of crop to harvest when ripe
            on end_of_day:
            script: same as in HE1.Sorghum_HE1_T1.paddock.Manager folder.Harvesting rule
        Soil CooperLab: same as LE19.Sorghum_LE19_T2.paddock.CooperLab
        fertiliser
        operations
        irrigation -> /simulations/LE19/shared/Irrigation
        sorghum -> /simulations/LE19/shared/sorghum
    simulation Sorghum_LE19_T6
      clock
        start_date = 9/11/1998  # Select the start date of the simulation
        end_date = 7/03/1999  # Select the end date of the simulation
      summaryfile
      metfile met: filename=LE19.met
      area paddock
        outputfile: filename=Sorghum_LE19_T6.out; title=Sorghum_LE19_T6
          variables My Variables -> /simulations/LE19/shared/My Variables
        folder Manager folder
          manager Sow SkipRow on a fixed date
            # Sowing criteria
            date = 11/11/1998  # Enter sowing date (d/m/yyyy)
            # Sowing parameters
            crop = Sorghum  # Enter name of crop to sow
            density = 10  # Enter sowing density (plants/m2)
            depth = 30  # Enter sowing depth (mm)
            cultivar = CSH13R  # Enter cultivar
            row_spacing = 0.5  # Enter row spacing (m)
            RowConfiguration = solid  # Enter skip row configuration
            ftn = 0.2  # Enter Fertile Tiller No.
            on start_of_day:
            script: same as in HE1.Sorghum_HE1_T1.paddock.Manager folder.Sow SkipRow on a fixed date
          manager Harvesting rule
            # Harvesting criteria
            crop = Sorghum  # Enter name of crop to harvest when ripe
            on end_of_day:
            script: same as in HE1.Sorghum_HE1_T1.paddock.Manager folder.Harvesting rule
        Soil CooperLab: same as LE19.Sorghum_LE19_T2.paddock.CooperLab
        fertiliser
        operations
          11/11/1998  fertiliser apply amount = 55 (kg/ha), depth = 50 (mm), type = NO3_N ()
        irrigation -> /simulations/LE19/shared/Irrigation
        sorghum -> /simulations/LE19/shared/sorghum
    simulation Sorghum_LE19_T7
      clock
        start_date = 9/11/1998  # Select the start date of the simulation
        end_date = 7/03/1999  # Select the end date of the simulation
      summaryfile
      metfile met: filename=LE19.met
      area paddock
        outputfile: filename=Sorghum_LE19_T7.out; title=Sorghum_LE19_T7
          variables My Variables -> /simulations/LE19/shared/My Variables
        folder Manager folder
          manager Sow SkipRow on a fixed date
            # Sowing criteria
            date = 11/11/1998  # Enter sowing date (d/m/yyyy)
            # Sowing parameters
            crop = Sorghum  # Enter name of crop to sow
            density = 10  # Enter sowing density (plants/m2)
            depth = 30  # Enter sowing depth (mm)
            cultivar = CSH13R  # Enter cultivar
            row_spacing = 0.5  # Enter row spacing (m)
            RowConfiguration = solid  # Enter skip row configuration
            ftn = 0.3  # Enter Fertile Tiller No.
            on start_of_day:
            script: same as in HE1.Sorghum_HE1_T1.paddock.Manager folder.Sow SkipRow on a fixed date
          manager Harvesting rule
            # Harvesting criteria
            crop = Sorghum  # Enter name of crop to harvest when ripe
            on end_of_day:
            script: same as in HE1.Sorghum_HE1_T1.paddock.Manager folder.Harvesting rule
        Soil CooperLab: same as LE19.Sorghum_LE19_T2.paddock.CooperLab
        fertiliser
        operations
          11/11/1998  fertiliser apply amount = 55 (kg/ha), depth = 50 (mm), type = NO3_N ()
          17/12/1998  fertiliser apply amount = 27 (kg/ha), depth = 50 (mm), type = NO3_N ()
          23/01/1999  fertiliser apply amount = 27 (kg/ha), depth = 50 (mm), type = NO3_N ()
        irrigation -> /simulations/LE19/shared/Irrigation
        sorghum -> /simulations/LE19/shared/sorghum
    simulation Sorghum_LE19_T8
      clock
        start_date = 9/11/1998  # Select the start date of the simulation
        end_date = 7/03/1999  # Select the end date of the simulation
      summaryfile
      metfile met: filename=LE19.met
      area paddock
        outputfile: filename=Sorghum_LE19_T8.out; title=Sorghum_LE19_T8
          variables My Variables -> /simulations/LE19/shared/My Variables
        folder Manager folder: same as LE19.Sorghum_LE19_T7.paddock.Manager folder
        Soil CooperLab: same as LE19.Sorghum_LE19_T2.paddock.CooperLab
        fertiliser
        operations
          11/11/1998  fertiliser apply amount = 55 (kg/ha), depth = 50 (mm), type = NO3_N ()
          17/12/1998  fertiliser apply amount = 55 (kg/ha), depth = 50 (mm), type = NO3_N ()
          23/01/1999  fertiliser apply amount = 55 (kg/ha), depth = 50 (mm), type = NO3_N ()
        irrigation -> /simulations/LE19/shared/Irrigation
        sorghum -> /simulations/LE19/shared/sorghum
  folder LE21
    folder shared
      variables My Variables: same as HE6.shared.My Variables
      sorghum -> /simulations/LE19/shared/sorghum
        sorghumGenotype A35xQL36: same as BW8_GxE.shared.sorghum.A35xQL36
        sorghumGenotype QL39xQL36: same as BW8_GxE.shared.sorghum.QL39xQL36
    simulation Sorghum_Gatton_RUE_1
      clock
        start_date = 22/11/1999  # Select the start date of the simulation
        end_date = 3/04/2000  # Select the end date of the simulation
      summaryfile
      metfile met: filename=Gatton_RUE.met
      area paddock
        outputfile: filename=Sorghum_Gatton_RUE_1.out; title=Sorghum_Gatton_RUE_1; events=My Variables Events
          variables My Variables -> /simulations/LE21/shared/My Variables
        folder Manager folder
          manager Sow SkipRow on a fixed date
            # Sowing criteria
            date = 2/12/1999  # Enter sowing date (d/m/yyyy)
            # Sowing parameters
            crop = Sorghum  # Enter name of crop to sow
            density = 10  # Enter sowing density (plants/m2)
            depth = 40  # Enter sowing depth (mm)
            cultivar = CSH13R  # Enter cultivar
            row_spacing = 0.5  # Enter row spacing (m)
            RowConfiguration = solid  # Enter skip row configuration
            ftn = 0  # Enter Fertile Tiller No.
            on start_of_day:
            script: same as in HE1.Sorghum_HE1_T1.paddock.Manager folder.Sow SkipRow on a fixed date
          manager Harvesting rule
            # Harvesting criteria
            crop = Sorghum  # Enter name of crop to harvest when ripe
            on end_of_day:
            script: same as in HE1.Sorghum_HE1_T1.paddock.Manager folder.Harvesting rule
        Soil Ian's Paddock: LocalName=Gatton RS; Site=Gatton RS; Region=Gatton
          SoilType = LawesBlackVertosol  # Soil description
          NearestTown = Unknown
          NaturalVegetation = Unknown
          InitialWater Initial water: FractionFull=1.00; PercentMethod=FilledFromTop
          Water
            Thickness  BD     AirDry  LL15   DUL    SAT
            150        1.320  0.100   0.260  0.410  0.460
            150        1.300  0.150   0.260  0.430  0.480
            300        1.230  0.250   0.260  0.460  0.510
            300        1.270  0.260   0.260  0.440  0.490
            300        1.370  0.250   0.250  0.400  0.450
            300        1.350  0.280   0.280  0.410  0.460
            300        1.350  0.310   0.310  0.380  0.430
            SoilCrop Sorghum: LL=[0.260, 0.260, 0.260, 0.260, 0.250, 0.280, 0.310]; KL=[0.080, 0.080, 0.080, 0.080, 0.060, 0.040, 0.020]; XF=[1, 1, 1, 1, 1, 1, 1]
          SoilWater: SummerCona=3.5; SummerU=6; SummerDate=1-Nov; WinterCona=3.5; WinterU=6; WinterDate=1-Apr; DiffusConst=88; DiffusSlope=35.4; Salb=0.13; CN2Bare=91; CNRed=20; CNCov=0.8; Thickness=[150, 150, 300, 300, 300, 300, 300]; SWCON=[0.500, 0.500, 0.500, 0.500, 0.500, 0.500, 0.500]
          SoilOrganicMatter: RootCN=30; RootWt=1500; SoilCN=12.5; EnrACoeff=7.4; EnrBCoeff=0.2
            Thickness  OC     FBiom  FInert
            150        1.300  0.030  0.310
            150        0.650  0.010  0.380
            300        0.320  0      0.470
            300        0.110  0      0.700
            300        0.110  0      0.900
            300        0.110  0      0.950
            300        0.110  0      0.950
          Analysis: Thickness=[150, 150, 300, 300, 300, 300, 300]; PH=[8.200, 8.700, 8.900, 8.100, 8, 8, 8]
          Sample Initial nitrogen
            Thickness  NO3    NH4
            150        9.202  0.100
            150        4.403  0.100
            300        2.239  0.100
            300        1.237  0.100
            300        1.266  0.100
            300        1.770  0.100
            300        2.064  0.100
        irrigation: same as HE1.Sorghum_HE1_T1.paddock.Irrigation
        fertiliser
        operations
          3/12/1999  Irrigation apply amount = 17
          6/12/1999  Irrigation apply amount = 20
          17/12/1999  Irrigation apply amount = 20
          7/01/2000  Irrigation apply amount = 10
          14/01/2000  Irrigation apply amount = 48
          27/01/2000  Irrigation apply amount = 21
          4/02/2000  Irrigation apply amount = 17
          11/02/2000  Irrigation apply amount = 30
          25/02/2000  Irrigation apply amount = 41
          3/03/2000  Irrigation apply amount = 15
          28/11/1999  fertiliser apply amount = 0 (kg/ha), depth = 50 (mm), type = NO3_N ()
          27/11/1999  fertiliser apply amount = 0 (kg/ha), depth = 50 (mm), type = NO3_N ()
        sorghum -> /simulations/LE21/shared/sorghum
    simulation Sorghum_Gatton_RUE_2
      clock
        start_date = 22/11/1999  # Select the start date of the simulation
        end_date = 3/04/2000  # Select the end date of the simulation
      summaryfile
      metfile met: filename=Gatton_RUE.met
      area paddock
        outputfile: filename=Sorghum_Gatton_RUE_2.out; title=Sorghum_Gatton_RUE_2; events=My Variables Events
          variables My Variables -> /simulations/LE21/shared/My Variables
        folder Manager folder
          manager Sow SkipRow on a fixed date
            # Sowing criteria
            date = 2/12/1999  # Enter sowing date (d/m/yyyy)
            # Sowing parameters
            crop = Sorghum  # Enter name of crop to sow
            density = 10  # Enter sowing density (plants/m2)
            depth = 40  # Enter sowing depth (mm)
            cultivar = A35xQL36  # Enter cultivar
            row_spacing = 0.5  # Enter row spacing (m)
            RowConfiguration = solid  # Enter skip row configuration
            ftn = 0  # Enter Fertile Tiller No.
            on start_of_day:
            script: same as in HE1.Sorghum_HE1_T1.paddock.Manager folder.Sow SkipRow on a fixed date
          manager Harvesting rule
            # Harvesting criteria
            crop = Sorghum  # Enter name of crop to harvest when ripe
            on end_of_day:
            script: same as in HE1.Sorghum_HE1_T1.paddock.Manager folder.Harvesting rule
        Soil Ian's Paddock: same as LE21.Sorghum_Gatton_RUE_1.paddock.Ian's Paddock
        irrigation: same as HE1.Sorghum_HE1_T1.paddock.Irrigation
        fertiliser
        operations: same as LE21.Sorghum_Gatton_RUE_1.paddock.operations
        sorghum -> /simulations/LE21/shared/sorghum
    simulation Sorghum_Gatton_RUE_3
      clock
        start_date = 22/11/1999  # Select the start date of the simulation
        end_date = 3/04/2000  # Select the end date of the simulation
      summaryfile
      metfile met: filename=Gatton_RUE.met
      area paddock
        outputfile: filename=Sorghum_Gatton_RUE_3.out; title=Sorghum_Gatton_RUE_3; events=My Variables Events
          variables My Variables -> /simulations/LE21/shared/My Variables
        folder Manager folder
          manager Sow SkipRow on a fixed date
            # Sowing criteria
            date = 2/12/1999  # Enter sowing date (d/m/yyyy)
            # Sowing parameters
            crop = sorghum  # Enter name of crop to sow
            density = 10  # Enter sowing density (plants/m2)
            depth = 40  # Enter sowing depth (mm)
            cultivar = QL39xQL36  # Enter cultivar
            row_spacing = 0.5  # Enter row spacing (m)
            RowConfiguration = solid  # Enter skip row configuration
            ftn = 0  # Enter Fertile Tiller No.
            on start_of_day:
            script: same as in HE1.Sorghum_HE1_T1.paddock.Manager folder.Sow SkipRow on a fixed date
          manager Harvesting rule
            # Harvesting criteria
            crop = Sorghum  # Enter name of crop to harvest when ripe
            on end_of_day:
            script: same as in HE1.Sorghum_HE1_T1.paddock.Manager folder.Harvesting rule
        Soil Ian's Paddock: same as LE21.Sorghum_Gatton_RUE_1.paddock.Ian's Paddock
        irrigation: same as HE1.Sorghum_HE1_T1.paddock.Irrigation
        fertiliser
        operations: same as LE21.Sorghum_Gatton_RUE_1.paddock.operations
        sorghum -> /simulations/LE21/shared/sorghum
    simulation Sorghum_Gatton_RUE_4
      clock
        start_date = 22/11/1999  # Select the start date of the simulation
        end_date = 3/04/2000  # Select the end date of the simulation
      summaryfile
      metfile met: filename=Gatton_RUE.met
      area paddock
        outputfile: filename=Sorghum_Gatton_RUE_4.out; title=Sorghum_Gatton_RUE_4; events=My Variables Events
          variables My Variables -> /simulations/LE21/shared/My Variables
        folder Manager folder: same as LE21.Sorghum_Gatton_RUE_1.paddock.Manager folder
        Soil Ian's Paddock: same as LE21.Sorghum_Gatton_RUE_1.paddock.Ian's Paddock
        irrigation: same as HE1.Sorghum_HE1_T1.paddock.Irrigation
        fertiliser
        operations
          3/12/1999  Irrigation apply amount = 17
          6/12/1999  Irrigation apply amount = 20
          17/12/1999  Irrigation apply amount = 20
          7/01/2000  Irrigation apply amount = 10
          14/01/2000  Irrigation apply amount = 48
          27/01/2000  Irrigation apply amount = 21
          4/02/2000  Irrigation apply amount = 17
          11/02/2000  Irrigation apply amount = 30
          25/02/2000  Irrigation apply amount = 41
          3/03/2000  Irrigation apply amount = 15
          29/11/1999  fertiliser apply amount = 44 (kg/ha), depth = 50 (mm), type = NO3_N ()
          28/11/1999  fertiliser apply amount = 0 (kg/ha), depth = 50 (mm), type = NO3_N ()
          27/11/1999  fertiliser apply amount = 0 (kg/ha), depth = 50 (mm), type = NO3_N ()
        sorghum -> /simulations/LE21/shared/sorghum
    simulation Sorghum_Gatton_RUE_5
      clock
        start_date = 22/11/1999  # Select the start date of the simulation
        end_date = 3/04/2000  # Select the end date of the simulation
      summaryfile
      metfile met: filename=Gatton_RUE.met
      area paddock
        outputfile: filename=Sorghum_Gatton_RUE_5.out; title=Sorghum_Gatton_RUE_5; events=My Variables Events
          variables My Variables -> /simulations/LE21/shared/My Variables
        folder Manager folder: same as LE21.Sorghum_Gatton_RUE_2.paddock.Manager folder
        Soil Ian's Paddock: same as LE21.Sorghum_Gatton_RUE_1.paddock.Ian's Paddock
        irrigation: same as HE1.Sorghum_HE1_T1.paddock.Irrigation
        fertiliser
        operations: same as LE21.Sorghum_Gatton_RUE_4.paddock.operations
        sorghum -> /simulations/LE21/shared/sorghum
    simulation Sorghum_Gatton_RUE_6
      clock
        start_date = 22/11/1999  # Select the start date of the simulation
        end_date = 3/04/2000  # Select the end date of the simulation
      summaryfile
      metfile met: filename=Gatton_RUE.met
      area paddock
        outputfile: filename=Sorghum_Gatton_RUE_6.out; title=Sorghum_Gatton_RUE_6; events=My Variables Events
          variables My Variables -> /simulations/LE21/shared/My Variables
        folder Manager folder
          manager Sow SkipRow on a fixed date
            # Sowing criteria
            date = 2/12/1999  # Enter sowing date (d/m/yyyy)
            # Sowing parameters
            crop = Sorghum  # Enter name of crop to sow
            density = 10  # Enter sowing density (plants/m2)
            depth = 40  # Enter sowing depth (mm)
            cultivar = QL39xQL36  # Enter cultivar
            row_spacing = 0.5  # Enter row spacing (m)
            RowConfiguration = solid  # Enter skip row configuration
            ftn = 0  # Enter Fertile Tiller No.
            on start_of_day:
            script: same as in HE1.Sorghum_HE1_T1.paddock.Manager folder.Sow SkipRow on a fixed date
          manager Harvesting rule
            # Harvesting criteria
            crop = Sorghum  # Enter name of crop to harvest when ripe
            on end_of_day:
            script: same as in HE1.Sorghum_HE1_T1.paddock.Manager folder.Harvesting rule
        Soil Ian's Paddock: same as LE21.Sorghum_Gatton_RUE_1.paddock.Ian's Paddock
        irrigation: same as HE1.Sorghum_HE1_T1.paddock.Irrigation
        fertiliser
        operations: same as LE21.Sorghum_Gatton_RUE_4.paddock.operations
        sorghum -> /simulations/LE21/shared/sorghum
    simulation Sorghum_Gatton_RUE_7
      clock
        start_date = 22/11/1999  # Select the start date of the simulation
        end_date = 3/04/2000  # Select the end date of the simulation
      summaryfile
      metfile met: filename=Gatton_RUE.met
      area paddock
        outputfile: filename=Sorghum_Gatton_RUE_7.out; title=Sorghum_Gatton_RUE_7; events=My Variables Events
          variables My Variables -> /simulations/LE21/shared/My Variables
        folder Manager folder
          manager Sow SkipRow on a fixed date
            # Sowing criteria
            date = 2/12/1999  # Enter sowing date (d/m/yyyy)
            # Sowing parameters
            crop = Sorghum  # Enter name of crop to sow
            density = 10  # Enter sowing density (plants/m2)
            depth = 40  # Enter sowing depth (mm)
            cultivar = CSH13R  # Enter cultivar
            row_spacing = 0.5  # Enter row spacing (m)
            RowConfiguration = solid  # Enter skip row configuration
            ftn = 0.9  # Enter Fertile Tiller No.
            on start_of_day:
            script: same as in HE1.Sorghum_HE1_T1.paddock.Manager folder.Sow SkipRow on a fixed date
          manager Harvesting rule
            # Harvesting criteria
            crop = Sorghum  # Enter name of crop to harvest when ripe
            on end_of_day:
            script: same as in HE1.Sorghum_HE1_T1.paddock.Manager folder.Harvesting rule
        Soil Ian's Paddock: same as LE21.Sorghum_Gatton_RUE_1.paddock.Ian's Paddock
        irrigation: same as HE1.Sorghum_HE1_T1.paddock.Irrigation
        fertiliser
        operations
          3/12/1999  Irrigation apply amount = 17
          6/12/1999  Irrigation apply amount = 20
          17/12/1999  Irrigation apply amount = 20
          7/01/2000  Irrigation apply amount = 10
          14/01/2000  Irrigation apply amount = 48
          27/01/2000  Irrigation apply amount = 21
          4/02/2000  Irrigation apply amount = 17
          11/02/2000  Irrigation apply amount = 30
          25/02/2000  Irrigation apply amount = 41
          3/03/2000  Irrigation apply amount = 15
          29/11/1999  fertiliser apply amount = 117 (kg/ha), depth = 50 (mm), type = NO3_N ()
          7/01/2000  fertiliser apply amount = 119 (kg/ha), depth = 50 (mm), type = NO3_N ()
          11/02/2000  fertiliser apply amount = 119 (kg/ha), depth = 50 (mm), type = NO3_N ()
          28/11/1999  fertiliser apply amount = 0 (kg/ha), depth = 50 (mm), type = NO3_N ()
          27/11/1999  fertiliser apply amount = 0 (kg/ha), depth = 50 (mm), type = NO3_N ()
        sorghum -> /simulations/LE21/shared/sorghum
    simulation Sorghum_Gatton_RUE_8
      clock
        start_date = 22/11/1999  # Select the start date of the simulation
        end_date = 3/04/2000  # Select the end date of the simulation
      summaryfile
      metfile met: filename=Gatton_RUE.met
      area paddock
        outputfile: filename=Sorghum_Gatton_RUE_8.out; title=Sorghum_Gatton_RUE_8; events=My Variables Events
          variables My Variables -> /simulations/LE21/shared/My Variables
        folder Manager folder
          manager Sow SkipRow on a fixed date
            # Sowing criteria
            date = 2/12/1999  # Enter sowing date (d/m/yyyy)
            # Sowing parameters
            crop = Sorghum  # Enter name of crop to sow
            density = 10  # Enter sowing density (plants/m2)
            depth = 40  # Enter sowing depth (mm)
            cultivar = A35xQL36  # Enter cultivar
            row_spacing = 0.5  # Enter row spacing (m)
            RowConfiguration = solid  # Enter skip row configuration
            ftn = 0.2  # Enter Fertile Tiller No.
            on start_of_day:
            script: same as in HE1.Sorghum_HE1_T1.paddock.Manager folder.Sow SkipRow on a fixed date
          manager Harvesting rule
            # Harvesting criteria
            crop = Sorghum  # Enter name of crop to harvest when ripe
            on end_of_day:
            script: same as in HE1.Sorghum_HE1_T1.paddock.Manager folder.Harvesting rule
        Soil Ian's Paddock: same as LE21.Sorghum_Gatton_RUE_1.paddock.Ian's Paddock
        irrigation: same as HE1.Sorghum_HE1_T1.paddock.Irrigation
        fertiliser
        operations: same as LE21.Sorghum_Gatton_RUE_7.paddock.operations
        sorghum -> /simulations/LE21/shared/sorghum
    simulation Sorghum_Gatton_RUE_9
      clock
        start_date = 22/11/1999  # Select the start date of the simulation
        end_date = 3/04/2000  # Select the end date of the simulation
      summaryfile
      metfile met: filename=Gatton_RUE.met
      area paddock
        outputfile: filename=Sorghum_Gatton_RUE_9.out; title=Sorghum_Gatton_RUE_9; events=My Variables Events
          variables My Variables -> /simulations/LE21/shared/My Variables
        folder Manager folder
          manager Sow SkipRow on a fixed date
            # Sowing criteria
            date = 2/12/1999  # Enter sowing date (d/m/yyyy)
            # Sowing parameters
            crop = sorghum  # Enter name of crop to sow
            density = 10  # Enter sowing density (plants/m2)
            depth = 40  # Enter sowing depth (mm)
            cultivar = QL39xQL36  # Enter cultivar
            row_spacing = 0.5  # Enter row spacing (m)
            RowConfiguration = solid  # Enter skip row configuration
            ftn = 0.9  # Enter Fertile Tiller No.
            on start_of_day:
            script: same as in HE1.Sorghum_HE1_T1.paddock.Manager folder.Sow SkipRow on a fixed date
          manager Harvesting rule
            # Harvesting criteria
            crop = Sorghum  # Enter name of crop to harvest when ripe
            on end_of_day:
            script: same as in HE1.Sorghum_HE1_T1.paddock.Manager folder.Harvesting rule
        Soil Ian's Paddock: same as LE21.Sorghum_Gatton_RUE_1.paddock.Ian's Paddock
        irrigation: same as HE1.Sorghum_HE1_T1.paddock.Irrigation
        fertiliser
        operations: same as LE21.Sorghum_Gatton_RUE_7.paddock.operations
        sorghum -> /simulations/LE21/shared/sorghum
  memo
    	Note: If you have Observered data for some samplings but not others, then in the .out file (for the observations) you can use * or ?  for those missing values instead of using 0

    	This allows you to tell the difference between data you did not collect, and data that actually had a value of 0

    	Data with a * or ? is not plotted on the graph (hence neither is its predicted value) whereas data with 0 is.

    	Note: You can add error bars to your Observed data by adding an extra column with the same name but with the word "Error" appended to the column name.
              eg. If you have a column called "yield" you would add an extra column called "yieldError" to your Observed data output file.
                  (It is very important you don't put any spaces between the "yield" and "Error")
  memo: same as memo
  memo: same as memo
  memo: same as memo
  memo: same as memo
  memo: same as memo
  memo: same as memo
  memo: same as memo
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