folder HE5: version=37; creator=Apsim 7.9-r4092
  simulation Sorghum_HE5_T1
    clock
      start_date = 18/11/1997  # Select the start date of the simulation
      end_date = 15/04/1998  # Select the end date of the simulation
    summaryfile
    metfile met: filename=HE1997.met
    area paddock
      folder Manager folder
        manager Sow SkipRow on a fixed date
          # Sowing criteria
          date = 27/11/1997  # Enter sowing date (d/m/yyyy)
          # Sowing parameters
          crop = Sorghum  # Enter name of crop to sow
          density = 10  # Enter sowing density (plants/m2)
          depth = 30  # Enter sowing depth (mm)
          cultivar = Buster  # Enter cultivar
          row_spacing = 0.5  # Enter row spacing (m)
          RowConfiguration = solid  # Enter skip row configuration
          ftn = 0.1  # Enter Fertile Tiller No.
          on start_of_day:
```
            if (paddock_is_fallow() = 1 and today = date('[date]')) then
              [crop] sow plants =[density], sowing_depth = [depth], cultivar = [cultivar], row_spacing = [row_spacing], skip = [RowConfiguration], tiller_no_fertile = [ftn] ()
            endif
```
        manager Harvesting rule
          # Harvesting criteria
          crop = Sorghum  # Enter name of crop to harvest when ripe
          on end_of_day:
```
           if [crop].StageName = 'harvest_ripe' or [crop].plant_status = 'dead' then
              [crop]  harvest
              [crop]  end_crop
           endif
```
      irrigation
        automatic_irrigation = off  # switch
        asw_depth = 600.0  # Depth to which ASW is calculated. (mm)
        crit_fr_asw = 0.5  # Fraction of ASW below which irrigation is applied (0-1.0)
        irrigation_efficiency = 1.0  # Efficiency of the irrigation. (0-1.0)
        default_no3_conc = 0.0  # Nitrate concentration (ppm N)
        default_nh4_conc = 0.0  # Ammonium concentration (ppm N)
        default_cl_conc = 0.0  # Chloride concentration (ppm Cl)
      fertiliser
      operations
        28/11/1997  Irrigation apply amount = 16
        2/12/1997  Irrigation apply amount = 25
        4/12/1997  Irrigation apply amount = 13
        8/12/1997  Irrigation apply amount = 21
        18/12/1997  Irrigation apply amount = 28
        6/01/1998  Irrigation apply amount = 26
        12/01/1998  Irrigation apply amount = 46
        27/01/1998  Irrigation apply amount = 25
        20/02/1998  Irrigation apply amount = 26
        27/02/1998  Irrigation apply amount = 55
        13/03/1998  Irrigation apply amount = 22
        18/03/1998  Irrigation apply amount = 39
        20/03/1998  Irrigation apply amount = 21
        26/11/1997  fertiliser apply amount = 3 (kg/ha), depth = 50 (mm), type = NO3_N ()
        20/02/1998  fertiliser apply amount = 59 (kg/ha), depth = 50 (mm), type = NO3_N ()
      Soil HRS: SoilType=HMM; LocalName=HRS; Site=HRS; NearestTown=Unknown; Region=SE Queensland; NaturalVegetation=Unknown; Latitude=0; Longitude=0; YearOfSampling=0
        Water
          Thickness  BD     AirDry  LL15   DUL    SAT
          100        1.340  0.080   0.226  0.420  0.450
          100        1.340  0.190   0.226  0.420  0.450
          200        1.330  0.230   0.258  0.460  0.480
          200        1.380  0.260   0.270  0.460  0.470
          200        1.400  0.260   0.268  0.430  0.450
          200        1.550  0.280   0.304  0.400  0.410
          200        1.590  0.250   0.335  0.370  0.380
          200        1.630  0.280   0.330  0.330  0.370
          200        1.660  0.300   0.320  0.320  0.370
          200        1.680  0.310   0.330  0.330  0.360
          SoilCrop Sorghum
            LL=[0.226, 0.226, 0.258, 0.270, 0.268, 0.304, 0.335, 0.330, 0.320, 0.330]
            KL=[0.070, 0.070, 0.070, 0.070, 0.060, 0.060, 0.060, 0.050, 0.050, 0.040]
            XF=[1, 1, 1, 1, 1, 1, 1, 1, 1, 1]
        SoilWater: SummerCona=6.5; SummerU=1.5; SummerDate=1-Nov; WinterCona=6.5; WinterU=1.5; WinterDate=1-Apr; DiffusConst=40; DiffusSlope=16; Salb=0.2; CN2Bare=85; CNRed=20; CNCov=0.8; Thickness=[100, 100, 200, 200, 200, 200, 200, 200, 200, 200]
          SWCON=[0.300, 0.300, 0.300, 0.300, 0.300, 0.300, 0.300, 0.300, 0.300, 0.300]
        SoilOrganicMatter: RootCN=50; RootWt=1000; SoilCN=12.5; EnrACoeff=7.4; EnrBCoeff=0.2
          Thickness  OC     FBiom  FInert
          100        1.190  0.050  0.450
          100        0.590  0.020  0.600
          200        0.450  0.010  0.750
          200        0.300  0.010  0.900
          200        0.200  0.010  0.900
          200        0.160  0.010  0.900
          200        0.170  0.010  0.900
          200        0.170  0.050  0.900
          200        0.170  0.020  0.900
          200        0.170  0.010  0.900
        Analysis: Thickness=[100, 100, 200, 200, 200, 200, 200, 200, 200, 200]
          PH=[6.300, 6.400, 6.500, 6.600, 6.600, 6.500, 6.500, 6.500, 6.500, 6.500]
        Sample Initial Water: Thickness=[100, 100, 200, 200, 200, 200, 200, 200, 200, 200]
          SW=[0.217, 0.357, 0.375, 0.401, 0.349, 0.351, 0.359, 0.330, 0.322, 0.347]
        Sample Initial Nitrogen
          Thickness  NO3     NH4
          100        8.421   0.100
          100        8.054   0.100
          200        7.001   0.100
          200        3.824   0.100
          200        2.759   0.100
          200        3.429   0.100
          200        8.668   0.100
          200        11.576  0.100
          200        8.816   0.100
          200        11.758  0.100
      sorghum
      outputfile: filename=Sorghum_HE5_T1.out; title=Sorghum_HE5_T1
        variables My Variables
          variable:
            DaysAfterSowing as Das
            Stage
            Biomass units g/m^2 as BiomassWt
            GrainSize
            GrainNo
            MaxLAI as LaiAnth
            RootGreenWt
            LeafGreenWt
            StemGreenWt
            RachisGreenWt
            GrainGreenWt
            biomass_n
            RootGreenN
            LeafGreenN
            StemGreenN
            RachisGreenN
            GrainGreenN
            GrainGreenNConc
            LeafNo
            ESW
            no3() as NO3
            SLN
            sw()
            HI
            TPLA
            SPLA
            Yield
            Biomass
        events Reporting Frequency: event=harvesting
  simulation Sorghum_HE5_T2
    clock
      start_date = 18/11/1997  # Select the start date of the simulation
      end_date = 15/04/1998  # Select the end date of the simulation
    summaryfile
    metfile met: filename=HE1997.met
    area paddock
      folder Manager folder
        manager Sow SkipRow on a fixed date
          # Sowing criteria
          date = 27/11/1997  # Enter sowing date (d/m/yyyy)
          # Sowing parameters
          crop = Sorghum  # Enter name of crop to sow
          density = 10  # Enter sowing density (plants/m2)
          depth = 30  # Enter sowing depth (mm)
          cultivar = M35-1  # Enter cultivar
          row_spacing = 0.5  # Enter row spacing (m)
          RowConfiguration = solid  # Enter skip row configuration
          ftn = 0.2  # Enter Fertile Tiller No.
          on start_of_day:
          script: same as in Sorghum_HE5_T1.paddock.Manager folder.Sow SkipRow on a fixed date
        manager Harvesting rule
          # Harvesting criteria
          crop = Sorghum  # Enter name of crop to harvest when ripe
          on end_of_day:
          script: same as in Sorghum_HE5_T1.paddock.Manager folder.Harvesting rule
      irrigation: same as Sorghum_HE5_T1.paddock.Irrigation
      fertiliser
      operations: same as Sorghum_HE5_T1.paddock.operations
      sorghum
      Soil HRS -> /HE5/Sorghum_HE5_T1/paddock/HRS
      outputfile -> /HE5/Sorghum_HE5_T1/paddock/Outputfile: filename=Sorghum_HE5_T2.out; title=Sorghum_HE5_T2
        variables My Variables -> /HE5/Sorghum_HE5_T1/paddock/Outputfile/My Variables
        events Reporting Frequency -> /HE5/Sorghum_HE5_T1/paddock/Outputfile/Reporting Frequency
  simulation Sorghum_HE5_T3
    clock
      start_date = 18/11/1997  # Select the start date of the simulation
      end_date = 15/04/1998  # Select the end date of the simulation
    summaryfile
    metfile met: filename=HE1997.met
    area paddock
      folder Manager folder
        manager Sow SkipRow on a fixed date
          # Sowing criteria
          date = 27/11/1997  # Enter sowing date (d/m/yyyy)
          # Sowing parameters
          crop = Sorghum  # Enter name of crop to sow
          density = 10  # Enter sowing density (plants/m2)
          depth = 30  # Enter sowing depth (mm)
          cultivar = CSH13R  # Enter cultivar
          row_spacing = 0.5  # Enter row spacing (m)
          RowConfiguration = solid  # Enter skip row configuration
          ftn = 0  # Enter Fertile Tiller No.
          on start_of_day:
          script: same as in Sorghum_HE5_T1.paddock.Manager folder.Sow SkipRow on a fixed date
        manager Harvesting rule
          # Harvesting criteria
          crop = Sorghum  # Enter name of crop to harvest when ripe
          on end_of_day:
          script: same as in Sorghum_HE5_T1.paddock.Manager folder.Harvesting rule
      irrigation: same as Sorghum_HE5_T1.paddock.Irrigation
      fertiliser
      operations
        28/11/1997  Irrigation apply amount = 16
        2/12/1997  Irrigation apply amount = 25
        4/12/1997  Irrigation apply amount = 13
        8/12/1997  Irrigation apply amount = 21
        18/12/1997  Irrigation apply amount = 28
        6/01/1998  Irrigation apply amount = 26
        12/01/1998  Irrigation apply amount = 46
        27/01/1998  Irrigation apply amount = 25
        20/02/1998  Irrigation apply amount = 26
        27/02/1998  Irrigation apply amount = 55
        13/03/1998  Irrigation apply amount = 22
        18/03/1998  Irrigation apply amount = 39
        20/03/1998  Irrigation apply amount = 21
        26/11/1997  fertiliser apply amount = 0 (kg/ha), depth = 50 (mm), type = NO3_N ()
        26/11/1997  fertiliser apply amount = 33 (kg/ha), depth = 50 (mm), type = NO3_N ()
        20/02/1998  fertiliser apply amount = 59 (kg/ha), depth = 50 (mm), type = NO3_N ()
      sorghum
      Soil HRS -> /HE5/Sorghum_HE5_T1/paddock/HRS
      outputfile -> /HE5/Sorghum_HE5_T1/paddock/Outputfile: filename=Sorghum_HE5_T3.out; title=Sorghum_HE5_T3
        variables My Variables -> /HE5/Sorghum_HE5_T1/paddock/Outputfile/My Variables
        events Reporting Frequency -> /HE5/Sorghum_HE5_T1/paddock/Outputfile/Reporting Frequency
