folder BW8_GxE: version=32
  folder BW8
    outputfile: filename=.out; events=My Variables Events
      variables My Variables
        variable:
          today format dd/mm/yyyy as Date  # Date (dd/mm/yyyy)
          DaysAfterSowing as Das  # Days after Sowing
          Stage  # Plant stage
          Biomass  # Biomass weight
          GreenWt  # Weight of roots
          Biomass units g/m^2 as BiomassWt  # Weight of stems
          RootGreenWt  # Weight of heads
          LeafGreenWt  # Weight of leaf
          StemGreenWt  # Weight of grain
          RachisGreenWt  # N in total biomass
          GrainGreenWt  # N in roots
          BiomassN  # N in stems
          BiomassN
          RootGreenN  # N in heads
          LeafGreenN  # N in leaves
          StemGreenN  # N in grain
          RachisGreenN  # Water stress
          GrainGreenN  # number
          GrainGreenNConc  # Leaf area index
          GrainNo  # Extractable Soil Water (mm)
          LeafNo  # N content of dead plant parts
          LAI  # Specific leaf nitrogen
          SLAI
          ESW  # Total plant leaf area
          no3() as NO3  # Senesced plant leaf area
          SLN  # Live flower dry weight
          WaterSD  # N concentration in grain
          sw
          HI  # Grain number
          TPLA
          SPLA
          biomass_n
    sorghum
      sorghumConstants standard: Water=WATER --------------------------------------------------
        crop_type = sorghum
        default_crop_class = plant
        stage_names = sowing germination emergence end_of_juvenile floral_initiation flag_leaf flowering start_grain_fill end_grain_fill maturity harvest_ripe end_crop
        stage_code = 1   2   3    4      5     6     7    8    9    10   11   12
        pesw_germ = 0
        shoot_lag = 15
        shoot_rate = 0.6
        twilight = -2.2
        x_temp = 11 30  42
        y_tt = 0  19   0
        x_temp_fm = 5.7 23.5
        y_tt_fm = 0   17.8
        SorghumCanopy = Canopy --------------------------------------------------
        leaf_no_at_emerg = 1
        leaf_no_seed = 4
        leaf_no_min = 10
        leaf_no_max = 40
        leaf_init_rate = 21.6
        leaf_app_rate1 = 41
        leaf_app_rate2 = 20
        leaf_no_rate_change = 3.5
        leaf_app_rate = 41
        rue = 0   0  1.25  1.25  1.25 1.25  1.25 1.25 1.25 1.25    0    0
        row_spacing_default = 750
        x_row_spacing = 0.20   0.50   1.00
        y_extinct_coef = 0.70   0.40   0.40
        x_ave_temp = 8 20 35 50
        y_stress_photo = 0  1  1  0
        leaf_no_correction = 1.52
        x_lai = 0.1    4
        y_lai_sla_max = 50000 25000
        lai_sla_min = 8000  8000
        sla_max = 45000
        sla_min = 8000
        initial_tpla = 200
        tiller_coef = 0.66
        tpla_inflection_ratio = 0.66
        height_max = 3500
        height_stem_slope = 250
        Biomass = Biomass --------------------------------------------------
        dm_leaf_init = 0.1
        dm_root_init = 0.1
        dm_stem_init = 0.1
        stem_trans_frac = 0.2
        leaf_trans_frac = 0.15
        retransRate = 0.15
        ratio_root_shoot = 0   0   1    1     0.33  0.33  0.087  0    0     0    0    0
        partition_rate_leaf = 0.006
        frac_stem2flower = 0.3
        grn_water_cont = 0.13
        GrainTempWindow = -150 50
        GrainTempOrdinals = 36 40
        Roots = ROOTS --------------------------------------------------
        root_depth_rate = 0 27.0  27.0  27.0 27.0  27.0   27.0   0      0       0    0    0
        x_sw_ratio = 0   0.25
        y_sw_fac_root = 0   1
        initial_root_depth = 50
        specific_root_length = 100000
        x_plant_rld = 0.0  0.1
        y_rel_root_rate = 1.0  1.0
        transp_eff_cf = 0.009 0.009 0.009 0.009 0.009 0.009  0.009  0.009  0.009  0.009   0.009   0.009
        svp_fract = 0.75
        x_sw_demand_ratio = 0.1 1.1
        y_swdef_leaf = 0   1
        x_sw_avail_ratio = 0 0.2 1.0
        y_swdef_pheno = 0 1.0 1.0
        Nitrogen = Nitrogen --------------------------------------------------
        no3_diffn_const = 2
        maxUptakeRate = 0.029
        initialRootNConc = 0.02
        targetRootNConc = 0.002
        initialLeafSLN = 1.5
        targetLeafSLN = 1.5
        newLeafSLN = 1
        senescedLeafSLN = 0.3
        initialStemNConc = 0.01
        x_stem_n = 3         5       7         10
        targetStemNConc = 0.055   0.016   0.01      0.005
        structStemNConc = 0.012  0.012   0.005   0.0015
        initialRachisNConc = 0
        targetRachisNConc = 0.01
        structRachisNConc = 0.003
        stemDilnNSlope = 0.0062
        stemDilnNInt = -0.001
        rachisDilnNSlope = 0.0062
        rachisDilnNInt = -0.001
        leafDilnNSlope = 0.0043
        leafDilnNInt = -0.0017
        grainFillRate = 0.001
        grainFillIntercept = 0.0000319
        grainFillSlope = 0.4026
        targetGrainNConc = 0.0175
        nUptakeCease = 570
        nSupplyFrac = 5
        Senescence = Senescence --------------------------------------------------
        dm_root_sen_frac = 0.002
        lai_sen_light = 4
        sen_light_slope = 0.008
        x_temp_senescence = 0.0 6.0
        y_senescence_fac = 1   0
        sen_rate_water = 0.05
        dead_detach_frac = 0 0 0 0 0
        dm_leaf_detach_frac = 0
        sen_light_time_const = 10
        sen_radn_crit = 2
        frost_kill = 1
        sen_water_time_const = 10
        sen_threshold = 0.25
        spla_slope = 81.5
        tt_emerg_limit = 150
        days_germ_limit = 40
        swdf_photo_limit = 99
        swdf_photo_rate = 0
        swdf_pheno_limit = 99
        x_weighted_temp = 55.0  60.0
        y_plant_death = 0.0   1.0
        stress_determinants = leaf stem grain
        Phosphorous = Phosphorous --------------------------------------------------
        yield_parts = grain
        retrans_parts = leaf stem  flower
        pfact_photo_slope = 2.5
        pfact_expansion_slope = 2.5
        pfact_pheno_slope = 6
        pfact_grain_slope = 20
        p_uptake_factor = 1.5
        x_p_stage_code = 3       4      5      6      7      8      10
        y_p_conc_max_leaf = 0.0059  0.0054 0.0040 0.0029 0.0026 0.0025 0.0022
        y_p_conc_min_leaf = 0.003   0.003  0.0029 0.0011 0.0011 0.0008 0.0006
        y_p_conc_sen_leaf = 0.0005  0.0005 0.0005 0.0005 0.0005 0.0005 0.0005
        y_p_conc_max_stem = 0.0057  0.0038 0.0037 0.0018 0.0016 0.0013 0.0013
        y_p_conc_min_stem = 0.003   0.003  0.002  0.0006 0.0006 0.0002 0.0002
        y_p_conc_sen_stem = 0.0002  0.0002 0.0002 0.0002 0.0002 0.0002 0.0002
        y_p_conc_max_root = 0.0010  0.0010 0.0010 0.0010 0.0010 0.0010 0.0010
        y_p_conc_min_root = 0.0010  0.0010 0.0010 0.0010 0.0010 0.0010 0.0010
        y_p_conc_sen_root = 0.0010  0.0010 0.0010 0.0010 0.0010 0.0010 0.0010
        y_p_conc_max_flower = 0.0057  0.0038 0.0037 0.0018 0.0016 0.0013 0.0013
        y_p_conc_min_flower = 0.003   0.003  0.002  0.0006 0.0006 0.0002 0.0002
        y_p_conc_sen_flower = 0.0002  0.0002 0.0002 0.0002 0.0002 0.0002 0.0002
        y_p_conc_max_grain = 0.001   0.001  0.001  0.001  0.052  0.0044  0.0034
        y_p_conc_min_grain = 0.001   0.001  0.001  0.001  0.001  0.0015  0.0015
        y_p_conc_sen_grain = 0.001   0.001  0.001  0.001  0.001  0.0015  0.0015
        y_p_conc_max_energy = 0.001   0.001  0.001  0.001  0.001  0.001  0.001
        y_p_conc_min_energy = 0.001   0.001  0.001  0.001  0.001  0.001  0.001
        y_p_conc_sen_energy = 0.001   0.001  0.001  0.001  0.001  0.001  0.001
        p_conc_init_leaf = 0.0059
        p_conc_init_stem = 0.0057
        p_conc_init_root = 0.01
        p_conc_init_flower = 0.0057
        p_conc_init_grain = 0.0052
        p_conc_init_energy = 0
        Bounds = Bounds --------------------------------------------------
        ll_ub = 1000
        kl_ub = 1
        minsw = 0.00001
        latitude_ub = 90
        latitude_lb = -90
        maxt_ub = 55
        maxt_lb = 0
        mint_ub = 40
        mint_lb = -10
        radn_ub = 50
        radn_lb = 1
        dlayer_ub = 1000
        dlayer_lb = 0
        dul_dep_ub = 1000
        dul_dep_lb = 0
        sw_dep_ub = 1000
        sw_dep_lb = 0
        sw_ub = 1
        sw_lb = 0
        no3_ub = 10000
        no3_lb = 0
        no3_min_ub = 10000
        no3_min_lb = 0
        nh4_ub = 10000
        nh4_lb = 0
        nh4_min_ub = 10000
        nh4_min_lb = 0
        head_grain_no_max_ub = 45000
        grain_gth_rate_ub = 20
        tt_emerg_to_endjuv_ub = 500
        pp_endjuv_to_init_ub = 200
        tt_flower_to_maturity_ub = 1000
        tt_maturity_to_ripe_ub = 1000
        tt_flower_to_start_grain_ub = 1000
        tt_flag_to_flower_ub = 1000
        x_co2_te_modifier = 350
        y_co2_te_modifier = 1
      sorghumGenotype Buster
        tt_emerg_to_endjuv = 100
        photoperiod_crit1 = 11.5
        photoperiod_crit2 = 13.5
        photoperiod_slope = 11.5
        tt_endjuv_to_init = 160
        tt_flag_to_flower = 170
        tt_flower_to_start_grain = 80
        tt_flower_to_maturity = 761
        tt_maturity_to_ripe = 1
        main_stem_coef = 2.9
        tpla_prod_coef = 0.018
        dm_per_seed = 0.00083
        x_stem_wt = 0    80
        y_height = 0  2000
        maxGFRate = 0.09
      sorghumGenotype QL41xQL36
        tt_emerg_to_endjuv = 100
        photoperiod_crit1 = 11.5
        photoperiod_crit2 = 13.5
        photoperiod_slope = 12.5
        tt_endjuv_to_init = 179
        tt_flag_to_flower = 170
        tt_flower_to_start_grain = 80
        tt_flower_to_maturity = 761
        tt_maturity_to_ripe = 1
        main_stem_coef = 2.9
        tpla_prod_coef = 0.018
        dm_per_seed = 0.00083
        x_stem_wt = 0    80
        y_height = 0  2000
        maxGFRate = 0.09
      sorghumGenotype M35-1
        tt_emerg_to_endjuv = 100
        photoperiod_crit1 = 11.5
        photoperiod_crit2 = 13.5
        photoperiod_slope = 61
        tt_endjuv_to_init = 252
        tt_flag_to_flower = 170
        tt_flower_to_start_grain = 80
        tt_flower_to_maturity = 761
        tt_maturity_to_ripe = 1
        main_stem_coef = 2.82
        tpla_prod_coef = 0.011
        dm_per_seed = 0.00142784
        x_stem_wt = 0    80
        y_height = 0  2000
        partition_rate_leaf = 0.018
        nUptakeCease = 10
        leaf_init_rate = 26.1
        targetLeafSLN = 1.2
        maxGFRate = 0.09
      sorghumGenotype CSH13R: tt_emerg_to_endjuv=100; photoperiod_crit1=11.5; photoperiod_crit2=13.5; photoperiod_slope=17; tt_endjuv_to_init=228; tt_flag_to_flower=170; tt_flower_to_start_grain=80; tt_flower_to_maturity=761; tt_maturity_to_ripe=1; main_stem_coef=2.95; tpla_prod_coef=0.014; dm_per_seed=0.0015; x_stem_wt=0    80; y_height=0  2000; rue=0   0  1.6  1.6  1.6 1.6  1.6 1.6 1.6 1.6    0    0; partition_rate_leaf=0.018; targetLeafSLN=1.2; leaf_init_rate=23.2
        maxGFRate = 0.09
      sorghumGenotype ATX623xRTX430
        tt_emerg_to_endjuv = 100
        photoperiod_crit1 = 11.5
        photoperiod_crit2 = 13.5
        photoperiod_slope = 13
        tt_endjuv_to_init = 202
        tt_flag_to_flower = 170
        tt_flower_to_start_grain = 80
        tt_flower_to_maturity = 761
        tt_maturity_to_ripe = 1
        main_stem_coef = 2.9
        tpla_prod_coef = 0.018
        dm_per_seed = 0.00083
        x_stem_wt = 0    80
        y_height = 0  2000
        maxGFRate = 0.09
      sorghumGenotype A35xQL36
        tt_emerg_to_endjuv = 100
        photoperiod_crit1 = 11.8
        photoperiod_crit2 = 14
        photoperiod_slope = 39.7
        tt_endjuv_to_init = 134.4
        tt_flag_to_flower = 170
        tt_flower_to_start_grain = 80
        tt_flower_to_maturity = 761
        tt_maturity_to_ripe = 1
        main_stem_coef = 2.9
        tpla_prod_coef = 0.018
        dm_per_seed = 0.00083
        x_stem_wt = 0    80
        y_height = 0  2000
        partition_rate_leaf = 0.012
        maxGFRate = 0.09
      sorghumGenotype QL39xQL36
        tt_emerg_to_endjuv = 100
        photoperiod_crit1 = 11.8
        photoperiod_crit2 = 14
        photoperiod_slope = 39.7
        tt_endjuv_to_init = 114.4
        tt_flag_to_flower = 170
        tt_flower_to_start_grain = 80
        tt_flower_to_maturity = 761
        tt_maturity_to_ripe = 1
        main_stem_coef = 2.9
        tpla_prod_coef = 0.018
        dm_per_seed = 0.00083
        x_stem_wt = 0    80
        y_height = 0  2000
        maxGFRate = 0.09
    soil IC_BW8: LocalName=ICRISAT; Site=ICRISAT; Region=Hyderabad
      SoilType = BW8  # Soil description
      NearestTown = Unknown
      NaturalVegetation = Unknown
      InitWater Initial water
        PercentMethod: Percent=0.50; Distributed=Filled from top
      Water
        Layer:
          Thickness (mm)  BD (g/cc)  AirDry (mm/mm)  LL15 (mm/mm)  DUL (mm/mm)  SAT (mm/mm)
          150             1.490      0.120           0.160         0.320        0.43
          150             1.410      0.150           0.190         0.350        0.46
          150             1.410      0.150           0.190         0.350        0.46
          150             1.560      0.100           0.140         0.280        0.41
          150             1.490      0.110           0.150         0.310        0.43
          150             1.520      0.130           0.170         0.330        0.42
          150             1.610      0.090           0.130         0.260        0.39
          150             1.680      0.080           0.120         0.220        0.36
          150             1.630      0.090           0.130         0.240        0.38
          300             1.620      0.090           0.130         0.240        0.38
          300             1.620      0.090           0.130         0.240        0.38
        SoilCrop Sorghum
          Layer:
            Thickness (mm)  LL (mm/mm)  KL (/day)  XF (0-1)
            150             0.160       0.070      1
            150             0.190       0.070      1
            150             0.190       0.070      1
            150             0.140       0.070      1
            150             0.150       0.070      1
            150             0.170       0.070      1
            150             0.130       0.070      1
            150             0.120       0.070      1
            150             0.130       0.070      1
            300             0.130       0.040      1
            300             0.130       0.040      1
      SoilWat: SummerCona=3.5; SummerU=6; SummerDate=1-Nov; WinterCona=3.5; WinterU=6; WinterDate=1-Apr; DiffusConst=40; DiffusSlope=16; Salb=0.11; Cn2Bare=85; CnRed=0.8; CnCov=0.2
        Layer:
          Thickness (mm)  SWCON (0-1)
          150             0.160
          150             0.110
          150             0.140
          150             0.140
          150             0.110
          150             0.110
          150             0.100
          150             0.100
          150             0.100
          300             0.120
          300             0.100
      SoilOrganicMatter: RootCn=45; RootWt=1000; SoilCn=14.5; EnrACoeff=7.4; EnrBCoeff=0.2
        Layer:
          Thickness (mm)  OC (Total %)  FBiom (0-1)  FInert (0-1)
          150             0.490         0.050        0.390
          150             0.450         0.020        0.470
          150             0.280         0.010        0.520
          150             0.180         0.010        0.620
          150             0.140         0.010        0.740
          150             0.110         0.010        0.830
          150             0.090         0.010        0.930
          150             0.070         0.010        0.930
          150             0.060         0.010        0.930
          300             0.050         0.010        0.930
          300             0.030         0.010        0.930
      Analysis
        Layer:
          Thickness (mm)  PH (1:5 water)
          150             8.350
          150             8.520
          150             8.800
          150             8.950
          150             9
          150             9
          150             9
          150             9
          150             8.920
          300             8.970
          300             8.820
      Sample Initial nitrogen
        Layer:
          Thickness (mm)  NO3 (ppm)  NH4 (ppm)
          150             9          0.1
          150             11         0.1
          150             8          0.1
          150             6          0.1
          150             4          0.1
          150             3          0.1
          150             3          0.1
          150             3          0.1
          150             6          0.1
          300             4          0.1
          300             5          0.1
  simulation Sorghum_BW8_GxE_T1
    clock
      start_date = 26/09/1996  # Select the start date of the simulation
      end_date = 20/02/1997  # Select the end date of the simulation
    summaryfile
    metfile met: filename=BW8_GxE.met
    area paddock
      folder Manager folder
        manager Sow SkipRow on a fixed date
          # Sowing criteria
          date = 7/10/1996  # Enter sowing date (d/m/yyyy)
          # Sowing parameters
          crop = Sorghum  # Enter name of crop to sow
          density = 10  # Enter sowing density (plants/m2)
          depth = 0.5  # Enter sowing depth (mm)
          cultivar = M35-1  # Enter cultivar
          row_spacing = 0.5  # Enter row spacing (m)
          RowConfiguration = solid  # Enter skip row configuration
          ftn = 0  # Enter Fertile Tiller No.
          on start_of_day:
```
            if (paddock_is_fallow() = 1 and today = date('[date]')) then
              [crop] sow population =[density], sowing_depth = [depth], cultivar = [cultivar], row_spacing = [row_spacing], skip = [RowConfiguration], tiller_no_fertile = [ftn] ()
            endif
            if (paddock_is_fallow() = 0) then
               outputfile do_output
            endif
```
        manager Harvesting rule
          # Harvesting criteria
          crop = Sorghum  # Enter name of crop to harvest when ripe
          on end_of_day:
```
           if [crop].StageName = 'harvest_ripe' or [crop].plant_status = 'dead' then
              [crop]  harvest
              [crop]  end_crop
           endif
```
      irrigation
        automatic_irrigation = off  # switch
        asw_depth = 600  # Depth to which ASW is calculated. (mm)
        crit_fr_asw = 0.5  # Fraction of ASW below which irrigation is applied (0-1.0)
        irrigation_efficiency = 1  # Efficiency of the irrigation. (0-1.0)
        default_no3_conc = 0.0  # Nitrate concentration (ppm N)
        default_nh4_conc = 0.0  # Ammonium concentration (ppm N)
        default_cl_conc = 0.0  # Chloride concentration (ppm Cl)
      fertiliser
      operations
        19/11/1996  Irrigation apply amount = 28
        28/11/1996  Irrigation apply amount = 58
        10/12/1996  Irrigation apply amount = 49
        24/12/1996  Irrigation apply amount = 57
        7/01/1997  Irrigation apply amount = 67
        25/09/1996  fertiliser apply amount = 20 (kg/ha), depth = 50 (mm), type = NO3_N ()
        17/10/1996  fertiliser apply amount = 99 (kg/ha), depth = 50 (mm), type = NO3_N ()
        6/11/1996  fertiliser apply amount = 59 (kg/ha), depth = 50 (mm), type = NO3_N ()
        10/12/1996  fertiliser apply amount = 59 (kg/ha), depth = 50 (mm), type = NO3_N ()
      outputfile -> /BW8_GxE/BW8/outputfile: filename=Sorghum_BW8_GxE_T1.out; title=Sorghum_BW8_GxE_T1
        variables My Variables -> /BW8_GxE/BW8/outputfile/My Variables
        events My Variables Events -> /BW8_GxE/BW8/outputfile/My Variables Events
      sorghum -> /BW8_GxE/BW8/sorghum
      soil IC_BW8 -> /BW8_GxE/BW8/IC_BW8
  simulation Sorghum_BW8_GxE_T2
    clock
      start_date = 26/09/1996  # Select the start date of the simulation
      end_date = 20/02/1997  # Select the end date of the simulation
    summaryfile
    metfile met: filename=BW8_GxE.met
    area paddock
      folder Manager folder
        manager Sow SkipRow on a fixed date
          # Sowing criteria
          date = 7/10/1996  # Enter sowing date (d/m/yyyy)
          # Sowing parameters
          crop = Sorghum  # Enter name of crop to sow
          density = 10  # Enter sowing density (plants/m2)
          depth = 0.5  # Enter sowing depth (mm)
          cultivar = CSH13R  # Enter cultivar
          row_spacing = 0.5  # Enter row spacing (m)
          RowConfiguration = solid  # Enter skip row configuration
          ftn = 0  # Enter Fertile Tiller No.
          on start_of_day:
          script: same as in Sorghum_BW8_GxE_T1.paddock.Manager folder.Sow SkipRow on a fixed date
        manager Harvesting rule
          # Harvesting criteria
          crop = Sorghum  # Enter name of crop to harvest when ripe
          on end_of_day:
          script: same as in Sorghum_BW8_GxE_T1.paddock.Manager folder.Harvesting rule
      irrigation
        automatic_irrigation = off  # switch
        asw_depth = 600.0  # Depth to which ASW is calculated. (mm)
        crit_fr_asw = 0.5  # Fraction of ASW below which irrigation is applied (0-1.0)
        irrigation_efficiency = 1.0  # Efficiency of the irrigation. (0-1.0)
        default_no3_conc = 0.0  # Nitrate concentration (ppm N)
        default_nh4_conc = 0.0  # Ammonium concentration (ppm N)
        default_cl_conc = 0.0  # Chloride concentration (ppm Cl)
      fertiliser
      operations: same as Sorghum_BW8_GxE_T1.paddock.operations
      outputfile -> /BW8_GxE/BW8/outputfile: filename=Sorghum_BW8_GxE_T2.out; title=Sorghum_BW8_GxE_T2
        variables My Variables -> /BW8_GxE/BW8/outputfile/My Variables
        events My Variables Events -> /BW8_GxE/BW8/outputfile/My Variables Events
      sorghum -> /BW8_GxE/BW8/sorghum
      soil IC_BW8 -> /BW8_GxE/BW8/IC_BW8
  simulation Sorghum_BW8_GxE_T3
    clock
      start_date = 26/09/1996  # Select the start date of the simulation
      end_date = 20/02/1997  # Select the end date of the simulation
    summaryfile
    metfile met: filename=BW8_GxE.met
    area paddock
      folder Manager folder
        manager Sow SkipRow on a fixed date
          # Sowing criteria
          date = 7/10/1996  # Enter sowing date (d/m/yyyy)
          # Sowing parameters
          crop = Sorghum  # Enter name of crop to sow
          density = 10  # Enter sowing density (plants/m2)
          depth = 0.5  # Enter sowing depth (mm)
          cultivar = ATX623xRTX430  # Enter cultivar
          row_spacing = 0.5  # Enter row spacing (m)
          RowConfiguration = solid  # Enter skip row configuration
          ftn = 0  # Enter Fertile Tiller No.
          on start_of_day:
          script: same as in Sorghum_BW8_GxE_T1.paddock.Manager folder.Sow SkipRow on a fixed date
        manager Harvesting rule
          # Harvesting criteria
          crop = Sorghum  # Enter name of crop to harvest when ripe
          on end_of_day:
          script: same as in Sorghum_BW8_GxE_T1.paddock.Manager folder.Harvesting rule
      irrigation: same as Sorghum_BW8_GxE_T2.paddock.Irrigation
      fertiliser
      operations: same as Sorghum_BW8_GxE_T1.paddock.operations
      outputfile -> /BW8_GxE/BW8/outputfile: filename=Sorghum_BW8_GxE_T3.out; title=Sorghum_BW8_GxE_T3
        variables My Variables -> /BW8_GxE/BW8/outputfile/My Variables
        events My Variables Events -> /BW8_GxE/BW8/outputfile/My Variables Events
      sorghum -> /BW8_GxE/BW8/sorghum
      soil IC_BW8 -> /BW8_GxE/BW8/IC_BW8
  simulation Sorghum_BW8_GxE_T4
    clock
      start_date = 26/09/1996  # Select the start date of the simulation
      end_date = 20/02/1997  # Select the end date of the simulation
    summaryfile
    metfile met: filename=BW8_GxE.met
    area paddock
      folder Manager folder
        manager Sow SkipRow on a fixed date
          # Sowing criteria
          date = 7/10/1996  # Enter sowing date (d/m/yyyy)
          # Sowing parameters
          crop = Sorghum  # Enter name of crop to sow
          density = 10  # Enter sowing density (plants/m2)
          depth = 0.5  # Enter sowing depth (mm)
          cultivar = QL41xQL36  # Enter cultivar
          row_spacing = 0.5  # Enter row spacing (m)
          RowConfiguration = solid  # Enter skip row configuration
          ftn = 0  # Enter Fertile Tiller No.
          on start_of_day:
          script: same as in Sorghum_BW8_GxE_T1.paddock.Manager folder.Sow SkipRow on a fixed date
        manager Harvesting rule
          # Harvesting criteria
          crop = Sorghum  # Enter name of crop to harvest when ripe
          on end_of_day:
          script: same as in Sorghum_BW8_GxE_T1.paddock.Manager folder.Harvesting rule
      irrigation: same as Sorghum_BW8_GxE_T2.paddock.Irrigation
      fertiliser
      operations: same as Sorghum_BW8_GxE_T1.paddock.operations
      outputfile -> /BW8_GxE/BW8/outputfile: filename=Sorghum_BW8_GxE_T4.out; title=Sorghum_BW8_GxE_T4
        variables My Variables -> /BW8_GxE/BW8/outputfile/My Variables
        events My Variables Events -> /BW8_GxE/BW8/outputfile/My Variables Events
      sorghum -> /BW8_GxE/BW8/sorghum
      soil IC_BW8 -> /BW8_GxE/BW8/IC_BW8
  simulation Sorghum_BW8_GxE_T5
    clock
      start_date = 26/09/1996  # Select the start date of the simulation
      end_date = 20/02/1997  # Select the end date of the simulation
    summaryfile
    metfile met: filename=BW8_GxE.met
    area paddock
      folder Manager folder: same as Sorghum_BW8_GxE_T1.paddock.Manager folder
      irrigation: same as Sorghum_BW8_GxE_T1.paddock.Irrigation
      fertiliser
      operations
        25/09/1996  fertiliser apply amount = 20 (kg/ha), depth = 50 (mm), type = NO3_N ()
        17/10/1996  fertiliser apply amount = 99 (kg/ha), depth = 50 (mm), type = NO3_N ()
      outputfile -> /BW8_GxE/BW8/outputfile: filename=Sorghum_BW8_GxE_T5.out; title=Sorghum_BW8_GxE_T5
        variables My Variables -> /BW8_GxE/BW8/outputfile/My Variables
        events My Variables Events -> /BW8_GxE/BW8/outputfile/My Variables Events
      sorghum -> /BW8_GxE/BW8/sorghum
      soil IC_BW8 -> /BW8_GxE/BW8/IC_BW8
  simulation Sorghum_BW8_GxE_T6
    clock
      start_date = 26/09/1996  # Select the start date of the simulation
      end_date = 20/02/1997  # Select the end date of the simulation
    summaryfile
    metfile met: filename=BW8_GxE.met
    area paddock
      folder Manager folder: same as Sorghum_BW8_GxE_T2.paddock.Manager folder
      manager Calculator
        on init:
```
 head_wt = 0
root_n = 0
head_n = 0
leaf_n = 0
sd = 0
```
        on end_of_day:
```
 [cr]head_wt = dw_green(4)[cr]root_n = n_green(1)[cr]head_n = n_green(4)[cr]leaf_n = n_green(2)[cr][cr]if (sw_demand > 0) then[cr]   sd = sw_supply / sw_demand[cr]else[cr]   sd = 1[cr]endif[cr][cr]if (sd > 1) then[cr]   sd = 1[cr]endif[cr]
```
      irrigation: same as Sorghum_BW8_GxE_T2.paddock.Irrigation
      fertiliser
      operations
        25/09/1996  fertiliser apply amount = 20 (kg/ha), depth = 50 (mm), type = NO3_N ()
        17/10/1996  fertiliser apply amount = 99 (kg/ha), depth = 50 (mm), type = NO3_N ()
      outputfile -> /BW8_GxE/BW8/outputfile: filename=Sorghum_BW8_GxE_T6.out; title=Sorghum_BW8_GxE_T6
        variables My Variables -> /BW8_GxE/BW8/outputfile/My Variables
        events My Variables Events -> /BW8_GxE/BW8/outputfile/My Variables Events
      sorghum -> /BW8_GxE/BW8/sorghum
      soil IC_BW8 -> /BW8_GxE/BW8/IC_BW8
  simulation Sorghum_BW8_GxE_T7
    clock
      start_date = 26/09/1996  # Select the start date of the simulation
      end_date = 20/02/1997  # Select the end date of the simulation
    summaryfile
    metfile met: filename=BW8_GxE.met
    area paddock
      folder Manager folder: same as Sorghum_BW8_GxE_T3.paddock.Manager folder
      irrigation: same as Sorghum_BW8_GxE_T2.paddock.Irrigation
      fertiliser
      operations
        25/09/1996  fertiliser apply amount = 20 (kg/ha), depth = 50 (mm), type = NO3_N ()
        17/10/1996  fertiliser apply amount = 99 (kg/ha), depth = 50 (mm), type = NO3_N ()
      outputfile -> /BW8_GxE/BW8/outputfile: filename=Sorghum_BW8_GxE_T7.out; title=Sorghum_BW8_GxE_T7
        variables My Variables -> /BW8_GxE/BW8/outputfile/My Variables
        events My Variables Events -> /BW8_GxE/BW8/outputfile/My Variables Events
      sorghum -> /BW8_GxE/BW8/sorghum
      soil IC_BW8 -> /BW8_GxE/BW8/IC_BW8
  simulation Sorghum_BW8_GxE_T8
    clock
      start_date = 26/09/1996  # Select the start date of the simulation
      end_date = 20/02/1997  # Select the end date of the simulation
    summaryfile
    metfile met: filename=BW8_GxE.met
    area paddock
      folder Manager folder: same as Sorghum_BW8_GxE_T4.paddock.Manager folder
      irrigation: same as Sorghum_BW8_GxE_T2.paddock.Irrigation
      fertiliser
      operations
        25/09/1996  fertiliser apply amount = 20 (kg/ha), depth = 50 (mm), type = NO3_N ()
        17/10/1996  fertiliser apply amount = 99 (kg/ha), depth = 50 (mm), type = NO3_N ()
      outputfile -> /BW8_GxE/BW8/outputfile: filename=Sorghum_BW8_GxE_T8.out; title=Sorghum_BW8_GxE_T8
        variables My Variables -> /BW8_GxE/BW8/outputfile/My Variables
        events My Variables Events -> /BW8_GxE/BW8/outputfile/My Variables Events
      sorghum -> /BW8_GxE/BW8/sorghum
      soil IC_BW8 -> /BW8_GxE/BW8/IC_BW8
  simulation Sorghum_BW8_GxE_T9
    clock
      start_date = 26/09/1996  # Select the start date of the simulation
      end_date = 20/02/1997  # Select the end date of the simulation
    summaryfile
    metfile met: filename=BW8_GxE.met
    area paddock
      folder Manager folder: same as Sorghum_BW8_GxE_T1.paddock.Manager folder
      irrigation: same as Sorghum_BW8_GxE_T2.paddock.Irrigation
      fertiliser
      operations
        25/09/1996  fertiliser apply amount = 20 (kg/ha), depth = 50 (mm), type = NO3_N ()
      outputfile -> /BW8_GxE/BW8/outputfile: filename=Sorghum_BW8_GxE_T9.out; title=Sorghum_BW8_GxE_T9
        variables My Variables -> /BW8_GxE/BW8/outputfile/My Variables
        events My Variables Events -> /BW8_GxE/BW8/outputfile/My Variables Events
      sorghum -> /BW8_GxE/BW8/sorghum
      soil IC_BW8 -> /BW8_GxE/BW8/IC_BW8
  simulation Sorghum_BW8_GxE_T10
    clock
      start_date = 26/09/1996  # Select the start date of the simulation
      end_date = 20/02/1997  # Select the end date of the simulation
    summaryfile
    metfile met: filename=BW8_GxE.met
    area paddock
      folder Manager folder: same as Sorghum_BW8_GxE_T2.paddock.Manager folder
      irrigation: same as Sorghum_BW8_GxE_T2.paddock.Irrigation
      fertiliser
      operations
        25/09/1996  fertiliser apply amount = 20 (kg/ha), depth = 50 (mm), type = NO3_N ()
      outputfile -> /BW8_GxE/BW8/outputfile: filename=Sorghum_BW8_GxE_T10.out; title=Sorghum_BW8_GxE_T10
        variables My Variables -> /BW8_GxE/BW8/outputfile/My Variables
        events My Variables Events -> /BW8_GxE/BW8/outputfile/My Variables Events
      sorghum -> /BW8_GxE/BW8/sorghum
      soil IC_BW8 -> /BW8_GxE/BW8/IC_BW8
  simulation Sorghum_BW8_GxE_T11
    clock
      start_date = 26/09/1996  # Select the start date of the simulation
      end_date = 20/02/1997  # Select the end date of the simulation
    summaryfile
    metfile met: filename=BW8_GxE.met
    area paddock
      folder Manager folder: same as Sorghum_BW8_GxE_T3.paddock.Manager folder
      irrigation: same as Sorghum_BW8_GxE_T2.paddock.Irrigation
      fertiliser
      operations
        25/09/1996  fertiliser apply amount = 20 (kg/ha), depth = 50 (mm), type = NO3_N ()
      outputfile -> /BW8_GxE/BW8/outputfile: filename=Sorghum_BW8_GxE_T11.out; title=Sorghum_BW8_GxE_T11
        variables My Variables -> /BW8_GxE/BW8/outputfile/My Variables
        events My Variables Events -> /BW8_GxE/BW8/outputfile/My Variables Events
      sorghum -> /BW8_GxE/BW8/sorghum
      soil IC_BW8 -> /BW8_GxE/BW8/IC_BW8
  simulation Sorghum_BW8_GxE_T12
    clock
      start_date = 26/09/1996  # Select the start date of the simulation
      end_date = 20/02/1997  # Select the end date of the simulation
    summaryfile
    metfile met: filename=BW8_GxE.met
    area paddock
      folder Manager folder: same as Sorghum_BW8_GxE_T4.paddock.Manager folder
      irrigation: same as Sorghum_BW8_GxE_T2.paddock.Irrigation
      fertiliser
      operations
        25/09/1996  fertiliser apply amount = 20 (kg/ha), depth = 50 (mm), type = NO3_N ()
      outputfile -> /BW8_GxE/BW8/outputfile: filename=Sorghum_BW8_GxE_T12.out; title=Sorghum_BW8_GxE_T12
        variables My Variables -> /BW8_GxE/BW8/outputfile/My Variables
        events My Variables Events -> /BW8_GxE/BW8/outputfile/My Variables Events
      sorghum -> /BW8_GxE/BW8/sorghum
      soil IC_BW8 -> /BW8_GxE/BW8/IC_BW8
