folder LE14: version=37; creator=Apsim 7.9-r4092
  simulation Sorghum_LE14_Buster
    clock
      start_date = 5/09/1996  # Select the start date of the simulation
      end_date = 19/02/1997  # Select the end date of the simulation
    summaryfile
    metfile met: filename=LE14.met
    area paddock
      outputfile: filename=Sorghum_LE14_Buster.out; title=Sorghum_LE14_Buster
        variables My Variables
          variable:
            DaysAfterSowing as Das
            Stage
            Biomass units g/m^2 as BiomassWt
            GrainSize
            GrainNo
            MaxLAI as LaiAnth
            RootGreenWt
            LeafGreenWt
            StemGreenWt
            RachisGreenWt
            GrainGreenWt
            biomass_n
            RootGreenN
            LeafGreenN
            StemGreenN
            RachisGreenN
            GrainGreenN
            GrainGreenNConc
            LeafNo
            ESW
            no3() as NO3
            SLN
            sw()
            HI
            TPLA
            SPLA
            Yield
            Biomass
        events My Variables Events: event=harvesting
      folder Manager folder
        manager Sow SkipRow on a fixed date
          # Sowing criteria
          date = 11/10/1996  # Enter sowing date (d/m/yyyy)
          # Sowing parameters
          crop = Sorghum  # Enter name of crop to sow
          density = 10  # Enter sowing density (plants/m2)
          depth = 20  # Enter sowing depth (mm)
          cultivar = Buster  # Enter cultivar
          row_spacing = 0.5  # Enter row spacing (m)
          RowConfiguration = solid  # Enter skip row configuration
          ftn = 0.4  # Enter Fertile Tiller No.
          on start_of_day:
```
            if (paddock_is_fallow() = 1 and today = date('[date]')) then
              [crop] sow plants =[density], sowing_depth = [depth], cultivar = [cultivar], row_spacing = [row_spacing], skip = [RowConfiguration], tiller_no_fertile = [ftn] ()
            endif
```
        manager Harvesting rule
          # Harvesting criteria
          crop = Sorghum  # Enter name of crop to harvest when ripe
          on end_of_day:
```
           if [crop].StageName = 'harvest_ripe' or [crop].plant_status = 'dead' then
              [crop]  harvest
              [crop]  end_crop
           endif
```
      Soil GLH Field: LocalName=Cooper Lab; Site=Cooper Lab; Region=Gatton
        SoilType = GLHSoil  # Soil description
        NearestTown = Unknown
        NaturalVegetation = Unknown
        Water
          Thickness  BD     AirDry  LL15   DUL    SAT
          200        1.320  0.100   0.300  0.410  0.460
          200        1.300  0.150   0.300  0.430  0.480
          200        1.230  0.280   0.350  0.460  0.510
          300        1.270  0.280   0.320  0.440  0.490
          300        1.370  0.280   0.290  0.400  0.450
          300        1.350  0.300   0.310  0.410  0.460
          300        1.350  0.300   0.310  0.380  0.430
          SoilCrop Sorghum: LL=[0.300, 0.300, 0.350, 0.320, 0.290, 0.310, 0.310]; KL=[0.080, 0.080, 0.080, 0.080, 0.060, 0.040, 0.020]; XF=[1, 1, 1, 1, 1, 1, 1]
        SoilWater: SummerCona=3.5; SummerU=6; SummerDate=1-Nov; WinterCona=3.5; WinterU=6; WinterDate=1-Apr; DiffusConst=88; DiffusSlope=35.4; Salb=0.13; CN2Bare=91; CNRed=20; CNCov=0.8; Thickness=[200, 200, 200, 300, 300, 300, 300]; SWCON=[0.500, 0.500, 0.500, 0.500, 0.500, 0.500, 0.500]
        SoilOrganicMatter: RootCN=30; RootWt=1500; SoilCN=12.5; EnrACoeff=7.4; EnrBCoeff=0.2
          Thickness  OC     FBiom  FInert
          200        1.300  0.030  0.310
          200        0.650  0.010  0.380
          200        0.320  0      0.470
          300        0.110  0      0.700
          300        0.110  0      0.900
          300        0.110  0      0.950
          300        0.110  0      0.950
        Analysis: Thickness=[200, 200, 200, 300, 300, 300, 300]; PH=[8.200, 8.700, 8.900, 8.100, 8, 8, 8]
        Sample Initial nitrogen
          Thickness  NO3     NH4
          200        11.624  0.100
          200        5.732   0.100
          200        2.974   0.100
          300        1.645   0.100
          300        1.902   0.100
          300        2.246   0.100
          300        1.942   0.100
        Sample Initial water: Thickness=[200, 200, 200, 300, 300, 300, 300]; SW=[0.385, 0.470, 0.467, 0.459, 0.394, 0.399, 0.380]
      irrigation
        automatic_irrigation = on  # switch
        asw_depth = 1800  # Depth to which ASW is calculated. (mm)
        crit_fr_asw = 1.0  # Fraction of ASW below which irrigation is applied (0-1.0)
        irrigation_efficiency = 1.0  # Efficiency of the irrigation. (0-1.0)
        default_no3_conc = 0.0  # Nitrate concentration (ppm N)
        default_nh4_conc = 0.0  # Ammonium concentration (ppm N)
        default_cl_conc = 0.0  # Chloride concentration (ppm Cl)
      fertiliser
      operations
        6/09/1996  fertiliser apply amount = 0 (kg/ha), depth = 50 (mm), type = NO3_N ()
        6/09/1996  fertiliser apply amount = 126 (kg/ha), depth = 50 (mm), type = NO3_N ()
        16/09/1996  fertiliser apply amount = 105 (kg/ha), depth = 50 (mm), type = NO3_N ()
        15/11/1996  fertiliser apply amount = 73 (kg/ha), depth = 50 (mm), type = NO3_N ()
        31/12/1996  fertiliser apply amount = 59 (kg/ha), depth = 50 (mm), type = NO3_N ()
      sorghum
  simulation Sorghum_LE14_M35-1
    clock
      start_date = 5/09/1996  # Select the start date of the simulation
      end_date = 19/02/1997  # Select the end date of the simulation
    summaryfile
    metfile met: filename=LE14.met
    area paddock
      folder Manager folder
        manager Sow SkipRow on a fixed date
          # Sowing criteria
          date = 11/10/1996  # Enter sowing date (d/m/yyyy)
          # Sowing parameters
          crop = Sorghum  # Enter name of crop to sow
          density = 10  # Enter sowing density (plants/m2)
          depth = 20  # Enter sowing depth (mm)
          cultivar = M35-1  # Enter cultivar
          row_spacing = 0.5  # Enter row spacing (m)
          RowConfiguration = solid  # Enter skip row configuration
          ftn = 0.1  # Enter Fertile Tiller No.
          on start_of_day:
          script: same as in Sorghum_LE14_Buster.paddock.Manager folder.Sow SkipRow on a fixed date
        manager Harvesting rule
          # Harvesting criteria
          crop = Sorghum  # Enter name of crop to harvest when ripe
          on end_of_day:
          script: same as in Sorghum_LE14_Buster.paddock.Manager folder.Harvesting rule
      Soil GLH Field: SoilType=GLHSoil; LocalName=Cooper Lab; Site=Cooper Lab; NearestTown=Unknown; Region=Gatton; NaturalVegetation=Unknown; Latitude=0; Longitude=0; YearOfSampling=0
        Water: same as Sorghum_LE14_Buster.paddock.GLH Field.Water
        SoilWater: same as Sorghum_LE14_Buster.paddock.GLH Field.SoilWater
        SoilOrganicMatter: same as Sorghum_LE14_Buster.paddock.GLH Field.SoilOrganicMatter
        Analysis: Thickness=[200, 200, 200, 300, 300, 300, 300]; PH=[8.200, 8.700, 8.900, 8.100, 8, 8, 8]
        Sample Initial nitrogen
          Thickness  NO3     NH4
          200        11.624  0.100
          200        5.732   0.100
          200        2.974   0.100
          300        1.645   0.100
          300        1.902   0.100
          300        2.246   0.100
          300        1.942   0.100
        Sample Initial water: Thickness=[200, 200, 200, 300, 300, 300, 300]; SW=[0.385, 0.470, 0.467, 0.459, 0.394, 0.399, 0.380]
      irrigation: same as Sorghum_LE14_Buster.paddock.Irrigation
      fertiliser
      operations: same as Sorghum_LE14_Buster.paddock.operations
      sorghum
  simulation Sorghum_LE14_QL41xQL36
    clock
      start_date = 5/09/1996  # Select the start date of the simulation
      end_date = 19/02/1997  # Select the end date of the simulation
    summaryfile
    metfile met: filename=LE14.met
    area paddock
      folder Manager folder
        manager Sow SkipRow on a fixed date
          # Sowing criteria
          date = 11/10/1996  # Enter sowing date (d/m/yyyy)
          # Sowing parameters
          crop = Sorghum  # Enter name of crop to sow
          density = 10  # Enter sowing density (plants/m2)
          depth = 20  # Enter sowing depth (mm)
          cultivar = QL41xQL36  # Enter cultivar
          row_spacing = 0.5  # Enter row spacing (m)
          RowConfiguration = solid  # Enter skip row configuration
          ftn = 0.4  # Enter Fertile Tiller No.
          on start_of_day:
          script: same as in Sorghum_LE14_Buster.paddock.Manager folder.Sow SkipRow on a fixed date
        manager Harvesting rule
          # Harvesting criteria
          crop = Sorghum  # Enter name of crop to harvest when ripe
          on end_of_day:
          script: same as in Sorghum_LE14_Buster.paddock.Manager folder.Harvesting rule
      Soil GLH Field: same as Sorghum_LE14_Buster.paddock.GLH Field
      irrigation: same as Sorghum_LE14_Buster.paddock.Irrigation
      fertiliser
      operations: same as Sorghum_LE14_Buster.paddock.operations
      sorghum
      outputfile -> /LE14/Sorghum_LE14_Buster/paddock/outputfile: filename=Sorghum_LE14_QL41xQL36.out; title=Sorghum_LE14_QL41xQL36
        variables My Variables -> /LE14/Sorghum_LE14_Buster/paddock/outputfile/My Variables
        events My Variables Events -> /LE14/Sorghum_LE14_Buster/paddock/outputfile/My Variables Events
