folder LE19: version=32
  folder shared
    irrigation
      automatic_irrigation = on  # switch
      asw_depth = 600.0  # Depth to which ASW is calculated. (mm)
      crit_fr_asw = 0.75  # Fraction of ASW below which irrigation is applied (0-1.0)
      irrigation_efficiency = 1.0  # Efficiency of the irrigation. (0-1.0)
      default_no3_conc = 0.0  # Nitrate concentration (ppm N)
      default_nh4_conc = 0.0  # Ammonium concentration (ppm N)
      default_cl_conc = 0.0  # Chloride concentration (ppm Cl)
    variables My Variables
      variable:
        today format dd/mm/yyyy as Date  # Date (dd/mm/yyyy)
        DaysAfterSowing as Das  # Total LAI
        Stage  # Senesced LAI
        Biomass  # Nitrogen in dead parts
        GreenWt  # Nitrogen concentration in the grain
        Biomass units g/m^2 as BiomassWt  # Grain Number
        RootGreenWt  # NO3
        LeafGreenWt  # Days after Sowing
        StemGreenWt  # Plant stage
        RachisGreenWt  # Biomass weight
        GrainGreenWt  # Weight of roots
        BiomassN  # Weight of stems
        RootGreenN  # Weight of leaf
        LeafGreenN  # Weight of leaf
        StemGreenN  # Weight of grain
        RachisGreenN  # N in total biomass
        GrainGreenN  # N in roots
        GrainGreenNConc  # N in stems
        GrainNo  # N in heads
        GrainSize
        LeafNo  # N in leaves
        LAI  # N in grain
        SLAI  # Water stress
        ESW  # number
        no3() as NO3  # Leaf area index
        SLN  # Extractable Soil Water (mm)
        WaterSD  # NO3 - layered (kg/ha)
        sw  # Specific leaf nitrogen
        HI
        TPLA
        SPLA
        biomass_n
    sorghum
      sorghumConstants standard: Water=WATER --------------------------------------------------
        crop_type = sorghum
        default_crop_class = plant
        stage_names = sowing germination emergence end_of_juvenile floral_initiation flag_leaf flowering start_grain_fill end_grain_fill maturity harvest_ripe end_crop
        stage_code = 1   2   3    4      5     6     7    8    9    10   11   12
        pesw_germ = 0
        shoot_lag = 15
        shoot_rate = 0.6
        twilight = -2.2
        x_temp = 11 30  42
        y_tt = 0  19   0
        x_temp_fm = 5.7 23.5
        y_tt_fm = 0   17.8
        SorghumCanopy = Canopy --------------------------------------------------
        leaf_no_at_emerg = 1
        leaf_no_seed = 4
        leaf_no_min = 10
        leaf_no_max = 40
        leaf_init_rate = 21.6
        leaf_app_rate1 = 41
        leaf_app_rate2 = 20
        leaf_no_rate_change = 3.5
        leaf_app_rate = 41
        rue = 0   0  1.25  1.25  1.25 1.25  1.25 1.25 1.25 1.25    0    0
        row_spacing_default = 750
        x_row_spacing = 0.20   0.50   1.00
        y_extinct_coef = 0.70   0.40   0.40
        x_ave_temp = 8 20 35 50
        y_stress_photo = 0  1  1  0
        leaf_no_correction = 1.52
        x_lai = 0.1    4
        y_lai_sla_max = 50000 25000
        lai_sla_min = 8000  8000
        sla_max = 45000
        sla_min = 8000
        initial_tpla = 200
        tiller_coef = 0.66
        tpla_inflection_ratio = 0.66
        height_max = 3500
        height_stem_slope = 250
        Biomass = Biomass --------------------------------------------------
        dm_leaf_init = 0.1
        dm_root_init = 0.1
        dm_stem_init = 0.1
        stem_trans_frac = 0.2
        leaf_trans_frac = 0.15
        retransRate = 0.15
        ratio_root_shoot = 0   0   1    1     0.33  0.33  0.087  0    0     0    0    0
        partition_rate_leaf = 0.006
        frac_stem2flower = 0.3
        grn_water_cont = 0.13
        GrainTempWindow = -150 50
        GrainTempOrdinals = 36 40
        Roots = ROOTS --------------------------------------------------
        root_depth_rate = 0 27.0  27.0  27.0 27.0  27.0   27.0   0      0       0    0    0
        x_sw_ratio = 0   0.25
        y_sw_fac_root = 0   1
        initial_root_depth = 50
        specific_root_length = 100000
        x_plant_rld = 0.0  0.1
        y_rel_root_rate = 1.0  1.0
        transp_eff_cf = 0.009 0.009 0.009 0.009 0.009 0.009  0.009  0.009  0.009  0.009   0.009   0.009
        svp_fract = 0.75
        x_sw_demand_ratio = 0.1 1.1
        y_swdef_leaf = 0   1
        x_sw_avail_ratio = 0 0.2 1.0
        y_swdef_pheno = 0 1.0 1.0
        Nitrogen = Nitrogen --------------------------------------------------
        no3_diffn_const = 2
        maxUptakeRate = 0.029
        initialRootNConc = 0.02
        targetRootNConc = 0.002
        initialLeafSLN = 1.5
        targetLeafSLN = 1.5
        newLeafSLN = 1
        senescedLeafSLN = 0.3
        initialStemNConc = 0.01
        x_stem_n = 3         5       7         10
        targetStemNConc = 0.055   0.016   0.01      0.005
        structStemNConc = 0.012  0.012   0.005   0.0015
        initialRachisNConc = 0
        targetRachisNConc = 0.01
        structRachisNConc = 0.003
        stemDilnNSlope = 0.0062
        stemDilnNInt = -0.001
        rachisDilnNSlope = 0.0062
        rachisDilnNInt = -0.001
        leafDilnNSlope = 0.0043
        leafDilnNInt = -0.0017
        grainFillRate = 0.001
        grainFillIntercept = 0.0000319
        grainFillSlope = 0.4026
        targetGrainNConc = 0.0175
        nUptakeCease = 570
        nSupplyFrac = 5
        Senescence = Senescence --------------------------------------------------
        dm_root_sen_frac = 0.002
        lai_sen_light = 4
        sen_light_slope = 0.008
        x_temp_senescence = 0.0 6.0
        y_senescence_fac = 1   0
        sen_rate_water = 0.05
        dead_detach_frac = 0 0 0 0 0
        dm_leaf_detach_frac = 0
        sen_light_time_const = 10
        sen_radn_crit = 2
        frost_kill = 1
        sen_water_time_const = 10
        sen_threshold = 0.25
        spla_slope = 81.5
        tt_emerg_limit = 150
        days_germ_limit = 40
        swdf_photo_limit = 99
        swdf_photo_rate = 0
        swdf_pheno_limit = 99
        x_weighted_temp = 55.0  60.0
        y_plant_death = 0.0   1.0
        stress_determinants = leaf stem grain
        Phosphorous = Phosphorous --------------------------------------------------
        yield_parts = grain
        retrans_parts = leaf stem  flower
        pfact_photo_slope = 2.5
        pfact_expansion_slope = 2.5
        pfact_pheno_slope = 6
        pfact_grain_slope = 20
        p_uptake_factor = 1.5
        x_p_stage_code = 3       4      5      6      7      8      10
        y_p_conc_max_leaf = 0.0059  0.0054 0.0040 0.0029 0.0026 0.0025 0.0022
        y_p_conc_min_leaf = 0.003   0.003  0.0029 0.0011 0.0011 0.0008 0.0006
        y_p_conc_sen_leaf = 0.0005  0.0005 0.0005 0.0005 0.0005 0.0005 0.0005
        y_p_conc_max_stem = 0.0057  0.0038 0.0037 0.0018 0.0016 0.0013 0.0013
        y_p_conc_min_stem = 0.003   0.003  0.002  0.0006 0.0006 0.0002 0.0002
        y_p_conc_sen_stem = 0.0002  0.0002 0.0002 0.0002 0.0002 0.0002 0.0002
        y_p_conc_max_root = 0.0010  0.0010 0.0010 0.0010 0.0010 0.0010 0.0010
        y_p_conc_min_root = 0.0010  0.0010 0.0010 0.0010 0.0010 0.0010 0.0010
        y_p_conc_sen_root = 0.0010  0.0010 0.0010 0.0010 0.0010 0.0010 0.0010
        y_p_conc_max_flower = 0.0057  0.0038 0.0037 0.0018 0.0016 0.0013 0.0013
        y_p_conc_min_flower = 0.003   0.003  0.002  0.0006 0.0006 0.0002 0.0002
        y_p_conc_sen_flower = 0.0002  0.0002 0.0002 0.0002 0.0002 0.0002 0.0002
        y_p_conc_max_grain = 0.001   0.001  0.001  0.001  0.052  0.0044  0.0034
        y_p_conc_min_grain = 0.001   0.001  0.001  0.001  0.001  0.0015  0.0015
        y_p_conc_sen_grain = 0.001   0.001  0.001  0.001  0.001  0.0015  0.0015
        y_p_conc_max_energy = 0.001   0.001  0.001  0.001  0.001  0.001  0.001
        y_p_conc_min_energy = 0.001   0.001  0.001  0.001  0.001  0.001  0.001
        y_p_conc_sen_energy = 0.001   0.001  0.001  0.001  0.001  0.001  0.001
        p_conc_init_leaf = 0.0059
        p_conc_init_stem = 0.0057
        p_conc_init_root = 0.01
        p_conc_init_flower = 0.0057
        p_conc_init_grain = 0.0052
        p_conc_init_energy = 0
        Bounds = Bounds --------------------------------------------------
        ll_ub = 1000
        kl_ub = 1
        minsw = 0.00001
        latitude_ub = 90
        latitude_lb = -90
        maxt_ub = 55
        maxt_lb = 0
        mint_ub = 40
        mint_lb = -10
        radn_ub = 50
        radn_lb = 1
        dlayer_ub = 1000
        dlayer_lb = 0
        dul_dep_ub = 1000
        dul_dep_lb = 0
        sw_dep_ub = 1000
        sw_dep_lb = 0
        sw_ub = 1
        sw_lb = 0
        no3_ub = 10000
        no3_lb = 0
        no3_min_ub = 10000
        no3_min_lb = 0
        nh4_ub = 10000
        nh4_lb = 0
        nh4_min_ub = 10000
        nh4_min_lb = 0
        head_grain_no_max_ub = 45000
        grain_gth_rate_ub = 20
        tt_emerg_to_endjuv_ub = 500
        pp_endjuv_to_init_ub = 200
        tt_flower_to_maturity_ub = 1000
        tt_maturity_to_ripe_ub = 1000
        tt_flower_to_start_grain_ub = 1000
        tt_flag_to_flower_ub = 1000
        x_co2_te_modifier = 350
        y_co2_te_modifier = 1
      sorghumGenotype Buster
        tt_emerg_to_endjuv = 100
        photoperiod_crit1 = 11.5
        photoperiod_crit2 = 13.5
        photoperiod_slope = 11.5
        tt_endjuv_to_init = 160
        tt_flag_to_flower = 170
        tt_flower_to_start_grain = 80
        tt_flower_to_maturity = 761
        tt_maturity_to_ripe = 1
        main_stem_coef = 2.9
        tpla_prod_coef = 0.018
        dm_per_seed = 0.00083
        x_stem_wt = 0    80
        y_height = 0  2000
        maxGFRate = 0.09
      sorghumGenotype QL41xQL36
        tt_emerg_to_endjuv = 100
        photoperiod_crit1 = 11.5
        photoperiod_crit2 = 13.5
        photoperiod_slope = 12.5
        tt_endjuv_to_init = 179
        tt_flag_to_flower = 170
        tt_flower_to_start_grain = 80
        tt_flower_to_maturity = 761
        tt_maturity_to_ripe = 1
        main_stem_coef = 2.9
        tpla_prod_coef = 0.018
        dm_per_seed = 0.00083
        x_stem_wt = 0    80
        y_height = 0  2000
        maxGFRate = 0.09
      sorghumGenotype M35-1
        tt_emerg_to_endjuv = 100
        photoperiod_crit1 = 11.5
        photoperiod_crit2 = 13.5
        photoperiod_slope = 61
        tt_endjuv_to_init = 252
        tt_flag_to_flower = 170
        tt_flower_to_start_grain = 80
        tt_flower_to_maturity = 761
        tt_maturity_to_ripe = 1
        main_stem_coef = 2.82
        tpla_prod_coef = 0.011
        dm_per_seed = 0.00142784
        x_stem_wt = 0    80
        y_height = 0  2000
        partition_rate_leaf = 0.018
        nUptakeCease = 10
        leaf_init_rate = 26.1
        targetLeafSLN = 1.2
        maxGFRate = 0.09
      sorghumGenotype CSH13R: tt_emerg_to_endjuv=100; photoperiod_crit1=11.5; photoperiod_crit2=13.5; photoperiod_slope=17; tt_endjuv_to_init=228; tt_flag_to_flower=170; tt_flower_to_start_grain=80; tt_flower_to_maturity=761; tt_maturity_to_ripe=1; main_stem_coef=2.95; tpla_prod_coef=0.014; dm_per_seed=0.0015; x_stem_wt=0    80; y_height=0  2000; rue=0   0  1.6  1.6  1.6 1.6  1.6 1.6 1.6 1.6    0    0; partition_rate_leaf=0.018; targetLeafSLN=1.2; leaf_init_rate=23.2
        maxGFRate = 0.09
      sorghumGenotype ATX623xRTX430
        tt_emerg_to_endjuv = 100
        photoperiod_crit1 = 11.5
        photoperiod_crit2 = 13.5
        photoperiod_slope = 13
        tt_endjuv_to_init = 202
        tt_flag_to_flower = 170
        tt_flower_to_start_grain = 80
        tt_flower_to_maturity = 761
        tt_maturity_to_ripe = 1
        main_stem_coef = 2.9
        tpla_prod_coef = 0.018
        dm_per_seed = 0.00083
        x_stem_wt = 0    80
        y_height = 0  2000
        maxGFRate = 0.09
  simulation Sorghum_LE19_T1
    clock
      start_date = 9/11/1998  # Select the start date of the simulation
      end_date = 7/03/1999  # Select the end date of the simulation
    summaryfile
    metfile met: filename=LE19.met
    area paddock
      outputfile: filename=Sorghum_LE19_T1.out; title=Sorghum_LE19_T1
        variables My Variables -> /LE19/shared/My Variables
      folder Manager folder
        manager Sow SkipRow on a fixed date
          # Sowing criteria
          date = 11/11/1998  # Enter sowing date (d/m/yyyy)
          # Sowing parameters
          crop = Sorghum  # Enter name of crop to sow
          density = 10  # Enter sowing density (plants/m2)
          depth = 30  # Enter sowing depth (mm)
          cultivar = Buster  # Enter cultivar
          row_spacing = 0.5  # Enter row spacing (m)
          RowConfiguration = solid  # Enter skip row configuration
          ftn = 0  # Enter Fertile Tiller No.
          on start_of_day:
```
            if (paddock_is_fallow() = 1 and today = date('[date]')) then
              [crop] sow population =[density], sowing_depth = [depth], cultivar = [cultivar], row_spacing = [row_spacing], skip = [RowConfiguration], tiller_no_fertile = [ftn] ()
            endif
            if (paddock_is_fallow() = 0) then
               outputfile do_output
            endif
```
        manager Harvesting rule
          # Harvesting criteria
          crop = Sorghum  # Enter name of crop to harvest when ripe
          on end_of_day:
```
           if [crop].StageName = 'harvest_ripe' or [crop].plant_status = 'dead' then
              [crop]  harvest
              [crop]  end_crop
           endif
```
      soil CooperLab: LocalName=Gatton CSIRO; Site=Gatton CSIRO; Region=SE Queensland
        SoilType = Gatton  # Soil description
        NearestTown = Unknown
        NaturalVegetation = Unknown
        InitWater Initial water
          PercentMethod: Percent=100; Distributed=filled from top
        Water
          Layer:
            Thickness (mm)  BD (g/cc)  AirDry (mm/mm)  LL15 (mm/mm)  DUL (mm/mm)  SAT (mm/mm)
            200             1.320      0.100           0.300         0.410        0.460
            200             1.300      0.150           0.300         0.430        0.480
            200             1.230      0.280           0.350         0.460        0.510
            300             1.270      0.280           0.320         0.440        0.490
            300             1.370      0.280           0.290         0.400        0.450
            300             1.350      0.300           0.310         0.410        0.460
            300             1.350      0.300           0.310         0.380        0.430
          SoilCrop Sorghum
            Layer:
              Thickness (mm)  LL (mm/mm)  KL (/day)  XF (0-1)
              200             0.300       0.080      1
              200             0.300       0.080      1
              200             0.350       0.080      1
              300             0.320       0.080      1
              300             0.290       0.060      1
              300             0.310       0.040      1
              300             0.310       0.020      1
        SoilWat: SummerCona=3.5; SummerU=6; SummerDate=1-Nov; WinterCona=3.5; WinterU=6; WinterDate=1-Apr; DiffusConst=88; DiffusSlope=35.4; Salb=0.13; Cn2Bare=91; CnRed=20; CnCov=0.8
          Layer:
            Thickness (mm)  SWCON (0-1)
            200             0.500
            200             0.500
            200             0.500
            300             0.500
            300             0.500
            300             0.500
            300             0.500
        SoilOrganicMatter: RootCn=30; RootWt=1500; SoilCn=12.5; EnrACoeff=7.4; EnrBCoeff=0.2
          Layer:
            Thickness (mm)  OC (Total %)  FBiom (0-1)  FInert (0-1)
            200             1.300         0.030        0.310
            200             0.650         0.010        0.380
            200             0.320         0            0.470
            300             0.110         0            0.700
            300             0.110         0            0.900
            300             0.110         0            0.950
            300             0.110         0            0.950
        Analysis
          Layer:
            Thickness (mm)  PH (1:5 water)
            200             7.700
            200             8.300
            200             8.400
            300             8.500
            300             8.500
            300             8.500
            300             8.600
        Sample Initial nitrogen
          Layer:
            Thickness (mm)  NO3 (ppm)  NH4 (ppm)
            200             8.581      0.100
            200             5.840      0.100
            200             1.684      0.100
            300             0.665      0.100
            300             0.363      0.100
            300             0.439      0.100
            300             0.582      0.100
      fertiliser
      operations
      irrigation -> /LE19/shared/Irrigation
        default_no3_conc = 0.0  # Nitrate concentration (ppm N)
        default_nh4_conc = 0.0  # Ammonium concentration (ppm N)
        default_cl_conc = 0.0  # Chloride concentration (ppm Cl)
      sorghum -> /LE19/shared/sorghum
  simulation Sorghum_LE19_T2
    clock
      start_date = 9/11/1998  # Select the start date of the simulation
      end_date = 7/03/1999  # Select the end date of the simulation
    summaryfile
    metfile met: filename=LE19.met
    area paddock
      outputfile: filename=Sorghum_LE19_T2.out; title=Sorghum_LE19_T2
        variables My Variables -> /LE19/shared/My Variables
      folder Manager folder
        manager Sow SkipRow on a fixed date
          # Sowing criteria
          date = 11/11/1998  # Enter sowing date (d/m/yyyy)
          # Sowing parameters
          crop = Sorghum  # Enter name of crop to sow
          density = 10  # Enter sowing density (plants/m2)
          depth = 30  # Enter sowing depth (mm)
          cultivar = Buster  # Enter cultivar
          row_spacing = 0.5  # Enter row spacing (m)
          RowConfiguration = solid  # Enter skip row configuration
          ftn = 0.2  # Enter Fertile Tiller No.
          on start_of_day:
          script: same as in Sorghum_LE19_T1.paddock.Manager folder.Sow SkipRow on a fixed date
        manager Harvesting rule
          # Harvesting criteria
          crop = Sorghum  # Enter name of crop to harvest when ripe
          on end_of_day:
          script: same as in Sorghum_LE19_T1.paddock.Manager folder.Harvesting rule
      soil CooperLab: LocalName=Gatton CSIRO; Site=Gatton CSIRO; Region=SE Queensland
        SoilType = Gatton  # Soil description
        NearestTown = Unknown
        NaturalVegetation = Unknown
        Water: same as Sorghum_LE19_T1.paddock.CooperLab.Water
        SoilWat: same as Sorghum_LE19_T1.paddock.CooperLab.SoilWat
        SoilOrganicMatter: same as Sorghum_LE19_T1.paddock.CooperLab.SoilOrganicMatter
        Analysis: same as Sorghum_LE19_T1.paddock.CooperLab.Analysis
        Sample Initial nitrogen: same as Sorghum_LE19_T1.paddock.CooperLab.Initial nitrogen
        Sample Initial water
          Layer:
            Thickness (mm)  SW (mm/mm)
            200             0.293
            200             0.388
            200             0.371
            300             0.315
            300             0.307
            300             0.350
            300             0.374
      fertiliser
      operations
        11/11/1998  fertiliser apply amount = 55 (kg/ha), depth = 50 (mm), type = NO3_N ()
      irrigation -> /LE19/shared/Irrigation
        default_no3_conc = 0.0  # Nitrate concentration (ppm N)
        default_nh4_conc = 0.0  # Ammonium concentration (ppm N)
        default_cl_conc = 0.0  # Chloride concentration (ppm Cl)
      sorghum -> /LE19/shared/sorghum
  simulation Sorghum_LE19_T3
    clock
      start_date = 9/11/1998  # Select the start date of the simulation
      end_date = 7/03/1999  # Select the end date of the simulation
    summaryfile
    metfile met: filename=LE19.met
    area paddock
      outputfile: filename=Sorghum_LE19_T3.out; title=Sorghum_LE19_T3
        variables My Variables -> /LE19/shared/My Variables
      folder Manager folder
        manager Sow SkipRow on a fixed date
          # Sowing criteria
          date = 11/11/1998  # Enter sowing date (d/m/yyyy)
          # Sowing parameters
          crop = sorghum  # Enter name of crop to sow
          density = 10  # Enter sowing density (plants/m2)
          depth = 30  # Enter sowing depth (mm)
          cultivar = Buster  # Enter cultivar
          row_spacing = 0.5  # Enter row spacing (m)
          RowConfiguration = solid  # Enter skip row configuration
          ftn = 0.3  # Enter Fertile Tiller No.
          on start_of_day:
          script: same as in Sorghum_LE19_T1.paddock.Manager folder.Sow SkipRow on a fixed date
        manager Harvesting rule
          # Harvesting criteria
          crop = Sorghum  # Enter name of crop to harvest when ripe
          on end_of_day:
          script: same as in Sorghum_LE19_T1.paddock.Manager folder.Harvesting rule
      soil CooperLab: same as Sorghum_LE19_T2.paddock.CooperLab
      fertiliser
      operations
        11/11/1998  fertiliser apply amount = 55 (kg/ha), depth = 50 (mm), type = NO3_N ()
        13/12/1998  fertiliser apply amount = 27 (kg/ha), depth = 50 (mm), type = NO3_N ()
        14/01/1999  fertiliser apply amount = 27 (kg/ha), depth = 50 (mm), type = NO3_N ()
      irrigation -> /LE19/shared/Irrigation
        default_no3_conc = 0.0  # Nitrate concentration (ppm N)
        default_nh4_conc = 0.0  # Ammonium concentration (ppm N)
        default_cl_conc = 0.0  # Chloride concentration (ppm Cl)
      sorghum -> /LE19/shared/sorghum
  simulation Sorghum_LE19_T4
    clock
      start_date = 9/11/1998  # Select the start date of the simulation
      end_date = 7/03/1999  # Select the end date of the simulation
    summaryfile
    metfile met: filename=LE19.met
    area paddock
      outputfile: filename=Sorghum_LE19_T4.out; title=Sorghum_LE19_T4
        variables My Variables -> /LE19/shared/My Variables
      folder Manager folder
        manager Sow SkipRow on a fixed date
          # Sowing criteria
          date = 11/11/1998  # Enter sowing date (d/m/yyyy)
          # Sowing parameters
          crop = Sorghum  # Enter name of crop to sow
          density = 10  # Enter sowing density (plants/m2)
          depth = 30  # Enter sowing depth (mm)
          cultivar = Buster  # Enter cultivar
          row_spacing = 0.5  # Enter row spacing (m)
          RowConfiguration = solid  # Enter skip row configuration
          ftn = 0.4  # Enter Fertile Tiller No.
          on start_of_day:
          script: same as in Sorghum_LE19_T1.paddock.Manager folder.Sow SkipRow on a fixed date
        manager Harvesting rule
          # Harvesting criteria
          crop = Sorghum  # Enter name of crop to harvest when ripe
          on end_of_day:
          script: same as in Sorghum_LE19_T1.paddock.Manager folder.Harvesting rule
      soil CooperLab: same as Sorghum_LE19_T2.paddock.CooperLab
      fertiliser
      operations
        11/11/1998  fertiliser apply amount = 55 (kg/ha), depth = 50 (mm), type = NO3_N ()
        13/12/1998  fertiliser apply amount = 55 (kg/ha), depth = 50 (mm), type = NO3_N ()
        14/01/1999  fertiliser apply amount = 55 (kg/ha), depth = 50 (mm), type = NO3_N ()
      irrigation -> /LE19/shared/Irrigation
        default_no3_conc = 0.0  # Nitrate concentration (ppm N)
        default_nh4_conc = 0.0  # Ammonium concentration (ppm N)
        default_cl_conc = 0.0  # Chloride concentration (ppm Cl)
      sorghum -> /LE19/shared/sorghum
  simulation Sorghum_LE19_T5
    clock
      start_date = 9/11/1998  # Select the start date of the simulation
      end_date = 7/03/1999  # Select the end date of the simulation
    summaryfile
    metfile met: filename=LE19.met
    area paddock
      outputfile: filename=Sorghum_LE19_T5.out; title=Sorghum_LE19_T5
        variables My Variables -> /LE19/shared/My Variables
      folder Manager folder
        manager Sow SkipRow on a fixed date
          # Sowing criteria
          date = 11/11/1998  # Enter sowing date (d/m/yyyy)
          # Sowing parameters
          crop = Sorghum  # Enter name of crop to sow
          density = 10  # Enter sowing density (plants/m2)
          depth = 30  # Enter sowing depth (mm)
          cultivar = CSH13R  # Enter cultivar
          row_spacing = 0.5  # Enter row spacing (m)
          RowConfiguration = solid  # Enter skip row configuration
          ftn = 0  # Enter Fertile Tiller No.
          on start_of_day:
          script: same as in Sorghum_LE19_T1.paddock.Manager folder.Sow SkipRow on a fixed date
        manager Harvesting rule
          # Harvesting criteria
          crop = Sorghum  # Enter name of crop to harvest when ripe
          on end_of_day:
          script: same as in Sorghum_LE19_T1.paddock.Manager folder.Harvesting rule
      soil CooperLab: same as Sorghum_LE19_T2.paddock.CooperLab
      fertiliser
      operations
      irrigation -> /LE19/shared/Irrigation
        default_no3_conc = 0.0  # Nitrate concentration (ppm N)
        default_nh4_conc = 0.0  # Ammonium concentration (ppm N)
        default_cl_conc = 0.0  # Chloride concentration (ppm Cl)
      sorghum -> /LE19/shared/sorghum
  simulation Sorghum_LE19_T6
    clock
      start_date = 9/11/1998  # Select the start date of the simulation
      end_date = 7/03/1999  # Select the end date of the simulation
    summaryfile
    metfile met: filename=LE19.met
    area paddock
      outputfile: filename=Sorghum_LE19_T6.out; title=Sorghum_LE19_T6
        variables My Variables -> /LE19/shared/My Variables
      folder Manager folder
        manager Sow SkipRow on a fixed date
          # Sowing criteria
          date = 11/11/1998  # Enter sowing date (d/m/yyyy)
          # Sowing parameters
          crop = Sorghum  # Enter name of crop to sow
          density = 10  # Enter sowing density (plants/m2)
          depth = 30  # Enter sowing depth (mm)
          cultivar = CSH13R  # Enter cultivar
          row_spacing = 0.5  # Enter row spacing (m)
          RowConfiguration = solid  # Enter skip row configuration
          ftn = 0.2  # Enter Fertile Tiller No.
          on start_of_day:
          script: same as in Sorghum_LE19_T1.paddock.Manager folder.Sow SkipRow on a fixed date
        manager Harvesting rule
          # Harvesting criteria
          crop = Sorghum  # Enter name of crop to harvest when ripe
          on end_of_day:
          script: same as in Sorghum_LE19_T1.paddock.Manager folder.Harvesting rule
      soil CooperLab: same as Sorghum_LE19_T2.paddock.CooperLab
      fertiliser
      operations
        11/11/1998  fertiliser apply amount = 55 (kg/ha), depth = 50 (mm), type = NO3_N ()
      irrigation -> /LE19/shared/Irrigation
        default_no3_conc = 0.0  # Nitrate concentration (ppm N)
        default_nh4_conc = 0.0  # Ammonium concentration (ppm N)
        default_cl_conc = 0.0  # Chloride concentration (ppm Cl)
      sorghum -> /LE19/shared/sorghum
  simulation Sorghum_LE19_T7
    clock
      start_date = 9/11/1998  # Select the start date of the simulation
      end_date = 7/03/1999  # Select the end date of the simulation
    summaryfile
    metfile met: filename=LE19.met
    area paddock
      outputfile: filename=Sorghum_LE19_T7.out; title=Sorghum_LE19_T7
        variables My Variables -> /LE19/shared/My Variables
      folder Manager folder
        manager Sow SkipRow on a fixed date
          # Sowing criteria
          date = 11/11/1998  # Enter sowing date (d/m/yyyy)
          # Sowing parameters
          crop = Sorghum  # Enter name of crop to sow
          density = 10  # Enter sowing density (plants/m2)
          depth = 30  # Enter sowing depth (mm)
          cultivar = CSH13R  # Enter cultivar
          row_spacing = 0.5  # Enter row spacing (m)
          RowConfiguration = solid  # Enter skip row configuration
          ftn = 0.3  # Enter Fertile Tiller No.
          on start_of_day:
          script: same as in Sorghum_LE19_T1.paddock.Manager folder.Sow SkipRow on a fixed date
        manager Harvesting rule
          # Harvesting criteria
          crop = Sorghum  # Enter name of crop to harvest when ripe
          on end_of_day:
          script: same as in Sorghum_LE19_T1.paddock.Manager folder.Harvesting rule
      soil CooperLab: same as Sorghum_LE19_T2.paddock.CooperLab
      fertiliser
      operations
        11/11/1998  fertiliser apply amount = 55 (kg/ha), depth = 50 (mm), type = NO3_N ()
        17/12/1998  fertiliser apply amount = 27 (kg/ha), depth = 50 (mm), type = NO3_N ()
        23/01/1999  fertiliser apply amount = 27 (kg/ha), depth = 50 (mm), type = NO3_N ()
      irrigation -> /LE19/shared/Irrigation
        default_no3_conc = 0.0  # Nitrate concentration (ppm N)
        default_nh4_conc = 0.0  # Ammonium concentration (ppm N)
        default_cl_conc = 0.0  # Chloride concentration (ppm Cl)
      sorghum -> /LE19/shared/sorghum
  simulation Sorghum_LE19_T8
    clock
      start_date = 9/11/1998  # Select the start date of the simulation
      end_date = 7/03/1999  # Select the end date of the simulation
    summaryfile
    metfile met: filename=LE19.met
    area paddock
      outputfile: filename=Sorghum_LE19_T8.out; title=Sorghum_LE19_T8
        variables My Variables -> /LE19/shared/My Variables
      folder Manager folder: same as Sorghum_LE19_T7.paddock.Manager folder
      soil CooperLab: same as Sorghum_LE19_T2.paddock.CooperLab
      fertiliser
      operations
        11/11/1998  fertiliser apply amount = 55 (kg/ha), depth = 50 (mm), type = NO3_N ()
        17/12/1998  fertiliser apply amount = 55 (kg/ha), depth = 50 (mm), type = NO3_N ()
        23/01/1999  fertiliser apply amount = 55 (kg/ha), depth = 50 (mm), type = NO3_N ()
      irrigation -> /LE19/shared/Irrigation
        default_no3_conc = 0.0  # Nitrate concentration (ppm N)
        default_nh4_conc = 0.0  # Ammonium concentration (ppm N)
        default_cl_conc = 0.0  # Chloride concentration (ppm Cl)
      sorghum -> /LE19/shared/sorghum
