folder simulations: version=32
  memo
    Simulations numbered as per Table 2. "Datasets used for model development" in:

    Keating, B.A., Robertson, M.J., Muchow, R.C. and Huth, N.I. (1999). Modelling sugarcane production systems I. Development and performance of the sugarcane module.
    Field Crops Research, 61: 253-271.

    Datasets 4 and 17 were not included in simulations as they were not in original files
    Dataset 18 was not included as irrigation records were missing.
  simulation 1) Harwood 1993-94 Q117 P
    metfile met: filename=Harwood.met
    clock
      start_date = 21/09/1993  # Enter the start date of the simulation
      end_date = 29/09/1995  # Enter the end date of the simulation
    summaryfile
    area paddock
      folder Manager folder
        manager Harwood man
          on init:
```
samp=0
```
          on start_of_day:
```
! Set trickle irrigation depth
if daysaftersowing=2 then
   'Harwood Water' set irrigation_depth=300(mm)
endif

! Observed sampling dates
samp=0
if (year = 1993 and day = 336) or
   (year = 1994 and (day = 18 or day = 54 or day = 87 or day = 123 or day = 186
    or day = 227 or day = 262 or day = 298 or day = 349)) then
    samp = 1
endif

! Simulation info
site='Harwood'
season='1993-94'
treat=5
```
      operations
        21/09/1993  sugar sow population=10, sowing_depth= 150, cultivar= Q117_fum, ratoon= 0
        21/09/1993  fertiliser apply amount = 300 (kg/ha), depth = 50 (mm), type = urea_n ()
        21/09/1993  irrigation apply amount = 50 (mm)
        11/11/1993  fertiliser apply amount = 30 (kg/ha), depth = 300 (mm), type = no3_n ()  ! fertigation
        11/12/1993  fertiliser apply amount = 30 (kg/ha), depth = 300 (mm), type = no3_n ()  ! fertigation
        22/12/1993  irrigation apply amount = 5.49 (mm) ! trickle
        23/12/1993  irrigation apply amount = 5.14 (mm) ! trickle
        24/12/1993  irrigation apply amount = 3.04 (mm) ! trickle
        25/12/1993  irrigation apply amount = 3.04 (mm) ! trickle
        26/12/1993  irrigation apply amount = 3.04 (mm) ! trickle
        27/12/1993  irrigation apply amount = 3.04 (mm) ! trickle
        28/12/1993  irrigation apply amount = 3.04 (mm) ! trickle
        29/12/1993  irrigation apply amount = 3.04 (mm) ! trickle
        30/12/1993  irrigation apply amount = 3.04 (mm) ! trickle
        31/12/1993  irrigation apply amount = 3.04 (mm) ! trickle
        1/01/1994  irrigation apply amount = 3.04 (mm) ! trickle
        2/01/1994  irrigation apply amount = 3.04 (mm) ! trickle
        3/01/1994  irrigation apply amount = 3.04 (mm) ! trickle
        4/01/1994  irrigation apply amount = 3.04 (mm) ! trickle
        6/01/1994  irrigation apply amount = 3.04 (mm) ! trickle
        7/01/1994  irrigation apply amount = 7.1 (mm) ! trickle
        8/01/1994  irrigation apply amount = 6.84 (mm) ! trickle
        9/01/1994  irrigation apply amount = 3.87 (mm) ! trickle
        10/01/1994  fertiliser apply amount = 30 (kg/ha), depth = 300 (mm), type = no3_n ()  ! fertigation
        10/01/1994  irrigation apply amount = 3.87 (mm) ! trickle
        11/01/1994  irrigation apply amount = 3.34 (mm) ! trickle
        12/01/1994  irrigation apply amount = 11.27 (mm) ! trickle
        13/01/1994  irrigation apply amount = 10.01 (mm) ! trickle
        14/01/1994  irrigation apply amount = 10.01 (mm) ! trickle
        15/01/1994  irrigation apply amount = 10.43 (mm) ! trickle
        16/01/1994  irrigation apply amount = 10.43 (mm) ! trickle
        17/01/1994  irrigation apply amount = 10.43 (mm) ! trickle
        18/01/1994  irrigation apply amount = 11.08 (mm) ! trickle
        19/01/1994  irrigation apply amount = 8.02 (mm) ! trickle
        20/01/1994  irrigation apply amount = 8.02 (mm) ! trickle
        26/01/1994  irrigation apply amount = 8.1 (mm) ! trickle
        27/01/1994  irrigation apply amount = 8.1 (mm) ! trickle
        28/01/1994  irrigation apply amount = 8.1 (mm) ! trickle
        29/01/1994  irrigation apply amount = 6.77 (mm) ! trickle
        30/01/1994  irrigation apply amount = 6.77 (mm) ! trickle
        31/01/1994  irrigation apply amount = 6.77 (mm) ! trickle
        1/02/1994  irrigation apply amount = 6.77 (mm) ! trickle
        2/02/1994  irrigation apply amount = 3.17 (mm) ! trickle
        3/02/1994  irrigation apply amount = 3.17 (mm) ! trickle
        4/02/1994  irrigation apply amount = 3.17 (mm) ! trickle
        5/02/1994  irrigation apply amount = 3.17 (mm) ! trickle
        6/02/1994  irrigation apply amount = 3.17 (mm) ! trickle
        7/02/1994  irrigation apply amount = 3.37 (mm) ! trickle
        8/02/1994  irrigation apply amount = 3.37 (mm) ! trickle
        9/02/1994  fertiliser apply amount = 30 (kg/ha), depth = 300 (mm), type = no3_n ()  ! fertigation
        9/02/1994  irrigation apply amount = 3.37 (mm) ! trickle
        10/02/1994  irrigation apply amount = 4.81 (mm) ! trickle
        11/02/1994  irrigation apply amount = 4.81 (mm) ! trickle
        12/02/1994  irrigation apply amount = 4.81 (mm) ! trickle
        13/02/1994  irrigation apply amount = 4.47 (mm) ! trickle
        14/02/1994  irrigation apply amount = 4.47 (mm) ! trickle
        15/02/1994  irrigation apply amount = 4.47 (mm) ! trickle
        17/02/1994  irrigation apply amount = 12.33 (mm) ! trickle
        19/02/1994  irrigation apply amount = 10.62 (mm) ! trickle
        23/02/1994  irrigation apply amount = 10.68 (mm) ! trickle
        25/02/1994  irrigation apply amount = 11.82 (mm) ! trickle
        27/02/1994  irrigation apply amount = 11.82 (mm) ! trickle
        1/03/1994  irrigation apply amount = 11.82 (mm) ! trickle
        6/03/1994  irrigation apply amount = 6.95 (mm) ! trickle
        11/03/1994  fertiliser apply amount = 30 (kg/ha), depth = 300 (mm), type = no3_n ()  ! fertigation
        11/03/1994  irrigation apply amount = 16.31 (mm) ! trickle
        5/04/1994  irrigation apply amount = 0.35 (mm) ! trickle
        10/04/1994  fertiliser apply amount = 30 (kg/ha), depth = 300 (mm), type = no3_n ()  ! fertigation
        14/04/1994  irrigation apply amount = 1.06 (mm) ! trickle
        27/04/1994  irrigation apply amount = 1.56 (mm) ! trickle
        10/05/1994  fertiliser apply amount = 30 (kg/ha), depth = 300 (mm), type = no3_n ()  ! fertigation
        10/05/1994  irrigation apply amount = 0.91 (mm) ! trickle
        11/05/1994  irrigation apply amount = 0.17 (mm) ! trickle
        12/05/1994  irrigation apply amount = 0.17 (mm) ! trickle
        13/05/1994  irrigation apply amount = 0.17 (mm) ! trickle
        14/05/1994  irrigation apply amount = 0.17 (mm) ! trickle
        15/05/1994  irrigation apply amount = 0.17 (mm) ! trickle
        16/05/1994  irrigation apply amount = 0.17 (mm) ! trickle
        17/05/1994  irrigation apply amount = 0.17 (mm) ! trickle
        18/05/1994  irrigation apply amount = 0.17 (mm) ! trickle
        19/05/1994  irrigation apply amount = 1.03 (mm) ! trickle
        20/05/1994  irrigation apply amount = 1.03 (mm) ! trickle
        22/05/1994  irrigation apply amount = 3.76 (mm) ! trickle
        24/05/1994  irrigation apply amount = 3.76 (mm) ! trickle
        26/05/1994  irrigation apply amount = 1.32 (mm) ! trickle
        28/05/1994  irrigation apply amount = 1.32 (mm) ! trickle
        30/05/1994  irrigation apply amount = 1.32 (mm) ! trickle
        1/06/1994  irrigation apply amount = 4.29 (mm) ! trickle
        3/06/1994  irrigation apply amount = 4.29 (mm) ! trickle
        5/06/1994  irrigation apply amount = 4.29 (mm) ! trickle
        7/06/1994  irrigation apply amount = 3.96 (mm) ! trickle
        9/06/1994  fertiliser apply amount = 30 (kg/ha), depth = 300 (mm), type = no3_n ()  ! fertigation
        9/06/1994  irrigation apply amount = 3.96 (mm) ! trickle
        11/06/1994  irrigation apply amount = 3.96 (mm) ! trickle
        13/06/1994  irrigation apply amount = 3.96 (mm) ! trickle
        15/06/1994  irrigation apply amount = 3.96 (mm) ! trickle
        17/06/1994  irrigation apply amount = 3.96 (mm) ! trickle
        19/06/1994  irrigation apply amount = 3.96 (mm) ! trickle
        21/06/1994  irrigation apply amount = 3.76 (mm) ! trickle
        23/06/1994  irrigation apply amount = 3.76 (mm) ! trickle
        25/06/1994  irrigation apply amount = 3.76 (mm) ! trickle
        27/06/1994  irrigation apply amount = 3.76 (mm) ! trickle
        29/06/1994  irrigation apply amount = 3.76 (mm) ! trickle
        1/07/1994  irrigation apply amount = 3.76 (mm) ! trickle
        3/07/1994  irrigation apply amount = 3.76 (mm) ! trickle
        5/07/1994  irrigation apply amount = 3.84 (mm) ! trickle
        7/07/1994  irrigation apply amount = 3.84 (mm) ! trickle
        9/07/1994  fertiliser apply amount = 30 (kg/ha), depth = 300 (mm), type = no3_n ()  ! fertigation
        9/07/1994  irrigation apply amount = 3.84 (mm) ! trickle
        11/07/1994  irrigation apply amount = 3.84 (mm) ! trickle
        13/07/1994  irrigation apply amount = 3.84 (mm) ! trickle
        15/07/1994  irrigation apply amount = 3.84 (mm) ! trickle
        17/07/1994  irrigation apply amount = 3.84 (mm) ! trickle
        19/07/1994  irrigation apply amount = 3.84 (mm) ! trickle
        21/07/1994  irrigation apply amount = 2.07 (mm) ! trickle
        25/07/1994  irrigation apply amount = 12.13 (mm) ! trickle
        26/07/1994  irrigation apply amount = 4.35 (mm) ! trickle
        28/07/1994  irrigation apply amount = 5.38 (mm) ! trickle
        30/07/1994  irrigation apply amount = 5.38 (mm) ! trickle
        1/08/1994  irrigation apply amount = 5.38 (mm) ! trickle
        4/08/1994  irrigation apply amount = 1.02 (mm) ! trickle
        14/09/1994  irrigation apply amount = 9.01 (mm) ! trickle
        15/09/1994  irrigation apply amount = 13 (mm) ! trickle
        22/09/1994  irrigation apply amount = 13 (mm) ! trickle
        27/09/1994  irrigation apply amount = 14.22 (mm) ! trickle
        29/09/1994  irrigation apply amount = 12.87 (mm) ! trickle
        1/10/1994  irrigation apply amount = 14.22 (mm) ! trickle
        3/10/1994  irrigation apply amount = 12.87 (mm) ! trickle
        5/10/1994  irrigation apply amount = 10.98 (mm) ! trickle
        7/10/1994  irrigation apply amount = 13.4 (mm) ! trickle
        8/10/1994  irrigation apply amount = 12.06 (mm) ! trickle
        9/10/1994  irrigation apply amount = 10.34 (mm) ! trickle
        15/10/1994  irrigation apply amount = 13.4 (mm) ! trickle
        16/10/1994  irrigation apply amount = 12.12 (mm) ! trickle
        17/10/1994  irrigation apply amount = 10.83 (mm) ! trickle
        21/10/1994  irrigation apply amount = 8.59 (mm) ! trickle
        22/10/1994  irrigation apply amount = 8.07 (mm) ! trickle
        23/10/1994  irrigation apply amount = 7.76 (mm) ! trickle
        28/10/1994  irrigation apply amount = 9.42 (mm) ! trickle
        29/10/1994  irrigation apply amount = 8.1 (mm) ! trickle
        30/10/1994  irrigation apply amount = 6.8 (mm) ! trickle
        4/11/1994  irrigation apply amount = 6.09 (mm) ! trickle
        5/11/1994  irrigation apply amount = 5.82 (mm) ! trickle
        6/11/1994  irrigation apply amount = 5.36 (mm) ! trickle
        11/11/1994  irrigation apply amount = 5.5 (mm) ! trickle
        12/11/1994  irrigation apply amount = 9.92 (mm) ! trickle
        13/11/1994  irrigation apply amount = 4.39 (mm) ! trickle
        18/11/1994  irrigation apply amount = 7.59 (mm) ! trickle
        19/11/1994  irrigation apply amount = 7.54 (mm) ! trickle
        20/11/1994  irrigation apply amount = 7.46 (mm) ! trickle
        25/11/1994  irrigation apply amount = 7.35 (mm) ! trickle
        26/11/1994  irrigation apply amount = 7.27 (mm) ! trickle
        27/11/1994  irrigation apply amount = 7.19 (mm) ! trickle
        1/12/1994  irrigation apply amount = 9.82 (mm) ! trickle
        2/12/1994  irrigation apply amount = 7.99 (mm) ! trickle
        3/12/1994  irrigation apply amount = 5.48 (mm) ! trickle
        8/12/1994  irrigation apply amount = 9.56 (mm) ! trickle
        9/12/1994  irrigation apply amount = 9.29 (mm) ! trickle
        10/12/1994  irrigation apply amount = 7 (mm) ! trickle
        22/12/1994  irrigation apply amount = 11.85 (mm) ! trickle
        23/12/1994  irrigation apply amount = 11.27 (mm) ! trickle
        24/12/1994  irrigation apply amount = 9.83 (mm) ! trickle
        3/01/1995  irrigation apply amount = 11.85 (mm) ! trickle
        4/01/1995  irrigation apply amount = 11.88 (mm) ! trickle
        5/01/1995  irrigation apply amount = 11.1 (mm) ! trickle
        9/01/1995  irrigation apply amount = 11.57 (mm) ! trickle
        10/01/1995  irrigation apply amount = 11.16 (mm) ! trickle
        11/01/1995  irrigation apply amount = 11.07 (mm) ! trickle
        15/01/1995  sugar lodge
        24/01/1995  irrigation apply amount = 10.99 (mm) ! trickle
        25/01/1995  irrigation apply amount = 9.39 (mm) ! trickle
        27/01/1995  irrigation apply amount = 9.03 (mm) ! trickle
        29/01/1995  irrigation apply amount = 8.63 (mm) ! trickle
        31/01/1995  irrigation apply amount = 8.36 (mm) ! trickle
        1/02/1995  irrigation apply amount = 6.18 (mm) ! trickle
        2/02/1995  irrigation apply amount = 0.9 (mm) ! trickle
        3/02/1995  irrigation apply amount = 5.14 (mm) ! trickle
        5/02/1995  irrigation apply amount = 4.81 (mm) ! trickle
        6/02/1995  irrigation apply amount = 5.86 (mm) ! trickle
        7/02/1995  irrigation apply amount = 4.76 (mm) ! trickle
        8/02/1995  irrigation apply amount = 5.06 (mm) ! trickle
        9/02/1995  irrigation apply amount = 5.16 (mm) ! trickle
        12/02/1995  irrigation apply amount = 4.96 (mm) ! trickle
        3/03/1995  irrigation apply amount = 0.52 (mm) ! trickle
        14/03/1995  irrigation apply amount = 9.5 (mm) ! trickle
        17/03/1995  irrigation apply amount = 5.03 (mm) ! trickle
        21/03/1995  irrigation apply amount = 3.26 (mm) ! trickle
        22/03/1995  irrigation apply amount = 3.23 (mm) ! trickle
        23/03/1995  irrigation apply amount = 3.22 (mm) ! trickle
        24/03/1995  irrigation apply amount = 3.34 (mm) ! trickle
        25/03/1995  irrigation apply amount = 3.23 (mm) ! trickle
        26/03/1995  irrigation apply amount = 3.16 (mm) ! trickle
        27/03/1995  irrigation apply amount = 3.34 (mm) ! trickle
        28/03/1995  irrigation apply amount = 4.67 (mm) ! trickle
        1/04/1995  irrigation apply amount = 5.27 (mm) ! trickle
        3/04/1995  irrigation apply amount = 5.27 (mm) ! trickle
        4/04/1995  irrigation apply amount = 5.31 (mm) ! trickle
        5/04/1995  irrigation apply amount = 5.22 (mm) ! trickle
        6/04/1995  irrigation apply amount = 4.36 (mm) ! trickle
        7/04/1995  irrigation apply amount = 4.36 (mm) ! trickle
        8/04/1995  irrigation apply amount = 4.36 (mm) ! trickle
        9/04/1995  irrigation apply amount = 4.36 (mm) ! trickle
        10/04/1995  irrigation apply amount = 4.36 (mm) ! trickle
        11/04/1995  irrigation apply amount = 5.39 (mm) ! trickle
        13/04/1995  irrigation apply amount = 5.39 (mm) ! trickle
        15/04/1995  irrigation apply amount = 5.39 (mm) ! trickle
        25/07/1995  irrigation apply amount = 3.1 (mm) ! trickle
        27/07/1995  irrigation apply amount = 3 (mm) ! trickle
        29/07/1995  irrigation apply amount = 3 (mm) ! trickle
        31/07/1995  irrigation apply amount = 3 (mm) ! trickle
        2/08/1995  irrigation apply amount = 3 (mm) ! trickle
        4/08/1995  irrigation apply amount = 3 (mm) ! trickle
        6/08/1995  irrigation apply amount = 3.1 (mm) ! trickle
        8/08/1995  irrigation apply amount = 3 (mm) ! trickle
        10/08/1995  irrigation apply amount = 3 (mm) ! trickle
        12/08/1995  irrigation apply amount = 3 (mm) ! trickle
        14/08/1995  irrigation apply amount = 3.1 (mm) ! trickle
        16/08/1995  irrigation apply amount = 3.1 (mm) ! trickle
        18/08/1995  irrigation apply amount = 3 (mm) ! trickle
        20/08/1995  irrigation apply amount = 3 (mm) ! trickle
        22/08/1995  irrigation apply amount = 3 (mm) ! trickle
        24/08/1995  irrigation apply amount = 3 (mm) ! trickle
        26/08/1995  irrigation apply amount = 3 (mm) ! trickle
        28/08/1995  irrigation apply amount = 3.1 (mm) ! trickle
        30/08/1995  irrigation apply amount = 3 (mm) ! trickle
        1/09/1995  irrigation apply amount = 3 (mm) ! trickle
        3/09/1995  irrigation apply amount = 3 (mm) ! trickle
        5/09/1995  irrigation apply amount = 3 (mm) ! trickle
        29/09/1995  sugar harvest  (end_of_day)
        29/09/1995  sugar end_crop  (end_of_day)
      sugar
      fertiliser
      irrigation
        automatic_irrigation = off
        asw_depth = 600  # Depth to which ASW is calculated. (mm)
        crit_fr_asw = 0.5  # Fraction of ASW below which irrigation is applied (0-1.0)
        irrigation_efficiency = 1  # Efficiency of the irrigation. (0-1.0)
        irrigation_allocation = off  # Allocation limits
        allocation = 0  # Allocation in ML
        default_no3_conc = 0  # Nitrate concentration (ppm N)
        default_nh4_conc = 0  # Ammonium concentration (ppm N)
        default_cl_conc = 0  # Chloride concentration (ppm Cl)
        default_no3_conc = 0  # Nitrate concentration (ppm N)
        default_nh4_conc = 0  # Ammonium concentration (ppm N)
        default_cl_conc = 0  # Chloride concentration (ppm Cl)
      surfaceom Surface Organic Matter
        PoolName = sugar_trash  # Organic Matter pool name
        type = sugar  # Organic Matter type
        mass = 100  # Initial surface residue (kg/ha)
        cnr = 80  # C:N ratio of initial residue
        standing_fraction = 1  # Fraction of residue standing
      outputfile: filename=1) Harwood 1993-94 Q117 P.out; title=1) Harwood 1993-94 Q117 P
        variables
          variable:
            dd/mm/yyyy as date  # Date (dd/mmm/yyyy)
            site
            season
            treat
            year  # Sugar Crop status (dead,alive,out)
            day  # Sugar Ratoon number
            daysaftersowing as das
            crop_status  # Amount of fertilizer applied (kg/ha)
            ratoon_no  # Irrigation entering the profile (mm)
            samp  # Rainfall (mm)
            fertiliser  # Sugar cane fresh weight (t/ha)
            irrigation  # Sugar cane dry weight (g/m2)
            rain  # Sugar sucrose weight (g/m2)
            canefw
            cane_wt
            sucrose_wt
            scmstf  # Sugar total above-ground biomass (green + trash) (g/m2)
            ccs  # Sugar green biomass (g/m2)
            scmst  # Sugar leaf weight (g/m2)
            biomass  # Sugar cabbage weight (g/m2)
            green_biomass  # Sugar senesced plant material (trash) (g/m2)
            leafgreenwt as leaf_wt  # Sugar green leaf area index
            cabbage_wt  # Sugar water stress factor on photosynthesis (0-1)
            DeadWt as trash_wt  # Sugar Nitrogen stress factor on photosynthesis (0-1)
            lai  # Sugar total N in biomass (green + trash) (g/m2)
            swdef_photo  # Sugar green biomass N (g/m2)
            nfact_photo
            biomass_n
            green_biomass_n
            N_green(3) as cane_N  # Sugar N in trash (g/m2)
            N_green(2) as leaf_N  # Sugar N concentration in cane (g/g)
            N_green(4) as cab_N  # Sugar N concentration in green leaf (g/g)
            DeadN as trash_N  # Sugar N concentration in cabbage (g/g)
            n_conc_cane
            n_conc_leaf
            n_conc_cab
            cane_dmf as cane_dmc
            no3
            flow_no3(6)
            no3ppm
            nh4
            nh4ppm
        events Reporting Frequency: event=Daily  # End of daily simulation time step
      soil Harwood: Site=Harwood Sugar Mill; State=NSW
        InitWater Initial water
          PercentMethod: Percent=1.00; Distributed=Filled from top
        Water
          Layer:
            Thickness (mm)  BD (g/cc)  AirDry (mm/mm)  LL15 (mm/mm)  DUL (mm/mm)  SAT (mm/mm)
            200             1.15       0.05            0.16          0.28         0.45
            200             1.35       0.05            0.18          0.3          0.45
            200             1.4        0.05            0.2           0.32         0.45
            300             1.45       0.05            0.21          0.33         0.45
            300             1.45       0.05            0.24          0.36         0.45
            300             1.5        0.05            0.29          0.41         0.43
          SoilCrop sugar
            Layer:
              Thickness (mm)  LL (mm/mm)  KL (/day)  XF (0-1)
              200             0.16        0.1        1
              200             0.18        0.1        1
              200             0.2         0.1        1
              300             0.21        0.08       1
              300             0.24        0.08       1
              300             0.29        0.04       1
        SoilWat: SummerCona=3; SummerU=4; SummerDate=1-Nov; WinterCona=3; WinterU=4; WinterDate=1-Apr; DiffusConst=40; DiffusSlope=16; Salb=0.1; CN2Bare=65; CNRed=20; CNCov=0.8
          Layer:
            Thickness (mm)  SWCON (0-1)
            200             0.4
            200             0.4
            200             0.4
            300             0.4
            300             0.4
            300             0.4
        SoilOrganicMatter: RootCN=70; RootWT=50; SoilCN=11; EnrACoeff=7.4; EnrBCoeff=0.2
          Layer:
            Thickness (mm)  OC (Total %)  FBiom (0-1)  FInert (0-1)
            200             0.8           0.06         0.5
            200             0.75          0.045        0.55
            200             0.54          0.035        0.85
            300             0.4           0.015        0.95
            300             0.4           0.005        0.95
            300             0.4           0.005        0.99
        Analysis
          Layer:
            Thickness (mm)  PH (1:5 water)
            200             6
            200             6
            200             6
            300             6
            300             6
            300             6
        Sample Initial nitrogen
          Layer:
            Thickness (mm)  NO3 (ppm)  NH4 (ppm)
            200             2          1
            200             2          1
            200             1          1
            300             1          0.5
            300             1          0.5
            300             1          0.5
  simulation 2) Ingham 1992-93 Q117 P
    metfile met: filename=Ingham.met
    clock
      start_date = 23/07/1992  # Enter the start date of the simulation
      end_date = 21/10/1993  # Enter the end date of the simulation
    summaryfile
    area paddock
      folder Manager folder
        manager Macknade man
          on init:
```
samp=0
```
          on start_of_day:
```
! Set trickle irrigation depth
if daysaftersowing=48 then
   ! irrigation_depth=300(mm)
   'macknade 923 p water' irrigation_depth=300(mm)
endif

! Observed sampling dates
samp=0
if (year = 1992 and (day = 296 or day = 316 or day = 345)) or
   (year = 1993 and (day =  27 or day = 61 or day = 89 or day = 125 or day = 160
   or day = 228 or day = 257 or day = 294)) then
   samp = 1
endif

! Simulation info
site='Ingham'
season='1992-93'
treat=1
```
      operations
        23/07/1992  sugar sow population = 10, sowing_depth = 100, cultivar = Q117_fum, ratoon = 0
        23/07/1992  fertiliser apply amount = 57.6 (kg/ha), depth = 100 (mm), type = nh4_n ()
        9/09/1992  irrigation apply amount = 25 (mm) ! overhead portable lines
        23/09/1992  fertiliser apply amount = 161 (kg/ha), depth = 100 (mm), type = nh4_n ()
        5/10/1992  irrigation apply amount = 25 (mm) ! overhead portable lines
        13/10/1992  fertiliser apply amount = 51.3 (kg/ha), depth = 100 (mm), type = nh4_n ()
        27/10/1992  irrigation apply amount = 36 (mm) ! trickle
        6/11/1992  irrigation apply amount = 36 (mm) ! trickle
        13/11/1992  irrigation apply amount = 36 (mm) ! trickle
        20/11/1992  irrigation apply amount = 36 (mm) ! trickle
        27/11/1992  irrigation apply amount = 36 (mm) ! trickle
        4/12/1992  irrigation apply amount = 36 (mm) ! trickle
        11/12/1992  fertiliser apply amount = 75 (kg/ha), depth = 100 (mm), type = nh4_n ()
        11/12/1992  irrigation apply amount = 36 (mm) ! trickle
        4/03/1993  irrigation apply amount = 36 (mm) ! trickle
        19/03/1993  irrigation apply amount = 36 (mm) ! trickle
        22/03/1993  sugar lodge
        26/03/1993  irrigation apply amount = 36 (mm) ! trickle
        3/04/1993  irrigation apply amount = 36 (mm) ! trickle
        8/04/1993  irrigation apply amount = 36 (mm) ! trickle
        22/04/1993  irrigation apply amount = 36 (mm) ! trickle
        6/05/1993  irrigation apply amount = 36 (mm) ! trickle
        12/05/1993  irrigation apply amount = 36 (mm) ! trickle
        26/05/1993  irrigation apply amount = 36 (mm) ! trickle
        16/06/1993  irrigation apply amount = 36 (mm) ! trickle
        23/06/1993  irrigation apply amount = 36 (mm) ! trickle
        21/10/1993  sugar harvest  (end_of_day)
        21/10/1993  sugar end_crop  (end_of_day)
      sugar
      fertiliser
      irrigation: same as 1) Harwood 1993-94 Q117 P.paddock.Irrigation
      surfaceom Surface Organic Matter
        PoolName = sugar_trash  # Organic Matter pool name
        type = sugar  # Organic Matter type
        mass = 100  # Initial surface residue (kg/ha)
        cnr = 80  # C:N ratio of initial residue
        standing_fraction = 1  # Fraction of residue standing
      outputfile: filename=2) Ingham 1992-93 Q117 P.out; title=2) Ingham 1992-93 Q117 P
        variables -> /simulations/1) Harwood 1993-94 Q117 P/paddock/Outputfile/Variables
        events Reporting Frequency -> /simulations/1) Harwood 1993-94 Q117 P/paddock/Outputfile/Reporting Frequency
      soil Macknade 923 P
        InitWater Initial water
          PercentMethod: Percent=1.00; Distributed=Filled from top
        Water
          Layer:
            Thickness (mm)  BD (g/cc)  AirDry (mm/mm)  LL15 (mm/mm)  DUL (mm/mm)  SAT (mm/mm)
            200             1.15       0.05            0.16          0.28         0.45
            200             1.35       0.05            0.18          0.3          0.45
            200             1.4        0.05            0.2           0.32         0.45
            300             1.45       0.05            0.21          0.33         0.45
            300             1.45       0.05            0.24          0.36         0.45
            300             1.5        0.05            0.29          0.41         0.43
            300             1.5        0.05            0.29          0.41         0.43
          SoilCrop sugar
            Layer:
              Thickness (mm)  LL (mm/mm)  KL (/day)  XF (0-1)
              200             0.16        0.1        1
              200             0.18        0.1        1
              200             0.2         0.1        1
              300             0.21        0.08       1
              300             0.24        0.08       1
              300             0.29        0.04       1
              300             0.29        0.04       1
        SoilWat: SummerCona=3; SummerU=4; SummerDate=1-Nov; WinterCona=3; WinterU=4; WinterDate=1-Apr; DiffusConst=40; DiffusSlope=16; Salb=0.1; CN2Bare=65; CNRed=20; CNCov=0.8
          Layer:
            Thickness (mm)  SWCON (0-1)
            200             0.4
            200             0.4
            200             0.4
            300             0.4
            300             0.4
            300             0.4
            300             0.4
        SoilOrganicMatter: RootCN=70; RootWT=50; SoilCN=11; EnrACoeff=7.4; EnrBCoeff=0.2
          Layer:
            Thickness (mm)  OC (Total %)  FBiom (0-1)  FInert (0-1)
            200             1.3           0.06         0.3
            200             0.9           0.045        0.45
            200             0.54          0.035        0.85
            300             0.4           0.015        0.95
            300             0.4           0.005        0.95
            300             0.4           0.005        0.99
            300             0.4           0.005        0.99
        Analysis
          Layer:
            Thickness (mm)  PH (1:5 water)
            200             6
            200             6
            200             6
            300             6
            300             6
            300             6
            300             6
        Sample Initial nitrogen
          Layer:
            Thickness (mm)  NO3 (ppm)  NH4 (ppm)
            200             2          1
            200             2          1
            200             1          1
            300             1          0.5
            300             1          0.5
            300             1          0.5
            300             1          0.5
  simulation 3) Ingham 1992-93 Q117 1R
    metfile met: filename=Ingham.met
    clock
      start_date = 26/08/1992  # Enter the start date of the simulation
      end_date = 21/10/1993  # Enter the end date of the simulation
    summaryfile
    area paddock
      folder Manager folder
        manager Macknade
          on init:
```
samp=0
```
          on start_of_day:
```
! Set trickle irrigation depth
if daysaftersowing=2 then
   ! irrigation_depth=300(mm)
   'macknade 923 1R water' irrigation_depth=300(mm)
endif

! Observed sampling dates
samp=0
if (year = 1992 and (day = 296 or day = 316 or day = 345)) or
   (year = 1993 and (day =  27 or day = 61 or day = 89 or day = 125 or day = 160
   or day = 228 or day = 257 or day = 294)) then
   samp = 1
endif

! Simulation info
site='Ingham'
season='1992-93'
treat=2
```
      operations
        26/08/1992  sugar sow population = 10, sowing_depth = 100, cultivar = Q117_fum, ratoon = 1
        4/09/1992  fertiliser apply amount = 56.2 (kg/ha), depth = 100 (mm), type = nh4_n ()
        4/09/1992  'Surface Organic Matter' type=chisel
        4/09/1992  'Surface Organic Matter' type=rip
        4/09/1992  'Surface Organic Matter' type=hoe
        8/09/1992  irrigation apply amount = 25(mm) ! overhead portable lines
        23/09/1992  fertiliser apply amount = 161 (kg/ha), depth = 100 (mm), type = nh4_n ()
        2/10/1992  irrigation apply amount = 25(mm) ! overhead portable lines
        13/10/1992  fertiliser apply amount = 51.3 (kg/ha), depth = 100 (mm), type = nh4_n ()
        29/10/1992  irrigation apply amount = 36(mm) ! trickle
        5/11/1992  irrigation apply amount = 36(mm) ! trickle
        12/11/1992  irrigation apply amount = 36(mm) ! trickle
        19/11/1992  irrigation apply amount = 36(mm) ! trickle
        26/11/1992  irrigation apply amount = 36(mm) ! trickle
        3/12/1992  irrigation apply amount = 36(mm) ! trickle
        10/12/1992  fertiliser apply amount = 75 (kg/ha), depth = 100 (mm), type = nh4_n ()
        10/12/1992  irrigation apply amount = 36(mm) ! trickle
        18/03/1993  irrigation apply amount = 36(mm) ! trickle
        25/03/1993  irrigation apply amount = 36(mm) ! trickle
        2/04/1993  irrigation apply amount = 36(mm) ! trickle
        7/04/1993  irrigation apply amount = 36(mm) ! trickle
        21/04/1993  irrigation apply amount = 36(mm) ! trickle
        4/05/1993  sugar lodge
        7/05/1993  irrigation apply amount = 36(mm) ! trickle
        13/05/1993  irrigation apply amount = 36(mm) ! trickle
        27/05/1993  irrigation apply amount = 36(mm) ! trickle
        17/06/1993  irrigation apply amount = 36(mm) ! trickle
        24/06/1993  irrigation apply amount = 36(mm) ! trickle
        21/10/1993  sugar harvest  (end_of_day)
        21/10/1993  sugar end_crop  (end_of_day)
      sugar
      fertiliser
      irrigation: same as 1) Harwood 1993-94 Q117 P.paddock.Irrigation
      surfaceom Surface Organic Matter
        PoolName = sugar_trash  # Organic Matter pool name
        type = sugar  # Organic Matter type
        mass = 1000  # Initial surface residue (kg/ha)
        cnr = 80  # C:N ratio of initial residue
        standing_fraction = 1  # Fraction of residue standing
      outputfile: filename=3) Ingham 1992-93 Q117 1R.out; title=3) Ingham 1992-93 Q117 1R
        variables -> /simulations/1) Harwood 1993-94 Q117 P/paddock/Outputfile/Variables
        events Reporting Frequency -> /simulations/1) Harwood 1993-94 Q117 P/paddock/Outputfile/Reporting Frequency
      soil Macknade 923 1R
        InitWater Initial water
          PercentMethod: Percent=1.00; Distributed=Filled from top
        Water: same as 2) Ingham 1992-93 Q117 P.paddock.Macknade 923 P.Water
        SoilWat: same as 2) Ingham 1992-93 Q117 P.paddock.Macknade 923 P.SoilWat
        SoilOrganicMatter: RootCN=70; RootWT=1000; SoilCN=11; EnrACoeff=7.4; EnrBCoeff=0.2
          Layer:
            Thickness (mm)  OC (Total %)  FBiom (0-1)  FInert (0-1)
            200             1.3           0.06         0.3
            200             0.9           0.045        0.45
            200             0.54          0.035        0.85
            300             0.4           0.015        0.95
            300             0.4           0.005        0.95
            300             0.4           0.005        0.99
            300             0.4           0.005        0.99
        Analysis: same as 2) Ingham 1992-93 Q117 P.paddock.Macknade 923 P.Analysis
        Sample Initial nitrogen: same as 2) Ingham 1992-93 Q117 P.paddock.Macknade 923 P.Initial nitrogen
  simulation 5) Ayr 1991-92 Q96 P
    metfile met: filename=Ayr.met
    clock
      start_date = 19/04/1991  # Enter the start date of the simulation
      end_date = 7/07/1992  # Enter the end date of the simulation
    summaryfile
    area paddock
      folder Manager folder
        manager Ayr
          on init:
```
samp=0
```
          on start_of_day:
```
! Furrow irrigated

! Observed sampling dates
samp=0
if ((year = 1991) and (day = 277 or day = 295 or day = 324 or day = 338)) or 
   ((year = 1992) and (day = 21 or day = 42 or day = 71 or day = 99 or
   day = 126 or day = 190)) then
   samp = 1
endif

! Simulation info
site='Ayr'
season='1991-92'
treat=1
```
      operations
        19/04/1991  sugar sow population = 10, sowing_depth = 150, cultivar = Q96, ratoon = 0
        19/04/1991  fertiliser apply amount = 33 (kg/ha), depth = 100 (mm), type = nh4_n ()
        24/04/1991  irrigation apply amount = 200 (mm) ! furrow : 3.46ppm NO3 (10 kg/ha) in irrig water added in irrigation
        15/07/1991  irrigation apply amount = 200 (mm) ! furrow : 3.46ppm NO3 (10 kg/ha) in irrig water added in irrigation
        29/07/1991  fertiliser apply amount = 64 (kg/ha), depth = 100 (mm), type = nh4_n ()
        19/08/1991  fertiliser apply amount = 155 (kg/ha), depth = 100 (mm), type = nh4_n ()
        1/10/1991  sugar hill_up canefr = 1.0 (), topsfr = 0.50 ()
        6/10/1991  irrigation apply amount = 200 (mm) ! furrow : 3.46ppm NO3 (10 kg/ha) in irrig water added in irrigation
        24/10/1991  irrigation apply amount = 200 (mm) ! furrow : 3.46ppm NO3 (10 kg/ha) in irrig water added in irrigation
        3/11/1991  irrigation apply amount = 200 (mm) ! furrow : 3.46ppm NO3 (10 kg/ha) in irrig water added in irrigation
        14/11/1991  irrigation apply amount = 200 (mm) ! furrow : 3.46ppm NO3 (10 kg/ha) in irrig water added in irrigation
        8/12/1991  irrigation apply amount = 200 (mm) ! furrow : 3.46ppm NO3 (10 kg/ha) in irrig water added in irrigation
        1/01/1992  irrigation apply amount = 200 (mm) ! furrow : 3.46ppm NO3 (10 kg/ha) in irrig water added in irrigation
        11/01/1992  irrigation apply amount = 200 (mm) ! furrow : 3.46ppm NO3 (10 kg/ha) in irrig water added in irrigation
        18/01/1992  irrigation apply amount = 200 (mm) ! furrow : 3.46ppm NO3 (10 kg/ha) in irrig water added in irrigation
        30/01/1992  irrigation apply amount = 200 (mm) ! furrow : 3.46ppm NO3 (10 kg/ha) in irrig water added in irrigation
        19/02/1992  irrigation apply amount = 200 (mm) ! furrow : 3.46ppm NO3 (10 kg/ha) in irrig water added in irrigation
        4/03/1992  sugar lodge
        12/03/1992  irrigation apply amount = 200 (mm) ! furrow : 3.46ppm NO3 (10 kg/ha) in irrig water added in irrigation
        24/03/1992  irrigation apply amount = 200 (mm) ! furrow : 3.46ppm NO3 (10 kg/ha) in irrig water added in irrigation
        4/04/1992  irrigation apply amount = 200 (mm) ! furrow : 3.46ppm NO3 (10 kg/ha) in irrig water added in irrigation
        26/04/1992  irrigation apply amount = 200 (mm) ! furrow : 3.46ppm NO3 (10 kg/ha) in irrig water added in irrigation
        9/05/1992  irrigation apply amount = 200 (mm) ! furrow : 3.46ppm NO3 (10 kg/ha) in irrig water added in irrigation
        7/07/1992  sugar harvest  (end_of_day)
        7/07/1992  sugar end_crop  (end_of_day)
      sugar
      fertiliser
      irrigation
        automatic_irrigation = off
        asw_depth = 600  # Depth to which ASW is calculated. (mm)
        crit_fr_asw = 0.5  # Fraction of ASW below which irrigation is applied (0-1.0)
        irrigation_efficiency = 1  # Efficiency of the irrigation. (0-1.0)
        irrigation_allocation = off  # Allocation limits
        allocation = 0  # Allocation in ML
        default_no3_conc = 3.46  # Nitrate concentration (ppm N)
        default_nh4_conc = 0  # Ammonium concentration (ppm N)
        default_cl_conc = 0  # Chloride concentration (ppm Cl)
        default_no3_conc = 0  # Nitrate concentration (ppm N)
        default_nh4_conc = 0  # Ammonium concentration (ppm N)
        default_cl_conc = 0  # Chloride concentration (ppm Cl)
      surfaceom Surface Organic Matter
        PoolName = sugar_trash  # Organic Matter pool name
        type = sugar  # Organic Matter type
        mass = 100  # Initial surface residue (kg/ha)
        cnr = 80  # C:N ratio of initial residue
        standing_fraction = 1  # Fraction of residue standing
      outputfile: filename=5) Ayr 1991-92 Q96 P.out; title=5) Ayr 1991-92 Q96 P
        variables -> /simulations/1) Harwood 1993-94 Q117 P/paddock/Outputfile/Variables
        events Reporting Frequency -> /simulations/1) Harwood 1993-94 Q117 P/paddock/Outputfile/Reporting Frequency
      soil Zanetti 912
        InitWater Initial water
          PercentMethod: Percent=1.00; Distributed=Filled from top
        Water
          Layer:
            Thickness (mm)  BD (g/cc)  AirDry (mm/mm)  LL15 (mm/mm)  DUL (mm/mm)  SAT (mm/mm)
            200             1.2        0.05            0.18          0.33         0.45
            200             1.25       0.05            0.2           0.35         0.45
            200             1.3        0.05            0.21          0.37         0.45
            300             1.35       0.05            0.24          0.37         0.45
            300             1.4        0.05            0.24          0.36         0.45
            300             1.45       0.05            0.22          0.32         0.45
          SoilCrop sugar
            Layer:
              Thickness (mm)  LL (mm/mm)  KL (/day)  XF (0-1)
              200             0.18        0.1        1
              200             0.2         0.1        1
              200             0.21        0.1        1
              300             0.24        0.08       1
              300             0.24        0.08       1
              300             0.22        0.04       1
        SoilWat: same as 1) Harwood 1993-94 Q117 P.paddock.Harwood.SoilWat
        SoilOrganicMatter: RootCN=70; RootWT=50; SoilCN=11; EnrACoeff=7.4; EnrBCoeff=0.2
          Layer:
            Thickness (mm)  OC (Total %)  FBiom (0-1)  FInert (0-1)
            200             0.8           0.04         0.5
            200             0.6           0.03         0.66
            200             0.4           0.02         0.95
            300             0.4           0.015        0.95
            300             0.4           0.005        0.95
            300             0.4           0.005        0.99
        Analysis: same as 1) Harwood 1993-94 Q117 P.paddock.Harwood.Analysis
        Sample Initial nitrogen: same as 1) Harwood 1993-94 Q117 P.paddock.Harwood.Initial nitrogen
  simulation 6) Ayr 1993-94 Q117 1R
    metfile met: filename=Ayr.met
    clock
      start_date = 31/07/1993  # Enter the start date of the simulation
      end_date = 9/08/1994  # Enter the end date of the simulation
    summaryfile
    area paddock
      folder Manager folder
        manager Ayr
          on init:
```
samp=0
```
          on start_of_day:
```
! Furrow irrigated

! Observed sampling dates
samp=0
if ((year = 1993) and (day = 223 or day = 266 or day = 287 or day = 313
   or day = 343)) or   ((year = 1994) and (day = 11 or day = 47 or day = 74 or day = 109 or
   day = 138 or day = 158 or day = 193 or day = 221)) then
   samp = 1
endif

! Simulation info
site='Ayr'
season='1993-94'
treat=2
```
      operations
        31/07/1993  'surface organic matter' tillage type = hoe, f_incorp = 1 (), tillage_depth = 200 (mm)
        1/08/1993  sugar sow population = 10, sowing_depth = 150, cultivar = Q117, ratoon = 1
        7/09/1993  fertiliser apply amount = 284 (kg/ha), depth = 100 (mm), type = urea_n ()
        7/09/1993  'surface organic matter' tillage type = rip, f_incorp = 0.3 (), tillage_depth = 80 (mm)
        4/10/1993  irrigation apply amount = 289 (mm) ! furrow : 3.46ppm NO3 (10 kg/ha) in irrig water added in irrigation
        29/10/1993  irrigation apply amount = 289 (mm) ! furrow : 3.46ppm NO3 (10 kg/ha) in irrig water added in irrigation
        13/11/1993  irrigation apply amount = 289 (mm) ! furrow : 3.46ppm NO3 (10 kg/ha) in irrig water added in irrigation
        23/11/1993  irrigation apply amount = 289 (mm) ! furrow : 3.46ppm NO3 (10 kg/ha) in irrig water added in irrigation
        5/12/1993  irrigation apply amount = 289 (mm) ! furrow : 3.46ppm NO3 (10 kg/ha) in irrig water added in irrigation
        24/12/1993  irrigation apply amount = 289 (mm) ! furrow : 3.46ppm NO3 (10 kg/ha) in irrig water added in irrigation
        3/01/1994  irrigation apply amount = 289 (mm) ! furrow : 3.46ppm NO3 (10 kg/ha) in irrig water added in irrigation
        15/01/1994  irrigation apply amount = 289 (mm) ! furrow : 3.46ppm NO3 (10 kg/ha) in irrig water added in irrigation
        23/01/1994  irrigation apply amount = 289 (mm) ! furrow : 3.46ppm NO3 (10 kg/ha) in irrig water added in irrigation
        23/02/1994  irrigation apply amount = 289 (mm) ! furrow : 3.46ppm NO3 (10 kg/ha) in irrig water added in irrigation
        20/03/1994  irrigation apply amount = 289 (mm) ! furrow : 3.46ppm NO3 (10 kg/ha) in irrig water added in irrigation
        3/04/1994  irrigation apply amount = 289 (mm) ! furrow : 3.46ppm NO3 (10 kg/ha) in irrig water added in irrigation
        13/04/1994  irrigation apply amount = 289 (mm) ! furrow : 3.46ppm NO3 (10 kg/ha) in irrig water added in irrigation
        19/04/1994  sugar lodge
        2/05/1994  irrigation apply amount = 289 (mm) ! furrow : 3.46ppm NO3 (10 kg/ha) in irrig water added in irrigation
        13/05/1994  irrigation apply amount = 289 (mm) ! furrow : 3.46ppm NO3 (10 kg/ha) in irrig water added in irrigation
        31/05/1994  irrigation apply amount = 289 (mm) ! furrow : 3.46ppm NO3 (10 kg/ha) in irrig water added in irrigation
        3/07/1994  irrigation apply amount = 289 (mm) ! furrow : 3.46ppm NO3 (10 kg/ha) in irrig water added in irrigation
        9/08/1994  sugar harvest  (end_of_day)
        9/08/1994  sugar end_crop  (end_of_day)
      sugar
      fertiliser
      irrigation: same as 5) Ayr 1991-92 Q96 P.paddock.Irrigation
      surfaceom Surface Organic Matter
        PoolName = sugar_trash  # Organic Matter pool name
        type = sugar  # Organic Matter type
        mass = 100  # Initial surface residue (kg/ha)
        cnr = 80  # C:N ratio of initial residue
        standing_fraction = 1  # Fraction of residue standing
      outputfile: filename=6) Ayr 1993-94 Q117 1R.out; title=6) Ayr 1993-94 Q117 1R
        variables -> /simulations/1) Harwood 1993-94 Q117 P/paddock/Outputfile/Variables
        events Reporting Frequency -> /simulations/1) Harwood 1993-94 Q117 P/paddock/Outputfile/Reporting Frequency
      soil Zanetti 934
        InitWater Initial water
          PercentMethod: Percent=0.20; Distributed=Evenly distributed
        Water: same as 5) Ayr 1991-92 Q96 P.paddock.Zanetti 912.Water
        SoilWat: same as 1) Harwood 1993-94 Q117 P.paddock.Harwood.SoilWat
        SoilOrganicMatter: RootCN=70; RootWT=1000; SoilCN=11; EnrACoeff=7.4; EnrBCoeff=0.2
          Layer:
            Thickness (mm)  OC (Total %)  FBiom (0-1)  FInert (0-1)
            200             1.3           0.04         0.4
            200             1             0.03         0.5
            200             0.8           0.02         0.75
            300             0.8           0.015        0.85
            300             0.7           0.005        0.9
            300             0.6           0.005        0.95
        Analysis: same as 1) Harwood 1993-94 Q117 P.paddock.Harwood.Analysis
        Sample Initial nitrogen: same as 1) Harwood 1993-94 Q117 P.paddock.Harwood.Initial nitrogen
  simulation 7) Pongola 1986-87 N14 P
    metfile met: filename=Pongola.met
    clock
      start_date = 12/11/1986  # Enter the start date of the simulation
      end_date = 11/10/1987  # Enter the end date of the simulation
    summaryfile
    area paddock
      folder Manager folder
        manager Pongola
          on init:
```
samp=0
```
          on start_of_day:
```
! Observed sampling dates
samp=0
if ((day = 20 or day = 75 or day = 135 or day = 170 or day = 201)
   and year = 1987) then
   samp = 1
endif

! Simulation info
site='Pongola'
season='1986-87'
treat=1
```
      operations
        12/11/1986  sugar sow population=10, sowing_depth= 150, cultivar=N14 , ratoon= 0
        12/11/1986  fertiliser apply amount = 53 (kg/ha), depth = 50 (mm), type = no3_n ()
        19/12/1986  fertiliser apply amount = 32 (kg/ha), depth = 50 (mm), type = no3_n ()
        11/10/1987  sugar harvest  (end_of_day)
        11/10/1987  sugar end_crop  (end_of_day)
      sugar
      fertiliser
      irrigation
        automatic_irrigation = on
        asw_depth = 1000  # Depth to which ASW is calculated. (mm)
        crit_fr_asw = 0.8  # Fraction of ASW below which irrigation is applied (0-1.0)
        irrigation_efficiency = 1  # Efficiency of the irrigation. (0-1.0)
        irrigation_allocation = off  # Allocation limits
        allocation = 0  # Allocation in ML
        default_no3_conc = 0  # Nitrate concentration (ppm N)
        default_nh4_conc = 0  # Ammonium concentration (ppm N)
        default_cl_conc = 0  # Chloride concentration (ppm Cl)
        default_no3_conc = 0  # Nitrate concentration (ppm N)
        default_nh4_conc = 0  # Ammonium concentration (ppm N)
        default_cl_conc = 0  # Chloride concentration (ppm Cl)
      surfaceom Surface Organic Matter
        PoolName = sugar_trash  # Organic Matter pool name
        type = sugar  # Organic Matter type
        mass = 100  # Initial surface residue (kg/ha)
        cnr = 80  # C:N ratio of initial residue
        standing_fraction = 1  # Fraction of residue standing
      outputfile: filename=7) Pongola 1986-87 N14 P.out; title=7) Pongola 1986-87 N14 P
        variables -> /simulations/1) Harwood 1993-94 Q117 P/paddock/Outputfile/Variables
        events Reporting Frequency -> /simulations/1) Harwood 1993-94 Q117 P/paddock/Outputfile/Reporting Frequency
      soil Pongola 867 P
        InitWater Initial water
          PercentMethod: Percent=1.00; Distributed=Filled from top
        Water
          Layer:
            Thickness (mm)  BD (g/cc)  AirDry (mm/mm)  LL15 (mm/mm)  DUL (mm/mm)  SAT (mm/mm)
            50              1.39       0.05            0.101         0.261        0.368
            120             1.39       0.05            0.101         0.261        0.368
            150             1.39       0.05            0.101         0.261        0.368
            150             1.43       0.05            0.16          0.282        0.371
            150             1.43       0.05            0.16          0.282        0.371
            300             1.34       0.05            0.15          0.304        0.399
            300             1.34       0.05            0.15          0.304        0.399
            300             1.34       0.05            0.15          0.304        0.399
            300             1.34       0.05            0.15          0.304        0.399
            300             1.34       0.05            0.15          0.304        0.399
          SoilCrop sugar
            Layer:
              Thickness (mm)  LL (mm/mm)  KL (/day)  XF (0-1)
              50              0.101       0.1        1
              120             0.101       0.1        1
              150             0.101       0.1        1
              150             0.16        0.1        1
              150             0.16        0.1        1
              300             0.15        0.08       1
              300             0.15        0.08       1
              300             0.15        0.04       1
              300             0.15        0.04       1
              300             0.15        0.04       1
        SoilWat: SummerCona=3; SummerU=9; SummerDate=1-Nov; WinterCona=3; WinterU=9; WinterDate=1-Apr; DiffusConst=40; DiffusSlope=16; Salb=0.13; CN2Bare=46; CNRed=20; CNCov=0.8
          Layer:
            Thickness (mm)  SWCON (0-1)
            50              0.8
            120             0.8
            150             0.8
            150             0.8
            150             0.8
            300             0.8
            300             0.8
            300             0.8
            300             0.8
            300             0.8
        SoilOrganicMatter: RootCN=70; RootWT=50; SoilCN=13; EnrACoeff=7.4; EnrBCoeff=0.2
          Layer:
            Thickness (mm)  OC (Total %)  FBiom (0-1)  FInert (0-1)
            50              1.3           0.04         0.4
            120             1             0.02         0.5
            150             0.8           0.01         0.75
            150             0.8           0.01         0.85
            150             0.7           0.005        0.9
            300             0.6           0.005        0.95
            300             0.2           0.001        0.99
            300             0.2           0.001        0.99
            300             0.2           0.001        0.99
            300             0.2           0.001        0.99
        Analysis
          Layer:
            Thickness (mm)  PH (1:5 water)
            50              6
            120             6
            150             6
            150             6
            150             6
            300             6
            300             5
            300             5
            300             5
            300             5
        Sample Initial nitrogen
          Layer:
            Thickness (mm)  NO3 (ppm)  NH4 (ppm)
            50              1.99982    0.999876
            120             2.00006    1.00002
            150             1.00006    1.00006
            150             1          0.499995
            150             0.999961   0.499996
            300             0.999998   0.499996
            300             0.999999   0.499997
            300             0.999999   0.499998
            300             0.999999   0.499999
            300             1          0.499999
  simulation 8a) Bundaberg 1992-94 CP51-21 1R(0N) and 2R(0N)
    metfile met: filename=Bundaberg.met
    clock
      start_date = 26/08/1992  # Enter the start date of the simulation
      end_date = 30/05/1994  # Enter the end date of the simulation
    summaryfile
    area paddock
      folder Manager folder
        manager Bundaberg man
          on init:
```
samp=0
```
          on start_of_day:
```
! Observed sampling dates
samp=0
if (year = 1992 and (day = 279 or day = 327 or day = 357)) or
   (year = 1993 and (day = 11 or day = 46 or day = 88 or day = 135 or day = 186)) or
   (year = 1994 and (day = 17 or day = 73 or day = 150)) then
   samp = 1
endif

! Simulation info
site='Bundaberg'
season='1992-94'
treat=1
```
      operations
        26/08/1992  sugar sow population = 10, sowing_depth = 100, cultivar = CP51, ratoon = 1
        16/11/1992  irrigation apply amount = 57.2 (mm) ! Overhead, high pressure gun
        28/01/1993  irrigation apply amount = 70.4 (mm) ! Overhead, high pressure gun
        20/02/1993  irrigation apply amount = 52.4 (mm) ! Overhead, high pressure gun
        3/03/1993  irrigation apply amount = 52.4 (mm) ! Overhead, high pressure gun
        26/03/1993  irrigation apply amount = 53.6 (mm) ! Overhead, high pressure gun
        5/04/1993  irrigation apply amount = 69.0 (mm) ! Overhead, high pressure gun
        29/04/1993  irrigation apply amount = 69.0 (mm) ! Overhead, high pressure gun
        15/05/1993  irrigation apply amount = 55.0 (mm) ! Overhead, high pressure gun
        4/02/1994  irrigation apply amount = 46.9 (mm) ! Overhead, high pressure gun
        17/02/1994  irrigation apply amount = 26.1 (mm) ! Overhead, high pressure gun
        1/03/1994  irrigation apply amount = 26.1 (mm) ! Overhead, high pressure gun
        20/03/1994  irrigation apply amount = 28.6 (mm) ! Overhead, high pressure gun
        12/04/1994  irrigation apply amount = 36.6 (mm) ! Overhead, high pressure gun
        11/05/1994  irrigation apply amount = 36.6 (mm) ! Overhead, high pressure gun
        5/07/1993  sugar harvest  (end_of_day)
        30/05/1994  sugar harvest  (end_of_day)
        30/05/1994  sugar end_crop  (end_of_day)
      sugar
      fertiliser
      irrigation: same as 1) Harwood 1993-94 Q117 P.paddock.Irrigation
      surfaceom Surface Organic Matter
        PoolName = sugar_trash  # Organic Matter pool name
        type = sugar  # Organic Matter type
        mass = 1000  # Initial surface residue (kg/ha)
        cnr = 80  # C:N ratio of initial residue
        standing_fraction = 1  # Fraction of residue standing
      outputfile: filename=8a) Bundaberg 1992-94 CP51-21 1R(0N) and 2R(0N).out; title=8a) Bundaberg 1992-94 CP51-21 1R(0N) and 2R(0N)
        variables -> /simulations/1) Harwood 1993-94 Q117 P/paddock/Outputfile/Variables
        events Reporting Frequency -> /simulations/1) Harwood 1993-94 Q117 P/paddock/Outputfile/Reporting Frequency
      soil Schulte
        Water
          Layer:
            Thickness (mm)  BD (g/cc)  AirDry (mm/mm)  LL15 (mm/mm)  DUL (mm/mm)  SAT (mm/mm)
            200             1.574      0.05            0.111         0.23         0.35
            200             1.649      0.1             0.111         0.23         0.35
            200             1.771      0.1             0.111         0.23         0.33
            300             1.698      0.1             0.17          0.3          0.35
            300             1.58       0.1             0.25          0.37         0.4
            150             1.601      0.1             0.25          0.37         0.396
            150             1.601      0.1             0.25          0.37         0.396
          SoilCrop sugar
            Layer:
              Thickness (mm)  LL (mm/mm)  KL (/day)  XF (0-1)
              200             0.111       0.1        1
              200             0.111       0.1        1
              200             0.111       0.1        1
              300             0.117       0.08       1
              300             0.3         0.08       1
              150             0.33        0.04       1
              150             0.33        0.04       1
        SoilWat: SummerCona=2; SummerU=4; SummerDate=1-Nov; WinterCona=2; WinterU=4; WinterDate=1-Apr; DiffusConst=88; DiffusSlope=35; Salb=0.2; CN2Bare=85; CNRed=20; CNCov=0.8
          Layer:
            Thickness (mm)  SWCON (0-1)
            200             0.2
            200             0.2
            200             0.2
            300             0.3
            300             0.3
            150             0.3
            150             0.3
        SoilOrganicMatter: RootCN=70; RootWT=1000; SoilCN=17; EnrACoeff=7.4; EnrBCoeff=0.2
          Layer:
            Thickness (mm)  OC (Total %)  FBiom (0-1)  FInert (0-1)
            200             0.8           0.03         0.5
            200             0.5           0.015        0.6
            200             0.34          0.015        0.7
            300             0.34          0.01         0.8
            300             0.26          0.01         0.95
            150             0.26          0.01         0.95
            150             0.26          0.01         0.95
        Analysis
          Layer:
            Thickness (mm)  PH (1:5 water)
            200             7
            200             7
            200             7
            300             7
            300             7
            150             7
            150             7
        Sample Initial nitrogen
          Layer:
            Thickness (mm)  NO3 (ppm)  NH4 (ppm)
            200             0.479935   3.28998
            200             1.34988    2.95
            200             0.479986   2.75003
            300             1.01996    2.48004
            300             8.40994    2.61002
            150             14.12      2.48004
            150             14.12      2.48002
        Sample Initial water
          Layer:
            Thickness (mm)  SW (mm/mm)
            200             0.123
            200             0.136
            200             0.159
            300             0.188
            300             0.299
            150             0.337
            150             0.337
  simulation 8b) Bundaberg 1992-94 CP51-21 1R(340N) and 2R(0N)
    metfile met: filename=Bundaberg.met
    clock
      start_date = 26/08/1992  # Enter the start date of the simulation
      end_date = 30/05/1994  # Enter the end date of the simulation
    summaryfile
    area paddock
      folder Manager folder
        manager Bundaberg man
          on init:
```
samp=0
```
          on start_of_day:
```
! Observed sampling dates
samp=0
if (year = 1992 and (day = 327 or day = 357)) or
   (year = 1993 and (day = 11 or day = 46 or day = 88 or day = 135 or day = 186)) or
   (year = 1994 and (day = 17 or day = 73 or day = 150)) then
   samp = 1
endif

! Simulation info
site='Bundaberg'
season='1992-94'
treat=5
```
      operations
        26/08/1992  sugar sow population = 10, sowing_depth = 100, cultivar = CP51, ratoon = 1
        27/10/1992  fertiliser apply amount = 340 (kg/ha), type = urea_n (), depth = 50 (mm)
        16/11/1992  irrigation apply amount = 57.2 (mm) ! Overhead, high pressure gun
        28/01/1993  irrigation apply amount = 70.4 (mm) ! Overhead, high pressure gun
        20/02/1993  irrigation apply amount = 52.4 (mm) ! Overhead, high pressure gun
        3/03/1993  irrigation apply amount = 52.4 (mm) ! Overhead, high pressure gun
        26/03/1993  irrigation apply amount = 53.6 (mm) ! Overhead, high pressure gun
        5/04/1993  irrigation apply amount = 69.0 (mm) ! Overhead, high pressure gun
        29/04/1993  irrigation apply amount = 69.0 (mm) ! Overhead, high pressure gun
        15/05/1993  irrigation apply amount = 55.0 (mm) ! Overhead, high pressure gun
        4/02/1994  irrigation apply amount = 46.9 (mm) ! Overhead, high pressure gun
        17/02/1994  irrigation apply amount = 26.1 (mm) ! Overhead, high pressure gun
        1/03/1994  irrigation apply amount = 26.1 (mm) ! Overhead, high pressure gun
        20/03/1994  irrigation apply amount = 28.6 (mm) ! Overhead, high pressure gun
        12/04/1994  irrigation apply amount = 36.6 (mm) ! Overhead, high pressure gun
        11/05/1994  irrigation apply amount = 36.6 (mm) ! Overhead, high pressure gun
        5/07/1993  sugar harvest  (end_of_day)
        30/05/1994  sugar harvest  (end_of_day)
        30/05/1994  sugar end_crop  (end_of_day)
      sugar
      fertiliser
      irrigation: same as 1) Harwood 1993-94 Q117 P.paddock.Irrigation
      surfaceom Surface Organic Matter
        PoolName = sugar_trash  # Organic Matter pool name
        type = sugar  # Organic Matter type
        mass = 1000  # Initial surface residue (kg/ha)
        cnr = 80  # C:N ratio of initial residue
        standing_fraction = 1  # Fraction of residue standing
      outputfile: filename=8b) Bundaberg 1992-94 CP51-21 1R(340N) and 2R(0N).out; title=8b) Bundaberg 1992-94 CP51-21 1R(340N) and 2R(0N)
        variables -> /simulations/1) Harwood 1993-94 Q117 P/paddock/Outputfile/Variables
        events Reporting Frequency -> /simulations/1) Harwood 1993-94 Q117 P/paddock/Outputfile/Reporting Frequency
      soil Schulte
        Water: same as 8a) Bundaberg 1992-94 CP51-21 1R(0N) and 2R(0N).paddock.Schulte.Water
        SoilWat: same as 8a) Bundaberg 1992-94 CP51-21 1R(0N) and 2R(0N).paddock.Schulte.SoilWat
        SoilOrganicMatter: same as 8a) Bundaberg 1992-94 CP51-21 1R(0N) and 2R(0N).paddock.Schulte.SoilOrganicMatter
        Analysis: same as 8a) Bundaberg 1992-94 CP51-21 1R(0N) and 2R(0N).paddock.Schulte.Analysis
        Sample Initial nitrogen
          Layer:
            Thickness (mm)  NO3 (ppm)  NH4 (ppm)
            200             0.479935   3.28998
            200             1.34988    2.95
            200             0.479986   2.75003
            300             1.01996    2.48004
            300             8.40994    2.61002
            150             14.12      2.48004
            150             14.12      2.48002
        Sample Initial water: same as 8a) Bundaberg 1992-94 CP51-21 1R(0N) and 2R(0N).paddock.Schulte.Initial water
  simulation 8c) Bundaberg 1992-94 CP51-21 1R(340N) and 2R(170N)
    metfile met: filename=Bundaberg.met
    clock
      start_date = 26/08/1992  # Enter the start date of the simulation
      end_date = 30/05/1994  # Enter the end date of the simulation
    summaryfile
    area paddock
      folder Manager folder
        manager Bundaberg man
          on init:
```
samp=0
```
          on start_of_day:
```
! Observed sampling dates
samp=0
if (year = 1992 and (day = 327 or day = 357)) or
   (year = 1993 and (day = 11 or day = 46 or day = 88 or day = 135 or day = 186)) or
   (year = 1994 and (day = 17 or day = 73 or day = 150)) then
   samp = 1
endif

! Simulation info
site='Bundaberg'
season='1992-94'
treat=6
```
      operations
        26/08/1992  sugar sow population = 10, sowing_depth = 100, cultivar = CP51, ratoon = 1
        27/10/1992  fertiliser apply amount = 340 (kg/ha), type = urea_n (), depth = 50 (mm)
        16/11/1992  irrigation apply amount = 57.2 (mm) ! Overhead, high pressure gun
        28/01/1993  irrigation apply amount = 70.4 (mm) ! Overhead, high pressure gun
        20/02/1993  irrigation apply amount = 52.4 (mm) ! Overhead, high pressure gun
        3/03/1993  irrigation apply amount = 52.4 (mm) ! Overhead, high pressure gun
        26/03/1993  irrigation apply amount = 53.6 (mm) ! Overhead, high pressure gun
        5/04/1993  irrigation apply amount = 69.0 (mm) ! Overhead, high pressure gun
        29/04/1993  irrigation apply amount = 69.0 (mm) ! Overhead, high pressure gun
        15/05/1993  irrigation apply amount = 55.0 (mm) ! Overhead, high pressure gun
        12/10/1993  fertiliser apply amount = 170 (kg/ha), type = urea_n (), depth = 50 (mm)
        4/02/1994  irrigation apply amount = 46.9 (mm) ! Overhead, high pressure gun
        17/02/1994  irrigation apply amount = 26.1 (mm) ! Overhead, high pressure gun
        1/03/1994  irrigation apply amount = 26.1 (mm) ! Overhead, high pressure gun
        20/03/1994  irrigation apply amount = 28.6 (mm) ! Overhead, high pressure gun
        12/04/1994  irrigation apply amount = 36.6 (mm) ! Overhead, high pressure gun
        11/05/1994  irrigation apply amount = 36.6 (mm) ! Overhead, high pressure gun
        5/07/1993  sugar harvest  (end_of_day)
        30/05/1994  sugar harvest  (end_of_day)
        30/05/1994  sugar end_crop  (end_of_day)
      sugar
      fertiliser
      irrigation: same as 1) Harwood 1993-94 Q117 P.paddock.Irrigation
      surfaceom Surface Organic Matter
        PoolName = sugar_trash  # Organic Matter pool name
        type = sugar  # Organic Matter type
        mass = 1000  # Initial surface residue (kg/ha)
        cnr = 80  # C:N ratio of initial residue
        standing_fraction = 1  # Fraction of residue standing
      outputfile: filename=8c) Bundaberg 1992-94 CP51-21 1R(340N) and 2R(170N).out; title=8c) Bundaberg 1992-94 CP51-21 1R(340N) and 2R(170N)
        variables -> /simulations/1) Harwood 1993-94 Q117 P/paddock/Outputfile/Variables
        events Reporting Frequency -> /simulations/1) Harwood 1993-94 Q117 P/paddock/Outputfile/Reporting Frequency
      soil Schulte: same as 8b) Bundaberg 1992-94 CP51-21 1R(340N) and 2R(0N).paddock.Schulte
  simulation 9a) Bambaroo 1995-96 Q124 P Fully Irrigated
    metfile met: filename=Bambaroo.met
    clock
      start_date = 6/07/1995  # Enter the start date of the simulation
      end_date = 26/08/1996  # Enter the end date of the simulation
    summaryfile
    area paddock
      folder Manager folder
        manager Bambaroo
          on init:
```
samp=0
```
          on start_of_day:
```
! Set trickle irrigation depth
if daysaftersowing=1 then
   ! irrigation_depth=300(mm)
   'pace water' irrigation_depth=300(mm)
endif

! Observed sampling dates
samp=0
if (year = 1995 and (day = 317)) or
   (year = 1996 and (day = 23 or day = 127 or day = 238)) then
   samp = 1
endif

! Simulation info
site='Bambaroo'
season='1995-96'
treat=1
```
      operations
        6/07/1995  sugar sow population = 10, sowing_depth = 100, cultivar = Q124, ratoon = 0
        6/07/1995  fertiliser apply amount = 45 (kg/ha), depth = 100 (mm), type = nh4_n ()
        15/10/1995  fertiliser apply amount = 25 (kg/ha), depth = 100 (mm), type = nh4_n ()
        29/10/1995  sugar hill_up canefr = 1.0 (), topsfr = 0.50 ()
        17/11/1995  irrigation apply amount = 7.72(mm) ! trickle irrigation
        26/11/1995  irrigation apply amount = 16.52(mm) ! trickle irrigation
        30/11/1995  irrigation apply amount = 16.52(mm) ! trickle irrigation
        4/12/1995  irrigation apply amount = 16.99(mm) ! trickle irrigation
        8/12/1995  irrigation apply amount = 15.3(mm) ! trickle irrigation
        10/12/1995  irrigation apply amount = 15.3(mm) ! trickle irrigation
        11/12/1995  irrigation apply amount = 15.3(mm) ! trickle irrigation
        14/12/1995  irrigation apply amount = 18.3(mm) ! trickle irrigation
        15/12/1995  irrigation apply amount = 18.3(mm) ! trickle irrigation
        24/02/1996  irrigation apply amount = 4.29(mm) ! trickle irrigation
        26/02/1996  irrigation apply amount = 18.43(mm) ! trickle irrigation
        29/02/1996  irrigation apply amount = 33.15(mm) ! trickle irrigation
        2/04/1996  irrigation apply amount = 22.7(mm) ! trickle irrigation
        5/04/1996  irrigation apply amount = 22.7(mm) ! trickle irrigation
        8/04/1996  irrigation apply amount = 22.7(mm) ! trickle irrigation
        11/04/1996  irrigation apply amount = 22.7(mm) ! trickle irrigation
        24/04/1996  irrigation apply amount = 3.39(mm) ! trickle irrigation
        2/05/1996  irrigation apply amount = 17.23(mm) ! trickle irrigation
        15/05/1996  irrigation apply amount = 17.23(mm) ! trickle irrigation
        20/05/1996  irrigation apply amount = 18.87(mm) ! trickle irrigation
        26/05/1996  irrigation apply amount = 18.87(mm) ! trickle irrigation
        29/05/1996  irrigation apply amount = 18.87(mm) ! trickle irrigation
        31/05/1996  irrigation apply amount = 18.87(mm) ! trickle irrigation
        6/06/1996  irrigation apply amount = 18.87(mm) ! trickle irrigation
        21/07/1996  irrigation apply amount = 24.23(mm) ! trickle irrigation
        28/07/1996  irrigation apply amount = 15.69(mm) ! trickle irrigation
        5/08/1996  irrigation apply amount = 15.69(mm) ! trickle irrigation
        13/08/1996  irrigation apply amount = 5.82(mm) ! trickle irrigation
        26/08/1996  sugar harvest  (end_of_day)
        26/08/1996  sugar end_crop  (end_of_day)
      sugar
      fertiliser
      irrigation: same as 1) Harwood 1993-94 Q117 P.paddock.Irrigation
      surfaceom Surface Organic Matter
        PoolName = sugar_trash  # Organic Matter pool name
        type = sugar  # Organic Matter type
        mass = 100  # Initial surface residue (kg/ha)
        cnr = 80  # C:N ratio of initial residue
        standing_fraction = 1  # Fraction of residue standing
      outputfile: filename=9a) Bambaroo 1995-96 Q124 P Fully Irrigated.out; title=9a) Bambaroo 1995-96 Q124 P Fully Irrigated
        variables -> /simulations/1) Harwood 1993-94 Q117 P/paddock/Outputfile/Variables
        events Reporting Frequency -> /simulations/1) Harwood 1993-94 Q117 P/paddock/Outputfile/Reporting Frequency
      soil Pace
        Water
          Layer:
            Thickness (mm)  BD (g/cc)  AirDry (mm/mm)  LL15 (mm/mm)  DUL (mm/mm)  SAT (mm/mm)
            100             1.3        0.05            0.26          0.42         0.46
            200             1.3        0.1             0.26          0.42         0.46
            300             1.3        0.1             0.26          0.42         0.46
            300             1.3        0.1             0.26          0.42         0.46
            300             1.3        0.1             0.26          0.42         0.46
            600             1.3        0.1             0.26          0.42         0.46
          SoilCrop sugar
            Layer:
              Thickness (mm)  LL (mm/mm)  KL (/day)  XF (0-1)
              100             0.26        0.1        1
              200             0.26        0.1        1
              300             0.26        0.1        1
              300             0.26        0.08       1
              300             0.26        0.08       1
              600             0.26        0.04       1
        SoilWat: SummerCona=3; SummerU=6; SummerDate=1-Nov; WinterCona=3; WinterU=6; WinterDate=1-Apr; DiffusConst=40; DiffusSlope=16; Salb=0.1; CN2Bare=78; CNRed=20; CNCov=0.8
          Layer:
            Thickness (mm)  SWCON (0-1)
            100             0.3
            200             0.3
            300             0.3
            300             0.3
            300             0.3
            600             0.3
        SoilOrganicMatter: RootCN=70; RootWT=50; SoilCN=13; EnrACoeff=7.4; EnrBCoeff=0.2
          Layer:
            Thickness (mm)  OC (Total %)  FBiom (0-1)  FInert (0-1)
            100             1.3           0.03         0.4
            200             1             0.015        0.5
            300             0.8           0.01         0.75
            300             0.8           0.01         0.85
            300             0.7           0.005        0.9
            600             0.6           0.005        0.95
        Analysis
          Layer:
            Thickness (mm)  PH (1:5 water)
            100             6
            200             6
            300             6
            300             6
            300             6
            600             6
        Sample Initial nitrogen
          Layer:
            Thickness (mm)  NO3 (ppm)  NH4 (ppm)
            100             2          1
            200             2          1
            300             1          1
            300             1          0.5
            300             1          0.5
            600             1          0.5
        Sample Initial water
          Layer:
            Thickness (mm)  SW (mm/mm)
            100             0.24
            200             0.34
            300             0.4
            300             0.4
            300             0.4
            600             0.4
  simulation 9b) Bambaroo 1995-96 Q124 P Supplementary Irrigated
    metfile met: filename=Bambaroo.met
    clock
      start_date = 6/07/1995  # Enter the start date of the simulation
      end_date = 26/08/1996  # Enter the end date of the simulation
    summaryfile
    area paddock
      folder Manager folder
        manager Bambaroo
          on init:
```
samp=0
```
          on start_of_day:
```
! Set trickle irrigation depth
if daysaftersowing=1 then
   ! irrigation_depth=300(mm)
   'pace water' irrigation_depth=300(mm)
endif

! Observed sampling dates
samp=0
if (year = 1996 and (day = 127 or day = 238)) then
   samp = 1
endif

! Simulation info
site='Bambaroo'
season='1995-96'
treat=2
```
      operations
        6/07/1995  sugar sow population = 10, sowing_depth = 100, cultivar = Q124, ratoon = 0
        6/07/1995  fertiliser apply amount = 44.5 (kg/ha), depth = 100 (mm), type = nh4_n ()
        15/10/1995  fertiliser apply amount = 24.7 (kg/ha), depth = 100 (mm), type = nh4_n ()
        29/10/1995  sugar hill_up canefr = 1.0 (), topsfr = 0.50 ()
        17/11/1995  irrigation apply amount = 5.02(mm) ! trickle irrigation
        24/02/1996  irrigation apply amount = 4.82(mm) ! trickle irrigation
        24/02/1996  irrigation apply amount = 20.26(mm) ! trickle irrigation
        29/02/1996  irrigation apply amount = 29(mm) ! trickle irrigation
        2/04/1996  irrigation apply amount = 21.84(mm) ! trickle irrigation
        5/04/1996  irrigation apply amount = 21.84(mm) ! trickle irrigation
        8/04/1996  irrigation apply amount = 21.84(mm) ! trickle irrigation
        11/04/1996  irrigation apply amount = 21.84(mm) ! trickle irrigation
        24/04/1996  irrigation apply amount = 3.58(mm) ! trickle irrigation
        2/05/1996  irrigation apply amount = 17.71(mm) ! trickle irrigation
        15/05/1996  irrigation apply amount = 17.71(mm) ! trickle irrigation
        20/05/1996  irrigation apply amount = 18.61(mm) ! trickle irrigation
        26/05/1996  irrigation apply amount = 18.61(mm) ! trickle irrigation
        29/05/1996  irrigation apply amount = 18.61(mm) ! trickle irrigation
        31/05/1996  irrigation apply amount = 18.61(mm) ! trickle irrigation
        6/06/1996  irrigation apply amount = 18.61(mm) ! trickle irrigation
        21/07/1996  irrigation apply amount = 23.54(mm) ! trickle irrigation
        28/07/1996  irrigation apply amount = 21.12(mm) ! trickle irrigation
        5/08/1996  irrigation apply amount = 21.12(mm) ! trickle irrigation
        13/08/1996  irrigation apply amount = 4.48(mm) ! trickle irrigation
        26/08/1996  sugar harvest  (end_of_day)
        26/08/1996  sugar end_crop  (end_of_day)
      sugar
      fertiliser
      irrigation: same as 1) Harwood 1993-94 Q117 P.paddock.Irrigation
      surfaceom Surface Organic Matter
        PoolName = sugar_trash  # Organic Matter pool name
        type = sugar  # Organic Matter type
        mass = 100  # Initial surface residue (kg/ha)
        cnr = 80  # C:N ratio of initial residue
        standing_fraction = 1  # Fraction of residue standing
      outputfile: filename=9b) Bambaroo 1995-96 Q124 P Supplementary Irrigated.out; title=9b) Bambaroo 1995-96 Q124 P Supplementary Irrigated
        variables -> /simulations/1) Harwood 1993-94 Q117 P/paddock/Outputfile/Variables
        events Reporting Frequency -> /simulations/1) Harwood 1993-94 Q117 P/paddock/Outputfile/Reporting Frequency
      soil Pace: same as 9a) Bambaroo 1995-96 Q124 P Fully Irrigated.paddock.Pace
  simulation 9c) Bambaroo 1995-96 Q124 P Rainfed
    metfile met: filename=Bambaroo.met
    clock
      start_date = 6/07/1995  # Enter the start date of the simulation
      end_date = 26/08/1996  # Enter the end date of the simulation
    summaryfile
    area paddock
      folder Manager folder
        manager Bambaroo
          on init:
```
samp=0
```
          on start_of_day:
```
! Rainfed

! Observed sampling dates
samp=0
if (year = 1995 and (day = 317)) or
   (year = 1996 and (day = 23 or day = 127 or day = 238)) then
   samp = 1
endif

! Simulation info
site='Bambaroo'
season='1995-96'
treat=3
```
      operations
        6/07/1995  sugar sow population = 10, sowing_depth = 100, cultivar = Q124, ratoon = 0
        6/07/1995  fertiliser apply amount = 44.5 (kg/ha), depth = 100 (mm), type = nh4_n ()
        15/10/1995  fertiliser apply amount = 24.7 (kg/ha), depth = 100 (mm), type = nh4_n ()
        29/10/1995  sugar hill_up canefr = 1.0 (), topsfr = 0.50 ()
        26/08/1996  sugar harvest  (end_of_day)
        26/08/1996  sugar end_crop  (end_of_day)
      sugar
      fertiliser
      irrigation: same as 1) Harwood 1993-94 Q117 P.paddock.Irrigation
      surfaceom Surface Organic Matter
        PoolName = sugar_trash  # Organic Matter pool name
        type = sugar  # Organic Matter type
        mass = 100  # Initial surface residue (kg/ha)
        cnr = 80  # C:N ratio of initial residue
        standing_fraction = 1  # Fraction of residue standing
      outputfile: filename=9c) Bambaroo 1995-96 Q124 P Rainfed.out; title=9c) Bambaroo 1995-96 Q124 P Rainfed
        variables -> /simulations/1) Harwood 1993-94 Q117 P/paddock/Outputfile/Variables
        events Reporting Frequency -> /simulations/1) Harwood 1993-94 Q117 P/paddock/Outputfile/Reporting Frequency
      soil Pace: same as 9a) Bambaroo 1995-96 Q124 P Fully Irrigated.paddock.Pace
  simulation 10a) La Mercy 1994-95 NCo376 1R Rainfed
    metfile met: filename=LaMercy.met
    clock
      start_date = 13/10/1994  # Enter the start date of the simulation
      end_date = 7/11/1995  # Enter the end date of the simulation
    summaryfile
    area paddock
      folder Manager folder
        manager LaMercy
          on init:
```
samp=0
```
          on start_of_day:
```
! Observed sampling dates
samp=0
if ((year = 1995) and (day = 311)) then
   samp = 1
endif

! Simulation info
site='LaMercy'
season='1994-95'
treat=5
```
      operations
        13/10/1994  sugar sow population = 16, sowing_depth = 150, cultivar = NCo376, ratoon = 1
        13/10/1994  fertiliser apply amount = 140 (kg/ha), depth = 50 (mm), type = urea_n ()
        7/11/1995  sugar harvest  (end_of_day)
        7/11/1995  sugar end_crop  (end_of_day)
      sugar
      fertiliser
      irrigation: same as 1) Harwood 1993-94 Q117 P.paddock.Irrigation
      surfaceom Surface Organic Matter
        PoolName = sugar_trash  # Organic Matter pool name
        type = sugar  # Organic Matter type
        mass = 1000  # Initial surface residue (kg/ha)
        cnr = 80  # C:N ratio of initial residue
        standing_fraction = 1  # Fraction of residue standing
      outputfile: filename=10a) La Mercy 1994-95 NCo376 1R Rainfed.out; title=10a) La Mercy 1994-95 NCo376 1R Rainfed
        variables -> /simulations/1) Harwood 1993-94 Q117 P/paddock/Outputfile/Variables
        events Reporting Frequency -> /simulations/1) Harwood 1993-94 Q117 P/paddock/Outputfile/Reporting Frequency
      soil La Mercy
        Water
          Layer:
            Thickness (mm)  BD (g/cc)  AirDry (mm/mm)  LL15 (mm/mm)  DUL (mm/mm)  SAT (mm/mm)
            50              1.2        0.05            0.19          0.321        0.49
            100             1.31       0.05            0.19          0.321        0.45
            150             1.33       0.05            0.233         0.344        0.44
            150             1.45       0.05            0.289         0.35         0.4
            150             1.5        0.05            0.289         0.35         0.39
            150             1.47       0.05            0.286         0.35         0.39
            50              1.47       0.05            0.286         0.35         0.39
            150             1.47       0.05            0.286         0.35         0.39
            150             1.47       0.05            0.286         0.35         0.39
            400             1.47       0.05            0.196         0.321        0.39
          SoilCrop sugar
            Layer:
              Thickness (mm)  LL (mm/mm)  KL (/day)  XF (0-1)
              50              0.22        0.1        1
              100             0.22        0.1        1
              150             0.25        0.1        1
              150             0.3         0.1        1
              150             0.3         0.1        1
              150             0.3         0.08       1
              50              0.3         0.08       1
              150             0.3         0.08       1
              150             0.3         0.08       1
              400             0.2         0.04       1
        SoilWat: SummerCona=3; SummerU=9; SummerDate=1-Nov; WinterCona=3; WinterU=9; WinterDate=1-Apr; DiffusConst=40; DiffusSlope=16; Salb=0.17; CN2Bare=82; CNRed=20; CNCov=0.8
          Layer:
            Thickness (mm)  SWCON (0-1)
            50              0.6
            100             0.6
            150             0.6
            150             0.6
            150             0.6
            150             0.6
            50              0.6
            150             0.6
            150             0.6
            400             0.6
        SoilOrganicMatter: RootCN=70; RootWT=1000; SoilCN=13; EnrACoeff=7.4; EnrBCoeff=0.2
          Layer:
            Thickness (mm)  OC (Total %)  FBiom (0-1)  FInert (0-1)
            50              1.3           0.03         0.4
            100             1             0.015        0.5
            150             0.8           0.01         0.75
            150             0.8           0.01         0.85
            150             0.7           0.005        0.9
            150             0.6           0.005        0.95
            50              0.2           0.001        0.99
            150             0.2           0.001        0.99
            150             0.2           0.001        0.99
            400             0.2           0.001        0.99
        Analysis
          Layer:
            Thickness (mm)  PH (1:5 water)
            50              6
            100             6
            150             6
            150             6
            150             6
            150             6
            50              5
            150             5
            150             5
            400             5
        Sample Initial nitrogen
          Layer:
            Thickness (mm)  NO3 (ppm)  NH4 (ppm)
            50              2.00002    1.00011
            100             2.00002    1.00011
            150             1.00001    1.00011
            150             0.999945   0.500009
            150             0.999996   0.500008
            150             0.999995   0.500006
            50              1.00003    0.500005
            150             0.999997   0.500005
            150             1.00003    0.500003
            400             1          0.500002
        Sample Initial water
          Layer:
            Thickness (mm)  SW (mm/mm)
            50              0.259
            100             0.259
            150             0.289
            150             0.331
            150             0.331
            150             0.328
            50              0.328
            150             0.33
            150             0.328
            400             0.259
  simulation 10b) La Mercy 1994-95 NCo376 1R Irrigation Treatment 1
    metfile met: filename=LaMercy.met
    clock
      start_date = 13/10/1994  # Enter the start date of the simulation
      end_date = 7/11/1995  # Enter the end date of the simulation
    summaryfile
    area paddock
      folder Manager folder
        manager LaMercy
          on init:
```
samp=0
```
          on start_of_day:
```
! Observed sampling dates
samp=0
if ((year = 1995) and (day = 311)) then
   samp = 1
endif

! Simulation info
site='LaMercy'
season='1994-95'
treat=1
```
      operations
        13/10/1994  sugar sow population = 16, sowing_depth = 150, cultivar = NCo376, ratoon = 1
        13/10/1994  fertiliser apply amount = 140 (kg/ha), depth = 50 (mm), type = urea_n ()
        7/12/1994  irrigation apply amount = 5.0 (mm)
        9/12/1994  irrigation apply amount = 11.5 (mm)
        14/12/1994  irrigation apply amount = 27.7 (mm)
        20/12/1994  irrigation apply amount = 28.2 (mm)
        7/01/1995  irrigation apply amount = 33.4 (mm)
        13/01/1995  irrigation apply amount = 39.3 (mm)
        21/01/1995  irrigation apply amount = 70.0 (mm)
        22/01/1995  irrigation apply amount = 70.0 (mm)
        9/02/1995  irrigation apply amount = 49.9 (mm)
        16/02/1995  irrigation apply amount = 50.0 (mm)
        27/02/1995  irrigation apply amount = 52.0 (mm)
        14/03/1995  irrigation apply amount = 49.3 (mm)
        22/05/1995  irrigation apply amount = 57.8 (mm)
        13/06/1995  irrigation apply amount = 39.6 (mm)
        7/07/1995  irrigation apply amount = 54.5 (mm)
        19/07/1995  irrigation apply amount = 23.0 (mm)
        2/08/1995  irrigation apply amount = 75.6 (mm)
        16/08/1995  irrigation apply amount = 26.3 (mm)
        28/08/1995  irrigation apply amount = 22.2 (mm)
        6/09/1995  irrigation apply amount = 29.4 (mm)
        14/09/1995  irrigation apply amount = 23.8 (mm)
        22/09/1995  irrigation apply amount = 23.8 (mm)
        28/09/1995  irrigation apply amount = 23.5 (mm)
        5/10/1995  irrigation apply amount = 23.3 (mm)
        7/11/1995  sugar harvest  (end_of_day)
        7/11/1995  sugar end_crop  (end_of_day)
      sugar
      fertiliser
      irrigation: same as 1) Harwood 1993-94 Q117 P.paddock.Irrigation
      surfaceom Surface Organic Matter
        PoolName = sugar_trash  # Organic Matter pool name
        type = sugar  # Organic Matter type
        mass = 1000  # Initial surface residue (kg/ha)
        cnr = 80  # C:N ratio of initial residue
        standing_fraction = 1  # Fraction of residue standing
      outputfile: filename=10b) La Mercy 1994-95 NCo376 1R Irrigation Treatment 1.out; title=10b) La Mercy 1994-95 NCo376 1R Irrigation Treatment 1
        variables -> /simulations/1) Harwood 1993-94 Q117 P/paddock/Outputfile/Variables
        events Reporting Frequency -> /simulations/1) Harwood 1993-94 Q117 P/paddock/Outputfile/Reporting Frequency
      soil La Mercy
        Water: same as 10a) La Mercy 1994-95 NCo376 1R Rainfed.paddock.La Mercy.Water
        SoilWat: same as 10a) La Mercy 1994-95 NCo376 1R Rainfed.paddock.La Mercy.SoilWat
        SoilOrganicMatter: same as 10a) La Mercy 1994-95 NCo376 1R Rainfed.paddock.La Mercy.SoilOrganicMatter
        Analysis: same as 10a) La Mercy 1994-95 NCo376 1R Rainfed.paddock.La Mercy.Analysis
        Sample Initial nitrogen
          Layer:
            Thickness (mm)  NO3 (ppm)  NH4 (ppm)
            50              2.00002    1.00011
            100             2.00002    1.00011
            150             1.00001    1.00011
            150             0.999945   0.500009
            150             0.999996   0.500008
            150             0.999995   0.500006
            50              1.00003    0.500005
            150             0.999997   0.500005
            150             1.00003    0.500003
            400             1          0.500002
        Sample Initial water: same as 10a) La Mercy 1994-95 NCo376 1R Rainfed.paddock.La Mercy.Initial water
  simulation 10c) La Mercy 1994-95 NCo376 1R Irrigation Treatment 2
    metfile met: filename=LaMercy.met
    clock
      start_date = 13/10/1994  # Enter the start date of the simulation
      end_date = 7/11/1995  # Enter the end date of the simulation
    summaryfile
    area paddock
      folder Manager folder
        manager LaMercy
          on init:
```
samp=0
```
          on start_of_day:
```
! Observed sampling dates
samp=0
if ((year = 1995) and (day = 311)) then
   samp = 1
endif

! Simulation info
site='LaMercy'
season='1994-95'
treat=2
```
      operations
        13/10/1994  sugar sow population = 16, sowing_depth = 150, cultivar = NCo376, ratoon = 1
        13/10/1994  fertiliser apply amount = 140 (kg/ha), depth = 50 (mm), type = urea_n ()
        11/12/1994  irrigation apply amount = 37.5 (mm)
        19/12/1994  irrigation apply amount = 34.1 (mm)
        7/01/1995  irrigation apply amount = 33.4 (mm)
        21/01/1995  irrigation apply amount = 70.0 (mm)
        22/01/1995  irrigation apply amount = 70.0 (mm)
        9/02/1995  irrigation apply amount = 49.9 (mm)
        17/02/1995  irrigation apply amount = 49.3 (mm)
        1/03/1995  irrigation apply amount = 46.5 (mm)
        16/03/1995  irrigation apply amount = 47.0 (mm)
        29/05/1995  irrigation apply amount = 60.5 (mm)
        14/07/1995  irrigation apply amount = 22.6 (mm)
        1/08/1995  irrigation apply amount = 26.4 (mm)
        16/08/1995  irrigation apply amount = 26.3 (mm)
        25/08/1995  irrigation apply amount = 25.7 (mm)
        5/09/1995  irrigation apply amount = 34.5 (mm)
        12/09/1995  irrigation apply amount = 38.0 (mm)
        20/09/1995  irrigation apply amount = 39.5 (mm)
        27/09/1995  irrigation apply amount = 25.0 (mm)
        3/10/1995  irrigation apply amount = 25.1 (mm)
        10/10/1995  irrigation apply amount = 20.6 (mm)
        7/11/1995  sugar harvest  (end_of_day)
        7/11/1995  sugar end_crop  (end_of_day)
      sugar
      fertiliser
      irrigation: same as 1) Harwood 1993-94 Q117 P.paddock.Irrigation
      surfaceom Surface Organic Matter
        PoolName = sugar_trash  # Organic Matter pool name
        type = sugar  # Organic Matter type
        mass = 1000  # Initial surface residue (kg/ha)
        cnr = 80  # C:N ratio of initial residue
        standing_fraction = 1  # Fraction of residue standing
      outputfile: filename=10c) La Mercy 1994-95 NCo376 1R Irrigation Treatment 2.out; title=10c) La Mercy 1994-95 NCo376 1R Irrigation Treatment 2
        variables -> /simulations/1) Harwood 1993-94 Q117 P/paddock/Outputfile/Variables
        events Reporting Frequency -> /simulations/1) Harwood 1993-94 Q117 P/paddock/Outputfile/Reporting Frequency
      soil La Mercy: same as 10b) La Mercy 1994-95 NCo376 1R Irrigation Treatment 1.paddock.La Mercy
  simulation 10d) La Mercy 1994-95 NCo376 1R Irrigation Treatment 3
    metfile met: filename=LaMercy.met
    clock
      start_date = 13/10/1994  # Enter the start date of the simulation
      end_date = 7/11/1995  # Enter the end date of the simulation
    summaryfile
    area paddock
      folder Manager folder
        manager LaMercy
          on init:
```
samp=0
```
          on start_of_day:
```
! Observed sampling dates
samp=0
if ((year = 1995) and (day = 311)) then
   samp = 1
endif

! Simulation info
site='LaMercy'
season='1994-95'
treat=3
```
      operations
        13/10/1994  sugar sow population = 16, sowing_depth = 150, cultivar = NCo376, ratoon = 1
        13/10/1994  fertiliser apply amount = 140 (kg/ha), depth = 50 (mm), type = urea_n ()
        14/12/1994  irrigation apply amount = 27.7 (mm)
        20/12/1994  irrigation apply amount = 28.2 (mm)
        11/01/1995  irrigation apply amount = 26.1 (mm)
        21/01/1995  irrigation apply amount = 70.0 (mm)
        22/01/1995  irrigation apply amount = 70.0 (mm)
        9/02/1995  irrigation apply amount = 49.9 (mm)
        17/02/1995  irrigation apply amount = 49.3 (mm)
        1/03/1995  irrigation apply amount = 46.5 (mm)
        23/03/1995  irrigation apply amount = 78.5 (mm)
        3/06/1995  irrigation apply amount = 18.5 (mm)
        13/06/1995  irrigation apply amount = 39.6 (mm)
        14/07/1995  irrigation apply amount = 22.6 (mm)
        25/07/1995  irrigation apply amount = 24.6 (mm)
        11/08/1995  irrigation apply amount = 26.4 (mm)
        17/08/1995  irrigation apply amount = 24.9 (mm)
        24/08/1995  irrigation apply amount = 24.0 (mm)
        5/09/1995  irrigation apply amount = 34.5 (mm)
        12/09/1995  irrigation apply amount = 38.0 (mm)
        22/09/1995  irrigation apply amount = 23.8 (mm)
        27/09/1995  irrigation apply amount = 25.0 (mm)
        3/10/1995  irrigation apply amount = 25.1 (mm)
        12/10/1995  irrigation apply amount = 27.5 (mm)
        7/11/1995  sugar harvest  (end_of_day)
        7/11/1995  sugar end_crop  (end_of_day)
      sugar
      fertiliser
      irrigation: same as 1) Harwood 1993-94 Q117 P.paddock.Irrigation
      surfaceom Surface Organic Matter
        PoolName = sugar_trash  # Organic Matter pool name
        type = sugar  # Organic Matter type
        mass = 1000  # Initial surface residue (kg/ha)
        cnr = 80  # C:N ratio of initial residue
        standing_fraction = 1  # Fraction of residue standing
      outputfile: filename=10d) La Mercy 1994-95 NCo376 1R Irrigation Treatment 3.out; title=10d) La Mercy 1994-95 NCo376 1R Irrigation Treatment 3
        variables -> /simulations/1) Harwood 1993-94 Q117 P/paddock/Outputfile/Variables
        events Reporting Frequency -> /simulations/1) Harwood 1993-94 Q117 P/paddock/Outputfile/Reporting Frequency
      soil La Mercy: same as 10b) La Mercy 1994-95 NCo376 1R Irrigation Treatment 1.paddock.La Mercy
  simulation 10e) La Mercy 1994-95 NCo376 1R Irrigation Treatment 4
    metfile met: filename=LaMercy.met
    clock
      start_date = 13/10/1994  # Enter the start date of the simulation
      end_date = 7/11/1995  # Enter the end date of the simulation
    summaryfile
    area paddock
      folder Manager folder
        manager LaMercy
          on init:
```
samp=0
```
          on start_of_day:
```
! Observed sampling dates
samp=0
if ((year = 1995) and (day = 311)) then
   samp = 1
endif

! Simulation info
site='LaMercy'
season='1994-95'
treat=4
```
      operations
        13/10/1994  sugar sow population = 16, sowing_depth = 150, cultivar = NCo376, ratoon = 1
        13/10/1994  fertiliser apply amount = 140 (kg/ha), depth = 50 (mm), type = urea_n ()
        15/12/1994  irrigation apply amount = 38.5 (mm)
        11/01/1995  irrigation apply amount = 26.2 (mm)
        27/01/1995  irrigation apply amount = 42.0 (mm)
        28/01/1995  irrigation apply amount = 42.0 (mm)
        17/02/1995  irrigation apply amount = 49.3 (mm)
        6/03/1995  irrigation apply amount = 51.5 (mm)
        24/08/1995  irrigation apply amount = 24.0 (mm)
        6/09/1995  irrigation apply amount = 29.4 (mm)
        26/09/1995  irrigation apply amount = 24.6 (mm)
        10/10/1995  irrigation apply amount = 20.6 (mm)
        7/11/1995  sugar harvest  (end_of_day)
        7/11/1995  sugar end_crop  (end_of_day)
      sugar
      fertiliser
      irrigation: same as 1) Harwood 1993-94 Q117 P.paddock.Irrigation
      surfaceom Surface Organic Matter
        PoolName = sugar_trash  # Organic Matter pool name
        type = sugar  # Organic Matter type
        mass = 1000  # Initial surface residue (kg/ha)
        cnr = 80  # C:N ratio of initial residue
        standing_fraction = 1  # Fraction of residue standing
      outputfile: filename=10e) La Mercy 1994-95 NCo376 1R Irrigation Treatment 4.out; title=10e) La Mercy 1994-95 NCo376 1R Irrigation Treatment 4
        variables -> /simulations/1) Harwood 1993-94 Q117 P/paddock/Outputfile/Variables
        events Reporting Frequency -> /simulations/1) Harwood 1993-94 Q117 P/paddock/Outputfile/Reporting Frequency
      soil La Mercy: same as 10b) La Mercy 1994-95 NCo376 1R Irrigation Treatment 1.paddock.La Mercy
  simulation 11) Grafton 1994-95 Q117 P
    metfile met: filename=Grafton.met
    clock
      start_date = 28/09/1994  # Enter the start date of the simulation
      end_date = 5/09/1995  # Enter the end date of the simulation
    summaryfile
    area paddock
      folder Manager folder
        manager Grafton man
          on init:
```
samp=0
```
          on start_of_day:
```
! Set trickle irrigation depth
if daysaftersowing=2 then
   'Grafton Water' set irrigation_depth=300(mm)
endif

! Observed sampling dates
samp=0
if (year = 1994 and day = 336) or
   (year = 1995 and (day = 18 or day = 52 or day = 87 or day = 129 or day = 157
    or day = 206 or day = 248)) then
    samp = 1
endif

! Simulation info
site='Grafton'
season='1994-95'
treat=1
```
      operations
        28/09/1994  sugar sow population=10, sowing_depth= 150, cultivar= Q117_fum, ratoon= 0
        24/11/1994  fertiliser apply amount = 200 (kg/ha), depth = 50 (mm), type = urea_n ()
        11/12/1994  fertiliser apply amount = 30 (kg/ha), depth = 300 (mm), type = no3_n ()  ! fertigation
        20/12/1994  irrigation apply amount = 7.5 (mm) ! Trickle
        21/12/1994  irrigation apply amount = 9.4 (mm) ! Trickle
        22/12/1994  irrigation apply amount = 9.8 (mm) ! Trickle
        4/01/1995  irrigation apply amount = 0.8 (mm) ! Trickle
        7/01/1995  irrigation apply amount = 0.9 (mm) ! Trickle
        8/01/1995  irrigation apply amount = 12.1 (mm) ! Trickle
        9/01/1995  irrigation apply amount = 12.2 (mm) ! Trickle
        10/01/1995  fertiliser apply amount = 30 (kg/ha), depth = 300 (mm), type = no3_n ()  ! fertigation
        10/01/1995  irrigation apply amount = 0.6 (mm) ! Trickle
        11/01/1995  irrigation apply amount = 7.7 (mm) ! Trickle
        16/01/1995  irrigation apply amount = 9.7 (mm) ! Trickle
        17/01/1995  irrigation apply amount = 9.7 (mm) ! Trickle
        22/01/1995  irrigation apply amount = 8.3 (mm) ! Trickle
        25/01/1995  irrigation apply amount = 7.7 (mm) ! Trickle
        31/01/1995  irrigation apply amount = 10.7 (mm) ! Trickle
        2/02/1995  irrigation apply amount = 8.9 (mm) ! Trickle
        4/02/1995  irrigation apply amount = 8.9 (mm) ! Trickle
        7/02/1995  irrigation apply amount = 9.8 (mm) ! Trickle
        9/02/1995  fertiliser apply amount = 30 (kg/ha), depth = 300 (mm), type = no3_n ()  ! fertigation
        9/02/1995  irrigation apply amount = 6.5 (mm) ! Trickle
        22/02/1995  irrigation apply amount = 2.8 (mm) ! Trickle
        27/02/1995  irrigation apply amount = 9.5 (mm) ! Trickle
        5/03/1995  irrigation apply amount = 10.9 (mm) ! Trickle
        11/03/1995  fertiliser apply amount = 30 (kg/ha), depth = 300 (mm), type = no3_n ()  ! fertigation
        12/03/1995  irrigation apply amount = 5.4 (mm) ! Trickle
        13/03/1995  irrigation apply amount = 1.8 (mm) ! Trickle
        14/03/1995  irrigation apply amount = 3.6 (mm) ! Trickle
        16/03/1995  irrigation apply amount = 3.8 (mm) ! Trickle
        20/03/1995  irrigation apply amount = 0.6 (mm) ! Trickle
        21/03/1995  irrigation apply amount = 2.5 (mm) ! Trickle
        22/03/1995  irrigation apply amount = 1.8 (mm) ! Trickle
        23/03/1995  irrigation apply amount = 1.8 (mm) ! Trickle
        26/03/1995  irrigation apply amount = 4.1 (mm) ! Trickle
        28/03/1995  irrigation apply amount = 0.1 (mm) ! Trickle
        29/03/1995  irrigation apply amount = 2.1 (mm) ! Trickle
        30/03/1995  irrigation apply amount = 1.9 (mm) ! Trickle
        4/04/1995  irrigation apply amount = 2.7 (mm) ! Trickle
        5/04/1995  irrigation apply amount = 3.4 (mm) ! Trickle
        9/04/1995  irrigation apply amount = 4.9 (mm) ! Trickle
        10/04/1995  fertiliser apply amount = 30 (kg/ha), depth = 300 (mm), type = no3_n ()  ! fertigation
        11/04/1995  irrigation apply amount = 3.5 (mm) ! Trickle
        12/04/1995  irrigation apply amount = 3.4 (mm) ! Trickle
        13/04/1995  irrigation apply amount = 0.9 (mm) ! Trickle
        16/04/1995  irrigation apply amount = 3.2 (mm) ! Trickle
        17/04/1995  irrigation apply amount = 3.2 (mm) ! Trickle
        18/04/1995  irrigation apply amount = 3.2 (mm) ! Trickle
        19/04/1995  irrigation apply amount = 3.2 (mm) ! Trickle
        20/04/1995  irrigation apply amount = 3.2 (mm) ! Trickle
        21/04/1995  irrigation apply amount = 3.2 (mm) ! Trickle
        22/04/1995  irrigation apply amount = 3.2 (mm) ! Trickle
        23/04/1995  irrigation apply amount = 3.2 (mm) ! Trickle
        24/04/1995  irrigation apply amount = 3.2 (mm) ! Trickle
        25/04/1995  irrigation apply amount = 3.2 (mm) ! Trickle
        26/04/1995  irrigation apply amount = 3.2 (mm) ! Trickle
        27/04/1995  irrigation apply amount = 3.3 (mm) ! Trickle
        28/04/1995  irrigation apply amount = 2.3 (mm) ! Trickle
        29/04/1995  irrigation apply amount = 2.3 (mm) ! Trickle
        30/04/1995  irrigation apply amount = 2.3 (mm) ! Trickle
        1/05/1995  irrigation apply amount = 2.1 (mm) ! Trickle
        2/05/1995  irrigation apply amount = 1.9 (mm) ! Trickle
        3/05/1995  irrigation apply amount = 1.9 (mm) ! Trickle
        5/05/1995  irrigation apply amount = 1.9 (mm) ! Trickle
        6/05/1995  irrigation apply amount = 1.9 (mm) ! Trickle
        7/05/1995  irrigation apply amount = 1.9 (mm) ! Trickle
        10/05/1995  fertiliser apply amount = 30 (kg/ha), depth = 300 (mm), type = no3_n ()  ! fertigation
        11/05/1995  irrigation apply amount = 2.6 (mm) ! Trickle
        9/06/1995  fertiliser apply amount = 30 (kg/ha), depth = 300 (mm), type = no3_n ()  ! fertigation
        13/06/1995  irrigation apply amount = 2.8 (mm) ! Trickle
        29/06/1995  irrigation apply amount = 5.1 (mm) ! Trickle
        9/07/1995  fertiliser apply amount = 30 (kg/ha), depth = 300 (mm), type = no3_n ()  ! fertigation
        16/07/1995  irrigation apply amount = 5 (mm) ! Trickle
        20/07/1995  irrigation apply amount = 3.1 (mm) ! Trickle
        29/07/1995  irrigation apply amount = 2.9 (mm) ! Trickle
        5/09/1995  sugar harvest  (end_of_day)
        5/09/1995  sugar end_crop  (end_of_day)
      sugar
      fertiliser
      irrigation: same as 1) Harwood 1993-94 Q117 P.paddock.Irrigation
      surfaceom Surface Organic Matter
        PoolName = sugar_trash  # Organic Matter pool name
        type = sugar  # Organic Matter type
        mass = 100  # Initial surface residue (kg/ha)
        cnr = 80  # C:N ratio of initial residue
        standing_fraction = 1  # Fraction of residue standing
      outputfile: filename=11) Grafton 1994-95 Q117 P.out; title=11) Grafton 1994-95 Q117 P
        variables: same as 1) Harwood 1993-94 Q117 P.paddock.Outputfile.Variables
        events Reporting Frequency: event=Daily  # End of daily simulation time step
      soil Grafton
        InitWater Initial water
          PercentMethod: Percent=1.00; Distributed=Filled from top
        Water: same as 1) Harwood 1993-94 Q117 P.paddock.Harwood.Water
        SoilWat: same as 1) Harwood 1993-94 Q117 P.paddock.Harwood.SoilWat
        SoilOrganicMatter: RootCN=70; RootWT=50; SoilCN=11; EnrACoeff=7.4; EnrBCoeff=0.2
          Layer:
            Thickness (mm)  OC (Total %)  FBiom (0-1)  FInert (0-1)
            200             1.3           0.06         0.4
            200             0.9           0.045        0.55
            200             0.54          0.035        0.85
            300             0.4           0.015        0.95
            300             0.4           0.005        0.95
            300             0.4           0.005        0.99
        Analysis: same as 1) Harwood 1993-94 Q117 P.paddock.Harwood.Analysis
        Sample Initial nitrogen: same as 1) Harwood 1993-94 Q117 P.paddock.Harwood.Initial nitrogen
  simulation 12) Pongola 1986-87 N14 1R
    metfile met: filename=Pongola.met
    clock
      start_date = 12/11/1986  # Enter the start date of the simulation
      end_date = 12/10/1987  # Enter the end date of the simulation
    summaryfile
    area paddock
      folder Manager folder
        manager Pongola
          on init:
```
samp=0
```
          on start_of_day:
```
! Observed sampling dates
samp=0
if ((day = 20 or day = 75 or day = 135 or day = 170 or day = 201)
   and year = 1987) then
   samp = 1
endif

! Simulation info
site='Pongola'
season='1986-87'
treat=2
```
      operations
        12/11/1986  sugar sow population=10, sowing_depth= 150, cultivar=N14 , ratoon= 1
        12/11/1986  fertiliser apply amount = 172 (kg/ha), depth = 50 (mm), type = no3_n ()
        19/12/1986  fertiliser apply amount = 23 (kg/ha), depth = 50 (mm), type = no3_n ()
        12/10/1987  sugar harvest  (end_of_day)
        12/10/1987  sugar end_crop  (end_of_day)
      sugar
      fertiliser
      irrigation: same as 7) Pongola 1986-87 N14 P.paddock.Irrigation
      surfaceom Surface Organic Matter
        PoolName = sugar_trash  # Organic Matter pool name
        type = sugar  # Organic Matter type
        mass = 1000  # Initial surface residue (kg/ha)
        cnr = 80  # C:N ratio of initial residue
        standing_fraction = 1  # Fraction of residue standing
      outputfile: filename=12) Pongola 1986-87 N14 1R.out; title=12) Pongola 1986-87 N14 1R
        variables -> /simulations/1) Harwood 1993-94 Q117 P/paddock/Outputfile/Variables
        events Reporting Frequency -> /simulations/1) Harwood 1993-94 Q117 P/paddock/Outputfile/Reporting Frequency
      soil Pongola 867 1R
        InitWater Initial water
          PercentMethod: Percent=1.00; Distributed=Filled from top
        Water
          Layer:
            Thickness (mm)  BD (g/cc)  AirDry (mm/mm)  LL15 (mm/mm)  DUL (mm/mm)  SAT (mm/mm)
            50              1.39       0.05            0.101         0.261        0.368
            120             1.39       0.05            0.101         0.261        0.368
            150             1.39       0.05            0.101         0.261        0.368
            150             1.43       0.05            0.16          0.282        0.371
            150             1.43       0.05            0.16          0.282        0.371
            300             1.34       0.05            0.15          0.304        0.399
            300             1.34       0.05            0.15          0.304        0.399
            300             1.34       0.05            0.15          0.304        0.399
            300             1.34       0.05            0.15          0.304        0.399
            300             1.34       0.05            0.15          0.304        0.399
          SoilCrop sugar
            Layer:
              Thickness (mm)  LL (mm/mm)  KL (/day)  XF (0-1)
              50              0.101       0.1        1
              120             0.101       0.1        1
              150             0.101       0.1        1
              150             0.16        0.1        1
              150             0.16        0.1        1
              300             0.15        0.08       1
              300             0.15        0.08       1
              300             0.15        0.08       1
              300             0.15        0.04       1
              300             0.15        0.04       1
        SoilWat: same as 7) Pongola 1986-87 N14 P.paddock.Pongola 867 P.SoilWat
        SoilOrganicMatter: RootCN=70; RootWT=1000; SoilCN=13; EnrACoeff=7.4; EnrBCoeff=0.2
          Layer:
            Thickness (mm)  OC (Total %)  FBiom (0-1)  FInert (0-1)
            50              1.3           0.04         0.4
            120             1             0.02         0.5
            150             0.8           0.01         0.75
            150             0.8           0.01         0.85
            150             0.7           0.005        0.9
            300             0.6           0.005        0.95
            300             0.2           0.001        0.99
            300             0.2           0.001        0.99
            300             0.2           0.001        0.99
            300             0.2           0.001        0.99
        Analysis: same as 7) Pongola 1986-87 N14 P.paddock.Pongola 867 P.Analysis
        Sample Initial nitrogen: same as 7) Pongola 1986-87 N14 P.paddock.Pongola 867 P.Initial nitrogen
  simulation 13) Kunia 1991-93 H73-6110 P
    metfile met: filename=Kunia.met
    clock
      start_date = 23/01/1991  # Enter the start date of the simulation
      end_date = 26/01/1993  # Enter the end date of the simulation
    summaryfile
    area paddock
      folder Manager folder
        manager Kunia man
          on init:
```
samp=0
```
          on start_of_day:
```
! Set trickle irrigation depth
if daysaftersowing=2 then
   'Kunia Water' set irrigation_depth=300(mm)
endif

! Observed sampling dates
samp=0
if (year = 1991 and (day = 84 or day = 141 or day = 205 or day = 261)
   or (year = 1992 and (day = 22 or day = 199)
   or (year = 1993 and day = 24)) then
   samp = 1
endif

! Simulation info
site='Kunia'
season='1991-93'
treat=1
```
      operations
        23/01/1991  sugar sow population=10, sowing_depth= 150, cultivar= H73, ratoon= 0
        23/01/1991  fertiliser apply amount = 37 (kg/ha), depth = 50 (mm), type = urea_n ()
        15/02/1991  irrigation apply amount = 12.2936 (mm) ! trickle
        25/02/1991  irrigation apply amount = 24.765 (mm) ! trickle
        4/03/1991  irrigation apply amount = 18.2118 (mm) ! trickle
        19/03/1991  irrigation apply amount = 24.5618 (mm) ! trickle
        1/04/1991  irrigation apply amount = 4.8514 (mm) ! trickle
        5/04/1991  irrigation apply amount = 24.9428 (mm) ! trickle
        19/04/1991  irrigation apply amount = 38.1 (mm) ! trickle
        22/04/1991  irrigation apply amount = 13.3096 (mm) ! trickle
        23/04/1991  irrigation apply amount = 4.191 (mm) ! trickle
        30/04/1991  irrigation apply amount = 25.8572 (mm) ! trickle
        3/05/1991  irrigation apply amount = 24.6888 (mm) ! trickle
        7/05/1991  irrigation apply amount = 37.8714 (mm) ! trickle
        13/05/1991  irrigation apply amount = 31.5468 (mm) ! trickle
        17/05/1991  irrigation apply amount = 24.1554 (mm) ! trickle
        23/05/1991  fertiliser apply amount = 45 (kg/ha), depth = 50 (mm), type = urea_n ()  ! fertigation
        24/05/1991  irrigation apply amount = 43.1546 (mm) ! trickle
        29/05/1991  irrigation apply amount = 5.2324 (mm) ! trickle
        31/05/1991  irrigation apply amount = 53.3146 (mm) ! trickle
        7/06/1991  irrigation apply amount = 36.322 (mm) ! trickle
        13/06/1991  irrigation apply amount = 38.5064 (mm) ! trickle
        19/06/1991  irrigation apply amount = 42.9006 (mm) ! trickle
        23/06/1991  fertiliser apply amount = 45 (kg/ha), depth = 50 (mm), type = urea_n ()  ! fertigation
        28/06/1991  irrigation apply amount = 45.1358 (mm) ! trickle
        2/07/1991  irrigation apply amount = 43.3578 (mm) ! trickle
        5/07/1991  irrigation apply amount = 38.1762 (mm) ! trickle
        9/07/1991  irrigation apply amount = 14.6812 (mm) ! trickle
        10/07/1991  irrigation apply amount = 5.969 (mm) ! trickle
        16/07/1991  irrigation apply amount = 38.3794 (mm) ! trickle
        23/07/1991  fertiliser apply amount = 45 (kg/ha), depth = 50 (mm), type = urea_n ()  ! fertigation
        26/07/1991  irrigation apply amount = 43.2054 (mm) ! trickle
        31/07/1991  irrigation apply amount = 7.8486 (mm) ! trickle
        2/08/1991  irrigation apply amount = 42.7228 (mm) ! trickle
        15/08/1991  irrigation apply amount = 32.1818 (mm) ! trickle
        20/08/1991  irrigation apply amount = 24.6634 (mm) ! trickle
        23/08/1991  fertiliser apply amount = 45 (kg/ha), depth = 50 (mm), type = urea_n ()  ! fertigation
        27/08/1991  irrigation apply amount = 43.4848 (mm) ! trickle
        30/08/1991  irrigation apply amount = 43.4848 (mm) ! trickle
        4/09/1991  irrigation apply amount = 37.6936 (mm) ! trickle
        6/09/1991  irrigation apply amount = 43.4848 (mm) ! trickle
        13/09/1991  irrigation apply amount = 44.958 (mm) ! trickle
        17/09/1991  irrigation apply amount = 36.8808 (mm) ! trickle
        19/09/1991  irrigation apply amount = 62.8142 (mm) ! trickle
        23/09/1991  fertiliser apply amount = 45 (kg/ha), depth = 50 (mm), type = urea_n ()  ! fertigation
        4/10/1991  irrigation apply amount = 44.5008 (mm) ! trickle
        8/10/1991  irrigation apply amount = 44.1198 (mm) ! trickle
        10/10/1991  irrigation apply amount = 43.7642 (mm) ! trickle
        23/10/1991  fertiliser apply amount = 45 (kg/ha), depth = 50 (mm), type = urea_n ()  ! fertigation
        30/10/1991  irrigation apply amount = 23.0632 (mm) ! trickle
        6/11/1991  irrigation apply amount = 2.3876 (mm) ! trickle
        15/11/1991  irrigation apply amount = 44.7548 (mm) ! trickle
        20/11/1991  irrigation apply amount = 43.7642 (mm) ! trickle
        23/11/1991  fertiliser apply amount = 45 (kg/ha), depth = 50 (mm), type = urea_n ()  ! fertigation
        27/11/1991  irrigation apply amount = 41.0718 (mm) ! trickle
        5/12/1991  irrigation apply amount = 27.2288 (mm) ! trickle
        23/12/1991  fertiliser apply amount = 45 (kg/ha), depth = 50 (mm), type = urea_n ()  ! fertigation
        3/01/1992  irrigation apply amount = 50.419 (mm) ! trickle
        17/01/1992  irrigation apply amount = 51.181 (mm) ! trickle
        10/02/1992  irrigation apply amount = 55.9054 (mm) ! trickle
        25/02/1992  irrigation apply amount = 26.7208 (mm) ! trickle
        26/02/1992  irrigation apply amount = 44.6024 (mm) ! trickle
        5/03/1992  irrigation apply amount = 29.1846 (mm) ! trickle
        16/03/1992  irrigation apply amount = 45.212 (mm) ! trickle
        20/03/1992  irrigation apply amount = 43.0276 (mm) ! trickle
        27/03/1992  irrigation apply amount = 45.7962 (mm) ! trickle
        3/04/1992  irrigation apply amount = 40.4368 (mm) ! trickle
        7/04/1992  irrigation apply amount = 43.8912 (mm) ! trickle
        16/04/1992  irrigation apply amount = 43.4086 (mm) ! trickle
        28/04/1992  irrigation apply amount = 43.0022 (mm) ! trickle
        1/05/1992  irrigation apply amount = 25.0698 (mm) ! trickle
        14/05/1992  irrigation apply amount = 44.704 (mm) ! trickle
        20/05/1992  irrigation apply amount = 45.2882 (mm) ! trickle
        27/05/1992  irrigation apply amount = 45.8216 (mm) ! trickle
        3/06/1992  irrigation apply amount = 45.1612 (mm) ! trickle
        10/06/1992  irrigation apply amount = 46.2026 (mm) ! trickle
        15/06/1992  irrigation apply amount = 44.3738 (mm) ! trickle
        19/06/1992  irrigation apply amount = 44.2214 (mm) ! trickle
        22/06/1992  irrigation apply amount = 43.3832 (mm) ! trickle
        25/06/1992  irrigation apply amount = 41.7068 (mm) ! trickle
        29/06/1992  irrigation apply amount = 43.6118 (mm) ! trickle
        2/07/1992  irrigation apply amount = 45.1104 (mm) ! trickle
        7/07/1992  irrigation apply amount = 45.3644 (mm) ! trickle
        15/07/1992  irrigation apply amount = 31.6738 (mm) ! trickle
        22/07/1992  irrigation apply amount = 63.1698 (mm) ! trickle
        28/07/1992  irrigation apply amount = 44.3484 (mm) ! trickle
        5/08/1992  irrigation apply amount = 11.5316 (mm) ! trickle
        14/08/1992  irrigation apply amount = 31.3944 (mm) ! trickle
        19/08/1992  irrigation apply amount = 45.6946 (mm) ! trickle
        27/08/1992  irrigation apply amount = 56.1086 (mm) ! trickle
        1/09/1992  irrigation apply amount = 46.228 (mm) ! trickle
        9/09/1992  irrigation apply amount = 45.1358 (mm) ! trickle
        22/09/1992  irrigation apply amount = 44.45 (mm) ! trickle
        25/09/1992  irrigation apply amount = 43.942 (mm) ! trickle
        9/10/1992  irrigation apply amount = 43.2308 (mm) ! trickle
        30/10/1992  irrigation apply amount = 42.5704 (mm) ! trickle
        10/11/1992  irrigation apply amount = 43.1292 (mm) ! trickle
        18/12/1992  irrigation apply amount = 44.4246 (mm) ! trickle
        26/01/1993  sugar harvest  (end_of_day)
        26/01/1993  sugar end_crop  (end_of_day)
      sugar
      fertiliser
      irrigation: same as 1) Harwood 1993-94 Q117 P.paddock.Irrigation
      surfaceom Surface Organic Matter
        PoolName = sugar_trash  # Organic Matter pool name
        type = sugar  # Organic Matter type
        mass = 100  # Initial surface residue (kg/ha)
        cnr = 80  # C:N ratio of initial residue
        standing_fraction = 1  # Fraction of residue standing
      outputfile: filename=13) Kunia 1991-93 H73-6110 P.out; title=13) Kunia 1991-93 H73-6110 P
        variables: same as 1) Harwood 1993-94 Q117 P.paddock.Outputfile.Variables
        events Reporting Frequency: event=Daily  # End of daily simulation time step
      soil Kunia
        InitWater Initial water
          PercentMethod: Percent=1.00; Distributed=Filled from top
        Water
          Layer:
            Thickness (mm)  BD (g/cc)  AirDry (mm/mm)  LL15 (mm/mm)  DUL (mm/mm)  SAT (mm/mm)
            200             1.2        0.15            0.18          0.33         0.45
            200             1.25       0.05            0.2           0.35         0.45
            200             1.3        0.05            0.21          0.37         0.45
            300             1.35       0.05            0.24          0.37         0.45
            300             1.4        0.05            0.24          0.36         0.45
            300             1.45       0.05            0.22          0.32         0.45
          SoilCrop sugar: same as 5) Ayr 1991-92 Q96 P.paddock.Zanetti 912.Water.sugar
        SoilWat: same as 1) Harwood 1993-94 Q117 P.paddock.Harwood.SoilWat
        SoilOrganicMatter: RootCN=70; RootWT=50; SoilCN=13; EnrACoeff=7.4; EnrBCoeff=0.2
          Layer:
            Thickness (mm)  OC (Total %)  FBiom (0-1)  FInert (0-1)
            200             1.3           0.03         0.4
            200             1             0.015        0.5
            200             0.8           0.01         0.75
            300             0.8           0.01         0.85
            300             0.7           0.005        0.9
            300             0.6           0.005        0.95
        Analysis: same as 1) Harwood 1993-94 Q117 P.paddock.Harwood.Analysis
        Sample Initial nitrogen: same as 1) Harwood 1993-94 Q117 P.paddock.Harwood.Initial nitrogen
  simulation 14) Ayr 1992-94 Q117 P(274N) and 1R(369N)
    metfile met: filename=Ayr.met
    clock
      start_date = 22/04/1992  # Enter the start date of the simulation
      end_date = 7/09/1994  # Enter the end date of the simulation
    summaryfile
    area paddock
      folder Manager folder
        manager Ayr
          on init:
```
samp=0
```
          on start_of_day:
```
! Furrow irrigated

! Observed sampling dates
samp=0
if ((year = 1992) and (day = 211 or day = 281 or day = 301 or day = 329 or day = 350)) or 
   ((year = 1993) and (day = 19 or day = 40 or day = 82 or day = 110 or day = 145 or
    day = 187 or day = 287 or day = 313 or day = 343)) or 
   ((year = 1994) and (day = 11 or day = 47 or day = 74 or day = 109 or day = 138 or
   day = 158 or day = 193 or day = 221 or day = 249))  then
   samp = 1
endif

! Simulation info
site='Ayr'
season='1992-94'
treat=3
```
      operations
        22/04/1992  sugar sow population = 10, sowing_depth = 150, cultivar = Q117_fum, ratoon = 0
        22/04/1992  fertiliser apply amount = 35 (kg/ha), depth = 30 (mm), type = urea_n ()
        27/04/1992  irrigation apply amount = 229 (mm) ! furrow: 3.46ppm NO3 (10 kg/ha) in irrig water added in irrigation
        9/05/1992  'surface organic matter' tillage type=disc, f_incorp=0.5 (), tillage_depth = 50 (mm)
        2/06/1992  fertiliser apply amount = 161 (kg/ha), depth = 30 (mm), type = urea_n ()
        3/07/1992  irrigation apply amount = 229 (mm) ! furrow: 3.46ppm NO3 (10 kg/ha) in irrig water added in irrigation
        4/08/1992  irrigation apply amount = 229 (mm) ! furrow: 3.46ppm NO3 (10 kg/ha) in irrig water added in irrigation
        7/09/1992  sugar hill_up canefr = 1.0 (), topsfr = 0.50 ()
        9/09/1992  irrigation apply amount = 229 (mm) ! furrow: 3.46ppm NO3 (10 kg/ha) in irrig water added in irrigation
        19/09/1992  irrigation apply amount = 229 (mm) ! furrow: 3.46ppm NO3 (10 kg/ha) in irrig water added in irrigation
        30/09/1992  irrigation apply amount = 229 (mm) ! furrow: 3.46ppm NO3 (10 kg/ha) in irrig water added in irrigation
        10/10/1992  irrigation apply amount = 229 (mm) ! furrow: 3.46ppm NO3 (10 kg/ha) in irrig water added in irrigation
        12/10/1992  irrigation apply amount = 229 (mm) ! furrow: 3.46ppm NO3 (10 kg/ha) in irrig water added in irrigation
        22/10/1992  irrigation apply amount = 229 (mm) ! furrow: 3.46ppm NO3 (10 kg/ha) in irrig water added in irrigation
        29/10/1992  irrigation apply amount = 229 (mm) ! furrow: 3.46ppm NO3 (10 kg/ha) in irrig water added in irrigation
        1/11/1993  sugar hill_up canefr = 1.0 (), topsfr = 0.50 ()
        7/11/1992  irrigation apply amount = 229 (mm) ! furrow: 3.46ppm NO3 (10 kg/ha) in irrig water added in irrigation
        13/11/1992  irrigation apply amount = 229 (mm) ! furrow: 3.46ppm NO3 (10 kg/ha) in irrig water added in irrigation
        21/11/1992  irrigation apply amount = 229 (mm) ! furrow: 3.46ppm NO3 (10 kg/ha) in irrig water added in irrigation
        12/12/1992  fertiliser apply amount = 78 (kg/ha), depth = 30 (mm), type = urea_n ()
        3/01/1993  irrigation apply amount = 229 (mm) ! furrow: 3.46ppm NO3 (10 kg/ha) in irrig water added in irrigation
        10/01/1993  sugar lodge
        23/01/1993  irrigation apply amount = 229 (mm) ! furrow: 3.46ppm NO3 (10 kg/ha) in irrig water added in irrigation
        12/02/1993  irrigation apply amount = 229 (mm) ! furrow: 3.46ppm NO3 (10 kg/ha) in irrig water added in irrigation
        2/03/1993  irrigation apply amount = 229 (mm) ! furrow: 3.46ppm NO3 (10 kg/ha) in irrig water added in irrigation
        13/03/1993  irrigation apply amount = 229 (mm) ! furrow: 3.46ppm NO3 (10 kg/ha) in irrig water added in irrigation
        27/03/1993  irrigation apply amount = 229 (mm) ! furrow: 3.46ppm NO3 (10 kg/ha) in irrig water added in irrigation
        24/04/1993  irrigation apply amount = 229 (mm) ! furrow: 3.46ppm NO3 (10 kg/ha) in irrig water added in irrigation
        8/05/1993  irrigation apply amount = 229 (mm) ! furrow: 3.46ppm NO3 (10 kg/ha) in irrig water added in irrigation
        28/05/1993  irrigation apply amount = 229 (mm) ! furrow: 3.46ppm NO3 (10 kg/ha) in irrig water added in irrigation
        5/06/1993  irrigation apply amount = 229 (mm) ! furrow: 3.46ppm NO3 (10 kg/ha) in irrig water added in irrigation
        17/06/1993  irrigation apply amount = 229 (mm) ! furrow: 3.46ppm NO3 (10 kg/ha) in irrig water added in irrigation
        25/12/1993  irrigation apply amount = 229 (mm) ! furrow: 3.46ppm NO3 (10 kg/ha) in irrig water added in irrigation
        13/08/1993  'surface organic matter' tillage type = burn, f_incorp=0.9 (), tillage_depth = 0 (mm)
        23/08/1993  irrigation apply amount = 228 (mm) ! furrow: 3.46ppm NO3 (10 kg/ha) in irrig water added in irrigation
        11/09/1993  sugar sow population = 10, sowing_depth = 150, cultivar = Q117_fum, ratoon = 1 ! plant crop harvested 13/08/93, then stubble shaved 11/09/93
        27/10/1993  fertiliser apply amount = 227 (kg/ha), depth = 30 (mm), type = urea_n ()
        31/10/1993  fertiliser apply amount = 142 (kg/ha), depth = 30 (mm), type = urea_n ()
        2/11/1993  irrigation apply amount = 228 (mm) ! furrow: 3.46ppm NO3 (10 kg/ha) in irrig water added in irrigation
        20/11/1993  irrigation apply amount = 228 (mm) ! furrow: 3.46ppm NO3 (10 kg/ha) in irrig water added in irrigation
        2/12/1993  irrigation apply amount = 228 (mm) ! furrow: 3.46ppm NO3 (10 kg/ha) in irrig water added in irrigation
        13/12/1993  irrigation apply amount = 228 (mm) ! furrow: 3.46ppm NO3 (10 kg/ha) in irrig water added in irrigation
        24/12/1993  irrigation apply amount = 228 (mm) ! furrow: 3.46ppm NO3 (10 kg/ha) in irrig water added in irrigation
        30/12/1993  irrigation apply amount = 228 (mm) ! furrow: 3.46ppm NO3 (10 kg/ha) in irrig water added in irrigation
        8/01/1994  irrigation apply amount = 228 (mm) ! furrow: 3.46ppm NO3 (10 kg/ha) in irrig water added in irrigation
        18/01/1994  irrigation apply amount = 228 (mm) ! furrow: 3.46ppm NO3 (10 kg/ha) in irrig water added in irrigation
        17/02/1994  irrigation apply amount = 228 (mm) ! furrow: 3.46ppm NO3 (10 kg/ha) in irrig water added in irrigation
        17/03/1994  irrigation apply amount = 228 (mm) ! furrow: 3.46ppm NO3 (10 kg/ha) in irrig water added in irrigation
        28/03/1994  irrigation apply amount = 228 (mm) ! furrow: 3.46ppm NO3 (10 kg/ha) in irrig water added in irrigation
        9/04/1994  irrigation apply amount = 228 (mm) ! furrow: 3.46ppm NO3 (10 kg/ha) in irrig water added in irrigation
        27/04/1994  irrigation apply amount = 228 (mm) ! furrow: 3.46ppm NO3 (10 kg/ha) in irrig water added in irrigation
        9/05/1994  irrigation apply amount = 228 (mm) ! furrow: 3.46ppm NO3 (10 kg/ha) in irrig water added in irrigation
        25/05/1994  irrigation apply amount = 228 (mm) ! furrow: 3.46ppm NO3 (10 kg/ha) in irrig water added in irrigation
        1/06/1994  sugar lodge
        16/06/1994  irrigation apply amount = 228 (mm) ! furrow: 3.46ppm NO3 (10 kg/ha) in irrig water added in irrigation
        14/07/1994  irrigation apply amount = 228 (mm) ! furrow: 3.46ppm NO3 (10 kg/ha) in irrig water added in irrigation
        13/08/1993  sugar harvest ! plant crop harvested 13/08/93, then stubble shaved 11/09/93  (end_of_day)
        9/09/1993  sugar end_crop  (end_of_day)
      sugar
      fertiliser
      irrigation: same as 5) Ayr 1991-92 Q96 P.paddock.Irrigation
      surfaceom Surface Organic Matter
        PoolName = sugar_trash  # Organic Matter pool name
        type = sugar  # Organic Matter type
        mass = 100  # Initial surface residue (kg/ha)
        cnr = 80  # C:N ratio of initial residue
        standing_fraction = 1  # Fraction of residue standing
      outputfile: filename=14) Ayr 1992-94 Q117 P(274N) and 1R(369N).out; title=14) Ayr 1992-94 Q117 P(274N) and 1R(369N)
        variables -> /simulations/1) Harwood 1993-94 Q117 P/paddock/Outputfile/Variables
        events Reporting Frequency -> /simulations/1) Harwood 1993-94 Q117 P/paddock/Outputfile/Reporting Frequency
      soil Zanetti 924
        InitWater Initial water
          PercentMethod: Percent=1.00; Distributed=Filled from top
        Water
          Layer:
            Thickness (mm)  BD (g/cc)  AirDry (mm/mm)  LL15 (mm/mm)  DUL (mm/mm)  SAT (mm/mm)
            200             1.2        0.05            0.18          0.33         0.45
            200             1.25       0.05            0.2           0.35         0.45
            200             1.3        0.05            0.21          0.37         0.45
            300             1.35       0.05            0.24          0.37         0.45
            300             1.4        0.05            0.24          0.36         0.45
            300             1.45       0.05            0.22          0.32         0.45
          SoilCrop sugar
            Layer:
              Thickness (mm)  LL (mm/mm)  KL (/day)  XF (0-1)
              200             0.18        0.16       1
              200             0.2         0.16       1
              200             0.21        0.16       1
              300             0.24        0.1        1
              300             0.24        0.06       1
              300             0.22        0.02       1
        SoilWat: same as 1) Harwood 1993-94 Q117 P.paddock.Harwood.SoilWat
        SoilOrganicMatter: RootCN=70; RootWT=50; SoilCN=11; EnrACoeff=7.4; EnrBCoeff=0.2
          Layer:
            Thickness (mm)  OC (Total %)  FBiom (0-1)  FInert (0-1)
            200             1.3           0.04         0.4
            200             1             0.03         0.5
            200             0.8           0.02         0.75
            300             0.8           0.015        0.85
            300             0.7           0.005        0.9
            300             0.6           0.005        0.95
        Analysis: same as 1) Harwood 1993-94 Q117 P.paddock.Harwood.Analysis
        Sample Initial nitrogen: same as 1) Harwood 1993-94 Q117 P.paddock.Harwood.Initial nitrogen
  simulation 15) Ingham 1991-92 Q117 P
    metfile met: filename=Ingham.met
    clock
      start_date = 16/07/1991  # Enter the start date of the simulation
      end_date = 14/07/1992  # Enter the end date of the simulation
    summaryfile
    area paddock
      folder Manager folder
        manager Macknade man
          on init:
```
samp=0
```
          on start_of_day:
```
! Set trickle irrigation depth
if daysaftersowing=73 then ! First 4 irrigations were by overhead portable lines, then changed to trickle
   ! irrigation_depth=300(mm)
   'macknade 912 p water' irrigation_depth=300(mm)
endif

! Observed sampling dates
samp=0
if (year = 1991 and (day = 322)) or
   (year = 1992 and (day = 35 or day = 92 or day = 196) then
   samp = 1
endif

! Simulation info
site='Ingham'
season='1991-92'
treat=1
```
      operations
        16/07/1991  sugar sow population = 10, sowing_depth = 100, cultivar = Q117, ratoon = 0
        16/07/1991  fertiliser apply amount = 15.8 (kg/ha), depth = 100 (mm), type = urea_n ()
        22/08/1991  'surface organic matter' tillage type = chisel, f_incorp=0.5 (), tillage_depth = 150 (mm)
        30/08/1991  irrigation apply amount = 20 (mm) ! overhead portable lines
        10/09/1991  fertiliser apply amount = 89.7 (kg/ha), depth = 100 (mm), type = urea_n ()
        13/09/1991  irrigation apply amount = 25 (mm) ! overhead portable lines
        25/09/1991  irrigation apply amount = 25 (mm) ! overhead portable lines
        26/09/1991  irrigation apply amount = 30 (mm) ! overhead portable lines
        24/10/1991  fertiliser apply amount = 248.4 (kg/ha), depth = 100 (mm), type = no3_n ()
        27/10/1991  irrigation apply amount = 60 (mm) ! trickle
        28/10/1991  irrigation apply amount = 60 (mm) ! trickle
        5/11/1991  irrigation apply amount = 37.5 ! trickle
        12/11/1991  irrigation apply amount = 22.5 ! trickle
        15/11/1991  irrigation apply amount = 22.5 ! trickle
        22/11/1991  irrigation apply amount = 22.5 ! trickle
        26/11/1991  irrigation apply amount = 22.5 ! trickle
        29/11/1991  irrigation apply amount = 22.5 ! trickle
        2/12/1991  irrigation apply amount = 5.25 ! trickle
        6/12/1991  irrigation apply amount = 22.5 ! trickle
        17/12/1991  irrigation apply amount = 22.5 ! trickle
        20/12/1991  irrigation apply amount = 22.5 ! trickle
        23/12/1991  irrigation apply amount = 12 ! trickle
        24/12/1991  irrigation apply amount = 12 ! trickle
        30/12/1991  irrigation apply amount = 13.5 ! trickle
        31/12/1991  irrigation apply amount = 9 ! trickle
        2/01/1992  irrigation apply amount = 10.5 ! trickle
        3/01/1992  irrigation apply amount = 12 ! trickle
        8/01/1992  irrigation apply amount = 36 ! trickle
        10/01/1992  irrigation apply amount = 10.5 ! trickle
        14/01/1992  irrigation apply amount = 36 ! trickle
        16/01/1992  irrigation apply amount = 36 ! trickle
        22/01/1992  irrigation apply amount = 36 ! trickle
        24/01/1992  irrigation apply amount = 12 ! trickle
        29/01/1992  irrigation apply amount = 36 ! trickle
        31/01/1992  irrigation apply amount = 22.5 ! trickle
        18/02/1992  irrigation apply amount = 36 ! trickle
        20/02/1992  irrigation apply amount = 15 ! trickle
        31/03/1992  sugar lodge
        14/07/1992  sugar harvest  (end_of_day)
        14/07/1992  sugar end_crop  (end_of_day)
      sugar
      fertiliser
      irrigation: same as 1) Harwood 1993-94 Q117 P.paddock.Irrigation
      surfaceom Surface Organic Matter
        PoolName = sugar_trash  # Organic Matter pool name
        type = sugar  # Organic Matter type
        mass = 100  # Initial surface residue (kg/ha)
        cnr = 80  # C:N ratio of initial residue
        standing_fraction = 1  # Fraction of residue standing
      outputfile: filename=15) Ingham 1991-92 Q117 P.out; title=15) Ingham 1991-92 Q117 P
        variables -> /simulations/1) Harwood 1993-94 Q117 P/paddock/Outputfile/Variables
        events Reporting Frequency -> /simulations/1) Harwood 1993-94 Q117 P/paddock/Outputfile/Reporting Frequency
      soil Macknade 912 P: same as 2) Ingham 1992-93 Q117 P.paddock.Macknade 923 P
  simulation 16a) Ingham 1992-94 Q117P(56N) and 1R(0N)
    metfile met: filename=Ingham.met
    clock
      start_date = 23/07/1992  # Enter the start date of the simulation
      end_date = 23/08/1994  # Enter the end date of the simulation
    summaryfile
    area paddock
      folder Manager folder
        manager Macknade man
          on init:
```
samp=0
```
          on start_of_day:
```
! Set trickle irrigation depth
if daysaftersowing=71 then ! First 2 irrigations were by overhead portable lines, then changed to trickle
   ! irrigation_depth=300(mm)
   'macknade 924 low N water' irrigation_depth=300(mm)
endif

! Observed sampling dates
samp=0
if (year = 1993 and (day = 229 or day = 280 or day = 301 or day = 315 or day = 348)) or
   (year = 1994 and (day= 18 or day = 60 or day = 101 or day = 124 or day = 165 or day = 198 or day = 235)) then
   samp = 1
endif

! Simulation info
site='Ingham'
season='1992-94'
treat=1
```
      operations
        23/07/1992  sugar sow population = 10, sowing_depth = 100, cultivar = Q117_fum, ratoon = 0
        23/07/1992  fertiliser apply amount = 56 (kg/ha), depth = 100 (mm), type = urea_n ()
        7/09/1992  irrigation apply amount = 25 (mm) ! overhead portable lines
        1/10/1992  irrigation apply amount = 25 (mm) ! overhead portable lines
        3/10/1992  irrigation apply amount = 36 (mm) ! trickle
        4/11/1992  irrigation apply amount = 36 (mm) ! trickle
        11/11/1992  irrigation apply amount = 36 (mm) ! trickle
        18/11/1992  irrigation apply amount = 36 (mm) ! trickle
        25/11/1992  irrigation apply amount = 36 (mm) ! trickle
        2/12/1992  irrigation apply amount = 36 (mm) ! trickle
        9/12/1992  irrigation apply amount = 36 (mm) ! trickle
        5/02/1993  sugar lodge
        5/03/1993  irrigation apply amount = 36 (mm) ! trickle
        17/03/1993  irrigation apply amount = 36 (mm) ! trickle
        24/03/1993  irrigation apply amount = 36 (mm) ! trickle
        1/04/1993  irrigation apply amount = 36 (mm) ! trickle
        6/04/1993  irrigation apply amount = 36 (mm) ! trickle
        20/04/1993  irrigation apply amount = 36 (mm) ! trickle
        8/05/1993  irrigation apply amount = 36 (mm) ! trickle
        14/05/1993  irrigation apply amount = 36 (mm) ! trickle
        28/05/1993  irrigation apply amount = 36 (mm) ! trickle
        18/06/1993  irrigation apply amount = 36 (mm) ! trickle
        25/06/1993  irrigation apply amount = 36 (mm) ! trickle
        12/10/1993  irrigation apply amount = 30 (mm) ! overhead portable lines
        8/11/1993  irrigation apply amount = 35 (mm) ! overhead portable lines
        19/11/1993  irrigation apply amount = 5 (mm) ! trickle
        23/11/1993  irrigation apply amount = 40.5 (mm) ! trickle
        3/12/1993  irrigation apply amount = 40.5 (mm) ! trickle
        9/12/1993  irrigation apply amount = 40.5 (mm) ! trickle
        30/12/1993  irrigation apply amount = 40.5 (mm) ! trickle
        6/01/1994  irrigation apply amount = 40.5 (mm) ! trickle
        22/01/1994  irrigation apply amount = 40.5 (mm) ! trickle
        28/01/1994  irrigation apply amount = 20.35 (mm) ! trickle
        25/03/1994  irrigation apply amount = 40.5 (mm) ! trickle
        8/04/1994  irrigation apply amount = 40.5 (mm) ! trickle
        18/04/1994  irrigation apply amount = 40.5 (mm) ! trickle
        28/04/1994  irrigation apply amount = 40.5 (mm) ! trickle
        12/05/1994  irrigation apply amount = 40.5 (mm) ! trickle
        19/05/1994  irrigation apply amount = 40.5 (mm) ! trickle
        26/05/1994  irrigation apply amount = 40.5 (mm) ! trickle
        11/06/1994  irrigation apply amount = 40.5 (mm) ! trickle
        16/06/1994  irrigation apply amount = 40.5 (mm) ! trickle
        29/06/1994  irrigation apply amount = 40.5 (mm) ! trickle
        14/07/1994  irrigation apply amount = 40.5 (mm) ! trickle
        4/08/1994  irrigation apply amount = 40.5 (mm) ! trickle
        18/08/1994  irrigation apply amount = 40.5 (mm) ! trickle
        18/08/1993  sugar harvest  (end_of_day)
        23/08/1994  sugar harvest  (end_of_day)
        23/08/1994  sugar end_crop  (end_of_day)
      sugar
      fertiliser
      irrigation: same as 1) Harwood 1993-94 Q117 P.paddock.Irrigation
      surfaceom Surface Organic Matter
        PoolName = sugar_trash  # Organic Matter pool name
        type = sugar  # Organic Matter type
        mass = 100  # Initial surface residue (kg/ha)
        cnr = 80  # C:N ratio of initial residue
        standing_fraction = 1  # Fraction of residue standing
      outputfile: filename=16a) Ingham 1992-94 Q117P(56N) and 1R(0N).out; title=16a) Ingham 1992-94 Q117P(56N) and 1R(0N)
        variables -> /simulations/1) Harwood 1993-94 Q117 P/paddock/Outputfile/Variables
        events Reporting Frequency -> /simulations/1) Harwood 1993-94 Q117 P/paddock/Outputfile/Reporting Frequency
      soil Macknade 924 low N
        InitWater Initial water
          PercentMethod: Percent=1.00; Distributed=Filled from top
        Water: same as 2) Ingham 1992-93 Q117 P.paddock.Macknade 923 P.Water
        SoilWat: same as 2) Ingham 1992-93 Q117 P.paddock.Macknade 923 P.SoilWat
        SoilOrganicMatter: same as 2) Ingham 1992-93 Q117 P.paddock.Macknade 923 P.SoilOrganicMatter
        Analysis: same as 2) Ingham 1992-93 Q117 P.paddock.Macknade 923 P.Analysis
        Sample Initial nitrogen
          Layer:
            Thickness (mm)  NO3 (ppm)  NH4 (ppm)
            200             3          6.7
            200             2.7        3.1
            200             2.1        0.6
            300             2          0.2
            300             2          0.2
            300             2          0.2
            300             2          0.2
  simulation 16b) Ingham 1992-94 Q117P(107N) and 1R(55N)
    metfile met: filename=Ingham.met
    clock
      start_date = 23/07/1992  # Enter the start date of the simulation
      end_date = 23/08/1994  # Enter the end date of the simulation
    summaryfile
    area paddock
      folder Manager folder
        manager Macknade man
          on init:
```
samp=0
```
          on start_of_day:
```
! Set trickle irrigation depth
if daysaftersowing=71 then ! First 2 irrigations were by overhead portable lines, then changed to trickle
   ! irrigation_depth=300(mm)
   'macknade 924 med N water' irrigation_depth=300(mm)
endif

! Observed sampling dates
samp=0
if (year = 1993 and (day = 229 or day = 280 or day = 301 or day = 315 or day = 348)) or
   (year = 1994 and (day= 18 or day = 60 or day = 101 or day = 124 or day = 165 or day = 198 or day = 235)) then
   samp = 1
endif

! Simulation info
site='Ingham'
season='1992-94'
treat=2
```
      operations
        23/07/1992  sugar sow population = 10, sowing_depth = 100, cultivar = Q117_fum, ratoon = 0
        23/07/1992  fertiliser apply amount = 56 (kg/ha), depth = 100 (mm), type = urea_n ()
        7/09/1992  irrigation apply amount = 25 (mm) ! overhead portable lines
        1/10/1992  irrigation apply amount = 25 (mm) ! overhead portable lines
        3/10/1992  irrigation apply amount = 36 (mm) ! trickle
        13/10/1992  fertiliser apply amount = 51 (kg/ha), depth = 100 (mm), type = urea_n ()
        4/11/1992  irrigation apply amount = 36 (mm) ! trickle
        11/11/1992  irrigation apply amount = 36 (mm) ! trickle
        18/11/1992  irrigation apply amount = 36 (mm) ! trickle
        25/11/1992  irrigation apply amount = 36 (mm) ! trickle
        2/12/1992  irrigation apply amount = 36 (mm) ! trickle
        9/12/1992  irrigation apply amount = 36 (mm) ! trickle
        5/02/1993  sugar lodge
        5/03/1993  irrigation apply amount = 36 (mm) ! trickle
        17/03/1993  irrigation apply amount = 36 (mm) ! trickle
        24/03/1993  irrigation apply amount = 36 (mm) ! trickle
        1/04/1993  irrigation apply amount = 36 (mm) ! trickle
        6/04/1993  irrigation apply amount = 36 (mm) ! trickle
        20/04/1993  irrigation apply amount = 36 (mm) ! trickle
        8/05/1993  irrigation apply amount = 36 (mm) ! trickle
        14/05/1993  irrigation apply amount = 36 (mm) ! trickle
        28/05/1993  irrigation apply amount = 36 (mm) ! trickle
        18/06/1993  irrigation apply amount = 36 (mm) ! trickle
        25/06/1993  irrigation apply amount = 36 (mm) ! trickle
        21/09/1993  fertiliser apply amount = 55 (kg/ha), depth = 100 (mm), type = urea_n ()
        12/10/1993  irrigation apply amount = 30 (mm) ! overhead portable lines
        8/11/1993  irrigation apply amount = 35 (mm) ! overhead portable lines
        19/11/1993  irrigation apply amount = 5 (mm) ! trickle
        23/11/1993  irrigation apply amount = 40.5 (mm) ! trickle
        3/12/1993  irrigation apply amount = 40.5 (mm) ! trickle
        9/12/1993  irrigation apply amount = 40.5 (mm) ! trickle
        30/12/1993  irrigation apply amount = 40.5 (mm) ! trickle
        6/01/1994  irrigation apply amount = 40.5 (mm) ! trickle
        22/01/1994  irrigation apply amount = 40.5 (mm) ! trickle
        28/01/1994  irrigation apply amount = 20.35 (mm) ! trickle
        25/03/1994  irrigation apply amount = 40.5 (mm) ! trickle
        8/04/1994  irrigation apply amount = 40.5 (mm) ! trickle
        18/04/1994  irrigation apply amount = 40.5 (mm) ! trickle
        28/04/1994  irrigation apply amount = 40.5 (mm) ! trickle
        12/05/1994  irrigation apply amount = 40.5 (mm) ! trickle
        19/05/1994  irrigation apply amount = 40.5 (mm) ! trickle
        26/05/1994  irrigation apply amount = 40.5 (mm) ! trickle
        11/06/1994  irrigation apply amount = 40.5 (mm) ! trickle
        16/06/1994  irrigation apply amount = 40.5 (mm) ! trickle
        29/06/1994  irrigation apply amount = 40.5 (mm) ! trickle
        14/07/1994  irrigation apply amount = 40.5 (mm) ! trickle
        4/08/1994  irrigation apply amount = 40.5 (mm) ! trickle
        18/08/1994  irrigation apply amount = 40.5 (mm) ! trickle
        18/08/1993  sugar harvest  (end_of_day)
        23/08/1994  sugar harvest  (end_of_day)
        23/08/1994  sugar end_crop  (end_of_day)
      sugar
      fertiliser
      irrigation: same as 1) Harwood 1993-94 Q117 P.paddock.Irrigation
      surfaceom Surface Organic Matter
        PoolName = sugar_trash  # Organic Matter pool name
        type = sugar  # Organic Matter type
        mass = 100  # Initial surface residue (kg/ha)
        cnr = 80  # C:N ratio of initial residue
        standing_fraction = 1  # Fraction of residue standing
      outputfile: filename=16b) Ingham 1992-94 Q117P(107N) and 1R(55N).out; title=16b) Ingham 1992-94 Q117P(107N) and 1R(55N)
        variables -> /simulations/1) Harwood 1993-94 Q117 P/paddock/Outputfile/Variables
        events Reporting Frequency -> /simulations/1) Harwood 1993-94 Q117 P/paddock/Outputfile/Reporting Frequency
      soil Macknade 924 med N
        InitWater Initial water
          PercentMethod: Percent=1.00; Distributed=Filled from top
        Water: same as 2) Ingham 1992-93 Q117 P.paddock.Macknade 923 P.Water
        SoilWat: same as 2) Ingham 1992-93 Q117 P.paddock.Macknade 923 P.SoilWat
        SoilOrganicMatter: same as 2) Ingham 1992-93 Q117 P.paddock.Macknade 923 P.SoilOrganicMatter
        Analysis: same as 2) Ingham 1992-93 Q117 P.paddock.Macknade 923 P.Analysis
        Sample Initial nitrogen
          Layer:
            Thickness (mm)  NO3 (ppm)  NH4 (ppm)
            200             3          6.4
            200             2.5        3.8
            200             1.9        1
            300             1.5        0.3
            300             1.5        0.3
            300             1.5        0.3
            300             1.5        0.3
  simulation 16c) Ingham 1992-94 Q117P(268N) and 1R(774N)
    metfile met: filename=Ingham.met
    clock
      start_date = 23/07/1992  # Enter the start date of the simulation
      end_date = 23/08/1994  # Enter the end date of the simulation
    summaryfile
    area paddock
      folder Manager folder
        manager Macknade man
          on init:
```
samp=0
```
          on start_of_day:
```
! Set trickle irrigation depth
if daysaftersowing=71 then ! First 2 irrigations were by overhead portable lines, then changed to trickle
   ! irrigation_depth=300(mm)
   'macknade 924 high N water' irrigation_depth=300(mm)
endif

! Observed sampling dates
samp=0
if (year = 1993 and (day = 229 or day = 280 or day = 301 or day = 315 or day = 348)) or
   (year = 1994 and (day= 18 or day = 60 or day = 101 or day = 124 or day = 165 or day = 198 or day = 235)) then
   samp = 1
endif

! Simulation info
site='Ingham'
season='1992-94'
treat=3
```
      operations
        23/07/1992  sugar sow population = 10, sowing_depth = 100, cultivar = Q117_fum, ratoon = 0
        23/07/1992  fertiliser apply amount = 56 (kg/ha), depth = 100 (mm), type = urea_n ()
        7/09/1992  irrigation apply amount = 25 (mm) ! overhead portable lines
        23/09/1992  fertiliser apply amount = 161 (kg/ha), depth = 100 (mm), type = urea_n ()
        1/10/1992  irrigation apply amount = 25 (mm) ! overhead portable lines
        3/10/1992  irrigation apply amount = 36 (mm) ! trickle
        4/11/1992  irrigation apply amount = 36 (mm) ! trickle
        11/11/1992  irrigation apply amount = 36 (mm) ! trickle
        18/11/1992  irrigation apply amount = 36 (mm) ! trickle
        25/11/1992  irrigation apply amount = 36 (mm) ! trickle
        2/12/1992  irrigation apply amount = 36 (mm) ! trickle
        9/12/1992  irrigation apply amount = 36 (mm) ! trickle
        5/02/1993  sugar lodge ! P
        5/03/1993  irrigation apply amount = 36 (mm) ! trickle
        17/03/1993  irrigation apply amount = 36 (mm) ! trickle
        24/03/1993  irrigation apply amount = 36 (mm) ! trickle
        1/04/1993  irrigation apply amount = 36 (mm) ! trickle
        6/04/1993  irrigation apply amount = 36 (mm) ! trickle
        20/04/1993  irrigation apply amount = 36 (mm) ! trickle
        8/05/1993  irrigation apply amount = 36 (mm) ! trickle
        14/05/1993  irrigation apply amount = 36 (mm) ! trickle
        28/05/1993  irrigation apply amount = 36 (mm) ! trickle
        18/06/1993  irrigation apply amount = 36 (mm) ! trickle
        25/06/1993  irrigation apply amount = 36 (mm) ! trickle
        20/09/1993  fertiliser apply amount = 55 (kg/ha), depth = 250 (mm), type = urea_n ()
        12/10/1993  irrigation apply amount = 30 (mm) ! overhead portable lines
        21/10/1993  fertiliser apply amount = 166 (kg/ha), depth = 250 (mm), type = urea_n ()
        8/11/1993  fertiliser apply amount = 136 (kg/ha), depth = 0 (mm), type = urea_n () ! hand broadcast
        8/11/1993  irrigation apply amount = 35 (mm) ! overhead portable lines
        19/11/1993  irrigation apply amount = 5 (mm) ! trickle
        23/11/1993  irrigation apply amount = 40.5 (mm) ! trickle
        3/12/1993  irrigation apply amount = 40.5 (mm) ! trickle
        9/12/1993  irrigation apply amount = 40.5 (mm) ! trickle
        30/12/1993  fertiliser apply amount = 59.5 (kg/ha), depth = 300 (mm), type = nh4no3 () ! fertigated
        30/12/1993  irrigation apply amount = 40.5 (mm) ! trickle
        6/01/1994  irrigation apply amount = 40.5 (mm) ! trickle
        22/01/1994  irrigation apply amount = 40.5 (mm) ! trickle
        28/01/1994  fertiliser apply amount = 59.5 (kg/ha), depth = 300 (mm), type = nh4no3 () ! fertigated
        28/01/1994  irrigation apply amount = 20.35 (mm) ! trickle
        9/03/1994  fertiliser apply amount = 59.5 (kg/ha), depth = 300 (mm), type = nh4no3 () ! fertigated
        25/03/1994  irrigation apply amount = 40.5 (mm) ! trickle
        5/04/1994  fertiliser apply amount = 59.5 (kg/ha), depth = 300 (mm), type = nh4no3 () ! fertigated
        8/04/1994  irrigation apply amount = 40.5 (mm) ! trickle
        18/04/1994  irrigation apply amount = 40.5 (mm) ! trickle
        28/04/1994  irrigation apply amount = 40.5 (mm) ! trickle
        10/05/1994  fertiliser apply amount = 59.5 (kg/ha), depth = 300 (mm), type = nh4no3 () ! fertigated
        12/05/1994  irrigation apply amount = 40.5 (mm) ! trickle
        19/05/1994  irrigation apply amount = 40.5 (mm) ! trickle
        26/05/1994  irrigation apply amount = 40.5 (mm) ! trickle
        1/06/1994  sugar lodge ! 1R
        9/06/1994  fertiliser apply amount = 59.5 (kg/ha), depth = 300 (mm), type = nh4no3 () ! fertigated
        11/06/1994  irrigation apply amount = 40.5 (mm) ! trickle
        16/06/1994  irrigation apply amount = 40.5 (mm) ! trickle
        29/06/1994  irrigation apply amount = 40.5 (mm) ! trickle
        14/07/1994  irrigation apply amount = 40.5 (mm) ! trickle
        27/07/1994  fertiliser apply amount = 59.5 (kg/ha), depth = 300 (mm), type = nh4no3 () ! fertigated
        4/08/1994  irrigation apply amount = 40.5 (mm) ! trickle
        18/08/1994  irrigation apply amount = 40.5 (mm) ! trickle
        18/08/1993  sugar harvest  (end_of_day)
        23/08/1994  sugar harvest  (end_of_day)
        23/08/1994  sugar end_crop  (end_of_day)
      sugar
      fertiliser
      irrigation: same as 1) Harwood 1993-94 Q117 P.paddock.Irrigation
      surfaceom Surface Organic Matter
        PoolName = sugar_trash  # Organic Matter pool name
        type = sugar  # Organic Matter type
        mass = 100  # Initial surface residue (kg/ha)
        cnr = 80  # C:N ratio of initial residue
        standing_fraction = 1  # Fraction of residue standing
      outputfile: filename=16c) Ingham 1992-94 Q117P(268N) and 1R(774N).out; title=16c) Ingham 1992-94 Q117P(268N) and 1R(774N)
        variables -> /simulations/1) Harwood 1993-94 Q117 P/paddock/Outputfile/Variables
        events Reporting Frequency -> /simulations/1) Harwood 1993-94 Q117 P/paddock/Outputfile/Reporting Frequency
      soil Macknade 924 high N
        InitWater Initial water
          PercentMethod: Percent=1.00; Distributed=Filled from top
        Water: same as 2) Ingham 1992-93 Q117 P.paddock.Macknade 923 P.Water
        SoilWat: same as 2) Ingham 1992-93 Q117 P.paddock.Macknade 923 P.SoilWat
        SoilOrganicMatter: same as 2) Ingham 1992-93 Q117 P.paddock.Macknade 923 P.SoilOrganicMatter
        Analysis: same as 2) Ingham 1992-93 Q117 P.paddock.Macknade 923 P.Analysis
        Sample Initial nitrogen
          Layer:
            Thickness (mm)  NO3 (ppm)  NH4 (ppm)
            200             2.8        5.9
            200             2.7        2.8
            200             2.1        0.5
            300             1.5        0.1
            300             1.5        0.1
            300             1.5        0.1
            300             1.5        0.1
  simulation 19a) Simunye 1994-95 NCo376 1R Irrigation Treatment 1
    metfile met: filename=Simunye.met
    clock
      start_date = 10/08/1994  # Enter the start date of the simulation
      end_date = 26/07/1995  # Enter the end date of the simulation
    summaryfile
    area paddock
      folder Manager folder
        manager Simunye man
          on init:
```
samp=0
```
          on start_of_day:
```
! Observed sampling dates
samp=0
if ((year = 1995) and (day = 207 or day = 223)) then
   samp = 1
endif

! Simulation info
site='Simunye'
season='1994-95'
treat=1
```
      operations
        10/08/1994  sugar sow population = 16, sowing_depth = 150, cultivar = NCo376, ratoon = 1
        11/08/1994  fertiliser apply amount = 140 (kg/ha), depth = 50 (mm), type = urea_n ()
        7/09/1994  irrigation apply amount =  84.5 (mm)
        17/09/1994  irrigation apply amount =  30.5 (mm)
        30/09/1994  irrigation apply amount =  36.0 (mm)
        11/10/1994  irrigation apply amount =  28.5 (mm)
        25/10/1994  irrigation apply amount =  38.0 (mm)
        6/11/1994  irrigation apply amount =  60.5 (mm)
        13/11/1994  irrigation apply amount =  27.0 (mm)
        29/11/1994  irrigation apply amount =  31.3 (mm)
        19/12/1994  irrigation apply amount =  13.8 (mm)
        21/12/1994  irrigation apply amount =  33.8 (mm)
        27/12/1994  irrigation apply amount =  46.7 (mm)
        3/01/1995  irrigation apply amount =  32.0 (mm)
        6/01/1995  irrigation apply amount =  20.1 (mm)
        11/01/1995  irrigation apply amount =  26.7 (mm)
        23/01/1995  irrigation apply amount =  51.0 (mm)
        27/01/1995  irrigation apply amount =  33.3 (mm)
        4/02/1995  irrigation apply amount =  13.6 (mm)
        6/02/1995  irrigation apply amount =  26.0 (mm)
        8/02/1995  irrigation apply amount =  18.5 (mm)
        9/02/1995  irrigation apply amount =  10.0 (mm)
        13/02/1995  irrigation apply amount =  33.5 (mm)
        16/02/1995  irrigation apply amount =  26.0 (mm)
        22/02/1995  irrigation apply amount =  15.0 (mm)
        28/02/1995  irrigation apply amount =  35.5 (mm)
        3/03/1995  irrigation apply amount =  23.5 (mm)
        10/03/1995  irrigation apply amount =  41.0 (mm)
        13/03/1995  irrigation apply amount =  23.0 (mm)
        15/03/1995  irrigation apply amount =  16.0 (mm)
        19/03/1995  irrigation apply amount =  28.9 (mm)
        22/03/1995  irrigation apply amount =  23.6 (mm)
        4/04/1995  irrigation apply amount =  26.2 (mm)
        6/04/1995  irrigation apply amount =  30.7 (mm)
        8/04/1995  irrigation apply amount =  11.0 (mm)
        12/04/1995  irrigation apply amount =  26.0 (mm)
        21/04/1995  irrigation apply amount =  39.5 (mm)
        27/04/1995  irrigation apply amount =  24.2 (mm)
        3/05/1995  irrigation apply amount =  14.3 (mm)
        8/05/1995  irrigation apply amount =   4.2 (mm)
        16/05/1995  irrigation apply amount =  19.0 (mm)
        22/05/1995  irrigation apply amount =  23.0 (mm)
        26/05/1995  irrigation apply amount =   9.0 (mm)
        31/05/1995  irrigation apply amount =  18.7 (mm)
        5/06/1995  irrigation apply amount =  17.9 (mm)
        7/06/1995  irrigation apply amount =  10.5 (mm)
        13/06/1995  irrigation apply amount =  18.5 (mm)
        19/06/1995  irrigation apply amount =  27.5 (mm)
        26/06/1995  irrigation apply amount =  23.5 (mm)
        3/07/1995  irrigation apply amount =  23.0 (mm)
        6/07/1995  irrigation apply amount =  14.5 (mm)
        11/07/1995  irrigation apply amount =  20.0 (mm)
        17/07/1995  irrigation apply amount =  24.0 (mm)
        26/07/1995  sugar harvest  (end_of_day)
        26/07/1995  sugar end_crop  (end_of_day)
      sugar
      fertiliser
      irrigation: same as 1) Harwood 1993-94 Q117 P.paddock.Irrigation
      surfaceom Surface Organic Matter
        PoolName = sugar_trash  # Organic Matter pool name
        type = sugar  # Organic Matter type
        mass = 1000  # Initial surface residue (kg/ha)
        cnr = 80  # C:N ratio of initial residue
        standing_fraction = 1  # Fraction of residue standing
      outputfile: filename=19a) Simunye 1994-95 NCo376 1R Irrigation Treatment 1.out; title=19a) Simunye 1994-95 NCo376 1R Irrigation Treatment 1
        variables -> /simulations/1) Harwood 1993-94 Q117 P/paddock/Outputfile/Variables
        events Reporting Frequency -> /simulations/1) Harwood 1993-94 Q117 P/paddock/Outputfile/Reporting Frequency
      soil Simunye
        Water
          Layer:
            Thickness (mm)  BD (g/cc)  AirDry (mm/mm)  LL15 (mm/mm)  DUL (mm/mm)  SAT (mm/mm)
            50              1.24       0.05            0.175         0.32         0.48
            100             1.24       0.05            0.175         0.32         0.48
            150             1.3        0.05            0.193         0.325        0.48
            150             1.26       0.05            0.221         0.341        0.48
            150             1.3        0.05            0.22          0.325        0.48
            200             1.25       0.05            0.245         0.324        0.48
            300             1.25       0.05            0.246         0.309        0.48
            450             1.25       0.05            0.241         0.313        0.48
            600             1.25       0.05            0.241         0.3          0.48
            600             1.25       0.05            0.241         0.3          0.48
          SoilCrop sugar
            Layer:
              Thickness (mm)  LL (mm/mm)  KL (/day)  XF (0-1)
              50              0.175       0.16       1
              100             0.175       0.14       1
              150             0.193       0.1        1
              150             0.221       0.07       1
              150             0.22        0.06       1
              200             0.245       0.05       1
              300             0.246       0.04       1
              450             0.241       0.03       1
              600             0.241       0.02       1
              600             0.241       0.01       1
        SoilWat: SummerCona=3; SummerU=9; SummerDate=1-Nov; WinterCona=3; WinterU=9; WinterDate=1-Apr; DiffusConst=40; DiffusSlope=16; Salb=0.17; CN2Bare=82; CNRed=20; CNCov=0.8
          Layer:
            Thickness (mm)  SWCON (0-1)
            50              0.6
            100             0.6
            150             0.6
            150             0.6
            150             0.6
            200             0.6
            300             0.6
            450             0.6
            600             0.6
            600             0.6
        SoilOrganicMatter: RootCN=70; RootWT=1000; SoilCN=13; EnrACoeff=7.4; EnrBCoeff=0.2
          Layer:
            Thickness (mm)  OC (Total %)  FBiom (0-1)  FInert (0-1)
            50              1.3           0.03         0.4
            100             1             0.015        0.5
            150             0.8           0.01         0.75
            150             0.8           0.01         0.85
            150             0.7           0.005        0.9
            200             0.6           0.005        0.95
            300             0.2           0.001        0.99
            450             0.2           0.001        0.99
            600             0.2           0.001        0.99
            600             0.2           0.001        0.99
        Analysis
          Layer:
            Thickness (mm)  PH (1:5 water)
            50              6
            100             6
            150             6
            150             6
            150             6
            200             6
            300             5
            450             5
            600             5
            600             5
        Sample Initial nitrogen
          Layer:
            Thickness (mm)  NO3 (ppm)  NH4 (ppm)
            50              2.00002    1.00005
            100             2.00001    1.00005
            150             1          1.00004
            150             1          0.50002
            150             0.999998   0.500018
            200             0.999995   0.500017
            300             0.999992   0.500014
            450             0.999989   0.500012
            600             1.00001    0.500008
            600             1          0.500004
        InitWater Initial water: RelativeTo=ll15
          PercentMethod: Percent=0; Distributed=Filled from top
  simulation 19b) Simunye 1994-95 NCo376 1R Irrigation Treatment 2
    metfile met: filename=Simunye.met
    clock
      start_date = 10/08/1994  # Enter the start date of the simulation
      end_date = 26/07/1995  # Enter the end date of the simulation
    summaryfile
    area paddock
      folder Manager folder
        manager Simunye man
          on init:
```
samp=0
```
          on start_of_day:
```
! Observed sampling dates
samp=0
if ((year = 1995) and (day = 207 or day = 223)) then
   samp = 1
endif

! Simulation info
site='Simunye'
season='1994-95'
treat=2
```
      operations
        10/08/1994  sugar sow population = 16, sowing_depth = 150, cultivar = NCo376, ratoon = 1
        11/08/1994  fertiliser apply amount = 140 (kg/ha), depth = 50 (mm), type = urea_n ()
        7/09/1994  irrigation apply amount =  83.6 (mm)
        27/09/1994  irrigation apply amount =  35.5 (mm)
        29/09/1994  irrigation apply amount =  24.5 (mm)
        2/11/1994  irrigation apply amount =  60.0 (mm)
        18/11/1994  irrigation apply amount =  50.2 (mm)
        22/12/1994  irrigation apply amount =  60.0 (mm)
        4/01/1995  irrigation apply amount =  60.0 (mm)
        13/01/1995  irrigation apply amount =  59.3 (mm)
        26/01/1995  irrigation apply amount =  59.5 (mm)
        7/02/1995  irrigation apply amount =  57.5 (mm)
        13/02/1995  irrigation apply amount =  49.0 (mm)
        27/02/1995  irrigation apply amount =  60.0 (mm)
        13/01/1995  irrigation apply amount =  59.3 (mm)
        9/03/1995  irrigation apply amount =  60.0 (mm)
        15/03/1995  irrigation apply amount =  34.0 (mm)
        20/03/1995  irrigation apply amount =  39.5 (mm)
        5/04/1995  irrigation apply amount =  57.4 (mm)
        15/04/1995  irrigation apply amount =  35.5 (mm)
        26/04/1995  irrigation apply amount =  47.2 (mm)
        18/05/1995  irrigation apply amount =  51.6 (mm)
        1/06/1995  irrigation apply amount =  50.4 (mm)
        13/01/1995  irrigation apply amount =  59.3 (mm)
        15/06/1995  irrigation apply amount =  21.0 (mm)
        22/06/1995  irrigation apply amount =  59.0 (mm)
        5/07/1995  irrigation apply amount =  45.5 (mm)
        18/07/1995  irrigation apply amount =  56.0 (mm)
        26/07/1995  sugar harvest  (end_of_day)
        26/07/1995  sugar end_crop  (end_of_day)
      sugar
      fertiliser
      irrigation: same as 1) Harwood 1993-94 Q117 P.paddock.Irrigation
      surfaceom Surface Organic Matter
        PoolName = sugar_trash  # Organic Matter pool name
        type = sugar  # Organic Matter type
        mass = 1000  # Initial surface residue (kg/ha)
        cnr = 80  # C:N ratio of initial residue
        standing_fraction = 1  # Fraction of residue standing
      outputfile: filename=19b) Simunye 1994-95 NCo376 1R Irrigation Treatment 2.out; title=19b) Simunye 1994-95 NCo376 1R Irrigation Treatment 2
        variables -> /simulations/1) Harwood 1993-94 Q117 P/paddock/Outputfile/Variables
        events Reporting Frequency -> /simulations/1) Harwood 1993-94 Q117 P/paddock/Outputfile/Reporting Frequency
      soil Simunye: same as 19a) Simunye 1994-95 NCo376 1R Irrigation Treatment 1.paddock.Simunye
  simulation 19c) Simunye 1994-95 NCo376 1R Irrigation Treatment 3
    metfile met: filename=Simunye.met
    clock
      start_date = 10/08/1994  # Enter the start date of the simulation
      end_date = 26/07/1995  # Enter the end date of the simulation
    summaryfile
    area paddock
      folder Manager folder
        manager Simunye man
          on init:
```
samp=0
```
          on start_of_day:
```
! Observed sampling dates
samp=0
if ((year = 1995) and (day = 207 or day = 223)) then
   samp = 1
endif

! Simulation info
site='Simunye'
season='1994-95'
treat=3
```
      operations
        10/08/1994  sugar sow population = 16, sowing_depth = 150, cultivar = NCo376, ratoon = 1
        11/08/1994  fertiliser apply amount = 140 (kg/ha), depth = 50 (mm), type = urea_n ()
        7/09/1994  irrigation apply amount =  83.1 (mm)
        22/09/1994  irrigation apply amount =  29.6 (mm)
        12/10/1994  irrigation apply amount =  30.1 (mm)
        28/10/1994  irrigation apply amount =  32.1 (mm)
        10/11/1994  irrigation apply amount =  45.3 (mm)
        30/11/1994  irrigation apply amount =  33.8 (mm)
        21/12/1994  irrigation apply amount =  38.4 (mm)
        27/12/1994  irrigation apply amount =  41.1 (mm)
        3/01/1995  irrigation apply amount =  27.1 (mm)
        7/01/1995  irrigation apply amount =  28.3 (mm)
        12/01/1995  irrigation apply amount =  21.5 (mm)
        24/01/1995  irrigation apply amount =  41.2 (mm)
        28/01/1995  irrigation apply amount =  27.1 (mm)
        4/02/1995  irrigation apply amount =  15.7 (mm)
        7/02/1995  irrigation apply amount =  23.7 (mm)
        9/02/1995  irrigation apply amount =  13.1 (mm)
        13/02/1995  irrigation apply amount =  28.3 (mm)
        17/02/1995  irrigation apply amount =  25.6 (mm)
        22/02/1995  irrigation apply amount =  13.6 (mm)
        2/03/1995  irrigation apply amount =  45.8 (mm)
        9/03/1995  irrigation apply amount =  35.7 (mm)
        13/03/1995  irrigation apply amount =  22.0 (mm)
        15/03/1995  irrigation apply amount =   7.0 (mm)
        16/03/1995  irrigation apply amount =  26.7 (mm)
        22/03/1995  irrigation apply amount =  24.6 (mm)
        3/04/1995  irrigation apply amount =  32.6 (mm)
        7/04/1995  irrigation apply amount =  20.5 (mm)
        10/04/1995  irrigation apply amount =  15.3 (mm)
        13/04/1995  irrigation apply amount =  16.2 (mm)
        23/04/1995  irrigation apply amount =  23.5 (mm)
        28/04/1995  irrigation apply amount =  25.1 (mm)
        5/05/1995  irrigation apply amount =  12.6 (mm)
        18/05/1995  irrigation apply amount =  20.7 (mm)
        25/05/1995  irrigation apply amount =  17.3 (mm)
        30/05/1995  irrigation apply amount =  15.4 (mm)
        6/06/1995  irrigation apply amount =  19.0 (mm)
        13/06/1995  irrigation apply amount =  17.6 (mm)
        22/06/1995  irrigation apply amount =  20.4 (mm)
        27/06/1995  irrigation apply amount =  19.8 (mm)
        4/07/1995  irrigation apply amount =  18.0 (mm)
        10/07/1995  irrigation apply amount =  20.1 (mm)
        14/07/1995  irrigation apply amount =  13.5 (mm)
        19/07/1995  irrigation apply amount =  17.7 (mm)
        26/07/1995  sugar harvest  (end_of_day)
        26/07/1995  sugar end_crop  (end_of_day)
      sugar
      fertiliser
      irrigation: same as 1) Harwood 1993-94 Q117 P.paddock.Irrigation
      surfaceom Surface Organic Matter
        PoolName = sugar_trash  # Organic Matter pool name
        type = sugar  # Organic Matter type
        mass = 1000  # Initial surface residue (kg/ha)
        cnr = 80  # C:N ratio of initial residue
        standing_fraction = 1  # Fraction of residue standing
      outputfile: filename=19c) Simunye 1994-95 NCo376 1R Irrigation Treatment 3.out; title=19c) Simunye 1994-95 NCo376 1R Irrigation Treatment 3
        variables -> /simulations/1) Harwood 1993-94 Q117 P/paddock/Outputfile/Variables
        events Reporting Frequency -> /simulations/1) Harwood 1993-94 Q117 P/paddock/Outputfile/Reporting Frequency
      soil Simunye: same as 19a) Simunye 1994-95 NCo376 1R Irrigation Treatment 1.paddock.Simunye
  simulation 19d) Simunye 1994-95 NCo376 1R Irrigation Treatment 4
    metfile met: filename=Simunye.met
    clock
      start_date = 10/08/1994  # Enter the start date of the simulation
      end_date = 26/07/1995  # Enter the end date of the simulation
    summaryfile
    area paddock
      folder Manager folder
        manager Simunye man
          on init:
```
samp=0
```
          on start_of_day:
```
! Observed sampling dates
samp=0
if ((year = 1995) and (day = 207 or day = 223)) then
   samp = 1
endif

! Simulation info
site='Simunye'
season='1994-95'
treat=4
```
      operations
        10/08/1994  sugar sow population = 16, sowing_depth = 150, cultivar = NCo376, ratoon = 1
        11/08/1994  fertiliser apply amount = 140 (kg/ha), depth = 50 (mm), type = urea_n ()
        7/09/1994  irrigation apply amount =  83.0 (mm)
        15/10/1994  irrigation apply amount =  36.0 (mm)
        27/10/1994  irrigation apply amount =  35.3 (mm)
        9/11/1994  irrigation apply amount =  52.8 (mm)
        22/11/1994  irrigation apply amount =  25.7 (mm)
        1/12/1994  irrigation apply amount =  30.5 (mm)
        22/12/1994  irrigation apply amount =  44.2 (mm)
        28/12/1994  irrigation apply amount =  26.1 (mm)
        4/01/1995  irrigation pply amount =  32.0 (mm)
        7/01/1995  irrigation pply amount =  25.3 (mm)
        12/01/1995  irrigation apply amount =  21.5 (mm)
        25/01/1995  irrigation apply amount =  45.6 (mm)
        30/01/1995  irrigation apply amount =  32.1 (mm)
        6/02/1995  irrigation apply amount =  34.0 (mm)
        8/02/1995  irrigation apply amount =  15.0 (mm)
        14/02/1995  irrigation apply amount =  29.3 (mm)
        17/02/1995  irrigation apply amount =  19.5 (mm)
        23/02/1995  irrigation apply amount =  10.0 (mm)
        1/03/1995  irrigation apply amount =  38.3 (mm)
        4/03/1995  irrigation apply amount =  18.9 (mm)
        11/03/1995  irrigation apply amount =  35.2 (mm)
        14/03/1995  irrigation apply amount =  18.7 (mm)
        17/03/1995  irrigation apply amount =  20.9 (mm)
        20/03/1995  irrigation apply amount =   6.5 (mm)
        21/03/1995  irrigation apply amount =  21.1 (mm)
        4/04/1995  irrigation apply amount =  38.1 (mm)
        7/04/1995  irrigation apply amount =  15.0 (mm)
        11/04/1995  irrigation apply amount =  20.0 (mm)
        18/04/1995  irrigation apply amount =  26.5 (mm)
        25/04/1995  irrigation apply amount =  14.1 (mm)
        2/05/1995  irrigation apply amount =  29.4 (mm)
        17/05/1995  irrigation apply amount =  18.8 (mm)
        24/05/1995  irrigation apply amount =  20.1 (mm)
        29/05/1995  irrigation apply amount =  16.3 (mm)
        5/06/1995  irrigation apply amount =  19.8 (mm)
        9/06/1995  irrigation apply amount =  14.1 (mm)
        14/06/1995  irrigation apply amount =  13.6 (mm)
        21/06/1995  irrigation apply amount =  27.9 (mm)
        26/07/1995  sugar harvest  (end_of_day)
        26/07/1995  sugar end_crop  (end_of_day)
      sugar
      fertiliser
      irrigation: same as 1) Harwood 1993-94 Q117 P.paddock.Irrigation
      surfaceom Surface Organic Matter
        PoolName = sugar_trash  # Organic Matter pool name
        type = sugar  # Organic Matter type
        mass = 1000  # Initial surface residue (kg/ha)
        cnr = 80  # C:N ratio of initial residue
        standing_fraction = 1  # Fraction of residue standing
      outputfile: filename=19d) Simunye 1994-95 NCo376 1R Irrigation Treatment 4.out; title=19d) Simunye 1994-95 NCo376 1R Irrigation Treatment 4
        variables -> /simulations/1) Harwood 1993-94 Q117 P/paddock/Outputfile/Variables
        events Reporting Frequency -> /simulations/1) Harwood 1993-94 Q117 P/paddock/Outputfile/Reporting Frequency
      soil Simunye: same as 19a) Simunye 1994-95 NCo376 1R Irrigation Treatment 1.paddock.Simunye
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