folder SweetCornValidation: version=32
  simulation NZIrrigation
    clock
      start_date = 30/10/1996  # Select the start date of the simulation
      end_date = 22/03/1997  # Select the end date of the simulation
    summaryfile
    metfile met: filename=Lincoln9697.met
    area FI
      fertiliser
      surfaceom surface organic matter
        PoolName = wheat  # Organic Matter pool name
        type = wheat  # Organic Matter type
        mass = 10  # Initial surface residue (kg/ha)
        cnr = 80.0  # C:N ration of initial residue
        standing_fraction = 0.0  # Fraction of residue standing
      SweetCorn
      outputfile: filename=NZIrrigation FI.out; title=NZIrrigation FI
        variables My Variables -> /SweetCornValidation/shared/My Variables
        events My Variables Events -> /SweetCornValidation/shared/My Variables Events
      soil Lincoln -> /SweetCornValidation/shared/Lincoln
      folder LincolnCrop -> /SweetCornValidation/shared/LincolnCrop
      irrigation
        automatic_irrigation = on  # switch
        asw_depth = 600.0  # Depth to which ASW is calculated. (mm)
        crit_fr_asw = 0.5  # Fraction of ASW below which irrigation is applied (0-1.0)
        irrigation_efficiency = 1.0  # Efficiency of the irrigation. (0-1.0)
        default_no3_conc = 0.0  # Nitrate concentration (ppm N)
        default_nh4_conc = 0.0  # Ammonium concentration (ppm N)
        default_cl_conc = 0.0  # Chloride concentration (ppm Cl)
    area FD
      fertiliser
      surfaceom surface organic matter
        PoolName = wheat  # Organic Matter pool name
        type = wheat  # Organic Matter type
        mass = 10  # Initial surface residue (kg/ha)
        cnr = 80.0  # C:N ration of initial residue
        standing_fraction = 0.0  # Fraction of residue standing
      SweetCorn
      outputfile: filename=NZIrrigation FD.out; title=NZIrrigation FD
        variables My Variables -> /SweetCornValidation/shared/My Variables
        events My Variables Events -> /SweetCornValidation/shared/My Variables Events
      soil Lincoln -> /SweetCornValidation/shared/Lincoln
      folder LincolnCrop -> /SweetCornValidation/shared/LincolnCrop
      irrigation
        automatic_irrigation = off  # switch
        asw_depth = 600.0  # Depth to which ASW is calculated. (mm)
        crit_fr_asw = 0.5  # Fraction of ASW below which irrigation is applied (0-1.0)
        irrigation_efficiency = 1.0  # Efficiency of the irrigation. (0-1.0)
        default_no3_conc = 0.0  # Nitrate concentration (ppm N)
        default_nh4_conc = 0.0  # Ammonium concentration (ppm N)
        default_cl_conc = 0.0  # Chloride concentration (ppm Cl)
  simulation Lawes
    clock
      start_date = 20/11/2005  # Select the start date of the simulation
      end_date = 16/02/2006  # Select the end date of the simulation
    summaryfile
    metfile met: filename=lawes.met
    area RD
      fertiliser
      surfaceom surface organic matter
        PoolName = wheat  # Organic Matter pool name
        type = wheat  # Organic Matter type
        mass = 10  # Initial surface residue (kg/ha)
        cnr = 80.0  # C:N ration of initial residue
        standing_fraction = 0.0  # Fraction of residue standing
      SweetCorn
      outputfile: filename=Lawes RD.out; title=Lawes RD
        variables My Variables -> /SweetCornValidation/shared/My Variables
        events My Variables Events -> /SweetCornValidation/shared/My Variables Events
      outputfile FinalOutput: filename=Lawes RD FinalOutput.out; title=Lawes RD FinalOutput
        variables FinalVariables -> /SweetCornValidation/shared/FinalVariables
        events FinalVariables Events -> /SweetCornValidation/shared/FinalVariables Events
      Soil DPIGatton -> /SweetCornValidation/shared/DPIGatton
      folder LawesCrop -> /SweetCornValidation/shared/LawesCrop
      operations
        22-nov  Irrigation apply amount = 12
        8-dec  Irrigation apply amount = 3.8
        10-dec  Irrigation apply amount = 14.9
        13-dec  Irrigation apply amount = 7.6
        15-dec  Irrigation apply amount = 10
        20-dec  fertiliser apply amount = 15, type = no3_n, depth = 50
        20-dec  Irrigation apply amount = 9.8
        22-dec  Irrigation apply amount = 9.3
        23-dec  Irrigation apply amount = 13.6
        24-dec  Irrigation apply amount = 6.6
        29-dec  Irrigation apply amount = 21.1
        4-jan  Irrigation apply amount = 13.7
        5-jan  fertiliser apply amount = 15, type = no3_n, depth = 50
        6-jan  Irrigation apply amount = 14.8
        14-jan  Irrigation apply amount = 13
        17-jan  Irrigation apply amount = 19.4
        19-jan  Irrigation apply amount = 12.5
        25-jan  fertiliser apply amount = 15, type = no3_n, depth = 50
        26-jan  Irrigation apply amount = 13.5
        28-jan  Irrigation apply amount = 19.1
        31-jan  Irrigation apply amount = 14.1
        3-feb  Irrigation apply amount = 26
        8-feb  Irrigation apply amount = 19
        11-feb  Irrigation apply amount = 16.6
        13-feb  Sweetcorn harvest
        13-feb  Sweetcorn end_crop
      irrigation: same as NZIrrigation.FD.Irrigation
    area Dry
      fertiliser
      surfaceom surface organic matter
        PoolName = wheat  # Organic Matter pool name
        type = wheat  # Organic Matter type
        mass = 10  # Initial surface residue (kg/ha)
        cnr = 80.0  # C:N ration of initial residue
        standing_fraction = 0.0  # Fraction of residue standing
      SweetCorn
      outputfile: filename=Lawes Dry.out; title=Lawes Dry
        variables My Variables -> /SweetCornValidation/shared/My Variables
        events My Variables Events -> /SweetCornValidation/shared/My Variables Events
      Soil DPIGatton -> /SweetCornValidation/shared/DPIGatton
      outputfile FinalOutput: filename=Lawes Dry FinalOutput.out; title=Lawes Dry FinalOutput
        variables FinalVariables -> /SweetCornValidation/shared/FinalVariables
        events FinalVariables Events -> /SweetCornValidation/shared/FinalVariables Events
      folder LawesCrop -> /SweetCornValidation/shared/LawesCrop
      operations
        22-nov  irrigation apply amount = 12
        8-dec  irrigation apply amount = 4
        10-dec  irrigation apply amount = 14.5
        20-dec  irrigation apply amount = 9.2
        20-dec  fertiliser apply amount = 15, type = no3_n, depth = 50
        22-dec  irrigation apply amount = 5.6
        23-dec  irrigation apply amount = 6.8
        24-dec  irrigation apply amount = 10.1
        5-jan  fertiliser apply amount = 15, type = no3_n, depth = 50
        6-jan  irrigation apply amount = 7.2
        25-jan  fertiliser apply amount = 15, type = no3_n, depth = 50
        26-jan  irrigation apply amount = 7
        13-feb  Sweetcorn harvest
        13-feb  Sweetcorn end_crop
      irrigation: same as NZIrrigation.FD.Irrigation
  folder shared
    soil Lincoln: Site=UQ, Lawes; Region=Lockyer
      Comment = oc and ph not measured  # Comments
      SoilType = Black Vertosol  # Soil description
      NearestTown = Gatton, Q 4343
      NaturalVegetation = Blue Gum, Moreton Bay Ash, Tea Tree
      InitWater Initial water
        PercentMethod: Percent=0.83; Distributed=Filled from top
      Water
        Layer:
          Thickness (mm)  BD (g/cc)  AirDry (mm/mm)  LL15 (mm/mm)  DUL (mm/mm)  SAT (mm/mm)
          150             1.320      0.050           0.100         0.290        0.350
          150             1.300      0.100           0.100         0.290        0.350
          300             1.230      0.100           0.100         0.290        0.350
          300             1.270      0.100           0.100         0.290        0.350
          300             1.370      0.100           0.100         0.290        0.350
          300             1.350      0.100           0.100         0.290        0.350
          300             1.350      0.100           0.100         0.290        0.350
        SoilCrop SweetCorn
          Layer:
            Thickness (mm)  LL (mm/mm)  KL (/day)  XF (0-1)
            150             0.100       0.100      1.000
            150             0.100       0.100      1.000
            300             0.100       0.080      1.000
            300             0.100       0.060      1.000
            300             0.100       0.040      1.000
            300             0.100       0.020      1.000
            300             0.100       0.010      1.000
      SoilWat: SummerCona=3.5; SummerU=6; SummerDate=1-Nov; WinterCona=3.5; WinterU=6; WinterDate=1-Apr; DiffusConst=40; DiffusSlope=16; Salb=0.13; Cn2Bare=73; CnRed=20; CnCov=0.8
        Layer:
          Thickness (mm)  SWCON (0-1)
          150             0.300
          150             0.300
          300             0.300
          300             0.300
          300             0.300
          300             0.300
          300             0.300
      SoilOrganicMatter: RootCn=40; RootWt=200; SoilCn=12.5; EnrACoeff=7.4; EnrBCoeff=0.2
        Layer:
          Thickness (mm)  OC (Total %)  FBiom (0-1)  FInert (0-1)
          150             1.240         0.030        0.400
          150             1.240         0.020        0.600
          300             1.250         0.010        0.800
          300             1.100         0.010        0.900
          300             0.710         0.010        0.950
          300             0.340         0.010        0.950
          300             0.260         0.010        0.950
      Analysis
        Layer:
          Thickness (mm)  PH (1:5 water)
          150             7
          150             7
          300             7
          300             7
          300             7
          300             7
          300             7
      Sample Initial nitrogen
        Layer:
          Thickness (mm)  NO3 (ppm)  NH4 (ppm)
          150             6.494      0.608
          150             2.098      0.101
          300             2.098      0.101
          300             1.698      0.101
          300             1.698      0.101
          300             1.698      0.101
          300             1.698      0.101
    folder LincolnCrop
      manager Harvesting rule
        # Harvesting criteria
        crop = Sweetcorn  # Enter name of crop to harvest when ripe
        on end_of_day:
```
           if [crop].StageName = 'harvest_ripe' or [crop].plant_status = 'dead' then
              [crop]  harvest
              [crop]  end_crop
           endif
```
      manager Sowing fertiliser
        # When should fertiliser be applied
        modulename = SweetCorn  # On which module should the event come from
        eventname = sowing  # On which event should fertiliser be applied
        # Fertiliser application details
        fertmodule = fertiliser  # Module used to apply the fertiliser
        fert_amount_sow = 24  # Amount of starter fertiliser at sowing (kg/ha)
        fert_type_sow = NO3_N  # Sowing fertiliser type
        on [modulename].[eventname]:
```
        [fertmodule] apply amount = [fert_amount_sow] (kg/ha), depth = 50 (mm), type = [fert_type_sow]
```
      manager Sow on a fixed date
        # Sowing criteria
        date = 30-oct  # Enter sowing date (dd-mmm)
        # Sowing parameters
        crop = SweetCorn  # Enter name of crop to sow
        density = 5.7  # Enter sowing density (plants/m2)
        depth = 50  # Enter sowing depth (mm)
        cultivar = challenger  # Enter cultivar
        row_spacing = 700  # Enter row spacing (mm)
        on start_of_day:
```
      if (today = date('[date]') then
                    [crop] sow population =[density], sowing_depth = [depth], cultivar = [cultivar], row_spacing = [row_spacing]
        endif
```
      manager Fertilise on fixed date
        # When should fertiliser be applied
        fert_date = 20-nov  # Enter fertiliser date (dd-mmm)
        fert_criteria = 1000  # Don't add fertiliser if N in top 2 layers exceeds (kg/ha)
        # Fertiliser application details
        fertmodule = fertiliser  # Module used to apply the fertiliser
        fert_amount = 200  # Amount of fertiliser to apply (kg/ha)
        fert_type = urea_N  # Sowing fertiliser type
        on start_of_day:
```
         if (today = date('[fert_date]') then
            N_topsoil = no3(1) + nh4(1) + no3(2) + nh4(2)
            if (N_topsoil < [fert_criteria]) then
               [fertmodule] apply amount = [fert_amount] (kg/ha), depth = 50 (mm), type = [fert_type] ()
            endif
         endif
```
    Soil DPIGatton: Site=UQ, Lawes; Region=Lockyer
      Comment = oc and ph estimated  # Comments
      SoilType = Prarie  # Soil description
      NearestTown = Gatton, Q 4343
      NaturalVegetation = Blue Gum, Moreton Bay Ash, Tea Tree
      Water
        Layer:
          Thickness (mm)  BD (g/cc)  AirDry (mm/mm)  LL15 (mm/mm)  DUL (mm/mm)  SAT (mm/mm)
          150             1.260      0.100           0.140         0.370        0.450
          150             1.450      0.200           0.210         0.410        0.450
          300             1.270      0.200           0.300         0.400        0.450
          300             1.330      0.200           0.310         0.430        0.470
          300             1.410      0.200           0.270         0.390        0.440
          300             1.390      0.200           0.360         0.400        0.450
        SoilCrop SweetCorn
          Layer:
            Thickness (mm)  LL (mm/mm)  KL (/day)  XF (0-1)
            150             0.140       0.200      1.000
            150             0.210       0.080      0.300
            300             0.300       0.080      1.000
            300             0.310       0.040      1.000
            300             0.270       0.040      1.000
            300             0.360       0.020      1.000
      SoilWat: SummerCona=3.5; SummerU=6; SummerDate=1-Nov; WinterCona=3.5; WinterU=6; WinterDate=1-Apr; DiffusConst=40; DiffusSlope=16; Salb=0.13; CN2Bare=90; CNRed=20; CNCov=0.8
        Layer:
          Thickness (mm)  SWCON (0-1)
          150             0.500
          150             0.500
          300             0.500
          300             0.500
          300             0.500
          300             0.500
      SoilOrganicMatter: RootCN=40; RootWT=200; SoilCN=12.5; EnrACoeff=7.4; EnrBCoeff=0.2
        Layer:
          Thickness (mm)  OC (Total %)  FBiom (0-1)  FInert (0-1)
          150             1.250         0.030        0.400
          150             1.060         0.020        0.600
          300             0.810         0.010        0.800
          300             0.700         0.010        0.900
          300             0.700         0.010        0.950
          300             0.700         0.010        0.950
      Analysis
        Layer:
          Thickness (mm)  PH (1:5 water)
          150             7
          150             7
          300             7
          300             7
          300             7
          300             7
      Sample Initial nitrogen
        Layer:
          Thickness (mm)  NO3 (ppm)  NH4 (ppm)
          150             18.500     0.600
          150             9.200      0.100
          300             11.800     0.100
          300             11.200     0.100
          300             10.300     0.100
          300             14.000     0.100
      Sample Initial water
        Layer:
          Thickness (mm)  SW (mm/mm)
          150             0.280
          150             0.350
          300             0.370
          300             0.420
          300             0.370
          300             0.360
    folder LawesCrop
      manager Harvesting rule
        # Harvesting criteria
        crop = Sweetcorn  # Enter name of crop to harvest when ripe
        on end_of_day:
        script: same as in shared.LincolnCrop.Harvesting rule
      manager Sow on a fixed date
        # Sowing criteria
        date = 21-nov  # Enter sowing date (dd-mmm)
        # Sowing parameters
        crop = SweetCorn  # Enter name of crop to sow
        density = 5.7  # Enter sowing density (plants/m2)
        depth = 50  # Enter sowing depth (mm)
        cultivar = h5  # Enter cultivar
        row_spacing = 700  # Enter row spacing (mm)
        on start_of_day:
        script: same as in shared.LincolnCrop.Sow on a fixed date
    operations
    variables My Variables
      variable:
        dd/mmm/yyyy as Date  # Date (dd/mm/yyyy)
        SweetCorn.zadok_stage  # Zadok's growth developmental stage
        SweetCorn.lai  # Leaf area index
        SweetCorn.LeafGreenWt  # Weight of leaf
        SweetCorn.StemGreenWt  # Weight of stem
        SweetCorn.EarTotalWt  # Weight of heads
        SweetCorn.biomass_wt  # Biomass weight
        SweetCorn.swdef_photo  # Soil water deficit in photosynthesis
        SweetCorn.node_no  # Number of leaves per plant
        SweetCorn.node_no_sen  # Number of senesced leaves per square meter
        SweetCorn.node_no_fx  # Number of fully expanded leaves
        SweetCorn.nfact_photo  # N factor for photosynthesis
        SweetCorn.temp_stress_photo  # Temperature Stress in photosynthesis
        SweetCorn.tt_tot  # Thermal time spent in each crop stage
        SweetCorn.DaysAfterSowing  # Days after Sowing
        Irrigation.irrigation  # Irrigation entering the profile (mm)
        SweetCorn.root_depth  # depth of roots
        sw_dep()  # Soil water - layered (mm)
        sw  # Soil water - layered (mm/mm)
        SweetCorn.dlt_lai_pot  # Potential change in live plant lai
        SweetCorn.ep  # Plant water uptake
        SweetCorn.sw_demand  # Demand for sw
        SweetCorn.nfact_expan  # N factor for leaf expansion
        SweetCorn.swdef_expan  # Soil water deficit in leaf expansion
        runoff  # Runoff (mm)
        es  # Evaporation (mm)
    events My Variables Events: event=Daily  # End of day
    variables FinalVariables
      variable:
        dd/mm/yyyy as Date  # Date (dd/mm/yyyy)
        SweetCorn.leaf_area_max
        SweetCorn.leaf_area
        SweetCorn.LeafGreenWt  # Weight of leaf
        SweetCorn.StemGreenWt  # Weight of stem
        SweetCorn.EarTotalWt  # Weight of heads
        SweetCorn.biomass_wt  # Biomass weight
        SweetCorn.node_no  # Number of leaves per plant
        SweetCorn.node_no_sen  # Number of senesced leaves per square meter
        SweetCorn.node_no_fx  # Number of fully expanded leaves
        SweetCorn.tt_tot  # Thermal time spent in each crop stage
        SweetCorn.DaysAfterSowing  # Days after Sowing
        SweetCorn.root_depth  # depth of roots
    events FinalVariables Events: event=SweetCorn.harvesting
