folder untitled: version=32
  simulation PacSeeds
    clock
      start_date = 1/09/2004  # Select the start date of the simulation
      end_date = 30/06/2005  # Select the end date of the simulation
    summaryfile
    metfile met: filename=lawes0405.met
    area Planting1
      folder Manager folder
        manager Harvesting rule
          # Harvesting criteria
          crop = SweetSorghum  # Enter name of crop to harvest when ripe
          on end_of_day:
```
           if [crop].StageName = 'harvest_ripe' or [crop].plant_status = 'dead' then
              [crop]  harvest
              [crop]  end_crop
           endif
```
        manager Sowing fertiliser
          # When should fertiliser be applied
          modulename = SweetSorghum  # On which module should the event come from
          eventname = sowing  # On which event should fertiliser be applied
          # Fertiliser application details
          fertmodule = fertiliser  # Module used to apply the fertiliser
          fert_amount_sow = 300  # Amount of starter fertiliser at sowing (kg/ha)
          fert_type_sow = NO3_N  # Sowing fertiliser type
          on [modulename].[eventname]:
```
        [fertmodule] apply amount = [fert_amount_sow] (kg/ha), depth = 50 (mm), type = [fert_type_sow]
```
        manager Sow on a fixed date
          # Sowing criteria
          date = 15-sep  # Enter sowing date (dd-mmm)
          # Sowing parameters
          crop = SweetSorghum  # Enter name of crop to sow
          density = 10  # Enter sowing density (plants/m2)
          depth = 50  # Enter sowing depth (mm)
          cultivar = sugargraze  # Enter cultivar
          row_spacing = 600  # Enter row spacing (mm)
          on start_of_day:
```
      if (today = date('[date]') then
                    [crop] sow population =[density], sowing_depth = [depth], cultivar = [cultivar], row_spacing = [row_spacing]
        endif
```
      fertiliser
      surfaceom surface organic matter
        PoolName = wheat  # Organic Matter pool name
        type = wheat  # Organic Matter type
        mass = 1000.  # Initial surface residue (kg/ha)
        cnr = 80.0  # C:N ration of initial residue
        standing_fraction = 0.0  # Fraction of residue standing
      soil LawesSoil -> /untitled/shared/LawesSoil
      SweetSorghum
      outputfile: filename=PacSeeds Planting1.out; title=PacSeeds Planting1
        variables My Variables
          variable:
            dd/mm/yyyy as Date  # Date (dd/mm/yyyy)
            SweetSorghum.zadok_stage  # Zadok's growth developmental stage
            SweetSorghum.lai  # Leaf area index
            SweetSorghum.LeafGreenWt  # Weight of leaf
            SweetSorghum.StemGreenWt  # Weight of stem
            SweetSorghum.HeadTotalWt  # Weight of heads
            SweetSorghum.biomass_wt  # Biomass weight
        events My Variables Events: event=Daily  # End of day
      irrigation
        automatic_irrigation = on  # switch
        asw_depth = 600.0  # Depth to which ASW is calculated. (mm)
        crit_fr_asw = 0.5  # Fraction of ASW below which irrigation is applied (0-1.0)
        irrigation_efficiency = 1.0  # Efficiency of the irrigation. (0-1.0)
        default_no3_conc = 0.0  # Nitrate concentration (ppm N)
        default_nh4_conc = 0.0  # Ammonium concentration (ppm N)
        default_cl_conc = 0.0  # Chloride concentration (ppm Cl)
    area Planting2
      folder Manager folder
        manager Harvesting rule
          # Harvesting criteria
          crop = SweetSorghum  # Enter name of crop to harvest when ripe
          on end_of_day:
          script: same as in PacSeeds.Planting1.Manager folder.Harvesting rule
        manager Sowing fertiliser: same as PacSeeds.Planting1.Manager folder.Sowing fertiliser
        manager Sow on a fixed date
          # Sowing criteria
          date = 12-jan  # Enter sowing date (dd-mmm)
          # Sowing parameters
          crop = SweetSorghum  # Enter name of crop to sow
          density = 10  # Enter sowing density (plants/m2)
          depth = 50  # Enter sowing depth (mm)
          cultivar = sugargraze  # Enter cultivar
          row_spacing = 600  # Enter row spacing (mm)
          on start_of_day:
          script: same as in PacSeeds.Planting1.Manager folder.Sow on a fixed date
      fertiliser
      surfaceom surface organic matter
        PoolName = wheat  # Organic Matter pool name
        type = wheat  # Organic Matter type
        mass = 1000.  # Initial surface residue (kg/ha)
        cnr = 80.0  # C:N ration of initial residue
        standing_fraction = 0.0  # Fraction of residue standing
      soil LawesSoil -> /untitled/shared/LawesSoil
      SweetSorghum
      outputfile: filename=PacSeeds Planting2.out; title=PacSeeds Planting2
        variables My Variables
          variable:
            dd/mm/yyyy as Date  # Date (dd/mm/yyyy)
            SweetSorghum.zadok_stage  # Zadok's growth developmental stage
            SweetSorghum.lai  # Leaf area index
            SweetSorghum.LeafGreenWt  # Weight of leaf
            SweetSorghum.StemGreenWt  # Weight of stem
            SweetSorghum.HeadTotalWt  # Weight of heads
            SweetSorghum.biomass_wt  # Biomass weight
        events My Variables Events: event=Daily  # End of day
      irrigation: same as PacSeeds.Planting1.Irrigation
  folder shared
    soil LawesSoil: Site=UQ, Lawes; Region=Lockyer
      Comment = oc and ph not measured  # Comments
      SoilType = Black Vertosol  # Soil description
      NearestTown = Gatton, Q 4343
      NaturalVegetation = Blue Gum, Moreton Bay Ash, Tea Tree
      InitWater Initial water
        PercentMethod: Percent=0.83; Distributed=Filled from top
      Water
        Layer:
          Thickness (mm)  BD (g/cc)  AirDry (mm/mm)  LL15 (mm/mm)  DUL (mm/mm)  SAT (mm/mm)
          150             1.320      0.130           0.260         0.410        0.470
          150             1.300      0.234           0.260         0.430        0.480
          300             1.230      0.260           0.260         0.460        0.510
          300             1.270      0.260           0.260         0.440        0.490
          300             1.370      0.250           0.250         0.400        0.450
          300             1.350      0.280           0.280         0.410        0.460
          300             1.350      0.310           0.310         0.380        0.460
        SoilCrop SweetSorghum
          Layer:
            Thickness (mm)  LL (mm/mm)  KL (/day)  XF (0-1)
            150             0.260       0.100      1
            150             0.260       0.100      1
            300             0.260       0.080      1
            300             0.260       0.060      1
            300             0.250       0.040      1
            300             0.290       0.020      1
            300             0.380       0.010      1
      SoilWat: SummerCona=3.5; SummerU=6; SummerDate=1-Nov; WinterCona=3.5; WinterU=6; WinterDate=1-Apr; DiffusConst=40; DiffusSlope=16; Salb=0.13; Cn2Bare=73; CnRed=20; CnCov=0.8
        Layer:
          Thickness (mm)  SWCON (0-1)
          150             0.300
          150             0.300
          300             0.300
          300             0.300
          300             0.300
          300             0.300
          300             0.300
      SoilOrganicMatter: RootCn=40; RootWt=200; SoilCn=12.5; EnrACoeff=7.4; EnrBCoeff=0.2
        Layer:
          Thickness (mm)  OC (Total %)  FBiom (0-1)  FInert (0-1)
          150             1.240         0.030        0.400
          150             1.240         0.020        0.600
          300             1.250         0.010        0.800
          300             1.100         0.010        0.900
          300             0.710         0.010        0.950
          300             0.340         0.010        0.950
          300             0.260         0.010        0.950
      Analysis
        Layer:
          Thickness (mm)  PH (1:5 water)
          150             7
          150             7
          300             7
          300             7
          300             7
          300             7
          300             7
      Sample Initial nitrogen
        Layer:
          Thickness (mm)  NO3 (ppm)  NH4 (ppm)
          150             6.494      0.608
          150             2.098      0.101
          300             2.098      0.101
          300             1.698      0.101
          300             1.698      0.101
          300             1.698      0.101
          300             1.698      0.101
  simulation Lawes0102
    clock
      start_date = 1/11/2001  # Select the start date of the simulation
      end_date = 30/06/2002  # Select the end date of the simulation
    summaryfile
    metfile met: filename=UQG0102.met
    area Planting1
      folder Manager folder
        manager Harvesting rule
          # Harvesting criteria
          crop = SweetSorghum  # Enter name of crop to harvest when ripe
          on end_of_day:
          script: same as in PacSeeds.Planting1.Manager folder.Harvesting rule
        manager Sowing fertiliser: same as PacSeeds.Planting1.Manager folder.Sowing fertiliser
        manager Sow on a fixed date
          # Sowing criteria
          date = 23-nov  # Enter sowing date (dd-mmm)
          # Sowing parameters
          crop = SweetSorghum  # Enter name of crop to sow
          density = 10  # Enter sowing density (plants/m2)
          depth = 50  # Enter sowing depth (mm)
          cultivar = sugargraze  # Enter cultivar
          row_spacing = 600  # Enter row spacing (mm)
          on start_of_day:
          script: same as in PacSeeds.Planting1.Manager folder.Sow on a fixed date
      fertiliser
      surfaceom surface organic matter
        PoolName = wheat  # Organic Matter pool name
        type = wheat  # Organic Matter type
        mass = 1000.  # Initial surface residue (kg/ha)
        cnr = 80.0  # C:N ration of initial residue
        standing_fraction = 0.0  # Fraction of residue standing
      soil LawesSoil -> /untitled/shared/LawesSoil
      SweetSorghum
      outputfile: filename=Lawes0102 Planting1.out; title=Lawes0102 Planting1
        variables My Variables
          variable:
            dd/mm/yyyy as Date  # Date (dd/mm/yyyy)
            SweetSorghum.zadok_stage  # Zadok's growth developmental stage
            SweetSorghum.lai  # Leaf area index
            SweetSorghum.LeafGreenWt  # Weight of leaf
            SweetSorghum.StemGreenWt  # Weight of stem
            SweetSorghum.HeadTotalWt  # Weight of heads
            SweetSorghum.biomass_wt  # Biomass weight
        events My Variables Events: event=Daily  # End of day
      irrigation: same as PacSeeds.Planting1.Irrigation
    area Planting2
      folder Manager folder
        manager Harvesting rule
          # Harvesting criteria
          crop = SweetSorghum  # Enter name of crop to harvest when ripe
          on end_of_day:
          script: same as in PacSeeds.Planting1.Manager folder.Harvesting rule
        manager Sowing fertiliser: same as PacSeeds.Planting1.Manager folder.Sowing fertiliser
        manager Sow on a fixed date
          # Sowing criteria
          date = 21-dec  # Enter sowing date (dd-mmm)
          # Sowing parameters
          crop = SweetSorghum  # Enter name of crop to sow
          density = 10  # Enter sowing density (plants/m2)
          depth = 50  # Enter sowing depth (mm)
          cultivar = sugargraze  # Enter cultivar
          row_spacing = 600  # Enter row spacing (mm)
          on start_of_day:
          script: same as in PacSeeds.Planting1.Manager folder.Sow on a fixed date
      fertiliser
      surfaceom surface organic matter
        PoolName = wheat  # Organic Matter pool name
        type = wheat  # Organic Matter type
        mass = 1000.  # Initial surface residue (kg/ha)
        cnr = 80.0  # C:N ration of initial residue
        standing_fraction = 0.0  # Fraction of residue standing
      soil LawesSoil -> /untitled/shared/LawesSoil
      SweetSorghum
      outputfile: filename=Lawes0102 Planting2.out; title=Lawes0102 Planting2
        variables My Variables
          variable:
            dd/mm/yyyy as Date  # Date (dd/mm/yyyy)
            SweetSorghum.zadok_stage  # Zadok's growth developmental stage
            SweetSorghum.lai  # Leaf area index
            SweetSorghum.LeafGreenWt  # Weight of leaf
            SweetSorghum.StemGreenWt  # Weight of stem
            SweetSorghum.HeadTotalWt  # Weight of heads
            SweetSorghum.biomass_wt  # Biomass weight
        events My Variables Events: event=Daily  # End of day
      irrigation: same as PacSeeds.Planting1.Irrigation
    area Planting3
      folder Manager folder
        manager Harvesting rule
          # Harvesting criteria
          crop = SweetSorghum  # Enter name of crop to harvest when ripe
          on end_of_day:
          script: same as in PacSeeds.Planting1.Manager folder.Harvesting rule
        manager Sowing fertiliser: same as PacSeeds.Planting1.Manager folder.Sowing fertiliser
        manager Sow on a fixed date
          # Sowing criteria
          date = 22-jan  # Enter sowing date (dd-mmm)
          # Sowing parameters
          crop = SweetSorghum  # Enter name of crop to sow
          density = 10  # Enter sowing density (plants/m2)
          depth = 50  # Enter sowing depth (mm)
          cultivar = sugargraze  # Enter cultivar
          row_spacing = 600  # Enter row spacing (mm)
          on start_of_day:
          script: same as in PacSeeds.Planting1.Manager folder.Sow on a fixed date
      fertiliser
      surfaceom surface organic matter
        PoolName = wheat  # Organic Matter pool name
        type = wheat  # Organic Matter type
        mass = 1000.  # Initial surface residue (kg/ha)
        cnr = 80.0  # C:N ration of initial residue
        standing_fraction = 0.0  # Fraction of residue standing
      soil LawesSoil -> /untitled/shared/LawesSoil
      SweetSorghum
      outputfile: filename=Lawes0102 Planting3.out; title=Lawes0102 Planting3
        variables My Variables
          variable:
            dd/mm/yyyy as Date  # Date (dd/mm/yyyy)
            SweetSorghum.zadok_stage  # Zadok's growth developmental stage
            SweetSorghum.lai  # Leaf area index
            SweetSorghum.LeafGreenWt  # Weight of leaf
            SweetSorghum.StemGreenWt  # Weight of stem
            SweetSorghum.HeadTotalWt  # Weight of heads
            SweetSorghum.biomass_wt  # Biomass weight
        events My Variables Events: event=Daily  # End of day
      irrigation: same as PacSeeds.Planting1.Irrigation
    area Planting4
      folder Manager folder
        manager Harvesting rule
          # Harvesting criteria
          crop = SweetSorghum  # Enter name of crop to harvest when ripe
          on end_of_day:
          script: same as in PacSeeds.Planting1.Manager folder.Harvesting rule
        manager Sowing fertiliser: same as PacSeeds.Planting1.Manager folder.Sowing fertiliser
        manager Sow on a fixed date
          # Sowing criteria
          date = 21-feb  # Enter sowing date (dd-mmm)
          # Sowing parameters
          crop = SweetSorghum  # Enter name of crop to sow
          density = 10  # Enter sowing density (plants/m2)
          depth = 50  # Enter sowing depth (mm)
          cultivar = sugargraze  # Enter cultivar
          row_spacing = 600  # Enter row spacing (mm)
          on start_of_day:
          script: same as in PacSeeds.Planting1.Manager folder.Sow on a fixed date
      fertiliser
      surfaceom surface organic matter
        PoolName = wheat  # Organic Matter pool name
        type = wheat  # Organic Matter type
        mass = 1000.  # Initial surface residue (kg/ha)
        cnr = 80.0  # C:N ration of initial residue
        standing_fraction = 0.0  # Fraction of residue standing
      soil LawesSoil -> /untitled/shared/LawesSoil
      SweetSorghum
      outputfile: filename=Lawes0102 Planting4.out; title=Lawes0102 Planting4
        variables My Variables
          variable:
            dd/mm/yyyy as Date  # Date (dd/mm/yyyy)
            SweetSorghum.zadok_stage  # Zadok's growth developmental stage
            SweetSorghum.lai  # Leaf area index
            SweetSorghum.LeafGreenWt  # Weight of leaf
            SweetSorghum.StemGreenWt  # Weight of stem
            SweetSorghum.HeadTotalWt  # Weight of heads
            SweetSorghum.biomass_wt  # Biomass weight
        events My Variables Events: event=Daily  # End of day
      irrigation: same as PacSeeds.Planting1.Irrigation
