folder simulations: version=32
  simulation Merbein SpurPruned
    metfile met: filename=Mildura.met
    clock
      start_date = 10/5/1994  # Enter the start date of the simulation
      end_date = 10/6/1999  # Enter the end date of the simulation
    summaryfile
    area Paddock
      micromet
        soilalbedo = 0.23
        a_interception = 0
        b_interception = 0
        c_interception = 0
        d_interception = 0
      soil: Region=Mallee; State=Victoria; Longitude=999999
        SoilType = Sandy Loam  # Soil description
        Latitude = 999999  # Latitude (WGS84)
        LocationAccuracy = Regional Soil Type
        DataSource = Based on Soil Characterisation undertaken by Birchip Cropping Group during period 2002-2005
        InitWater Initial water
          PercentMethod: Percent=0.95; Distributed=Evenly distributed
        Water
          Layer:
            Thickness (mm)  BD (g/cc)  AirDry (mm/mm)  LL15 (mm/mm)  DUL (mm/mm)  SAT (mm/mm)
            200             1.48       0.055           0.1           0.26         0.4
            200             1.5        0.104           0.12          0.28         0.4
            200             1.5        0.13            0.14          0.3          0.4
            200             1.55       0.13            0.17          0.31         0.4
            200             1.55       0.13            0.2           0.32         0.4
            200             1.55       0.13            0.23          0.34         0.4
            200             1.4        0.13            0.25          0.37         0.43
            200             1.3        0.13            0.3           0.43         0.47
          SoilCrop wheat
            Layer:
              Thickness (mm)  LL (mm/mm)  KL (/day)  XF (0-1)
              200             0.14        0.06       1
              200             0.14        0.06       1
              200             0.15        0.04       1
              200             0.17        0.04       0.9
              200             0.19        0.04       0.9
              200             0.22        0.04       0.7
              200             0.24        0.02       0.7
              200             0.28        0.02       0.6
          SoilCrop barley: same as Merbein SpurPruned.Paddock.Soil.Water.wheat
          SoilCrop Vine
            Layer:
              Thickness (mm)  LL (mm/mm)  KL (/day)  XF (0-1)
              200             0.1         0.1        1
              200             0.12        0.1        1
              200             0.14        0.06       1
              200             0.17        0.03       1
              200             0.2         0.02       1
              200             0.23        0.01       1
              200             0.25        0.003      1
              200             0.3         0          1
        SoilWat: SummerCona=3.5; SummerU=6; SummerDate=1-Oct; WinterCona=2; WinterU=2; WinterDate=1-apr; DiffusConst=250; DiffusSlope=50; Salb=0.13; CN2Bare=68; CNRed=20; CNCov=0.8
          Layer:
            Thickness (mm)  SWCON (0-1)
            200             0.7
            200             0.7
            200             0.7
            200             0.7
            200             0.7
            200             0.7
            200             0.7
            200             0.7
        SoilOrganicMatter: RootCN=40; RootWT=1000; SoilCN=12; EnrACoeff=7.4; EnrBCoeff=0.2
          Layer:
            Thickness (mm)  OC (Total %)  FBiom (0-1)  FInert (0-1)
            200             1             0.03         0.4
            200             0.5           0.02         0.6
            200             0.5           0.02         0.7
            200             0.5           0.02         0.8
            200             0.5           0.01         0.9
            200             0.5           0.01         0.9
            200             0.5           0.01         1
            200             0.5           0.01         1
        Analysis
          Layer:
            Thickness (mm)  Texture     PH (1:5 water)
            200             Sandy Loam  7
            200             -           7
            200             -           7
            200             -           7
            200             -           7
            200             -           7
            200             -           7
            200             -           7
        Sample Initial nitrogen
          Layer:
            Thickness (mm)  NO3 (ppm)  NH4 (ppm)
            200             0.1        0.1
            200             0.1        0.1
            200             0.1        0.1
            200             0.1        0.1
            200             0.1        0.1
            200             0.1        0.1
            200             0.1        0.1
            200             0.1        0.1
      surfaceom surface organic matter
        PoolName = wheat  # Organic Matter pool name
        type = wheat  # Organic Matter type
        mass = 1000  # Initial surface residue (kg/ha)
        cnr = 80  # C:N ratio of initial residue
        standing_fraction = 0  # Fraction of residue standing
      fertiliser
      irrigation
        automatic_irrigation = off
        asw_depth = 600  # Depth to which ASW is calculated. (mm)
        crit_fr_asw = 0.8  # Fraction of ASW below which irrigation is applied (0-1.0)
        irrigation_efficiency = 1  # Efficiency of the irrigation. (0-1.0)
        irrigation_allocation = off  # Allocation limits
        allocation = 0  # Allocation in ML
        default_no3_conc = 0  # Nitrate concentration (ppm N)
        default_nh4_conc = 0  # Ammonium concentration (ppm N)
        default_cl_conc = 0  # Chloride concentration (ppm Cl)
        default_no3_conc = 0  # Nitrate concentration (ppm N)
        default_nh4_conc = 0  # Ammonium concentration (ppm N)
        default_cl_conc = 0  # Chloride concentration (ppm Cl)
      folder Manager folder
        manager Sow on a fixed date
          # Sowing criteria
          date = 13-may  # Enter sowing date (dd-mmm)
          # Sowing parameters
          crop = vine  # Enter name of crop to sow
          density = 0.1344  # Enter sowing density (plants/m2)
          depth = 50  # Enter sowing depth (mm)
          cultivar = Shiraz  # Enter cultivar
          class = plant  # Enter crop growth class
          row_spacing = 3100  # Enter row spacing (mm)
          maxcover = 0.5  # Maximum Crop Cover
          BudNo = 92  # Bud Number (/plant)
          on start_of_day:
```
        if (today = date('[date]') and [crop].Plant_Status = 'out') then
!        if (today = date('[date]') ) then
              [crop] sow Population =[density], depth = [depth], cultivar = [cultivar], row_spacing = [row_spacing], crop_class = [class], maxcover=[maxcover], budnumber=[BudNo]
         endif
```
        manager Harvesting rule
          # Harvesting criteria
          crop = vine  # Enter name of crop to harvest when ripe
          on end_of_day:
```
         if [crop].plant_status <> 'out' then
           if ([crop].BerryReadyForHarvest = 1) then
              [crop]  harvest
           endif
         endif
```
        manager Prune on a fixed date
          # Sowing criteria
          date = 12-may  # Enter pruning date (dd-mmm)
          # Sowing parameters
          crop = vine  # Enter name of crop to sow
          on start_of_day:
```
        if (today = date('[date]') and [crop].Plant_Status <> 'out') then
              [crop] prune budnumber = 100
         endif
```
      outputfile: filename=Merbein SpurPruned.out; title=Merbein SpurPruned
        variables
          variables: dd/mm/yyyy as Date, PhenologyCurrentPhaseName, LeafLiveWt, StemLiveWt, BerryLiveWt, ReserveLiveWt, RootLiveWt, LeafLAI, LeafLAIdead, esw, LeafAppearedCohortNo, LeafExpandedCohortNo, LeafDeadCohortNo, BerryNumber, BerrySize, StructureTotalStemPopn, LeafDMSupplyPhotosynthesis, radn, Cover_green, AboveGroundWt, TotalWt, LeafPhotosynthesisFtValue, StageCodeValue, BerryLiveFWt, BerryFSize, sw_dep(), sw, LeafFw, LeafWaterDemand, LeafTranspiration, es, eo, BerryReadyForHarvest
        events Reporting Frequency: event=Daily
      vine
      outputfile LeafOutput: filename=Merbein SpurPruned LeafOutput.out; title=Merbein SpurPruned LeafOutput
        variables
          variable:
            dd/mm/yyyy as Date  # Date (dd/mm/yyyy)
            LeafCohortMaxSize
        events Reporting Frequency: event=Harvesting
      operations
        19/07/1994  Irrigation apply amount = 66
        23/08/1994  Irrigation apply amount = 66
        11/09/1994  Irrigation apply amount = 66
        8/10/1994  Irrigation apply amount = 66
        7/11/1994  Irrigation apply amount = 66
        8/11/1994  Irrigation apply amount = 44
        26/11/1994  Irrigation apply amount = 66
        5/12/1994  Irrigation apply amount = 38
        14/12/1994  Irrigation apply amount = 77
        7/01/1995  Irrigation apply amount = 66
        3/02/1995  Irrigation apply amount = 66
        13/02/1995  Irrigation apply amount = 55
        10/03/1995  Irrigation apply amount = 55
        18/03/1995  Irrigation apply amount = 55
        30/03/1995  Irrigation apply amount = 55
        22/04/1995  Irrigation apply amount = 44
        21/09/1995  Irrigation apply amount = 76.2
        10/11/1995  Irrigation apply amount = 63.5
        23/11/1995  Irrigation apply amount = 69.8
        8/12/1995  Irrigation apply amount = 63.5
        21/12/1995  Irrigation apply amount = 76.2
        4/01/1996  Irrigation apply amount = 76.2
        17/01/1996  Irrigation apply amount = 76.2
        31/01/1996  Irrigation apply amount = 76.2
        9/02/1996  Irrigation apply amount = 76.2
        20/02/1996  Irrigation apply amount = 76.2
        1/04/1996  Irrigation apply amount = 76.2
        23/04/1996  Irrigation apply amount = 76.2
        17/05/1996  Irrigation apply amount = 76.2
        24/10/1996  Irrigation apply amount = 65
        14/11/1996  Irrigation apply amount = 65
        28/11/1996  Irrigation apply amount = 69
        12/12/1996  Irrigation apply amount = 32
        18/12/1996  Irrigation apply amount = 61
        6/01/1997  Irrigation apply amount = 63
        9/01/1997  Irrigation apply amount = 44
        21/01/1997  Irrigation apply amount = 71
        4/02/1997  Irrigation apply amount = 65
        20/02/1997  Irrigation apply amount = 63
        13/03/1997  Irrigation apply amount = 67
        3/04/1997  Irrigation apply amount = 70
        27/04/1997  Irrigation apply amount = 48
        25/05/1997  Irrigation apply amount = 44
        28/10/1997  Irrigation apply amount = 52.6
        22/11/1997  Irrigation apply amount = 35.3
        27/11/1997  Irrigation apply amount = 11.6
        4/12/1997  Irrigation apply amount = 58.4
        19/12/1997  Irrigation apply amount = 65.1
        7/01/1998  Irrigation apply amount = 70.4
        24/01/1998  Irrigation apply amount = 52.9
        5/02/1998  Irrigation apply amount = 61.3
        20/02/1998  Irrigation apply amount = 68.6
        6/03/1998  Irrigation apply amount = 65.8
        19/03/1998  Irrigation apply amount = 60.9
        8/04/1998  Irrigation apply amount = 55.1
        25/09/1998  Irrigation apply amount = 49.7
        9/10/1998  Irrigation apply amount = 48.4
        29/10/1998  Irrigation apply amount = 54.3
        12/11/1998  Irrigation apply amount = 61.7
        27/11/1998  Irrigation apply amount = 52.9
        4/12/1998  Irrigation apply amount = 58.5
        18/12/1998  Irrigation apply amount = 62.5
        31/12/1998  Irrigation apply amount = 66.5
        15/01/1999  Irrigation apply amount = 61
        29/01/1999  Irrigation apply amount = 54.4
        10/02/1999  Irrigation apply amount = 61
        27/02/1999  Irrigation apply amount = 60.2
        18/03/1999  Irrigation apply amount = 56.5
        11/04/1999  Irrigation apply amount = 48.1
        23/9/1996  LeafOutput do_output
        27/9/1996  LeafOutput do_output
        2/10/1996  LeafOutput do_output
        18/10/1996  LeafOutput do_output
        25/10/1996  LeafOutput do_output
        1/11/1996  LeafOutput do_output
        8/11/1996  LeafOutput do_output
        22/11/1996  LeafOutput do_output
        20/12/1996  LeafOutput do_output
  simulation Merbein MinimalPruned -> /simulations/Merbein SpurPruned
    area Paddock -> /simulations/Merbein SpurPruned/Paddock
      folder Manager folder -> /simulations/Merbein SpurPruned/Paddock/Manager folder
        manager Sow on a fixed date
          # Sowing criteria
          date = 13-may  # Enter sowing date (dd-mmm)
          # Sowing parameters
          crop = vine  # Enter name of crop to sow
          density = 0.1344  # Enter sowing density (plants/m2)
          depth = 50  # Enter sowing depth (mm)
          cultivar = Shiraz  # Enter cultivar
          class = plant  # Enter crop growth class
          row_spacing = 3100  # Enter row spacing (mm)
          maxcover = 0.5  # Maximum Crop Cover
          BudNo = 530  # Bud Number (/plant)
          on start_of_day:
          script: same as in Merbein SpurPruned.Paddock.Manager folder.Sow on a fixed date
        manager Prune on a fixed date
          # Sowing criteria
          date = 12-may  # Enter pruning date (dd-mmm)
          # Sowing parameters
          crop = vine  # Enter name of crop to sow
          on start_of_day:
```
        if (today = date('[date]') and [crop].Plant_Status <> 'out') then
              [crop] prune budnumber = 900
         endif
```
      outputfile: filename=Merbein MinimalPruned.out; title=Merbein MinimalPruned
        variables -> /simulations/Merbein SpurPruned/Paddock/outputfile/Variables
        events Reporting Frequency -> /simulations/Merbein SpurPruned/Paddock/outputfile/Reporting Frequency
      outputfile LeafOutput: filename=Merbein MinimalPruned LeafOutput.out; title=Merbein MinimalPruned LeafOutput
        variables -> /simulations/Merbein SpurPruned/Paddock/LeafOutput/Variables
        events Reporting Frequency -> /simulations/Merbein SpurPruned/Paddock/LeafOutput/Reporting Frequency
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