folder simulations: version=32
  simulation WF_Millet
    metfile met: filename=%apsim%\Tests\WFMillet\10104.met
    clock
      start_date = 22/09/2004  # Select the start date of the simulation
      end_date = 30/07/2005  # Select the end date of the simulation
    summaryfile
    area paddock
      WF_Millet
      folder Manager folder
        manager Sow on a fixed date
          # Sowing criteria
          date = 23/9/2004  # Enter sowing date (dd-mmm)
          # Sowing parameters
          crop = WF_Millet  # Enter name of crop to sow
          density = 22  # Enter sowing density (plants/m2)
          depth = 20  # Enter sowing depth (mm)
          cultivar = WF_Millet  # Enter cultivar
          class = plant  # Enter crop growth class
          row_spacing = 330  # Enter row spacing (mm)
          on start_of_day:
```
        if (today = date('[date]') then
              [crop] sow population =[density], sowing_depth = [depth], cultivar = [cultivar], row_spacing = [row_spacing], crop_class = [class]
         endif
```
        manager Harvesting rule
          # Harvesting criteria
          crop = WF_Millet  # Enter name of crop to harvest when ripe
          on end_of_day:
```
           if [crop].StageName = 'harvest_ripe' or [crop].plant_status = 'dead' then
              [crop]  harvest
              [crop]  end_crop
           endif
```
        manager Sowing fertiliser
          # When should fertiliser be applied
          modulename = WF_Millet  # On which module should the event come from
          eventname = sowing  # On which event should fertiliser be applied
          # Fertiliser application details
          fertmodule = fertiliser  # Module used to apply the fertiliser
          fert_amount_sow = 0  # Amount of starter fertiliser at sowing (kg/ha)
          fert_type_sow = urea_N  # Sowing fertiliser type
          on [modulename].[eventname]:
```
        [fertmodule] apply amount = [fert_amount_sow] (kg/ha), depth = 50 (mm), type = [fert_type_sow]
```
        manager Reset water, nitrogen and surfaceOM on fixed date
          # When should a reset be done
          reset_date = 23/9/2004  # Enter date of reset (dd-mmm)
          # Reset details
          soilmodule = clearview 10104)  # Name of your soil module
          surfaceommodule = surface organic matter  # Name of your surface organic matter module
          resetWater = yes  # Reset soil water?
          resetNitrogen = yes  # Reset soil nitrogen?
          resetSurfaceOM = no  # Reset surface organic matter?
          on start_of_day:
```
         if (today = date('[reset_date]')) then
            resetWater = '[resetWater]'
            resetNitrogen  = '[resetNitrogen]'
            resetSurfaceOM = '[resetSurfaceOM]'
            if (resetWater = 'yes') then
                '[soilmodule] Water' reset
            endif
            if (resetNitrogen = 'yes') then
                '[soilmodule] Nitrogen' reset
            endif
            if (resetSurfaceOM = 'yes') then
                '[surfaceommodule]' reset
            endif
            act_mods reseting
         endif
```
      fertiliser
      surfaceom surface organic matter
        PoolName = wheat  # Organic Matter pool name
        type = wheat  # Organic Matter type
        mass = 1000  # Initial surface residue (kg/ha)
        cnr = 80  # C:N ratio of initial residue
        standing_fraction = 0  # Fraction of residue standing
      outputfile daily: filename=WF_Millet daily.out; title=WF_Millet daily
        variables
          variable:
            dd/mm/yyyy  # Date (dd/mm/yyyy)
            DaysAfterSowing  # Days after Sowing
            stage  # Plant stage
            green_biomass_wt  # Green Biomass weight
            biomass  # Biomass
            yield  # Yield
            Stage  # Plant stage code
            esw  # Extractable Soil Water (mm)
            dlt_lai_pot  # Potential change in live plant lai
            dlt_lai_carbon
            lai
            leafgreenwt  # Green leaf dry matter
            stemgreenwt  # Green Stem dry matter
            LeafNumber  # Number of leaves per plant
        events Reporting Frequency: event=Daily  # End of day
      outputfile harvest: filename=WF_Millet harvest.out; title=WF_Millet harvest
        variables
          variable:
            dd/mm/yyyy as Date  # Date (dd/mm/yyyy)
            biomass  # Biomass
            yield  # Yield
            esw  # Extractable Soil Water (mm)
        events Reporting Frequency: event=harvesting
      outputfile water: filename=WF_Millet water.out; title=WF_Millet water; events=Reporting Frequency
        variables
          variable:
            dd/mm/yyyy  # Date (dd/mm/yyyy)
            esw  # Extractable Soil Water (mm)
            rain
            drain
            runoff
      soil clearview 10104): Site=North Star No10056; Region=North West Slopes and Plains; State=New South Wales
        Comment = OC from soil (Billa Billa No. 066)  # Comments
        SoilType = Red Chromosol  # Soil description
        NearestTown = North Star
        NaturalVegetation = Brigalow scrub
        DataSource = Undertaken by Jeremy Whish, CSIRO Sustainable Ecosystems, Toowoomba in collaboration with MCA, Goondiwindi as part of GRDC Best Management Practice-Pulses project
        Water
          Layer:
            Thickness (mm)  BD (g/cc)  AirDry (mm/mm)  LL15 (mm/mm)  DUL (mm/mm)  SAT (mm/mm)
            150             1.59       0.125           0.18          0.31         0.36
            150             1.59       0.15            0.18          0.32         0.37
            300             1.56       0.15            0.18          0.33         0.38
            300             1.56       0.15            0.19          0.33         0.38
            300             1.6        0.15            0.2           0.31         0.36
            300             1.64       0.15            0.3           0.3          0.35
            300             1.64       0.15            0.3           0.3          0.35
          SoilCrop wheat
            Layer:
              Thickness (mm)  LL (mm/mm)  KL (/day)  XF (0-1)
              150             0.18        0.06       1
              150             0.18        0.06       1
              300             0.18        0.06       1
              300             0.19        0.04       1
              300             0.2         0.04       1
              300             0.25        0.02       1
              300             0.28        0.01       1
          SoilCrop weed
            Layer:
              Thickness (mm)  LL (mm/mm)  KL (/day)  XF (0-1)
              150             0.18        0.06       1
              150             0.18        0.06       1
              300             0.18        0.06       1
              300             0.19        0.04       1
              300             0.2         0.04       1
              300             0.3         0.02       0
              300             0.3         0.01       0
          SoilCrop WF_MIllet
            Layer:
              Thickness (mm)  LL (mm/mm)  KL (/day)  XF (0-1)
              150             0.18        0.06       1
              150             0.18        0.06       1
              300             0.18        0.06       1
              300             0.19        0.04       1
              300             0.2         0.04       1
              300             0.3         0.02       1
              300             0.3         0.01       1
        SoilWat: SummerCona=4; SummerU=6; SummerDate=1-nov; WinterCona=2.5; WinterU=4; WinterDate=1-apr; DiffusConst=88; DiffusSlope=35; Salb=0.13; CN2Bare=72; CNRed=20; CNCov=0.8
          Layer:
            Thickness (mm)  SWCON (0-1)
            150             0.3
            150             0.3
            300             0.3
            300             0.3
            300             0.3
            300             0.3
            300             0.3
        SoilOrganicMatter: RootCN=40; RootWT=1000; SoilCN=12; EnrACoeff=7.4; EnrBCoeff=0.2
          Layer:
            Thickness (mm)  OC (Total %)  FBiom (0-1)  FInert (0-1)
            150             1.24          0.01         0.8
            150             1.24          0.04         0.4
            300             1.25          0.02         0.5
            300             1.1           0.02         0.5
            300             0.71          0.02         0.6
            300             0.34          0.01         0.6
            300             0.34          0.01         0.7
        Analysis
          Layer:
            Thickness (mm)  EC (1:5 dS/m)  PH (1:5 water)  CL (mg/kg)
            150             0.2            8.5             13.6
            150             0.2            8.7             8.5
            300             0.3            9               9.5
            300             0.5            9.2             14.7
            300             0.7            9.1             16.3
            300             0.8            9               16.7
            300             0.8            8.7             17.6
        Sample Initial nitrogen
          Layer:
            Thickness (mm)  NO3 (ppm)  NH4 (ppm)
            150             14         0.1
            150             15.7       0.1
            300             6.89999    0.1
            300             27.2       0.1
            300             40.7       0.1
            300             23.5       0.1
            300             22         0.1
        Sample Initial water
          Layer:
            Thickness (mm)  SW (mm/mm)
            150             0.272
            150             0.272
            300             0.34
            300             0.278
            300             0.262
            300             0.266
            300             0.3
      manager Logic
        on start_of_day:
```
 if today= date('18/11/2004') then 
WF_Millet  end_crop
endif
```
        on end_of_day:
```
  if today= date('23/9/2004') then 
water do_output
endif 
if today= date('18/11/2004') then 
water do_output
endif 
if today= date('03/12/2004') then 
water do_output
endif 
if today= date('04/01/2005') then 
water do_output
endif 
 if today= date('17/5/2005') then 
water do_output
endif
```
