folder WheatValidation: version=36
  folder Batten_GR
    folder Spring_11oC_8h
      simulation Spring_11oC_8h_0week -> /WheatValidation/Batten_GR/Spring_11oC_8h/Spring_11oC_8h_1week
        manager VernDuration
          # Sowing criteria
          TransDate = 0  # Enter Transition date (dd-mmm)
          crop = SIRIUSWheat  # Select crop type
          cultivar = Batten_Spring  # Select cultivar name
          on init:
```
TransitionDays = '[TransDate]'*7
cultivarname = '[cultivar]'
TreatWeeks = '[TransDate]'
```
        area paddock -> /WheatValidation/Batten_GR/Spring_11oC_8h/Spring_11oC_8h_1week/paddock
          Soil Templeton -> /WheatValidation/Batten_GR/Spring_11oC_8h/Spring_11oC_8h_1week/paddock/Templeton
            SoilTemperature2: MaxTTimeDefault=14; BoundaryLayerConductanceSource=calc; BoundaryLayerConductance=20; BoundaryLayerConductanceIterations=1; NetRadiationSource=calc; DefaultWindSpeed=3; DefaultAltitude=18; DefaultInstrumentHeight=1.2; BareSoilHeight=57
          outputfile Outputs_daily -> /WheatValidation/Batten_GR/Spring_11oC_8h/Spring_11oC_8h_1week/paddock/Outputs_daily: filename=Spring_11oC_8h_0week Outputs_daily.out; title=Spring_11oC_8h_0week Outputs_daily
            events Reporting Frequency -> /WheatValidation/Batten_GR/Spring_11oC_8h/Spring_11oC_8h_1week/paddock/Outputs_daily/Reporting Frequency
            variables -> /WheatValidation/Batten_GR/Spring_11oC_8h/Spring_11oC_8h_1week/paddock/Outputs_daily/Variables
      simulation Spring_11oC_8h_1week
        manager VernDuration
          # Sowing criteria
          TransDate = 1  # Enter Transition date (dd-mmm)
          crop = SIRIUSWheat  # Select crop type
          cultivar = Batten_Spring  # Select cultivar name
          on init:
```
TransitionDays = '[TransDate]'*7
cultivarname = '[cultivar]'
TreatWeeks = '[TransDate]'
```
        manager TreatmentSettings
          # Sowing criteria
          PreTransPP = 8
          PreTransMaxT = 11  # PreTransMinT
          PreTransMinT = 11  # PreTransMaxT
          PreTransRadn = 8.8
          PostTransPP = 16
          PostTransMaxT = 22
          PostTransMinT = 22
          PostTransRadn = 11
          on init:
```
PrePP = '[PreTransPP]'
PreMaxT = '[PreTransMaxT]'
PreMinT = '[PreTransMinT]'
PreRadn = '[PreTransRadn]'
PostPP = '[PostTransPP]'
PostMaxT = '[PostTransMaxT]'
PostMinT = '[PostTransMinT]'
PostRadn = '[PostTransRadn]'

HarvestFlag = 0
Harvest = 0
```
        clock
          start_date = 01/01/2000  # Enter the start date of the simulation
          end_date = 01/12/2000  # Enter the end date of the simulation
        metfile met: filename=%apsim%\Examples\MetFiles\lincoln.met
        summaryfile
        area paddock
          fertiliser
          surfaceom surface organic matter
            PoolName = wheat  # Organic Matter pool name
            type = wheat  # Organic Matter type
            mass = 0  # Initial surface residue (kg/ha)
            cnr = 80  # C:N ratio of initial residue
            standing_fraction = 0  # Fraction of residue standing
          folder Manager folder
            manager Sowing rule
              Cultivar = Batten_Spring
              on start_of_day:
```
Harvest = 0
      if (today = date('2-Jan')) then
          if (paddock_is_fallow() = 1 then
            SIRIUSWheat sow population = 200, depth = 2, cultivar = [cultivar], MaxCover = 1.0, BudNumber = 1, row_spacing = 150, crop_class = plant
          endif 
      endif
  
if (SiriusWheat.StageCodeValue >= 7.0) and (HarvestFlag = 0) then
    HarvestFlag = 1
    Harvest = 1
endif
```
            manager ClimateControl
              on prenewmet:
```
if DaysSinceSowing > TransitionDays then
   maxt = PostMaxT
   mint = PostMinT
   Radn = PostRadn
   PhotoPeriod = PostPP
else
   maxt = PreMaxT
   mint = PreMinT
   Radn = PreRadn
   PhotoPeriod = PrePP
endif
```
              on Init:
```
DaysSinceSowing = 0
```
              on start_of_day:
```
DaysSinceSowing = DaysSinceSowing + 1
```
            manager Fertilise incrop on critical NO3 level- top up
              # When should fertiliser be applied
              modulename = SIRIUSWheat  # In which crop is fertiliser being applied
              fert_criteria = 200  # Maximum Amount of NO3 required in top 3 layers (kg/ha)
              fert_critical = 100  # Critical Amount of NO3 in top 3 layers (kg/ha)
              # Fertiliser application details
              fertmodule = fertiliser  # Module used to apply the fertiliser
              fert_type = NO3_N  # Fertiliser type
              on start_of_day:
```
         if ([modulename].plant_status = 'alive') then
            NO3_available = no3(1) + no3(2) + no3(3)
            if (NO3_available <= [fert_critical]) then
               N_deficit = [fert_criteria] - NO3_available
               '[fertmodule]' apply amount = N_deficit (kg/ha), depth = 50 (mm), type = [fert_type] ()
            endif
         endif
```
            irrigation
              automatic_irrigation = on
              asw_depth = 600  # Depth to which ASW is calculated. (mm)
              crit_fr_asw = 0.5  # Fraction of ASW below which irrigation is applied (0-1.0)
              irrigation_efficiency = 1  # Efficiency of the irrigation. (0-1.0)
              irrigation_allocation = off  # Allocation limits
              allocation = 0  # Allocation in ML
              default_no3_conc = 0  # Nitrate concentration (ppm N)
              default_nh4_conc = 0  # Ammonium concentration (ppm N)
              default_cl_conc = 0  # Chloride concentration (ppm Cl)
              default_no3_conc = 0  # Nitrate concentration (ppm N)
              default_nh4_conc = 0  # Ammonium concentration (ppm N)
              default_cl_conc = 0  # Chloride concentration (ppm Cl)
            micromet
              soilalbedo = 0.23
              a_interception = 0
              b_interception = 0
              c_interception = 0
              d_interception = 0
          Soil Templeton
            InitialWater Initial water: FractionFull=1.00; PercentMethod=EvenlyDistributed
            Water
              Thickness  BD   AirDry  LL15  DUL   SAT
              50         1.3  0.05    0.08  0.31  0.44
              150        1.3  0.05    0.07  0.3   0.44
              200        1.3  0.05    0.07  0.28  0.44
              200        1.3  0.05    0.09  0.31  0.44
              200        1.3  0.05    0.11  0.3   0.44
              100        1.3  0.05    0.16  0.28  0.44
              300        1.3  0.05    0.15  0.3   0.44
              500        1.3  0.05    0.12  0.34  0.44
              SoilCrop SIRIUSWheat
                Thickness  LL    KL    XF
                100        0.08  0.06  1
                200        0.07  0.06  1
                200        0.07  0.06  1
                200        0.09  0.04  1
                200        0.11  0.03  0.6
                100        0.16  0.02  0.4
                300        0.15  0.02  0.4
                200        0.12  0.02  0.4
            SoilWater: SummerCona=4.4; SummerU=9; SummerDate=1-Nov; WinterCona=4.4; WinterU=9; WinterDate=1-Apr; DiffusConst=88; DiffusSlope=35.4; Salb=0.18; CN2Bare=68; CNRed=20; CNCov=0.8; Thickness=[100, 200, 200, 200, 200, 100, 300, 200]; SWCON=[0.7, 0.7, 0.7, 0.7, 0.7, 0.7, 0.7, 0.7]
            SoilOrganicMatter: RootCN=50; RootWt=1500; SoilCN=10; EnrACoeff=7.4; EnrBCoeff=0.2
              Thickness  OC    FBiom  FInert
              100        1.82  0.025  0.45
              200        1.47  0.025  0.6
              200        1.2   0.015  0.75
              200        1.03  0.01   0.9
              200        0.47  0.01   0.96
              100        0.47  0.01   0.96
              300        0.47  0.01   0.96
              200        0.47  0.01   0.96
            Analysis
              Thickness  PH   ParticleSizeClay
              100        6.6  30
              200        6.2  20
              200        5.7  20
              200        5.5  30
              200        5.5  30
              100        5.5  30
              300        5.5  30
              200        5.5  30
            Sample Initial nitrogen
              Thickness  NO3      NH4
              100        30.7692  0.1
              200        11.5385  0.1
              200        7.69231  0.1
              200        3.84615  0.1
              200        0        0.1
              100        0        0.1
              300        0        0.1
              200        0        0.1
            SoilTemperature2: MaxTTimeDefault=14; BoundaryLayerConductanceSource=calc; BoundaryLayerConductance=20; BoundaryLayerConductanceIterations=1; NetRadiationSource=calc; DefaultWindSpeed=3; DefaultAltitude=18; DefaultInstrumentHeight=1.2; BareSoilHeight=57
          SIRIUSWheat
          outputfile Outputs_daily: filename=Spring_11oC_8h_1week Outputs_daily.out; title=Spring_11oC_8h_1week Outputs_daily
            events Reporting Frequency: event=Daily
            variables
              variable:
                dd/mmm/yyyy as Date
                LeafExpandedCohortNo
                StructurePlantMainStemNodeNo
                LeafPlantAppearedGreenLeafNo
                LeafExpandingCohortNo
                LeafAppearedCohortNo
                StructureTotalStemPopn
                LeafDeadCohortNo
                StructureMainStemNodeNo
                LeafSenescingCohortNo
                StructurePrimaryBudMainStemNodeNo
                StructureMainStemPrimordiaNo
                StructureMainStemFinalNodeNo
                LeafExpandedNodeNo as HaunStage
                PhenologyAccumulatedTT
                PhenologyVernalisationSIRIUSAccumulatedVernalisation as VernalisationIndex
                StructureAttainableFinalNodeNumber as AFLN
                StructureMainStemFinalNodeNumberVernalisationFinalNodeNumber as VFNN
                StructureMainStemFinalNodeNumberPhotoperiodFinalNodeNumber as PPFNN
                StructureMainStemFinalNodeNumberCommitHaunStage as CommitHaunStage
                StructureMainStemFinalNodeNumberTerminatedFinalNodeNumber as TFNN
                MaxT
                MinT
                maxt_soil_surface
                mint_soil_surface
                LeafThermalTimeValue
                year
                day_of_year
                month
                day_of_month
                StageCodeValue
                PhenologyCurrentPhaseName
                TransitionDays
                Photoperiod
                StructureMainStemFinalNodeNumberPhotoPeriodValue as PhotoP
                Harvest
                TreatWeeks
      simulation Spring_11oC_8h_2week -> /WheatValidation/Batten_GR/Spring_11oC_8h/Spring_11oC_8h_1week
        manager VernDuration
          # Sowing criteria
          TransDate = 2  # Enter Transition date (dd-mmm)
          crop = SIRIUSWheat  # Select crop type
          cultivar = Batten_Spring  # Select cultivar name
          on init:
```
TransitionDays = '[TransDate]'*7
cultivarname = '[cultivar]'
TreatWeeks = '[TransDate]'
```
        area paddock -> /WheatValidation/Batten_GR/Spring_11oC_8h/Spring_11oC_8h_1week/paddock
          Soil Templeton -> /WheatValidation/Batten_GR/Spring_11oC_8h/Spring_11oC_8h_1week/paddock/Templeton
            SoilTemperature2: MaxTTimeDefault=14; BoundaryLayerConductanceSource=calc; BoundaryLayerConductance=20; BoundaryLayerConductanceIterations=1; NetRadiationSource=calc; DefaultWindSpeed=3; DefaultAltitude=18; DefaultInstrumentHeight=1.2; BareSoilHeight=57
          outputfile Outputs_daily -> /WheatValidation/Batten_GR/Spring_11oC_8h/Spring_11oC_8h_1week/paddock/Outputs_daily: filename=Spring_11oC_8h_2week Outputs_daily.out; title=Spring_11oC_8h_2week Outputs_daily
            events Reporting Frequency -> /WheatValidation/Batten_GR/Spring_11oC_8h/Spring_11oC_8h_1week/paddock/Outputs_daily/Reporting Frequency
            variables -> /WheatValidation/Batten_GR/Spring_11oC_8h/Spring_11oC_8h_1week/paddock/Outputs_daily/Variables
      simulation Spring_11oC_8h_3week -> /WheatValidation/Batten_GR/Spring_11oC_8h/Spring_11oC_8h_1week
        manager VernDuration
          # Sowing criteria
          TransDate = 3  # Enter Transition date (dd-mmm)
          crop = SIRIUSWheat  # Select crop type
          cultivar = Batten_Spring  # Select cultivar name
          on init:
```
TransitionDays = '[TransDate]'*7
cultivarname = '[cultivar]'
TreatWeeks = '[TransDate]'
```
        area paddock -> /WheatValidation/Batten_GR/Spring_11oC_8h/Spring_11oC_8h_1week/paddock
          Soil Templeton -> /WheatValidation/Batten_GR/Spring_11oC_8h/Spring_11oC_8h_1week/paddock/Templeton
            SoilTemperature2: MaxTTimeDefault=14; BoundaryLayerConductanceSource=calc; BoundaryLayerConductance=20; BoundaryLayerConductanceIterations=1; NetRadiationSource=calc; DefaultWindSpeed=3; DefaultAltitude=18; DefaultInstrumentHeight=1.2; BareSoilHeight=57
          outputfile Outputs_daily -> /WheatValidation/Batten_GR/Spring_11oC_8h/Spring_11oC_8h_1week/paddock/Outputs_daily: filename=Spring_11oC_8h_3week Outputs_daily.out; title=Spring_11oC_8h_3week Outputs_daily
            events Reporting Frequency -> /WheatValidation/Batten_GR/Spring_11oC_8h/Spring_11oC_8h_1week/paddock/Outputs_daily/Reporting Frequency
            variables -> /WheatValidation/Batten_GR/Spring_11oC_8h/Spring_11oC_8h_1week/paddock/Outputs_daily/Variables
      simulation Spring_11oC_8h_4week -> /WheatValidation/Batten_GR/Spring_11oC_8h/Spring_11oC_8h_1week
        manager VernDuration
          # Sowing criteria
          TransDate = 4  # Enter Transition date (dd-mmm)
          crop = SIRIUSWheat  # Select crop type
          cultivar = Batten_Spring  # Select cultivar name
          on init:
```
TransitionDays = '[TransDate]'*7
cultivarname = '[cultivar]'
TreatWeeks = '[TransDate]'
```
        area paddock -> /WheatValidation/Batten_GR/Spring_11oC_8h/Spring_11oC_8h_1week/paddock
          Soil Templeton -> /WheatValidation/Batten_GR/Spring_11oC_8h/Spring_11oC_8h_1week/paddock/Templeton
            SoilTemperature2: MaxTTimeDefault=14; BoundaryLayerConductanceSource=calc; BoundaryLayerConductance=20; BoundaryLayerConductanceIterations=1; NetRadiationSource=calc; DefaultWindSpeed=3; DefaultAltitude=18; DefaultInstrumentHeight=1.2; BareSoilHeight=57
          outputfile Outputs_daily -> /WheatValidation/Batten_GR/Spring_11oC_8h/Spring_11oC_8h_1week/paddock/Outputs_daily: filename=Spring_11oC_8h_4week Outputs_daily.out; title=Spring_11oC_8h_4week Outputs_daily
            events Reporting Frequency -> /WheatValidation/Batten_GR/Spring_11oC_8h/Spring_11oC_8h_1week/paddock/Outputs_daily/Reporting Frequency
            variables -> /WheatValidation/Batten_GR/Spring_11oC_8h/Spring_11oC_8h_1week/paddock/Outputs_daily/Variables
      simulation Spring_11oC_8h_5week -> /WheatValidation/Batten_GR/Spring_11oC_8h/Spring_11oC_8h_1week
        manager VernDuration
          # Sowing criteria
          TransDate = 5  # Enter Transition date (dd-mmm)
          crop = SIRIUSWheat  # Select crop type
          cultivar = Batten_Spring  # Select cultivar name
          on init:
```
TransitionDays = '[TransDate]'*7
cultivarname = '[cultivar]'
TreatWeeks = '[TransDate]'
```
        area paddock -> /WheatValidation/Batten_GR/Spring_11oC_8h/Spring_11oC_8h_1week/paddock
          Soil Templeton -> /WheatValidation/Batten_GR/Spring_11oC_8h/Spring_11oC_8h_1week/paddock/Templeton
            SoilTemperature2: MaxTTimeDefault=14; BoundaryLayerConductanceSource=calc; BoundaryLayerConductance=20; BoundaryLayerConductanceIterations=1; NetRadiationSource=calc; DefaultWindSpeed=3; DefaultAltitude=18; DefaultInstrumentHeight=1.2; BareSoilHeight=57
          outputfile Outputs_daily -> /WheatValidation/Batten_GR/Spring_11oC_8h/Spring_11oC_8h_1week/paddock/Outputs_daily: filename=Spring_11oC_8h_5week Outputs_daily.out; title=Spring_11oC_8h_5week Outputs_daily
            events Reporting Frequency -> /WheatValidation/Batten_GR/Spring_11oC_8h/Spring_11oC_8h_1week/paddock/Outputs_daily/Reporting Frequency
            variables -> /WheatValidation/Batten_GR/Spring_11oC_8h/Spring_11oC_8h_1week/paddock/Outputs_daily/Variables
      simulation Spring_11oC_8h_6week -> /WheatValidation/Batten_GR/Spring_11oC_8h/Spring_11oC_8h_1week
        manager VernDuration
          # Sowing criteria
          TransDate = 6  # Enter Transition date (dd-mmm)
          crop = SIRIUSWheat  # Select crop type
          cultivar = Batten_Spring  # Select cultivar name
          on init:
```
TransitionDays = '[TransDate]'*7
cultivarname = '[cultivar]'
TreatWeeks = '[TransDate]'
```
        area paddock -> /WheatValidation/Batten_GR/Spring_11oC_8h/Spring_11oC_8h_1week/paddock
          Soil Templeton -> /WheatValidation/Batten_GR/Spring_11oC_8h/Spring_11oC_8h_1week/paddock/Templeton
            SoilTemperature2: MaxTTimeDefault=14; BoundaryLayerConductanceSource=calc; BoundaryLayerConductance=20; BoundaryLayerConductanceIterations=1; NetRadiationSource=calc; DefaultWindSpeed=3; DefaultAltitude=18; DefaultInstrumentHeight=1.2; BareSoilHeight=57
          outputfile Outputs_daily -> /WheatValidation/Batten_GR/Spring_11oC_8h/Spring_11oC_8h_1week/paddock/Outputs_daily: filename=Spring_11oC_8h_6week Outputs_daily.out; title=Spring_11oC_8h_6week Outputs_daily
            events Reporting Frequency -> /WheatValidation/Batten_GR/Spring_11oC_8h/Spring_11oC_8h_1week/paddock/Outputs_daily/Reporting Frequency
            variables -> /WheatValidation/Batten_GR/Spring_11oC_8h/Spring_11oC_8h_1week/paddock/Outputs_daily/Variables
      simulation Spring_11oC_8h_7week -> /WheatValidation/Batten_GR/Spring_11oC_8h/Spring_11oC_8h_1week
        manager VernDuration
          # Sowing criteria
          TransDate = 7  # Enter Transition date (dd-mmm)
          crop = SIRIUSWheat  # Select crop type
          cultivar = Batten_Spring  # Select cultivar name
          on init:
```
TransitionDays = '[TransDate]'*7
cultivarname = '[cultivar]'
TreatWeeks = '[TransDate]'
```
        area paddock -> /WheatValidation/Batten_GR/Spring_11oC_8h/Spring_11oC_8h_1week/paddock
          Soil Templeton -> /WheatValidation/Batten_GR/Spring_11oC_8h/Spring_11oC_8h_1week/paddock/Templeton
            SoilTemperature2: MaxTTimeDefault=14; BoundaryLayerConductanceSource=calc; BoundaryLayerConductance=20; BoundaryLayerConductanceIterations=1; NetRadiationSource=calc; DefaultWindSpeed=3; DefaultAltitude=18; DefaultInstrumentHeight=1.2; BareSoilHeight=57
          outputfile Outputs_daily -> /WheatValidation/Batten_GR/Spring_11oC_8h/Spring_11oC_8h_1week/paddock/Outputs_daily: filename=Spring_11oC_8h_7week Outputs_daily.out; title=Spring_11oC_8h_7week Outputs_daily
            events Reporting Frequency -> /WheatValidation/Batten_GR/Spring_11oC_8h/Spring_11oC_8h_1week/paddock/Outputs_daily/Reporting Frequency
            variables -> /WheatValidation/Batten_GR/Spring_11oC_8h/Spring_11oC_8h_1week/paddock/Outputs_daily/Variables
      simulation Spring_11oC_8h_8week -> /WheatValidation/Batten_GR/Spring_11oC_8h/Spring_11oC_8h_1week
        manager VernDuration
          # Sowing criteria
          TransDate = 8  # Enter Transition date (dd-mmm)
          crop = SIRIUSWheat  # Select crop type
          cultivar = Batten_Spring  # Select cultivar name
          on init:
```
TransitionDays = '[TransDate]'*7
cultivarname = '[cultivar]'
TreatWeeks = '[TransDate]'
```
        area paddock -> /WheatValidation/Batten_GR/Spring_11oC_8h/Spring_11oC_8h_1week/paddock
          Soil Templeton -> /WheatValidation/Batten_GR/Spring_11oC_8h/Spring_11oC_8h_1week/paddock/Templeton
            SoilTemperature2: MaxTTimeDefault=14; BoundaryLayerConductanceSource=calc; BoundaryLayerConductance=20; BoundaryLayerConductanceIterations=1; NetRadiationSource=calc; DefaultWindSpeed=3; DefaultAltitude=18; DefaultInstrumentHeight=1.2; BareSoilHeight=57
          outputfile Outputs_daily -> /WheatValidation/Batten_GR/Spring_11oC_8h/Spring_11oC_8h_1week/paddock/Outputs_daily: filename=Spring_11oC_8h_8week Outputs_daily.out; title=Spring_11oC_8h_8week Outputs_daily
            events Reporting Frequency -> /WheatValidation/Batten_GR/Spring_11oC_8h/Spring_11oC_8h_1week/paddock/Outputs_daily/Reporting Frequency
            variables -> /WheatValidation/Batten_GR/Spring_11oC_8h/Spring_11oC_8h_1week/paddock/Outputs_daily/Variables
      simulation Spring_11oC_8h_9week -> /WheatValidation/Batten_GR/Spring_11oC_8h/Spring_11oC_8h_1week
        manager VernDuration
          # Sowing criteria
          TransDate = 9  # Enter Transition date (dd-mmm)
          crop = SIRIUSWheat  # Select crop type
          cultivar = Batten_Spring  # Select cultivar name
          on init:
```
TransitionDays = '[TransDate]'*7
cultivarname = '[cultivar]'
TreatWeeks = '[TransDate]'
```
        area paddock -> /WheatValidation/Batten_GR/Spring_11oC_8h/Spring_11oC_8h_1week/paddock
          Soil Templeton -> /WheatValidation/Batten_GR/Spring_11oC_8h/Spring_11oC_8h_1week/paddock/Templeton
            SoilTemperature2: MaxTTimeDefault=14; BoundaryLayerConductanceSource=calc; BoundaryLayerConductance=20; BoundaryLayerConductanceIterations=1; NetRadiationSource=calc; DefaultWindSpeed=3; DefaultAltitude=18; DefaultInstrumentHeight=1.2; BareSoilHeight=57
          outputfile Outputs_daily -> /WheatValidation/Batten_GR/Spring_11oC_8h/Spring_11oC_8h_1week/paddock/Outputs_daily: filename=Spring_11oC_8h_9week Outputs_daily.out; title=Spring_11oC_8h_9week Outputs_daily
            events Reporting Frequency -> /WheatValidation/Batten_GR/Spring_11oC_8h/Spring_11oC_8h_1week/paddock/Outputs_daily/Reporting Frequency
            variables -> /WheatValidation/Batten_GR/Spring_11oC_8h/Spring_11oC_8h_1week/paddock/Outputs_daily/Variables
    folder Winter_11oC_8h -> /WheatValidation/Batten_GR/Spring_11oC_8h
      simulation Winter_11oC_8h_0week -> /WheatValidation/Batten_GR/Spring_11oC_8h/Spring_11oC_8h_0week
        area paddock -> /WheatValidation/Batten_GR/Spring_11oC_8h/Spring_11oC_8h_0week/paddock
          folder Manager folder -> /WheatValidation/Batten_GR/Spring_11oC_8h/Spring_11oC_8h_0week/paddock/Manager folder
            manager Sowing rule
              Cultivar = Batten_Winter
              on start_of_day:
              script: same as in Batten_GR.Spring_11oC_8h.Spring_11oC_8h_1week.paddock.Manager folder.Sowing rule
          Soil Templeton -> /WheatValidation/Batten_GR/Spring_11oC_8h/Spring_11oC_8h_0week/paddock/Templeton
            SoilTemperature2: MaxTTimeDefault=14; BoundaryLayerConductanceSource=calc; BoundaryLayerConductance=20; BoundaryLayerConductanceIterations=1; NetRadiationSource=calc; DefaultWindSpeed=3; DefaultAltitude=18; DefaultInstrumentHeight=1.2; BareSoilHeight=57
          outputfile Outputs_daily -> /WheatValidation/Batten_GR/Spring_11oC_8h/Spring_11oC_8h_0week/paddock/Outputs_daily: filename=Winter_11oC_8h_0week Outputs_daily.out; title=Winter_11oC_8h_0week Outputs_daily
            events Reporting Frequency -> /WheatValidation/Batten_GR/Spring_11oC_8h/Spring_11oC_8h_0week/paddock/Outputs_daily/Reporting Frequency
            variables -> /WheatValidation/Batten_GR/Spring_11oC_8h/Spring_11oC_8h_0week/paddock/Outputs_daily/Variables
      simulation Winter_11oC_8h_1week -> /WheatValidation/Batten_GR/Spring_11oC_8h/Spring_11oC_8h_1week
        area paddock -> /WheatValidation/Batten_GR/Spring_11oC_8h/Spring_11oC_8h_1week/paddock
          folder Manager folder -> /WheatValidation/Batten_GR/Spring_11oC_8h/Spring_11oC_8h_1week/paddock/Manager folder
            manager Sowing rule: same as Batten_GR.Winter_11oC_8h.Winter_11oC_8h_0week.paddock.Manager folder.Sowing rule
          Soil Templeton -> /WheatValidation/Batten_GR/Spring_11oC_8h/Spring_11oC_8h_1week/paddock/Templeton
            SoilTemperature2: MaxTTimeDefault=14; BoundaryLayerConductanceSource=calc; BoundaryLayerConductance=20; BoundaryLayerConductanceIterations=1; NetRadiationSource=calc; DefaultWindSpeed=3; DefaultAltitude=18; DefaultInstrumentHeight=1.2; BareSoilHeight=57
          outputfile Outputs_daily -> /WheatValidation/Batten_GR/Spring_11oC_8h/Spring_11oC_8h_1week/paddock/Outputs_daily: filename=Winter_11oC_8h_1week Outputs_daily.out; title=Winter_11oC_8h_1week Outputs_daily
            events Reporting Frequency -> /WheatValidation/Batten_GR/Spring_11oC_8h/Spring_11oC_8h_1week/paddock/Outputs_daily/Reporting Frequency
            variables -> /WheatValidation/Batten_GR/Spring_11oC_8h/Spring_11oC_8h_1week/paddock/Outputs_daily/Variables
      simulation Winter_11oC_8h_2week -> /WheatValidation/Batten_GR/Spring_11oC_8h/Spring_11oC_8h_2week
        area paddock -> /WheatValidation/Batten_GR/Spring_11oC_8h/Spring_11oC_8h_2week/paddock
          folder Manager folder -> /WheatValidation/Batten_GR/Spring_11oC_8h/Spring_11oC_8h_2week/paddock/Manager folder
            manager Sowing rule: same as Batten_GR.Winter_11oC_8h.Winter_11oC_8h_0week.paddock.Manager folder.Sowing rule
          Soil Templeton -> /WheatValidation/Batten_GR/Spring_11oC_8h/Spring_11oC_8h_2week/paddock/Templeton
            SoilTemperature2: MaxTTimeDefault=14; BoundaryLayerConductanceSource=calc; BoundaryLayerConductance=20; BoundaryLayerConductanceIterations=1; NetRadiationSource=calc; DefaultWindSpeed=3; DefaultAltitude=18; DefaultInstrumentHeight=1.2; BareSoilHeight=57
          outputfile Outputs_daily -> /WheatValidation/Batten_GR/Spring_11oC_8h/Spring_11oC_8h_2week/paddock/Outputs_daily: filename=Winter_11oC_8h_2week Outputs_daily.out; title=Winter_11oC_8h_2week Outputs_daily
            events Reporting Frequency -> /WheatValidation/Batten_GR/Spring_11oC_8h/Spring_11oC_8h_2week/paddock/Outputs_daily/Reporting Frequency
            variables -> /WheatValidation/Batten_GR/Spring_11oC_8h/Spring_11oC_8h_2week/paddock/Outputs_daily/Variables
      simulation Winter_11oC_8h_3week -> /WheatValidation/Batten_GR/Spring_11oC_8h/Spring_11oC_8h_3week
        area paddock -> /WheatValidation/Batten_GR/Spring_11oC_8h/Spring_11oC_8h_3week/paddock
          folder Manager folder -> /WheatValidation/Batten_GR/Spring_11oC_8h/Spring_11oC_8h_3week/paddock/Manager folder
            manager Sowing rule: same as Batten_GR.Winter_11oC_8h.Winter_11oC_8h_0week.paddock.Manager folder.Sowing rule
          Soil Templeton -> /WheatValidation/Batten_GR/Spring_11oC_8h/Spring_11oC_8h_3week/paddock/Templeton
            SoilTemperature2: MaxTTimeDefault=14; BoundaryLayerConductanceSource=calc; BoundaryLayerConductance=20; BoundaryLayerConductanceIterations=1; NetRadiationSource=calc; DefaultWindSpeed=3; DefaultAltitude=18; DefaultInstrumentHeight=1.2; BareSoilHeight=57
          outputfile Outputs_daily -> /WheatValidation/Batten_GR/Spring_11oC_8h/Spring_11oC_8h_3week/paddock/Outputs_daily: filename=Winter_11oC_8h_3week Outputs_daily.out; title=Winter_11oC_8h_3week Outputs_daily
            events Reporting Frequency -> /WheatValidation/Batten_GR/Spring_11oC_8h/Spring_11oC_8h_3week/paddock/Outputs_daily/Reporting Frequency
            variables -> /WheatValidation/Batten_GR/Spring_11oC_8h/Spring_11oC_8h_3week/paddock/Outputs_daily/Variables
      simulation Winter_11oC_8h_4week -> /WheatValidation/Batten_GR/Spring_11oC_8h/Spring_11oC_8h_4week
        area paddock -> /WheatValidation/Batten_GR/Spring_11oC_8h/Spring_11oC_8h_4week/paddock
          folder Manager folder -> /WheatValidation/Batten_GR/Spring_11oC_8h/Spring_11oC_8h_4week/paddock/Manager folder
            manager Sowing rule: same as Batten_GR.Winter_11oC_8h.Winter_11oC_8h_0week.paddock.Manager folder.Sowing rule
          Soil Templeton -> /WheatValidation/Batten_GR/Spring_11oC_8h/Spring_11oC_8h_4week/paddock/Templeton
            SoilTemperature2: MaxTTimeDefault=14; BoundaryLayerConductanceSource=calc; BoundaryLayerConductance=20; BoundaryLayerConductanceIterations=1; NetRadiationSource=calc; DefaultWindSpeed=3; DefaultAltitude=18; DefaultInstrumentHeight=1.2; BareSoilHeight=57
          outputfile Outputs_daily -> /WheatValidation/Batten_GR/Spring_11oC_8h/Spring_11oC_8h_4week/paddock/Outputs_daily: filename=Winter_11oC_8h_4week Outputs_daily.out; title=Winter_11oC_8h_4week Outputs_daily
            events Reporting Frequency -> /WheatValidation/Batten_GR/Spring_11oC_8h/Spring_11oC_8h_4week/paddock/Outputs_daily/Reporting Frequency
            variables -> /WheatValidation/Batten_GR/Spring_11oC_8h/Spring_11oC_8h_4week/paddock/Outputs_daily/Variables
      simulation Winter_11oC_8h_5week -> /WheatValidation/Batten_GR/Spring_11oC_8h/Spring_11oC_8h_5week
        area paddock -> /WheatValidation/Batten_GR/Spring_11oC_8h/Spring_11oC_8h_5week/paddock
          folder Manager folder -> /WheatValidation/Batten_GR/Spring_11oC_8h/Spring_11oC_8h_5week/paddock/Manager folder
            manager Sowing rule: same as Batten_GR.Winter_11oC_8h.Winter_11oC_8h_0week.paddock.Manager folder.Sowing rule
          Soil Templeton -> /WheatValidation/Batten_GR/Spring_11oC_8h/Spring_11oC_8h_5week/paddock/Templeton
            SoilTemperature2: MaxTTimeDefault=14; BoundaryLayerConductanceSource=calc; BoundaryLayerConductance=20; BoundaryLayerConductanceIterations=1; NetRadiationSource=calc; DefaultWindSpeed=3; DefaultAltitude=18; DefaultInstrumentHeight=1.2; BareSoilHeight=57
          outputfile Outputs_daily -> /WheatValidation/Batten_GR/Spring_11oC_8h/Spring_11oC_8h_5week/paddock/Outputs_daily: filename=Winter_11oC_8h_5week Outputs_daily.out; title=Winter_11oC_8h_5week Outputs_daily
            events Reporting Frequency -> /WheatValidation/Batten_GR/Spring_11oC_8h/Spring_11oC_8h_5week/paddock/Outputs_daily/Reporting Frequency
            variables -> /WheatValidation/Batten_GR/Spring_11oC_8h/Spring_11oC_8h_5week/paddock/Outputs_daily/Variables
      simulation Winter_11oC_8h_6week -> /WheatValidation/Batten_GR/Spring_11oC_8h/Spring_11oC_8h_6week
        area paddock -> /WheatValidation/Batten_GR/Spring_11oC_8h/Spring_11oC_8h_6week/paddock
          folder Manager folder -> /WheatValidation/Batten_GR/Spring_11oC_8h/Spring_11oC_8h_6week/paddock/Manager folder
            manager Sowing rule: same as Batten_GR.Winter_11oC_8h.Winter_11oC_8h_0week.paddock.Manager folder.Sowing rule
          Soil Templeton -> /WheatValidation/Batten_GR/Spring_11oC_8h/Spring_11oC_8h_6week/paddock/Templeton
            SoilTemperature2: MaxTTimeDefault=14; BoundaryLayerConductanceSource=calc; BoundaryLayerConductance=20; BoundaryLayerConductanceIterations=1; NetRadiationSource=calc; DefaultWindSpeed=3; DefaultAltitude=18; DefaultInstrumentHeight=1.2; BareSoilHeight=57
          outputfile Outputs_daily -> /WheatValidation/Batten_GR/Spring_11oC_8h/Spring_11oC_8h_6week/paddock/Outputs_daily: filename=Winter_11oC_8h_6week Outputs_daily.out; title=Winter_11oC_8h_6week Outputs_daily
            events Reporting Frequency -> /WheatValidation/Batten_GR/Spring_11oC_8h/Spring_11oC_8h_6week/paddock/Outputs_daily/Reporting Frequency
            variables -> /WheatValidation/Batten_GR/Spring_11oC_8h/Spring_11oC_8h_6week/paddock/Outputs_daily/Variables
      simulation Winter_11oC_8h_7week -> /WheatValidation/Batten_GR/Spring_11oC_8h/Spring_11oC_8h_7week
        area paddock -> /WheatValidation/Batten_GR/Spring_11oC_8h/Spring_11oC_8h_7week/paddock
          folder Manager folder -> /WheatValidation/Batten_GR/Spring_11oC_8h/Spring_11oC_8h_7week/paddock/Manager folder
            manager Sowing rule: same as Batten_GR.Winter_11oC_8h.Winter_11oC_8h_0week.paddock.Manager folder.Sowing rule
          Soil Templeton -> /WheatValidation/Batten_GR/Spring_11oC_8h/Spring_11oC_8h_7week/paddock/Templeton
            SoilTemperature2: MaxTTimeDefault=14; BoundaryLayerConductanceSource=calc; BoundaryLayerConductance=20; BoundaryLayerConductanceIterations=1; NetRadiationSource=calc; DefaultWindSpeed=3; DefaultAltitude=18; DefaultInstrumentHeight=1.2; BareSoilHeight=57
          outputfile Outputs_daily -> /WheatValidation/Batten_GR/Spring_11oC_8h/Spring_11oC_8h_7week/paddock/Outputs_daily: filename=Winter_11oC_8h_7week Outputs_daily.out; title=Winter_11oC_8h_7week Outputs_daily
            events Reporting Frequency -> /WheatValidation/Batten_GR/Spring_11oC_8h/Spring_11oC_8h_7week/paddock/Outputs_daily/Reporting Frequency
            variables -> /WheatValidation/Batten_GR/Spring_11oC_8h/Spring_11oC_8h_7week/paddock/Outputs_daily/Variables
      simulation Winter_11oC_8h_8week -> /WheatValidation/Batten_GR/Spring_11oC_8h/Spring_11oC_8h_8week
        area paddock -> /WheatValidation/Batten_GR/Spring_11oC_8h/Spring_11oC_8h_8week/paddock
          folder Manager folder -> /WheatValidation/Batten_GR/Spring_11oC_8h/Spring_11oC_8h_8week/paddock/Manager folder
            manager Sowing rule: same as Batten_GR.Winter_11oC_8h.Winter_11oC_8h_0week.paddock.Manager folder.Sowing rule
          Soil Templeton -> /WheatValidation/Batten_GR/Spring_11oC_8h/Spring_11oC_8h_8week/paddock/Templeton
            SoilTemperature2: MaxTTimeDefault=14; BoundaryLayerConductanceSource=calc; BoundaryLayerConductance=20; BoundaryLayerConductanceIterations=1; NetRadiationSource=calc; DefaultWindSpeed=3; DefaultAltitude=18; DefaultInstrumentHeight=1.2; BareSoilHeight=57
          outputfile Outputs_daily -> /WheatValidation/Batten_GR/Spring_11oC_8h/Spring_11oC_8h_8week/paddock/Outputs_daily: filename=Winter_11oC_8h_8week Outputs_daily.out; title=Winter_11oC_8h_8week Outputs_daily
            events Reporting Frequency -> /WheatValidation/Batten_GR/Spring_11oC_8h/Spring_11oC_8h_8week/paddock/Outputs_daily/Reporting Frequency
            variables -> /WheatValidation/Batten_GR/Spring_11oC_8h/Spring_11oC_8h_8week/paddock/Outputs_daily/Variables
      simulation Winter_11oC_8h_9week -> /WheatValidation/Batten_GR/Spring_11oC_8h/Spring_11oC_8h_9week
        area paddock -> /WheatValidation/Batten_GR/Spring_11oC_8h/Spring_11oC_8h_9week/paddock
          folder Manager folder -> /WheatValidation/Batten_GR/Spring_11oC_8h/Spring_11oC_8h_9week/paddock/Manager folder
            manager Sowing rule: same as Batten_GR.Winter_11oC_8h.Winter_11oC_8h_0week.paddock.Manager folder.Sowing rule
          Soil Templeton -> /WheatValidation/Batten_GR/Spring_11oC_8h/Spring_11oC_8h_9week/paddock/Templeton
            SoilTemperature2: MaxTTimeDefault=14; BoundaryLayerConductanceSource=calc; BoundaryLayerConductance=20; BoundaryLayerConductanceIterations=1; NetRadiationSource=calc; DefaultWindSpeed=3; DefaultAltitude=18; DefaultInstrumentHeight=1.2; BareSoilHeight=57
          outputfile Outputs_daily -> /WheatValidation/Batten_GR/Spring_11oC_8h/Spring_11oC_8h_9week/paddock/Outputs_daily: filename=Winter_11oC_8h_9week Outputs_daily.out; title=Winter_11oC_8h_9week Outputs_daily
            events Reporting Frequency -> /WheatValidation/Batten_GR/Spring_11oC_8h/Spring_11oC_8h_9week/paddock/Outputs_daily/Reporting Frequency
            variables -> /WheatValidation/Batten_GR/Spring_11oC_8h/Spring_11oC_8h_9week/paddock/Outputs_daily/Variables
    folder Spring_11oC_16h -> /WheatValidation/Batten_GR/Spring_11oC_8h
      simulation Spring_11oC_16h_0week -> /WheatValidation/Batten_GR/Spring_11oC_8h/Spring_11oC_8h_0week
        manager TreatmentSettings
          # Sowing criteria
          PreTransPP = 16
          PreTransMaxT = 11  # PreTransMinT
          PreTransMinT = 11  # PreTransMaxT
          PreTransRadn = 11
          PostTransPP = 16
          PostTransMaxT = 22
          PostTransMinT = 22
          PostTransRadn = 11
          on init:
          script: same as in Batten_GR.Spring_11oC_8h.Spring_11oC_8h_1week.TreatmentSettings
        area paddock -> /WheatValidation/Batten_GR/Spring_11oC_8h/Spring_11oC_8h_0week/paddock
          Soil Templeton -> /WheatValidation/Batten_GR/Spring_11oC_8h/Spring_11oC_8h_0week/paddock/Templeton
            SoilTemperature2: MaxTTimeDefault=14; BoundaryLayerConductanceSource=calc; BoundaryLayerConductance=20; BoundaryLayerConductanceIterations=1; NetRadiationSource=calc; DefaultWindSpeed=3; DefaultAltitude=18; DefaultInstrumentHeight=1.2; BareSoilHeight=57
          outputfile Outputs_daily -> /WheatValidation/Batten_GR/Spring_11oC_8h/Spring_11oC_8h_0week/paddock/Outputs_daily: filename=Spring_11oC_16h_0week Outputs_daily.out; title=Spring_11oC_16h_0week Outputs_daily
            events Reporting Frequency -> /WheatValidation/Batten_GR/Spring_11oC_8h/Spring_11oC_8h_0week/paddock/Outputs_daily/Reporting Frequency
            variables -> /WheatValidation/Batten_GR/Spring_11oC_8h/Spring_11oC_8h_0week/paddock/Outputs_daily/Variables
      simulation Spring_11oC_16h_1week -> /WheatValidation/Batten_GR/Spring_11oC_8h/Spring_11oC_8h_1week
        area paddock -> /WheatValidation/Batten_GR/Spring_11oC_8h/Spring_11oC_8h_1week/paddock
          Soil Templeton -> /WheatValidation/Batten_GR/Spring_11oC_8h/Spring_11oC_8h_1week/paddock/Templeton
            SoilTemperature2: MaxTTimeDefault=14; BoundaryLayerConductanceSource=calc; BoundaryLayerConductance=20; BoundaryLayerConductanceIterations=1; NetRadiationSource=calc; DefaultWindSpeed=3; DefaultAltitude=18; DefaultInstrumentHeight=1.2; BareSoilHeight=57
          outputfile Outputs_daily -> /WheatValidation/Batten_GR/Spring_11oC_8h/Spring_11oC_8h_1week/paddock/Outputs_daily: filename=Spring_11oC_16h_1week Outputs_daily.out; title=Spring_11oC_16h_1week Outputs_daily
            events Reporting Frequency -> /WheatValidation/Batten_GR/Spring_11oC_8h/Spring_11oC_8h_1week/paddock/Outputs_daily/Reporting Frequency
            variables -> /WheatValidation/Batten_GR/Spring_11oC_8h/Spring_11oC_8h_1week/paddock/Outputs_daily/Variables
      simulation Spring_11oC_16h_2week -> /WheatValidation/Batten_GR/Spring_11oC_8h/Spring_11oC_8h_2week
        area paddock -> /WheatValidation/Batten_GR/Spring_11oC_8h/Spring_11oC_8h_2week/paddock
          Soil Templeton -> /WheatValidation/Batten_GR/Spring_11oC_8h/Spring_11oC_8h_2week/paddock/Templeton
            SoilTemperature2: MaxTTimeDefault=14; BoundaryLayerConductanceSource=calc; BoundaryLayerConductance=20; BoundaryLayerConductanceIterations=1; NetRadiationSource=calc; DefaultWindSpeed=3; DefaultAltitude=18; DefaultInstrumentHeight=1.2; BareSoilHeight=57
          outputfile Outputs_daily -> /WheatValidation/Batten_GR/Spring_11oC_8h/Spring_11oC_8h_2week/paddock/Outputs_daily: filename=Spring_11oC_16h_2week Outputs_daily.out; title=Spring_11oC_16h_2week Outputs_daily
            events Reporting Frequency -> /WheatValidation/Batten_GR/Spring_11oC_8h/Spring_11oC_8h_2week/paddock/Outputs_daily/Reporting Frequency
            variables -> /WheatValidation/Batten_GR/Spring_11oC_8h/Spring_11oC_8h_2week/paddock/Outputs_daily/Variables
      simulation Spring_11oC_16h_3week -> /WheatValidation/Batten_GR/Spring_11oC_8h/Spring_11oC_8h_3week
        area paddock -> /WheatValidation/Batten_GR/Spring_11oC_8h/Spring_11oC_8h_3week/paddock
          Soil Templeton -> /WheatValidation/Batten_GR/Spring_11oC_8h/Spring_11oC_8h_3week/paddock/Templeton
            SoilTemperature2: MaxTTimeDefault=14; BoundaryLayerConductanceSource=calc; BoundaryLayerConductance=20; BoundaryLayerConductanceIterations=1; NetRadiationSource=calc; DefaultWindSpeed=3; DefaultAltitude=18; DefaultInstrumentHeight=1.2; BareSoilHeight=57
          outputfile Outputs_daily -> /WheatValidation/Batten_GR/Spring_11oC_8h/Spring_11oC_8h_3week/paddock/Outputs_daily: filename=Spring_11oC_16h_3week Outputs_daily.out; title=Spring_11oC_16h_3week Outputs_daily
            events Reporting Frequency -> /WheatValidation/Batten_GR/Spring_11oC_8h/Spring_11oC_8h_3week/paddock/Outputs_daily/Reporting Frequency
            variables -> /WheatValidation/Batten_GR/Spring_11oC_8h/Spring_11oC_8h_3week/paddock/Outputs_daily/Variables
      simulation Spring_11oC_16h_4week -> /WheatValidation/Batten_GR/Spring_11oC_8h/Spring_11oC_8h_4week
        area paddock -> /WheatValidation/Batten_GR/Spring_11oC_8h/Spring_11oC_8h_4week/paddock
          Soil Templeton -> /WheatValidation/Batten_GR/Spring_11oC_8h/Spring_11oC_8h_4week/paddock/Templeton
            SoilTemperature2: MaxTTimeDefault=14; BoundaryLayerConductanceSource=calc; BoundaryLayerConductance=20; BoundaryLayerConductanceIterations=1; NetRadiationSource=calc; DefaultWindSpeed=3; DefaultAltitude=18; DefaultInstrumentHeight=1.2; BareSoilHeight=57
          outputfile Outputs_daily -> /WheatValidation/Batten_GR/Spring_11oC_8h/Spring_11oC_8h_4week/paddock/Outputs_daily: filename=Spring_11oC_16h_4week Outputs_daily.out; title=Spring_11oC_16h_4week Outputs_daily
            events Reporting Frequency -> /WheatValidation/Batten_GR/Spring_11oC_8h/Spring_11oC_8h_4week/paddock/Outputs_daily/Reporting Frequency
            variables -> /WheatValidation/Batten_GR/Spring_11oC_8h/Spring_11oC_8h_4week/paddock/Outputs_daily/Variables
      simulation Spring_11oC_16h_5week -> /WheatValidation/Batten_GR/Spring_11oC_8h/Spring_11oC_8h_5week
        area paddock -> /WheatValidation/Batten_GR/Spring_11oC_8h/Spring_11oC_8h_5week/paddock
          Soil Templeton -> /WheatValidation/Batten_GR/Spring_11oC_8h/Spring_11oC_8h_5week/paddock/Templeton
            SoilTemperature2: MaxTTimeDefault=14; BoundaryLayerConductanceSource=calc; BoundaryLayerConductance=20; BoundaryLayerConductanceIterations=1; NetRadiationSource=calc; DefaultWindSpeed=3; DefaultAltitude=18; DefaultInstrumentHeight=1.2; BareSoilHeight=57
          outputfile Outputs_daily -> /WheatValidation/Batten_GR/Spring_11oC_8h/Spring_11oC_8h_5week/paddock/Outputs_daily: filename=Spring_11oC_16h_5week Outputs_daily.out; title=Spring_11oC_16h_5week Outputs_daily
            events Reporting Frequency -> /WheatValidation/Batten_GR/Spring_11oC_8h/Spring_11oC_8h_5week/paddock/Outputs_daily/Reporting Frequency
            variables -> /WheatValidation/Batten_GR/Spring_11oC_8h/Spring_11oC_8h_5week/paddock/Outputs_daily/Variables
      simulation Spring_11oC_16h_6week -> /WheatValidation/Batten_GR/Spring_11oC_8h/Spring_11oC_8h_6week
        area paddock -> /WheatValidation/Batten_GR/Spring_11oC_8h/Spring_11oC_8h_6week/paddock
          Soil Templeton -> /WheatValidation/Batten_GR/Spring_11oC_8h/Spring_11oC_8h_6week/paddock/Templeton
            SoilTemperature2: MaxTTimeDefault=14; BoundaryLayerConductanceSource=calc; BoundaryLayerConductance=20; BoundaryLayerConductanceIterations=1; NetRadiationSource=calc; DefaultWindSpeed=3; DefaultAltitude=18; DefaultInstrumentHeight=1.2; BareSoilHeight=57
          outputfile Outputs_daily -> /WheatValidation/Batten_GR/Spring_11oC_8h/Spring_11oC_8h_6week/paddock/Outputs_daily: filename=Spring_11oC_16h_6week Outputs_daily.out; title=Spring_11oC_16h_6week Outputs_daily
            events Reporting Frequency -> /WheatValidation/Batten_GR/Spring_11oC_8h/Spring_11oC_8h_6week/paddock/Outputs_daily/Reporting Frequency
            variables -> /WheatValidation/Batten_GR/Spring_11oC_8h/Spring_11oC_8h_6week/paddock/Outputs_daily/Variables
      simulation Spring_11oC_16h_7week -> /WheatValidation/Batten_GR/Spring_11oC_8h/Spring_11oC_8h_7week
        area paddock -> /WheatValidation/Batten_GR/Spring_11oC_8h/Spring_11oC_8h_7week/paddock
          Soil Templeton -> /WheatValidation/Batten_GR/Spring_11oC_8h/Spring_11oC_8h_7week/paddock/Templeton
            SoilTemperature2: MaxTTimeDefault=14; BoundaryLayerConductanceSource=calc; BoundaryLayerConductance=20; BoundaryLayerConductanceIterations=1; NetRadiationSource=calc; DefaultWindSpeed=3; DefaultAltitude=18; DefaultInstrumentHeight=1.2; BareSoilHeight=57
          outputfile Outputs_daily -> /WheatValidation/Batten_GR/Spring_11oC_8h/Spring_11oC_8h_7week/paddock/Outputs_daily: filename=Spring_11oC_16h_7week Outputs_daily.out; title=Spring_11oC_16h_7week Outputs_daily
            events Reporting Frequency -> /WheatValidation/Batten_GR/Spring_11oC_8h/Spring_11oC_8h_7week/paddock/Outputs_daily/Reporting Frequency
            variables -> /WheatValidation/Batten_GR/Spring_11oC_8h/Spring_11oC_8h_7week/paddock/Outputs_daily/Variables
      simulation Spring_11oC_16h_8week -> /WheatValidation/Batten_GR/Spring_11oC_8h/Spring_11oC_8h_8week
        area paddock -> /WheatValidation/Batten_GR/Spring_11oC_8h/Spring_11oC_8h_8week/paddock
          Soil Templeton -> /WheatValidation/Batten_GR/Spring_11oC_8h/Spring_11oC_8h_8week/paddock/Templeton
            SoilTemperature2: MaxTTimeDefault=14; BoundaryLayerConductanceSource=calc; BoundaryLayerConductance=20; BoundaryLayerConductanceIterations=1; NetRadiationSource=calc; DefaultWindSpeed=3; DefaultAltitude=18; DefaultInstrumentHeight=1.2; BareSoilHeight=57
          outputfile Outputs_daily -> /WheatValidation/Batten_GR/Spring_11oC_8h/Spring_11oC_8h_8week/paddock/Outputs_daily: filename=Spring_11oC_16h_8week Outputs_daily.out; title=Spring_11oC_16h_8week Outputs_daily
            events Reporting Frequency -> /WheatValidation/Batten_GR/Spring_11oC_8h/Spring_11oC_8h_8week/paddock/Outputs_daily/Reporting Frequency
            variables -> /WheatValidation/Batten_GR/Spring_11oC_8h/Spring_11oC_8h_8week/paddock/Outputs_daily/Variables
      simulation Spring_11oC_16h_9week -> /WheatValidation/Batten_GR/Spring_11oC_8h/Spring_11oC_8h_9week
        area paddock -> /WheatValidation/Batten_GR/Spring_11oC_8h/Spring_11oC_8h_9week/paddock
          Soil Templeton -> /WheatValidation/Batten_GR/Spring_11oC_8h/Spring_11oC_8h_9week/paddock/Templeton
            SoilTemperature2: MaxTTimeDefault=14; BoundaryLayerConductanceSource=calc; BoundaryLayerConductance=20; BoundaryLayerConductanceIterations=1; NetRadiationSource=calc; DefaultWindSpeed=3; DefaultAltitude=18; DefaultInstrumentHeight=1.2; BareSoilHeight=57
          outputfile Outputs_daily -> /WheatValidation/Batten_GR/Spring_11oC_8h/Spring_11oC_8h_9week/paddock/Outputs_daily: filename=Spring_11oC_16h_9week Outputs_daily.out; title=Spring_11oC_16h_9week Outputs_daily
            events Reporting Frequency -> /WheatValidation/Batten_GR/Spring_11oC_8h/Spring_11oC_8h_9week/paddock/Outputs_daily/Reporting Frequency
            variables -> /WheatValidation/Batten_GR/Spring_11oC_8h/Spring_11oC_8h_9week/paddock/Outputs_daily/Variables
    folder Winter_11oC_16h -> /WheatValidation/Batten_GR/Winter_11oC_8h
      simulation Winter_11oC_16h_0week -> /WheatValidation/Batten_GR/Winter_11oC_8h/Winter_11oC_8h_0week
        manager TreatmentSettings
          # Sowing criteria
          PreTransPP = 16
          PreTransMaxT = 11  # PreTransMinT
          PreTransMinT = 11  # PreTransMaxT
          PreTransRadn = 8.8
          PostTransPP = 16
          PostTransMaxT = 22
          PostTransMinT = 22
          PostTransRadn = 11
          on init:
          script: same as in Batten_GR.Spring_11oC_8h.Spring_11oC_8h_1week.TreatmentSettings
        area paddock -> /WheatValidation/Batten_GR/Winter_11oC_8h/Winter_11oC_8h_0week/paddock
          Soil Templeton -> /WheatValidation/Batten_GR/Winter_11oC_8h/Winter_11oC_8h_0week/paddock/Templeton
            SoilTemperature2: MaxTTimeDefault=14; BoundaryLayerConductanceSource=calc; BoundaryLayerConductance=20; BoundaryLayerConductanceIterations=1; NetRadiationSource=calc; DefaultWindSpeed=3; DefaultAltitude=18; DefaultInstrumentHeight=1.2; BareSoilHeight=57
          outputfile Outputs_daily -> /WheatValidation/Batten_GR/Winter_11oC_8h/Winter_11oC_8h_0week/paddock/Outputs_daily: filename=Winter_11oC_16h_0week Outputs_daily.out; title=Winter_11oC_16h_0week Outputs_daily
            events Reporting Frequency -> /WheatValidation/Batten_GR/Winter_11oC_8h/Winter_11oC_8h_0week/paddock/Outputs_daily/Reporting Frequency
            variables -> /WheatValidation/Batten_GR/Winter_11oC_8h/Winter_11oC_8h_0week/paddock/Outputs_daily/Variables
      simulation Winter_11oC_16h_1week -> /WheatValidation/Batten_GR/Winter_11oC_8h/Winter_11oC_8h_1week
        area paddock -> /WheatValidation/Batten_GR/Winter_11oC_8h/Winter_11oC_8h_1week/paddock
          Soil Templeton -> /WheatValidation/Batten_GR/Winter_11oC_8h/Winter_11oC_8h_1week/paddock/Templeton
            SoilTemperature2: MaxTTimeDefault=14; BoundaryLayerConductanceSource=calc; BoundaryLayerConductance=20; BoundaryLayerConductanceIterations=1; NetRadiationSource=calc; DefaultWindSpeed=3; DefaultAltitude=18; DefaultInstrumentHeight=1.2; BareSoilHeight=57
          outputfile Outputs_daily -> /WheatValidation/Batten_GR/Winter_11oC_8h/Winter_11oC_8h_1week/paddock/Outputs_daily: filename=Winter_11oC_16h_1week Outputs_daily.out; title=Winter_11oC_16h_1week Outputs_daily
            events Reporting Frequency -> /WheatValidation/Batten_GR/Winter_11oC_8h/Winter_11oC_8h_1week/paddock/Outputs_daily/Reporting Frequency
            variables -> /WheatValidation/Batten_GR/Winter_11oC_8h/Winter_11oC_8h_1week/paddock/Outputs_daily/Variables
      simulation Winter_11oC_16h_2week -> /WheatValidation/Batten_GR/Winter_11oC_8h/Winter_11oC_8h_2week
        area paddock -> /WheatValidation/Batten_GR/Winter_11oC_8h/Winter_11oC_8h_2week/paddock
          Soil Templeton -> /WheatValidation/Batten_GR/Winter_11oC_8h/Winter_11oC_8h_2week/paddock/Templeton
            SoilTemperature2: MaxTTimeDefault=14; BoundaryLayerConductanceSource=calc; BoundaryLayerConductance=20; BoundaryLayerConductanceIterations=1; NetRadiationSource=calc; DefaultWindSpeed=3; DefaultAltitude=18; DefaultInstrumentHeight=1.2; BareSoilHeight=57
          outputfile Outputs_daily -> /WheatValidation/Batten_GR/Winter_11oC_8h/Winter_11oC_8h_2week/paddock/Outputs_daily: filename=Winter_11oC_16h_2week Outputs_daily.out; title=Winter_11oC_16h_2week Outputs_daily
            events Reporting Frequency -> /WheatValidation/Batten_GR/Winter_11oC_8h/Winter_11oC_8h_2week/paddock/Outputs_daily/Reporting Frequency
            variables -> /WheatValidation/Batten_GR/Winter_11oC_8h/Winter_11oC_8h_2week/paddock/Outputs_daily/Variables
      simulation Winter_11oC_16h_3week -> /WheatValidation/Batten_GR/Winter_11oC_8h/Winter_11oC_8h_3week
        area paddock -> /WheatValidation/Batten_GR/Winter_11oC_8h/Winter_11oC_8h_3week/paddock
          Soil Templeton -> /WheatValidation/Batten_GR/Winter_11oC_8h/Winter_11oC_8h_3week/paddock/Templeton
            SoilTemperature2: MaxTTimeDefault=14; BoundaryLayerConductanceSource=calc; BoundaryLayerConductance=20; BoundaryLayerConductanceIterations=1; NetRadiationSource=calc; DefaultWindSpeed=3; DefaultAltitude=18; DefaultInstrumentHeight=1.2; BareSoilHeight=57
          outputfile Outputs_daily -> /WheatValidation/Batten_GR/Winter_11oC_8h/Winter_11oC_8h_3week/paddock/Outputs_daily: filename=Winter_11oC_16h_3week Outputs_daily.out; title=Winter_11oC_16h_3week Outputs_daily
            events Reporting Frequency -> /WheatValidation/Batten_GR/Winter_11oC_8h/Winter_11oC_8h_3week/paddock/Outputs_daily/Reporting Frequency
            variables -> /WheatValidation/Batten_GR/Winter_11oC_8h/Winter_11oC_8h_3week/paddock/Outputs_daily/Variables
      simulation Winter_11oC_16h_4week -> /WheatValidation/Batten_GR/Winter_11oC_8h/Winter_11oC_8h_4week
        area paddock -> /WheatValidation/Batten_GR/Winter_11oC_8h/Winter_11oC_8h_4week/paddock
          Soil Templeton -> /WheatValidation/Batten_GR/Winter_11oC_8h/Winter_11oC_8h_4week/paddock/Templeton
            SoilTemperature2: MaxTTimeDefault=14; BoundaryLayerConductanceSource=calc; BoundaryLayerConductance=20; BoundaryLayerConductanceIterations=1; NetRadiationSource=calc; DefaultWindSpeed=3; DefaultAltitude=18; DefaultInstrumentHeight=1.2; BareSoilHeight=57
          outputfile Outputs_daily -> /WheatValidation/Batten_GR/Winter_11oC_8h/Winter_11oC_8h_4week/paddock/Outputs_daily: filename=Winter_11oC_16h_4week Outputs_daily.out; title=Winter_11oC_16h_4week Outputs_daily
            events Reporting Frequency -> /WheatValidation/Batten_GR/Winter_11oC_8h/Winter_11oC_8h_4week/paddock/Outputs_daily/Reporting Frequency
            variables -> /WheatValidation/Batten_GR/Winter_11oC_8h/Winter_11oC_8h_4week/paddock/Outputs_daily/Variables
      simulation Winter_11oC_16h_5week -> /WheatValidation/Batten_GR/Winter_11oC_8h/Winter_11oC_8h_5week
        area paddock -> /WheatValidation/Batten_GR/Winter_11oC_8h/Winter_11oC_8h_5week/paddock
          Soil Templeton -> /WheatValidation/Batten_GR/Winter_11oC_8h/Winter_11oC_8h_5week/paddock/Templeton
            SoilTemperature2: MaxTTimeDefault=14; BoundaryLayerConductanceSource=calc; BoundaryLayerConductance=20; BoundaryLayerConductanceIterations=1; NetRadiationSource=calc; DefaultWindSpeed=3; DefaultAltitude=18; DefaultInstrumentHeight=1.2; BareSoilHeight=57
          outputfile Outputs_daily -> /WheatValidation/Batten_GR/Winter_11oC_8h/Winter_11oC_8h_5week/paddock/Outputs_daily: filename=Winter_11oC_16h_5week Outputs_daily.out; title=Winter_11oC_16h_5week Outputs_daily
            events Reporting Frequency -> /WheatValidation/Batten_GR/Winter_11oC_8h/Winter_11oC_8h_5week/paddock/Outputs_daily/Reporting Frequency
            variables -> /WheatValidation/Batten_GR/Winter_11oC_8h/Winter_11oC_8h_5week/paddock/Outputs_daily/Variables
      simulation Winter_11oC_16h_6week -> /WheatValidation/Batten_GR/Winter_11oC_8h/Winter_11oC_8h_6week
        area paddock -> /WheatValidation/Batten_GR/Winter_11oC_8h/Winter_11oC_8h_6week/paddock
          Soil Templeton -> /WheatValidation/Batten_GR/Winter_11oC_8h/Winter_11oC_8h_6week/paddock/Templeton
            SoilTemperature2: MaxTTimeDefault=14; BoundaryLayerConductanceSource=calc; BoundaryLayerConductance=20; BoundaryLayerConductanceIterations=1; NetRadiationSource=calc; DefaultWindSpeed=3; DefaultAltitude=18; DefaultInstrumentHeight=1.2; BareSoilHeight=57
          outputfile Outputs_daily -> /WheatValidation/Batten_GR/Winter_11oC_8h/Winter_11oC_8h_6week/paddock/Outputs_daily: filename=Winter_11oC_16h_6week Outputs_daily.out; title=Winter_11oC_16h_6week Outputs_daily
            events Reporting Frequency -> /WheatValidation/Batten_GR/Winter_11oC_8h/Winter_11oC_8h_6week/paddock/Outputs_daily/Reporting Frequency
            variables -> /WheatValidation/Batten_GR/Winter_11oC_8h/Winter_11oC_8h_6week/paddock/Outputs_daily/Variables
      simulation Winter_11oC_16h_7week -> /WheatValidation/Batten_GR/Winter_11oC_8h/Winter_11oC_8h_7week
        area paddock -> /WheatValidation/Batten_GR/Winter_11oC_8h/Winter_11oC_8h_7week/paddock
          Soil Templeton -> /WheatValidation/Batten_GR/Winter_11oC_8h/Winter_11oC_8h_7week/paddock/Templeton
            SoilTemperature2: MaxTTimeDefault=14; BoundaryLayerConductanceSource=calc; BoundaryLayerConductance=20; BoundaryLayerConductanceIterations=1; NetRadiationSource=calc; DefaultWindSpeed=3; DefaultAltitude=18; DefaultInstrumentHeight=1.2; BareSoilHeight=57
          outputfile Outputs_daily -> /WheatValidation/Batten_GR/Winter_11oC_8h/Winter_11oC_8h_7week/paddock/Outputs_daily: filename=Winter_11oC_16h_7week Outputs_daily.out; title=Winter_11oC_16h_7week Outputs_daily
            events Reporting Frequency -> /WheatValidation/Batten_GR/Winter_11oC_8h/Winter_11oC_8h_7week/paddock/Outputs_daily/Reporting Frequency
            variables -> /WheatValidation/Batten_GR/Winter_11oC_8h/Winter_11oC_8h_7week/paddock/Outputs_daily/Variables
      simulation Winter_11oC_16h_8week -> /WheatValidation/Batten_GR/Winter_11oC_8h/Winter_11oC_8h_8week
        area paddock -> /WheatValidation/Batten_GR/Winter_11oC_8h/Winter_11oC_8h_8week/paddock
          Soil Templeton -> /WheatValidation/Batten_GR/Winter_11oC_8h/Winter_11oC_8h_8week/paddock/Templeton
            SoilTemperature2: MaxTTimeDefault=14; BoundaryLayerConductanceSource=calc; BoundaryLayerConductance=20; BoundaryLayerConductanceIterations=1; NetRadiationSource=calc; DefaultWindSpeed=3; DefaultAltitude=18; DefaultInstrumentHeight=1.2; BareSoilHeight=57
          outputfile Outputs_daily -> /WheatValidation/Batten_GR/Winter_11oC_8h/Winter_11oC_8h_8week/paddock/Outputs_daily: filename=Winter_11oC_16h_8week Outputs_daily.out; title=Winter_11oC_16h_8week Outputs_daily
            events Reporting Frequency -> /WheatValidation/Batten_GR/Winter_11oC_8h/Winter_11oC_8h_8week/paddock/Outputs_daily/Reporting Frequency
            variables -> /WheatValidation/Batten_GR/Winter_11oC_8h/Winter_11oC_8h_8week/paddock/Outputs_daily/Variables
      simulation Winter_11oC_16h_9week -> /WheatValidation/Batten_GR/Winter_11oC_8h/Winter_11oC_8h_9week
        area paddock -> /WheatValidation/Batten_GR/Winter_11oC_8h/Winter_11oC_8h_9week/paddock
          Soil Templeton -> /WheatValidation/Batten_GR/Winter_11oC_8h/Winter_11oC_8h_9week/paddock/Templeton
            SoilTemperature2: MaxTTimeDefault=14; BoundaryLayerConductanceSource=calc; BoundaryLayerConductance=20; BoundaryLayerConductanceIterations=1; NetRadiationSource=calc; DefaultWindSpeed=3; DefaultAltitude=18; DefaultInstrumentHeight=1.2; BareSoilHeight=57
          outputfile Outputs_daily -> /WheatValidation/Batten_GR/Winter_11oC_8h/Winter_11oC_8h_9week/paddock/Outputs_daily: filename=Winter_11oC_16h_9week Outputs_daily.out; title=Winter_11oC_16h_9week Outputs_daily
            events Reporting Frequency -> /WheatValidation/Batten_GR/Winter_11oC_8h/Winter_11oC_8h_9week/paddock/Outputs_daily/Reporting Frequency
            variables -> /WheatValidation/Batten_GR/Winter_11oC_8h/Winter_11oC_8h_9week/paddock/Outputs_daily/Variables
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