folder simulations: version=34
  folder Base
    simulation Wheat
      metfile met: filename=%apsim%\Examples\MetFiles\Goond.met
      clock
        start_date = 01/06/1940  # Enter the start date of the simulation
        end_date = 31/12/1941  # Enter the end date of the simulation
      summaryfile
      area paddock
        Soil: SoilType=Black Vertosol; LocalName=Waco; Site=Jimbour; NearestTown=Jimbour, Q 4352; Region=South East Queensland; NaturalVegetation=Grassland, mainly Qld bluegrass; Latitude=0; Longitude=0
          InitialWater Initial water: FractionFull=1; PercentMethod=FilledFromTop
          Water
            Thickness  KS   BD    AirDry  LL15  DUL   SAT
            150        100  1.02  0.15    0.29  0.54  0.59
            150        100  1.03  0.26    0.29  0.53  0.58
            300        100  1.02  0.29    0.29  0.54  0.59
            300        100  1.02  0.29    0.29  0.54  0.58
            300        100  1.06  0.3     0.3   0.52  0.57
            300        100  1.11  0.31    0.31  0.5   0.55
            300        100  1.12  0.32    0.32  0.5   0.55
            300        100  1.15  0.33    0.33  0.48  0.53
            300        100  1.18  0.34    0.34  0.47  0.52
            300        100  1.2   0.35    0.35  0.46  0.51
            300        100  1.25  0.36    0.36  0.44  0.49
            SoilCrop Barley
              LL=[0.29, 0.29, 0.32, 0.38, 0.39, 0.39, 0.41, 0.48, 0.47, 0.46, 0.44]
              KL=[0.1, 0.1, 0.08, 0.06, 0.04, 0.02, 0.01, 0, 0, 0, 0]
              XF=[1, 1, 1, 1, 1, 1, 1, 0, 0, 0, 0]
            SoilCrop Chickpea
              LL=[0.29, 0.29, 0.36, 0.43, 0.51, 0.5, 0.5, 0.48, 0.47, 0.46, 0.44]
              KL=[0.1, 0.1, 0.08, 0.06, 0.04, 0.02, 0.01, 0, 0, 0, 0]
              XF=[1, 1, 1, 1, 1, 1, 1, 0, 0, 0, 0]
            SoilCrop Lucerne
              LL=[0.29, 0.29, 0.29, 0.29, 0.3, 0.31, 0.32, 0.33, 0.34, 0.35, 0.36]
              KL=[0.1, 0.1, 0.1, 0.1, 0.09, 0.09, 0.09, 0.09, 0.09, 0.09, 0.09]
              XF=[1, 1, 1, 1, 1, 1, 1, 1, 1, 1, 1]
            SoilCrop Maize
              LL=[0.29, 0.29, 0.34, 0.34, 0.37, 0.4, 0.42, 0.48, 0.47, 0.46, 0.44]
              KL=[0.1, 0.1, 0.1, 0.08, 0.06, 0.04, 0.02, 0, 0, 0, 0]
              XF=[1, 1, 1, 1, 1, 1, 1, 0, 0, 0, 0]
            SoilCrop Perennial Grass
              LL=[0.29, 0.29, 0.39, 0.41, 0.4, 0.4, 0.41, 0.41, 0.4, 0.4, 0.42]
              KL=[0.1, 0.1, 0.1, 0.1, 0.09, 0.07, 0.05, 0, 0, 0, 0]
              XF=[1, 1, 1, 1, 1, 1, 1, 0, 0, 0, 0]
            SoilCrop Sorghum
              LL=[0.29, 0.29, 0.35, 0.38, 0.4, 0.4, 0.4, 0.48, 0.47, 0.46, 0.44]
              KL=[0.1, 0.1, 0.1, 0.08, 0.06, 0.04, 0.02, 0, 0, 0, 0]
              XF=[1, 1, 1, 1, 1, 1, 1, 0, 0, 0, 0]
            SoilCrop Wheat
              LL=[0.29, 0.29, 0.32, 0.32, 0.35, 0.38, 0.41, 0.48, 0.47, 0.46, 0.44]
              KL=[0.1, 0.1, 0.08, 0.06, 0.04, 0.02, 0.01, 0, 0, 0, 0]
              XF=[1, 1, 1, 1, 1, 1, 1, 0, 0, 0, 0]
            SoilCrop wheat2
              LL=[0.29, 0.29, 0.32, 0.32, 0.35, 0.38, 0.41, 0.48, 0.47, 0.46, 0.44]
              KL=[0.1, 0.1, 0.08, 0.06, 0.04, 0.02, 0.01, 0, 0, 0, 0]
              XF=[1, 1, 1, 1, 1, 1, 1, 0, 0, 0, 0]
          SoilWater: Thickness=[150, 150, 300, 300, 300, 300, 300, 300, 300, 300, 300]; SWCON=[0.3, 0.3, 0.3, 0.3, 0.3, 0.3, 0.3, 0.3, 0.3, 0.3, 0.3]
            SummerCona = 5
            SummerU = 9
            SummerDate = 1-Nov
            WinterCona = 5
            WinterU = 9
            WinterDate = 1-Apr
            DiffusConst = 40
            DiffusSlope = 16
            Salb = 0.13
            CN2Bare = 73
            CNRed = 20
            CNCov = 0.8
          SoilOrganicMatter: RootCN=40; RootWt=200; SoilCN=12.5; EnrACoeff=7.4; EnrBCoeff=0.2
            Thickness  OC    FBiom  FInert
            150        1.04  0.025  0.4
            150        0.89  0.02   0.6
            300        0.89  0.015  0.8
            300        0.89  0.01   0.9
            300        0.77  0.01   0.95
            300        0.45  0.01   0.95
            300        0.27  0.01   0.95
            300        0.22  0.01   0.95
            300        0.16  0.01   0.95
            300        0.13  0.01   0.95
            300        0.12  0.01   0.95
          Analysis: PHUnits=Water; BoronUnits=HotWater
            Thickness  EC    PH
            150        0.2   8.4
            150        0.25  8.8
            300        0.31  9
            300        0.4   9.2
            300        0.59  9.2
            300        0.84  9.1
            300        0.93  9
            300        1.01  9
            300        1.06  8.9
            300        1.05  8.9
            300        1.01  8.9
          Sample Initial nitrogen
            Thickness  NO3    NH4
            150        6.503  0.599004
            150        2.101  0.100001
            300        2.101  0.100001
            300        1.701  0.100001
            300        1.701  0.100001
            300        1.701  0.100001
            300        1.701  0.100001
            300        1.701  0.100001
            300        1.701  0.100001
            300        1.701  0.100001
            300        1.701  0.100001
        surfaceom surface organic matter
          PoolName = wheat  # Organic Matter pool name
          type = wheat  # Organic Matter type
          mass = 1000  # Initial surface residue (kg/ha)
          cnr = 80  # C:N ratio of initial residue
          standing_fraction = 0  # Fraction of residue standing
        fertiliser
        wheat
          ModifyKL = no  # Modify KL using CL, EC or ESP if found?
        folder Manager folder
          manager Sow on a fixed date
            # Sowing criteria
            date = 1-jun  # Enter sowing date (dd-mmm)
            # Sowing parameters
            crop = wheat  # Enter name of crop to sow
            density = 150  # Enter sowing density (plants/m2)
            depth = 50  # Enter sowing depth (mm)
            cultivar = hartog  # Enter cultivar
            class = plant  # Enter crop growth class
            row_spacing = 500  # Enter row spacing (mm)
            on start_of_day:
```
        if (today = date('[date]') then
              [crop] sow population =[density], sowing_depth = [depth], cultivar = [cultivar], row_spacing = [row_spacing], crop_class = [class]
         endif
```
          manager Harvesting rule
            # Harvesting criteria
            crop = wheat  # Enter name of crop to harvest when ripe
            on end_of_day:
```
        if [crop].PlantStatus <> 'out' then
           if [crop].StageName = 'harvest_ripe' or [crop].PlantStatus = 'dead' then
              [crop]  harvest
              [crop]  end_crop
           endif
        endif
```
        outputfile: filename=Wheat.out; title=Wheat
          variables
            variables: dd/mm/yyyy as Date, LAI, PhenologyStage, StageName, Yield, Height, LeafLiveWt, StemLiveWt, GrainWt, LeafNumber, CoverLive, RootDepth, DaysAfterSowing, PodLiveWt, TTAfterSowing, AboveGroundN, LAITotal, plants, NodeNumber, Biomass, AboveGroundLiveN, PlantStatus, GrainN, LeafLiveN, StemLiveN, FloweringDate, AboveGroundLiveWt, LeafLiveNConc, MaturityDate, PAI, PodLiveN, StemLiveNConc, CoverTotal, TotalN, TotalWt, NStressPhoto, swstress_photo, SLAI, WaterStressExpansion, GrainNumber, WaterStressPheno, GrowthRate, LeafNumberDead, RootLiveWt, NDemand, RootNSupply, green, senesced, GrainP, NStressPheno, NStressExpansion, NStressGrain, PStressPheno, PStressExpansion, PStressGrain, PStressPhoto, WaterStressFixation, Grain_Protein, grain_size, sw_uptake, zadok_stage, n_conc_grain
          events Reporting Frequency: event=daily
    simulation Wheat2
      metfile met -> /simulations/Base/Wheat/met
      clock -> /simulations/Base/Wheat/clock
      summaryfile -> /simulations/Base/Wheat/summaryfile
      area paddock -> /simulations/Base/Wheat/paddock
        wheat2
          ModifyKL = no  # Modify KL using CL, EC or ESP if found?
        folder Manager folder -> /simulations/Base/Wheat/paddock/Manager folder
          manager Sow on a fixed date
            # Sowing criteria
            date = 1-jun  # Enter sowing date (dd-mmm)
            # Sowing parameters
            crop = wheat2  # Enter name of crop to sow
            density = 150  # Enter sowing density (plants/m2)
            depth = 50  # Enter sowing depth (mm)
            cultivar = hartog  # Enter cultivar
            class =  # Enter crop growth class
            row_spacing = 500  # Enter row spacing (mm)
            on start_of_day:
```
        if (today = date('[date]') then
              [crop] sow population =[density], depth = [depth], cultivar = [cultivar], MaxCover = 1.0, BudNumber = 1, RowSpacing = [row_spacing], crop_class = [class]
         endif
```
          manager Harvesting rule
            # Harvesting criteria
            crop = wheat2  # Enter name of crop to harvest when ripe
            on end_of_day:
```
        if [crop].PlantStatus <> 'out' then
           if [crop].PhenologyCurrentPhaseName = 'ReadyForHarvesting' or  [crop].PlantStatus = 'dead' then
              [crop]  harvest
              [crop]  endcrop
           endif
        endif
```
        outputfile: filename=Wheat2.out; title=Wheat2
          variables
            variables: dd/mm/yyyy as Date, LAI, PhenologyStage, PhenologyCurrentStageName, Yield, Height, LeafLiveWt, StemLiveWt, GrainWt, LeafNumber, CoverLive, RootDepth, DaysAfterSowing, PodLiveWt, TTAfterSowing, AboveGroundN, LAITotal, Population, NodeNumber, Biomass, AboveGroundWt, AboveGroundLiveN, PlantStatus, GrainN, LeafLiveN, StemLiveN, FloweringDate, AboveGroundLiveWt, LeafLiveNConc, MaturityDate, PAI, PodLiveN, StemLiveNConc, CoverTotal, TotalN, TotalWt, NStressPhoto, WaterStressPhoto, SLAI, WaterStressExpansion, GrainNumber, WaterStressPheno, GrowthRate, LeafNumberDead, RootLiveWt, RootNDemand, RootNSupply, GrainP, NStressPheno, NStressExpansion, NStressGrain, PStressPheno, PStressExpansion, PStressGrain, PStressPhoto, WaterStressExpansion, GrainProtein, GrainSize, RootWaterUptake, ZadokStage, GrainNConc
          events Reporting Frequency -> /simulations/Base/Wheat/paddock/outputfile/Reporting Frequency
        micromet: soilalbedo=0.23; a_interception=0.0; b_interception=0.0; c_interception=0.0; d_interception=0.0
  folder With CO2
    simulation Wheat With CO2 -> /simulations/Base/Wheat
      manager ClimateControl
        # Climate Control Window
        date1 = 1-jan  # Enter window START date (dd-mmm)
        date2 = 31-dec  # Enter window END date (dd-mmm)
        # Climate Change Parameters
        MaxtChange = 0  # Change in maximum temperature (oC)
        MintChange = 0  # Change in minimum temperature (oC)
        RainChange = 0  # Relative change in daily rainfall (%)
        RadnChange = 0  # Relative change in daily radiation (%)
        CO2 = 700  # Atmospheric CO2 Concentration (ppm)
        on prenewmet:
```
!  Adjust daily temperatures, rainfall and radiation up or down according to user-defined amounts
! To apply different levels of climate control to different times of year add multiple copies of this logic into your simulation and change the window.

if (date_within('[date1], [date2]') = 1) then
   maxt = maxt + [MaxtChange]
   mint = mint + [MintChange]
   rain = rain + rain * [RainChange] / 100
   radn = radn + radn * [RadnChange] / 100
   co2 = [CO2]
 endif
```
        on Init:
```
co2 = [CO2]
```
      area paddock -> /simulations/Base/Wheat/paddock
        outputfile -> /simulations/Base/Wheat/paddock/outputfile: filename=Wheat With CO2.out; title=Wheat With CO2
          variables -> /simulations/Base/Wheat/paddock/outputfile/Variables
          events Reporting Frequency -> /simulations/Base/Wheat/paddock/outputfile/Reporting Frequency
    simulation Wheat2 With CO2 -> /simulations/Base/Wheat2
      manager ClimateControl: same as With CO2.Wheat With CO2.ClimateControl
      area paddock -> /simulations/Base/Wheat2/paddock
        outputfile: filename=Wheat2 With CO2.out; title=Wheat2 With CO2
          variables -> /simulations/Base/Wheat2/paddock/outputfile/Variables
          events Reporting Frequency -> /simulations/Base/Wheat2/paddock/outputfile/Reporting Frequency
  folder With SWIM
    simulation Wheat With SWIM3 -> /simulations/Base/Wheat
      area paddock -> /simulations/Base/Wheat/paddock
        Soil -> /simulations/Base/Wheat/paddock/Soil
          Swim
            Salb = 0.13  # Bare Soil Albedo
            CN2Bare = 73  # Bare Soil Runoff Curve Number
            CNRed = 20  # Max. Reduction in Curve Number due to cover
            CNCov = 0.8  # Cover for max Curve Number reduction
            KDul = .1  # Hydraulic Conductivity at DUL (mm/d)
            PSIDul = -100  # Matric Potential at DUL (cm)
            VC = true  # Vapour Conductivity Calculations (on/off)
            DTmin = 0.0  # Minimum Timestep (min)
            DTmax = 1440.  # Maximum Timestep (min)
            MaxWaterIncrement = 10  # Maximum Water Increment (mm)
            SpaceWeightingFactor = 0
            SoluteSpaceWeightingFactor = 0.0
            Diagnostics = false  # Diagnostic Information?
            SwimSoluteParameters: ThicknessUnits=mm
              Thickness  NO3Exco  NO3FIP  NH4Exco  NH4FIP  UreaExco  UreaFIP  ClExco  ClFIP
              1000       0        1.0     100.0    1.0     0.0       1.0      0.0     1.0
              1000       0        1.0     100.0    1.0     0.0       1.0      0.0     1.0
              1000       0.0      1.0     100.0    1.0     0.0       1.0      0.0     1.0
              Dis = 15  # Dispersivity - dis ((cm^2/h)/(cm/h)^p)
              Disp = 1  # Dispersivity Power - disp
              A = 1.0  # Tortuosity Constant - a
              DTHC = 0.0  # Tortuoisty Offset - dthc
              DTHP = 1.0  # Tortuoisty Power - dthp
              WaterTableCl = 0.0  # Water Table Cl Concentration (ppm)
              WaterTableNO3 = 0.0  # Water Table NO3 Concentration (ppm)
              WaterTableNH4 = 0.0  # Water Table NH4 Concentration (ppm)
              WaterTableUrea = 0.0  # Water Table Urea Concentration (ppm)
          LayerStructure
            Thickness=[10, 20, 30, 40, 100, 200, 300, 300, 300, 300, 300, 500, 500, 100]
        outputfile -> /simulations/Base/Wheat/paddock/outputfile: filename=Wheat With SWIM3.out; title=Wheat With SWIM3
          variables -> /simulations/Base/Wheat/paddock/outputfile/Variables
          events Reporting Frequency -> /simulations/Base/Wheat/paddock/outputfile/Reporting Frequency
    simulation Wheat2 With SWIM3 -> /simulations/Base/Wheat2
      area paddock -> /simulations/Base/Wheat2/paddock
        Soil -> /simulations/Base/Wheat2/paddock/Soil
          Swim: same as With SWIM.Wheat With SWIM3.paddock.Soil.Swim
          LayerStructure
            Thickness=[10, 20, 30, 40, 100, 200, 300, 300, 300, 300, 300, 500, 500, 100]
        outputfile: filename=Wheat2 With SWIM3.out; title=Wheat2 With SWIM3
          variables -> /simulations/Base/Wheat2/paddock/outputfile/Variables
          events Reporting Frequency -> /simulations/Base/Wheat2/paddock/outputfile/Reporting Frequency
  folder With Cl
    simulation Wheat With Cl -> /simulations/Base/Wheat
      area paddock -> /simulations/Base/Wheat/paddock
        Soil -> /simulations/Base/Wheat/paddock/Soil
          Analysis
            Thickness  EC    PH   CL
            150        0.2   8.4  10
            150        0.25  8.8  500
            300        0.31  9    1000
            300        0.4   9.2  1000
            300        0.59  9.2  1000
            300        0.84  9.1  1000
            300        0.93  9    1000
            300        1.01  9    1000
            300        1.06  8.9  1000
            300        1.05  8.9  1000
            300        1.01  8.9  1000
        wheat
          ModifyKL = yes  # Modify KL using CL, EC or ESP if found?
        outputfile -> /simulations/Base/Wheat/paddock/outputfile: filename=Wheat With Cl.out; title=Wheat With Cl
          variables -> /simulations/Base/Wheat/paddock/outputfile/Variables
          events Reporting Frequency -> /simulations/Base/Wheat/paddock/outputfile/Reporting Frequency
    simulation Wheat2 With Cl -> /simulations/Base/Wheat2
      area paddock -> /simulations/Base/Wheat2/paddock
        wheat2
          ModifyKL = yes  # Modify KL using CL, EC or ESP if found?
        Soil -> /simulations/Base/Wheat2/paddock/Soil
          Analysis: same as With Cl.Wheat With Cl.paddock.Soil.Analysis
        outputfile: filename=Wheat2 With Cl.out; title=Wheat2 With Cl
          variables -> /simulations/Base/Wheat2/paddock/outputfile/Variables
          events Reporting Frequency -> /simulations/Base/Wheat2/paddock/outputfile/Reporting Frequency
  folder With Grazing
    simulation Wheat With Grazing -> /simulations/Base/Wheat
      clock
        start_date = 01/04/1940  # Enter the start date of the simulation
        end_date = 31/12/1940  # Enter the end date of the simulation
      area paddock -> /simulations/Base/Wheat/paddock
        wheat
          ModifyKL = yes  # Modify KL using CL, EC or ESP if found?
        folder Manager folder -> /simulations/Base/Wheat/paddock/Manager folder
          manager Grazing management
            on init:
```
annual_lwg = 0.0
paddockState = 'empty'
```
            on start_of_day:
```
! Graze paddock when wheat is ready
if (today = date('1-jul') AND paddockState = 'empty') then
   graz set stocking_rate = 0.8
   graz set alw =  400.0                 ! p084
   annual_lwg = 0.0
   paddockState = 'stocked'
endif

! 'GRAZEON' stocking rate resets (%Use of TSDM for next year)
if (graz.stocking_rate > 0.0 AND today = date('1-jun') then                ! p081
   graz set alw = 400.0
   avgDailyIntake = (annual_lwg/365.25 + 1.058) / 0.304
   targetUtil = 30.0 / 100.0
   annualIntake = avgDailyIntake * 365.5
   stock_equiv_ratio = targetUtil * 2000 / annualIntake

   weight_ratio = graz.alw / 200
   factor = weight_ratio ** 0.75
   beasts_ha = stock_equiv_ratio / factor
   graz set stocking_rate = beasts_ha

   annual_lwg = 0.0
endif
```
            on end_of_day:
```
annual_lwg = annual_lwg + graz.lwg
```
        outputfile -> /simulations/Base/Wheat/paddock/outputfile: filename=Wheat With Grazing.out; title=Wheat With Grazing
          variables
            variables: dd/mm/yyyy as Date, paddockState, alw, stocking_rate, acc_eaten, Yield, Biomass, LAI
          events Reporting Frequency -> /simulations/Base/Wheat/paddock/outputfile/Reporting Frequency
        graz
          intake_util_intercept = 1  # Intercept in eqn reln between intake and utilization
          intake_util_slope = -0.3  # Slope in eqn reln between intake and utilization
          yld_eat_restr = 300  # Yield at which intake restriction no longer applies
          summer_lwg = 70  # Expected lwg @ low SR
          autumn_lwg = 35  # Expected lwg @ low SR
          winter_lwg = 10  # Expected lwg @ low SR
          spring_lwg = 35  # Expected lwg @ low SR
          leaf_diet = 0.85  # Proportion of leaf in diet
          std_alw = 200
          min_alw = 100  # Minimum ALW
          metabol_expon = 0.75
          acc_eaten_reset = 335  # Day to reset eaten accumulator
          prop_can_eat = 1
          allow_supplements = 0
    simulation Wheat2 With Grazing -> /simulations/Base/Wheat2
      clock
        start_date = 01/04/1940  # Enter the start date of the simulation
        end_date = 31/12/1940  # Enter the end date of the simulation
      area paddock -> /simulations/Base/Wheat2/paddock
        wheat2
          ModifyKL = yes  # Modify KL using CL, EC or ESP if found?
        folder Manager folder -> /simulations/Base/Wheat2/paddock/Manager folder
          manager Grazing management: same as With Grazing.Wheat With Grazing.paddock.Manager folder.Grazing management
        outputfile: filename=Wheat2 With Grazing.out; title=Wheat2 With Grazing
          variables
            variables: dd/mm/yyyy as Date, paddockState, alw, stocking_rate, acc_eaten, Yield, Biomass, LAI, PHenologyStage
          events Reporting Frequency -> /simulations/Base/Wheat2/paddock/outputfile/Reporting Frequency
        graz: same as With Grazing.Wheat With Grazing.paddock.graz
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