folder Simulations: version=28
  simulation ShallowSoilSampleHighCL
    clock
    metfile met: filename=78078.met
    patchinput: filename=Alan Bennett^Buckley Corner.rain
    summaryfile
    area Paddock
      folder Management
        manager GrossMargin
          # Cost properties
          FertiliserCost = 1.2  # Cost of N fertiliser ($/ha)
          FertiliserApplicationCost = 15  # Cost of N application ($/ha)
          WaterCost = 0  # Cost of water ($/Ml)
          # Price properties
          Price = 140  # Price ($/t)
          ProteinContent = 10.5  # Minimum protein for classification ($/t)
          ProteinIncrement = 2  # Protein increment payment ($/t)
          on post:
```
   ! Reset the bank to zero the day after harvest.
   if (ResetBank = 1 or today = met_start_date) then
      Bank = 0
      ResetBank = 0
      TwoTimesCost = 0
   endif

   ! Keep track of the number of fertiliser applications.
   if (fertiliser > 0)then
      Cost = [FertiliserCost] * fertiliser + [FertiliserApplicationCost]
      Bank = Bank - Cost
      if ScenarioApplication = 'yes' then
         TwoTimesCost = TwoTimesCost + 2 * Cost
      endif
   endif

   ! Keep track of the number of irrigation applications.
   if (irrig_tot > 0)then
      Cost = [WaterCost] * (irrig_tot / 100)
      Bank = Bank - Cost
      if ScenarioApplication = 'yes' then
         TwoTimesCost = TwoTimesCost + 2 * Cost
      endif
   endif

   ! Calculate gross margin at harvest.
   if StageName = 'harvest_ripe' or plant_status = 'dead' then
      if (grain_protein > [ProteinContent]) then
         FullPrice = [Price] + (grain_protein - [ProteinContent]) * 2 * [ProteinIncrement]
      else
         FullPrice = [Price]
      endif
      Bank = Bank + FullPrice * WetYield
      ResetBank = 1
   endif
```
          on init:
```
      Bank = 0
      ResetBank = 0
      TwoTimesCost = 0
      ScenarioApplication = 'no'
```
        manager Reset
          # When should a reset be done
          ResetDate = 01-Apr  # Enter date of reset (dd-mmm)
          # Reset details
          soilmodule = Soil  # Name of your soil module
          surfaceommodule = SurfaceOM  # Name of your surface organic matter module
          resetWater = yes  # Reset soil water?
          resetNitrogen = yes  # Reset soil nitrogen?
          resetSurfaceOM = yes  # Reset surface organic matter?
          on start_of_day:
```
   ! If the reset date is after the sow date then we want to reset on both sowing and on the reset date.
   ! Otherwise, just reset on the reset date.
   DoReset = 0
   if (date('[ResetDate]')> SowDate) then
      if (today = date('[ResetDate]') or (today = SowDate and ResetDate - SowDate < 90)) then
         DoReset = 1
      endif
   elseif (today = date('[ResetDate]')) then
         DoReset = 1
   endif

   if (DoReset = 1) then
      resetWater = '[resetWater]'
      resetNitrogen  = '[resetNitrogen]'
      resetSurfaceOM = '[resetSurfaceOM]'
      if (resetWater = 'yes') then
          '[soilmodule] Water' reset
      endif
      if (resetNitrogen = 'yes') then
          '[soilmodule] Nitrogen' reset
      endif
      if (resetSurfaceOM = 'yes') then
          '[surfaceommodule]' reset
      endif
      act_mods reseting
   endif
```
        manager Sow
          # Sowing criteria
          sowdate = 10-May  # Enter sowing date (dd-mmm)
          # Sowing parameters
          crop = Wheat  # Enter name of crop to sow
          SowingDensity = 150  # Enter sowing density (plants/m2)
          depth = 30  # Enter sowing depth (mm)
          cultivar = Wedgetail  # Enter cultivar
          class = plant  # Enter crop growth class
          RowSpacing = 250  # Enter row spacing (mm, m for sorghum)
          skiprow = solid  # Skip row (sorghum only)
          ftn = 1  # Enter Fertile Tiller No. (sorghum only)
          # Furrow irrigation hack
          FurrowIrrigation = no  # Turn furrow irrigation hack on?
          FurrowRowSpacing =  # Furrow row spacing (m)
          BedRowSpacing =  # Bed row spacing (m)
          BedWidth =  # Bed width (m)
          on start_of_day:
```
   CropSown  = '[crop]'
   if (today = date('[sowdate]') then
      sow_year = year
      if ('[FurrowIrrigation]' = 'yes') then
         skiprow = (4 * (([BedRowSpacing] - 0.2)^2) + 3 * (([FurrowRowSpacing] - 0.2)^2) ) / (1 + (([BedRowSpacing] - [FurrowRowSpacing]) * [BedWidth])^2)
         [crop] sow plants =[SowingDensity], sowing_depth = [depth], cultivar = [cultivar], row_spacing = [RowSpacing], crop_class = [class], tiller_no_fertile = [ftn] (), skip = [skiprow], skiprow = skiprow
      else
         [crop] sow plants =[SowingDensity], sowing_depth = [depth], cultivar = [cultivar], row_spacing = [RowSpacing], crop_class = [class], tiller_no_fertile = [ftn] (), skip = [skiprow]
      endif
   endif
```
          on init:
```
   sow_year = 0
```
        manager Sowing tillage
          # Tillage details
          surfaceommodule = SurfaceOM  # Module used to apply the tillage
          tillage_type = planter
          tillage_depth = 50  # User_defined depth of seedbed preparation (mm)
          tillage_f_incorp = 0.1  # User_defined fraction of surface residues to incorporate (0-1)
          on sowing:
```
         '[surfaceommodule]' tillage type = [tillage_type], f_incorp = [tillage_f_incorp] (), tillage_depth = [tillage_depth]
```
        manager Harvest
          # Harvesting criteria
          crop = Wheat  # Enter name of crop to harvest when ripe
          on end_of_day:
```
           if [crop].StageName = 'harvest_ripe' or [crop].plant_status = 'dead' then
              [crop]  harvest
              [crop]  end_crop
              harvesttoday = 1
           else
              harvesttoday = 0
           endif
```
        manager Yield moisture correction
          on start_of_day:
```
   if CropSown = 'canola' then
      MoistureContent = 8       ! %
   else
      MoistureContent = 12     ! %
   endif
   WetYield = yield / (1 - MoistureContent/100) / 1000
```
        manager Hay
          # Cost properties
          HayCost = 120  # Cost of Hay production ($/ha)
          BalingCost = 0  # Cost of baling hay ($/ha)
          GrainCost = 30  # Cost of Grain production ($/ha);
          # Price properties
          HayPrice = 100  # Hay Price ($/t)
          GrainPrice = 200  # Grain Price ($/t)
          on post:
```
   ! Calculate hay biomass and convert kg/ha to t/ha - assume 13% moisture
   CropBiomass =  (biomass / (1 - 13/100) / 1000)
   HayBiomassPercent = 70
   if (biomass >= 2000 and biomass <= 12000) then
      HayBiomassPercent = 70 + (biomass-2000) / (12000-2000) * 5
   elseif (biomass > 12000) then
      HayBiomassPercent = 75 + (biomass-12000) / (25000-12000) * 5
   endif
   HayBiomass = (HayBiomassPercent / 100) * CropBiomass

   ! HayGrossMargin calculation


   HayGrossMargin = HayBiomass * [HayPrice] - [HayCost] - ([BalingCost] * HayBiomass)
   GrainGrossMargin = WetYield * [GrainPrice] - [GrainCost]
```
          on init:
```
      Bank = 0
      ResetBank = 0
      TwoTimesCost = 0
      ScenarioApplication = 'no'
```
        manager MildFrost
          # Condition1 properties
          VariableName1 = Z  # Name of 1st APSIM variable to check (e.g. StageName)
          LowerBound1 = 60  # Lower bound of variable1
          UpperBound1 = 69.99  # Upper bound of variable1
          # Condition2 properties
          VariableName2 = mint  # Name of 2nd APSIM variable to bound check (e.g. maxt, mint, avtemp)
          LowerBound2 = 0  # Lower bound of variable2
          UpperBound2 = 2  # Upper bound of variable2
          # Event properties
          EventName = MildFrost  # Name of event to publish when above 2 conditions are met
          on post:
```
   if (DaysAfterSowing = 1) then
      [EventName]Count = 0
   endif

          if ([VariableName1] >= [LowerBound1] and
              [VariableName1] <= [UpperBound1] and
              [VariableName2] >= [LowerBound2] and
              [VariableName2] < [UpperBound2]) then
             act_mods [EventName]
             [EventName]Count =  [EventName]Count +1
          endif
```
        manager ModerateFrost
          # Condition1 properties
          VariableName1 = Z  # Name of 1st APSIM variable to check (e.g. StageName)
          LowerBound1 = 60  # Lower bound of variable1
          UpperBound1 = 75.99  # Upper bound of variable1
          # Condition2 properties
          VariableName2 = mint  # Name of 2nd APSIM variable to bound check (e.g. maxt, mint, avtemp)
          LowerBound2 = -2  # Lower bound of variable2
          UpperBound2 = 0  # Upper bound of variable2
          # Event properties
          EventName = ModerateFrost  # Name of event to publish when above 2 conditions are met
          on post:
          script: same as in ShallowSoilSampleHighCL.Paddock.Management.MildFrost
        manager SevereFrost
          # Condition1 properties
          VariableName1 = Z  # Name of 1st APSIM variable to check (e.g. StageName)
          LowerBound1 = 60  # Lower bound of variable1
          UpperBound1 = 79.99  # Upper bound of variable1
          # Condition2 properties
          VariableName2 = mint  # Name of 2nd APSIM variable to bound check (e.g. maxt, mint, avtemp)
          LowerBound2 = -100  # Lower bound of variable2
          UpperBound2 = -2  # Upper bound of variable2
          # Event properties
          EventName = SevereFrost  # Name of event to publish when above 2 conditions are met
          on post:
          script: same as in ShallowSoilSampleHighCL.Paddock.Management.MildFrost
        manager MildHeatShock
          # Condition1 properties
          VariableName1 = Z  # Name of 1st APSIM variable to check (e.g. StageName)
          LowerBound1 = 70  # Lower bound of variable1
          UpperBound1 = 79.99  # Upper bound of variable1
          # Condition2 properties
          VariableName2 = maxt  # Name of 2nd APSIM variable to bound check (e.g. maxt, mint, avtemp)
          LowerBound2 = 32  # Lower bound of variable2
          UpperBound2 = 34  # Upper bound of variable2
          # Event properties
          EventName = MildHeatShock  # Name of event to publish when above 2 conditions are met
          on post:
          script: same as in ShallowSoilSampleHighCL.Paddock.Management.MildFrost
        manager ModerateHeatShock
          # Condition1 properties
          VariableName1 = Z  # Name of 1st APSIM variable to check (e.g. StageName)
          LowerBound1 = 70  # Lower bound of variable1
          UpperBound1 = 79.99  # Upper bound of variable1
          # Condition2 properties
          VariableName2 = maxt  # Name of 2nd APSIM variable to bound check (e.g. maxt, mint, avtemp)
          LowerBound2 = 34  # Lower bound of variable2
          UpperBound2 = 36  # Upper bound of variable2
          # Event properties
          EventName = ModerateHeatShock  # Name of event to publish when above 2 conditions are met
          on post:
          script: same as in ShallowSoilSampleHighCL.Paddock.Management.MildFrost
        manager SevereHeatShock
          # Condition1 properties
          VariableName1 = Z  # Name of 1st APSIM variable to check (e.g. StageName)
          LowerBound1 = 70  # Lower bound of variable1
          UpperBound1 = 79.99  # Upper bound of variable1
          # Condition2 properties
          VariableName2 = maxt  # Name of 2nd APSIM variable to bound check (e.g. maxt, mint, avtemp)
          LowerBound2 = 36  # Lower bound of variable2
          UpperBound2 = 100  # Upper bound of variable2
          # Event properties
          EventName = SevereHeatShock  # Name of event to publish when above 2 conditions are met
          on post:
          script: same as in ShallowSoilSampleHighCL.Paddock.Management.MildFrost
        manager Fertilise
          # When should fertiliser be applied
          FertDate = 10-May  # Enter fertiliser date (dd-mmm)
          FertDateFull = 10/05/2008  # Fertiliser date (not used)
          # Fertiliser application details
          FertModule = fertiliser  # Module used to apply the fertiliser
          FertAmount = 3  # Amount of fertiliser to apply (kg/ha)
          FertType = NO3_N  # Fertiliser type
          Scenario = no  # Is this a scenario fertiliser?
          on start_of_day:
```
   if (today = date('[FertDate]') then
      ScenarioApplication = '[Scenario]'
      [FertModule] apply amount = [FertAmount] (kg/ha), depth = 20 (mm), type = [FertType] ()
   endif
```
        manager Irrigate (disabled)
          # When should irrigation be applied
          IrrigateDate = 1/1/1800  # Enter irrigation date (dd-mmm)
          IrrigateDateFull =  # Full irrigation date (not used)
          # Irrigation application details
          IrrigateModule = Irrigation  # Module used to apply the irrigation
          IrrigateAmount = 0  # Amount of irrigation to apply (mm)
          IrrigateEfficiency = 1  # Irrigation efficiency (0-1)
          Scenario = no  # Is this a scenario irrigation?
          on start_of_day:
```
   if (today = date('[IrrigateDate]') then
      ScenarioApplication = '[Scenario]'
      '[IrrigateModule]' set irrigation_efficiency = [IrrigateEfficiency]
      '[IrrigateModule]' apply amount = [IrrigateAmount] (mm)
   endif
```
        manager Tillage (disabled)
          # When should tillage be done
          TillageDate = 1/1/1800  # Enter tillage date (dd-mmm)
          TillageDateFull =  # Tillage date full (not used)
          # Tillage application details
          Disturbance = low
          tillage_depth = 100  # User_defined depth of seedbed preparation (mm)
          Scenario =  # Scenario application? (not used)
          on start_of_day:
```
   if (today = date('[TillageDate]') then
      if ('[Disturbance]' = 'low') then
         SurfaceOM tillage type = user_defined, f_incorp = 0.2, tillage_depth = [tillage_depth]
      elseif ('[Disturbance]' = 'medium') then
         SurfaceOM tillage type = user_defined, f_incorp = 0.5, tillage_depth = [tillage_depth]
      else
         SurfaceOM tillage type = user_defined, f_incorp = 0.8, tillage_depth = [tillage_depth]
      endif
   endif
```
        manager Constants
          on init:
```
TodayDate = 0
TodayDateFull = 0
StartSeasonDate = 0
StartSeasonDateFull = 0
ResetDate = 0
ResetDateFull = 0
SowDateFull = 0
SowDate = 0
```
          on start_of_day:
```
TodayDate=date('02-Jul')
TodayDateFull=date('02/07/2008')
StartSeasonDate=date('01-Apr')
StartSeasonDateFull=date('01/04/2008')
ResetDate=date('23-May')
ResetDateFull=date('23/05/2008')
SowDateFull=date('06/05/2008')
SowDate=date('06-May')
```
          start_of_day
            text:
              TodayDate=date('')
              TodayDateFull=date('')
              StartSeasonDate=date('01-Apr')
              StartSeasonDateFull=date('01/04/2008')
              ResetDate=date('01-Apr')
              ResetDateFull=date('01/04/2008')
              SowDateFull=date('10/05/2008')
              SowDate=date('10-May')
              StationNumber=78078
        manager Script
          on post:
```
   if (CropSown = 'sorghum') then
      if (DaysAfterSowing < 3) then   ! There's a bug in Sorghum when swdef_expan=0 before das = 3
         sw_stress_expan = 0
         sw_stress_photo = 0
         n_stress_expan = 0
         n_stress_photo = 0
      else
         sw_stress_expan = 1 - swdef_expan
         sw_stress_photo = 1 - swdef_photo
         n_stress_expan = 1 - nfact_expan
         n_stress_photo = 1 - nfact_photo
      endif
      leaf_no = LeafNo
      grain_no = GrainNo
      grain_n = GrainGreenN
      flowering_das = FloweringDAS
      maturity_das = MaturityDAS
   endif

   ! Work out when to start doing a daily output of variables.
   ! = min(start season date, reset date, sow date)
   if (StartDailyDate = 0) then
      if (StartSeasonDateFull <= SowDateFull and StartSeasonDateFull <= ResetDateFull) then
         StartDailyDate = StartSeasonDateFull)
      elseif (SowDateFull <= ResetDateFull) then
         StartDailyDate = SowDateFull
      else
         StartDailyDate = ResetDateFull
      endif
   endif

   if (today >= StartDailyDate) then
      act_mods OnDailyOutput

      ! Create a variable that = 1 during the current fallow and has a value
      ! of 0 when not in current fallow.
      if (DaysAfterSowing > 0) then
         CurrentCropFound = 1
      endif
      if (CurrentCropFound = 1 and DaysAfterSowing = 0) then
         CurrentFallow = 1
      endif

   endif

   ! -------------------------------------------------------------
   ! Create a special decile date that starts at
   ! this years start of growing season date
   ! and steps up month at a time
   ! -------------------------------------------------------------
   if (today = StartSeasonDate) then
      DecileDate = StartSeasonDateFull
      DoDecileOutput = 1
   elseif (start_month = 1) then
      DecileDate = add_months('DecileDate, 1')
   endif
   if (DoDecileOutput = 1 and today < StartSeasonDateFull and start_month = 1) then
      act_mods OnDecileOutput
   endif

   ! -------------------------------------------------------------
   ! Create 2 new events for growing season
   ! rainfall calculation - start and end dates.
   ! -------------------------------------------------------------
   if (today = date('1-apr')) then
      act_mods GSRStart      ! Growing season rainfall start.
   endif
   if (today = date('31-oct')) then
      act_mods GSREnd      ! Growing season rainfall end.
   endif

   ! -------------------------------------------------------------
   ! Create 'thismonth' and 'threemonthstime'
   ! events so that Tracker can do its future
   ! rain calculations
   ! -------------------------------------------------------------
   if (sow_year > 0 and month = month(TodayDateFull)) then
      act_mods ThisMonth
      ThreeMonthsTimeDate = today + 90
   endif
   if (today = ThreeMonthsTimeDate) then
      act_mods ThreeMonthsTime
   endif

   ! -----------------------------------------
   ! Improved Zadok_stage
   ! -----------------------------------------
   if (zadok_stage < 30) then
      Z = node_no + 9
      if (Z > 16) then
         Z = 16
      endif
   else
      Z = zadok_stage
   endif

   ! -----------------------------------------
   ! Calculate a state.
   ! -----------------------------------------
   if (StationNumber <= 013999 ) then
      AustState = 'wa'
   elseif (StationNumber <= 015999) then
      AustState = 'nt'
   elseif (StationNumber <= 026999) then
      AustState = 'sa'
   elseif (StationNumber <= 045999) then
      AustState = 'qld'
   elseif (StationNumber <= 075999) then
      AustState = 'nsw/act'
   elseif (StationNumber <= 090999) then
      AustState = 'vic'
   elseif (StationNumber <= 099999) then
      AustState = 'tas'
   else
      AustState = 'unknown'
   endif

   ! -----------------------------------------
   ! Calculate a sowing fertiliser variable.
   ! -----------------------------------------
   if (today = SowDate) then
      SowingFertiliser = fertiliser
   endif

   ! -----------------------------------------
   ! Calculate a pre-sowing fertiliser variable.
   ! -----------------------------------------
   if (today = SowDate) then
      SowingFertiliser = fertiliser
   endif

   if (DaysAfterSowing = 0) then
      PreSowingFertiliser = PreSowingFertiliser + fertiliser
   elseif (harvesttoday = 1) then
      PreSowingFertiliser = 0
   endif

   ! -----------------------------------------
   ! Calculate additive frost risk and heat shock variables.
   ! -----------------------------------------

   MildHeatShockAdditiveCount = MildHeatShockCount + ModerateHeatShockCount + SevereHeatShockCount
   ModerateHeatShockAdditiveCount = ModerateHeatShockCount + SevereHeatShockCount

   MildFrostAdditiveCount = MildFrostCount + ModerateFrostCount + SevereFrostCount
   ModerateFrostAdditiveCount = ModerateFrostCount + SevereFrostCount


   ! -----------------------------------------
   ! Count waterlogging events in crop
   ! -----------------------------------------
   if (runoff > 0 and DaysAfterSowing > 0 and today >= TodayDate) then
      NumConsecWaterLoggedDays = NumConsecWaterLoggedDays + 1
   else
      ! At the end of the water logging event, publish the appropriate events so that tracker can count them.
      if (NumConsecWaterLoggedDays >= 1) then
         act_mods WaterLog1OrMore
      endif
      if (NumConsecWaterLoggedDays >= 2) then
         act_mods WaterLog2OrMore
      endif
      if (NumConsecWaterLoggedDays >= 3) then
         act_mods WaterLog3OrMore
      endif
      if (NumConsecWaterLoggedDays >= 4) then
         act_mods WaterLog4OrMore
      endif
      if (NumConsecWaterLoggedDays >= 5) then
         act_mods WaterLog5OrMore
      endif
      if (NumConsecWaterLoggedDays >= 6) then
         act_mods WaterLog6OrMore
      endif
      NumConsecWaterLoggedDays = 0
   endif
```
          on end_of_day:
```
   AvTemp = (maxt + mint) / 2
   AmountWaterLeft = SwToday - CritSWToday
   AmountWaterAboveCLL = SwToday - CLLToday
   if (AmountWaterAboveCLL < 0) then
      AmountWaterAboveCLL = 0
   endif
   Nitrogen = no3() + nh4()
   NitrogenAvailToRoots = NToday
   AvailableWater = sw_dep() - ll_dep()

   PAWC = dul_dep() - ll_dep()
   NUptakeKgHa = no3_uptake() * -1                            ! convert to positive number
   NInPlant = (biomass_n * 10) + (RootGreenN * 10)    ! unit conversion g/m2 to kg/ha
   NInGrain = GrainTotalN * 10     ! unit conversion g/m2 to kg/ha


   if (DaysAfterSowing = 1) then
      Zadok11Das = 0
      Zadok12Das = 0
      Zadok13Das = 0
      Zadok14Das = 0
      Zadok15Das = 0
      Zadok16Das = 0
      Zadok30Das = 0
      Zadok31Das = 0
      Zadok32Das = 0
      Zadok37Das = 0
      Zadok39Das = 0
      Zadok45Das = 0
      Zadok55Das = 0
      Zadok65Das = 0
      Zadok75Das = 0
   endif
   if (Z >= 11 and Zadok11Das = 0) then
      Zadok11Das = DaysAfterSowing
   elseif (Z >= 12 and Zadok12Das = 0) then
      Zadok12Das = DaysAfterSowing
   elseif (Z >= 13 and Zadok13Das = 0) then
      Zadok13Das = DaysAfterSowing
   elseif (Z >= 14 and Zadok14Das = 0) then
      Zadok14Das = DaysAfterSowing
   elseif (Z >= 15 and Zadok15Das = 0) then
      Zadok15Das = DaysAfterSowing
   elseif (Z >= 16 and Zadok16Das = 0) then
      Zadok16Das = DaysAfterSowing
   elseif (Z >= 30 and Zadok30Das = 0) then
      Zadok30Das = DaysAfterSowing
   elseif (Z >= 31 and Zadok31Das = 0) then
      Zadok31Das = DaysAfterSowing
   elseif (Z >= 32 and Zadok32Das = 0) then
      Zadok32Das = DaysAfterSowing
   elseif (Z >= 37 and Zadok37Das = 0) then
      Zadok37Das = DaysAfterSowing
   elseif (Z >= 39 and Zadok39Das = 0) then
      Zadok39Das = DaysAfterSowing
   elseif (Z >= 45 and Zadok45Das = 0) then
      Zadok45Das = DaysAfterSowing
   elseif (Z >= 55 and Zadok55Das = 0) then
      Zadok55Das = DaysAfterSowing
   elseif (Z >= 65 and Zadok65Das = 0) then
      Zadok65Das = DaysAfterSowing
   elseif (Z >= 75 and Zadok75Das = 0) then
      Zadok75Das = DaysAfterSowing
   endif
```
          on sowing:
          script: same as in ShallowSoilSampleHighCL.Paddock.Management.Script
          on harvesting:
          script: same as in ShallowSoilSampleHighCL.Paddock.Management.Script
          on reseting:
          script: same as in ShallowSoilSampleHighCL.Paddock.Management.Script
          on start_of_day:
```
   if (today = StartSeasonDate-1) then
      act_mods EndSeason
   elseif (today = StartSeasonDate) then
      act_mods StartSeason
   endif

   if (today = TodayDate or today = simulation_start_date) then
      act_mods CurrentDay
   endif

   ! ----------------------------------------------------
   ! StartOfYear and EndOfYear events
   ! ----------------------------------------------------
   if (today = date('1-jan')) then
      act_mods StartOfYear
   endif
```
          on init:
```
      CurrentFallow = 0
      Z = 0
      Zadok11Das = 0
      Zadok12Das = 0
      Zadok13Das = 0
      Zadok14Das = 0
      Zadok15Das = 0
      Zadok16Das = 0
      Zadok30Das = 0
      Zadok31Das = 0
      Zadok32Das = 0
      Zadok37Das = 0
      Zadok39Das = 0
      Zadok45Das = 0
      Zadok55Das = 0
      Zadok65Das = 0
      Zadok75Das = 0
      StartDailyDate = 0
      CurrentCropFound = 0
      DecileDate  = 0
      DoDecileOutput  = 0
      ThreeMonthsTimeDate  = 0
      PreSowingFertiliser = 0
      Nitrogen = 0
      FloweringDate = 0

   NumConsecWaterLoggedDays = 0
```
          on flowering:
```
! Calculate a flowering date where the date is always relative to the sowing date this year
! Used on the sowing opportunity report.
FloweringDate = SowDateFull + DaysAfterSowing
```
        manager CanolaOilConc
          on start_of_day:
```
   if (DaysAfterSowing = 1) then
      cum_temp = 0
      cum_swdef = 0
      cum_days = 0

   elseif (StageName = 'start_grain_fill' or
                StageName = 'end_grain_fill' or
                StageName = 'maturity' or
                StageName = 'harvest_ripe') then
      cum_temp = cum_temp + (maxt + mint) / 2
      cum_swdef = cum_swdef + swdef_photo
      cum_days = cum_days + 1
   endif

   ! calculate canola oil content
   if (cum_days > 0) then
      avg_temp = cum_temp / cum_days
      avg_swdef = cum_swdef / cum_days
      if (avg_temp <= 14) then
         oil_conc =  47
      else
         oil_conc = (47 - ((avg_temp - 14)*1.21)) - (1.91*(1 - avg_swdef^2))
      endif
   else
      oil_conc = 0
   endif
```
          on init:
```
      cum_temp = 0
      cum_swdef = 0
      cum_days = 0
```
        manager StubbleRemoved (disabled)
          StubbleRemovedDate = 1/1/1800  # Enter date to remove stubble on
          StubbleRemovedDateFull = 1/1/1800  # Enter full date to remove stubble on (not used)
          StubbleRemovedAmount = 30  # Amount of stubble removed (%)
          on start_of_day:
```
   if (today = date('[StubbleRemovedDate]') then
      [Name]Percent = [StubbleRemovedAmount] / 100
      SurfaceOM tillage type = user_defined, f_incorp = [Name]Percent , tillage_depth = 0
   endif
```
        manager VariableSowing (disabled)
          # Sowing criteria
          date1 = 15-may  # Enter sowing window START date (dd-mmm)
          date2 = 10-jul  # Enter sowing window END date (dd-mmm)
          must_sow = no  # Must sow?
          raincrit = 30  # Amount of rainfall
          rainnumdays = 3  # Number of days of rainfall
          # Sowing parameters
          crop = wheat  # Enter name of crop to sow
          SowingDensity = 100  # Enter sowing density (plants/m2)
          depth = 30  # Enter sowing depth (mm)
          cultivar = yitpi  # Enter cultivar
          class = plant  # Enter crop growth class
          RowSpacing = 250  # Enter row spacing (mm, m for sorghum)
          skiprow = solid  # Skip row (sorghum only)
          ftn = 1  # Enter Fertile Tiller No. (sorghum only)
          # Furrow irrigation hack
          FurrowIrrigation = no  # Turn furrow irrigation hack on?
          FurrowRowSpacing =  # Furrow row spacing (m)
          BedRowSpacing =  # Bed row spacing (m)
          BedWidth =  # Bed width (m)
          on start_of_day:
```
   if (paddock_is_fallow()) then
         if (date_within('[date1], [date2]') = 1) then
            if (rain[[rainnumdays]] >= [raincrit]) OR
                ('[must_sow]' = 'yes' AND today = date('[date2]'))) THEN

              sow_year = year
              if ('[FurrowIrrigation]' = 'yes') then
                 skiprow = (4 * (([BedRowSpacing] - 0.2)^2) + 3 * (([FurrowRowSpacing] - 0.2)^2) ) / (1 + (([BedRowSpacing] - [FurrowRowSpacing]) * [BedWidth])^2)
                 [crop] sow plants =[SowingDensity], sowing_depth = [depth], cultivar = [cultivar], row_spacing = [RowSpacing], crop_class = [class], tiller_no_fertile = [ftn] (), skip = [skiprow], skiprow = skiprow
              else
                 [crop] sow plants =[SowingDensity], sowing_depth = [depth], cultivar = [cultivar], row_spacing = [RowSpacing], crop_class = [class], tiller_no_fertile = [ftn] (), skip = [skiprow]
              endif

            endif
         endif
    endif
```
        manager NTopUp (disabled)
          # When should fertiliser be applied
          GrowthStage = 49  # From Sowing to Zadok stage number
          Threshold = 40  # When nitrogen falls below (kg/ha)
          # Fertiliser application details
          FertModule = Fertiliser  # Module used to apply the fertiliser
          Amount = 25  # Amount of fertiliser to apply (kg/ha)
          on start_of_day:
```
   if (DaysAfterSowing > 0 AND Z <= [GrowthStage]  AND Nitrogen < [Threshold]) then
        [FertModule] apply amount = [Amount] (kg/ha), depth = 20 (mm), type = no3_n ()
   endif
```
        manager Sowing irrigation (disabled)
          # Details
          IrrigateModule = Irrigation  # Module used to apply the irrigation
          IrrigateAmount = 10  # Amount of irrigation to apply (mm)
          on sowing:
```
   '[IrrigateModule]' set irrigation_efficiency = 1
   '[IrrigateModule]' apply amount = [IrrigateAmount] (mm)
```
        manager ResetNitrogen (disabled)
          # When should a reset be done
          ResetDate = 1-apr  # Enter date of reset (dd-mmm)
          # Reset details
          soilmodule = Soil  # Name of your soil module
          on start_of_day:
```
   ! If the reset date is after the sow date then we want to reset on both sowing and on the reset date.
   ! Otherwise, just reset on the reset date.
   DoReset = 0
   if (date('[ResetDate]')> SowDate) then
      if (today = date('[ResetDate]') or (today = SowDate and ResetDate - SowDate < 90)) then
         DoReset = 1
      endif
   elseif (today = date('[ResetDate]')) then
         DoReset = 1
   endif

   if (DoReset = 1) then
       '[soilmodule] Nitrogen' reset
       act_mods reseting
   endif
```
        manager Fertilise1
          # When should fertiliser be applied
          FertDate = 06-Aug  # Enter fertiliser date (dd-mmm)
          FertDateFull = 06/08/2008  # Fertiliser date (not used)
          # Fertiliser application details
          FertModule = fertiliser  # Module used to apply the fertiliser
          FertAmount = 37  # Amount of fertiliser to apply (kg/ha)
          FertType = NO3_N  # Fertiliser type
          Scenario = no  # Is this a scenario fertiliser?
          on start_of_day:
          script: same as in ShallowSoilSampleHighCL.Paddock.Management.Fertilise
        manager Fertilise2
          # When should fertiliser be applied
          FertDate = 04-Sep  # Enter fertiliser date (dd-mmm)
          FertDateFull = 04/09/2008  # Fertiliser date (not used)
          # Fertiliser application details
          FertModule = fertiliser  # Module used to apply the fertiliser
          FertAmount = 23  # Amount of fertiliser to apply (kg/ha)
          FertType = NO3_N  # Fertiliser type
          Scenario = no  # Is this a scenario fertiliser?
          on start_of_day:
          script: same as in ShallowSoilSampleHighCL.Paddock.Management.Fertilise
      fertiliser
      irrigation
        automatic_irrigation = off
        asw_depth = 600.0  # Depth to which ASW is calculated. (mm)
        crit_fr_asw = 0.5  # Fraction of ASW below which irrigation is applied (0-1.0)
        irrigation_efficiency = 1.0  # Efficiency of the irrigation. (0-1.0)
        default_no3_conc = 0.0  # Nitrate concentration (ppm N)
        default_nh4_conc = 0.0  # Ammonium concentration (ppm N)
        default_cl_conc = 0.0  # Chloride concentration (ppm Cl)
      surfaceom
        PoolName = wheat  # Organic Matter pool name
        type = canola  # Organic Matter type
        mass = 1000  # Initial surface residue (kg/ha)
        cnr = 80  # C:N ratio of initial residue
        standing_fraction = 0  # Fraction of residue standing
      wheat
      barley (disabled)
      canola (disabled)
      oats (disabled)
      sorghum (disabled)
      outputfile Yearly: filename=ShallowSoilSampleHighCL Yearly.out; Title=2008^Alan Bennett^Buckley Corner
        events Reporting Frequency: event=daily
        variables
          variable:
            dd/mm/yyyy as Date
            sow_year
            DaysAfterSowing
            simulation_end_date format dd/mm/yyyy
            biomass
            wetyield
            Grain_protein
            grain_n
            grain_no
            oil_conc
            leaf_no
            sw_stress_expan
            sw_stress_photo
            n_stress_expan
            n_stress_photo
            Hay
            Z
            Zadok11Das
            Zadok12Das
            Zadok13Das
            Zadok14Das
            Zadok15Das
            Zadok16Das
            Zadok30Das
            Zadok31Das
            Zadok32Das
            Zadok37Das
            Zadok39Das
            Zadok45Das
            Zadok55Das
            Zadok65Das
            Zadok75Das
            flowering_das
            maturity_das
            root_depth
            Bank
            TwoTimesCost
            CurrentFallow
            MildFrostCount
            ModerateFrostCount
            SevereFrostCount
            MildHeatShockCount
            ModerateHeatShockCount
            SevereHeatShockCount
            InCropRain
            InCropIrrigation
            rain
            runoff
            SumRunoffToSowing
            drain
            es
            ep
            sw_dep()
            AvailableWater
            AmountWaterAboveCLL
            AvailableWaterAtSowing
            AmountWaterLeft
            ll_dep()
            no3() format 3
            nh4() format 3
            Nitrogen
            NitrogenAtSowing
            NUptakeKgHa
            soil_loss
            SumSoilLossToSowing
            dlt_n_min_tot() format 3
            dnit() format 3
            leach_no3 format 3
            NInPlant
            NToday
            CLLToday
            DulToday
            SwToday
            CritSWToday
            SowDate format dd/mmm
            AustState
            plants
            TopDressFertiliser
            PreSowingFertiliser
            SowingFertiliser
            GSR
            pawc
            CumNStressExpan
            CumNStressPhoto
            TotalNUptake
            TotalES
            TotalEP
            MildHeatShockAdditiveCount
            ModerateHeatShockAdditiveCount
            MildFrostAdditiveCount
            ModerateFrostAdditiveCount
            NumWaterLoggingEventsFor1OrMoreDays
            NumWaterLoggingEventsFor2OrMoreDays
            NumWaterLoggingEventsFor3OrMoreDays
            NumWaterLoggingEventsFor4OrMoreDays
            NumWaterLoggingEventsFor5OrMoreDays
            NumWaterLoggingEventsFor6OrMoreDays
            NInGrain
            InCropMineralisation format 3
            InCropNitrification format 3
            InCropNLeaching format 3
            CumSWStressExpan
            CumSWStressPhoto
            CumSWStressPhotoSowToFI
            CumSWStressPhotoFIToFlowering
            CumSWStressPhotoFloweringToHarvesting
            CumNStressPhotoSowToFI
            CumNStressPhotoFIToFlowering
            CumNStressPhotoFloweringToHarvesting
            FloweringDate format dd/mm/yyyy
            CropBiomass
            HayGrossMargin
            GrainGrossMargin
            RainToMaturity
            HayBiomass
          constants: Crop=Wheat
      tracker
        variable:
          sum of unpatched_rain on start_of_day from StartSeason to EndSeason as SeasonalRainUnPatched
          sum of unpatched_rain on start_of_day from ThisMonth to ThreeMonthsTime as RainInComingMonths
          value of HayBiomass on flowering as Hay
          sum of runoff on end_of_day from CurrentDay to sowing as SumRunoffToSowing
          sum of soil_loss on end_of_day  from CurrentDay to sowing as SumSoilLossToSowing
          value of AvailableWater on sowing as AvailableWaterAtSowing
          value of Nitrogen on sowing as NitrogenAtSowing
          sum of rain on end_of_day from sowing to harvesting as InCropRain
          sum of irrigation on end_of_day from sowing to harvesting as InCropIrrigation
          sum of fertiliser on end_of_day from emergence to harvesting as TopDressFertiliser
          sum of rain on end_of_day from GSRStart to GSREnd as GSR
          sum of n_stress_expan on end_of_day from sowing to harvesting as CumNStressExpan
          sum of n_stress_photo on end_of_day from sowing to harvesting as CumNStressPhoto
          sum of NUptakeKgHa on end_of_day from sowing to harvesting as TotalNUptake
          sum of es on end_of_day from sowing to harvesting as TotalES
          sum of ep on end_of_day from sowing to harvesting as TotalEP
          sum of rain on end_of_day from startofyear to endofyear as AnnualRain
          count of WaterLog1OrMore from sowing to harvesting as NumWaterLoggingEventsFor1OrMoreDays
          count of WaterLog2OrMore from sowing to harvesting as NumWaterLoggingEventsFor2OrMoreDays
          count of WaterLog3OrMore from sowing to harvesting as NumWaterLoggingEventsFor3OrMoreDays
          count of WaterLog4OrMore from sowing to harvesting as NumWaterLoggingEventsFor4OrMoreDays
          count of WaterLog5OrMore from sowing to harvesting as NumWaterLoggingEventsFor5OrMoreDays
          count of WaterLog6OrMore from sowing to harvesting as NumWaterLoggingEventsFor6OrMoreDays
          sum of dlt_n_min_tot() on end_of_day from sowing to harvesting as InCropMineralisation
          sum of dnit() on end_of_day from sowing to harvesting as InCropNitrification
          sum of leach_no3 on end_of_day from sowing to harvesting as InCropNLeaching
          sum of sw_stress_expan on end_of_day from sowing to harvesting as CumSWStressExpan
          sum of sw_stress_photo on end_of_day from sowing to harvesting as CumSWStressPhoto
          sum of sw_stress_photo on end_of_day from sowing to floral_initiation as CumSWStressPhotoSowToFI
          sum of sw_stress_photo on end_of_day from floral_initiation to flowering as CumSWStressPhotoFIToFlowering
          sum of sw_stress_photo on end_of_day from flowering to harvesting as CumSWStressPhotoFloweringToHarvesting
          sum of n_stress_photo on end_of_day from sowing to floral_initiation as CumNStressPhotoSowToFI
          sum of n_stress_photo on end_of_day from floral_initiation to flowering as CumNStressPhotoFIToFlowering
          sum of n_stress_photo on end_of_day from flowering to harvesting as CumNStressPhotoFloweringToHarvesting
          sum of rain on end_of_day from CurrentDay to harvesting as RainToMaturity
      soil: Site=Nhill; Region=Wimmera; State=Victoria; Longitude=141.651; UseEC=no; MaxRootDepth=180
        NearestTown = Nhill
        Latitude = -36.33  # Latitude (WGS84)
        LocationAccuracy = Regional Soil Type
        DataSource = Based on Soil Characterisation undertaken by Birchip Cropping Group 2003
        Comment = OC & pH estimated in all layers; EC estimated in 10-30, 70-100 & 100-130 cm layers; CLL Barley estimated; CLL Oats estimated  # Comments
        Water
          Layer:
            Thickness (mm)  BD (g/cc)  AirDry (mm/mm)  LL15 (mm/mm)  DUL (mm/mm)  SAT (mm/mm)
            100             1.36       0.135           0.27          0.365        0.457
            300             1.216      0.214           0.267         0.461        0.511
            300             1.24       0.261           0.261         0.43         0.502
            300             1.32       0.261           0.261         0.412        0.472
            300             1.372      0.261           0.261         0.402        0.452
            300             1.368      0.261           0.261         0.404        0.454
          SoilCrop wheat
            Layer:
              Thickness (mm)  LL (mm/mm)  KL (/day)  XF (0-1)
              100             0.27        0.06       0.58
              300             0.267       0.06       0.42
              300             0.261       0.06       0.25
              300             0.315       0.04       0.17
              300             0.402       0.04       0.17
              300             0.402       0.02       0.17
          SoilCrop barley
            Layer:
              Thickness (mm)  LL (mm/mm)  KL (/day)  XF (0-1)
              100             0.27        0.07       0.58
              300             0.267       0.07       0.42
              300             0.261       0.07       0.25
              300             0.315       0.05       0.17
              300             0.402       0.05       0.17
              300             0.402       0.03       0.17
          SoilCrop oats: same as ShallowSoilSampleHighCL.Paddock.Soil.Water.wheat
        SoilWat: SummerCona=3.5; SummerU=6; SummerDate=1-Nov; WinterCona=2; WinterU=2; WinterDate=1-apr; DiffusConst=40; DiffusSlope=16; Salb=0.12; CN2Bare=73; CNRed=20; CNCov=0.8
          Layer:
            Thickness (mm)  SWCON (0-1)
            100             0.3
            300             0.3
            300             0.3
            300             0.3
            300             0.3
            300             0.3
        SoilOrganicMatter: RootCN=40; RootWT=1000; SoilCN=12; EnrACoeff=7.4; EnrBCoeff=0.2
          Layer:
            Thickness (mm)  OC (Total %)  FBiom (0-1)  FInert (0-1)
            100             1.05          0.04         0.4
            300             0.45          0.02         0.5
            300             0.3           0.02         0.7
            300             0.3           0.02         1
            300             0.25          0.01         1
            300             0.25          0.01         1
        Analysis
          Layer:
            Thickness (mm)  Texture  EC (1:5 dS/m)  PH (1:5 water)  CL (mg/kg)  Boron (Hot water mg/kg)  CEC (cmol+/kg)  Ca (cmol+/kg)  Mg (cmol+/kg)  Na (cmol+/kg)  K (cmol+/kg)  ESP (%)
            100             Clay     0.3            7.7             38          5.8                      29.3            4000           710            920            200           2.9
            300             -        0.4            8.3             -           -                        -               -              -              -              -             -
            300             -        1.1            9.2             500         48                       38.4            2100           1800           570            2600          29.4
            300             -        1.5            9               490         42                       37.8            2000           1600           520            3000          34.5
            300             -        1.5            9               500         -                        -               -              -              -              -             -
            300             -        1.5            9               500         -                        -               -              -              -              -             -
        Sample Soil sample 1
          Layer:
            Thickness (mm)  NO3 (ppm)  NH4 (ppm)  SW (grav. mm/mm)
            100             23         3          0.103
            300             7          1          0.238
            300             2          1          0.253
            300             1          1          0.247
        Sample Soil sample 2
          Layer:
            Thickness (mm)  OC (Total %)  EC (1:5 dS/m)  PH (CaCl2)  CL (mg/kg)
            100             1.35          0.193          5.6         87
            300             -             0.508          8           244
            300             -             1.052          8.4         823
            300             -             1.219          8.5         1227
      erosion
        model = freebairn  # Model Name
        slope = 0  # Slope of plot in percent (%)
        slope_length = 600  # Length of plot (m)
        k_factor = 0.4  # Soil erodibility factor (t/ha/EI 30 )
        p_factor = 1  # Supporting practise factor (unitless)
        bed_depth = 5000  # Depth to bedrock (mm)
        profile_reduction = off
        profile_layer_merge = 0.05  # Fraction of original size in which the lowest layer is merged into the layer above (0-1)
        minimum_depth = 100  # If the profile erodes to this depth, the simulation is stopped (mm)
      YPCalc
  simulation ESP
    clock
    metfile met: filename=89034.met
    patchinput: filename=Tatyoon Rural^Russell Duver - Paddock13.rain
    summaryfile
    area Paddock
      folder Management
        manager GrossMargin: same as ShallowSoilSampleHighCL.Paddock.Management.GrossMargin
        manager Reset
          # When should a reset be done
          ResetDate = 15-Apr  # Enter date of reset (dd-mmm)
          # Reset details
          soilmodule = Soil  # Name of your soil module
          surfaceommodule = SurfaceOM  # Name of your surface organic matter module
          resetWater = yes  # Reset soil water?
          resetNitrogen = yes  # Reset soil nitrogen?
          resetSurfaceOM = yes  # Reset surface organic matter?
          on start_of_day:
          script: same as in ShallowSoilSampleHighCL.Paddock.Management.Reset
        manager Sow
          # Sowing criteria
          sowdate = 27-Jun  # Enter sowing date (dd-mmm)
          # Sowing parameters
          crop = Wheat  # Enter name of crop to sow
          SowingDensity = 150  # Enter sowing density (plants/m2)
          depth = 30  # Enter sowing depth (mm)
          cultivar = Mitre  # Enter cultivar
          class = plant  # Enter crop growth class
          RowSpacing = 250  # Enter row spacing (mm, m for sorghum)
          skiprow = solid  # Skip row (sorghum only)
          ftn = 1  # Enter Fertile Tiller No. (sorghum only)
          # Furrow irrigation hack
          FurrowIrrigation = no  # Turn furrow irrigation hack on?
          FurrowRowSpacing =  # Furrow row spacing (m)
          BedRowSpacing =  # Bed row spacing (m)
          BedWidth =  # Bed width (m)
          on start_of_day:
          script: same as in ShallowSoilSampleHighCL.Paddock.Management.Sow
          on init:
```
   sow_year = 0
```
        manager Sowing tillage: same as ShallowSoilSampleHighCL.Paddock.Management.Sowing tillage
        manager Harvest: same as ShallowSoilSampleHighCL.Paddock.Management.Harvest
        manager Yield moisture correction
          on start_of_day:
          script: same as in ShallowSoilSampleHighCL.Paddock.Management.Yield moisture correction
        manager Hay: same as ShallowSoilSampleHighCL.Paddock.Management.Hay
        manager MildFrost: same as ShallowSoilSampleHighCL.Paddock.Management.MildFrost
        manager ModerateFrost: same as ShallowSoilSampleHighCL.Paddock.Management.ModerateFrost
        manager SevereFrost: same as ShallowSoilSampleHighCL.Paddock.Management.SevereFrost
        manager MildHeatShock: same as ShallowSoilSampleHighCL.Paddock.Management.MildHeatShock
        manager ModerateHeatShock: same as ShallowSoilSampleHighCL.Paddock.Management.ModerateHeatShock
        manager SevereHeatShock: same as ShallowSoilSampleHighCL.Paddock.Management.SevereHeatShock
        manager Fertilise
          # When should fertiliser be applied
          FertDate = 27-Jun  # Enter fertiliser date (dd-mmm)
          FertDateFull = 27/06/2008  # Fertiliser date (not used)
          # Fertiliser application details
          FertModule = fertiliser  # Module used to apply the fertiliser
          FertAmount = 8  # Amount of fertiliser to apply (kg/ha)
          FertType = NO3_N  # Fertiliser type
          Scenario = no  # Is this a scenario fertiliser?
          on start_of_day:
          script: same as in ShallowSoilSampleHighCL.Paddock.Management.Fertilise
        manager Irrigate (disabled): same as ShallowSoilSampleHighCL.Paddock.Management.Irrigate
        manager Tillage (disabled): same as ShallowSoilSampleHighCL.Paddock.Management.Tillage
        manager Constants
          on init:
          script: same as in ShallowSoilSampleHighCL.Paddock.Management.Constants
          on start_of_day:
          script: same as in ShallowSoilSampleHighCL.Paddock.Management.Constants
          start_of_day
            text:
              TodayDate=date('')
              TodayDateFull=date('')
              StartSeasonDate=date('01-Apr')
              StartSeasonDateFull=date('01/04/2008')
              ResetDate=date('15-Apr')
              ResetDateFull=date('15/04/2008')
              SowDateFull=date('27/06/2008')
              SowDate=date('27-Jun')
              StationNumber=89034
        manager Script: same as ShallowSoilSampleHighCL.Paddock.Management.Script
        manager CanolaOilConc: same as ShallowSoilSampleHighCL.Paddock.Management.CanolaOilConc
        manager StubbleRemoved (disabled): same as ShallowSoilSampleHighCL.Paddock.Management.StubbleRemoved
        manager VariableSowing (disabled): same as ShallowSoilSampleHighCL.Paddock.Management.VariableSowing
        manager NTopUp (disabled): same as ShallowSoilSampleHighCL.Paddock.Management.NTopUp
        manager Sowing irrigation (disabled)
          # Details
          IrrigateModule = Irrigation  # Module used to apply the irrigation
          IrrigateAmount = 10  # Amount of irrigation to apply (mm)
          on sowing:
          script: same as in ShallowSoilSampleHighCL.Paddock.Management.Sowing irrigation
        manager ResetNitrogen (disabled): same as ShallowSoilSampleHighCL.Paddock.Management.ResetNitrogen
        manager Fertilise1
          # When should fertiliser be applied
          FertDate = 09-Sep  # Enter fertiliser date (dd-mmm)
          FertDateFull = 09/09/2008  # Fertiliser date (not used)
          # Fertiliser application details
          FertModule = fertiliser  # Module used to apply the fertiliser
          FertAmount = 32  # Amount of fertiliser to apply (kg/ha)
          FertType = NO3_N  # Fertiliser type
          Scenario = no  # Is this a scenario fertiliser?
          on start_of_day:
          script: same as in ShallowSoilSampleHighCL.Paddock.Management.Fertilise
      fertiliser
      irrigation: same as ShallowSoilSampleHighCL.Paddock.Irrigation
      surfaceom
        PoolName = wheat  # Organic Matter pool name
        type = canola  # Organic Matter type
        mass = 1500  # Initial surface residue (kg/ha)
        cnr = 80  # C:N ratio of initial residue
        standing_fraction = 0  # Fraction of residue standing
      wheat
      barley (disabled)
      canola (disabled)
      oats (disabled)
      sorghum (disabled)
      outputfile Yearly: filename=ESP Yearly.out; Title=2008^Tatyoon Rural^Russell Duver - Paddock13
        events Reporting Frequency: event=daily
        variables
          variable:
            dd/mm/yyyy as Date
            sow_year
            DaysAfterSowing
            simulation_end_date format dd/mm/yyyy
            biomass
            wetyield
            Grain_protein
            grain_n
            grain_no
            oil_conc
            leaf_no
            sw_stress_expan
            sw_stress_photo
            n_stress_expan
            n_stress_photo
            Hay
            Z
            Zadok11Das
            Zadok12Das
            Zadok13Das
            Zadok14Das
            Zadok15Das
            Zadok16Das
            Zadok30Das
            Zadok31Das
            Zadok32Das
            Zadok37Das
            Zadok39Das
            Zadok45Das
            Zadok55Das
            Zadok65Das
            Zadok75Das
            flowering_das
            maturity_das
            root_depth
            Bank
            TwoTimesCost
            CurrentFallow
            MildFrostCount
            ModerateFrostCount
            SevereFrostCount
            MildHeatShockCount
            ModerateHeatShockCount
            SevereHeatShockCount
            InCropRain
            InCropIrrigation
            rain
            runoff
            SumRunoffToSowing
            drain
            es
            ep
            sw_dep()
            AvailableWater
            AmountWaterAboveCLL
            AvailableWaterAtSowing
            AmountWaterLeft
            ll_dep()
            no3() format 3
            nh4() format 3
            Nitrogen
            NitrogenAtSowing
            NUptakeKgHa
            soil_loss
            SumSoilLossToSowing
            dlt_n_min_tot() format 3
            dnit() format 3
            leach_no3 format 3
            NInPlant
            NToday
            CLLToday
            DulToday
            SwToday
            CritSWToday
            SowDate format dd/mmm
            AustState
            plants
            TopDressFertiliser
            PreSowingFertiliser
            SowingFertiliser
            GSR
            pawc
            CumNStressExpan
            CumNStressPhoto
            TotalNUptake
            TotalES
            TotalEP
            MildHeatShockAdditiveCount
            ModerateHeatShockAdditiveCount
            MildFrostAdditiveCount
            ModerateFrostAdditiveCount
            NumWaterLoggingEventsFor1OrMoreDays
            NumWaterLoggingEventsFor2OrMoreDays
            NumWaterLoggingEventsFor3OrMoreDays
            NumWaterLoggingEventsFor4OrMoreDays
            NumWaterLoggingEventsFor5OrMoreDays
            NumWaterLoggingEventsFor6OrMoreDays
            NInGrain
            InCropMineralisation format 3
            InCropNitrification format 3
            InCropNLeaching format 3
            CumSWStressExpan
            CumSWStressPhoto
            CumSWStressPhotoSowToFI
            CumSWStressPhotoFIToFlowering
            CumSWStressPhotoFloweringToHarvesting
            CumNStressPhotoSowToFI
            CumNStressPhotoFIToFlowering
            CumNStressPhotoFloweringToHarvesting
            FloweringDate format dd/mm/yyyy
            CropBiomass
            HayGrossMargin
            GrainGrossMargin
            RainToMaturity
            HayBiomass
          Constants: Title=2008^Tatyoon Rural^Russell Duver - Paddock13; Crop=Wheat
      tracker: same as ShallowSoilSampleHighCL.Paddock.Tracker
      soil: Site=Wagga Wagga; Region=South West Slopes; State=New South Wales; Longitude=147.354; UseEC=no; MaxRootDepth=180
        NearestTown = Wagga Wagga
        Latitude = -35.123  # Latitude (WGS84)
        LocationAccuracy = Regional Soil Type
        DataSource = PAWC estimated by A. Peake, CSIRO Sustainable Ecosystems (2005)
        Comment = CLL Barley estimated; CLL Oats estimated  # Comments
        Water
          Layer:
            Thickness (mm)  BD (g/cc)  AirDry (mm/mm)  LL15 (mm/mm)  DUL (mm/mm)  SAT (mm/mm)
            100             1.55       0.06            0.12          0.24         0.38
            100             1.55       0.08            0.1           0.22         0.39
            200             1.5        0.12            0.12          0.24         0.4
            200             1.5        0.12            0.12          0.34         0.4
            300             1.55       0.12            0.12          0.34         0.4
            300             1.55       0.12            0.12          0.34         0.4
            300             1.55       0.12            0.12          0.34         0.4
          SoilCrop wheat
            Layer:
              Thickness (mm)  LL (mm/mm)  KL (/day)  XF (0-1)
              100             0.12        0.06       1
              100             0.1         0.06       1
              200             0.12        0.04       1
              200             0.17        0.04       1
              300             0.18        0.03       1
              300             0.22        0.02       1
              300             0.29        0.02       1
          SoilCrop barley
            Layer:
              Thickness (mm)  LL (mm/mm)  KL (/day)  XF (0-1)
              100             0.12        0.07       1
              100             0.1         0.07       1
              200             0.12        0.07       1
              200             0.17        0.07       1
              300             0.18        0.05       1
              300             0.22        0.05       1
              300             0.29        0.03       1
          SoilCrop oats: same as ESP.Paddock.Soil.Water.wheat
        SoilWat: SummerCona=3.5; SummerU=6; SummerDate=1-Nov; WinterCona=2; WinterU=2; WinterDate=1-apr; DiffusConst=88; DiffusSlope=35; Salb=0.13; CN2Bare=78; CNRed=20; CNCov=0.8
          Layer:
            Thickness (mm)  SWCON (0-1)
            100             0.6
            100             0.5
            200             0.5
            200             0.4
            300             0.3
            300             0.3
            300             0.3
        SoilOrganicMatter: RootCN=45; RootWT=1500; SoilCN=12.5; EnrACoeff=7.4; EnrBCoeff=0.2
          Layer:
            Thickness (mm)  OC (Total %)  FBiom (0-1)  FInert (0-1)
            100             1.6           0.03         0.4
            100             0.8           0.02         0.5
            200             0.4           0.02         0.7
            200             0.2           0.01         0.8
            300             0.1           0.01         0.9
            300             0.1           0.01         1
            300             0.1           0.01         1
        Analysis
          Layer:
            Thickness (mm)  EC (1:5 dS/m)  PH (1:5 water)  ESP (%)
            100             0.1            6.6             1
            100             0.1            5.3             2
            200             0.1            6               4
            200             0.1            6.6             8
            300             0.1            9               16
            300             0.1            9               32
            300             0.1            9               32
        Sample Soil sample 1
          Layer:
            Thickness (mm)  NO3 (ppm)  NH4 (ppm)  SW (grav. mm/mm)
            100             5.6        0          0.072
            200             2.4        0          0.057
            200             2          0          0.109
            250             1.5        0          0.133
        Sample Soil sample 2
          Layer:
            Thickness (mm)  OC (Total %)  EC (1:5 dS/m)  PH (CaCl2)  CL (mg/kg)
            100             1.65          0.104          5.1         109
            200             -             0.112          6.2         653
            200             -             0.228          7           67
            250             -             0.591          8.5         161
      erosion: same as ShallowSoilSampleHighCL.Paddock.Erosion
      YPCalc
