folder MyallValeExp04: version=32
  simulation EXP_04_TRT01
    clock: start_date=1/1/1977; end_date=11/10/1978
    summaryfile
    metfile met: filename=myall_apsim.met
    area paddock
      outputfile report: filename=EXP_04_TRT01 report.out; title=EXP_04_TRT01 report
        variables
          variable:
            year
            day
            manager.yield_acre as yld/acre
            Cotton2.das as DaysAfterSowing
            Cotton2.sites
            Cotton2.squarz
            Cotton2.bollz
            Cotton2.openz
            Cotton2.lai
            Cotton2.availn
            manager.pesw_depth as soil_w
            Cotton2.bload
            Cotton2.frun
            Cotton2.carcap_c
            Cotton2.carcap_n
            Cotton2.smi
            Cotton2.vnstrs
            Cotton2.fnstrs
            Cotton2.uptakn
            Cotton2.totnup
            Cotton2.wli
            no3()
            nh4()
            dnit()
            dlt_n_min()
            no3_leach(6)
            fom_n()
            hum_n()
            biom_n()
            dlt_rntrf()
            dlt_n_min_tot()
            dlt_fom_n_min()
            dlt_res_nh4_min()
            dlt_biom_n_min()
            dlt_hum_n_min()
            biom_n()
            biom_c()
            biom_c(1)
            eo
            Cotton2.evap_pot
            Cotton2.dm
            Cotton2.dw_boll
            Cotton2.frudw_tot
            Cotton2.dw_stem
            Cotton2.dw_leaf
            Cotton2.dw_root
            Cotton2.frudw_shed
      outputfile report_harvest: filename=EXP_04_TRT01 report_harvest.out; title=EXP_04_TRT01 report_harvest
        variables
          variable:
            year
            day
            manager.yield_acre as yld/acre
            Cotton2.das as DaysAfterSowing
            Cotton2.openz
            Cotton2.lint
            Cotton2.bolls_sc
            Cotton2.lai_max
            Cotton2.nuptake
            Cotton2.squarz_max
      operations
        01/10/1977  fertiliser apply amount = 0. (kg/ha), type = nh4_n, depth = 10
        30/09/1977  'soil nitrogen' set no3 = 7.0 14.1 11.5 10.9 10.9 9.6 0.1
        11/10/1977  Cotton2 sow cultivar = dp16, sowing_depth = 50. (mm), row_spacing = 1000. (mm), plants_pm = 10. , skiprow = 0  (end_of_day)
      fertiliser
      irrigation
        automatic_irrigation = off
        asw_depth = 600  # Depth to which ASW is calculated. (mm)
        crit_fr_asw = 0.5  # Fraction of ASW below which irrigation is applied (0-1.0)
        irrigation_efficiency = 1  # Efficiency of the irrigation. (0-1.0)
        irrigation_allocation = off  # Allocation limits
        allocation = 0  # Allocation in mm
        default_no3_conc = 0.0  # Nitrate concentration (ppm N)
        default_nh4_conc = 0.0  # Ammonium concentration (ppm N)
        default_cl_conc = 0.0  # Chloride concentration (ppm Cl)
        default_no3_conc = 0.0  # Nitrate concentration (ppm N)
        default_nh4_conc = 0.0  # Ammonium concentration (ppm N)
        default_cl_conc = 0.0  # Chloride concentration (ppm Cl)
      manager
        on start_of_day:
```
            if day = 264 or day = 294  or day = 343  or day = 362  or day = 25  or day = 45  or day = 58  or day = 75             then
               deficit = sat_dep() - sw_dep()
               irrigation.amount = deficit
            endif
            ! ------------------ exp_04_trt02 --------------------------------
```
        on end_of_day:
```
               yield_acre = yield/2.5
               sw_depth = sw_dep()
               ll15_depth = ll15_dep()
               pesw_depth = sw_depth - ll15_depth
               if (Cotton2.crop_in <> 0) then
                  report do_output
               endif
               if (Cotton2.ozcot_status > 0) then
                 report_harvest do_output
                 Cotton2 harvest
                 Cotton2 end_crop
               endif
```
      soil
        Water
          Layer:
            Thickness (mm)  BD (g/cc)  AirDry (mm/mm)  LL15 (mm/mm)  DUL (mm/mm)  SAT (mm/mm)
            100.            1.36       0.085           0.17          0.4069       0.4569
            200.            1.37       0.16875         0.1875        0.4015       0.4515
            200.            1.39       0.24            0.24          0.3940       0.4440
            200.            1.35       0.27            0.27          0.4096       0.4596
            200.            1.34       0.29            0.29          0.4134       0.4634
            200.            1.36       0.31            0.31          0.4053       0.4553
            200.            1.36       0.25            0.25          0.4080       0.4580
          SoilCrop Cotton2
            Layer:
              Thickness (mm)  ll (mm/mm)  kl (/day)  xf (0-1)
              100             0.17        0.1        1
              200             0.188       0.1        1
              200             0.24        0.1        1
              200             0.27        0.1        1
              200             0.29        0.09       1
              200             0.31        0.07       1
              200             0.25        0.05       1
        SoilWat: SummerCona=3.5; SummerU=6.0; SummerDate=1-Nov; WinterCona=3.5; WinterU=6.0; WinterDate=1-Apr; DiffusConst=40.0; DiffusSlope=16.0; Salb=0.13; Cn2Bare=73.; CnRed=20; CnCov=0.8
          Layer:
            Thickness (mm)  SWCON (0-1)
            100.            0.200
            200.            0.200
            200.            0.200
            200.            0.200
            200.            0.200
            200.            0.200
            200.            0.200
        SoilOrganicMatter: RootCn=80.0; RootWt=1000.0; SoilCn=14.5; EnrACoeff=7.4; EnrBCoeff=0.2
          Layer:
            Thickness (mm)  OC (Total %)  FBiom (0-1)  FInert (0-1)
            100.            1.0           0.060        0.58
            200.            1.0           0.0275       0.7
            200.            0.45          0.0175       0.98
            200.            0.45          0.01         0.99
            200.            0.45          0.01         0.99
            200.            0.45          0.01         0.99
            200.            0.45          0.01         0.99
        Analysis
          Layer:
            Thickness (mm)  PH (1:5 water)
            100.            7.600
            200.            7.700
            200.            7.800
            200.            7.800
            200.            7.900
            200.            8.000
            200.            8.000
        Sample Initial nitrogen
          Layer:
            Thickness (mm)  NO3 (ppm)  NH4 (ppm)
            100.            14.3       0.300
            200.            12.6       0.300
            200.            6.75       0.300
            200.            6          0.500
            200.            6          0.500
            200.            4          0.500
            200.            1.9        0.500
        Sample Initial water
          Layer:
            Thickness (mm)  SW (mm/mm)
            100.            0.4069
            200.            0.4015
            200.            0.3940
            200.            0.4096
            200.            0.4134
            200.            0.4053
            200.            0.4080
      surfaceom
        PoolName = wheat  # Organic Matter pool name
        type = wheat  # Organic Matter type
        mass = 0.  # Initial surface residue (kg/ha)
        cnr = 33.  # C:N ratio of initial residue
        standing_fraction = 0.0  # Fraction of residue standing
      Cotton2
        initsection
          crop_type = Cotton
          leaf_res_n_conc = 0.02
          hucut = 40  # oC
          baset = 12  # oC
          ul1 = 1.4
          cona = 0.35
          open_def = 60  # %
          a_root_leaf = 1.01
          a_stem_leaf = 1.25
          e_par = 2.5  # g/MJ
          specific_lw = 58  # g/m^2
          t_opt = 25  # oC
          t_base = 8  # oC
          wt_area_max = 150
          embryo = 0.75  # g
          f_leaf = 0.6
          f_stem = 0.15
          f_root = 0.25
          elevation_default = 200  # m
          wlog_assimilate_red = 0.2
          wlog_carcap_red = 0.2
          watlog_c = 0.87
          watlog_n = 0.87
          wlog_carcap_red_stress = 0.01
          smi_affect_wlog = 0.75
          days_relief_wlog = 7  # days
          frost_kill_immediate = 2  # oC
          rtdep_max = 130  # cm
          harvest_n_frac = 0.85
          cutout_smi_crit = 0.75
          cutout_smi_days = 5  # days
          cutout_smi_site_red = 0.1
          epcoef1 = 3.051
          epcoef2 = 2.436
          epcoef_smi_crit = 0.5
          fbwstr_low = 0
          fbwstr_high = 0.5
          fbwstr_a = 1
          fbnstr_low = 0
          fbnstr_high = 0.5
          fbnstr_a = 1
          relp_smi_crit = 0.5
          relp_intercept = 0.25
          relp_slope = 0.864
          relp_low = 0
          relp_high = 1
          relp_a = 0.5
          vsnstr_low = 0
          vsnstr_high = 0.9
          vsnstr_a = 1
          flfsmi_low = 0
          flfsmi_high = 0.5
          flfsmi_a = 1
          vlnstr_low = 0
          vlnstr_high = 0.9
          vlnstr_a = 1
          fw_low = 0
          fw_high = 0.25
          fw_a = 1
          adjust_low = 0
          adjust_high = 5
          adjust_a = 1
          fwstrs_low = 0
          fwstrs_high = 0.5
          fwstrs_a = 4
          smi_delay_crit = 0.25
          cold_shock_delay_crit = 11  # oC
          cold_shock_delay = 5.2  # dd
          fert_crit = 1  # kg/ha
          fert_detect = 10  # kg/ha
          days_since_fert_max = 100  # days
          percent_l = 42  # %
          scboll = 4.7  # g
          respcon = 0.01593
          sqcon = 0.0217
          fcutout = 0.5411
          flai = 0.52
          ddisq = 402
          popcon = 0.03633
          acotyl = 525  # mm^2
          rlai = 0.01
          fburr = 1.23
          dlds_max = 0.12
          rate_emergence = 1  # mm/dd
          Background_retention = 0.8
          cultivar_default = S189
          plants_pm_default = 10
          sowing_depth_default = 50  # mm
          row_spacing_default = 1000  # mm
          skiprow_default = 0
          co2 = 350  # mm
          init cultivars: array=T
            element
              cultivar = CS50
              percent_l = 43
              scboll = 3.8
              respcon = 0.01593
              sqcon = 0.0181
              fcutout = 0.5411
              flai = 0.52
              DDISQ = 402
              TIPOUT = 52
              FRUDD = [50, 169, 329, 356, 499, 642, 857, 1099]
              BLTME = [0, 0, 0, 0.07, 0.21, 0.33, 0.55, 1]
              WT = [0.0104, 0.0272, 0.1441, 0.0988, 0.5042, 0.9617, 1, 0.5785]
              dlds_max = 0.12
              rate_emergence = 1
              popcon = 0.03633
              fburr = 1.23
              ACOTYL = 525
              RLAI = 0.01
              BckGndRetn = 0
  simulation EXP_04_TRT02
    clock: start_date=1/1/1977; end_date=11/10/1978
    summaryfile
    metfile met: filename=myall_apsim.met
    area paddock
      outputfile report: filename=EXP_04_TRT02 report.out; title=EXP_04_TRT02 report
        variables: same as EXP_04_TRT01.paddock.report.variables
      outputfile report_harvest: filename=EXP_04_TRT02 report_harvest.out; title=EXP_04_TRT02 report_harvest
        variables
          variable:
            year
            day
            manager.yield_acre as yld/acre
            Cotton2.das as DaysAfterSowing
            Cotton2.openz
            Cotton2.lint
            Cotton2.bolls_sc
            Cotton2.lai_max
            Cotton2.nuptake
            Cotton2.squarz_max
      operations
        01/10/1977  fertiliser apply amount = 50. (kg/ha), type = nh4_n, depth = 10
        30/09/1977  'soil nitrogen' set no3 = 7.0 14.1 11.5 10.9 10.9 9.6 0.1
        11/10/1977  Cotton2 sow cultivar = dp16, sowing_depth = 50. (mm), row_spacing = 1000. (mm), plants_pm = 10. , skiprow = 0  (end_of_day)
      fertiliser
      irrigation: same as EXP_04_TRT01.paddock.irrigation
      manager
        on start_of_day:
```
            if day = 264 or day = 294  or day = 343  or day = 362  or day = 25  or day = 45  or day = 58  or day = 75             then
               deficit = sat_dep() - sw_dep()
               irrigation.amount = deficit
            endif
            ! ------------------ exp_04_trt03 --------------------------------
```
        on end_of_day:
        script: same as in EXP_04_TRT01.paddock.manager
      soil: same as EXP_04_TRT01.paddock.soil
      surfaceom
        PoolName = wheat  # Organic Matter pool name
        type = wheat  # Organic Matter type
        mass = 0.  # Initial surface residue (kg/ha)
        cnr = 33.  # C:N ratio of initial residue
        standing_fraction = 0.0  # Fraction of residue standing
      Cotton2
        initsection
          crop_type = Cotton
          leaf_res_n_conc = 0.02
          hucut = 40  # oC
          baset = 12  # oC
          ul1 = 1.4
          cona = 0.35
          open_def = 60  # %
          a_root_leaf = 1.01
          a_stem_leaf = 1.25
          e_par = 2.5  # g/MJ
          specific_lw = 58  # g/m^2
          t_opt = 25  # oC
          t_base = 8  # oC
          wt_area_max = 150
          embryo = 0.75  # g
          f_leaf = 0.6
          f_stem = 0.15
          f_root = 0.25
          elevation_default = 200  # m
          wlog_assimilate_red = 0.2
          wlog_carcap_red = 0.2
          watlog_c = 0.87
          watlog_n = 0.87
          wlog_carcap_red_stress = 0.01
          smi_affect_wlog = 0.75
          days_relief_wlog = 7  # days
          frost_kill_immediate = 2  # oC
          rtdep_max = 130  # cm
          harvest_n_frac = 0.85
          cutout_smi_crit = 0.75
          cutout_smi_days = 5  # days
          cutout_smi_site_red = 0.1
          epcoef1 = 3.051
          epcoef2 = 2.436
          epcoef_smi_crit = 0.5
          fbwstr_low = 0
          fbwstr_high = 0.5
          fbwstr_a = 1
          fbnstr_low = 0
          fbnstr_high = 0.5
          fbnstr_a = 1
          relp_smi_crit = 0.5
          relp_intercept = 0.25
          relp_slope = 0.864
          relp_low = 0
          relp_high = 1
          relp_a = 0.5
          vsnstr_low = 0
          vsnstr_high = 0.9
          vsnstr_a = 1
          flfsmi_low = 0
          flfsmi_high = 0.5
          flfsmi_a = 1
          vlnstr_low = 0
          vlnstr_high = 0.9
          vlnstr_a = 1
          fw_low = 0
          fw_high = 0.25
          fw_a = 1
          adjust_low = 0
          adjust_high = 5
          adjust_a = 1
          fwstrs_low = 0
          fwstrs_high = 0.5
          fwstrs_a = 4
          smi_delay_crit = 0.25
          cold_shock_delay_crit = 11  # oC
          cold_shock_delay = 5.2  # dd
          fert_crit = 1  # kg/ha
          fert_detect = 10  # kg/ha
          days_since_fert_max = 100  # days
          percent_l = 42  # %
          scboll = 4.7  # g
          respcon = 0.01593
          sqcon = 0.0217
          fcutout = 0.5411
          flai = 0.52
          ddisq = 402
          popcon = 0.03633
          acotyl = 525  # mm^2
          rlai = 0.01
          fburr = 1.23
          dlds_max = 0.12
          rate_emergence = 1  # mm/dd
          Background_retention = 0.8
          cultivar_default = S189
          plants_pm_default = 10
          sowing_depth_default = 50  # mm
          row_spacing_default = 1000  # mm
          skiprow_default = 0
          init cultivars: same as EXP_04_TRT01.paddock.Cotton2.initsection.cultivars
  simulation EXP_04_TRT03
    clock: start_date=1/1/1977; end_date=11/10/1978
    summaryfile
    metfile met: filename=myall_apsim.met
    area paddock
      outputfile report: filename=EXP_04_TRT03 report.out; title=EXP_04_TRT03 report
        variables: same as EXP_04_TRT01.paddock.report.variables
      outputfile report_harvest: filename=EXP_04_TRT03 report_harvest.out; title=EXP_04_TRT03 report_harvest
        variables
          variable:
            year
            day
            manager.yield_acre as yld/acre
            Cotton2.das as DaysAfterSowing
            Cotton2.openz
            Cotton2.lint
            Cotton2.bolls_sc
            Cotton2.lai_max
            Cotton2.nuptake
            Cotton2.squarz_max
      operations
        01/10/1977  fertiliser apply amount = 100. (kg/ha), type = nh4_n, depth = 10
        30/09/1977  'soil nitrogen' set no3 = 7.0 14.1 11.5 10.9 10.9 9.6 0.1
        11/10/1977  Cotton2 sow cultivar = dp16, sowing_depth = 50. (mm), row_spacing = 1000. (mm), plants_pm = 10. , skiprow = 0  (end_of_day)
      fertiliser
      irrigation: same as EXP_04_TRT01.paddock.irrigation
      manager
        on start_of_day:
```
            if day = 264 or day = 294  or day = 343  or day = 362  or day = 25  or day = 45  or day = 58  or day = 75             then
               deficit = sat_dep() - sw_dep()
               irrigation.amount = deficit
            endif
            ! ------------------ exp_04_trt04 --------------------------------
```
        on end_of_day:
        script: same as in EXP_04_TRT01.paddock.manager
      soil: same as EXP_04_TRT01.paddock.soil
      surfaceom
        PoolName = wheat  # Organic Matter pool name
        type = wheat  # Organic Matter type
        mass = 0.  # Initial surface residue (kg/ha)
        cnr = 33.  # C:N ratio of initial residue
        standing_fraction = 0.0  # Fraction of residue standing
      Cotton2: same as EXP_04_TRT02.paddock.Cotton2
  simulation EXP_04_TRT04
    clock: start_date=1/1/1977; end_date=11/10/1978
    summaryfile
    metfile met: filename=myall_apsim.met
    area paddock
      outputfile report: filename=EXP_04_TRT04 report.out; title=EXP_04_TRT04 report
        variables: same as EXP_04_TRT01.paddock.report.variables
      outputfile report_harvest: filename=EXP_04_TRT04 report_harvest.out; title=EXP_04_TRT04 report_harvest
        variables
          variable:
            year
            day
            manager.yield_acre as yld/acre
            Cotton2.das as DaysAfterSowing
            Cotton2.openz
            Cotton2.lint
            Cotton2.bolls_sc
            Cotton2.lai_max
            Cotton2.nuptake
            Cotton2.squarz_max
      operations
        01/10/1977  fertiliser apply amount = 150. (kg/ha), type = nh4_n, depth = 10
        30/09/1977  'soil nitrogen' set no3 = 7.0 14.1 11.5 10.9 10.9 9.6 0.1
        11/10/1977  Cotton2 sow cultivar = dp16, sowing_depth = 50. (mm), row_spacing = 1000. (mm), plants_pm = 10. , skiprow = 0  (end_of_day)
      fertiliser
      irrigation: same as EXP_04_TRT01.paddock.irrigation
      manager
        on start_of_day:
```
            if day = 264 or day = 294  or day = 343  or day = 362  or day = 25  or day = 45  or day = 58  or day = 75             then
               deficit = sat_dep() - sw_dep()
               irrigation.amount = deficit
            endif
            ! ------------------ exp_04_trt05 --------------------------------
```
        on end_of_day:
        script: same as in EXP_04_TRT01.paddock.manager
      soil: same as EXP_04_TRT01.paddock.soil
      surfaceom
        PoolName = wheat  # Organic Matter pool name
        type = wheat  # Organic Matter type
        mass = 0.  # Initial surface residue (kg/ha)
        cnr = 33.  # C:N ratio of initial residue
        standing_fraction = 0.0  # Fraction of residue standing
      Cotton2: same as EXP_04_TRT02.paddock.Cotton2
  simulation EXP_04_TRT05
    clock: start_date=1/1/1977; end_date=11/10/1978
    summaryfile
    metfile met: filename=myall_apsim.met
    area paddock
      outputfile report: filename=EXP_04_TRT05 report.out; title=EXP_04_TRT05 report
        variables: same as EXP_04_TRT01.paddock.report.variables
      outputfile report_harvest: filename=EXP_04_TRT05 report_harvest.out; title=EXP_04_TRT05 report_harvest
        variables
          variable:
            year
            day
            manager.yield_acre as yld/acre
            Cotton2.das as DaysAfterSowing
            Cotton2.openz
            Cotton2.lint
            Cotton2.bolls_sc
            Cotton2.lai_max
            Cotton2.nuptake
            Cotton2.squarz_max
      operations: same as EXP_04_TRT01.paddock.Operations
      fertiliser
      irrigation: same as EXP_04_TRT01.paddock.irrigation
      manager
        on start_of_day:
```
            if day = 264 or day = 294  or day = 343  or day = 362  or day = 25  or day = 51  or day = 69              then
               deficit = sat_dep() - sw_dep()
               irrigation.amount = deficit
            endif
            ! ------------------ exp_04_trt06 --------------------------------
```
        on end_of_day:
        script: same as in EXP_04_TRT01.paddock.manager
      soil: same as EXP_04_TRT01.paddock.soil
      surfaceom
        PoolName = wheat  # Organic Matter pool name
        type = wheat  # Organic Matter type
        mass = 0.  # Initial surface residue (kg/ha)
        cnr = 33.  # C:N ratio of initial residue
        standing_fraction = 0.0  # Fraction of residue standing
      Cotton2: same as EXP_04_TRT02.paddock.Cotton2
  simulation EXP_04_TRT06
    clock: start_date=1/1/1977; end_date=11/10/1978
    summaryfile
    metfile met: filename=myall_apsim.met
    area paddock
      outputfile report: filename=EXP_04_TRT06 report.out; title=EXP_04_TRT06 report
        variables: same as EXP_04_TRT01.paddock.report.variables
      outputfile report_harvest: filename=EXP_04_TRT06 report_harvest.out; title=EXP_04_TRT06 report_harvest
        variables
          variable:
            year
            day
            manager.yield_acre as yld/acre
            Cotton2.das as DaysAfterSowing
            Cotton2.openz
            Cotton2.lint
            Cotton2.bolls_sc
            Cotton2.lai_max
            Cotton2.nuptake
            Cotton2.squarz_max
      operations: same as EXP_04_TRT02.paddock.Operations
      fertiliser
      irrigation: same as EXP_04_TRT01.paddock.irrigation
      manager
        on start_of_day:
```
            if day = 264 or day = 294  or day = 343  or day = 362  or day = 25  or day = 51  or day = 69              then
               deficit = sat_dep() - sw_dep()
               irrigation.amount = deficit
            endif
            ! ------------------ exp_04_trt07 --------------------------------
```
        on end_of_day:
        script: same as in EXP_04_TRT01.paddock.manager
      soil: same as EXP_04_TRT01.paddock.soil
      surfaceom
        PoolName = wheat  # Organic Matter pool name
        type = wheat  # Organic Matter type
        mass = 0.  # Initial surface residue (kg/ha)
        cnr = 33.  # C:N ratio of initial residue
        standing_fraction = 0.0  # Fraction of residue standing
      Cotton2: same as EXP_04_TRT02.paddock.Cotton2
  simulation EXP_04_TRT07
    clock: start_date=1/1/1977; end_date=11/10/1978
    summaryfile
    metfile met: filename=myall_apsim.met
    area paddock
      outputfile report: filename=EXP_04_TRT07 report.out; title=EXP_04_TRT07 report
        variables: same as EXP_04_TRT01.paddock.report.variables
      outputfile report_harvest: filename=EXP_04_TRT07 report_harvest.out; title=EXP_04_TRT07 report_harvest
        variables
          variable:
            year
            day
            manager.yield_acre as yld/acre
            Cotton2.das as DaysAfterSowing
            Cotton2.openz
            Cotton2.lint
            Cotton2.bolls_sc
            Cotton2.lai_max
            Cotton2.nuptake
            Cotton2.squarz_max
      operations: same as EXP_04_TRT03.paddock.Operations
      fertiliser
      irrigation: same as EXP_04_TRT01.paddock.irrigation
      manager
        on start_of_day:
```
            if day = 264 or day = 294  or day = 343  or day = 362  or day = 25  or day = 51  or day = 69              then
               deficit = sat_dep() - sw_dep()
               irrigation.amount = deficit
            endif
            ! ------------------ exp_04_trt08 --------------------------------
```
        on end_of_day:
        script: same as in EXP_04_TRT01.paddock.manager
      soil: same as EXP_04_TRT01.paddock.soil
      surfaceom
        PoolName = wheat  # Organic Matter pool name
        type = wheat  # Organic Matter type
        mass = 0.  # Initial surface residue (kg/ha)
        cnr = 33.  # C:N ratio of initial residue
        standing_fraction = 0.0  # Fraction of residue standing
      Cotton2: same as EXP_04_TRT02.paddock.Cotton2
  simulation EXP_04_TRT08
    clock: start_date=1/1/1977; end_date=11/10/1978
    summaryfile
    metfile met: filename=myall_apsim.met
    area paddock
      outputfile report: filename=EXP_04_TRT08 report.out; title=EXP_04_TRT08 report
        variables: same as EXP_04_TRT01.paddock.report.variables
      outputfile report_harvest: filename=EXP_04_TRT08 report_harvest.out; title=EXP_04_TRT08 report_harvest
        variables
          variable:
            year
            day
            manager.yield_acre as yld/acre
            Cotton2.das as DaysAfterSowing
            Cotton2.openz
            Cotton2.lint
            Cotton2.bolls_sc
            Cotton2.lai_max
            Cotton2.nuptake
            Cotton2.squarz_max
      operations: same as EXP_04_TRT04.paddock.Operations
      fertiliser
      irrigation: same as EXP_04_TRT01.paddock.irrigation
      manager
        on start_of_day:
```
            if day = 264 or day = 294  or day = 343  or day = 362  or day = 25  or day = 51  or day = 69              then
               deficit = sat_dep() - sw_dep()
               irrigation.amount = deficit
            endif
            ! ------------------ exp_04_trt09 --------------------------------
```
        on end_of_day:
        script: same as in EXP_04_TRT01.paddock.manager
      soil: same as EXP_04_TRT01.paddock.soil
      surfaceom
        PoolName = wheat  # Organic Matter pool name
        type = wheat  # Organic Matter type
        mass = 0.  # Initial surface residue (kg/ha)
        cnr = 33.  # C:N ratio of initial residue
        standing_fraction = 0.0  # Fraction of residue standing
      Cotton2: same as EXP_04_TRT02.paddock.Cotton2
  simulation EXP_04_TRT09
    clock: start_date=1/1/1977; end_date=11/10/1978
    summaryfile
    metfile met: filename=myall_apsim.met
    area paddock
      outputfile report: filename=EXP_04_TRT09 report.out; title=EXP_04_TRT09 report
        variables: same as EXP_04_TRT01.paddock.report.variables
      outputfile report_harvest: filename=EXP_04_TRT09 report_harvest.out; title=EXP_04_TRT09 report_harvest
        variables
          variable:
            year
            day
            manager.yield_acre as yld/acre
            Cotton2.das as DaysAfterSowing
            Cotton2.openz
            Cotton2.lint
            Cotton2.bolls_sc
            Cotton2.lai_max
            Cotton2.nuptake
            Cotton2.squarz_max
      operations: same as EXP_04_TRT01.paddock.Operations
      fertiliser
      irrigation: same as EXP_04_TRT01.paddock.irrigation
      manager
        on start_of_day:
```
            if day = 264 or day = 294  or day = 343  or day = 362  or day = 25  or day = 58               then
               deficit = sat_dep() - sw_dep()
               irrigation.amount = deficit
            endif
            ! ------------------ exp_04_trt10 --------------------------------
```
        on end_of_day:
        script: same as in EXP_04_TRT01.paddock.manager
      soil: same as EXP_04_TRT01.paddock.soil
      surfaceom
        PoolName = wheat  # Organic Matter pool name
        type = wheat  # Organic Matter type
        mass = 0.  # Initial surface residue (kg/ha)
        cnr = 33.  # C:N ratio of initial residue
        standing_fraction = 0.0  # Fraction of residue standing
      Cotton2: same as EXP_04_TRT02.paddock.Cotton2
  simulation EXP_04_TRT10
    clock: start_date=1/1/1977; end_date=11/10/1978
    summaryfile
    metfile met: filename=myall_apsim.met
    area paddock
      outputfile report: filename=EXP_04_TRT10 report.out; title=EXP_04_TRT10 report
        variables: same as EXP_04_TRT01.paddock.report.variables
      outputfile report_harvest: filename=EXP_04_TRT10 report_harvest.out; title=EXP_04_TRT10 report_harvest
        variables
          variable:
            year
            day
            manager.yield_acre as yld/acre
            Cotton2.das as DaysAfterSowing
            Cotton2.openz
            Cotton2.lint
            Cotton2.bolls_sc
            Cotton2.lai_max
            Cotton2.nuptake
            Cotton2.squarz_max
      operations: same as EXP_04_TRT02.paddock.Operations
      fertiliser
      irrigation: same as EXP_04_TRT01.paddock.irrigation
      manager
        on start_of_day:
```
            if day = 264 or day = 294  or day = 343  or day = 362  or day = 25  or day = 58               then
               deficit = sat_dep() - sw_dep()
               irrigation.amount = deficit
            endif
            ! ------------------ exp_04_trt11 --------------------------------
```
        on end_of_day:
        script: same as in EXP_04_TRT01.paddock.manager
      soil: same as EXP_04_TRT01.paddock.soil
      surfaceom
        PoolName = wheat  # Organic Matter pool name
        type = wheat  # Organic Matter type
        mass = 0.  # Initial surface residue (kg/ha)
        cnr = 33.  # C:N ratio of initial residue
        standing_fraction = 0.0  # Fraction of residue standing
      Cotton2: same as EXP_04_TRT02.paddock.Cotton2
  simulation EXP_04_TRT11
    clock: start_date=1/1/1977; end_date=11/10/1978
    summaryfile
    metfile met: filename=myall_apsim.met
    area paddock
      outputfile report: filename=EXP_04_TRT11 report.out; title=EXP_04_TRT11 report
        variables: same as EXP_04_TRT01.paddock.report.variables
      outputfile report_harvest: filename=EXP_04_TRT11 report_harvest.out; title=EXP_04_TRT11 report_harvest
        variables
          variable:
            year
            day
            manager.yield_acre as yld/acre
            Cotton2.das as DaysAfterSowing
            Cotton2.openz
            Cotton2.lint
            Cotton2.bolls_sc
            Cotton2.lai_max
            Cotton2.nuptake
            Cotton2.squarz_max
      operations: same as EXP_04_TRT03.paddock.Operations
      fertiliser
      irrigation: same as EXP_04_TRT01.paddock.irrigation
      manager
        on start_of_day:
```
            if day = 264 or day = 294  or day = 343  or day = 362  or day = 25  or day = 58               then
               deficit = sat_dep() - sw_dep()
               irrigation.amount = deficit
            endif
            ! ------------------ exp_04_trt12 --------------------------------
```
        on end_of_day:
        script: same as in EXP_04_TRT01.paddock.manager
      soil: same as EXP_04_TRT01.paddock.soil
      surfaceom
        PoolName = wheat  # Organic Matter pool name
        type = wheat  # Organic Matter type
        mass = 0.  # Initial surface residue (kg/ha)
        cnr = 33.  # C:N ratio of initial residue
        standing_fraction = 0.0  # Fraction of residue standing
      Cotton2: same as EXP_04_TRT02.paddock.Cotton2
  simulation EXP_04_TRT12
    clock: start_date=1/1/1977; end_date=11/10/1978
    summaryfile
    metfile met: filename=myall_apsim.met
    area paddock
      outputfile report: filename=EXP_04_TRT12 report.out; title=EXP_04_TRT12 report
        variables: same as EXP_04_TRT01.paddock.report.variables
      outputfile report_harvest: filename=EXP_04_TRT12 report_harvest.out; title=EXP_04_TRT12 report_harvest
        variables
          variable:
            year
            day
            manager.yield_acre as yld/acre
            Cotton2.das as DaysAfterSowing
            Cotton2.openz
            Cotton2.lint
            Cotton2.bolls_sc
            Cotton2.lai_max
            Cotton2.nuptake
            Cotton2.squarz_max
      operations: same as EXP_04_TRT04.paddock.Operations
      fertiliser
      irrigation: same as EXP_04_TRT01.paddock.irrigation
      manager
        on start_of_day:
```
            if day = 264 or day = 294  or day = 343  or day = 362  or day = 25  or day = 58               then
               deficit = sat_dep() - sw_dep()
               irrigation.amount = deficit
            endif
            ! ------------------ exp_04_trt13 --------------------------------
```
        on end_of_day:
        script: same as in EXP_04_TRT01.paddock.manager
      soil: same as EXP_04_TRT01.paddock.soil
      surfaceom
        PoolName = wheat  # Organic Matter pool name
        type = wheat  # Organic Matter type
        mass = 0.  # Initial surface residue (kg/ha)
        cnr = 33.  # C:N ratio of initial residue
        standing_fraction = 0.0  # Fraction of residue standing
      Cotton2: same as EXP_04_TRT02.paddock.Cotton2
  simulation EXP_04_TRT13
    clock: start_date=1/1/1977; end_date=11/10/1978
    summaryfile
    metfile met: filename=myall_apsim.met
    area paddock
      outputfile report: filename=EXP_04_TRT13 report.out; title=EXP_04_TRT13 report
        variables: same as EXP_04_TRT01.paddock.report.variables
      outputfile report_harvest: filename=EXP_04_TRT13 report_harvest.out; title=EXP_04_TRT13 report_harvest
        variables
          variable:
            year
            day
            manager.yield_acre as yld/acre
            Cotton2.das as DaysAfterSowing
            Cotton2.openz
            Cotton2.lint
            Cotton2.bolls_sc
            Cotton2.lai_max
            Cotton2.nuptake
            Cotton2.squarz_max
      operations: same as EXP_04_TRT01.paddock.Operations
      fertiliser
      irrigation: same as EXP_04_TRT01.paddock.irrigation
      manager
        on start_of_day:
```
            if day = 264 or day = 294  or day = 362  or day = 45  or day = 58  or day = 75               then
               deficit = sat_dep() - sw_dep()
               irrigation.amount = deficit
            endif
            ! ------------------ exp_04_trt14 --------------------------------
```
        on end_of_day:
        script: same as in EXP_04_TRT01.paddock.manager
      soil: same as EXP_04_TRT01.paddock.soil
      surfaceom
        PoolName = wheat  # Organic Matter pool name
        type = wheat  # Organic Matter type
        mass = 0.  # Initial surface residue (kg/ha)
        cnr = 33.  # C:N ratio of initial residue
        standing_fraction = 0.0  # Fraction of residue standing
      Cotton2: same as EXP_04_TRT02.paddock.Cotton2
  simulation EXP_04_TRT14
    clock: start_date=1/1/1977; end_date=11/10/1978
    summaryfile
    metfile met: filename=myall_apsim.met
    area paddock
      outputfile report: filename=EXP_04_TRT14 report.out; title=EXP_04_TRT14 report
        variables: same as EXP_04_TRT01.paddock.report.variables
      outputfile report_harvest: filename=EXP_04_TRT14 report_harvest.out; title=EXP_04_TRT14 report_harvest
        variables
          variable:
            year
            day
            manager.yield_acre as yld/acre
            Cotton2.das as DaysAfterSowing
            Cotton2.openz
            Cotton2.lint
            Cotton2.bolls_sc
            Cotton2.lai_max
            Cotton2.nuptake
            Cotton2.squarz_max
      operations: same as EXP_04_TRT02.paddock.Operations
      fertiliser
      irrigation: same as EXP_04_TRT01.paddock.irrigation
      manager
        on start_of_day:
```
            if day = 264 or day = 294  or day = 362  or day = 45  or day = 58  or day = 75               then
               deficit = sat_dep() - sw_dep()
               irrigation.amount = deficit
            endif
            ! ------------------ exp_04_trt15 --------------------------------
```
        on end_of_day:
        script: same as in EXP_04_TRT01.paddock.manager
      soil: same as EXP_04_TRT01.paddock.soil
      surfaceom
        PoolName = wheat  # Organic Matter pool name
        type = wheat  # Organic Matter type
        mass = 0.  # Initial surface residue (kg/ha)
        cnr = 33.  # C:N ratio of initial residue
        standing_fraction = 0.0  # Fraction of residue standing
      Cotton2: same as EXP_04_TRT02.paddock.Cotton2
  simulation EXP_04_TRT15
    clock: start_date=1/1/1977; end_date=11/10/1978
    summaryfile
    metfile met: filename=myall_apsim.met
    area paddock
      outputfile report: filename=EXP_04_TRT15 report.out; title=EXP_04_TRT15 report
        variables: same as EXP_04_TRT01.paddock.report.variables
      outputfile report_harvest: filename=EXP_04_TRT15 report_harvest.out; title=EXP_04_TRT15 report_harvest
        variables
          variable:
            year
            day
            manager.yield_acre as yld/acre
            Cotton2.das as DaysAfterSowing
            Cotton2.openz
            Cotton2.lint
            Cotton2.bolls_sc
            Cotton2.lai_max
            Cotton2.nuptake
            Cotton2.squarz_max
      operations: same as EXP_04_TRT03.paddock.Operations
      fertiliser
      irrigation: same as EXP_04_TRT01.paddock.irrigation
      manager
        on start_of_day:
```
            if day = 264 or day = 294  or day = 362  or day = 45  or day = 58  or day = 75               then
               deficit = sat_dep() - sw_dep()
               irrigation.amount = deficit
            endif
            ! ------------------ exp_04_trt16 --------------------------------
```
        on end_of_day:
        script: same as in EXP_04_TRT01.paddock.manager
      soil: same as EXP_04_TRT01.paddock.soil
      surfaceom
        PoolName = wheat  # Organic Matter pool name
        type = wheat  # Organic Matter type
        mass = 0.  # Initial surface residue (kg/ha)
        cnr = 33.  # C:N ratio of initial residue
        standing_fraction = 0.0  # Fraction of residue standing
      Cotton2: same as EXP_04_TRT02.paddock.Cotton2
  simulation EXP_04_TRT16
    clock: start_date=1/1/1977; end_date=11/10/1978
    summaryfile
    metfile met: filename=myall_apsim.met
    area paddock
      outputfile report: filename=EXP_04_TRT16 report.out; title=EXP_04_TRT16 report
        variables: same as EXP_04_TRT01.paddock.report.variables
      outputfile report_harvest: filename=EXP_04_TRT16 report_harvest.out; title=EXP_04_TRT16 report_harvest
        variables
          variable:
            year
            day
            manager.yield_acre as yld/acre
            Cotton2.das as DaysAfterSowing
            Cotton2.openz
            Cotton2.lint
            Cotton2.bolls_sc
            Cotton2.lai_max
            Cotton2.nuptake
            Cotton2.squarz_max
      operations: same as EXP_04_TRT04.paddock.Operations
      fertiliser
      irrigation: same as EXP_04_TRT01.paddock.irrigation
      manager
        on start_of_day:
```
            if day = 264 or day = 294  or day = 362  or day = 45  or day = 58  or day = 75               then
               deficit = sat_dep() - sw_dep()
               irrigation.amount = deficit
            endif
            ! ------------------ exp_04_trt17 --------------------------------
```
        on end_of_day:
        script: same as in EXP_04_TRT01.paddock.manager
      soil: same as EXP_04_TRT01.paddock.soil
      surfaceom
        PoolName = wheat  # Organic Matter pool name
        type = wheat  # Organic Matter type
        mass = 0.  # Initial surface residue (kg/ha)
        cnr = 33.  # C:N ratio of initial residue
        standing_fraction = 0.0  # Fraction of residue standing
      Cotton2: same as EXP_04_TRT02.paddock.Cotton2
  simulation EXP_04_TRT17
    clock: start_date=1/1/1977; end_date=11/10/1978
    summaryfile
    metfile met: filename=myall_apsim.met
    area paddock
      outputfile report: filename=EXP_04_TRT17 report.out; title=EXP_04_TRT17 report
        variables: same as EXP_04_TRT01.paddock.report.variables
      outputfile report_harvest: filename=EXP_04_TRT17 report_harvest.out; title=EXP_04_TRT17 report_harvest
        variables
          variable:
            year
            day
            manager.yield_acre as yld/acre
            Cotton2.das as DaysAfterSowing
            Cotton2.openz
            Cotton2.lint
            Cotton2.bolls_sc
            Cotton2.lai_max
            Cotton2.nuptake
            Cotton2.squarz_max
      operations: same as EXP_04_TRT01.paddock.Operations
      fertiliser
      irrigation: same as EXP_04_TRT01.paddock.irrigation
      manager
        on start_of_day:
```
            if day = 264 or day = 294  or day = 362  or day = 51  or day = 69                then
               deficit = sat_dep() - sw_dep()
               irrigation.amount = deficit
            endif
            ! ------------------ exp_04_trt18 --------------------------------
```
        on end_of_day:
        script: same as in EXP_04_TRT01.paddock.manager
      soil: same as EXP_04_TRT01.paddock.soil
      surfaceom
        PoolName = wheat  # Organic Matter pool name
        type = wheat  # Organic Matter type
        mass = 0.  # Initial surface residue (kg/ha)
        cnr = 33.  # C:N ratio of initial residue
        standing_fraction = 0.0  # Fraction of residue standing
      Cotton2: same as EXP_04_TRT02.paddock.Cotton2
  simulation EXP_04_TRT18
    clock: start_date=1/1/1977; end_date=11/10/1978
    summaryfile
    metfile met: filename=myall_apsim.met
    area paddock
      outputfile report: filename=EXP_04_TRT18 report.out; title=EXP_04_TRT18 report
        variables: same as EXP_04_TRT01.paddock.report.variables
      outputfile report_harvest: filename=EXP_04_TRT18 report_harvest.out; title=EXP_04_TRT18 report_harvest
        variables
          variable:
            year
            day
            manager.yield_acre as yld/acre
            Cotton2.das as DaysAfterSowing
            Cotton2.openz
            Cotton2.lint
            Cotton2.bolls_sc
            Cotton2.lai_max
            Cotton2.nuptake
            Cotton2.squarz_max
      operations: same as EXP_04_TRT02.paddock.Operations
      fertiliser
      irrigation: same as EXP_04_TRT01.paddock.irrigation
      manager
        on start_of_day:
```
            if day = 264 or day = 294  or day = 362  or day = 51  or day = 69                then
               deficit = sat_dep() - sw_dep()
               irrigation.amount = deficit
            endif
            ! ------------------ exp_04_trt19 --------------------------------
```
        on end_of_day:
        script: same as in EXP_04_TRT01.paddock.manager
      soil: same as EXP_04_TRT01.paddock.soil
      surfaceom
        PoolName = wheat  # Organic Matter pool name
        type = wheat  # Organic Matter type
        mass = 0.  # Initial surface residue (kg/ha)
        cnr = 33.  # C:N ratio of initial residue
        standing_fraction = 0.0  # Fraction of residue standing
      Cotton2: same as EXP_04_TRT02.paddock.Cotton2
  simulation EXP_04_TRT19
    clock: start_date=1/1/1977; end_date=11/10/1978
    summaryfile
    metfile met: filename=myall_apsim.met
    area paddock
      outputfile report: filename=EXP_04_TRT19 report.out; title=EXP_04_TRT19 report
        variables: same as EXP_04_TRT01.paddock.report.variables
      outputfile report_harvest: filename=EXP_04_TRT19 report_harvest.out; title=EXP_04_TRT19 report_harvest
        variables
          variable:
            year
            day
            manager.yield_acre as yld/acre
            Cotton2.das as DaysAfterSowing
            Cotton2.openz
            Cotton2.lint
            Cotton2.bolls_sc
            Cotton2.lai_max
            Cotton2.nuptake
            Cotton2.squarz_max
      operations: same as EXP_04_TRT03.paddock.Operations
      fertiliser
      irrigation: same as EXP_04_TRT01.paddock.irrigation
      manager
        on start_of_day:
```
            if day = 264 or day = 294  or day = 362  or day = 51  or day = 69                then
               deficit = sat_dep() - sw_dep()
               irrigation.amount = deficit
            endif
            ! ------------------ exp_04_trt20 --------------------------------
```
        on end_of_day:
        script: same as in EXP_04_TRT01.paddock.manager
      soil: same as EXP_04_TRT01.paddock.soil
      surfaceom
        PoolName = wheat  # Organic Matter pool name
        type = wheat  # Organic Matter type
        mass = 0.  # Initial surface residue (kg/ha)
        cnr = 33.  # C:N ratio of initial residue
        standing_fraction = 0.0  # Fraction of residue standing
      Cotton2: same as EXP_04_TRT02.paddock.Cotton2
  simulation EXP_04_TRT20
    clock: start_date=1/1/1977; end_date=11/10/1978
    summaryfile
    metfile met: filename=myall_apsim.met
    area paddock
      outputfile report: filename=EXP_04_TRT20 report.out; title=EXP_04_TRT20 report
        variables: same as EXP_04_TRT01.paddock.report.variables
      outputfile report_harvest: filename=EXP_04_TRT20 report_harvest.out; title=EXP_04_TRT20 report_harvest
        variables
          variable:
            year
            day
            manager.yield_acre as yld/acre
            Cotton2.das as DaysAfterSowing
            Cotton2.openz
            Cotton2.lint
            Cotton2.bolls_sc
            Cotton2.lai_max
            Cotton2.nuptake
            Cotton2.squarz_max
      operations: same as EXP_04_TRT04.paddock.Operations
      fertiliser
      irrigation: same as EXP_04_TRT01.paddock.irrigation
      manager
        on start_of_day:
```
            if day = 264 or day = 294  or day = 362  or day = 51  or day = 69                then
               deficit = sat_dep() - sw_dep()
               irrigation.amount = deficit
            endif
            ! ------------------ exp_04_trt21 --------------------------------
```
        on end_of_day:
        script: same as in EXP_04_TRT01.paddock.manager
      soil: same as EXP_04_TRT01.paddock.soil
      surfaceom
        PoolName = wheat  # Organic Matter pool name
        type = wheat  # Organic Matter type
        mass = 0.  # Initial surface residue (kg/ha)
        cnr = 33.  # C:N ratio of initial residue
        standing_fraction = 0.0  # Fraction of residue standing
      Cotton2: same as EXP_04_TRT02.paddock.Cotton2
  simulation EXP_04_TRT21
    clock: start_date=1/1/1977; end_date=11/10/1978
    summaryfile
    metfile met: filename=myall_apsim.met
    area paddock
      outputfile report: filename=EXP_04_TRT21 report.out; title=EXP_04_TRT21 report
        variables: same as EXP_04_TRT01.paddock.report.variables
      outputfile report_harvest: filename=EXP_04_TRT21 report_harvest.out; title=EXP_04_TRT21 report_harvest
        variables
          variable:
            year
            day
            manager.yield_acre as yld/acre
            Cotton2.das as DaysAfterSowing
            Cotton2.openz
            Cotton2.lint
            Cotton2.bolls_sc
            Cotton2.lai_max
            Cotton2.nuptake
            Cotton2.squarz_max
      operations: same as EXP_04_TRT01.paddock.Operations
      fertiliser
      irrigation: same as EXP_04_TRT01.paddock.irrigation
      manager
        on start_of_day:
```
            if day = 264 or day = 294  or day = 362  or day = 58                 then
               deficit = sat_dep() - sw_dep()
               irrigation.amount = deficit
            endif
            ! ------------------ exp_04_trt22 --------------------------------
```
        on end_of_day:
        script: same as in EXP_04_TRT01.paddock.manager
      soil: same as EXP_04_TRT01.paddock.soil
      surfaceom
        PoolName = wheat  # Organic Matter pool name
        type = wheat  # Organic Matter type
        mass = 0.  # Initial surface residue (kg/ha)
        cnr = 33.  # C:N ratio of initial residue
        standing_fraction = 0.0  # Fraction of residue standing
      Cotton2: same as EXP_04_TRT02.paddock.Cotton2
  simulation EXP_04_TRT22
    clock: start_date=1/1/1977; end_date=11/10/1978
    summaryfile
    metfile met: filename=myall_apsim.met
    area paddock
      outputfile report: filename=EXP_04_TRT22 report.out; title=EXP_04_TRT22 report
        variables: same as EXP_04_TRT01.paddock.report.variables
      outputfile report_harvest: filename=EXP_04_TRT22 report_harvest.out; title=EXP_04_TRT22 report_harvest
        variables
          variable:
            year
            day
            manager.yield_acre as yld/acre
            Cotton2.das as DaysAfterSowing
            Cotton2.openz
            Cotton2.lint
            Cotton2.bolls_sc
            Cotton2.lai_max
            Cotton2.nuptake
            Cotton2.squarz_max
      operations: same as EXP_04_TRT02.paddock.Operations
      fertiliser
      irrigation: same as EXP_04_TRT01.paddock.irrigation
      manager
        on start_of_day:
```
            if day = 264 or day = 294  or day = 362  or day = 58                 then
               deficit = sat_dep() - sw_dep()
               irrigation.amount = deficit
            endif
            ! ------------------ exp_04_trt23 --------------------------------
```
        on end_of_day:
        script: same as in EXP_04_TRT01.paddock.manager
      soil: same as EXP_04_TRT01.paddock.soil
      surfaceom
        PoolName = wheat  # Organic Matter pool name
        type = wheat  # Organic Matter type
        mass = 0.  # Initial surface residue (kg/ha)
        cnr = 33.  # C:N ratio of initial residue
        standing_fraction = 0.0  # Fraction of residue standing
      Cotton2: same as EXP_04_TRT02.paddock.Cotton2
  simulation EXP_04_TRT23
    clock: start_date=1/1/1977; end_date=11/10/1978
    summaryfile
    metfile met: filename=myall_apsim.met
    area paddock
      outputfile report: filename=EXP_04_TRT23 report.out; title=EXP_04_TRT23 report
        variables: same as EXP_04_TRT01.paddock.report.variables
      outputfile report_harvest: filename=EXP_04_TRT23 report_harvest.out; title=EXP_04_TRT23 report_harvest
        variables
          variable:
            year
            day
            manager.yield_acre as yld/acre
            Cotton2.das as DaysAfterSowing
            Cotton2.openz
            Cotton2.lint
            Cotton2.bolls_sc
            Cotton2.lai_max
            Cotton2.nuptake
            Cotton2.squarz_max
      operations: same as EXP_04_TRT03.paddock.Operations
      fertiliser
      irrigation: same as EXP_04_TRT01.paddock.irrigation
      manager
        on start_of_day:
```
            if day = 264 or day = 294  or day = 362  or day = 58                 then
               deficit = sat_dep() - sw_dep()
               irrigation.amount = deficit
            endif
            ! ------------------ exp_04_trt24 --------------------------------
```
        on end_of_day:
        script: same as in EXP_04_TRT01.paddock.manager
      soil: same as EXP_04_TRT01.paddock.soil
      surfaceom
        PoolName = wheat  # Organic Matter pool name
        type = wheat  # Organic Matter type
        mass = 0.  # Initial surface residue (kg/ha)
        cnr = 33.  # C:N ratio of initial residue
        standing_fraction = 0.0  # Fraction of residue standing
      Cotton2: same as EXP_04_TRT02.paddock.Cotton2
  simulation EXP_04_TRT24
    clock: start_date=1/1/1977; end_date=11/10/1978
    summaryfile
    metfile met: filename=myall_apsim.met
    area paddock
      outputfile report: filename=EXP_04_TRT24 report.out; title=EXP_04_TRT24 report
        variables: same as EXP_04_TRT01.paddock.report.variables
      outputfile report_harvest: filename=EXP_04_TRT24 report_harvest.out; title=EXP_04_TRT24 report_harvest
        variables
          variable:
            year
            day
            manager.yield_acre as yld/acre
            Cotton2.das as DaysAfterSowing
            Cotton2.openz
            Cotton2.lint
            Cotton2.bolls_sc
            Cotton2.lai_max
            Cotton2.nuptake
            Cotton2.squarz_max
      operations: same as EXP_04_TRT04.paddock.Operations
      fertiliser
      irrigation: same as EXP_04_TRT01.paddock.irrigation
      manager
        on start_of_day:
```
            if day = 264 or day = 294  or day = 362  or day = 58                 then
               deficit = sat_dep() - sw_dep()
               irrigation.amount = deficit
            endif
            ! ------------------ exp_04_trt25 --------------------------------
```
        on end_of_day:
        script: same as in EXP_04_TRT01.paddock.manager
      soil: same as EXP_04_TRT01.paddock.soil
      surfaceom
        PoolName = wheat  # Organic Matter pool name
        type = wheat  # Organic Matter type
        mass = 0.  # Initial surface residue (kg/ha)
        cnr = 33.  # C:N ratio of initial residue
        standing_fraction = 0.0  # Fraction of residue standing
      Cotton2: same as EXP_04_TRT02.paddock.Cotton2
  simulation EXP_04_TRT25
    clock: start_date=1/1/1977; end_date=11/10/1978
    summaryfile
    metfile met: filename=myall_apsim.met
    area paddock
      outputfile report: filename=EXP_04_TRT25 report.out; title=EXP_04_TRT25 report
        variables: same as EXP_04_TRT01.paddock.report.variables
      outputfile report_harvest: filename=EXP_04_TRT25 report_harvest.out; title=EXP_04_TRT25 report_harvest
        variables
          variable:
            year
            day
            manager.yield_acre as yld/acre
            Cotton2.das as DaysAfterSowing
            Cotton2.openz
            Cotton2.lint
            Cotton2.bolls_sc
            Cotton2.lai_max
            Cotton2.nuptake
            Cotton2.squarz_max
      operations: same as EXP_04_TRT01.paddock.Operations
      fertiliser
      irrigation: same as EXP_04_TRT01.paddock.irrigation
      manager
        on start_of_day:
```
            if day = 264 or day = 294  or day = 45  or day = 58  or day = 75                then
               deficit = sat_dep() - sw_dep()
               irrigation.amount = deficit
            endif
            ! ------------------ exp_04_trt26 --------------------------------
```
        on end_of_day:
        script: same as in EXP_04_TRT01.paddock.manager
      soil: same as EXP_04_TRT01.paddock.soil
      surfaceom
        PoolName = wheat  # Organic Matter pool name
        type = wheat  # Organic Matter type
        mass = 0.  # Initial surface residue (kg/ha)
        cnr = 33.  # C:N ratio of initial residue
        standing_fraction = 0.0  # Fraction of residue standing
      Cotton2: same as EXP_04_TRT02.paddock.Cotton2
  simulation EXP_04_TRT26
    clock: start_date=1/1/1977; end_date=11/10/1978
    summaryfile
    metfile met: filename=myall_apsim.met
    area paddock
      outputfile report: filename=EXP_04_TRT26 report.out; title=EXP_04_TRT26 report
        variables: same as EXP_04_TRT01.paddock.report.variables
      outputfile report_harvest: filename=EXP_04_TRT26 report_harvest.out; title=EXP_04_TRT26 report_harvest
        variables
          variable:
            year
            day
            manager.yield_acre as yld/acre
            Cotton2.das as DaysAfterSowing
            Cotton2.openz
            Cotton2.lint
            Cotton2.bolls_sc
            Cotton2.lai_max
            Cotton2.nuptake
            Cotton2.squarz_max
      operations: same as EXP_04_TRT02.paddock.Operations
      fertiliser
      irrigation: same as EXP_04_TRT01.paddock.irrigation
      manager
        on start_of_day:
```
            if day = 264 or day = 294  or day = 45  or day = 58  or day = 75                then
               deficit = sat_dep() - sw_dep()
               irrigation.amount = deficit
            endif
            ! ------------------ exp_04_trt27 --------------------------------
```
        on end_of_day:
        script: same as in EXP_04_TRT01.paddock.manager
      soil: same as EXP_04_TRT01.paddock.soil
      surfaceom
        PoolName = wheat  # Organic Matter pool name
        type = wheat  # Organic Matter type
        mass = 0.  # Initial surface residue (kg/ha)
        cnr = 33.  # C:N ratio of initial residue
        standing_fraction = 0.0  # Fraction of residue standing
      Cotton2: same as EXP_04_TRT02.paddock.Cotton2
  simulation EXP_04_TRT27
    clock: start_date=1/1/1977; end_date=11/10/1978
    summaryfile
    metfile met: filename=myall_apsim.met
    area paddock
      outputfile report: filename=EXP_04_TRT27 report.out; title=EXP_04_TRT27 report
        variables: same as EXP_04_TRT01.paddock.report.variables
      outputfile report_harvest: filename=EXP_04_TRT27 report_harvest.out; title=EXP_04_TRT27 report_harvest
        variables
          variable:
            year
            day
            manager.yield_acre as yld/acre
            Cotton2.das as DaysAfterSowing
            Cotton2.openz
            Cotton2.lint
            Cotton2.bolls_sc
            Cotton2.lai_max
            Cotton2.nuptake
            Cotton2.squarz_max
      operations: same as EXP_04_TRT03.paddock.Operations
      fertiliser
      irrigation: same as EXP_04_TRT01.paddock.irrigation
      manager
        on start_of_day:
```
            if day = 264 or day = 294  or day = 45  or day = 58  or day = 75                then
               deficit = sat_dep() - sw_dep()
               irrigation.amount = deficit
            endif
            ! ------------------ exp_04_trt28 --------------------------------
```
        on end_of_day:
        script: same as in EXP_04_TRT01.paddock.manager
      soil: same as EXP_04_TRT01.paddock.soil
      surfaceom
        PoolName = wheat  # Organic Matter pool name
        type = wheat  # Organic Matter type
        mass = 0.  # Initial surface residue (kg/ha)
        cnr = 33.  # C:N ratio of initial residue
        standing_fraction = 0.0  # Fraction of residue standing
      Cotton2: same as EXP_04_TRT02.paddock.Cotton2
  simulation EXP_04_TRT28
    clock: start_date=1/1/1977; end_date=11/10/1978
    summaryfile
    metfile met: filename=myall_apsim.met
    area paddock
      outputfile report: filename=EXP_04_TRT28 report.out; title=EXP_04_TRT28 report
        variables: same as EXP_04_TRT01.paddock.report.variables
      outputfile report_harvest: filename=EXP_04_TRT28 report_harvest.out; title=EXP_04_TRT28 report_harvest
        variables
          variable:
            year
            day
            manager.yield_acre as yld/acre
            Cotton2.das as DaysAfterSowing
            Cotton2.openz
            Cotton2.lint
            Cotton2.bolls_sc
            Cotton2.lai_max
            Cotton2.nuptake
            Cotton2.squarz_max
      operations: same as EXP_04_TRT04.paddock.Operations
      fertiliser
      irrigation: same as EXP_04_TRT01.paddock.irrigation
      manager
        on start_of_day:
```
            if day = 264 or day = 294  or day = 45  or day = 58  or day = 75                then
               deficit = sat_dep() - sw_dep()
               irrigation.amount = deficit
            endif
            ! ------------------ exp_04_trt29 --------------------------------
```
        on end_of_day:
        script: same as in EXP_04_TRT01.paddock.manager
      soil: same as EXP_04_TRT01.paddock.soil
      surfaceom
        PoolName = wheat  # Organic Matter pool name
        type = wheat  # Organic Matter type
        mass = 0.  # Initial surface residue (kg/ha)
        cnr = 33.  # C:N ratio of initial residue
        standing_fraction = 0.0  # Fraction of residue standing
      Cotton2: same as EXP_04_TRT02.paddock.Cotton2
  simulation EXP_04_TRT29
    clock: start_date=1/1/1977; end_date=11/10/1978
    summaryfile
    metfile met: filename=myall_apsim.met
    area paddock
      outputfile report: filename=EXP_04_TRT29 report.out; title=EXP_04_TRT29 report
        variables: same as EXP_04_TRT01.paddock.report.variables
      outputfile report_harvest: filename=EXP_04_TRT29 report_harvest.out; title=EXP_04_TRT29 report_harvest
        variables
          variable:
            year
            day
            manager.yield_acre as yld/acre
            Cotton2.das as DaysAfterSowing
            Cotton2.openz
            Cotton2.lint
            Cotton2.bolls_sc
            Cotton2.lai_max
            Cotton2.nuptake
            Cotton2.squarz_max
      operations: same as EXP_04_TRT01.paddock.Operations
      fertiliser
      irrigation: same as EXP_04_TRT01.paddock.irrigation
      manager
        on start_of_day:
```
            if day = 264 or day = 294  or day = 51  or day = 69                 then
               deficit = sat_dep() - sw_dep()
               irrigation.amount = deficit
            endif
            ! ------------------ exp_04_trt30 --------------------------------
```
        on end_of_day:
        script: same as in EXP_04_TRT01.paddock.manager
      soil: same as EXP_04_TRT01.paddock.soil
      surfaceom
        PoolName = wheat  # Organic Matter pool name
        type = wheat  # Organic Matter type
        mass = 0.  # Initial surface residue (kg/ha)
        cnr = 33.  # C:N ratio of initial residue
        standing_fraction = 0.0  # Fraction of residue standing
      Cotton2: same as EXP_04_TRT02.paddock.Cotton2
  simulation EXP_04_TRT30
    clock: start_date=1/1/1977; end_date=11/10/1978
    summaryfile
    metfile met: filename=myall_apsim.met
    area paddock
      outputfile report: filename=EXP_04_TRT30 report.out; title=EXP_04_TRT30 report
        variables: same as EXP_04_TRT01.paddock.report.variables
      outputfile report_harvest: filename=EXP_04_TRT30 report_harvest.out; title=EXP_04_TRT30 report_harvest
        variables
          variable:
            year
            day
            manager.yield_acre as yld/acre
            Cotton2.das as DaysAfterSowing
            Cotton2.openz
            Cotton2.lint
            Cotton2.bolls_sc
            Cotton2.lai_max
            Cotton2.nuptake
            Cotton2.squarz_max
      operations: same as EXP_04_TRT02.paddock.Operations
      fertiliser
      irrigation: same as EXP_04_TRT01.paddock.irrigation
      manager
        on start_of_day:
```
            if day = 264 or day = 294  or day = 51  or day = 69                 then
               deficit = sat_dep() - sw_dep()
               irrigation.amount = deficit
            endif
            ! ------------------ exp_04_trt31 --------------------------------
```
        on end_of_day:
        script: same as in EXP_04_TRT01.paddock.manager
      soil: same as EXP_04_TRT01.paddock.soil
      surfaceom
        PoolName = wheat  # Organic Matter pool name
        type = wheat  # Organic Matter type
        mass = 0.  # Initial surface residue (kg/ha)
        cnr = 33.  # C:N ratio of initial residue
        standing_fraction = 0.0  # Fraction of residue standing
      Cotton2: same as EXP_04_TRT02.paddock.Cotton2
  simulation EXP_04_TRT31
    clock: start_date=1/1/1977; end_date=11/10/1978
    summaryfile
    metfile met: filename=myall_apsim.met
    area paddock
      outputfile report: filename=EXP_04_TRT31 report.out; title=EXP_04_TRT31 report
        variables: same as EXP_04_TRT01.paddock.report.variables
      outputfile report_harvest: filename=EXP_04_TRT31 report_harvest.out; title=EXP_04_TRT31 report_harvest
        variables
          variable:
            year
            day
            manager.yield_acre as yld/acre
            Cotton2.das as DaysAfterSowing
            Cotton2.openz
            Cotton2.lint
            Cotton2.bolls_sc
            Cotton2.lai_max
            Cotton2.nuptake
            Cotton2.squarz_max
      operations: same as EXP_04_TRT03.paddock.Operations
      fertiliser
      irrigation: same as EXP_04_TRT01.paddock.irrigation
      manager
        on start_of_day:
```
            if day = 264 or day = 294  or day = 51  or day = 69                 then
               deficit = sat_dep() - sw_dep()
               irrigation.amount = deficit
            endif
            ! ------------------ exp_04_trt32 --------------------------------
```
        on end_of_day:
        script: same as in EXP_04_TRT01.paddock.manager
      soil: same as EXP_04_TRT01.paddock.soil
      surfaceom
        PoolName = wheat  # Organic Matter pool name
        type = wheat  # Organic Matter type
        mass = 0.  # Initial surface residue (kg/ha)
        cnr = 33.  # C:N ratio of initial residue
        standing_fraction = 0.0  # Fraction of residue standing
      Cotton2: same as EXP_04_TRT02.paddock.Cotton2
  simulation EXP_04_TRT32
    clock: start_date=1/1/1977; end_date=11/10/1978
    summaryfile
    metfile met: filename=myall_apsim.met
    area paddock
      outputfile report: filename=EXP_04_TRT32 report.out; title=EXP_04_TRT32 report
        variables: same as EXP_04_TRT01.paddock.report.variables
      outputfile report_harvest: filename=EXP_04_TRT32 report_harvest.out; title=EXP_04_TRT32 report_harvest
        variables
          variable:
            year
            day
            manager.yield_acre as yld/acre
            Cotton2.das as DaysAfterSowing
            Cotton2.openz
            Cotton2.lint
            Cotton2.bolls_sc
            Cotton2.lai_max
            Cotton2.nuptake
            Cotton2.squarz_max
      operations: same as EXP_04_TRT04.paddock.Operations
      fertiliser
      irrigation: same as EXP_04_TRT01.paddock.irrigation
      manager
        on start_of_day:
```
            if day = 264 or day = 294  or day = 51  or day = 69                 then
               deficit = sat_dep() - sw_dep()
               irrigation.amount = deficit
            endif
            ! ------------------ exp_04_trt33 --------------------------------
```
        on end_of_day:
        script: same as in EXP_04_TRT01.paddock.manager
      soil: same as EXP_04_TRT01.paddock.soil
      surfaceom
        PoolName = wheat  # Organic Matter pool name
        type = wheat  # Organic Matter type
        mass = 0.  # Initial surface residue (kg/ha)
        cnr = 33.  # C:N ratio of initial residue
        standing_fraction = 0.0  # Fraction of residue standing
      Cotton2: same as EXP_04_TRT02.paddock.Cotton2
  simulation EXP_04_TRT33
    clock: start_date=1/1/1977; end_date=11/10/1978
    summaryfile
    metfile met: filename=myall_apsim.met
    area paddock
      outputfile report: filename=EXP_04_TRT33 report.out; title=EXP_04_TRT33 report
        variables: same as EXP_04_TRT01.paddock.report.variables
      outputfile report_harvest: filename=EXP_04_TRT33 report_harvest.out; title=EXP_04_TRT33 report_harvest
        variables
          variable:
            year
            day
            manager.yield_acre as yld/acre
            Cotton2.das as DaysAfterSowing
            Cotton2.openz
            Cotton2.lint
            Cotton2.bolls_sc
            Cotton2.lai_max
            Cotton2.nuptake
            Cotton2.squarz_max
      operations: same as EXP_04_TRT01.paddock.Operations
      fertiliser
      irrigation: same as EXP_04_TRT01.paddock.irrigation
      manager
        on start_of_day:
```
            if day = 264 or day = 294  or day = 58                  then
               deficit = sat_dep() - sw_dep()
               irrigation.amount = deficit
            endif
            ! ------------------ exp_04_trt34 --------------------------------
```
        on end_of_day:
        script: same as in EXP_04_TRT01.paddock.manager
      soil: same as EXP_04_TRT01.paddock.soil
      surfaceom
        PoolName = wheat  # Organic Matter pool name
        type = wheat  # Organic Matter type
        mass = 0.  # Initial surface residue (kg/ha)
        cnr = 33.  # C:N ratio of initial residue
        standing_fraction = 0.0  # Fraction of residue standing
      Cotton2: same as EXP_04_TRT02.paddock.Cotton2
  simulation EXP_04_TRT34
    clock: start_date=1/1/1977; end_date=11/10/1978
    summaryfile
    metfile met: filename=myall_apsim.met
    area paddock
      outputfile report: filename=EXP_04_TRT34 report.out; title=EXP_04_TRT34 report
        variables: same as EXP_04_TRT01.paddock.report.variables
      outputfile report_harvest: filename=EXP_04_TRT34 report_harvest.out; title=EXP_04_TRT34 report_harvest
        variables
          variable:
            year
            day
            manager.yield_acre as yld/acre
            Cotton2.das as DaysAfterSowing
            Cotton2.openz
            Cotton2.lint
            Cotton2.bolls_sc
            Cotton2.lai_max
            Cotton2.nuptake
            Cotton2.squarz_max
      operations: same as EXP_04_TRT02.paddock.Operations
      fertiliser
      irrigation: same as EXP_04_TRT01.paddock.irrigation
      manager
        on start_of_day:
```
            if day = 264 or day = 294  or day = 58                  then
               deficit = sat_dep() - sw_dep()
               irrigation.amount = deficit
            endif
            ! ------------------ exp_04_trt35 --------------------------------
```
        on end_of_day:
        script: same as in EXP_04_TRT01.paddock.manager
      soil: same as EXP_04_TRT01.paddock.soil
      surfaceom
        PoolName = wheat  # Organic Matter pool name
        type = wheat  # Organic Matter type
        mass = 0.  # Initial surface residue (kg/ha)
        cnr = 33.  # C:N ratio of initial residue
        standing_fraction = 0.0  # Fraction of residue standing
      Cotton2: same as EXP_04_TRT02.paddock.Cotton2
  simulation EXP_04_TRT35
    clock: start_date=1/1/1977; end_date=11/10/1978
    summaryfile
    metfile met: filename=myall_apsim.met
    area paddock
      outputfile report: filename=EXP_04_TRT35 report.out; title=EXP_04_TRT35 report
        variables: same as EXP_04_TRT01.paddock.report.variables
      outputfile report_harvest: filename=EXP_04_TRT35 report_harvest.out; title=EXP_04_TRT35 report_harvest
        variables
          variable:
            year
            day
            manager.yield_acre as yld/acre
            Cotton2.das as DaysAfterSowing
            Cotton2.openz
            Cotton2.lint
            Cotton2.bolls_sc
            Cotton2.lai_max
            Cotton2.nuptake
            Cotton2.squarz_max
      operations: same as EXP_04_TRT03.paddock.Operations
      fertiliser
      irrigation: same as EXP_04_TRT01.paddock.irrigation
      manager
        on start_of_day:
```
            if day = 264 or day = 294  or day = 58                  then
               deficit = sat_dep() - sw_dep()
               irrigation.amount = deficit
            endif
            ! ------------------ exp_04_trt36 --------------------------------
```
        on end_of_day:
        script: same as in EXP_04_TRT01.paddock.manager
      soil: same as EXP_04_TRT01.paddock.soil
      surfaceom
        PoolName = wheat  # Organic Matter pool name
        type = wheat  # Organic Matter type
        mass = 0.  # Initial surface residue (kg/ha)
        cnr = 33.  # C:N ratio of initial residue
        standing_fraction = 0.0  # Fraction of residue standing
      Cotton2: same as EXP_04_TRT02.paddock.Cotton2
  simulation EXP_04_TRT36
    clock: start_date=1/1/1977; end_date=11/10/1978
    summaryfile
    metfile met: filename=myall_apsim.met
    area paddock
      outputfile report: filename=EXP_04_TRT36 report.out; title=EXP_04_TRT36 report
        variables: same as EXP_04_TRT01.paddock.report.variables
      outputfile report_harvest: filename=EXP_04_TRT36 report_harvest.out; title=EXP_04_TRT36 report_harvest
        variables
          variable:
            year
            day
            manager.yield_acre as yld/acre
            Cotton2.das as DaysAfterSowing
            Cotton2.openz
            Cotton2.lint
            Cotton2.bolls_sc
            Cotton2.lai_max
            Cotton2.nuptake
            Cotton2.squarz_max
      operations: same as EXP_04_TRT04.paddock.Operations
      fertiliser
      irrigation: same as EXP_04_TRT01.paddock.irrigation
      manager
        on start_of_day:
```
            if day = 264 or day = 294  or day = 58                  then
               deficit = sat_dep() - sw_dep()
               irrigation.amount = deficit
            endif
            ! ------------------ exp_04_trt37 --------------------------------
```
        on end_of_day:
        script: same as in EXP_04_TRT01.paddock.manager
      soil: same as EXP_04_TRT01.paddock.soil
      surfaceom
        PoolName = wheat  # Organic Matter pool name
        type = wheat  # Organic Matter type
        mass = 0.  # Initial surface residue (kg/ha)
        cnr = 33.  # C:N ratio of initial residue
        standing_fraction = 0.0  # Fraction of residue standing
      Cotton2: same as EXP_04_TRT02.paddock.Cotton2
  simulation EXP_04_TRT37
    clock: start_date=1/1/1977; end_date=11/10/1978
    summaryfile
    metfile met: filename=myall_apsim.met
    area paddock
      outputfile report: filename=EXP_04_TRT37 report.out; title=EXP_04_TRT37 report
        variables: same as EXP_04_TRT01.paddock.report.variables
      outputfile report_harvest: filename=EXP_04_TRT37 report_harvest.out; title=EXP_04_TRT37 report_harvest
        variables
          variable:
            year
            day
            manager.yield_acre as yld/acre
            Cotton2.das as DaysAfterSowing
            Cotton2.openz
            Cotton2.lint
            Cotton2.bolls_sc
            Cotton2.lai_max
            Cotton2.nuptake
            Cotton2.squarz_max
      operations: same as EXP_04_TRT01.paddock.Operations
      fertiliser
      irrigation: same as EXP_04_TRT01.paddock.irrigation
      manager
        on start_of_day:
```
            if day = 264 or day = 294                   then
               deficit = sat_dep() - sw_dep()
               irrigation.amount = deficit
            endif
            ! ------------------ exp_04_trt38 --------------------------------
```
        on end_of_day:
        script: same as in EXP_04_TRT01.paddock.manager
      soil: same as EXP_04_TRT01.paddock.soil
      surfaceom
        PoolName = wheat  # Organic Matter pool name
        type = wheat  # Organic Matter type
        mass = 0.  # Initial surface residue (kg/ha)
        cnr = 33.  # C:N ratio of initial residue
        standing_fraction = 0.0  # Fraction of residue standing
      Cotton2: same as EXP_04_TRT02.paddock.Cotton2
  simulation EXP_04_TRT38
    clock: start_date=1/1/1977; end_date=11/10/1978
    summaryfile
    metfile met: filename=myall_apsim.met
    area paddock
      outputfile report: filename=EXP_04_TRT38 report.out; title=EXP_04_TRT38 report
        variables: same as EXP_04_TRT01.paddock.report.variables
      outputfile report_harvest: filename=EXP_04_TRT38 report_harvest.out; title=EXP_04_TRT38 report_harvest
        variables
          variable:
            year
            day
            manager.yield_acre as yld/acre
            Cotton2.das as DaysAfterSowing
            Cotton2.openz
            Cotton2.lint
            Cotton2.bolls_sc
            Cotton2.lai_max
            Cotton2.nuptake
            Cotton2.squarz_max
      operations: same as EXP_04_TRT02.paddock.Operations
      fertiliser
      irrigation: same as EXP_04_TRT01.paddock.irrigation
      manager
        on start_of_day:
```
            if day = 264 or day = 294                   then
               deficit = sat_dep() - sw_dep()
               irrigation.amount = deficit
            endif
            ! ------------------ exp_04_trt39 --------------------------------
```
        on end_of_day:
        script: same as in EXP_04_TRT01.paddock.manager
      soil: same as EXP_04_TRT01.paddock.soil
      surfaceom
        PoolName = wheat  # Organic Matter pool name
        type = wheat  # Organic Matter type
        mass = 0.  # Initial surface residue (kg/ha)
        cnr = 33.  # C:N ratio of initial residue
        standing_fraction = 0.0  # Fraction of residue standing
      Cotton2: same as EXP_04_TRT02.paddock.Cotton2
  simulation EXP_04_TRT39
    clock: start_date=1/1/1977; end_date=11/10/1978
    summaryfile
    metfile met: filename=myall_apsim.met
    area paddock
      outputfile report: filename=EXP_04_TRT39 report.out; title=EXP_04_TRT39 report
        variables: same as EXP_04_TRT01.paddock.report.variables
      outputfile report_harvest: filename=EXP_04_TRT39 report_harvest.out; title=EXP_04_TRT39 report_harvest
        variables
          variable:
            year
            day
            manager.yield_acre as yld/acre
            Cotton2.das as DaysAfterSowing
            Cotton2.openz
            Cotton2.lint
            Cotton2.bolls_sc
            Cotton2.lai_max
            Cotton2.nuptake
            Cotton2.squarz_max
      operations: same as EXP_04_TRT03.paddock.Operations
      fertiliser
      irrigation: same as EXP_04_TRT01.paddock.irrigation
      manager
        on start_of_day:
```
            if day = 264 or day = 294                   then
               deficit = sat_dep() - sw_dep()
               irrigation.amount = deficit
            endif
            ! ------------------ exp_04_trt40 --------------------------------
```
        on end_of_day:
        script: same as in EXP_04_TRT01.paddock.manager
      soil: same as EXP_04_TRT01.paddock.soil
      surfaceom
        PoolName = wheat  # Organic Matter pool name
        type = wheat  # Organic Matter type
        mass = 0.  # Initial surface residue (kg/ha)
        cnr = 33.  # C:N ratio of initial residue
        standing_fraction = 0.0  # Fraction of residue standing
      Cotton2: same as EXP_04_TRT02.paddock.Cotton2
  simulation EXP_04_TRT40
    clock: start_date=1/1/1977; end_date=11/10/1978
    summaryfile
    metfile met: filename=myall_apsim.met
    area paddock
      outputfile report: filename=EXP_04_TRT40 report.out; title=EXP_04_TRT40 report
        variables: same as EXP_04_TRT01.paddock.report.variables
      outputfile report_harvest: filename=EXP_04_TRT40 report_harvest.out; title=EXP_04_TRT40 report_harvest
        variables
          variable:
            year
            day
            manager.yield_acre as yld/acre
            Cotton2.das as DaysAfterSowing
            Cotton2.openz
            Cotton2.lint
            Cotton2.bolls_sc
            Cotton2.lai_max
            Cotton2.nuptake
            Cotton2.squarz_max
      operations: same as EXP_04_TRT04.paddock.Operations
      fertiliser
      irrigation: same as EXP_04_TRT01.paddock.irrigation
      manager
        on start_of_day:
```
            if day = 264 or day = 294                   then
               deficit = sat_dep() - sw_dep()
               irrigation.amount = deficit
            endif
```
        on end_of_day:
        script: same as in EXP_04_TRT01.paddock.manager
      soil: same as EXP_04_TRT01.paddock.soil
      surfaceom
        PoolName = wheat  # Organic Matter pool name
        type = wheat  # Organic Matter type
        mass = 0.  # Initial surface residue (kg/ha)
        cnr = 33.  # C:N ratio of initial residue
        standing_fraction = 0.0  # Fraction of residue standing
      Cotton2: same as EXP_04_TRT02.paddock.Cotton2
