folder Simulations: version=29
  memo Readme
    4 simulations: Aerobic rice: sowing date 16 May; 50% emergence 24 May

    3 x fertiliser treatments,
    Set 1: 225 kg N/ha, 3 splits, full water supply
    Set 2: Limited water before PI, then enough water, 225 kg N/ha, 5 split
    Set 3: water applied as designed, 225 kg N/ha, 3 splits

    HD297p = Potential production (no soil water or N)
  soil
    Water
      SoilCrop Crop
    SoilWat
    SoilOrganicMatter
    Analysis
    InitWater
      percentmethod: percent=1; distributed=filled from top
    Sample Soil sample
      Layer:
        {Thickness (mm)=100, NO3 (ppm)=0, NH4 (ppm)=0, SW (mm/mm)=0}
    Phosphorus: SorptionCoeff=0.7
      Layer:
        {LabileP (mg/kg)=5, BandedP (kg/ha)=0, RockP (kg/ha)=0, Sorption (-)=50}
    Sample Initial nitrogen (disabled)
      Layer:
        Thickness (mm)  NO3 (kg/ha)  NH4 (kg/ha)
        100             23.04        11.52
        100             23.04        11.52
        100             11.52        5.76
        100             5.76         2.88
        100             1.152        0.576
        100             0.23         0.115
        100             0.046        0.023
        100             0.009        0.004
        100             0.001        0
        100             0            0
      memo
        Starting N (no3 + nh4)  should be 97kg/ha
    Sample Initial nitrogen1
      Layer:
        Thickness (mm)  NO3 (kg/ha)  NH4 (kg/ha)
        100             10           1
        100             10           1
        100             10           1
        100             1            2.88
        100             1.152        0.576
        100             0.23         0.115
        100             0.046        0.023
        100             0.009        0.004
        100             0.001        0
        100             0            0
  simulation HD297p
    metfile met: filename=CHINA3.met
    clock
      start_date = 13/05/2003  # Select the start date of the simulation
      end_date = 30/10/2003  # Select the end date of the simulation
    summaryfile
    area paddock
      folder Manager folder
        manager Rice extras
          on init:
```
sand =      0.5     0.5   0.5     0.5     0.3   0.3    0.3    0.3   0.3    0.3 
clay =      0.3     0.3   0.3     0.3     0.5   0.5    0.5    0.5   0.5    0.5 
ksat =     3.79    3.79   4.07 1.1648 1.9748 1.148   1.441  1.065 1.065  1.065
!VGA  =   0.0115 0.0116 0.0115 0.0219 0.0258 0.0136 0.0130 0.0230 0.0230 0.0230 ! = VGA
!VGL = -1.503, -1.674, -5.657, -5.954, -5.154,-5.079, -5.236, -6.520,-6.00,-6.00
!VGN = 1.154, 1.178, 1.180, 2*1.186, 1.190, 1.184, 1.174,1.152,1.152
!VGR = 10*0.007
alphavg = 0.3 0.3 0.3 0.3 0.3 0.3 0.3 0.3 0.3
mvg = 0.3 0.3 0.3 0.3 0.3 0.3 0.3 0.3 0.3
nvg = 0.3 0.3 0.3 0.3 0.3 0.3 0.3 0.3 0.3
CO2    = 375.3
```
        manager Rice sowing rule
          on start_of_day:
```
if (day = 141) then
    Oryza2 sow cultivar = hd297, establishment = direct-seed 
    timex = 1
endif
```
          on end_of_day:
```
if (timex > 0) then
  output do_output  
  timex = timex + 1
endif

if (Oryza2.plant_status = 'dead') then
  Oryza2 harvest remove = 0.9
  Oryza2 end_crop
  timex = 0
endif
```
          on init:
```
timex = 0
```
      Oryza2
        eo_source = eo_plant
        ini: filename=HD297.xml
      eo
        vpd_fac = 0.75  # Tanner Sinclair VPD factor for net positive radiation
        albedo = 0.13  # Soil albedo (0-1). Used for net radiation
        max_albedo = 0.23  # Albedo at 100% green crop cover (0-1). Used for net radiation
        z0soil = 3  # Soil z0 (used when lai=0) (mm). This is the minimum that z0 may be
        default_wind = 60.0  # default wind speed (km/day) if not found in system (eg met or manager)
        default_pa = 1000  # Default atmospheric pressure (hPa) if not found in met or manager
        default_instrum_height = 2000  # Default instrument height (mm) if not found in system
        disp_instrum = 37.0  # Zero plane displacement at instrument site (mm)
        z0_instrum = 4.0  # Roughness length at instrument site (mm)
        extinct_coef = 0.8  # Extinction coefficient for adjustment of Eo_pm to obtain
        eo_plant_method = eo_transpiration  # Method used to calculate plant transpiration (eo_plant)
        wind_day_fraction = 0.66  # Optional fraction of wind in daylight hours (day:night is 2:1)
        adjustment_factor = 1.0  # Calibration or crop factor
        wind_multiplier = 1.0  # Multiplier for wind to alter wind run for shelter effects (-)
      outputfile Output: filename=HD297p Output.out; title=HD297p Output; events=Reporting Frequency
        variables
          variables: year, day, timex as time, dae, trc, rain, dvs, nflv, lai, wlvg, wagt, cover_green, zrt, parcum, sla
  simulation HD297 -> /Simulations/HD297p
    area paddock -> /Simulations/HD297p/paddock
      soil HD297: Site=Sth Balia; Region=Bhola; State=Bangladesh; Longitude=90.633614
        NearestTown = Bhola
        Latitude = 999999  # Latitude (WGS84)
        Comment = 2006/07 field measured DUL using wettest profile from pre-season measurements, estimated CLL  # Comments
        Water
          Layer:
            Thickness (mm)  BD (g/cc)  AirDry (mm/mm)  LL15 (mm/mm)  DUL (mm/mm)  SAT (mm/mm)
            100             1.44       0.007           0.1024        0.3718       0.456
            100             1.44       0.007           0.1088        0.3662       0.456
            100             1.44       0.007           0.1048        0.3526       0.456
            100             1.44       0.007           0.1049        0.3805       0.456
            100             1.44       0.007           0.105         0.381        0.456
            100             1.44       0.007           0.105         0.381        0.456
            100             1.44       0.007           0.105         0.381        0.456
            100             1.44       0.007           0.105         0.381        0.456
            100             1.44       0.007           0.105         0.381        0.456
            100             1.44       0.007           0.105         0.381        0.456
          SoilCrop rice
            Layer:
              Thickness (mm)  LL (mm/mm)  XF (0-1)
              100             0.102       1
              100             0.109       1
              100             0.105       1
              100             0.105       1
              100             0.105       1
              100             0.105       1
              100             0.105       1
              100             0.105       1
              100             0.105       1
              100             0.105       1
        SoilWat
          Layer:
            Thickness (mm)  SWCON (0-1)  MWCON (0-1)
            100             0.1          1
            100             0.1          1
            100             0.1          1
            100             0.1          1
            100             0.1          1
            100             0.1          1
            100             0.1          1
            100             0.1          1
            100             0.1          1
            100             0            0
          SummerCona = 2.5
          SummerU = 4
          SummerDate = 1-Nov
          WinterCona = 2.5
          WinterU = 4
          WinterDate = 1-Apr
          DiffusConst = 450
          DiffusSlope = 188
          Salb = 0.14
          CN2Bare = 84
          CNRed = 20
          CNCov = 0.8
          MaxPond = 100
        SoilOrganicMatter
          Layer:
            Thickness (mm)  OC (Total %)  FBiom (0-1)  FInert (0-1)
            100             1.3           0.1          0.9
            100             1.3           0.1          0.9
            100             0.65          0.1          0.9
            100             0.325         0.1          0.9
            100             0.013         0.1          0.9
            100             0.002         0.1          0.9
            100             0.001         0.1          0.9
            100             0.001         0.1          0.9
            100             0.001         0.1          0.9
            100             0.001         0.1          0.9
          RootCN = 40
          RootWT = 50
          SoilCN = 12.5
          EnrACoeff = 7.4
          EnrBCoeff = 0.2
        Analysis
          Layer:
            Thickness (mm)  EC (1:5 dS/m)  PH (1:5 water)  CL (mg/kg)
            100             0              6.5             0
            100             0              7               0
            100             0              7.4             0
            100             0              8.1             0
            100             0              8.3             0
            100             0              8.5             0
            100             0              8.5             0
            100             0              8.5             0
            100             0              8.5             0
            100             0              8.5             0
        Sample Initial water
          Layer:
            Thickness (mm)  SW (mm/mm)
            100             0.3718
            100             0.3662
            100             0.3526
            100             0.3805
            100             0.381
            100             0.381
            100             0.381
            100             0.381
            100             0.381
            100             0.381
        Sample Initial nitrogen
          Layer:
            Thickness (mm)  NO3 (kg/ha)  NH4 (kg/ha)
            100             23.04        11.52
            100             23.04        11.52
            100             11.52        5.76
            100             5.76         2.88
            100             1.152        0.576
            100             0.23         0.115
            100             0.046        0.023
            100             0.009        0.004
            100             0.001        0
            100             0            0
          memo
            Starting N (no3 + nh4)  should be 97kg/ha
      folder Manager folder -> /Simulations/HD297p/paddock/Manager folder
        manager Irrigation mgt
          on start_of_day:
```
if (day = 171) then
    Irrigation apply amount = 40
endif

if (day = 185) then
    Irrigation apply amount = 60
endif
if (day = 199) then
    Irrigation apply amount = 20
endif
if (day = 222) then
    Irrigation apply amount = 20
endif
if (day = 229) then
    Irrigation apply amount = 40
endif
if (day = 254) then
    Irrigation apply amount = 60
endif
```
        manager Fertiliser mgt
          on start_of_day:
```
if (dae = 1) then
    fertiliser apply amount = 150.0, type = urea
endif
if (dae = 56) then
    fertiliser apply amount = 150.0, type = urea
endif
if (dae = 76) then
    fertiliser apply amount = 150.0, type = urea
endif
```
      irrigation
        automatic_irrigation = off
        asw_depth = 300  # Depth to which ASW is calculated. (mm)
        crit_fr_asw = 0.6  # Fraction of ASW below which irrigation is applied (0-1.0)
        irrigation_efficiency = 1  # Efficiency of the irrigation. (0-1.0)
        default_no3_conc = 0  # Nitrate concentration (ppm N)
        default_nh4_conc = 0  # Ammonium concentration (ppm N)
        default_cl_conc = 0  # Chloride concentration (ppm Cl)
      surfaceom
        PoolName = wheat_stubble  # Organic Matter pool name
        type = wheat  # Organic Matter type
        mass = 10  # Initial surface residue (kg/ha)
        cnr = 80  # C:N ratio of initial residue
        standing_fraction = 0  # Fraction of residue standing
      fertiliser
      outputfile Output: filename=HD297 Output.out; title=HD297 Output
        variables -> /Simulations/HD297p/paddock/Output/Variables
        variables Variables1
          variables: no3(), nh4(), swdep(), zrt, trw, pcew, rnstrs, nacr, ancr, fnlv, anlv, anst, fnst, xxsno3
        events Reporting Frequency -> /Simulations/HD297p/paddock/Output/Reporting Frequency
  simulation HD297 set 2 -> /Simulations/HD297
    area paddock -> /Simulations/HD297/paddock
      soil HD297 -> /Simulations/HD297/paddock/HD297
        Sample Initial nitrogen (disabled)
          Layer:
            Thickness (mm)  NO3 (kg/ha)  NH4 (kg/ha)
            100             23.04        11.52
            100             23.04        11.52
            100             11.52        5.76
            100             5.76         2.88
            100             1.152        0.576
            100             0.23         0.115
            100             0.046        0.023
            100             0.009        0.004
            100             0.001        0
            100             0            0
      folder Manager folder -> /Simulations/HD297/paddock/Manager folder
        manager Irrigation mgt
          on start_of_day:
```
if (day = 185) then
    Irrigation apply amount = 30
endif
if (day = 200) then
    Irrigation apply amount = 20
endif
if (day = 229) then
    Irrigation apply amount = 40
endif
if (day = 254) then
    Irrigation apply amount = 60
endif
```
      outputfile Output: filename=HD297 set 2 Output.out; title=HD297 set 2 Output
        variables -> /Simulations/HD297/paddock/Output/Variables
        variables Variables1 -> /Simulations/HD297/paddock/Output/Variables1
        events Reporting Frequency -> /Simulations/HD297/paddock/Output/Reporting Frequency
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